Simulations: Version=195
  DataStore
  Memo
    This set of examples has one simulation and three experiments where factorial simulations are presented. Each simulation has examples of managers and report components to tailor the analysis and outputs to user's needs.

    **AgPastureExample**

    This is an example of a simple rotation that is cut/grazed, fertilised and irrigated according to the managers provided.
    >*CutRotation* is the manager used to set the cut/grazing regime. It allows to set up cuts at fixed days interval or according to a target amount of DM and also to set the type of DM being targeted (residual or to be removed - DM produced).

    >*FertiliseFixedDates* gives options to apply fertiliser on determined dates, which can be year specific or not, use soil mineral N to prevent applications over a determined value of N at a certain depth and to provide details about the fertiliser application.

    >*AutomaticIrrigation* allows the user to turn irrigation on or off. Once on, irrigation will occur during a determined period, with a determined amount allocated for the period chosen, and will start and end depending on PAWC values set by the user. The user also has the option to set the minimum amount of days that it takes for an irrigation event to happen again, the maximum amount of water that can be applied at each event and the depth to which PAWC is calculated.

    >*ReportExample and Report* components show options on how to tailor the outputs as it best suits the user needs. More details are given in the components.

    **PastureByWaterAndNitrogen**

    This is an example of a factorial experiment with a simple rotational cut/grazing. The experiment is set as a permutation between the factors Nitrogen, with doses from 0 up to 30 kgN/ha scaled by 5kgN/ha steps, and Water, which allows irrigated and dryland simulations. It has a base simulation that has the same managers from the previous simulation plus a report manager and another option of report component for outputs.

    >*ReportHelper* is a manager that improves the options of dates when outputs are generated. It gives the option to report outputs on particular days that are the same every year, report on absolute dates (that are not the same every year) or to delay the start of reporting (for example, skip the first 2-3 years of the simulation).

    >*ReportAnnual* is a component that shows how the total annual production is outputed.

    **CO2xBaseTemperature**

    This is an example of sensibility analysis to changes in atmospheric CO2 levels and minimum growth temperature (base temperature) via two managers. It is a factorial with the permutation between two CO2 levels (350 and 700 ppm) and five base temperatures (0,2,5,10,15). The *CO2Parameters* and *TemperatureParameters* managers also have the function of providing an example of how to change parameters via a manager script. A list of public parameters is provided in the [science documentation of AgPasture](http://apsimdev.apsim.info/Portals/0/Documentation/ApsimX/AgPastureScience.pdf).

    >*CO2Parameters* manager allows to change the atmospheric CO2 value. When not specified, APSIM will use the default value of 350 ppm. This manager also provides the option of changing the default values of parameters that are used to calculate the effect of CO2 on photosynthesis. These parameters are species specific and should be changed if the user wants to test the sensibility to these parameters or has detailed information on these parameters for a certain species/cultivar. Note that this manager is species specific, except for the atmospheric level of CO2. Therefore, if the parameters need to be changed for another species at the same time (for example pasture mixes), the user will need one manager for each species.

    >*TemperatureParameters* manager allows to change parameters that affect the plant photosynthesis response to temperature. Again, this is useful to test the sensibility to the parameters and to introduce more detailed information about a certain species/cultivar. This manager is species speficic and, therefore, a manager per species is needed.

    **CO2xHeatOnset**
    This is an example of sensibility analysis to changes in atmospheric CO2 levels and the 'HeatOnsetTemperature' parameter similar to the *CO2xBaseTemperature* simulation. The 'HeatOnsetTemperature' is the onset temperature for heat effects on photosynthesis. This simulation presents a different way of changing parameters directly via the factor component (instead of introducing a manager). In this case, a different factor component would be needed to change the parameter for another species, when necessary in mixed species simulations.
  Simulation AgPastureExample
    Clock: Start=1980-07-01; End=1985-06-30
    Weather: FileName=%root%/Examples/WeatherFiles/NZ_Lincoln
    MicroClimate: a_interception=0; b_interception=1; c_interception=0; d_interception=0; SoilHeatFluxFraction=0.4; MinimumHeightDiffForNewLayer=0; NightInterceptionFraction=0.5; ReferenceHeight=2
    SoilArbitrator
    Forages
      Parameters:
        Name                          LiveDigestibility  DeadDigestibility  LiveFractionConsumable  DeadFractionConsumable  LiveMinimumBiomass  DeadMinimumBiomass
        SurfaceOrganicMatter.Residue  0.7                0.3                1                       1                       100                 0
        AGPRyegrass.Leaf              0.7                0.3                1                       1                       100                 0
        AGPRyegrass.Stem              0.7                0.3                1                       1                       100                 0
        AGPRyegrass.Stolon            0.7                0.3                1                       1                       100                 0
        AGPWhiteClover.Leaf           0.7                0.3                1                       1                       100                 0
        AGPWhiteClover.Stem           0.7                0.3                1                       1                       100                 0
        AGPWhiteClover.Stolon         0.7                0.3                1                       1                       100                 0
    Summary
    Zone Field: Area=1; Slope=0; AspectAngle=0; Altitude=50
      SimpleGrazing: GrazingRotationType=0; SimpleGrazingFrequencyString=21; SimpleMinGrazable=0; SimpleGrazingResidual=1500; FlexibleGrazePostDM=0; FractionDefoliatedBiomassToSoil=[1]; FractionDefoliatedNToSoil=[0.7]; FractionExcretedNToDung=[0.45]; DepthUrineIsAdded=250; SendDungElsewhere=0; SendUrineElsewhere=0; UsePatching=false; PseudoPatches=true; ZoneCount=25; UrineReturnPattern=2; PseudoRandomSeed=666; FractionPopulationDecline=0; TramplingOn=false; MaximumPropLitterMovedToSoil=0.1; PastureConsumedAtMaximumRateOfLitterRemoval=1200
        PreGrazeDMArray=[1000, 1000, 1000, 1000, 1000, 1000, 1000, 1000, 1000, 1000, 1000, 1000]
        PostGrazeDMArray=[2000, 2000, 2000, 2000, 2000, 2000, 2000, 2000, 2000, 2000, 2000, 2000]
      Manager FertiliseFixedDates
        EachYear = True
        Dates = 5-jan,5-feb,5-mar,5-apr,5-aug,5-sep,5-oct,5-nov,5-dec
        UseCritNThreshold = False
        CritNThreshold = 50
        CritNDepth = 75
        Depth = 50
        Amount = 15
        FertiliserType = UreaN
```csharp
using Models.Interfaces;
using System.Linq;
using APSIM.Shared.Utilities;
using Models.PMF;
using Models.Soils;
using Models.Soils.Nutrients;
using Models.Core;
using System;
using Models.Soils.Nutrients;

namespace Models
{
    [Serializable]
    public class Script : Model
    {
        [Link] private Clock clock;
        [Link] private Fertiliser fertiliser;
        [Link] private ISummary summary;
        [Link] private Soil soil;
        private Nutrient nutrient;
        private Nutrient soilN;
        [Link]
        private IPhysical soilPhysical;
        [Link]
        private Nutrient Nutrient;
        [Link(Path="[SurfaceOrganicMatter].SurfaceResidue.Decomposition")]
        private OrganicFlow ResidueDecomposition;


        [Separator("Fertiliser will be applied on the date(s) below")]
        [Description("Apply fertiliser on the same day(s) each year? If no, then must include the year of appliaction below")]
        public bool EachYear { get; set; }

        [Description("Dates for one or more fertiliser applications (dd-mmm or dd-mmm-yyyy) as a list with a comma between dates")]
        public string[] Dates { get; set; }

        [Separator("Test for the mineral N in the soil and don't apply the fertiliser if greater than X kgN/ha is stored in the soil above a depth of Y mm")]
        [Description("Use a critical soil mineral N to prevent application above a threshold?")]
        public bool UseCritNThreshold { get; set; }

        [Description("Don't add fertiliser if N in the soil to the depth below exceeds (kg/ha)")]
        public double CritNThreshold { get; set; }

        [Description("Depth to which the amount of N in the soil should be calculated (mm)")]
        public double CritNDepth { get; set; }

        [Separator("Fertiliser application details")]
        [Description("Depth at which to apply the fertiliser (mm)")]
        public double Depth { get; set; }

        [Description("Amount of fertiliser to apply (kg N /ha) per application")]
        public double Amount { get; set; }

        [Description("Fertiliser type - select from the list")]
        [Display(Type = DisplayType.FertiliserType)]public string FertiliserType { get; set; }


        [EventSubscribe("StartOfSimulation")]
        private void FindSoilNOrNutrient(object sender, EventArgs e)
        {
            nutrient = this.FindInScope<Nutrient>() as Nutrient;
            soilN = this.FindInScope<Nutrient>() as Nutrient;

            if (nutrient == null && soilN == null)
                throw new Exception(string.Format("Error in script {0}: Unable to find nutrient or soilN.", Name));
        }

        [EventSubscribe("DoManagement")]
        private void OnDoManagement(object sender, EventArgs e)
        {
            if (OnApplicationDate())
            {
                if (NContentBelowThreshold())
                    fertiliser.Apply(Amount, FertiliserType, Depth);
                else
                    summary.WriteMessage(this, "Skipping fertiliser application due to soil mineral N content being above critical threshold.", MessageType.Diagnostic);
            }
        }

        /// <summary>Checks if today's date is one of the specified fertiliser application dates.</summary>
        private bool OnApplicationDate()
        {
            if (EachYear)
                return Dates.Any(d => DateUtilities.DatesEqual(d, clock.Today));
            
            DateTime[] dates = Dates.Select(d => DateTime.ParseExact(d, "d-MMM-yyyy", null)).ToArray();
            return dates.Any(d => SameDate(d, clock.Today));
        }

        /// <summary>Checks if N content in soil is below critical threshold.</summary>
        private bool NContentBelowThreshold()
        {
            if (!UseCritNThreshold)
                return true;
            
            double[] weights = GetLayerWeights();
            double cumSoilN = 0;

            for (int i = 0; i < soilPhysical.Thickness.Length; i++)
            {
                if (nutrient != null)
                    cumSoilN += weights[i] * nutrient.MineralN[i];
                else if (soilN != null)
                    cumSoilN += weights[i] * soilN.MineralN[i];
            }

            return cumSoilN <= CritNThreshold;
        }

        private double[] GetLayerWeights()
        {
            double[] weights = new double[soilPhysical.Thickness.Length];
            double cumDepth = 0;

            for (int i = 0; i < soilPhysical.Thickness.Length; i++)
            {
                cumDepth += soilPhysical.Thickness[i];
                if (cumDepth < CritNDepth)
                    weights[i] = 1;
                else if (cumDepth - soilPhysical.Thickness[i] <= CritNDepth)
                    weights[i] = (CritNDepth - (cumDepth - soilPhysical.Thickness[i])) / soilPhysical.Thickness[i];
                else
                    weights[i] = 0;
            }

            return weights;
        }

        private bool SameDate(DateTime d1, DateTime d2)
        {
            return d1.Year == d2.Year && d1.DayOfYear == d2.DayOfYear;
        }
    }
}
```
      Manager AutomaticIrrigation
        allowIrrigation = True
        seasonStart = 1-sep
        seasonEnd = 30-apr
        seasonsAllocation = 10000
        triggerDeficit = 75
        targetDeficit = 95
        returndays = 3
        maximumAmount = 30
        depthPAWC = 300
```csharp
using Newtonsoft.Json;
using APSIM.Shared.Utilities;
using System.Xml.Serialization;
using Models.Soils;
using Models.PMF;
using Models.Core;
using System;
using System.Linq;
using Models.Interfaces;


        
namespace Models
{
    [Serializable] 
    [System.Xml.Serialization.XmlInclude(typeof(Model))]
    public class Script : Model
    {
        [Link] private ISummary summary;
        [Link] private Irrigation Irrigation;
        [Link] private Clock Clock;
        [Link] private Soil Soil;
        [Link(IsOptional = true)] private IPlant existingCrop;
        private DateTime StartDate;
        private DateTime EndDate;
        private double TopDUL;
        private double TopLL;
        private int nLayers;
        [Link]
        private IPhysical soilPhysical;
        [Link]
        private ISoilWater waterBalance;
        //Communication to other modules
       
        //User inputs from properties tab
        [Description("Turn irrigation on?")]
        public bool allowIrrigation { get; set; }
        [Description("Start of irrigation season (dd-MMM)")]
        public string seasonStart { get; set; }
        [Description("End of irrigation season (dd-MMM)")]
        public string seasonEnd { get; set; }
        [Description("Season allocation (mm)")]
        public double seasonsAllocation { get; set; }
        [Description("Deficit to trigger irrigation (% PAWC)")]
        public double triggerDeficit { get; set; }
        [Description("Deficit to stop irrigaton (% PAWC)")]
        public double targetDeficit { get; set; }
        [Description("Minimum days for irrigation to return")]
        public double returndays { get; set; }
        [Description("Maximum irrigation application (mm/day)")]
        public double maximumAmount { get; set; }
        [Description("Depth to calculate PAWC (mm)")]
        public double depthPAWC { get; set; }

        //Class members
        [JsonIgnore] public double TopSWdeficit { get; set; }
        [JsonIgnore] public double TopSWC { get; set; }
        [JsonIgnore] public double DaysSinceIrrigation { get; set; }
        [JsonIgnore] public double AmountToApply { get; set; }
        [JsonIgnore] public double SeasonAppliedAmount { get; set; }
        
        private bool IrrigationIsAllowed { get; set; }
        private bool SeasonIsOpen { get; set; }
        private bool CropIsActive { get; set; }
        private bool IrrigatorIsAvailable { get; set; }
        private bool SoilIsDry { get; set; }

    
        //Calculate static soil variables
        [EventSubscribe("StartOfSimulation")]
        private void OnStartOfSimulation(object sender, EventArgs e)
        {   
            //Set the season dates
            StartDate = DateTime.Parse(seasonStart + "-" + Clock.Today.Year.ToString());
            EndDate = DateTime.Parse(seasonEnd + "-" + Clock.Today.Year.ToString());
            
            //Can we irrigate at all?
            IrrigationIsAllowed = false; 
            if (allowIrrigation)
                IrrigationIsAllowed = true; 

            //Calculate soil water variables
            double depthFromSurface = 0.0;
            double fracLayer = 0.0;
            nLayers = soilPhysical.Thickness.Length;
            for (int layer = 0; layer < nLayers; layer++)
            {
                fracLayer = Math.Min(1.0, (depthPAWC - depthFromSurface) / soilPhysical.Thickness[layer]);
                TopLL += soilPhysical.LL15mm[layer] * fracLayer;
                TopDUL += soilPhysical.DULmm[layer] * fracLayer;
                depthFromSurface += soilPhysical.Thickness[layer];
                if (depthFromSurface >= depthPAWC)
                    layer = nLayers;
            }
        }
             
        //Determine daily requirement for irrigation
        [EventSubscribe("StartOfDay")]
        private void OnStartOfDay(object sender, EventArgs e)
        {
            //Can we irrigate today?          
            SeasonIsOpen = isBetween(Clock.Today, StartDate, EndDate);
            if (!SeasonIsOpen)
                SeasonAppliedAmount = 0;

            //Is there a crop in the ground that needs irrigation?
            CropIsActive = false;
            if ((existingCrop != null) && (existingCrop.IsAlive))
                CropIsActive = true;
            //if ((existingCrop.Phenology.Stage >= 3.0) && (existingCrop.Phenology.Stage < 6.0))
          
            //Is the irrigator available?
            IrrigatorIsAvailable = false;
            DaysSinceIrrigation += 1;
            if (DaysSinceIrrigation >= returndays)
                IrrigatorIsAvailable = true;
          
            //Is the soil dry enough to require irrigation?
            SoilIsDry = false;
            double depthFromSurface = 0.0;
            double fracLayer = 0.0;
            TopSWC = 0.0;
            for (int layer = 0; layer < nLayers; layer++)
            //for (int layer = 0; depthFromSurface < depthPAWC + soilPhysical.Thickness[layer]; layer++)
            {
                fracLayer = Math.Min(1.0, (depthPAWC - depthFromSurface) / soilPhysical.Thickness[layer]);
                TopSWC += waterBalance.SWmm[layer] * fracLayer;
                depthFromSurface += soilPhysical.Thickness[layer];
                if (depthFromSurface >= depthPAWC)
                    layer = nLayers;
            }
            
            TopSWdeficit = TopSWC - TopDUL;
            if (Math.Max(0.0, -TopSWdeficit) >= (TopDUL - TopLL) * (100 - triggerDeficit) / 100)
                SoilIsDry = true;
                
            //Are all the conditions ratifying irrigation
            if (IrrigationIsAllowed && SeasonIsOpen && CropIsActive && IrrigatorIsAvailable && SoilIsDry)
            {
                //Lets bloody well irrigate then!!!!
                AmountToApply = TopDUL * targetDeficit / 100 - TopSWC;
                AmountToApply = Math.Max(0.0, Math.Min(AmountToApply, seasonsAllocation - SeasonAppliedAmount));
                Irrigation.Apply(AmountToApply);
                DaysSinceIrrigation = 0;
                SeasonAppliedAmount += AmountToApply;
            }
        }
        
        ///Checks whether theDate is between iniDate and endDate (non-year specific)
        private bool isBetween(DateTime theDay, DateTime iniDate, DateTime endDate)
        {
            bool result = false;
            if (iniDate.DayOfYear < endDate.DayOfYear)
            {
                // period is within one year, ex: summer in the northern hemisphere
                if ((theDay.DayOfYear >= iniDate.DayOfYear) && (theDay.DayOfYear <= endDate.DayOfYear))
                    result = true;
            }
            else
            {
                // period goes over the end of the year, ex: summer in the southern hemisphere
                if ((theDay.DayOfYear >= iniDate.DayOfYear) || (theDay.DayOfYear <= endDate.DayOfYear))
                    result = true;
            }
            
            return result;
        }
    }
}
```
      Irrigation
      Fertiliser
      SurfaceOrganicMatter: InitialResidueName=Sward; InitialResidueType=grass; InitialResidueMass=1000; InitialStandingFraction=0; InitialCPR=0; InitialCNR=15
      Soil: SoilType=NZ_Sedimentary; LocalName=Lismore; Site=Winchmore; NearestTown=Ashburton; Region=Canterbury; Country=New Zealand; Latitude=-48.48; Longitude=0
        Chemical: Thickness=[150, 150, 200, 150, 250, 300, 300]; PH=[6, 6, 6, 6, 6, 6, 6]; PHUnits=Water
        Physical
          Thickness  ParticleSizeClay  BD    AirDry  LL15   DUL    SAT   KS
          150        20                1.3   0.05    0.15   0.36   0.45  5000
          150        15                1.35  0.12    0.14   0.34   0.43  2500
          200        12                1     0.055   0.055  0.19   0.25  3000
          150        8                 0.53  0.015   0.015  0.065  0.15  10000
          250        6                 0.31  0.01    0.01   0.04   0.11  17500
          300        5                 0.3   0.01    0.01   0.03   0.11  20000
          300        5                 0.3   0.01    0.01   0.03   0.11  20000
          SoilCrop AGPRyegrassSoil: LL=[0.15, 0.14, 0.06, 0.02, 0.01, 0.01, 0.01]; KL=[0.1, 0.1, 0.08, 0.04, 0.01, 0, 0]; XF=[1, 1, 1, 1, 1, 0, 0]
          SoilCrop AGPWhiteCloverSoil: LL=[0.15, 0.14, 0.06, 0.02, 0.01, 0.01, 0.01]; KL=[0.1, 0.1, 0.08, 0.04, 0.01, 0, 0]; XF=[1, 1, 1, 1, 1, 0, 0]
        WaterBalance SoilWater: SummerDate=1-Nov; SummerU=6; SummerCona=3.5; WinterDate=1-apr; WinterU=2; WinterCona=2; DiffusConst=88; DiffusSlope=35; Salb=0.13; CN2Bare=73; CNRed=20; CNCov=0.8; DischargeWidth=0; CatchmentArea=0; PSIDul=-100
          Thickness  SWCON  KLAT
          150        0.5    0
          150        0.52   0
          200        0.55   0
          150        0.6    0
          250        0.65   0
          300        0.65   0
          300        0.65   0
        Organic: FOMCNRatio=40; CarbonUnits=Total
          Thickness  Carbon  SoilCNRatio  FBiom  FInert  FOM
          150        3       12           0.04   0.5     331.337
          150        1       12           0.02   0.7     245.461
          200        0.6     12           0.02   0.83    164.537
          150        0.4     12           0.01   0.9     121.892
          250        0.25    12           0.01   0.95    73.9313
          300        0.15    12           0      0.99    40.5743
          300        0.1     12           0      0.99    22.2677
        Water: Thickness=[150, 150, 200, 150, 250, 300, 300]; InitialValues=[0.3495, 0.33, 0.18325, 0.0625, 0.0385, 0.029, 0.029]; InitialPAWmm=109.725; RelativeTo=LL15; FilledFromTop=false
        Nutrient
        Solute NO3: Thickness=[150, 150, 200, 150, 250, 300, 300]; InitialValues=[5, 2.5, 1, 0.75, 0.5, 0.5, 0.5]; InitialValuesUnits=ppm; WaterTableConcentration=0; D0=0; DepthConstant=0; MaxDepthSoluteAccessible=0; RunoffEffectivenessAtMovingSolute=0; MaxEffectiveRunoff=0
        Solute NH4: Thickness=[150, 150, 200, 150, 250, 300, 300]; InitialValues=[0.1, 0.1, 0.1, 0.1, 0.1, 0.1, 0.1]; InitialValuesUnits=ppm; WaterTableConcentration=0; D0=0; DepthConstant=0; MaxDepthSoluteAccessible=0; RunoffEffectivenessAtMovingSolute=0; MaxEffectiveRunoff=0
        Solute Urea: Thickness=[150, 150, 200, 150, 250, 300, 300]; InitialValues=[0, 0, 0, 0, 0, 0, 0]; InitialValuesUnits=kg/ha; WaterTableConcentration=0; D0=0; DepthConstant=0; MaxDepthSoluteAccessible=0; RunoffEffectivenessAtMovingSolute=0; MaxEffectiveRunoff=0
        SoilTemperature Temperature
      PastureSpecies AGPRyegrass: doyGermination=275; daysEmergenceToAnthesis=120; daysAnthesisToMaturity=85; degreesDayForAnthesis=1100; degreesDayForMaturity=900; daysAnnualsFactor=45; CanopyType=PastureSpecies; InitialShootDM=1500; InitialRootDM=450; InitialRootDepth=750; initialDMFractionsGrasses=[0.15, 0.25, 0.25, 0.05, 0.05, 0.1, 0.1, 0.05, 0, 0, 0]; initialDMFractionsForbs=[0.2, 0.2, 0.15, 0.05, 0.1, 0.15, 0.1, 0.05, 0, 0, 0]; PhotosyntheticEfficiency=0.01; PhotosynthesisCurveFactor=0.8; FractionPAR=0.5; ReferenceCO2=380; CO2EffectScaleFactor=700; CO2EffectOffsetFactor=600; CO2EffectMinimum=0.7; CO2EffectExponent=2; ReproSeasonDurationCoeff=2; ReproSeasonShouldersLengthFactor=1; ReproSeasonOnsetDurationFactor=0.6; RelativeTurnoverEmerging=2; DetachmentDroughtCoefficient=3; DetachmentDroughtEffectMin=0.1; TurnoverStockFactor=0.01; TurnoverDefoliationEffectMin=0.025; MinimumGreenLeafProp=0.8; MinimumGreenRootProp=0.5
        initialDMFractionsLegumes=[0.16, 0.23, 0.22, 0.05, 0.03, 0.05, 0.05, 0.01, 0.04, 0.08, 0.08]
        LinearInterpolationFunction FVPDFunction
      PastureSpecies AGPWhiteClover: doyGermination=275; daysEmergenceToAnthesis=120; daysAnthesisToMaturity=85; degreesDayForAnthesis=1100; degreesDayForMaturity=900; daysAnnualsFactor=45; CanopyType=PastureSpecies; InitialShootDM=500; InitialRootDM=150; InitialRootDepth=350; initialDMFractionsGrasses=[0.15, 0.25, 0.25, 0.05, 0.05, 0.1, 0.1, 0.05, 0, 0, 0]; initialDMFractionsForbs=[0.2, 0.2, 0.15, 0.05, 0.1, 0.15, 0.1, 0.05, 0, 0, 0]; PhotosyntheticEfficiency=0.01; PhotosynthesisCurveFactor=0.8; FractionPAR=0.5; ReferenceCO2=380; CO2EffectScaleFactor=700; CO2EffectOffsetFactor=600; CO2EffectMinimum=0.7; CO2EffectExponent=2; ReproSeasonDurationCoeff=2; ReproSeasonShouldersLengthFactor=1; ReproSeasonOnsetDurationFactor=0.6; RelativeTurnoverEmerging=2; DetachmentDroughtCoefficient=3; DetachmentDroughtEffectMin=0.1; TurnoverStockFactor=0.01; TurnoverDefoliationEffectMin=0.025; MinimumGreenLeafProp=0.8; MinimumGreenRootProp=0.5
        initialDMFractionsLegumes=[0.16, 0.23, 0.22, 0.05, 0.03, 0.05, 0.05, 0.01, 0.04, 0.08, 0.08]
        LinearInterpolationFunction FVPDFunction
      Report ReportExample: EventNames=[Clock].EndOfDay
        VariableNames:
          [Clock].Today as Date
          // These examples are set up for Ryegrass and WhiteClover so add in any other species as needed for your simulation
          // The format of AggregationType (variable) from [Report].DayAfterLastOutput to [Clock].Today is used so that when the reporting frequency is changed the outputs are still sensible
          // If the name of the Report component ("ReportExample") here is changed in the simulation tree then all the references to that name in the outputs below also need to be changed
          // If all you want is harvested pasture or net herbage growth and/or standing biomass ....
          Sum of ([AGPRyegrass].HarvestedWt + [AGPWhiteClover].HarvestedWt) from [ReportExample].DayAfterLastOutput to [Clock].Today as HarvestedWt   //the amount harvested (kg DM /ha)
          Sum of ([AGPRyegrass].NetGrowthWt + [AGPWhiteClover].NetGrowthWt) from [ReportExample].DayAfterLastOutput to [Clock].Today as NetGrowthWt   //the amount harvested (kg DM /ha)
          Mean of ([AGPRyegrass].AboveGroundWt + [AGPWhiteClover].AboveGroundWt) from [ReportExample].DayAfterLastOutput to [Clock].Today as StandingBiomass   //pasture biomass (could also be reported as Last rather than Mean) (kg DM /ha)
          // outputs that are used more frequently than others
          Sum of ([AGPRyegrass].WaterDemand + [AGPWhiteClover].WaterDemand) from [ReportExample].DayAfterLastOutput to [Clock].Today as WaterDemand   //how much soil water the pasture could use (mm)
          Sum of (sum([AGPRyegrass].WaterUptake) + Sum([AGPWhiteClover].WaterUptake)) from [ReportExample].DayAfterLastOutput to [Clock].Today as WaterUptake    //the amount of water actuially taken up from the soil (mm)
          Sum of ([AGPRyegrass].SoilDemandN + [AGPWhiteClover].SoilDemandN) from [ReportExample].DayAfterLastOutput to [Clock].Today as NDemand                   //N demand (kg N /ha)
          Sum of ([AGPRyegrass].SoilUptakeN + [AGPWhiteClover].SoilUptakeN) from [ReportExample].DayAfterLastOutput to [Clock].Today as NitrogenUptake       //N uptake from the soil (kg N /ha)
          Sum of [AGPWhiteClover].FixedN from [ReportExample].DayAfterLastOutput to [Clock].Today as NitrogenFixed       //N uptake from the soil (kg N /ha)
          Mean of ([AGPRyegrass].AboveGroundWt + [AGPWhiteClover].AboveGroundWt) from [ReportExample].DayAfterLastOutput to [Clock].Today as HerbageMass
          Mean of ([AGPRyegrass].LAIGreen + [AGPWhiteClover].LAIGreen) from [ReportExample].DayAfterLastOutput to [Clock].Today as LAIGreen
          Mean of ([AGPRyegrass].LAIDead + [AGPWhiteClover].LAIDead + [AGPRyegrass].LAIGreen + [AGPWhiteClover].LAIGreen) from [ReportExample].DayAfterLastOutput to [Clock].Today as LAITotal
          // outputs that indicate what conditions are limiting growth - each growth-limiting factor is 0 (full stress) to 1 (no stress) but there are two components and the values are added so 2 indicates no stress
          Mean of ([AGPRyegrass].GlfTemperature + [AGPWhiteClover].GlfTemperature) from [ReportExample].DayAfterLastOutput to [Clock].Today as GlfTemp       //stress from non-optimal temperature
          Mean of ([AGPRyegrass].GlfWaterSupply + [AGPWhiteClover].GlfWaterSupply) from [ReportExample].DayAfterLastOutput to [Clock].Today as GlfWater       //stress from water limitation
          Mean of ([AGPRyegrass].GlfNSupply + [AGPWhiteClover].GlfNSupply) from [ReportExample].DayAfterLastOutput to [Clock].Today as GlfNitrogen       //stress from N limitation
          // photsynthesis-related outputs - all these are in units of C not DM
          Sum of ([AGPRyegrass].GPP +[AGPWhiteClover].GPP) from [ReportExample].DayAfterLastOutput to [Clock].Today as GrossPrimaryProduction       //GPP (kg C /ha)
          Sum of ([AGPRyegrass].NPP +[AGPWhiteClover].NPP) from [ReportExample].DayAfterLastOutput to [Clock].Today as NettPrimaryProduction        //NPP (kg C /ha)
          // examples of more detailed tissue-based information - see the list of outputs for many more options
      Report: EventNames=[Clock].EndOfDay
        VariableNames:
          [Clock].Today as Date
          // These examples are set up for Ryegrass and WhiteClover so add in any other species as needed for your simulation
          // The format of AggregationType (variable) from [Report].DayAfterLastOutput to [Clock].Today is used so that when the reporting frequency is changed the outputs are still sensible
          // If the name of the Report component ("Report") here is changed in the simulation tree then all the references to that name in the outputs below also need to be changed
          // If all you want is an annual pattern of harvested pasture based on the production year (July to June)  ....
          Sum of ([AGPRyegrass].HarvestedWt + [AGPWhiteClover].HarvestedWt) from 1-Jul to [Clock].Today as HarvestedWt   //the amount harvested (kg DM /ha)
  Simulation RenewPastureExample
    Memo
      This example shows the sequence of killing a pasture, cultivation and then resowing. It also shows how to define a custom cultivar (TestCultivar).

      This example uses an operations component to define the timing of sowing and cultivation. This example also shows a management script approach to do the same. It is called RenewPasture and is disabled.
    Clock: Start=1980-10-01; End=1980-10-30
    Weather: FileName=%root%/Examples/WeatherFiles/NZ_Lincoln
    MicroClimate: a_interception=0; b_interception=1; c_interception=0; d_interception=0; SoilHeatFluxFraction=0.4; MinimumHeightDiffForNewLayer=0; NightInterceptionFraction=0.5; ReferenceHeight=2
    SoilArbitrator
    Forages: same as AgPastureExample.Forages
    Summary
    Zone Field: Area=1; Slope=0; AspectAngle=0; Altitude=50
      Manager RenewPasture (disabled)
        Date2Kill = 5-Oct-1980
        TheSpecies2Kill = AGPRyegrass, AGPWhiteClover
        DateCultivation1 = 8-Oct-1980
        FracResidues1 = 0.7
        CultivationDepth1 = 20
        DateCultivation2 = 15-Oct-1980
        FracResidues2 = 0.5
        CultivationDepth2 = 10
        DateResow = 17-Oct-1980
        TheSpecies2Sow = AGPRyegrass, AGPWhiteClover
```csharp
using APSIM.Shared.Utilities;
using Models.Utilities;
using Models.Soils;
using Models.PMF;
using Models.Core;
using System;
using System.Linq;
using System.Collections.Generic;
using Models.Surface;

namespace Models
{
    [Serializable] 
    public class Script : Model
    {
        
        [Link] Clock clock;
        [Link] private IPlant[] plants;
        [Link] SurfaceOrganicMatter surfaceOrganicMatter;

        [Separator("Ending the pasture phase")]

        [Description("Date to kill the pasture")]
        public string Date2Kill { get; set; }

        [Description("Species to kill/end in the pasture. Comma delimited, case matters, can be blank")]
        public string[] TheSpecies2Kill { get; set; }        


        [Separator("First cultivation of the field")]

        [Description("Date for first cultivation")]
        public string DateCultivation1 { get; set; }

        [Description("Fraction of residues to incorporate")]
        public double FracResidues1 { get; set; }

        [Description("Depth of cultivation (mm)")]
        public double CultivationDepth1 { get; set; }


        [Separator("Second cultivation of the field")]

        [Description("Date for second cultivation")]
        public string DateCultivation2 { get; set; }

        [Description("Fraction of residues to incorporate")]
        public double FracResidues2 { get; set; }

        [Description("Depth of cultivation (mm)")]
        public double CultivationDepth2 { get; set; }


        [Separator("Resowing of pasture")]

        [Description("Days from second cultivation to resowing")]
        public string DateResow { get; set; }

        [Description("Species to resow. Comma delimited, case matters")]
        public string[] TheSpecies2Sow { get; set; }        

        [EventSubscribe("StartOfSimulation")]
        private void OnStartOfSimulation(object sender, EventArgs e)
        {
            // Day 1: kill all species.
			foreach (var plant in plants)
          		if (TheSpecies2Kill != null && TheSpecies2Kill.Length > 0 && TheSpecies2Kill.Contains(plant.Name))
                	plant.EndCrop();
          		
          	// 
        }

        [EventSubscribe("DoManagement")]
        private void OnDoManagement(object sender, EventArgs e)
        {
			// kill the pasture
            if (DateUtilities.WithinDates(Date2Kill, clock.Today, Date2Kill))
				foreach (var plant in plants)
              		if (TheSpecies2Kill != null && TheSpecies2Kill.Length > 0 && TheSpecies2Kill.Contains(plant.Name))
                		plant.EndCrop();

			// first cultivation
            if (DateUtilities.WithinDates(DateCultivation1, clock.Today, DateCultivation1))
				surfaceOrganicMatter.Incorporate(FracResidues1, CultivationDepth1);

			// second cultivation
            if (DateUtilities.WithinDates(DateCultivation2, clock.Today, DateCultivation2))
				surfaceOrganicMatter.Incorporate(FracResidues2, CultivationDepth2);

            if (DateUtilities.WithinDates(DateResow, clock.Today, DateResow))
				foreach (var plant in plants)
              		if (TheSpecies2Sow != null && TheSpecies2Sow.Length > 0 && TheSpecies2Sow.Contains(plant.Name))
                		plant.Sow(cultivar: plant.Name, population: 100.0, depth: 5.0, rowSpacing: 75.0);
        }
        



    }
}
```
      Operations
        1980-10-01  [AGPRyegrass].EndCrop()
        1980-10-01  [AGPRyegrass].Sow(cultivar: TestCultivar, population: 100.0, depth: 5.0, rowSpacing: 75.0)
        1980-10-05  [AGPRyegrass].EndCrop()
        1980-10-05  [AGPWhiteClover].EndCrop()
        1980-10-08  [SurfaceOrganicMatter].Incorporate(0.7, 20)
        1980-10-15  [SurfaceOrganicMatter].Incorporate(0.5, 10)
        1980-10-17  [AGPRyegrass].Sow(cultivar: TestCultivar, population: 100.0, depth: 5.0, rowSpacing: 75.0)
        1980-10-17  [AGPWhiteClover].Sow(cultivar: AGPWhiteClover, population: 100.0, depth: 5.0, rowSpacing: 75.0)
      SurfaceOrganicMatter: InitialResidueName=Sward; InitialResidueType=grass; InitialResidueMass=1000; InitialStandingFraction=0; InitialCPR=0; InitialCNR=15
      Soil: same as AgPastureExample.Field.Soil
      PastureSpecies AGPRyegrass: doyGermination=275; daysEmergenceToAnthesis=120; daysAnthesisToMaturity=85; degreesDayForAnthesis=1100; degreesDayForMaturity=900; daysAnnualsFactor=45; CanopyType=PastureSpecies; InitialShootDM=1500; InitialRootDM=450; InitialRootDepth=750; initialDMFractionsGrasses=[0.15, 0.25, 0.25, 0.05, 0.05, 0.1, 0.1, 0.05, 0, 0, 0]; initialDMFractionsForbs=[0.2, 0.2, 0.15, 0.05, 0.1, 0.15, 0.1, 0.05, 0, 0, 0]; PhotosyntheticEfficiency=0.01; PhotosynthesisCurveFactor=0.8; FractionPAR=0.5; ReferenceCO2=380; CO2EffectScaleFactor=700; CO2EffectOffsetFactor=600; CO2EffectMinimum=0.7; CO2EffectExponent=2; ReproSeasonDurationCoeff=2; ReproSeasonShouldersLengthFactor=1; ReproSeasonOnsetDurationFactor=0.6; RelativeTurnoverEmerging=2; DetachmentDroughtCoefficient=3; DetachmentDroughtEffectMin=0.1; TurnoverStockFactor=0.01; TurnoverDefoliationEffectMin=0.025; MinimumGreenLeafProp=0.8; MinimumGreenRootProp=0.5
        initialDMFractionsLegumes=[0.16, 0.23, 0.22, 0.05, 0.03, 0.05, 0.05, 0.01, 0.04, 0.08, 0.08]
        LinearInterpolationFunction FVPDFunction
        Cultivar TestCultivar: Command=[AGPRyegrass].InitialShootDM = 3000
      PastureSpecies AGPWhiteClover: same as AgPastureExample.Field.AGPWhiteClover
      Report: EventNames=[Clock].EndOfDay
        VariableNames:
          [Clock].Today as Date
          [AGPRyegrass].AboveGroundWt + [AGPWhiteClover].AboveGroundWt as BiomassAG
          [AGPRyegrass].BelowGroundWt + [AGPWhiteClover].BelowGroundWt as BiomassBG
          [SurfaceOrganicMatter].Wt as Residues
          sum([Soil].Nutrient.FOM.C) as FOM_C
          [AGPRyegrass].AboveGroundWt as Ryegrass
          [AGPWhiteClover].AboveGroundWt as Clover
          [AGPRyegrass].InitialShootDM
          [AGPWhiteClover].InitialShootDM
  Experiment PastureByWaterAndNitrogen
    Factors
      Permutation
        Factor Nitrogen: Specification=[FertiliseFixedDates].Script.Amount=0 to 30 step 5
        Factor Water: Specification=[AutomaticIrrigation].Script.allowIrrigation=false,true
    Simulation Base
      Clock: Start=1980-07-01; End=1989-06-30
      Weather: FileName=%root%/Examples/WeatherFiles/NZ_Lincoln
      SoilArbitrator
      Summary
      Zone Field: Area=1; Slope=0; AspectAngle=0; Altitude=50
        SimpleGrazing: same as AgPastureExample.Field.SimpleGrazing
        Manager FertiliseFixedDates: same as AgPastureExample.Field.FertiliseFixedDates
        Manager AutomaticIrrigation: same as AgPastureExample.Field.AutomaticIrrigation
        Manager ReportHelper
          ReportEveryYear_Name = [ReportAnnual]
          ReportEveryYear_Dates = 30-jun
          ReportSpecificDates_Name =
          ReportSpecificDates_Dates =
          NumYearsToDelay = 2
```csharp
using APSIM.Shared.Utilities;
using System.Xml.Serialization;
using Models;
using Models.PMF;
using Models.Soils;
using System.Text;
using System.Collections.Generic;
using Models.Core;
using System;
using System.Linq;

namespace Models
{
    [Serializable]
    public class Script : Model
    {
        [Link] Clock clock;
        [Link] Zone zone;
        [Link] Summary summary;

        [Separator("NOTE - all dates or date strings are entered with comma-separation and no spaces")]
        [Separator("NOTE - this component should be at the bottom of the list of Managers")]
        [Separator("   ")]
        [Separator("Reporting in particular days but the same days every year")]

        //ReportOnSpecificDaysEveryYear
        [Description("Name of the Report model for reporting on below dates every year: ")] 
        [Display(Type=DisplayType.Model, ModelType = typeof(Report))]
        public Report ReportEveryYear_Name { get; set; } 

        [Description("Enter one or more dates (as dd-mmm) for reporting : ")] 
        public string[] ReportEveryYear_Dates { get; set; } 

        [Separator("Reporting on absolute dates")]

        [Description("Name of the Report model for reporting on completely specified dates: ")] 
        [Display(Type=DisplayType.Model, ModelType = typeof(Report))]
        public Report ReportSpecificDates_Name { get; set; } 

        [Description("Enter one or more dates (as dd-mmm-yyyy) for reporting : ")] 
        public DateTime[] ReportSpecificDates_Dates { get; set; } 

        [Separator("Delay the start of reporting")]

        [Description("Number of years from the start of the simulation to delay reporting : ")] 
        public int NumYearsToDelay { get; set; } 

        private double YearCount = 0; // to do the delay in reporting

        [EventSubscribe("StartOfSimulation")]
        private void OnStartOfSimulation(object sender, EventArgs e)
        {
            YearCount = 0.0;
        }

        [EventSubscribe("DoManagementCalculations")]
        private void OnDoManagement(object sender, EventArgs e)
        {
            if ((clock.Today.Year - clock.StartDate.Year) >= NumYearsToDelay)
            {
                // example for reporting on irregular dates but the same dates every year
                if (ReportEveryYear_Dates != null)
                    foreach (string ddMMM in ReportEveryYear_Dates)
                        if (DateUtilities.DatesEqual(ddMMM, clock.Today))
                            ReportEveryYear_Name.DoOutput();

                // example for reporting on fully-specified dates that are not necessarily the same dates every year
                if (ReportSpecificDates_Dates != null)
                    foreach (DateTime ddMMMyy in ReportSpecificDates_Dates)
                        if (DateUtilities.Equals(ddMMMyy, clock.Today))
                            ReportSpecificDates_Name.DoOutput();
            }

        }
        
    }
}
```
        MicroClimate: a_interception=0; b_interception=1; c_interception=0; d_interception=0; SoilHeatFluxFraction=0.4; MinimumHeightDiffForNewLayer=0; NightInterceptionFraction=0.5; ReferenceHeight=2
        Irrigation
        Fertiliser
        SurfaceOrganicMatter: InitialResidueName=Sward; InitialResidueType=grass; InitialResidueMass=1000; InitialStandingFraction=0; InitialCPR=0; InitialCNR=15
        Soil: same as AgPastureExample.Field.Soil
        PastureSpecies AGPRyegrass: same as AgPastureExample.Field.AGPRyegrass
        PastureSpecies AGPWhiteClover: same as AgPastureExample.Field.AGPWhiteClover
        Report ReportAnnual: EventNames=//[Clock].EndOfMonth
          VariableNames:
            [Clock].Today as Date
            [Clock].Today.Year as Year
            Sum of [FertiliseFixedDates].Script.Amount from 1-Jul to [Clock].Today as FertiliserNApplied_kgN_ha   // fertiliser applied
            Sum of [Fertiliser].NitrogenApplied from 1-Jul to [Clock].Today as FertiliserNApplied_kgN_ha   // fertiliser applied
            Sum of ([AGPRyegrass].HarvestedWt + [AGPWhiteClover].HarvestedWt) / 1000.0 from 1-Jul to [Clock].Today as HarvestedWt_t_ha   //the amount harvested (kg DM /ha)
      Forages
        Parameters:
          Name                          LiveDigestibility  DeadDigestibility  LiveFractionConsumable  DeadFractionConsumable  LiveMinimumBiomass  DeadMinimumBiomass
          SurfaceOrganicMatter.Residue  0.7                0.3                1                       1                       100                 0
          AGPRyegrass.Leaf              FromModel          FromModel          1                       1                       100                 0
          AGPRyegrass.Stem              FromModel          FromModel          1                       1                       100                 0
          AGPRyegrass.Stolon            FromModel          FromModel          1                       1                       100                 0
          AGPWhiteClover.Leaf           FromModel          FromModel          1                       1                       100                 0
          AGPWhiteClover.Stem           FromModel          FromModel          1                       1                       100                 0
          AGPWhiteClover.Stolon         FromModel          FromModel          1                       1                       100                 0
  Experiment CO2xBaseTemperature
    Factors
      Permutation
        Factor CO2Level: Specification=[CO2Parameters].Script.CO2=350,700
        Factor Tb: Specification=[TemperatureParameters].Script.GrowthTminimum=0,2,5,10,15
    Simulation CO2xTb
      Clock: Start=1980-07-01; End=1985-06-30
      Weather: FileName=%root%/Examples/WeatherFiles/NZ_Lincoln
      SoilArbitrator
      Summary
      Zone Field: Area=1; Slope=0; AspectAngle=0; Altitude=50
        SimpleGrazing: same as AgPastureExample.Field.SimpleGrazing
        Manager CO2Parameters
          Pasture = [AGPRyegrass]
          CO2 = 350
          ReferenceCO2 = 380
          CO2EffectScaleFactor = 700
          CO2EffectOffsetFactor = 600
          CO2EffectExponent = 2
```csharp
// An example to show to change parameters.  
// Parameters presented are used to calculate CO2 and temperature effects on photosynthesis and, therefore, can be used in sensibility analysis. 

using Models.Climate;
using System.Linq;
using System;
using System.Collections.Generic;
using System.Xml.Serialization;
using Models.Core;
using Models.PMF;
using Models.Soils;
using APSIM.Shared.Utilities;
using Models.Interfaces;

namespace Models
{
    [Serializable]
    public class Script : Model
    {
        // - Links to APSIM models
        [Link] Zone myZone;
        [Link] Clock Clock;
        [Link] Weather Weather;
        [Link] ISummary summary = null;

        [Separator("Species subjected to this manager")]
        [Description("Species")]
        [Display(Type=DisplayType.Model, ModelType = typeof(AgPasture.PastureSpecies))]
        public IModel Pasture {get; set;}

        [Separator("Parameters for the effect of CO2 on photosynthesis and N demand under high CO2")]
        [Description("Atmospheric CO2")]
        public double CO2 { get; set; }
        [Description("Reference CO2 concentration for photosynthesis(ppm)")]
        public double ReferenceCO2 { get; set; }
        [Description("Scaling parameter for the CO2 effect on photosynthesis")]
        public double CO2EffectScaleFactor { get; set ; }
        [Description("Scaling parameter for CO2 effects on N requirements (ppm)")]
        public double CO2EffectOffsetFactor { get; set; }
        [Description("Exponent controlling CO2 effect on N requirements")]
        public double CO2EffectExponent { get; set; }
       
        


        [EventSubscribe("StartOfSimulation")]
        private void OnSimulationCommencing(object sender, EventArgs e)
        {
           (Weather).CO2 = CO2;
           (Pasture as AgPasture.PastureSpecies).ReferenceCO2 = ReferenceCO2;
           (Pasture as AgPasture.PastureSpecies).CO2EffectScaleFactor = CO2EffectScaleFactor;
           (Pasture as AgPasture.PastureSpecies).CO2EffectOffsetFactor = CO2EffectOffsetFactor;
           (Pasture as AgPasture.PastureSpecies).CO2EffectExponent = CO2EffectExponent;

        }
        
           }
}
```
        Manager TemperatureParameters
          Pasture = [AGPRyegrass]
          GrowthTminimum = 1
          GrowthToptimum = 20
          HeatOnsetTemperature = 28
          HeatFullTemperature = 35
          ColdOnsetTemperature = 1
          ColdFullTemperature = -5
```csharp
// An example to show to change parameters.  
// Parameters presented are used to calculate CO2 and temperature effects on photosynthesis and, therefore, can be used in sensibility analysis. 

using Models.Interfaces;
using APSIM.Shared.Utilities;
using Models.Soils;
using Models.PMF;
using Models.Core;
using System.Xml.Serialization;
using System.Collections.Generic;
using System;
using System.Linq;

namespace Models
{
    [Serializable]
    public class Script : Model
    {
        // - Links to APSIM models
        [Link] Zone myZone;
        [Link] Clock Clock;
        [Link] ISummary summary = null;

        [Separator("Species subjected to this manager")]
        [Description("Species")]
        [Display(Type=DisplayType.Model, ModelType = typeof(AgPasture.PastureSpecies))]
        public IModel Pasture {get; set;}


       
        [Separator("Temperature parameters for photosynthesis")]
        [Description("Minimum temperature for growth (oC)")]
        public double GrowthTminimum { get; set; }
        [Description("Optimum temperature for growth")]
        public double GrowthToptimum { get; set; }
        [Description("Onset temperature for heat damage on photosynthesis")]
        public double HeatOnsetTemperature { get; set; }
        [Description("Temperature for full heat damage effect on photosynthesis")]
        public double HeatFullTemperature { get; set; }
        [Description("Onset temperature for cold damage on photosynthesis")]
        public double ColdOnsetTemperature { get; set; }
        [Description("Temperature for full cold damage on photosynthesis")]
        public double ColdFullTemperature { get; set; }


        [EventSubscribe("StartOfSimulation")]
        private void OnSimulationCommencing(object sender, EventArgs e)
        {
           
           (Pasture as AgPasture.PastureSpecies).GrowthTminimum = GrowthTminimum;
           (Pasture as AgPasture.PastureSpecies).GrowthToptimum = GrowthToptimum;
           (Pasture as AgPasture.PastureSpecies).HeatOnsetTemperature = HeatOnsetTemperature;
           (Pasture as AgPasture.PastureSpecies).HeatFullTemperature = HeatFullTemperature;
           (Pasture as AgPasture.PastureSpecies).ColdOnsetTemperature = ColdOnsetTemperature;
           (Pasture as AgPasture.PastureSpecies).ColdFullTemperature = ColdFullTemperature;
        }
        
           }
}
```
        MicroClimate: a_interception=0; b_interception=1; c_interception=0; d_interception=0; SoilHeatFluxFraction=0.4; MinimumHeightDiffForNewLayer=0; NightInterceptionFraction=0.5; ReferenceHeight=2
        Irrigation
        Fertiliser
        SurfaceOrganicMatter: InitialResidueName=Sward; InitialResidueType=grass; InitialResidueMass=1000; InitialStandingFraction=0; InitialCPR=0; InitialCNR=15
        Soil: same as AgPastureExample.Field.Soil
        PastureSpecies AGPRyegrass: same as AgPastureExample.Field.AGPRyegrass
        PastureSpecies AGPWhiteClover: same as AgPastureExample.Field.AGPWhiteClover
        Report: EventNames=[Clock].EndOfDay
          VariableNames:
            [Clock].Today as Date
            // These examples are set up for Ryegrass and WhiteClover so add in any other species as needed for your simulation
            // The format of AggregationType (variable) from [Report].DayAfterLastOutput to [Clock].Today is used so that when the reporting frequency is changed the outputs are still sensible
            // If the name of the Report component ("Report") here is changed in the simulation tree then all the references to that name in the outputs below also need to be changed
            // If all you want is an annual pattern of harvested pasture based on the production year (July to June)  ....
            Sum of ([AGPRyegrass].HarvestedWt + [AGPWhiteClover].HarvestedWt) from 1-Jul to [Clock].Today as HarvestedWt   //the amount harvested (kg DM /ha)
            Sum of [AGPRyegrass].HarvestedWt from 1-Jul to [Clock].Today as RGHarvestedWt
            Sum of [AGPWhiteClover].HarvestedWt from 1-Jul to [Clock].Today as WCHarvestedWt
            [Weather].CO2 as CO2
      Forages: same as PastureByWaterAndNitrogen.Base.Forages
  Experiment CO2xHeatOnset
    Factors
      Permutation
        Factor HeatOnset: Specification=[AGPRyegrass].HeatOnsetTemperature=15 to 35 step 10
        Factor CO2: Specification=[Weather].CO2=350,700
    Simulation CO2xHeat
      Clock: Start=1980-07-01; End=1985-06-30
      Weather: FileName=%root%/Examples/WeatherFiles/NZ_Lincoln
      SoilArbitrator
      Summary
      Zone Field: Area=1; Slope=0; AspectAngle=0; Altitude=50
        SimpleGrazing: same as AgPastureExample.Field.SimpleGrazing
        Manager Fertilise on fixed dates (advanced version)
          EachYear = True
          Dates = 1-aug,1-sep,1-oct,1-nov,1-dec,1-jan,1-feb,1-mar,1-apr,1-may
          UseCritNThreshold = False
          CritNThreshold = 50
          CritNDepth = 75
          Depth = 50
          Amount = 50
          FertiliserType = UreaN
          script: same as in AgPastureExample.Field.FertiliseFixedDates
        MicroClimate: a_interception=0; b_interception=1; c_interception=0; d_interception=0; SoilHeatFluxFraction=0.4; MinimumHeightDiffForNewLayer=0; NightInterceptionFraction=0.5; ReferenceHeight=2
        Irrigation
        Fertiliser
        SurfaceOrganicMatter: InitialResidueName=Sward; InitialResidueType=grass; InitialResidueMass=1000; InitialStandingFraction=0; InitialCPR=0; InitialCNR=15
        Soil: same as AgPastureExample.Field.Soil
        PastureSpecies AGPRyegrass: same as AgPastureExample.Field.AGPRyegrass
        Report: EventNames=[Clock].EndOfDay
          VariableNames:
            [Clock].Today as Date
            // These examples are set up for Ryegrass and WhiteClover so add in any other species as needed for your simulation
            // The format of AggregationType (variable) from [Report].DayAfterLastOutput to [Clock].Today is used so that when the reporting frequency is changed the outputs are still sensible
            // If the name of the Report component ("Report") here is changed in the simulation tree then all the references to that name in the outputs below also need to be changed
            // If all you want is an annual pattern of harvested pasture based on the production year (July to June)  ....
            sum of [AGPRyegrass].HarvestedWt from 1-Jul to [Clock].Today as HarvestedWt   //the amount harvested (kg DM /ha)
            sum of [AGPRyegrass].HarvestedWt from 1-Jul to [Clock].Today as RGHarvestedWt
      Forages
        Parameters:
          Name                          LiveDigestibility  DeadDigestibility  LiveFractionConsumable  DeadFractionConsumable  LiveMinimumBiomass  DeadMinimumBiomass
          SurfaceOrganicMatter.Residue  0.7                0.3                1                       1                       100                 0
          AGPRyegrass.Leaf              FromModel          FromModel          1                       1                       100                 0
          AGPRyegrass.Stem              FromModel          FromModel          1                       1                       100                 0
          AGPRyegrass.Stolon            FromModel          FromModel          1                       1                       100                 0
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