Simulations: Version=162
  DataStore
  Simulation Tree Belt Example
    Clock: Start=1998-01-01; End=1998-12-31
    Summary SummaryFile
    Weather: FileName=%root%\Examples\WeatherFiles\Dalby.met
    SoilArbitrator Soil Arbitrator
    AgroforestrySystem WindbreakSystem: RainfallInterceptionFraction=0; RainShaddowWidth=0; Slope=0; AspectAngle=0; Altitude=50
      Manager SowingRule
        SowDate = 1/6/1998
        CultivarName = Hartog
        SowingDepth = 30
        RowSpacing = 250
        Population = 120
        Amount = 100
        CropName = wheat
```csharp
using Models.PMF.Phen;
using APSIM.Shared.Utilities;
using Models.Zones;
using Models.Utilities;
using Models.Soils;
using Models.PMF;
using Models.Agroforestry;
using Models.Core;
using System.Collections.Generic;
using System.Linq;
using System;

namespace Models
{
    [Serializable]
    public class Script : Model
    {
        [Link] private Clock Clock;
        [Link] private Summary Summary;
        private Plant Wheat;
        private Soil Soil;
        [Link(Type = LinkType.Path, Path = "[Wheat].Phenology")]
        private Phenology phenology;
        
        [Description("Sowing date (d-mmm-yyyy)")]
        public string SowDate { get; set; }
        [Description("Cultivar to be sown")]
        public string CultivarName { get; set; }
        [Description("Sowing depth (mm)")]
        public double SowingDepth { get; set; }
        [Description("Row spacing (mm)")]
        public double RowSpacing { get; set; }
        [Description("Plant population (/m2)")]
        public double Population { get; set; }
        [Description("Amount of fertiliser to be applied (kg/ha)")]
        public double Amount { get; set; }
        [Description("Crop to be fertilised")]
        public string CropName { get; set; }
        
        private List<IModel> Zones;
        
        [EventSubscribe("StartOfSimulation")]
        private void OnSimulationCommencing(object sender, EventArgs e)
        {
            Zones = this.FindAllInScope<RectangularZone>().OfType<IModel>().ToList();
        }
        
        [EventSubscribe("DoManagement")]
        private void OnDoManagement(object sender, EventArgs e)
        {        
            
                foreach (Zone z in Zones)
                {
                    Wheat = z.FindInScope<Plant>() as Plant;    
                    Soil = z.FindInScope<Soil>() as Soil;
                            
                    if (DateUtilities.DMYtoDate(SowDate) == Clock.Today && Wheat != null && !Wheat.IsAlive)
                    {
                        Wheat.Sow(population: Population, cultivar: CultivarName, depth: SowingDepth, rowSpacing: RowSpacing);
                        Fertiliser Fertiliser = Wheat.Parent.FindInScope<Fertiliser>() as Fertiliser;
                        Fertiliser.Apply(Amount: Amount, Type: Fertiliser.Types.NO3N);
                    }
                    //else
                    //    throw new ApsimXException(null, "Cannot sow wheat on that date");
                    if (Wheat != null && Wheat.DaysAfterSowing == 30 && phenology.Stage < 2)
                    {
                    Wheat.EndCrop();
                    }

                    if (Wheat != null && Wheat.IsReadyForHarvesting)
                    {
                        Wheat.Harvest();
                        Wheat.EndCrop();    
                    }
                }
        }
    }
}
```
      TreeProxy: RootRadius=0.02; NumberOfTrees=0; Kd=1e-07; BaseKL=0.05; KValue=0.5; Heights=[10000, 10000, 10000, 10000, 10000]; NDemands=[0.1, 0.1, 0.1, 0.1, 0.1]; ShadeModifiers=[1, 1, 1, 1, 1]
        Table=[[Parameter, 0, 0.5h, 1h, 1.5h, 2h, 2.5h, 3h, 4h, 5h, 6h], [Shade (%), Root Length Density (cm/cm3), Depth (cm), 0-5, 5-15, 15-30, 30-60, 60-90, 90-120, 120-150], [80, -, -, 1, 1, .6, .3, .2, .1, .1], [0, -, -, .6, .6, .3, .2, .1, .1, .1], [0, -, -, .3, .3, .1, .1, .1, .1, 0], [0, -, -, .2, .2, .1, .1, .05, .05, 0], [0, -, -, .02, .02, .02, .02, .01, 0, 0], [0, -, -, .01, .01, .01, 0, 0, 0, 0], [0, -, -, .01, .01, .01, 0, 0, 0, 0], [0, -, -, 0, 0, 0, 0, 0, 0, 0], [0, -, -, 0, 0, 0, 0, 0, 0, 0], [0, -, -, 0, 0, 0, 0, 0, 0, 0]]
        Dates=[1900-01-01, 1900-03-01, 1900-06-01, 1900-09-01, 1900-12-31]
      Report TreeReport: EventNames=[Clock].DoReport
        VariableNames:
          [Clock].Today as Date
          [TreeProxy].TreeWaterUptake
      RectangularZone TreeRow: Length=100; Width=5; Slope=0; AspectAngle=0; Altitude=50
        LocalMicroClimate
        MicroClimate: a_interception=0; b_interception=0; c_interception=0; d_interception=0; SoilHeatFluxFraction=0.4; MinimumHeightDiffForNewLayer=0; NightInterceptionFraction=0.5; ReferenceHeight=2
        Report
          VariableNames:
            [Clock].Today
            [Soil].Parent.Area as Zone.Area
            Parent.Distance as Distance
            [LocalMicroClimate].Radn
            [TreeProxy].Shade
        Report DailyReport: EventNames=[Clock].DoReport
          VariableNames:
            [Clock].Today as Date
            Parent.Distance as Distance
            [LocalMicroClimate].Wind
            sum([Soil].NO3.kgha) as TotalNO3N
            sum([Soil].NH4.kgha) as TotalNH4N
            sum([TreeProxy].WaterUptake) as WaterUptake
            sum([Soil].Water.MM[1:4]) as SW90cm
            [TreeProxy].H
            [TreeProxy].SWDemand
            [TreeProxy].heightToday
            [Soil].SoilWater.Eo
            [TreeProxy].WaterStress
            [Soil].Water.Volumetric[1] as SurfaceSW
            [Soil].SoilWater.Es as Es
            sum([Soil].SoilWater.ESW) as ESW
            [Soil].SoilWater.Eo as Eo
            [Soil].SoilWater.t
        Fertiliser
        SurfaceOrganicMatter: InitialResidueName=wheat_stubble; InitialResidueType=wheat; InitialResidueMass=500; InitialStandingFraction=0; InitialCPR=0; InitialCNR=100
        Soil: ASCOrder=Vertosol; ASCSubOrder=Grey; SoilType=Clay; Site=Warra; NearestTown=Warra, Q, 4411; Region=Darling Downs and Granite Belt; State=Queensland; Country=Australia; NaturalVegetation=Brigalow scrub; ApsoilNumber=19; Latitude=-26.897; Longitude=150.909; LocationAccuracy=+/- 20m; DataSource=0; Comments=CSIRO Sustainable Ecosystems, Toowoomba
          Physical
            Thickness  BD    AirDry  LL15  DUL   SAT   KS
            150        1.39  0.1     0.18  0.4   0.45  20
            150        1.35  0.17    0.19  0.41  0.46  20
            300        1.35  0.17    0.19  0.41  0.46  20
            300        1.43  0.17    0.2   0.38  0.43  20
            300        1.44  0.17    0.23  0.38  0.43  20
            300        1.45  0.17    0.25  0.37  0.42  20
          WaterBalance SoilWater: SummerDate=1-Nov; SummerU=6; SummerCona=3.5; WinterDate=1-Apr; WinterU=6; WinterCona=3.5; DiffusConst=20; DiffusSlope=8; Salb=0.12; CN2Bare=73; CNRed=20; CNCov=0.8; PSIDul=-100; Thickness=[150, 150, 300, 300, 300, 300]; SWCON=[0.3, 0.3, 0.3, 0.3, 0.3, 0.3]
          Organic: FOMCNRatio=40; CarbonUnits=Total
            Thickness  Carbon  SoilCNRatio  FBiom  FInert  FOM
            150        0.915   12           0.04   0.4     390.598
            150        0.777   12           0.02   0.6     289.362
            300        0.346   12           0.02   0.8     158.805
            300        0.231   12           0.02   1       87.1541
            300        0.154   12           0.01   1       47.8312
            300        0.123   12           0.01   1       26.2503
          Chemical: Thickness=[150, 150, 300, 300, 300, 300]; PH=[8, 8, 8, 8, 8, 8]; PHUnits=Water
          Fertiliser
          Water: Thickness=[50, 100, 150, 300, 300, 300, 300]; InitialValues=[0.2, 0.3, 0.29, 0.28, 0.26, 0.26, 0.29]; InitialPAWmm=94; RelativeTo=LL15; FilledFromTop=false
          CERESSoilTemperature Temperature
          Nutrient
          Solute NO3: Thickness=[150, 150, 300, 300, 300, 300]; InitialValues=[1, 1, 1, 1, 1, 1]; InitialValuesUnits=ppm; WaterTableConcentration=0; D0=0; DepthConstant=0; MaxDepthSoluteAccessible=0; RunoffEffectivenessAtMovingSolute=0; MaxEffectiveRunoff=0
          Solute NH4: Thickness=[150, 150, 300, 300, 300, 300]; InitialValues=[0.1, 0.1, 0.1, 0.1, 0.1, 0.1]; InitialValuesUnits=ppm; WaterTableConcentration=0; D0=0; DepthConstant=0; MaxDepthSoluteAccessible=0; RunoffEffectivenessAtMovingSolute=0; MaxEffectiveRunoff=0
          Solute Urea: Thickness=[150, 150, 300, 300, 300, 300]; InitialValues=[0, 0, 0, 0, 0, 0]; InitialValuesUnits=kg/ha; WaterTableConcentration=0; D0=0; DepthConstant=0; MaxDepthSoluteAccessible=0; RunoffEffectivenessAtMovingSolute=0; MaxEffectiveRunoff=0
      RectangularZone 5m: Length=100; Width=5; Slope=0; AspectAngle=0; Altitude=50
        LocalMicroClimate
        MicroClimate: a_interception=0; b_interception=0; c_interception=0; d_interception=0; SoilHeatFluxFraction=0.4; MinimumHeightDiffForNewLayer=0; NightInterceptionFraction=0.5; ReferenceHeight=2
        Report HarvestReport: EventNames=[Wheat].Harvesting
          VariableNames:
            [Clock].Today
            [Soil].Parent.Area as Zone.Area
            Parent.Distance as Distance
            [Wheat].AboveGround.Wt as BiomassWt
            [Wheat].Grain.Wt as GrainWt
            [Wheat].Grain.Size as GrainSize
            [Wheat].Grain.Number as GrainNumber
        Report DailyReport: EventNames=[Clock].DoReport
          VariableNames:
            [Clock].Today as Date
            Parent.Distance as Distance
            [LocalMicroClimate].Wind
            sum([Soil].NO3.kgha) as TotalNO3N
            sum([Soil].NH4.kgha) as TotalNH4N
            sum([TreeProxy].WaterUptake) as WaterUptake
            sum([Soil].Water.MM[1:4]) as SW90cm
            [TreeProxy].H
            [TreeProxy].SWDemand
            [TreeProxy].heightToday
            [Soil].SoilWater.Eo
            [TreeProxy].WaterStress
            [Soil].Water.Volumetric[1] as SurfaceSW
            [Wheat].AboveGround.Wt as BiomassWt
            [Wheat].Grain.Wt as GrainWt
            [Soil].SoilWater.Es as Es
            sum([Soil].SoilWater.ESW) as ESW
            [Soil].SoilWater.Eo as Eo
            [Soil].SoilWater.t
            [Wheat].Phenology.Stage
            [Wheat].DaysAfterSowing
        Fertiliser
        SurfaceOrganicMatter: InitialResidueName=wheat_stubble; InitialResidueType=wheat; InitialResidueMass=500; InitialStandingFraction=0; InitialCPR=0; InitialCNR=100
        Soil: ASCOrder=Vertosol; ASCSubOrder=Grey; SoilType=Clay; Site=Warra; NearestTown=Warra, Q, 4411; Region=Darling Downs and Granite Belt; State=Queensland; Country=Australia; NaturalVegetation=Brigalow scrub; ApsoilNumber=19; Latitude=-26.897; Longitude=150.909; LocationAccuracy=+/- 20m; DataSource=0; Comments=CSIRO Sustainable Ecosystems, Toowoomba
          Physical
            Thickness  BD    AirDry  LL15  DUL   SAT   KS
            150        1.39  0.1     0.18  0.4   0.45  20
            150        1.35  0.17    0.19  0.41  0.46  20
            300        1.35  0.17    0.19  0.41  0.46  20
            300        1.43  0.17    0.2   0.38  0.43  20
            300        1.44  0.17    0.23  0.38  0.43  20
            300        1.45  0.17    0.25  0.37  0.42  20
            SoilCrop WheatSoil: LL=[0.18, 0.19, 0.19, 0.2, 0.23, 0.25]; KL=[0.06, 0.06, 0.06, 0.06, 0.06, 0.06]; XF=[1, 1, 1, 1, 1, 1]
          WaterBalance SoilWater: same as Tree Belt Example.WindbreakSystem.TreeRow.Soil.SoilWater
          Organic: same as Tree Belt Example.WindbreakSystem.TreeRow.Soil.Organic
          Chemical: Thickness=[150, 150, 300, 300, 300, 300]; PH=[8, 8, 8, 8, 8, 8]; PHUnits=Water
          Water: Thickness=[50, 100, 150, 300, 300, 300, 300]; InitialValues=[0.2, 0.25, 0.3, 0.3, 0.31, 0.3, 0.3]; InitialPAWmm=126.5; RelativeTo=LL15; FilledFromTop=false
          CERESSoilTemperature Temperature
          Nutrient
          Solute NO3: same as Tree Belt Example.WindbreakSystem.TreeRow.Soil.NO3
          Solute NH4: same as Tree Belt Example.WindbreakSystem.TreeRow.Soil.NH4
          Solute Urea: same as Tree Belt Example.WindbreakSystem.TreeRow.Soil.Urea
        Plant Wheat
      RectangularZone 10m: Length=100; Width=5; Slope=0; AspectAngle=0; Altitude=50
        LocalMicroClimate
        MicroClimate: a_interception=0; b_interception=0; c_interception=0; d_interception=0; SoilHeatFluxFraction=0.4; MinimumHeightDiffForNewLayer=0; NightInterceptionFraction=0.5; ReferenceHeight=2
        Report HarvestReport: EventNames=[Wheat].Harvesting
          VariableNames:
            [Clock].Today
            [Soil].Parent.Area as Zone.Area
            Parent.Distance as Distance
            [Wheat].AboveGround.Wt as BiomassWt
            [Wheat].Grain.Wt as GrainWt
            [Wheat].Grain.Size as GrainSize
            [Wheat].Grain.Number as GrainNumber
        Report DailyReport: EventNames=[Clock].DoReport
          VariableNames:
            [Clock].Today as Date
            Parent.Distance as Distance
            [LocalMicroClimate].Wind
            sum([Soil].NO3.kgha) as TotalNO3N
            sum([Soil].NH4.kgha) as TotalNH4N
            sum([TreeProxy].WaterUptake) as WaterUptake
            sum([Soil].Water.MM[1:4]) as SW90cm
            [TreeProxy].H
            [TreeProxy].SWDemand
            [TreeProxy].heightToday
            [Soil].SoilWater.Eo
            [TreeProxy].WaterStress
            [Soil].Water.Volumetric[1] as SurfaceSW
            [Wheat].AboveGround.Wt as BiomassWt
            [Wheat].Grain.Wt as GrainWt
            [Soil].SoilWater.Es as Es
            sum([Soil].SoilWater.ESW) as ESW
            [Soil].SoilWater.Eo as Eo
            [Soil].SoilWater.t
        Fertiliser
        SurfaceOrganicMatter: InitialResidueName=wheat_stubble; InitialResidueType=wheat; InitialResidueMass=500; InitialStandingFraction=0; InitialCPR=0; InitialCNR=100
        Soil: ASCOrder=Vertosol; ASCSubOrder=Grey; SoilType=Clay; Site=Warra; NearestTown=Warra, Q, 4411; Region=Darling Downs and Granite Belt; State=Queensland; Country=Australia; NaturalVegetation=Brigalow scrub; ApsoilNumber=19; Latitude=-26.897; Longitude=150.909; LocationAccuracy=+/- 20m; DataSource=0; Comments=CSIRO Sustainable Ecosystems, Toowoomba
          Physical: same as Tree Belt Example.WindbreakSystem.5m.Soil.Physical
          WaterBalance SoilWater: same as Tree Belt Example.WindbreakSystem.TreeRow.Soil.SoilWater
          Organic: same as Tree Belt Example.WindbreakSystem.TreeRow.Soil.Organic
          Chemical: Thickness=[150, 150, 300, 300, 300, 300]; PH=[8, 8, 8, 8, 8, 8]; PHUnits=Water
          Water: Thickness=[50, 100, 150, 300, 300, 300, 300]; InitialValues=[0.2, 0.3, 0.35, 0.33, 0.3, 0.26, 0.29]; InitialPAWmm=130; RelativeTo=LL15; FilledFromTop=false
          CERESSoilTemperature Temperature
          Nutrient
          Solute NO3: same as Tree Belt Example.WindbreakSystem.TreeRow.Soil.NO3
          Solute NH4: same as Tree Belt Example.WindbreakSystem.TreeRow.Soil.NH4
          Solute Urea: same as Tree Belt Example.WindbreakSystem.TreeRow.Soil.Urea
        Plant Wheat
      RectangularZone 15m: Length=100; Width=5; Slope=0; AspectAngle=0; Altitude=50
        LocalMicroClimate
        MicroClimate: a_interception=0; b_interception=0; c_interception=0; d_interception=0; SoilHeatFluxFraction=0.4; MinimumHeightDiffForNewLayer=0; NightInterceptionFraction=0.5; ReferenceHeight=2
        Report HarvestReport: EventNames=[Wheat].Harvesting
          VariableNames:
            [Clock].Today
            [Soil].Parent.Area as Zone.Area
            Parent.Distance as Distance
            [Wheat].AboveGround.Wt as BiomassWt
            [Wheat].Grain.Wt as GrainWt
            [Wheat].Grain.Size as GrainSize
            [Wheat].Grain.Number as GrainNumber
        Report DailyReport: same as Tree Belt Example.WindbreakSystem.10m.DailyReport
        Fertiliser
        SurfaceOrganicMatter: InitialResidueName=wheat_stubble; InitialResidueType=wheat; InitialResidueMass=500; InitialStandingFraction=0; InitialCPR=0; InitialCNR=100
        Soil: ASCOrder=Vertosol; ASCSubOrder=Grey; SoilType=Clay; Site=Warra; NearestTown=Warra, Q, 4411; Region=Darling Downs and Granite Belt; State=Queensland; Country=Australia; NaturalVegetation=Brigalow scrub; ApsoilNumber=19; Latitude=-26.897; Longitude=150.909; LocationAccuracy=+/- 20m; DataSource=0; Comments=CSIRO Sustainable Ecosystems, Toowoomba
          Physical: same as Tree Belt Example.WindbreakSystem.5m.Soil.Physical
          WaterBalance SoilWater: same as Tree Belt Example.WindbreakSystem.TreeRow.Soil.SoilWater
          Organic: same as Tree Belt Example.WindbreakSystem.TreeRow.Soil.Organic
          Chemical: Thickness=[150, 150, 300, 300, 300, 300]; PH=[8, 8, 8, 8, 8, 8]; PHUnits=Water
          Water: Thickness=[50, 100, 150, 300, 300, 300, 300]; InitialValues=[0.2, 0.32, 0.34, 0.35, 0.38, 0.34, 0.32]; InitialPAWmm=193.5; RelativeTo=LL15; FilledFromTop=false
          CERESSoilTemperature Temperature
          Nutrient
          Solute NO3: same as Tree Belt Example.WindbreakSystem.TreeRow.Soil.NO3
          Solute NH4: same as Tree Belt Example.WindbreakSystem.TreeRow.Soil.NH4
          Solute Urea: same as Tree Belt Example.WindbreakSystem.TreeRow.Soil.Urea
        Plant Wheat
      RectangularZone 20m: Length=100; Width=10; Slope=0; AspectAngle=0; Altitude=50
        LocalMicroClimate
        MicroClimate: a_interception=0; b_interception=0; c_interception=0; d_interception=0; SoilHeatFluxFraction=0.4; MinimumHeightDiffForNewLayer=0; NightInterceptionFraction=0.5; ReferenceHeight=2
        Report HarvestReport: EventNames=[Wheat].Harvesting
          VariableNames:
            [Clock].Today
            [Soil].Parent.Area as Zone.Area
            Parent.Distance as Distance
            [Wheat].AboveGround.Wt as BiomassWt
            [Wheat].Grain.Wt as GrainWt
            [Wheat].Grain.Size as GrainSize
            [Wheat].Grain.Number as GrainNumber
        Report DailyReport: same as Tree Belt Example.WindbreakSystem.10m.DailyReport
        Fertiliser
        SurfaceOrganicMatter: InitialResidueName=wheat_stubble; InitialResidueType=wheat; InitialResidueMass=500; InitialStandingFraction=0; InitialCPR=0; InitialCNR=100
        Soil: ASCOrder=Vertosol; ASCSubOrder=Grey; SoilType=Clay; Site=Warra; NearestTown=Warra, Q, 4411; Region=Darling Downs and Granite Belt; State=Queensland; Country=Australia; NaturalVegetation=Brigalow scrub; ApsoilNumber=19; Latitude=-26.897; Longitude=150.909; LocationAccuracy=+/- 20m; DataSource=0; Comments=CSIRO Sustainable Ecosystems, Toowoomba
          Physical: same as Tree Belt Example.WindbreakSystem.5m.Soil.Physical
          WaterBalance SoilWater: same as Tree Belt Example.WindbreakSystem.TreeRow.Soil.SoilWater
          Organic: same as Tree Belt Example.WindbreakSystem.TreeRow.Soil.Organic
          Chemical: Thickness=[150, 150, 300, 300, 300, 300]; PH=[8, 8, 8, 8, 8, 8]; PHUnits=Water
          Water: Thickness=[50, 100, 150, 300, 300, 300, 300]; InitialValues=[0.32, 0.32, 0.39, 0.39, 0.38, 0.36, 0.35]; InitialPAWmm=234; RelativeTo=LL15; FilledFromTop=false
          CERESSoilTemperature Temperature
          Nutrient
          Solute NO3: same as Tree Belt Example.WindbreakSystem.TreeRow.Soil.NO3
          Solute NH4: same as Tree Belt Example.WindbreakSystem.TreeRow.Soil.NH4
          Solute Urea: same as Tree Belt Example.WindbreakSystem.TreeRow.Soil.Urea
        Plant Wheat
      RectangularZone 30m: Length=100; Width=5; Slope=0; AspectAngle=0; Altitude=50
        LocalMicroClimate
        MicroClimate: a_interception=0; b_interception=0; c_interception=0; d_interception=0; SoilHeatFluxFraction=0.4; MinimumHeightDiffForNewLayer=0; NightInterceptionFraction=0.5; ReferenceHeight=2
        Report HarvestReport: EventNames=[Wheat].Harvesting
          VariableNames:
            [Clock].Today
            [Soil].Parent.Area as Zone.Area
            Parent.Distance as Distance
            [Wheat].AboveGround.Wt as BiomassWt
            [Wheat].Grain.Wt as GrainWt
            [Wheat].Grain.Size as GrainSize
            [Wheat].Grain.Number as GrainNumber
        Report DailyReport: same as Tree Belt Example.WindbreakSystem.10m.DailyReport
        Fertiliser
        SurfaceOrganicMatter: InitialResidueName=wheat_stubble; InitialResidueType=wheat; InitialResidueMass=500; InitialStandingFraction=0; InitialCPR=0; InitialCNR=100
        Soil: ASCOrder=Vertosol; ASCSubOrder=Grey; SoilType=Clay; Site=Warra; NearestTown=Warra, Q, 4411; Region=Darling Downs and Granite Belt; State=Queensland; Country=Australia; NaturalVegetation=Brigalow scrub; ApsoilNumber=19; Latitude=-26.897; Longitude=150.909; LocationAccuracy=+/- 20m; DataSource=0; Comments=CSIRO Sustainable Ecosystems, Toowoomba
          Physical
            Thickness  BD    AirDry  LL15  DUL   SAT
            150        1.39  0.1     0.18  0.4   0.45
            150        1.35  0.17    0.19  0.41  0.46
            300        1.35  0.17    0.19  0.41  0.46
            300        1.43  0.17    0.2   0.38  0.43
            300        1.44  0.17    0.23  0.38  0.43
            300        1.45  0.17    0.25  0.37  0.42
            SoilCrop WheatSoil: LL=[0.18, 0.19, 0.19, 0.2, 0.23, 0.25]; KL=[0.06, 0.06, 0.06, 0.06, 0.06, 0.06]; XF=[1, 1, 1, 1, 1, 1]
          WaterBalance SoilWater: same as Tree Belt Example.WindbreakSystem.TreeRow.Soil.SoilWater
          Organic: same as Tree Belt Example.WindbreakSystem.TreeRow.Soil.Organic
          Chemical: Thickness=[150, 150, 300, 300, 300, 300]; PH=[8, 8, 8, 8, 8, 8]; PHUnits=Water
          Water: Thickness=[50, 100, 150, 300, 300, 300, 300]; InitialValues=[0.32, 0.32, 0.38, 0.38, 0.38, 0.36, 0.35]; InitialPAWmm=229.5; RelativeTo=LL15; FilledFromTop=false
          CERESSoilTemperature Temperature
          Nutrient
          Solute NO3: same as Tree Belt Example.WindbreakSystem.TreeRow.Soil.NO3
          Solute NH4: same as Tree Belt Example.WindbreakSystem.TreeRow.Soil.NH4
          Solute Urea: same as Tree Belt Example.WindbreakSystem.TreeRow.Soil.Urea
        Plant Wheat
      RectangularZone 40m: Length=100; Width=10; Slope=0; AspectAngle=0; Altitude=50
        LocalMicroClimate
        MicroClimate: a_interception=0; b_interception=0; c_interception=0; d_interception=0; SoilHeatFluxFraction=0.4; MinimumHeightDiffForNewLayer=0; NightInterceptionFraction=0.5; ReferenceHeight=2
        Report HarvestReport: EventNames=[Wheat].Harvesting
          VariableNames:
            [Clock].Today
            [Soil].Parent.Area as Zone.Area
            Parent.Distance as Distance
            [Wheat].AboveGround.Wt as BiomassWt
            [Wheat].Grain.Wt as GrainWt
            [Wheat].Grain.Size as GrainSize
            [Wheat].Grain.Number as GrainNumber
        Report DailyReport: same as Tree Belt Example.WindbreakSystem.10m.DailyReport
        Fertiliser
        SurfaceOrganicMatter: InitialResidueName=wheat_stubble; InitialResidueType=wheat; InitialResidueMass=500; InitialStandingFraction=0; InitialCPR=0; InitialCNR=100
        Soil: ASCOrder=Vertosol; ASCSubOrder=Grey; SoilType=Clay; Site=Warra; NearestTown=Warra, Q, 4411; Region=Darling Downs and Granite Belt; State=Queensland; Country=Australia; NaturalVegetation=Brigalow scrub; ApsoilNumber=19; Latitude=-26.897; Longitude=150.909; LocationAccuracy=+/- 20m; DataSource=0; Comments=CSIRO Sustainable Ecosystems, Toowoomba
          Physical: same as Tree Belt Example.WindbreakSystem.5m.Soil.Physical
          WaterBalance SoilWater: same as Tree Belt Example.WindbreakSystem.TreeRow.Soil.SoilWater
          Organic: same as Tree Belt Example.WindbreakSystem.TreeRow.Soil.Organic
          Chemical: Thickness=[150, 150, 300, 300, 300, 300]; PH=[8, 8, 8, 8, 8, 8]; PHUnits=Water
          Water: Thickness=[50, 100, 150, 300, 300, 300, 300]; InitialValues=[0.32, 0.32, 0.34, 0.35, 0.38, 0.34, 0.32]; InitialPAWmm=199.5; RelativeTo=LL15; FilledFromTop=false
          CERESSoilTemperature Temperature
          Nutrient
          Solute NO3: same as Tree Belt Example.WindbreakSystem.TreeRow.Soil.NO3
          Solute NH4: same as Tree Belt Example.WindbreakSystem.TreeRow.Soil.NH4
          Solute Urea: same as Tree Belt Example.WindbreakSystem.TreeRow.Soil.Urea
        Plant Wheat
      RectangularZone 50m: Length=100; Width=10; Slope=0; AspectAngle=0; Altitude=50
        LocalMicroClimate
        MicroClimate: a_interception=0; b_interception=0; c_interception=0; d_interception=0; SoilHeatFluxFraction=0.4; MinimumHeightDiffForNewLayer=0; NightInterceptionFraction=0.5; ReferenceHeight=2
        Report HarvestReport: EventNames=[Wheat].Harvesting
          VariableNames:
            [Clock].Today
            [Soil].Parent.Area as Zone.Area
            Parent.Distance as Distance
            [Wheat].AboveGround.Wt as BiomassWt
            [Wheat].Grain.Wt as GrainWt
            [Wheat].Grain.Size as GrainSize
            [Wheat].Grain.Number as GrainNumber
        Report DailyReport: same as Tree Belt Example.WindbreakSystem.10m.DailyReport
        Fertiliser
        SurfaceOrganicMatter: InitialResidueName=wheat_stubble; InitialResidueType=wheat; InitialResidueMass=500; InitialStandingFraction=0; InitialCPR=0; InitialCNR=100
        Soil: ASCOrder=Vertosol; ASCSubOrder=Grey; SoilType=Clay; Site=Warra; NearestTown=Warra, Q, 4411; Region=Darling Downs and Granite Belt; State=Queensland; Country=Australia; NaturalVegetation=Brigalow scrub; ApsoilNumber=19; Latitude=-26.897; Longitude=150.909; LocationAccuracy=+/- 20m; DataSource=0; Comments=CSIRO Sustainable Ecosystems, Toowoomba
          Physical
            Thickness  BD    AirDry  LL15  DUL   SAT   KS
            150        1.39  0.1     0.18  0.4   0.45  50
            150        1.35  0.17    0.19  0.41  0.46  50
            300        1.35  0.17    0.19  0.41  0.46  50
            300        1.43  0.17    0.2   0.38  0.43  50
            300        1.44  0.17    0.23  0.38  0.43  50
            300        1.45  0.17    0.25  0.37  0.42  50
            SoilCrop WheatSoil: LL=[0.18, 0.19, 0.19, 0.2, 0.23, 0.25]; KL=[0.06, 0.06, 0.06, 0.06, 0.06, 0.06]; XF=[1, 1, 1, 1, 1, 1]
          WaterBalance SoilWater: same as Tree Belt Example.WindbreakSystem.TreeRow.Soil.SoilWater
          Organic: same as Tree Belt Example.WindbreakSystem.TreeRow.Soil.Organic
          Chemical: Thickness=[150, 150, 300, 300, 300, 300]; PH=[8, 8, 8, 8, 8, 8]; PHUnits=Water
          Water: Thickness=[50, 100, 150, 300, 300, 300, 300]; InitialValues=[0.32, 0.32, 0.34, 0.35, 0.38, 0.34, 0.32]; InitialPAWmm=199.5; RelativeTo=LL15; FilledFromTop=false
          CERESSoilTemperature Temperature
          Nutrient
          Solute NO3: same as Tree Belt Example.WindbreakSystem.TreeRow.Soil.NO3
          Solute NH4: same as Tree Belt Example.WindbreakSystem.TreeRow.Soil.NH4
          Solute Urea: same as Tree Belt Example.WindbreakSystem.TreeRow.Soil.Urea
        Plant Wheat
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