Simulations: Version=193
  Folder Replacements
  DataStore
  Simulation UsingFixedDates
    Clock: Start=2004-04-01; End=2005-04-01
    Summary SummaryFile
    Weather: FileName=%root%/Examples/WeatherFiles/KE_MajiMoto.met
    SoilArbitrator Soil Arbitrator
    Zone Field: Area=1; Slope=0; AspectAngle=0; Altitude=50
      Soil Synthetic Soil Derived from ISRIC SoilGrids: ASCOrder=NA; ASCSubOrder=NA; SoilType=Haplic Lixisols; Site=NA; NearestTown=NA; Region=NA; State=NA; Country=Kenya; NaturalVegetation=NA; ApsoilNumber=9999; Latitude=-1.375; Longitude=37.875; LocationAccuracy=+- 250 m; DataSource=ISRIC SoilGrids
        Water: Thickness=[150, 150, 150, 150, 200, 200, 200, 200, 300, 300]; InitialPAWmm=0; RelativeTo=LL15; FilledFromTop=true
          InitialValues=[0.22, 0.23, 0.242, 0.247, 0.25, 0.25, 0.25, 0.25, 0.25, 0.25]
        Physical
          Thickness  ParticleSizeSand  ParticleSizeSilt  ParticleSizeClay  Rocks  BD     AirDry  LL15   DUL    SAT    KS
          150        50.3              14.7              35.5              0      1.341  0.073   0.22   0.314  0.452  5.717
          150        47                13.5              39                0      1.349  0.077   0.23   0.319  0.455  3.809
          150        44.2              13.2              41.8              0      1.345  0.081   0.242  0.332  0.46   2.769
          150        42.8              13.8              43.2              0      1.338  0.082   0.247  0.338  0.46   2.327
          200        42                14                44                0      1.336  0.083   0.25   0.341  0.46   2.133
          200        42                14                44                0      1.338  0.083   0.25   0.341  0.46   2.133
          200        42                14                44                0      1.339  0.083   0.25   0.341  0.46   2.133
          200        42                14                44                0      1.339  0.083   0.25   0.341  0.46   2.133
          300        42                14                44                0      1.339  0.083   0.25   0.341  0.46   2.133
          300        42                14                44                0      1.339  0.083   0.25   0.341  0.46   2.133
          Rocks source: Calculated
          SoilCrop RiceSoil
            LL=[0.22, 0.23, 0.243, 0.255, 0.268, 0.28, 0.292, 0.304, 0.32, 0.337]
            KL=[0.06, 0.06, 0.06, 0.055, 0.048, 0.04, 0.032, 0.024, 0.014, 0.003]
            XF=[1, 1, 1, 1, 1, 1, 1, 1, 1, 1]
          SoilCrop WheatSoil: same as UsingFixedDates.Field.Synthetic Soil Derived from ISRIC SoilGrids.Physical.RiceSoil
          SoilCrop TeffSoil: same as UsingFixedDates.Field.Synthetic Soil Derived from ISRIC SoilGrids.Physical.RiceSoil
          SoilCrop SugarcaneSoil
            LL=[0.22, 0.23, 0.243, 0.252, 0.26, 0.267, 0.274, 0.281, 0.29, 0.301]
            KL=[0.06, 0.06, 0.06, 0.057, 0.053, 0.048, 0.044, 0.039, 0.033, 0.027]
            XF=[1, 1, 1, 1, 1, 1, 1, 1, 1, 1]
          SoilCrop MaizeSoil: same as UsingFixedDates.Field.Synthetic Soil Derived from ISRIC SoilGrids.Physical.RiceSoil
          SoilCrop SoybeanSoil: same as UsingFixedDates.Field.Synthetic Soil Derived from ISRIC SoilGrids.Physical.RiceSoil
          SoilCrop OilPalmSoil: same as UsingFixedDates.Field.Synthetic Soil Derived from ISRIC SoilGrids.Physical.SugarcaneSoil
          SoilCrop CassavaSoil: same as UsingFixedDates.Field.Synthetic Soil Derived from ISRIC SoilGrids.Physical.RiceSoil
          SoilCrop PlantainForageSoil: same as UsingFixedDates.Field.Synthetic Soil Derived from ISRIC SoilGrids.Physical.SugarcaneSoil
          SoilCrop SunflowerSoil
            LL=[0.22, 0.237, 0.257, 0.27, 0.282, 0.293, 0.303, 0.314, 0.327, 0.34]
            KL=[0.1, 0.093, 0.084, 0.075, 0.065, 0.053, 0.041, 0.029, 0.015, 0.001]
            XF=[1, 1, 1, 1, 1, 1, 1, 1, 1, 1]
          SoilCrop CanolaSoil: same as UsingFixedDates.Field.Synthetic Soil Derived from ISRIC SoilGrids.Physical.RiceSoil
          SoilCrop SorghumSoil
            LL=[0.22, 0.23, 0.243, 0.253, 0.264, 0.273, 0.282, 0.291, 0.302, 0.316]
            KL=[0.07, 0.07, 0.07, 0.066, 0.06, 0.053, 0.045, 0.039, 0.03, 0.019]
            XF=[1, 1, 1, 1, 1, 1, 1, 1, 1, 1]
          SoilCrop MilletSoil: same as UsingFixedDates.Field.Synthetic Soil Derived from ISRIC SoilGrids.Physical.SorghumSoil
          SoilCrop PeanutSoil
            LL=[0.22, 0.23, 0.242, 0.247, 0.258, 0.273, 0.288, 0.303, 0.322, 0.339]
            KL=[0.06, 0.06, 0.06, 0.06, 0.055, 0.045, 0.035, 0.025, 0.012, 0.001]
            XF=[1, 1, 1, 1, 1, 1, 1, 1, 1, 1]
          SoilCrop BarleySoil
            LL=[0.22, 0.23, 0.243, 0.254, 0.266, 0.277, 0.287, 0.298, 0.311, 0.327]
            KL=[0.07, 0.07, 0.07, 0.065, 0.058, 0.049, 0.041, 0.033, 0.023, 0.01]
            XF=[1, 1, 1, 1, 1, 1, 1, 1, 1, 1]
          SoilCrop CottonSoil
            LL=[0.22, 0.23, 0.242, 0.247, 0.25, 0.255, 0.265, 0.275, 0.288, 0.303]
            KL=[0.1, 0.1, 0.1, 0.1, 0.1, 0.094, 0.083, 0.072, 0.058, 0.042]
            XF=[1, 1, 1, 1, 1, 1, 1, 1, 1, 1]
          SoilCrop OatsSoil: same as UsingFixedDates.Field.Synthetic Soil Derived from ISRIC SoilGrids.Physical.RiceSoil
          SoilCrop ChickpeaSoil
            LL=[0.22, 0.23, 0.242, 0.247, 0.257, 0.271, 0.285, 0.299, 0.316, 0.336]
            KL=[0.06, 0.06, 0.06, 0.06, 0.055, 0.046, 0.037, 0.028, 0.016, 0.003]
            XF=[1, 1, 1, 1, 1, 1, 1, 1, 1, 1]
          SoilCrop MungbeanSoil
            LL=[0.22, 0.23, 0.242, 0.251, 0.268, 0.286, 0.304, 0.323, 0.339, 0.341]
            KL=[0.06, 0.06, 0.06, 0.058, 0.048, 0.036, 0.024, 0.012, 0.001, 0]
            XF=[1, 1, 1, 1, 1, 1, 1, 1, 1, 0]
          SoilCrop Pigeon PeaSoil: same as UsingFixedDates.Field.Synthetic Soil Derived from ISRIC SoilGrids.Physical.PeanutSoil
          SoilCrop CowpeaSoil: same as UsingFixedDates.Field.Synthetic Soil Derived from ISRIC SoilGrids.Physical.RiceSoil
          SoilCrop FababeanSoil
            LL=[0.22, 0.23, 0.242, 0.247, 0.252, 0.263, 0.276, 0.289, 0.305, 0.325]
            KL=[0.08, 0.08, 0.08, 0.08, 0.079, 0.069, 0.057, 0.046, 0.031, 0.014]
            XF=[1, 1, 1, 1, 1, 1, 1, 1, 1, 1]
          SoilCrop LucerneSoil
            LL=[0.22, 0.23, 0.242, 0.247, 0.25, 0.25, 0.25, 0.251, 0.26, 0.273]
            KL=[0.1, 0.1, 0.1, 0.1, 0.1, 0.1, 0.1, 0.099, 0.089, 0.075]
            XF=[1, 1, 1, 1, 1, 1, 1, 1, 1, 1]
          SoilCrop LupinSoil: same as UsingFixedDates.Field.Synthetic Soil Derived from ISRIC SoilGrids.Physical.RiceSoil
          SoilCrop LentilSoil: same as UsingFixedDates.Field.Synthetic Soil Derived from ISRIC SoilGrids.Physical.RiceSoil
          SoilCrop TriticaleSoil
            LL=[0.22, 0.23, 0.249, 0.266, 0.283, 0.299, 0.316, 0.332, 0.341, 0.341]
            KL=[0.07, 0.07, 0.065, 0.056, 0.045, 0.032, 0.019, 0.006, 0, 0]
            XF=[1, 1, 1, 1, 1, 1, 1, 1, 0, 0]
          SoilCrop EucalyptusSoil
            LL=[0.22, 0.23, 0.243, 0.248, 0.251, 0.252, 0.253, 0.254, 0.255, 0.257]
            KL=[0.08, 0.08, 0.08, 0.079, 0.079, 0.078, 0.077, 0.076, 0.075, 0.074]
            XF=[1, 1, 1, 1, 1, 1, 1, 1, 1, 1]
          SoilCrop GliricidiaSoil
            LL=[0.22, 0.23, 0.243, 0.249, 0.253, 0.255, 0.257, 0.259, 0.261, 0.264]
            KL=[0.08, 0.08, 0.08, 0.079, 0.077, 0.076, 0.074, 0.072, 0.07, 0.068]
            XF=[1, 1, 1, 1, 1, 1, 1, 1, 1, 1]
          SoilCrop PotatoSoil: same as UsingFixedDates.Field.Synthetic Soil Derived from ISRIC SoilGrids.Physical.RiceSoil
        WaterBalance SoilWater: SummerDate=1-nov; SummerU=6; SummerCona=6; WinterDate=1-apr; WinterU=6; WinterCona=6; DiffusConst=25886.95; DiffusSlope=-12.47; Salb=0.12; CN2Bare=73; CNRed=20; CNCov=0; DischargeWidth=5; CatchmentArea=10; PSIDul=-100; Thickness=[150, 150, 150, 150, 200, 200, 200, 200, 300, 300]
          SWCON=[0.194, 0.147, 0.121, 0.109, 0.08, 0.08, 0.08, 0.08, 0.055, 0.055]
        Organic: FOMCNRatio=40; CarbonUnits=Total
          Thickness  Carbon  SoilCNRatio  FBiom  FInert  FOM
          150        1.339   8            0.04   0.423   97.0304
          150        0.96    8            0.031  0.587   77.4803
          150        0.773   8            0.014  0.731   61.8693
          150        0.658   8            0.01   0.864   49.4036
          200        0.552   8            0.01   0.99    36.5991
          200        0.458   8            0.01   0.99    27.1133
          200        0.405   8            0.01   0.99    20.086
          200        0.393   8            0.01   0.99    14.8801
          300        0.378   8            0.01   0.99    9.48797
          300        0.36    8            0.01   0.99    6.04979
        Chemical: PHUnits=Water
          Thickness  PH    CEC
          150        6.2   15.8614
          150        6.2   15.722
          150        6.2   15.8613
          150        6.2   15.8825
          200        6.2   15.804
          200        6.2   15.5925
          200        6.21  15.4733
          200        6.23  15.4463
          300        6.26  15.4125
          300        6.29  15.372
          CEC source: Calculated
        Nutrient
        Solute NO3: Thickness=[150, 150, 150, 150, 200, 200, 200, 200, 300, 300]; InitialValues=[40, 40, 20, 20, 20, 20, 20, 20, 20, 20]; InitialValuesUnits=ppm; WaterTableConcentration=0; D0=0; DepthConstant=0; MaxDepthSoluteAccessible=0; RunoffEffectivenessAtMovingSolute=0; MaxEffectiveRunoff=0
        Solute NH4: Thickness=[150, 150, 150, 150, 200, 200, 200, 200, 300, 300]; InitialValues=[0, 0, 0, 0, 0, 0, 0, 0, 0, 0]; InitialValuesUnits=ppm; WaterTableConcentration=0; D0=0; DepthConstant=0; MaxDepthSoluteAccessible=0; RunoffEffectivenessAtMovingSolute=0; MaxEffectiveRunoff=0
        Solute Urea: Thickness=[150, 150, 150, 150, 200, 200, 200, 200, 300, 300]; InitialValues=[0, 0, 0, 0, 0, 0, 0, 0, 0, 0]; InitialValuesUnits=kg/ha; WaterTableConcentration=0; D0=0; DepthConstant=0; MaxDepthSoluteAccessible=0; RunoffEffectivenessAtMovingSolute=0; MaxEffectiveRunoff=0
        SoilTemperature Temperature
      Fertiliser
      SurfaceOrganicMatter: InitialResidueName=wheat_stubble; InitialResidueType=wheat; InitialResidueMass=500; InitialStandingFraction=0; InitialCPR=0; InitialCNR=100
      MicroClimate: a_interception=0; b_interception=1; c_interception=0; d_interception=0; SoilHeatFluxFraction=0.4; MinimumHeightDiffForNewLayer=0; NightInterceptionFraction=0.5; ReferenceHeight=2
      Plant Maize
      Plant Wheat
      Report: EventNames=[Clock].DoReport
        VariableNames:
          [Clock].Today
          [Wheat].Phenology.Stage
          [Wheat].TotalLive.Wt
          [Wheat].TotalDead.Wt
          [Wheat].Leaf.Live.Wt
          [Wheat].Leaf.Dead.Wt
          [Wheat].Stem.Live.Wt
          [Wheat].Stem.Dead.Wt
          [Maize].Phenology.Stage
          [Maize].TotalLive.Wt
          [Maize].TotalDead.Wt
          [Maize].Leaf.Live.Wt
          [Maize].Leaf.Dead.Wt
          [Maize].Stem.Live.Wt
          [Maize].Stem.Dead.Wt
      Manager Sow wheat
        Crop = [Wheat]
        SowDate = 24-Apr-2004
        CultivarName = Axe
        SowingDepth = 50
        RowSpacing = 150
        Population = 150
```csharp
using APSIM.Shared.Utilities;
using Models.Utilities;
using Models.Soils;
using Models.PMF;
using Models.Core;
using System;
using System.Linq;

namespace Models
{
    [Serializable]
    public class Script : Model
    {
        [Link] Clock Clock;
        [Link] Fertiliser Fertiliser;
        [Link] Summary Summary;
        [Link] Soil Soil;
        
        [Description("Crop")]
        public IPlant Crop { get; set; }

        [Description("Sowing date (d-mmm-yyy)")]
        public string SowDate { get; set; }

        [Display(Type = DisplayType.CultivarName)]
        [Description("Cultivar to be sown")]
        public string CultivarName { get; set; }

        [Description("Sowing depth (mm)")]
        public double SowingDepth { get; set; }

        [Description("Row spacing (mm)")]
        public double RowSpacing { get; set; }

        [Description("Plant population (/m2)")]
        public double Population { get; set; }

        [EventSubscribe("DoManagement")]
        private void OnDoManagement(object sender, EventArgs e)
        {
            if (DateUtilities.DatesAreEqual(SowDate, Clock.Today))
            {
                Crop.Sow(population: Population, cultivar: CultivarName, depth: SowingDepth, rowSpacing: RowSpacing);    
            }
        }
    }
}
```
      Manager Harvesting wheat
        Crop = [Wheat]
```csharp
using APSIM.Shared.Utilities;
using Models.Utilities;
using Models.Soils;
using Models.PMF;
using Models.Core;
using System;
using System.Linq;

namespace Models
{
    [Serializable] 
    public class Script : Model
    {
        [Description("Crop")]
        public IPlant Crop { get; set; }
        
        [EventSubscribe("DoManagement")]
        private void OnDoManagement(object sender, EventArgs e)
        {
            if (Crop.IsReadyForHarvesting)
            {
                Crop.Harvest();
                Crop.EndCrop();
            }
        }
    }
}
```
      Manager Sow maize
        Crop = [Maize]
        SowDate = 1-Oct-2004
        CultivarName = Dekalb_XL82
        SowingDepth = 50
        RowSpacing = 700
        Population = 6
        script: same as in UsingFixedDates.Field.Sow wheat
      Manager Harvest maize
        Crop = [Maize]
        script: same as in UsingFixedDates.Field.Harvesting wheat
      BiomassRemovalEvents CutWheat: PlantToRemoveBiomassFrom=Wheat; RemovalType=0; StageToSet=EndJuvenile; RemovalDates=[17/06/2004]
        BiomassRemovalFractions:
          PlantName  OrganName  TypeString  LiveToRemove  DeadToRemove  LiveToResidue  DeadToResidue
          Wheat      Grain      Cutting     0             0             0              0
          Wheat      Root       Cutting     0             0             0              0
          Wheat      Leaf       Cutting     0.7           0.5           0              0
          Wheat      Spike      Cutting     0             0             0              0
          Wheat      Stem       Cutting     0.4           0.2           0              0
      BiomassRemovalEvents GrazeMaize: PlantToRemoveBiomassFrom=Maize; RemovalType=1; RemovalDates=[15/11/2004, 10/12/2004]
        BiomassRemovalFractions:
          PlantName  OrganName  TypeString  LiveToRemove  DeadToRemove  LiveToResidue  DeadToResidue
          Maize      Grain      Grazing     0             0             0              0
          Maize      Root       Grazing     0             0             0              0
          Maize      Leaf       Grazing     0.55          0.3           0.1            0.4
          Maize      Husk       Grazing     0             0             0              0
          Maize      Rachis     Grazing     0             0             0              0
          Maize      Stem       Grazing     0             0             0              0
  Simulation SendingDatesFromOpperations
    Clock: Start=2004-04-01; End=2005-04-01
    Summary SummaryFile
    Weather: FileName=%root%\Examples\WeatherFiles\NZ_Lincoln.met
    SoilArbitrator Soil Arbitrator
    Zone Field: Area=1; Slope=0; AspectAngle=0; Altitude=50
      Soil Synthetic Soil Derived from ISRIC SoilGrids: same as UsingFixedDates.Field.Synthetic Soil Derived from ISRIC SoilGrids
      Fertiliser
      SurfaceOrganicMatter: InitialResidueName=wheat_stubble; InitialResidueType=wheat; InitialResidueMass=500; InitialStandingFraction=0; InitialCPR=0; InitialCNR=100
      MicroClimate: a_interception=0; b_interception=1; c_interception=0; d_interception=0; SoilHeatFluxFraction=0.4; MinimumHeightDiffForNewLayer=0; NightInterceptionFraction=0.5; ReferenceHeight=2
      Plant Wheat
      Report: EventNames=[Clock].DoReport
        VariableNames:
          [Clock].Today
          [Wheat].Phenology.Stage
          [Wheat].TotalLive.Wt
          [Wheat].TotalDead.Wt
          [Wheat].Leaf.Live.Wt
          [Wheat].Leaf.Dead.Wt
          [Wheat].Stem.Live.Wt
          [Wheat].Stem.Dead.Wt
      Manager Sow wheat
        Crop = [Wheat]
        SowDate = 24-Apr-2004
        CultivarName = Wakanui
        SowingDepth = 20
        RowSpacing = 150
        Population = 150
        script: same as in UsingFixedDates.Field.Sow wheat
      Manager Harvesting wheat: same as UsingFixedDates.Field.Harvesting wheat
      Operations
        2004-09-17  [CutWheat].Remove()
      BiomassRemovalEvents CutWheat: PlantToRemoveBiomassFrom=Wheat; RemovalType=0
        BiomassRemovalFractions:
          PlantName  OrganName  TypeString  LiveToRemove  DeadToRemove  LiveToResidue  DeadToResidue
          Wheat      Grain      Cutting     0             0             0              0
          Wheat      Root       Cutting     0             0             0              0
          Wheat      Leaf       Cutting     0.6           0.2           0.2            0
          Wheat      Spike      Cutting     0             0             0              0
          Wheat      Stem       Cutting     0.3           0.05          0.2            0
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