Simulations: Version=136
  DataStore
  Folder Cropping Examples
    Memo Cropping examples description
      #CLEM Cropping Examples
      NOTE: These are fictional examples showing how to set up cropping simulations.  Yield data is dummy data.

      ##Single Cropping Example
       - Maize is grown on half of the Field
       - The Maize is sold

      ##Mixed Cropping Example
       - Tomatoes and Cumcumber are grown together on 0.8 hectares of land at the same time
       - The Tomatoes are processed into tomato paste
       - The tomato paste is sold

      ##Rotation Cropping Example
       - A rotation between Sorghum and wheat is performed

      It is recommended that you use these simulations as examples, but build your simulation from scratch to best understand the processes included.

      #Help
      The CLEM help system provides a model overview, user guide (how to) and a full description of every CLEM component, as well as in depth discussions on modelling various farm systems and what components to use. The Help documentation can be accessed by clicking the Help button beside the component name in the right hand information pane after selecting any CLEM component from your simulation tree or at [CLEM Help online](http://www.apsim.info/CLEM/Content/Home.htm).
    Simulation Single and Mixed Cropping
      Memo Single  and Mixed Cropping Example
        #Single crop and Mixed cropping example
        This simulation demonstrates how production of a single crop and a mixed crop is performed in CLEM.

        [Full description of this example](https://www.apsim.info/clem/Content/Examples/Cropping examples.htm)

        ##This simulation provides the following crops
        - A Maize crop growing on half the available 2 hectares of land
        - A mixed crop of tomatoes and cucumbers growing on 0.8 hectares of land

        ##The simulation also show you how to
        - Process the tomatoes into tomato paste
        - Sell maize and tomato paste
        - Add labour requirements to an activity (e.g. Harvest Maize)

        ## Reports and Graph Results
        - examples of reports and graphs

        ## Additional data files
        - FileCrop_Maize.prn
        - FileCrop_Vegetables.prn
      Clock: Start=2001-01-01; End=2005-12-31
      Summary summaryfile
      ZoneCLEM CLEM: FarmMultiplier=1; ClimateRegion=0; EcologicalIndicatorsCalculationMonth=12; Area=0; Slope=0; AspectAngle=0; Altitude=50
        FileCrop FileCrop_Maize: FileName=FileCrop_Maize.prn; CropNameColumnName=CropName; SoilTypeColumnName=SoilNum; YearColumnName=Year; MonthColumnName=Month; AmountColumnName=AmtKg
        FileCrop FileCrop_Vegetables: FileName=FileCrop_Vegetables.prn; CropNameColumnName=CropName; SoilTypeColumnName=SoilNum; YearColumnName=Year; MonthColumnName=Month; AmountColumnName=AmtKg
        ResourcesHolder Resources
          Land: UnitsOfArea=hectares; UnitsOfAreaToHaConversion=1
            LandType Field: LandArea=2; PortionBuildings=0; ProportionOfTotalArea=1; SoilType=4; LastGain=0
          Finance Finances
            FinanceType General account: OpeningBalance=100; EnforceWithdrawalLimit=true; WithdrawalLimit=0; InterestRateCharged=0; InterestRatePaid=0; LastGain=0
          Labour: UseCohorts=false; AllowAging=true
            LabourType Male: InitialAge=42; Gender=0; Individuals=1; Hired=false; LastGain=0
            LabourType Female: InitialAge=35; Gender=1; Individuals=1; Hired=false; LastGain=0
            LabourAvailabilityList
              LabourAvailabilityItem Male: Value=28
              LabourAvailabilityItem Female: Value=28
          ProductStore
            ProductStoreType Maize: Units=kg; StartingAmount=0; LastGain=0
              ResourcePricing Pricing: PacketSize=1000; UseWholePackets=false; PricePerPacket=200; PurchaseOrSale=2; PreviousPrice=0
            ProductStoreType Tomatoes: Units=kg; StartingAmount=0; LastGain=0
            ProductStoreType TomatoPaste: Units=kg; StartingAmount=0; LastGain=0
              ResourcePricing Pricing: PacketSize=0.5; UseWholePackets=true; PricePerPacket=2.5; PurchaseOrSale=2; PreviousPrice=0
            ProductStoreType Cucumbers: StartingAmount=0; LastGain=0
        ActivitiesHolder Activities
          CropActivityManageCrop Manage Maize: LandItemNameToUse=Land.Field; AreaRequested=1; UseAreaAvailable=false; TransactionCategory=Crop; OnPartialResourcesAvailableAction=2
            CropActivityManageProduct Grow maize crop: ModelNameFileCrop=FileCrop_Maize; CropName=Maize_sole_fertilised; StoreItemName=ProductStore.Maize; ProportionKept=1; TreesPerHa=0; UnitsToHaConverter=0; TransactionCategory=Crop.[Product]; OnPartialResourcesAvailableAction=2
              CropActivityTask Harvest (disabled): TransactionCategory=Crop.[Task]; OnPartialResourcesAvailableAction=2
                ActivityTimerCropHarvest: OffsetMonthHarvestStart=-1; OffsetMonthHarvestStop=2
                LabourRequirement HarvestMaize: LabourPerUnit=5; UnitSize=1; WholeUnitBlocks=false; UnitType=1; MinimumPerPerson=1; MaximumPerPerson=100; LabourShortfallAffectsActivity=true; ApplyToAll=false
                  LabourFilterGroup Male
                    LabourFilter: Parameter=1; Operator=0; Value=Male
                    LabourFilterGroup Male
                      LabourFilter: Parameter=1; Operator=0; Value=Female
              LabourRequirement HarvestMaize: LabourPerUnit=5; UnitSize=1; WholeUnitBlocks=false; UnitType=1; MinimumPerPerson=1; MaximumPerPerson=100; LabourShortfallAffectsActivity=true; ApplyToAll=false
                LabourFilterGroup Male
                  LabourFilter: Parameter=1; Operator=0; Value=Male
                  LabourFilterGroup Male
                    LabourFilter: Parameter=1; Operator=0; Value=Female
          ResourceActivitySell Sell Maize: AccountName=Finances.General account; ResourceTypeName=ProductStore.Maize; SellStyle=1; Value=1; TransactionCategory=Sales; OnPartialResourcesAvailableAction=2
          CropActivityManageCrop Manage Vegetables: LandItemNameToUse=Land.Field; AreaRequested=0.2; UseAreaAvailable=false; TransactionCategory=Crop; OnPartialResourcesAvailableAction=2
            CropActivityManageProduct Grow tomatoes: ModelNameFileCrop=FileCrop_Vegetables; CropName=Tomatoes; StoreItemName=ProductStore.Tomatoes; ProportionKept=0.8; TreesPerHa=0; UnitsToHaConverter=0; TransactionCategory=Crop.[Product]; OnPartialResourcesAvailableAction=2
              LabourRequirement: LabourPerUnit=7; UnitSize=1; WholeUnitBlocks=false; UnitType=1; MinimumPerPerson=1; MaximumPerPerson=100; LabourShortfallAffectsActivity=true; ApplyToAll=false
                LabourFilterGroup Female
                  LabourFilter: Parameter=1; Operator=0; Value=Female
                  LabourFilterGroup Male
                    LabourFilter: Parameter=1; Operator=0; Value=Male
              CropActivityManageProduct Grow cucumbers: ModelNameFileCrop=FileCrop_Vegetables; CropName=Cucumber; StoreItemName=ProductStore.Cucumbers; ProportionKept=0.8; TreesPerHa=0; UnitsToHaConverter=0; TransactionCategory=Crop.[Product]; OnPartialResourcesAvailableAction=2
                LabourRequirement: LabourPerUnit=7; UnitSize=1; WholeUnitBlocks=false; UnitType=1; MinimumPerPerson=1; MaximumPerPerson=100; LabourShortfallAffectsActivity=true; ApplyToAll=false
                  LabourFilterGroup Female
                    LabourFilter: Parameter=1; Operator=0; Value=Female
              Memo
                The crop yield from external data is reduced by 20% to account for the mixed cropping method
          ActivityFolder Tomato Paste: TransactionCategory=Folder; OnPartialResourcesAvailableAction=0
            ResourceActivityProcess Make tomato paste: ResourceTypeProcessedName=ProductStore.Tomatoes; ResourceTypeCreatedName=ProductStore.TomatoPaste; ConversionRate=0.1; Reserve=0; TransactionCategory=Process; OnPartialResourcesAvailableAction=2
              ResourceActivityFee Buy jars: TransactionCategory=Expense; AccountName=Finances.General account; PaymentStyle=1; Amount=0.2
              LabourRequirement: LabourPerUnit=5; UnitSize=1000; WholeUnitBlocks=false; UnitType=6; MinimumPerPerson=1; MaximumPerPerson=100; LabourShortfallAffectsActivity=false; ApplyToAll=false
                LabourFilterGroup Female
                  LabourFilter: Parameter=1; Operator=0; Value=Female
                  LabourFilterGroup Male
                    LabourFilter: Parameter=1; Operator=0; Value=Male
            ResourceActivitySell Sell tomato paste: AccountName=Finances.General account; ResourceTypeName=ProductStore.TomatoPaste; SellStyle=1; Value=1; TransactionCategory=Sales; OnPartialResourcesAvailableAction=2
              ActivityTimerInterval SellInNovember: Interval=12; MonthDue=11
        CLEMFolder Reports
          ReportActivitiesPerformed: CreateHTML=true; RotateReport=false; AutoCreateHTML=true
          ReportLabourRequirements
          ReportResourceLedger ProductsLedger: ReportStyle=0; ResourceGroupsToReport=ProductStore; ReportLossesAsNegative=false; IncludePrice=false; IncludeConversions=false; VariableNames=ProductStore
          ReportResourceLedger FinancesLedger: ReportStyle=0; ResourceGroupsToReport=Finances; ReportLossesAsNegative=false; IncludePrice=false; IncludeConversions=false; VariableNames=Finances
          ReportResourceLedger LabourLedger: ReportStyle=0; ResourceGroupsToReport=Labour; ReportLossesAsNegative=false; IncludePrice=false; IncludeConversions=false; VariableNames=Labour
          ReportResourceBalances: ResourceGroupsToReport=[Land, Finances, Labour, ProductStore]; ReportAmount=true; ReportValue=false; ReportAnimalEquivalents=false; ReportAnimalWeight=false; ReportLandEntire=false; ReportLabourIndividuals=false
            VariableNames:
              Labour
              ProductStore
              Finances
          ReportResourceShortfalls
            VariableNames:
              Finances
              Labour
              ProductStore
              HumanFoodStore
    Simulation Rotation cropping
      Memo Rotation Cropping Example
        #Rotation Cropping Example
        This simulation demonstrates how rotation cropping is performed in CLEM - on the same land grown and harvested in rotation

        This simulation shows an example of the resources and activities needed to Manage and Sell Wheat and Sorghum crops grown in rotation of the same field.

        [Full description of this example](https://www.apsim.info/clem/Content/Examples/Cropping examples.htm)

        ##Resources needed are:
         - Land - one field of 80 hectares
         - Finances - a General account
         - Labour - a Male available 8 days per month
         - Product Stores - for Wheat and Sorghum along with Sale Prices

        ##The simulation also show you how to:
        - Prepare, Plant, Weed, Harvest, Sell and Transport Wheat and Sorghum Crops grown on the same piece of land.
        - Apply Timers for Activities to happen
        - Provide Labour to the Activities. (ie. Plant Wheat, Weed Sorghum

        ## Reports and Graph Results
        - examples of reports and graphs

        ## Additional data files
        - FileCrop_SorgWheat.prn
      Clock: Start=1903-01-01; End=1906-12-31
      Summary summaryfile
      ZoneCLEM CLEM: FarmMultiplier=1; ClimateRegion=0; EcologicalIndicatorsCalculationMonth=12; Area=0; Slope=0; AspectAngle=0; Altitude=50
        FileCrop: FileName=FileCrop_SorgWheat.prn; CropNameColumnName=CropName; SoilTypeColumnName=SoilNum; YearColumnName=Year; MonthColumnName=Month; AmountColumnName=AmtKg; HarvestTypeColumnName=HarvestTag
        ResourcesHolder Resources
          Land: UnitsOfArea=hectares; UnitsOfAreaToHaConversion=1
            LandType Padd1: LandArea=80; PortionBuildings=0; ProportionOfTotalArea=1; SoilType=1; LastGain=0
          Finance Finances
            FinanceType General account: OpeningBalance=1000; EnforceWithdrawalLimit=false; WithdrawalLimit=0; InterestRateCharged=0; InterestRatePaid=0; LastGain=0
          Labour: UseCohorts=false; AllowAging=true
            LabourType Male: InitialAge=30; Gender=0; Individuals=5; Hired=false; LastGain=0
            LabourAvailabilityList
              LabourAvailabilityItem MaleAvailability: Value=8
                LabourFilter LabourFilter1: Parameter=1; Operator=0; Value=Male
          ProductStore
            ProductStoreType Wheat: Units=kg; StartingAmount=0; LastGain=0
              ResourcePricing WheatPrice: PacketSize=1000; UseWholePackets=false; PricePerPacket=234; PurchaseOrSale=0; PreviousPrice=0
            ProductStoreType Sorghum: Units=kg; StartingAmount=0; LastGain=0
              ResourcePricing SorghumPrice: PacketSize=1000; UseWholePackets=false; PricePerPacket=219; PurchaseOrSale=0; PreviousPrice=0
        ActivitiesHolder Activities
          ActivityFolder Manage crops: TransactionCategory=Folder; OnPartialResourcesAvailableAction=0
            CropActivityManageCrop Manage rotation: LandItemNameToUse=Land.Padd1; AreaRequested=80; UseAreaAvailable=false; TransactionCategory=Crop; OnPartialResourcesAvailableAction=2
              CropActivityManageProduct Manage Wheat: ModelNameFileCrop=FileCrop; CropName=Wheat; StoreItemName=ProductStore.Wheat; ProportionKept=1; TreesPerHa=0; UnitsToHaConverter=0; TransactionCategory=Crop.[Product]; OnPartialResourcesAvailableAction=0
                CropActivityTask Prepare wheat: TransactionCategory=Crop.[Task]; OnPartialResourcesAvailableAction=2
                  ActivityTimerCropHarvest PrepareWheat: OffsetMonthHarvestStart=-11; OffsetMonthHarvestStop=-11
                  LabourRequirement: LabourPerUnit=1; UnitSize=30; WholeUnitBlocks=true; UnitType=1; MinimumPerPerson=1; MaximumPerPerson=100; LabourShortfallAffectsActivity=false; ApplyToAll=false
                    LabourFilterGroup
                      LabourFilter: Parameter=1; Operator=0; Value=Male
                CropActivityTask Plant wheat: TransactionCategory=Crop.[Task]; OnPartialResourcesAvailableAction=0
                  ActivityTimerCropHarvest PlantWheat: OffsetMonthHarvestStart=-8; OffsetMonthHarvestStop=-8
                  LabourRequirement: LabourPerUnit=1; UnitSize=40; WholeUnitBlocks=true; UnitType=1; MinimumPerPerson=1; MaximumPerPerson=100; LabourShortfallAffectsActivity=false; ApplyToAll=false
                    LabourFilterGroup
                      LabourFilter: Parameter=1; Operator=0; Value=Male
                CropActivityTask Weed spray wheat: TransactionCategory=Crop.[Task]; OnPartialResourcesAvailableAction=2
                  ActivityTimerCropHarvest SprayWheat: OffsetMonthHarvestStart=-6; OffsetMonthHarvestStop=-2
                  LabourRequirement: LabourPerUnit=1; UnitSize=25; WholeUnitBlocks=false; UnitType=1; MinimumPerPerson=1; MaximumPerPerson=100; LabourShortfallAffectsActivity=false; ApplyToAll=false
                    LabourFilterGroup
                      LabourFilter: Parameter=1; Operator=0; Value=Male
                ActivityFolder Harvest activities: TransactionCategory=Folder; OnPartialResourcesAvailableAction=0
                  CropActivityTask Harvest wheat: TransactionCategory=Crop.[Task]; OnPartialResourcesAvailableAction=2
                    LabourRequirement: same as Cropping Examples.Rotation cropping.CLEM.Activities.Manage crops.Manage rotation.Manage Wheat.Plant wheat.LabourRequirement
                    CropActivityFee Wheat harvest costs: AccountName=Finances.General account; PaymentStyle=0; Amount=40; TransactionCategory=Crop.[Activity]; OnPartialResourcesAvailableAction=0
                    CropActivityFee Wheat variable costs: AccountName=Finances.General account; PaymentStyle=1; Amount=175; TransactionCategory=Crop.[Activity]; OnPartialResourcesAvailableAction=0
                  CropActivityTask Transport wheat: TransactionCategory=Crop.[Task]; OnPartialResourcesAvailableAction=2
                    LabourRequirement: LabourPerUnit=1.3; UnitSize=5000; WholeUnitBlocks=false; UnitType=6; MinimumPerPerson=1; MaximumPerPerson=100; LabourShortfallAffectsActivity=false; ApplyToAll=false
                      LabourFilterGroup
                        LabourFilter: Parameter=1; Operator=0; Value=Male
                  ActivityTimerCropHarvest HarvestWheat: OffsetMonthHarvestStart=0; OffsetMonthHarvestStop=0
              CropActivityManageProduct Manage Sorghum: ModelNameFileCrop=FileCrop; CropName=Sorghum; StoreItemName=ProductStore.Sorghum; ProportionKept=1; TreesPerHa=0; UnitsToHaConverter=0; TransactionCategory=Crop.[Product]; OnPartialResourcesAvailableAction=2
                CropActivityTask Plant sorghum: TransactionCategory=Crop.[Task]; OnPartialResourcesAvailableAction=2
                  ActivityTimerCropHarvest PlantSorghum: OffsetMonthHarvestStart=-5; OffsetMonthHarvestStop=-5
                  LabourRequirement: LabourPerUnit=1; UnitSize=40; WholeUnitBlocks=false; UnitType=1; MinimumPerPerson=1; MaximumPerPerson=100; LabourShortfallAffectsActivity=false; ApplyToAll=false
                    LabourFilterGroup
                      LabourFilter: Parameter=1; Operator=0; Value=Male
                CropActivityTask Spray weeds sorghum: TransactionCategory=Crop.[Task]; OnPartialResourcesAvailableAction=2
                  ActivityTimerCropHarvest SpraySorghum: OffsetMonthHarvestStart=-3; OffsetMonthHarvestStop=-2
                  LabourRequirement: same as Cropping Examples.Rotation cropping.CLEM.Activities.Manage crops.Manage rotation.Manage Sorghum.Plant sorghum.LabourRequirement
                ActivityFolder Harvest activities: TransactionCategory=Folder; OnPartialResourcesAvailableAction=0
                  CropActivityTask Harvest sorghum: TransactionCategory=Crop.[Task]; OnPartialResourcesAvailableAction=2
                    LabourRequirement: same as Cropping Examples.Rotation cropping.CLEM.Activities.Manage crops.Manage rotation.Manage Sorghum.Plant sorghum.LabourRequirement
                    CropActivityFee Sorghum harvest costs: AccountName=Finances.General account; PaymentStyle=1; Amount=55; TransactionCategory=Crop.[Activity]; OnPartialResourcesAvailableAction=0
                    CropActivityFee Sorghum variable costs: AccountName=Finances.General account; PaymentStyle=1; Amount=218; TransactionCategory=Crop.[Activity]; OnPartialResourcesAvailableAction=0
                  CropActivityTask Transport sorghum: TransactionCategory=Crop.[Task]; OnPartialResourcesAvailableAction=2
                    LabourRequirement: LabourPerUnit=1; UnitSize=90000; WholeUnitBlocks=false; UnitType=6; MinimumPerPerson=1; MaximumPerPerson=100; LabourShortfallAffectsActivity=false; ApplyToAll=false
                      LabourFilterGroup
                        LabourFilter: Parameter=1; Operator=0; Value=Male
                  ActivityTimerCropHarvest HarvestSorghum: OffsetMonthHarvestStart=0; OffsetMonthHarvestStop=0
            ResourceActivitySell Sell wheat: AccountName=Finances.General account; ResourceTypeName=ProductStore.Wheat; SellStyle=0; Value=5000; TransactionCategory=Sales; OnPartialResourcesAvailableAction=2
            ResourceActivitySell Sell sorghum: AccountName=Finances.General account; ResourceTypeName=ProductStore.Sorghum; SellStyle=4; Value=0.1; TransactionCategory=Sales; OnPartialResourcesAvailableAction=0
              ActivityTimerInterval SellJuly: Interval=12; MonthDue=7
        CLEMFolder Reports
          ReportActivitiesPerformed: CreateHTML=true; RotateReport=false; AutoCreateHTML=true
          ReportResourceBalances: same as Cropping Examples.Single and Mixed Cropping.CLEM.Reports.ReportResourceBalances
          ReportResourceShortfalls: EventNames=[Activities].ResourceShortfallOccurred
            VariableNames:
              [Activities].LastShortfallResourceRequest.ResourceTypeName as Resource
              [Activities].LastShortfallResourceRequest.ActivityModel.Name as Activity
              [Activities].LastShortfallResourceRequest.Reason as Reason
              [Activities].LastShortfallResourceRequest.Required as Required
              [Activities].LastShortfallResourceRequest.Available as Available
          ReportResourceLedger LabourLedger: ReportStyle=0; ResourceGroupsToReport=Labour; ReportLossesAsNegative=false; IncludePrice=false; IncludeConversions=false; VariableNames=Labour
          ReportResourceLedger FinancesLedger: ReportStyle=0; ResourceGroupsToReport=Finances; ReportLossesAsNegative=false; IncludePrice=false; IncludeConversions=false; VariableNames=Finances
          ReportResourceLedger ProductStoreLedger: ReportStyle=0; ResourceGroupsToReport=ProductStore; ReportLossesAsNegative=false; IncludePrice=false; IncludeConversions=false; VariableNames=ProductStore
          ReportLabourRequirements
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