Simulations: Version=201
  DataStore
  Folder Grazing example
    Memo Grazing example description
      # CLEM Grazing simulation example
      ## Grazing 10 Ruminants on native pasture and feeding hay

      It is recommended that you use these simulations as examples, but build your simulation from scratch to best understand the processes included.

      # Help
      The CLEM help system provides a model overview, user guide (how to) and a full description of every CLEM component, as well as in depth discussions on modelling various farm systems and what components to use. The Help documentation can be accessed by clicking the Help button beside the component name in the right hand information pane after selecting any CLEM component from your simulation tree or at [CLEM Help online](http://www.apsim.info/CLEM/Content/Home.htm).
    Simulation Grazing
      Memo Grazing 10Animals_PastureHay
        # Grazing
        - simulated for 14 years - with 10 ruminants on native pasture and feeding hay

        ## Native Pasture
        - Native Pasture yield data - from an external dataset (from a Grass growth model) using the "Simple" method with data provided in csv file
        - Native Pasture is managed - land assigned, tracking pasture state
        ## Hay purchased
         - 100kg Hay purchased as needed
        ## Ruminants
        - 10 Ruminants (different Starting Ages and Weights)
        - Moved to Native Pasture at start of simulation
        - Ruminants grazed on Pasture for the maximum 8 hours each day
        - Fed purchase hay to potential intake
        - Breeding by Controlled mating - every 12 months from March
        - Weaning - Individuals are weaned at 8 months or 100 kg - every 6 months from April
        - Manage numbers: every August
         - Breeding females: maintained between 2 and 10 - sold when over 180 months old - A maximum of 100% of the Maximum Breeders Kept can be purchased in a single transaction
         - Breeding males (sires/rams etc): A maximum of 2 will be kept - sold when over 96 months old
         - General herd: Males will be sold when 18 months old or 150 kg - Animals will be sold only when activity is due - Purchased individuals will be placed on Native Pasture
        - Buy and sell
         - Finances goes in and out of the General account
      Clock: Start=1970-01-01; End=1993-12-31
      Summary summaryfile
      RandomNumberGenerator RandomNumbers: Seed=0; Iteration=0
      ZoneCLEM CLEM: FarmMultiplier=1; ClimateRegion=0; EcologicalIndicatorsCalculationInterval=12; EcologicalIndicatorsCalculationMonth=12; BuildTransactionCategoryFromTree=false; UseModelNameAsTransactionCategory=false; Area=0; Slope=0; AspectAngle=0; Altitude=50
        FileCrop FileForage: FileName=FileForage.prn; CropNameColumnName=CropName; SoilTypeColumnName=SoilNum; YearColumnName=Year; MonthColumnName=Month; AmountColumnName=AmtKg
        ResourcesHolder Resources
          Land: UnitsOfArea=hectares; UnitsOfAreaToHaConversion=1
            LandType Paddock1: LandArea=250; PortionBuildings=0; ProportionOfTotalArea=1; SoilType=2
          Finance Finances: FirstMonthOfFinancialYear=7
            FinanceType General account: OpeningBalance=100000; EnforceWithdrawalLimit=false; WithdrawalLimit=0; InterestRateCharged=7.5; InterestRatePaid=2
          RuminantHerd Ruminants: TransactionStyle=0
            RuminantType Bos indicus: Breed=Bos indicus; EMaintEfficiencyCoefficient=0.35; EMaintEfficiencyIntercept=0.503; EGrowthEfficiencyCoefficient=0.79; EGrowthEfficiencyIntercept=0; ELactationEfficiencyCoefficient=0.35; ELactationEfficiencyIntercept=0.42; EMaintExponent=8.2e-05; EMaintIntercept=0.09; EMaintCoefficient=0.26; EnergyMaintenanceMaximumAge=6; Kme=1; GrowthEnergyIntercept1=6.7; GrowthEnergyIntercept2=20.3; GrowthEfficiency=1.09; NaturalWeaningAge=0; SRWFemale=500; SRWMaleMultiplier=1.2; SRWBirth=0.08; AgeGrowthRateCoefficient=0.0115; SRWGrowthScalar=0.32; RelBCToScoreRate=0.15; BCScoreRange=[0, 3, 5]; BodyConditionScoreForMortality=0; BodyConditionScoreMortalityRate=0.5; IntakeCoefficient=0.024; IntakeIntercept=1.7; OverfeedPotentialIntakeModifier=1; ProteinCoefficient=120; ProteinDegradability=0.9; BaseAnimalEquivalent=450; GreenDietMax=0.98; GreenDietCoefficient=0.15; GreenDietZero=0.04; IntakeCoefficientBiomass=0.006; StrictFeedingLimits=true; MilkIntakeCoefficient=0.1206; MilkIntakeIntercept=3.8146; MilkIntakeMaximum=20; MilkLWTFodderSubstitutionProportion=0.2; MaxJuvenileIntake=0.035; ProportionalDiscountDueToMilk=0.3; ConditionBasedMortalityStyle=3; ConditionBasedMortalityCutOff=0; ConditionBasedMortalityProbability=1; LactatingPotentialModifierConstantA=0.42; LactatingPotentialModifierConstantB=61; LactatingPotentialModifierConstantC=1.7; MaximumSizeOfIndividual=1.2; MortalityBase=0.03; MortalityCoefficient=2.5; MortalityIntercept=0.05; MortalityExponent=3; JuvenileMortalityCoefficient=3; JuvenileMortalityMaximum=0.2; JuvenileMortalityExponent=1.8; WoolCoefficient=0; CashmereCoefficient=0; MilkCurveSuckling=0.6; MilkCurveNonSuckling=0.11; MilkingDays=300; MilkPeakYield=20; MilkOffsetDay=4; MilkPeakDay=45; ProportionOffspringMale=0.5; InterParturitionIntervalIntercept=10.847; InterParturitionIntervalCoefficient=-0.7994; GestationLength=9; MinimumAge1stMating=24; MinimumSize1stMating=0.5; MinimumDaysBirthToConception=61; CriticalCowWeight=0.5; MaximumMaleMatingsPerDay=30; PrenatalMortality=0.079; ProportionAcceptingSurrogate=0; MethaneProductionCoefficient=20.7
              RuminantInitialCohorts Initial cohorts: WeightWarningOccurred=false
                RuminantTypeCohort WeanerF: Sex=0; Age=8; Number=2; Weight=180; WeightSD=0; Suckling=false; Sire=false
                RuminantTypeCohort WeanerM: Sex=1; Age=8; Number=2; Weight=180; WeightSD=0; Suckling=false; Sire=false
                RuminantTypeCohort Female3_4: Sex=0; Age=37; Number=4; Weight=400; WeightSD=0; Suckling=false; Sire=false
                RuminantTypeCohort Male2_3: Sex=1; Age=30; Number=1; Weight=520; WeightSD=0; Suckling=false; Sire=false
                RuminantTypeCohort Male3_4: Sex=1; Age=42; Number=1; Weight=610; WeightSD=0; Suckling=false; Sire=true
              AnimalPricing Prices
                AnimalPriceGroup Weaners_LT_12m: PricingStyle=1; Value=2.5; PurchaseOrSale=0; RandomiseBeforeSorting=false
                  FilterByProperty LT_12m: PropertyOfIndividual=Age; Operator=20; Value=12
                AnimalPriceGroup Female1_3_Buy: PricingStyle=1; Value=2.3; PurchaseOrSale=1; RandomiseBeforeSorting=false
                  FilterByProperty Female: PropertyOfIndividual=Sex; Operator=13; Value=Female
                  FilterByProperty less36months: PropertyOfIndividual=Age; Operator=20; Value=36
                AnimalPriceGroup Female1_3_Sell: PricingStyle=1; Value=2.5; PurchaseOrSale=2; RandomiseBeforeSorting=false
                  FilterByProperty Female: PropertyOfIndividual=Sex; Operator=13; Value=Female
                  FilterByProperty less36months: PropertyOfIndividual=Age; Operator=20; Value=36
                AnimalPriceGroup Female 3plus: PricingStyle=1; Value=2.2; PurchaseOrSale=0; RandomiseBeforeSorting=false
                  FilterByProperty Female: PropertyOfIndividual=Sex; Operator=13; Value=Female
                  FilterByProperty 36months: PropertyOfIndividual=Age; Operator=16; Value=36
                AnimalPriceGroup Breeding Sires: PricingStyle=1; Value=2.2; PurchaseOrSale=0; RandomiseBeforeSorting=false
                  FilterByProperty isSire: PropertyOfIndividual=Male.IsSire; Operator=83
                AnimalPriceGroup Male1_3: PricingStyle=1; Value=2.5; PurchaseOrSale=0; RandomiseBeforeSorting=false
                  FilterByProperty Male: PropertyOfIndividual=Sex; Operator=13; Value=Male
                  FilterByProperty less36months: PropertyOfIndividual=Age; Operator=20; Value=36
                AnimalPriceGroup Male 3plus: PricingStyle=1; Value=2.4; PurchaseOrSale=0; RandomiseBeforeSorting=false
                  FilterByProperty Male: PropertyOfIndividual=Sex; Operator=13; Value=Male
                  FilterByProperty 36months: PropertyOfIndividual=Age; Operator=16; Value=36
              RuminantConceptionCurve: ConceptionRateCoefficent=-14.247; ConceptionRateIntercept=5.182; ConceptionRateAsymptote=90
          GrazeFoodStore
            GrazeFoodStoreType NativePasture: NToDMDCoefficient=11.03; NToDMDIntercept=41.4; GreenNitrogen=2; DecayNitrogen=0.35; MinimumNitrogen=0.4; DecayDMD=0.1; MinimumDMD=43; DetachRate=0.03; CarryoverDetachRate=0.12; IntakeTropicalQualityCoefficient=0.16; IntakeQualityCoefficient=1.7; InitialBiomass=2000; FirstMonthOfGrowSeason=11; LastMonthOfGrowSeason=3; NumberMonthsForInitialBiomass=5
          AnimalFoodStore
            AnimalFoodStoreType Hay: DMD=49; Nitrogen=3.4; StartingAmount=100
              Transmutation Purchase: TransmutationPacketSize=1000; UseWholePackets=false; TransactionCategory=Transmutation
                Transmute: TransmuteResourceTypeName=Finances.General account; AmountPerPacket=100; TransmuteStyle=0; FinanceTypeForTransactionsName=No transactions
        ActivitiesHolder Activities
          CropActivityManageCrop Native Pasture on farm: LandItemNameToUse=Land.Paddock1; AreaRequested=200; UseAreaAvailable=true; TransactionCategory=Crop; OnPartialResourcesAvailableAction=0
            CropActivityManageProduct Native Pasture to GrazeFoodStore: ModelNameFileCrop=FileForage; CropName=Native; StoreItemName=GrazeFoodStore.NativePasture; AddProductStyle=0; ProportionKept=1; PlantedMultiplier=1; TreesPerHa=0; TransactionCategory=Crop.[Product]; OnPartialResourcesAvailableAction=0
          ActivityFolder Manage herd: OnPartialResourcesAvailableAction=0
            RuminantActivityGrow Grow all ruminants: EnergyGross=18.4; MethaneStoreName=Use store named Methane if present; UseFixedEnergyConversionEquation=true; OnPartialResourcesAvailableAction=0; TransactionCategory=Livestock.Manage
            RuminantActivityMove Move to pasture: ManagedPastureName=GrazeFoodStore.NativePasture; PerformAtStartOfSimulation=true; MoveSucklings=false; TimeStepTiming=2; TransactionCategory=Livestock.Manage; OnPartialResourcesAvailableAction=0
              RuminantGroup All: RandomiseBeforeSorting=false
            RuminantActivityGrazeAll Graze all: HoursGrazed=8; TransactionCategory=Livestock.Grazing; OnPartialResourcesAvailableAction=2
            RuminantActivityFeed Feed hay: FeedTypeName=AnimalFoodStore.Hay; ProportionTramplingWastage=0; FeedStyle=4; StopFeedingWhenSatisfied=false; TransactionCategory=Livestock.Feed; OnPartialResourcesAvailableAction=2
              RuminantFeedGroup Feed all: Value=1; Measure=Feed provided; TransactionCategory=Feed.[Product].[Ruminants]; RandomiseBeforeSorting=false
            RuminantActivityBreed Breed: NumberConceived=0; InferStartupPregnancy=false; TransactionCategory=Livestock.Manage; OnPartialResourcesAvailableAction=0
              RuminantActivityControlledMating ControlledMating: MaximumAgeMating=120; JoiningsPerMale=1; TransactionCategory=Livestock.Manage; OnPartialResourcesAvailableAction=0
                ActivityTimerInterval Controlled mating: Interval=12; MonthDue=3
            RuminantActivityWean Wean: Style=0; WeaningAge=8; WeaningWeight=100; GrazeFoodStoreName=GrazeFoodStore.NativePasture; TransactionCategory=Livestock.Manage; OnPartialResourcesAvailableAction=0
              ActivityTimerInterval Weaning: Interval=12; MonthDue=4
              RuminantGroup All: RandomiseBeforeSorting=false
            RuminantActivityManage Manage numbers: ManageFemaleBreederNumbers=true; PerformFemaleDestocking=true; PerformFemaleStocking=true; PerformMaleDestocking=true; PerformMaleStocking=true; MaximumBreedersKept=10; MinimumBreedersKept=2; MaxBreedersMultiplierToStop=2; MarkOldBreedersForSale=true; MaximumBreederAge=120; MaximumProportionBreedersPerPurchase=1; ReturnPregnantMaxAgeToHerd=false; RetainFemaleReplacementBreedersFromSaleHerd=true; ManageMaleBreederNumbers=true; MaximumSiresKept=1; MarkOldSiresForSale=true; MaximumSireAge=96; AllowSireReplacement=false; RestockSiresRelativeToBreeders=false; MaximumSiresPerPurchase=1; RetainMaleReplacementBreedersFromSaleHerd=true; GrowOutYoungMales=true; ContinuousGrowOutSales=false; MarkAgeWeightMalesForSale=true; CastrateMales=true; MaleSellingAge=18; MaleSellingWeight=350; GrowOutYoungFemales=false; FemaleSellingAge=24; FemaleSellingWeight=300; MarkAgeWeightFemalesForSale=false; GrazeFoodStoreNameSires=GrazeFoodStore.NativePasture; GrazeFoodStoreNameBreeders=GrazeFoodStore.NativePasture; GrazeFoodStoreNameGrowOutFemales=GrazeFoodStore.NativePasture; GrazeFoodStoreNameGrowOutMales=GrazeFoodStore.NativePasture; MinimumPastureBeforeRestock=1500; AdjustBreedingFemalesAtStartup=false; AdjustOthersToFemaleBreedersPropAtStartup=false; AdjustBreedingMalesAtStartup=false; TransactionCategory=Livestock.Manage; OnPartialResourcesAvailableAction=0
              ActivityTimerInterval every August: Interval=12; MonthDue=8
              SpecifyRuminant Breeders: RuminantTypeName=Ruminants.Bos indicus; Proportion=1
                RuminantTypeCohort 24mth breeder: Sex=0; Age=24; Number=0; Weight=0; WeightSD=0; Suckling=false; Sire=false
              SpecifyRuminant Sires: RuminantTypeName=Ruminants.Bos indicus; Proportion=1
                RuminantTypeCohort 36mth sire: Sex=1; Age=36; Number=0; Weight=0; WeightSD=0; Suckling=false; Sire=true
            RuminantActivityBuySell Buy: ActivityStyle=Arrange purchases; BankAccountName=Finances.General account; TransactionCategory=Livestock.Manage; OnPartialResourcesAvailableAction=0
            RuminantActivityBuySell Sell: ActivityStyle=Arrange sales; BankAccountName=Finances.General account; TransactionCategory=Livestock.Manage; OnPartialResourcesAvailableAction=0
          SummariseRuminantHerd SummariseHerd: GroupStyle=0; AddGroupByLocation=false; IncludeTotalColumn=false
          ReportRuminantHerd ReportHerd: ReportAtStart=true
            RuminantGroup: RandomiseBeforeSorting=false
        CLEMFolder Reports
          ReportActivitiesPerformed: IncludeFolders=true; HandleTimers=1; CreateHTML=false; RotateReport=false; AutoCreateHTML=false
          ReportResourceBalances: ResourceGroupsToReport=[GrazeFoodStore, AnimalFoodStore, Ruminants]; ReportAmount=true; ReportValue=false; ReportAnimalEquivalents=false; ReportAnimalWeight=false; ReportHerdTotals=false; ReportLandEntire=false; ReportLabourIndividuals=false
            VariableNames:
              Land
              GrazeFoodStore
              AnimalFoodStore
              Ruminants
          ReportResourceShortfalls: PropPastureShortfallOfDesiredIntake=0.03; EventNames=[Activities].ResourceShortfallOccurred
            VariableNames:
              [Clock].Today as Date
              [Activities].LastShortfallResourceRequest.ResourceTypeName as Resource
              [Activities].LastShortfallResourceRequest.ActivityModel.Name as Activity
              [Activities].LastShortfallResourceRequest.Reason as Reason
              [Activities].LastShortfallResourceRequest.Required as Required
              [Activities].LastShortfallResourceRequest.Available as Available
          ReportResourceLedger GrazeFoodStoreLedger: ResourceGroupsToReport=GrazeFoodStore; ReportStyle=0; ReportLossesAsNegative=false; IncludePrice=false; IncludeFinancialYear=false; IncludeConversions=false; TransactionCategoryLevels=0; ReportRuminantAge=0; IncludeRuminantAE=false; IncludeRuminantBreed=false; IncludeRuminantCategory=false; IncludeRuminantChangeDirection=false; IncludeRuminantClass=false; IncludeRuminantID=false; IncludeRuminantLocation=false; IncludeRuminantRelatesTo=false; IncludeRuminantSex=false; IncludeRuminantWeight=false; IncludeRuminantGrowthRate=false; VariableNames=GrazeFoodStore
          ReportResourceLedger AnimalFoodLedger: ResourceGroupsToReport=AnimalFoodStore; ReportStyle=0; ReportLossesAsNegative=false; IncludePrice=false; IncludeFinancialYear=false; IncludeConversions=false; TransactionCategoryLevels=0; ReportRuminantAge=0; IncludeRuminantAE=false; IncludeRuminantBreed=false; IncludeRuminantCategory=false; IncludeRuminantChangeDirection=false; IncludeRuminantClass=false; IncludeRuminantID=false; IncludeRuminantLocation=false; IncludeRuminantRelatesTo=false; IncludeRuminantSex=false; IncludeRuminantWeight=false; IncludeRuminantGrowthRate=false; VariableNames=AnimalFoodStore
          ReportResourceLedger FinancesLedger: ResourceGroupsToReport=Finances; ReportStyle=0; ReportLossesAsNegative=false; IncludePrice=false; IncludeFinancialYear=false; IncludeConversions=false; TransactionCategoryLevels=0; ReportRuminantAge=0; IncludeRuminantAE=false; IncludeRuminantBreed=false; IncludeRuminantCategory=false; IncludeRuminantChangeDirection=false; IncludeRuminantClass=false; IncludeRuminantID=false; IncludeRuminantLocation=false; IncludeRuminantRelatesTo=false; IncludeRuminantSex=false; IncludeRuminantWeight=false; IncludeRuminantGrowthRate=false; VariableNames=Finances
          ReportResourceLedger HerdLedger: ResourceGroupsToReport=Ruminants; ReportStyle=0; ReportLossesAsNegative=false; IncludePrice=false; IncludeFinancialYear=false; IncludeConversions=false; TransactionCategoryLevels=0; ReportRuminantAge=1; IncludeRuminantAE=false; IncludeRuminantBreed=false; IncludeRuminantCategory=true; IncludeRuminantChangeDirection=false; IncludeRuminantClass=true; IncludeRuminantID=true; IncludeRuminantLocation=false; IncludeRuminantRelatesTo=false; IncludeRuminantSex=true; IncludeRuminantWeight=false; IncludeRuminantGrowthRate=false; VariableNames=Ruminants
          Report HerdSummary: EventNames=[Activities].SummariseHerd.OnReportItemGenerated
            VariableNames:
              [Clock].Today
              [Activities].SummariseHerd.ReportDetails.Breed as Breed
              [Activities].SummariseHerd.ReportDetails.Herd as Herd
              [Activities].SummariseHerd.ReportDetails.Age as AgeGroup
              [Activities].SummariseHerd.ReportDetails.Sex as Sex
              [Activities].SummariseHerd.ReportDetails.Number as Num
              [Activities].SummariseHerd.ReportDetails.AverageWeight as AvgWt
              [Activities].SummariseHerd.ReportDetails.AverageWeightGain as AvgWtGn
              [Activities].SummariseHerd.ReportDetails.AverageIntake as AvgIntake
              [Activities].SummariseHerd.ReportDetails.AdultEquivalents as AE
              [Activities].SummariseHerd.ReportDetails.NumberPregnant as NoPregnant
              [Activities].SummariseHerd.ReportDetails.NumberOfBirths as Births
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