Simulations: Version=217
  DataStore
  Simulation RuminantFilters
    Memo Simulation information
      # Filtering ruminants example

      By changing the filters in the Activities.ReportHerd this simulation will report all individuals that match in the Reports.Report
      Add and change the filters in the filter group below the ReportHerd component in Activities to define which individuals are selected.
      A range of filters are provided and all disabled. Right click a filter and enable to include the filter in the simulation.
      You can also add sort and take components.

      ## Initial Herd by each individual created
      - 1 Suckling 2month Female GenoIndex and GenoA attributes
      - 2 Suckling 2month Male
      - 3 Suckling 2month Male
      - 4 Heifer Female 12month
      - 5 Female 24month GenoIndex
      - 6 Female 36month (cohort of 4)
      - 7 Female 36month
      - 8 Female 36month
      - 9 Female 36month
      - 10 Male 12month
      - 11 Male 24month
      - 12 Male 36month
      - 13 Male 36month Sire GenoA
    Memo Results
      # Checks completed

      ## No filters with sort and take tests
      * No filters (return all individuals) OK
      *  SortByProperty Age ascending OK
      * SortByProprty weight descending OK
      * TakeFromFiltered Proportion = 0.5 (50%) OK
      * TakeFromFiltered Individuals = 3 OK

      ## Filter by attributes

      * FilterByAttribute for genetics GenoIndex exists OK
      * FilterByAttribute for genetics GenoIndex value > 60 OK
      * FilterByAttribute for genetics GenoIndex value > 60 AND GenoA exists OK

      ## Filter by property

      * FilterByProperty boolean IsSire OK
      * FilterByProperty enum Sex is Male OK
      * FilterByProperty number Age < 12 OK

      ## Sort by attribute

      * SortByAttribute GenoIndex exists descending OK
      * SortByAttribute GenoIndex value descending with -9999 for those missing the attribute OK

      ## Failed filter check

      * FilterByProperty a male (IsSire) and female (IsLactating) based property OK - NO RESULTS

      ### Other hard coded checks performed
      * Filter a list of female ruminants by a female property (IsHeifer) OK - 3 ind weaned and not preg at startup returned
      * Filter a list of female ruminants by a male property (IsSire) OK - NO RESULTS
    Clock: Start=2000-08-01; End=2000-08-30
      CLEMEvents: TimeStep=30; CustomTimeStep=0; EcologicalIndicatorsCalculationInterval=12; EcologicalIndicatorsCalculationMonth=7
    Summary summaryfile
    RandomNumberGenerator RandomNumbers: Seed=0
    ZoneCLEM CLEM: UserType=0; FarmMultiplier=1; DescriptiveSummaryFormatStyle=0; BuildTransactionCategoryFromTree=false; UseModelNameAsTransactionCategory=false; Area=0; Slope=0; AspectAngle=0; Altitude=50
      ResourcesHolder Resources
        RuminantHerd Ruminants: TransactionStyle=0
          RuminantType Bos indicus
            RuminantInitialCohorts Initial cohorts NoTrend: WeightWarningOccurred=true; ManagedPastureName=Not specified
              RuminantTypeCohort suckling F GenoIndex GenoA: Sex=0; AgeDetails={Parts=[0, 2, 0]}; AgeSD=0; Number=1; Weight=0; WeightSD=0; InitialFatProteinStyle=4; Suckling=true; Sire=false; ProportionFleecePresent=0; ManagedPastureName=Not specified
                SetAttributeWithValue GenoIndex: AttributeName=GenoIndex; Category=0; Value=50; MinimumValue=-100; MaximumValue=200; StandardDeviation=20; UseStandardDeviationSign=false; InheritanceStyle=35; GenotypeStandardDeviation=0; Mandatory=false
                SetAttributeWithValue GenoA: AttributeName=GenoA; Category=0; Value=50; MinimumValue=-100; MaximumValue=200; StandardDeviation=20; UseStandardDeviationSign=false; InheritanceStyle=35; GenotypeStandardDeviation=0; Mandatory=false
              RuminantTypeCohort suckling M 2: Sex=1; AgeDetails={Parts=[0, 2, 0]}; AgeSD=0; Number=2; Weight=0; WeightSD=0; InitialFatProteinStyle=4; Suckling=true; Sire=false; ProportionFleecePresent=0; ManagedPastureName=Not specified
              RuminantTypeCohort Heifer 14: Sex=0; AgeDetails={Parts=[1, 2, 0]}; AgeSD=0; Number=1; Weight=0; WeightSD=0; InitialFatProteinStyle=4; Suckling=false; Sire=false; ProportionFleecePresent=0; ManagedPastureName=Not specified
              RuminantTypeCohort Female 24: Sex=0; AgeDetails={Parts=[2, 0, 0]}; AgeSD=0; Number=1; Weight=0; WeightSD=0; InitialFatProteinStyle=4; Suckling=false; Sire=false; ProportionFleecePresent=0; ManagedPastureName=Not specified
              RuminantTypeCohort Female 36 4: Sex=0; AgeDetails={Parts=[3, 0, 0]}; AgeSD=0; Number=6; Weight=0; WeightSD=0; InitialFatProteinStyle=4; Suckling=false; Sire=false; ProportionFleecePresent=0; ManagedPastureName=Not specified
                SetAttributeWithValue GenoIndex: AttributeName=GenoIndex; Category=0; Value=50; MinimumValue=-100; MaximumValue=200; StandardDeviation=20; UseStandardDeviationSign=false; InheritanceStyle=35; GenotypeStandardDeviation=0; Mandatory=false
              RuminantTypeCohort Male 12: Sex=1; AgeDetails={Parts=[0, 12, 0]}; AgeSD=0; Number=1; Weight=0; WeightSD=0; InitialFatProteinStyle=4; Suckling=false; Sire=false; ProportionFleecePresent=0; ManagedPastureName=Not specified
              RuminantTypeCohort Male 24: Sex=1; AgeDetails={Parts=[2, 0, 0]}; AgeSD=0; Number=1; Weight=0; WeightSD=0; InitialFatProteinStyle=4; Suckling=false; Sire=false; ProportionFleecePresent=0; ManagedPastureName=Not specified
              RuminantTypeCohort Male 36: Sex=1; AgeDetails={Parts=[3, 0, 0]}; AgeSD=0; Number=1; Weight=0; WeightSD=0; InitialFatProteinStyle=4; Suckling=false; Sire=false; ProportionFleecePresent=0; ManagedPastureName=Not specified
                SetAttributeWithValue GenoA: AttributeName=GenoA; Category=0; Value=50; MinimumValue=-100; MaximumValue=200; StandardDeviation=20; UseStandardDeviationSign=false; InheritanceStyle=35; GenotypeStandardDeviation=0; Mandatory=true
              RuminantTypeCohort Sire GenoA: Sex=1; AgeDetails={Parts=[3, 0, 0]}; AgeSD=0; Number=1; Weight=0; WeightSD=0; InitialFatProteinStyle=4; Suckling=false; Sire=true; ProportionFleecePresent=0; ManagedPastureName=Not specified
                SetAttributeWithValue GenoA: AttributeName=GenoA; Category=0; Value=50; MinimumValue=-100; MaximumValue=200; StandardDeviation=20; UseStandardDeviationSign=false; InheritanceStyle=35; GenotypeStandardDeviation=0; Mandatory=false
      ActivitiesHolder Activities
        ReportRuminantHerd ReportHerd: ReportAtStart=true; WithinTimeStepTiming=1
          RuminantGroup: RandomiseBeforeSorting=false
            FilterByProperty FilterByPropertyIsPregnant (disabled): PropertyOfIndividual=Female.IsPregnant; Operator=13; Value=True
            FilterByAttribute FilterByGenoIndexGT50 (disabled): AttributeTag=GenoIndex; FilterStyle=0; Operator=15; Value=50
            FilterByAttribute FilterByGenoIndexExists (disabled): AttributeTag=GenoIndex; FilterStyle=1; Operator=13; Value=true
            FilterByAttribute FilterByGenoA (disabled): AttributeTag=GenoA; FilterStyle=1; Operator=83
            FilterByProperty FilterByHeifer (disabled): PropertyOfIndividual=Female.IsHeifer; Operator=83
            SortByProperty (disabled): PropertyOfIndividual=Weight; SortDirection=1
            TakeFromFiltered TakeFromFilteredProportion (disabled): TakeStyle=0; TakePositionStyle=1; Value=0.5
            TakeFromFiltered TakeFromFilteredIndividuals (disabled): TakeStyle=1; TakePositionStyle=0; Value=3
            FilterByProperty FilterBySires (disabled): PropertyOfIndividual=Male.IsSire; Operator=13; Value=true
            FilterByProperty FilterByMales (disabled): PropertyOfIndividual=Sex; Operator=13; Value=Male
            FilterByProperty FilterByAgeLess12 (disabled): PropertyOfIndividual=AgeInYears; Operator=20; Value=1
            FilterByProperty FilterByLactating (disabled): PropertyOfIndividual=Female.IsLactating; Operator=13; Value=true
            SortByAttribute SortByAttributeGenoIndexExists (disabled): AttributeTag=GenoIndex; FilterStyle=1; SortDirection=1; MissingAttributeValue=false
            SortByAttribute SortByAttributeGenoIndexValue (disabled): AttributeTag=GenoIndex; FilterStyle=0; SortDirection=0; MissingAttributeValue=-9999
            FilterByProperty FilterByAbleToBreed (disabled): PropertyOfIndividual=IsAbleToBreed; Operator=13; Value=true
            SortRandom (disabled): SortDirection=0
      CLEMFolder Reports
        ReportResourceLedger HerdLedger: ResourceGroupsToReport=Ruminants; ReportStyle=0; ReportLossesAsNegative=false; IncludePrice=false; IncludeFinancialYear=false; IncludeConversions=false; TransactionCategoryLevels=0; ReportRuminantAge=0; IncludeRuminantAE=false; IncludeRuminantBreed=false; IncludeRuminantCategory=false; IncludeRuminantChangeDirection=false; IncludeRuminantClass=false; IncludeRuminantID=false; IncludeRuminantLocation=false; IncludeRuminantRelatesTo=false; IncludeRuminantSex=false; IncludeRuminantWeight=false; IncludeRuminantGrowthRate=false; VariableNames=Ruminants
        Report: EventNames=[ReportHerd].OnReportItemGenerated
          VariableNames:
            [Clock].Today as Date
            [ReportHerd].ReportDetails.Individual.ID as ID
            [ReportHerd].ReportDetails.Individual.Sex as Sex
            [ReportHerd].ReportDetails.Individual.Age as Age
            [ReportHerd].ReportDetails.Individual.Weight as Weight
            [ReportHerd].ReportDetails.Individual.Attributes.Exists("GenoIndex") as GenoIndexExists
            [ReportHerd].ReportDetails.Individual.IsAbleToBreed as AbleToBreed
