Simulations: Version=57
  DataStore
  Simulation
    Weather: FileName=%root%\Examples\WeatherFiles\WaggaWagga.met
    Clock: StartDate=1991-07-01; EndDate=1996-06-30
    Summary
    SoilArbitrator Soil Arbitrator
    MicroClimate: a_interception=0; b_interception=1; c_interception=0; d_interception=0; soil_albedo=0.13; SoilHeatFluxFraction=0.4; NightInterceptionFraction=0.5; ReferenceHeight=2
    Zone Plantation: Area=1; Slope=0
      Soil: Latitude=0; Longitude=0
        InitialWater Initial water: PercentMethod=1; FractionFull=0.8
        Water
          Thickness  BD    AirDry  LL15  DUL   SAT
          100        1.5   0.01    0.05  0.16  0.29
          300        1.6   0.01    0.05  0.15  0.29
          600        1.68  0.01    0.05  0.14  0.29
          1000       1.75  0.02    0.05  0.13  0.29
          1000       1.7   0.05    0.05  0.12  0.29
          1000       1.7   0.05    0.05  0.12  0.29
          1000       1.7   0.05    0.05  0.12  0.29
          1000       1.7   0.05    0.05  0.12  0.29
          SoilCrop EucalyptusSoil: LL=[0.05, 0.05, 0.05, 0.05, 0.05, 0.05, 0.05, 0.05]; KL=[0.07, 0.07, 0.05, 0.02, 0.02, 0.02, 0.01, 0.01]; XF=[1, 1, 1, 1, 0.3, 0.2, 0, 0]
          SoilCrop SCRUMSoil: LL=[0.05, 0.05, 0.05, 0.05, 0.05, 0.05, 0.05, 0.05]; KL=[0.07, 0.07, 0.05, 0.02, 0.02, 0.02, 0.01, 0.01]; XF=[1, 1, 1, 1, 0.3, 0.2, 0, 0]
        SoilWater: SummerDate=1-Nov; SummerU=4; SummerCona=3.5; WinterDate=1-Apr; WinterU=4; WinterCona=3.5; DiffusConst=88; DiffusSlope=35.4; Salb=0.13; CN2Bare=65; CNRed=20; CNCov=0.8; slope=0; discharge_width=0; catchment_area=0; max_pond=0; ResidueInterception=0
          Thickness  SWCON  KLAT
          100        0.9    0
          300        0.9    0
          600        0.9    0
          1000       0.6    0
          1000       0.6    0
          1000       0.6    0
          1000       0.6    0
          1000       0.6    0
        SoilOrganicMatter: RootCN=60; EnrACoeff=7.4; EnrBCoeff=0.2; OCUnits=Total
          Thickness  OC    SoilCN  FBiom  FInert  RootWt
          100        2     14.5    0.04   0.4     0.29407
          300        1     14.5    0.03   0.5     0.253108
          600        0.5   14.5    0.02   0.5     0.187507
          1000       0.2   14.5    0.01   0.5     0.113729
          1000       0.12  14.5    0.01   0.9     0.06898
          1000       0.1   14.5    0.01   0.99    0.0418385
          1000       0.1   14.5    0.01   0.99    0.0253763
          1000       0.1   14.5    0.01   0.99    0.0153915
        Analysis: Thickness=[100, 300, 600, 1000, 1000, 1000, 1000, 1000]; PH=[5.8, 5.7, 5.7, 5.9, 5.7, 5.7, 5.7, 5.7]; PHUnits=Water; BoronUnits=0
        Sample Initial nitrogen: NO3Units=ppm; NH4Units=ppm; SWUnits=Volumetric; OCUnits=Total; PHUnits=Water
          Thickness  NO3  NH4
          100        10   10
          300        5    5
          600        2    2
          1000       1    1
          1000       1    1
          1000       1    1
          1000       1    1
          1000       1    1
        CERESSoilTemperature
        Nutrient
          DirectedGraphInfo={Nodes=[{Name=Inert, OutlineColour=Black}, {Name=SurfaceResidue, OutlineColour=Black}, {Name=FOMLignin, OutlineColour=Black}, {Name=FOMCellulose, OutlineColour=Black}, {Name=FOMCarbohydrate, OutlineColour=Black}, {Name=Microbial, OutlineColour=Black}, {Name=Humic, OutlineColour=Black}, {Name=Urea, OutlineColour=Black}, {Name=NO3, OutlineColour=Black}, {Name=NH4, OutlineColour=Black}, {Name=Atmosphere, OutlineColour=White}, {Name=PlantAvailableNO3, OutlineColour=Black}, {Name=PlantAvailableNH4, OutlineColour=Black}], Arcs=[{SourceName=SurfaceResidue, DestinationName=Microbial}, {SourceName=SurfaceResidue, DestinationName=Humic}, {SourceName=FOMLignin, DestinationName=Microbial}, {SourceName=FOMLignin, DestinationName=Humic}, {SourceName=FOMCellulose, DestinationName=Microbial}, {SourceName=FOMCellulose, DestinationName=Humic}, {SourceName=FOMCarbohydrate, DestinationName=Microbial}, {SourceName=FOMCarbohydrate, DestinationName=Humic}, {SourceName=Microbial, DestinationName=Microbial}, {SourceName=Microbial, DestinationName=Humic}, {SourceName=Humic, DestinationName=Microbial}, {SourceName=Urea, DestinationName=NH4}, {SourceName=NO3, DestinationName=Atmosphere}, {SourceName=NH4, DestinationName=NO3}]}
      Irrigation
      Fertiliser
      SurfaceOrganicMatter: InitialResidueName=Wheat; InitialResidueType=Wheat; InitialResidueMass=2000; InitialStandingFraction=0; InitialCPR=0; InitialCNR=80; FractionFaecesAdded=0.5
      Plant Eucalyptus: CropType=Eucalyptus; IsEnding=false; DaysAfterEnding=0
      Plant SCRUM: CropType=SCRUM; IsEnding=false; DaysAfterEnding=0
      Report: EventNames=[Clock].DoReport
        VariableNames:
          [Clock].Today
          [Eucalyptus].Age.Value()
          [Eucalyptus].AboveGround.Wt
          [Eucalyptus].BelowGround.Wt
          [Eucalyptus].Total.Wt
          [Eucalyptus].Stem.Wt
          [Eucalyptus].FineRoot.Wt
          [Eucalyptus].CoarseRoot.Wt
          [Eucalyptus].Total.N
          [Eucalyptus].Branch.Wt
          [Eucalyptus].Wood.Wt
          [Eucalyptus].Leaf.Transpiration
          [Eucalyptus].Leaf.CoverGreen
          [Eucalyptus].Leaf.LAI
          [Eucalyptus].Stem.DBH.Value()
          [Eucalyptus].Stem.Ht.Value()
          [Eucalyptus].RootShootRatio.Value()
          [SCRUM].Stover.LAI
          [SCRUM].Stover.Wt
      Manager TreeTransplantRule
        RowSpace = 3
        RowWidth = 3
        CultivarName = grandisCoffsHarbour
        SowingDate = 1991-07-01
```csharp
using System;
using Models.Core;
using Models.PMF;
namespace Models
{
    [Serializable] 
    [System.Xml.Serialization.XmlInclude(typeof(Model))]
    public class Script : Model
    {
        [Link] Plant Plant;
        [Link] Clock Clock;

        [Description("Spacing (m) between plants within rows")]
        public double RowSpace { get; set; }
        [Description("Spacing (m) between rows")]
        public double RowWidth { get; set; }

        [Description("Cultivar")]
        [Display(Type=DisplayType.CultivarName, PlantName = "Eucalyptus")]
        public string CultivarName { get; set; }
        [Description("Sowing Date")]
        public DateTime SowingDate { get; set; }

        [EventSubscribe("DoManagement")]
        private void OnDoManagement(object sender, EventArgs e)
        {
            double PlantPopulation = 1 / (RowWidth * RowSpace);

            if (Clock.Today.Date == SowingDate)
                Plant.Sow(population: PlantPopulation, 
                    cultivar: CultivarName, 
                    depth: 100, 
                    rowSpacing: 150);
            //Plant.Sow(... Contains the following arguements:
            //Population  double  Required  Seeds sowing/m2
            //Cultivar    string  Required  "NameOfCultivar"
            //Depth       double  Optional  Depth (mm) seed sown.   Default is 100mm 
            //MaxCover    double  Optional  Proportion (0-1) of the ground row crop will cover.   Default is 1.0
            //BudNumber   double  Optional  Number of mainstems per seed sown.  Default is 1.0
            //RowSpacing  double  Optional  Spaceing (mm) between drill rows when crop is sown.  Default is 150mm
            //CropClass   string  Optional  Crop class to instantiate when crop is sown.  Default is "Plant"
        }
    }
}
```
      Manager AutoFertigate
        FASW = 0
        WaterDeficit = 0
        AutoIrrigationOn = True
        FASWThreshold = 0.5
        FASWDepth = 600
        NConc = 4
```csharp
using System;
using Models.Core;
using System.Collections.Generic;
using System.Text;
using Models.Soils;
using Models.Soils.Nutrients;
using Models.PMF;
using Models;
using System.Xml.Serialization;
using APSIM.Shared.Utilities;

namespace Models
{
    [Serializable] 
    public class Script : Model
    {
        public double FASW { get; set; }
        public double WaterDeficit  { get; set; }
    
        [Link] Plant Chickpea;
        [Link] Zone zone;
        [Link] Irrigation irrigation;
        [Link] Fertiliser fertiliser;
        [Link] Soil soil;
        
        [Description("Auto irrigation on?")]
        public bool AutoIrrigationOn { get; set; }
        
        [Description("Threshold fraction available water (0-1)")]
        public double FASWThreshold { get; set; }

        [Description("Soil depth (mm) to which fraction available water is calculated")]
        public double FASWDepth { get; set; }

        [Description("N Concentration in irrigation water (ppm)")]
        public double NConc { get; set; }

        [EventSubscribe("DoManagement")]
        private void OnDoManagement(object sender, EventArgs e)
        {
            CalculateFASW();
            if (AutoIrrigationOn)
            {
                if (FASW < FASWThreshold)
                {
                    double amount = WaterDeficit * 10000.0 * NConc/1000000.0;
                    irrigation.Apply(WaterDeficit, depth: 0);
                    fertiliser.Apply(Amount: amount, Type: Fertiliser.Types.NO3N);
                }
            }
        }
        
        private void CalculateFASW()
        {
            double[] LL15 = MathUtilities.Multiply(soil.LL15, soil.Thickness);
            double[] DUL = MathUtilities.Multiply(soil.DUL, soil.Thickness);
        
            int nlayr = GetLayerIndex();
            double cumdep = MathUtilities.Sum(soil.Thickness, 0, nlayr, 0.0);

            double excess_fr = MathUtilities.Divide((cumdep - FASWDepth), soil.Thickness[nlayr], 0.0);

            // note that results may be strange if swdep < ll15
            double avail_sw = (MathUtilities.Sum(soil.Water, 0, nlayr, 0.0)
                              - excess_fr * soil.Water[nlayr])
                              - (MathUtilities.Sum(LL15, 0, nlayr, 0.0)
                              - excess_fr * LL15[nlayr]);


            double pot_avail_sw = (MathUtilities.Sum(DUL, 0, nlayr, 0.0)
                                  - excess_fr * DUL[nlayr])
                                  - (MathUtilities.Sum(LL15, 0, nlayr, 0.0)
                                  - excess_fr * LL15[nlayr]);

            FASW = MathUtilities.Divide(avail_sw, pot_avail_sw, 0.0);
            WaterDeficit = MathUtilities.Constrain(pot_avail_sw - avail_sw, 0.0, 100000);
        }

        private int GetLayerIndex()
        {
            double[] cumThickness = Soil.ToCumThickness(soil.Thickness);
            for (int i = 1; i < cumThickness.Length; i++)
            {
                if (FASWDepth < cumThickness[i])
                    return i - 1;
            }
            
            return cumThickness.Length - 1;
        }

    }
}
```
      Operations WeedSowing
        1991-07-01  [SCRUM].Sow(population: 100, cultivar: Barley_Autumn, depth: 10, rowSpacing: 150);
        1992-07-01  [SCRUM].Sow(population: 100, cultivar: Barley_Autumn, depth: 10, rowSpacing: 150);
        1993-07-01  [SCRUM].Sow(population: 100, cultivar: Barley_Autumn, depth: 10, rowSpacing: 150);
      Manager Harvesting
        Crop = .Simulations.Simulation.Plantation.SCRUM
```csharp
using System;
using Models.Core;
using Models.PMF;
using Models.Soils;
using Models.Soils.Nutrients;
using Models.Utilities;
using APSIM.Shared.Utilities;

namespace Models
{
    [Serializable] 
    public class Script : Model
    {
        [Description("Crop")]
        public IPlant Crop { get; set; }
        
        [EventSubscribe("DoManagement")]
        private void OnDoManagement(object sender, EventArgs e)
        {
            if (Crop.IsReadyForHarvesting)
            {
                Crop.Harvest();
                Crop.EndCrop();
            }
        }
    }
}
```
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