Simulations: Version=100
  DataStore
  Simulation EucalyptusRotation
    Memo
      This example grows a eucalypt rotation, with harvesting at 7 years of age and replanting and fertilising on the 1st August after each harvest.
    Weather: FileName=%root%\Examples\WeatherFiles\Curvelo.met
    Clock: Start=1995-07-01; End=2008-01-01
    Summary
    SoilArbitrator Soil Arbitrator
    Zone Plantation: Area=1; Slope=0; AspectAngle=0; Altitude=50
      Soil: Latitude=0; Longitude=0
        InitialWater Initial water: PercentMethod=1; FractionFull=0.9
        Physical
          Thickness  BD    AirDry  LL15  DUL   SAT
          100        1.5   0.01    0.05  0.16  0.29
          300        1.6   0.01    0.05  0.15  0.29
          600        1.68  0.01    0.05  0.14  0.29
          1000       1.75  0.02    0.05  0.13  0.29
          1000       1.7   0.05    0.05  0.12  0.29
          1000       1.7   0.05    0.05  0.12  0.29
          1000       1.7   0.05    0.05  0.12  0.29
          1000       1.7   0.05    0.05  0.12  0.29
          SoilCrop EucalyptusSoil: LL=[0.05, 0.05, 0.05, 0.05, 0.05, 0.05, 0.05, 0.05]; KL=[0.07, 0.07, 0.05, 0.02, 0.02, 0.02, 0.01, 0.01]; XF=[1, 1, 1, 1, 0.3, 0.2, 0.2, 0.2]
          SoilCrop SCRUMSoil: LL=[0.05, 0.05, 0.05, 0.05, 0.05, 0.05, 0.05, 0.05]; KL=[0.07, 0.07, 0.05, 0.02, 0.02, 0.02, 0.01, 0.01]; XF=[1, 1, 1, 0.7, 0.3, 0.2, 0, 0]
        WaterBalance SoilWater: SummerDate=1-Nov; SummerU=4; SummerCona=3.5; WinterDate=1-Apr; WinterU=4; WinterCona=3.5; DiffusConst=88; DiffusSlope=35.4; Salb=0.13; CN2Bare=65; CNRed=20; CNCov=0.8; Slope=0; DischargeWidth=0; CatchmentArea=0
          Thickness  SWCON  KLAT
          100        0.9    0
          300        0.9    0
          600        0.9    0
          1000       0.6    0
          1000       0.6    0
          1000       0.6    0
          1000       0.6    0
          1000       0.6    0
        Organic: FOMCNRatio=60
          Thickness  Carbon  SoilCNRatio  FBiom  FInert  FOM
          100        2       14.5         0.04   0.4     0.29407
          300        1       14.5         0.03   0.5     0.253108
          600        0.5     14.5         0.02   0.5     0.187507
          1000       0.2     14.5         0.01   0.5     0.113729
          1000       0.12    14.5         0.01   0.9     0.06898
          1000       0.1     14.5         0.01   0.99    0.0418385
          1000       0.1     14.5         0.01   0.99    0.0253763
          1000       0.1     14.5         0.01   0.99    0.0153915
        Chemical
          Thickness  NO3N  NH4N  PH
          100        0.1   0.01  5.8
          300        0.1   0.01  5.7
          600        0.1   0.01  5.7
          1000       0.01  0.01  5.9
          1000       0.01  0.01  5.7
          1000       0.01  0.01  5.7
          1000       0.01  0.01  5.7
          1000       0.01  0.01  5.7
        Sample Initial nitrogen: Thickness=[100, 300, 600, 1000, 1000, 1000, 1000, 1000]; SWUnits=Volumetric; OCUnits=Total; PHUnits=Water
        CERESSoilTemperature
        Nutrient
      Irrigation
      Fertiliser
      SurfaceOrganicMatter: InitialResidueName=Wheat; InitialResidueType=Wheat; InitialResidueMass=2000; InitialStandingFraction=0; InitialCPR=0; InitialCNR=80
      MicroClimate: a_interception=0; b_interception=1; c_interception=0; d_interception=0; soil_albedo=0.13; SoilHeatFluxFraction=0.4; MinimumHeightDiffForNewLayer=0; NightInterceptionFraction=0.5; ReferenceHeight=2
      Plant Eucalyptus
      Manager TreeManagement
        TimeSincePlanting = 0
        RowSpace = 3
        RowWidth = 3
        CultivarName = grandisCoffsHarbour
        PlantingDate = 1-aug
        HarvestAge = 7
        FertAmount = 100
```csharp
using APSIM.Shared.Utilities;
using Models.PMF;
using Models.Core;
using System;

namespace Models
{
    [Serializable] 
    [System.Xml.Serialization.XmlInclude(typeof(Model))]
    public class Script : Model
    {
        [Link] Plant Eucalyptus;
        [Link] Clock Clock;
        [Link] Fertiliser Fertiliser;

        public double TimeSincePlanting {get; set;}

        [Description("Spacing (m) between plants within rows")]
        public double RowSpace { get; set; }

        [Description("Spacing (m) between rows")]
        public double RowWidth { get; set; }

        [Description("Cultivar")]
        [Display(Type=DisplayType.CultivarName, PlantName = "Eucalyptus")]
        public string CultivarName { get; set; }

        [Description("Planting Date (dd-mmm)")]
        public String PlantingDate { get; set; }

        [Description("Harvest Age (years)")]
        public double HarvestAge { get; set; }

        [Description("Amount of fertiliser N to be applied at planting (kg N/ha)")]
        public double FertAmount { get; set; }

        [EventSubscribe("DoManagement")]
        private void OnDoManagement(object sender, EventArgs e)
        {
            double PlantPopulation = 1 / (RowWidth * RowSpace);
            double RowWidthmm = RowWidth * 1000;

            if (DateUtilities.WithinDates(PlantingDate, Clock.Today, PlantingDate) && !Eucalyptus.IsAlive)
            {
                Eucalyptus.Sow(population: PlantPopulation, 
                    cultivar: CultivarName, 
                    depth: 100, 
                    rowSpacing: RowWidthmm);
                TimeSincePlanting = 0;
                Fertiliser.Apply(Amount: FertAmount, Type: Fertiliser.Types.NO3N);
            }

            if (TimeSincePlanting > HarvestAge && Eucalyptus.IsAlive)
            {
               Eucalyptus.Harvest();
               Eucalyptus.EndCrop();         
               TimeSincePlanting = 0;  
            }

            TimeSincePlanting += 1.0/365.0;
        }
    }
}
```
      Report: EventNames=[Clock].DoReport
        VariableNames:
          [Clock].Today
          [TreeManagement].Script.TimeSincePlanting
          [Eucalyptus].Age
          [Eucalyptus].AboveGround.Wt
          [Eucalyptus].BelowGround.Wt
          [Eucalyptus].Total.Wt
          [Eucalyptus].Stem.Wt
          [Eucalyptus].FineRoot.Wt
          [Eucalyptus].CoarseRoot.Wt
          [Eucalyptus].Total.N
          [Eucalyptus].Branch.Wt
          [Eucalyptus].Wood.Wt
          [Eucalyptus].Leaf.Transpiration
          [Eucalyptus].Leaf.CoverGreen
          [Eucalyptus].Leaf.LAI
          [Eucalyptus].Stem.DBH
          [Eucalyptus].Stem.Ht
          [Eucalyptus].RootShootRatio
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