Simulations: Version=67
  Simulation Base (disabled)
    Clock: Start=2017-01-01; End=2017-01-10
    Summary
    Zone Field: Area=1; Slope=0
      Report: EventNames=[Clock].DoReport
        VariableNames:
          [Clock].Today
          [Clock].Today.DayOfYear as n
          sum of [Clock].Today.DayOfYear from [Clock].StartDate to [Clock].Today as TriangularNumbers
          sum of [Clock].Today.DayOfYear from [Clock].StartOfWeek to [Clock].EndOfWeek as WeeklyNumbers
          sum of [Clock].Today.DayOfYear from 1-Jan to 31-Dec as SigmaDay
          sum of [Clock].Today.DayOfYear from [Report].LastReportDate to [Clock].Today as sum
  Simulation OldTest (disabled)
    Clock: Start=2019-01-01; End=2019-03-01
    Summary
    Zone Field: Area=1; Slope=0
      Report: same as Base.Field.Report
      Report WeeklyReport: EventNames=[Clock].StartOfWeek
        VariableNames:
          [Clock].Today
          sum of [Clock].Today.DayOfYear from [Report].LastReportDate to [Clock].Today as sum
          sum of [Clock].Today.DayOfYear from [Clock].StartOfWeek to [Clock].Today as sum2
  Simulation Test
    Clock: Start=2017-01-01; End=2019-01-01
    Summary
    Zone Field: Area=1; Slope=0
      Report: EventNames=[Clock].DoReport
        VariableNames:
          [Clock].Today
          sum of [Clock].Today.DayOfYear from [Report].LastReportDate to [Clock].Today as sum
          sum of [Clock].Today.DayOfYear from [Clock].StartOfWeek to [Clock].Today as sum2
          sum of [Clock].Today.DayOfYear from [Clock].StartDate to [Clock].Today as TriangularNumbers
          sum of [Clock].Today.DayOfYear from 1-Jan to 31-Dec as SigmaDay
      Report WeeklyReport: EventNames=[Clock].StartOfWeek
        VariableNames:
          [Clock].Today
          sum of [Clock].Today.DayOfYear from [WeeklyReport].LastReportDate to [Clock].Today as sum
          sum of [Clock].Today.DayOfYear from [Clock].StartOfWeek to [Clock].Today as sum2
          sum of [Clock].Today.DayOfYear from [Clock].StartDate to [Clock].Today as TriangularNumbers
          sum of [Clock].Today.DayOfYear from 1-Jan to 31-Dec as SigmaDay
  DataStore
