Simulations: Version=221
  Memo Title page
    # APSIM Fodder Beet Model

    Khaembah E.N., Brown H.E., Zyskowski R., Chakwizira E., de Ruiter J.M., Teixeira E.I.

    The New Zealand Institute for Plant & Food Research Limited
    Private Bag 4704, Christchurch, New Zealand

    The APSIM Fodder Beet Model has been developed using the Plant Modelling Framework (PMF) of [#brown_plant_2014]. This framework provides a library of plant organ and process submodels that can be coupled, at runtime, to construct a model in much the same way that models can be coupled to construct a simulation. This means that dynamic composition of lower level process and organ classes (e.g. photosynthesis, leaf) into larger constructions (e.g. maize, barley, sorghum) can be achieved by the model developer without additional coding.

    The model consists of:

    * A phenology model to simulate development between growth phases
    * A structure model to simulate plant morphology
    * A collection of organs to simulate the various plant parts
    * An arbitrator to allocate resources (N, biomass) to various plant organs.
  DataStore
  Simulation
    Memo Trial details
      This represebts a Grazing trial at Ashley Dean, Canterbury, New Zealand

      Management and Data from
      Edwards, G.R., J.M., d.R., Dalley, D.E., Pinxterhuis, J.B., Cameron, K.C., Bryant, R.H., Di, H.J., Malcolm, B.J.and Chapman, D.F. 2014. Dry matter intake and body condition score change of dairy cows grazing fodder beet, kale and kale-oat forage systems in winter. Proceedings of the New Zealand Grassland Association 76: 81-88.
    Clock: Start=2012-10-20; End=2013-08-01
    Summary summaryfile
    Weather: FileName=WeatherFiles/NZ_Lincoln
    SoilArbitrator Soil Arbitrator
    Zone paddock: Area=1; Slope=0; AspectAngle=0; Altitude=50
      Soil Lismore: SoilType=NZ_sedementary; Region=Plains; State=Canterbury; Country=New Zealand; Latitude=0; Longitude=0
        DataSource=Generic profile descriptions provided by Trevor Webb and data for functional horizions based on SWAMP project results
        Comments=Bulk density values were measured on the fine earth fraction so values entered into apsim soil are adjusted down to account for stone content (assuming stones are inert from all soil process so their mass and volume is removed from model paramaters).  SAT, DUL, LL15 and Air dry have been adjusted down to account for stone content.  OC has not been adjusted so the model will get the correct carbon and N amounts using the adjusted BD.
        Chemical: Thickness=[200, 100, 300, 300, 300, 300]; PH=[6, 6, 6, 6, 6, 6]; PHUnits=Water
        Physical
          Thickness  BD     AirDry  LL15   DUL   SAT
          200        1.09   0.1     0.144  0.37  0.53
          100        1.09   0.136   0.136  0.37  0.53
          300        0.7    0.03    0.03   0.15  0.24
          300        0.455  0.014   0.014  0.15  0.24
          300        0.25   0.01    0.01   0.04  0.16
          300        0.25   0.01    0.01   0.04  0.16
          SoilCrop FodderBeetSoil
            LL=[0.144, 0.136, 0.03, 0.014, 0.01, 0.01]
            KL=[0.286157, 0.252188, 0.215147, 0.273159, 0.21174, 0.0303872]
            XF=[1, 1, 1, 1, 1, 1]
        WaterBalance SoilWater: SummerDate=1-Oct; SummerU=9; SummerCona=4.4; WinterDate=1-Apr; WinterU=6; WinterCona=3; DiffusConst=88; DiffusSlope=35; Salb=0.13; CN2Bare=73; CNRed=20; CNCov=0.8; PSIDul=-100; Thickness=[200, 100, 300, 300, 300, 300]; SWCON=[0.457632, 0.520003, 0.650583, 0.650598, 0.6506, 0.6506]
        Organic: FOMCNRatio=40; CarbonUnits=Total
          Thickness  Carbon    SoilCNRatio  FBiom      FInert    FOM
          200        2.88977   11           0.0333099  0.478186  367.071
          100        1.05591   11           0.0186614  0.681918  300.533
          300        0.807728  11           0.013031   0.811837  164.936
          300        0.800052  11           0.0106763  0.911118  90.5187
          300        0.8       11           0.0101651  0.956083  49.6777
          300        0.8       11           0.0100221  0.983924  27.2637
        Water: Thickness=[200, 100, 300, 300, 300, 300]; InitialValues=[0.37, 0.37, 0.15, 0.15, 0.04, 0.04]; FilledFromTop=true
        Nutrient
        Solute NO3: Thickness=[200, 100, 300, 300, 300, 300]; InitialValues=[12.5229, 20.9174, 0.571429, 6.73993, 12.2667, 1.33333]; InitialValuesUnits=ppm; WaterTableConcentration=0; D0=0; DepthConstant=0; MaxDepthSoluteAccessible=0; RunoffEffectivenessAtMovingSolute=0; MaxEffectiveRunoff=0
        Solute NH4: Thickness=[200, 100, 300, 300, 300, 300]; InitialValues=[1.97248, 6.97248, 1.95238, 1.97802, 3.2, 0.133333]; InitialValuesUnits=ppm; WaterTableConcentration=0; D0=0; DepthConstant=0; MaxDepthSoluteAccessible=0; RunoffEffectivenessAtMovingSolute=0; MaxEffectiveRunoff=0
        Solute Urea: Thickness=[200, 100, 300, 300, 300, 300]; InitialValues=[0, 0, 0, 0, 0, 0]; InitialValuesUnits=kg/ha; WaterTableConcentration=0; D0=0; DepthConstant=0; MaxDepthSoluteAccessible=0; RunoffEffectivenessAtMovingSolute=0; MaxEffectiveRunoff=0
        SoilTemperature Temperature: InteractionsPerDay=8
      Plant FodderBeet
      MicroClimate: a_interception=0; b_interception=1; c_interception=0; d_interception=0; SoilHeatFluxFraction=0.4; MinimumHeightDiffForNewLayer=0; NightInterceptionFraction=0.5; ReferenceHeight=2
      Irrigation
      Fertiliser
      SurfaceOrganicMatter surface organic matter: InitialResidueName=wheat; InitialResidueType=wheat; InitialResidueMass=0; InitialStandingFraction=0; InitialCPR=0; InitialCNR=80
      Folder Management
        Manager SowDateCv
          InitialRootDepth = 2
          CropToSow = Rivage
          SowingDate = 10/29/2012 00:00:00
```csharp
using Models.Soils;
using System.Linq;
using System;
using Models.Core;
using System.Collections.Generic;
using System.Text;
using Models.PMF;
using Models;
using System.Xml.Serialization;
using APSIM.Shared.Utilities;
using System.Data;
using Models.PMF.Interfaces;
using Models.Surface;

namespace Models
{
    [Serializable] 
    //[System.Xml.Serialization.XmlInclude(typeof(Model))]
    public class Script : Model
    {
        [Link(ByName = true)] Plant FodderBeet;
        [Link] Clock Clock;
        [Link] Zone zone;
        [Link] Simulation Simulation;
        [Link] SurfaceOrganicMatter SurfOM;
        
                
        [Description("Initial Root Depth")]
        public double InitialRootDepth { get; set; }
        [Description("Sown Crop")]
        [Display(Type=DisplayType.CultivarName, PlantName = "FodderBeet")]
        public string CropToSow { get; set; }
        [Description("Sowing Date")]
        public DateTime SowingDate { get; set; }
        
        
        
        [EventSubscribe("DoManagement")]
        private void OnDoManagement(object sender, EventArgs e)
        {
            if (Clock.Today.Date == SowingDate)
            {
                FodderBeet.Sow(cultivar: CropToSow, population: 9, depth: InitialRootDepth, rowSpacing: 500);
                
            }
                        
            
        }
    }
}
```
        Operations IrrigationEvents
          2012-12-23  [Irrigation].Apply(15);
          2013-01-06  [Irrigation].Apply(15);
          2013-01-13  [Irrigation].Apply(15);
          2013-01-20  [Irrigation].Apply(15);
          2013-01-27  [Irrigation].Apply(15);
          2013-02-06  [Irrigation].Apply(15);
          2013-02-13  [Irrigation].Apply(15);
          2013-02-20  [Irrigation].Apply(15);
          2013-02-27  [Irrigation].Apply(15);
          2013-03-04  [Irrigation].Apply(15);
        Operations NFertEvents
          2012-11-25  [Fertiliser].Apply(100, "UreaN",10);
          2013-01-25  [Fertiliser].Apply(69, "UreaN",10);
        Manager FungalInfection
          InfectionDate = 01/03/2015 00:00:00
          IsInfected = False
```csharp
using APSIM.Core;
using System.Xml.Serialization;
using APSIM.Shared.Utilities;
using Models.PMF;
using Models.Core;
using System;
using System.Linq;
using Models.Soils;
        
namespace Models
{
    [Serializable] 
    [System.Xml.Serialization.XmlInclude(typeof(Model))]
    public class Script : Model, IStructureDependency
    {
        [Link] private Plant FodderBeet;
        [Link] private Clock Clock;
        [Link] private Zone zone;
        [Link] private Summary Summary;
        public IStructure Structure { private get; set; }


        [Description(" Date of Infection")]
        public DateTime InfectionDate { get; set; }
        [Description("Is Infected")]
        public bool IsInfected  {get; set;}    


        

        [EventSubscribe("DoManagement")]
        private void OnDoManagement(object sender, EventArgs e)
        {
            

            if (IsInfected == true) // an infected crop
              if (InfectionDate == Clock.Today)
               {
                Structure.Set("FodderBeet.Leaf.CohortParameters.SenescenceDuration.BaseValue.FixedValue", 600, relativeTo: zone);
                Summary.WriteMessage(this,"Fodder beet infected with fugal disease", MessageType.Diagnostic);
                }
            
        }
        
    }
}
```
      Report: EventNames=[Clock].DoReport
        VariableNames:
          [Clock].Today
          [FodderBeet].Leaf.Fw
          [FodderBeet].Leaf.Fn
          [FodderBeet].Phenology.CurrentPhase.Name
          [FodderBeet].Phenology.Stage
          [FodderBeet].Phenology.ThermalTime
          [FodderBeet].Phenology.AccumulatedThermalTime
          [FodderBeet].Leaf.Live.Wt
          [FodderBeet].Petiole.Live.Wt
          [FodderBeet].StorageRoot.Live.Wt
          [FodderBeet].Leaf.LAI
          [FodderBeet].Structure.LeafTipsAppeared
          [FodderBeet].Leaf.PlantAppearedLeafNo
          [FodderBeet].Leaf.PlantAppearedGreenLeafNo
          [FodderBeet].Leaf.PlantsenescedLeafNo
          [FodderBeet].Leaf.CoverGreen
          [FodderBeet].Leaf.CohortParameters.MaxArea
          [FodderBeet].AboveGround.Wt
          [FodderBeet].Leaf.Photosynthesis.RadnInt
          [FodderBeet].Leaf.Photosynthesis.RUEact
          [FodderBeet].Leaf.Live.N
          [FodderBeet].Root.Live.N
          [FodderBeet].StorageRoot.Live.N
          [FodderBeet].Petiole.Live.N
          [FodderBeet].Leaf.Live.NConc
          [FodderBeet].Root.Live.NConc
          [FodderBeet].SCS
    Manager GrazeForageCrop
      Genotype = Friesian
      Sex = Female
      Age = 36
      Weight = 520
      Pregnant = 0
      Lactating = 0
      YoungNumber = 0
      YoungWt = 0
      StockingRate = 50
      InitialLocation = Away
      PreGrazingDM = 2800
      PostGrazingDM = 5
      DoNoGrazingWindow = True
      NoGrazeStart = 1-Nov
      NoGrazeEnd = 30-may
```csharp
using Models.Soils.Nutrients;
using System;
using Models;
using Models.Core;
using Models.Utilities;
using Models.GrazPlan;
using APSIM.Shared.Utilities;
using System.Xml.Serialization;
using Models.PMF;
using Models.Soils;
using Models.Soils.Nutrients;
using System.Collections;
using System.Collections.Generic;
using System.Linq;
using Models.AgPasture;
using System.Diagnostics;

namespace Models
{

    [Serializable]
    public class Script : Model
    {
        [Link] Clock clock;
        [Link] Stock stock;
        [Link] List<Zone> paddocks;
        [Link] ISummary summary;
        [Link] Simulation farm;

        private int CurrentGroupNum = 1;    // animal group number
        private int CurrentLocationNum { get; set; }
        public string CurrentLocation { get; set; }

        public enum Genotypes
        {
            SmallMerino,
            Angus,
            Friesian
        }

        [Separator("Stock type info, the same type of stock are brought onto the paddock at each grazing")]

        [Description("Stock: genotype (e.g. Small Merino, Angus, Friesian):")] 
        public Genotypes Genotype { get; set; }

        [Description("Stock: sex (Female, Male, Castrate):")] 
        public ReproductiveType Sex { get; set; }

        [Description("Stock: age (months):")] 
        public double Age { get; set; }

        [Description("Stock: weight (kg liveweight /head):")] 
        public double Weight { get; set; }

        [Description("Stock: fertility status (0 if non-pregnant or days since conception):")] 
        public int Pregnant { get; set; }

        [Description("Stock: lactation status (0 if non-lactating or days since parturition):")]
        public int Lactating { get; set; }

        [Description("Stock: number of unweaned young:")]
        public int YoungNumber { get; set; }

        [Description("Stock: weight of unweaned young:")] 
        public double YoungWt { get; set; }

        [Separator("Grazing type info")]

        [Description("Paddock stocking rate (head/ha): ")] 
        public double StockingRate { get; set; }

        [Description("Initial location of the cows (give either the paddock name or 'Away'): ")] 
        public string InitialLocation { get; set; }

        [Description("Standing biomass at which to bring the stock into the simulation (kg DM/ha): ")] 
        public double PreGrazingDM { get; set; }

        [Description("Standing biomass at which to exit  stock from the simulation (kg DM/ha): ")] 
        public double PostGrazingDM { get; set; }

        [Description("Implement a no-grazing window? (tick for yes): ")] 
        public bool DoNoGrazingWindow { get; set; }

        [Description("Start of the no-grazing window (dd-MMM)")] 
        public string NoGrazeStart { get; set; }

        [Description("End of the no-grazing window (dd-MMM)")] 
        public string NoGrazeEnd { get; set; }


        public int NumStock { get; set; }
        // number of cows on the whole farm
        public bool GrazingSeasonIsOpen { get; set; }


        [EventSubscribe("StartOfSimulation")]
        private void OnStartOfSimulation(object sender, EventArgs e)
        {

            //Debugger.Break();

            summary.WriteMessage(this, "Initialising the paddock information", MessageType.Diagnostic);

            NumStock = (int)(Math.Round(StockingRate * farm.Area, 0));
            CurrentLocation = InitialLocation;
            if (CurrentLocation.ToLower() != "away")
            {
                BuyStock();
                stock.Move(CurrentLocation);
                summary.WriteMessage(this, " The Stock have been moved to " + CurrentLocation, MessageType.Diagnostic);
            }

            summary.WriteMessage(this, "     The number of animals has been rounded to " + NumStock + " from " + (StockingRate * farm.Area), MessageType.Diagnostic);
            summary.WriteMessage(this, "     The animals will begin in " + CurrentLocation + " which is paddock number " + CurrentLocationNum + " in the simulation", MessageType.Diagnostic);
            summary.WriteMessage(this, "     The area of the whole farm is " + farm.Area + " ha", MessageType.Diagnostic);

        }

        [EventSubscribe("DoManagement")]
        private void OnDoManagement(object sender, EventArgs e)
        {
            GrazingSeasonIsOpen = true;
            if (DoNoGrazingWindow)
                GrazingSeasonIsOpen = !DateUtilities.WithinDates(NoGrazeStart, clock.Today, NoGrazeEnd);

            bool sellSomeStock = false;
            if (!GrazingSeasonIsOpen)
                sellSomeStock = true;

            double harvestableBiomass = paddocks[0].Plants.Sum(plant => plant.AboveGround.Wt * 10);
            if (harvestableBiomass <= PostGrazingDM)
                sellSomeStock = true;

            if (CurrentLocation == "Away")
                sellSomeStock = false;

            if (CurrentLocation == "Away" && harvestableBiomass >= PreGrazingDM && GrazingSeasonIsOpen)
            {
                CurrentLocation = paddocks[0].Name;
                CurrentLocationNum = paddocks[0].Index;
                BuyStock();
                stock.Move(CurrentLocation);
                summary.WriteMessage(this, "     Buying stock ", MessageType.Diagnostic);
            }

            if (sellSomeStock)
            {
                CurrentLocation = "Away";
                CurrentLocationNum = -1;
                SellStock();
                summary.WriteMessage(this, "     Selling stock ", MessageType.Diagnostic);
            }

        }


        public void BuyStock()
        {
            CurrentGroupNum = stock.NoGroups + 1;
            StockBuy purchase = new StockBuy();
            purchase.Genotype = ReflectionUtilities.EnumToString(Genotype);
            purchase.Number = NumStock;
            purchase.Sex = Sex;
            purchase.Age = Age;       // age in months
            purchase.Weight = Weight;  // live weight in kg
            purchase.UseTag = CurrentGroupNum + 1;
            purchase.MatedTo = purchase.Genotype;
            purchase.Pregnant = Pregnant;  // days pregnant, 0 = non pregnant, 1 = pregnant
            purchase.Lactating = Lactating;  // 0 for dry, 1 for lactating
            purchase.NumYoung = YoungNumber;
            purchase.YoungWt = YoungWt;

            stock.Buy(purchase);
        }

        public void SellStock()
        {
            int NumGroups = stock.NoGroups;

            NumGroups = stock.NoGroups;
            foreach (var animalGroup in stock.AnimalGroups)
            {
                stock.Sell(animalGroup.NoAnimals, animalGroup);
            }
        }
    }
}
```
    Stock: RandSeed=9999
    Forages
      Parameters:
        Name                          LiveDigestibility  DeadDigestibility  LiveFractionConsumable  DeadFractionConsumable  LiveMinimumBiomass  DeadMinimumBiomass
        FodderBeet.StorageRoot        0.7                0.3                1                       1                       100                 0
        FodderBeet.Leaf               0.7                0.3                1                       1                       100                 0
        FodderBeet.Petiole            0.7                0.3                1                       1                       100                 0
        FodderBeet.Root               0.7                0.3                1                       1                       100                 0
        SurfaceOrganicMatter.Residue  0.7                0.3                1                       1                       100                 0
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