Simulations: Version=46
  Morris
    simulationNames=[Simulation1, Simulation2, Simulation3, Simulation4, Simulation5, Simulation6, Simulation7, Simulation8, Simulation9, Simulation10, Simulation11, Simulation12, Simulation13, Simulation14, Simulation15, Simulation16, Simulation17, Simulation18, Simulation19, Simulation20, Simulation21, Simulation22, Simulation23, Simulation24, Simulation25, Simulation26, Simulation27, Simulation28, Simulation29, Simulation30, Simulation31, Simulation32, Simulation33, Simulation34, Simulation35, Simulation36, Simulation37, Simulation38, Simulation39, Simulation40, Simulation41, Simulation42, Simulation43, Simulation44, Simulation45, Simulation46, Simulation47, Simulation48, Simulation49, Simulation50, Simulation51, Simulation52, Simulation53, Simulation54, Simulation55, Simulation56, Simulation57, Simulation58, Simulation59, Simulation60, Simulation61, Simulation62, Simulation63, Simulation64, Simulation65, Simulation66, Simulation67, Simulation68, Simulation69, Simulation70, Simulation71, Simulation72, Simulation73, Simulation74, Simulation75, Simulation76, Simulation77, Simulation78, Simulation79, Simulation80, Simulation81, Simulation82, Simulation83, Simulation84, Simulation85, Simulation86, Simulation87, Simulation88, Simulation89, Simulation90, Simulation91, Simulation92, Simulation93, Simulation94, Simulation95, Simulation96, Simulation97, Simulation98, Simulation99, Simulation100, Simulation101, Simulation102, Simulation103, Simulation104, Simulation105, Simulation106, Simulation107, Simulation108, Simulation109, Simulation110, Simulation111, Simulation112, Simulation113, Simulation114, Simulation115, Simulation116, Simulation117, Simulation118, Simulation119, Simulation120, Simulation121, Simulation122, Simulation123, Simulation124, Simulation125, Simulation126, Simulation127, Simulation128, Simulation129, Simulation130, Simulation131, Simulation132, Simulation133, Simulation134, Simulation135, Simulation136, Simulation137, Simulation138, Simulation139, Simulation140, Simulation141, Simulation142, Simulation143, Simulation144, Simulation145, Simulation146, Simulation147, Simulation148, Simulation149, Simulation150, Simulation151, Simulation152, Simulation153, Simulation154, Simulation155, Simulation156, Simulation157, Simulation158, Simulation159, Simulation160, Simulation161, Simulation162, Simulation163, Simulation164, Simulation165, Simulation166, Simulation167, Simulation168, Simulation169, Simulation170, Simulation171, Simulation172, Simulation173, Simulation174, Simulation175, Simulation176, Simulation177, Simulation178, Simulation179, Simulation180, Simulation181, Simulation182, Simulation183, Simulation184, Simulation185, Simulation186, Simulation187, Simulation188, Simulation189, Simulation190, Simulation191, Simulation192, Simulation193, Simulation194, Simulation195, Simulation196, Simulation197, Simulation198, Simulation199, Simulation200, Simulation201, Simulation202, Simulation203, Simulation204, Simulation205, Simulation206, Simulation207, Simulation208, Simulation209, Simulation210, Simulation211, Simulation212, Simulation213, Simulation214, Simulation215, Simulation216, Simulation217, Simulation218, Simulation219, Simulation220, Simulation221, Simulation222, Simulation223, Simulation224, Simulation225, Simulation226, Simulation227, Simulation228, Simulation229, Simulation230, Simulation231, Simulation232, Simulation233, Simulation234, Simulation235, Simulation236, Simulation237, Simulation238, Simulation239, Simulation240, Simulation241, Simulation242, Simulation243, Simulation244, Simulation245, Simulation246, Simulation247, Simulation248, Simulation249, Simulation250, Simulation251, Simulation252, Simulation253, Simulation254, Simulation255, Simulation256, Simulation257, Simulation258, Simulation259, Simulation260, Simulation261, Simulation262, Simulation263, Simulation264, Simulation265, Simulation266, Simulation267, Simulation268, Simulation269, Simulation270, Simulation271, Simulation272, Simulation273, Simulation274, Simulation275, Simulation276, Simulation277, Simulation278, Simulation279, Simulation280, Simulation281, Simulation282, Simulation283, Simulation284, Simulation285, Simulation286, Simulation287, Simulation288, Simulation289, Simulation290, Simulation291, Simulation292, Simulation293, Simulation294, Simulation295, Simulation296, Simulation297, Simulation298, Simulation299, Simulation300, Simulation301, Simulation302, Simulation303, Simulation304, Simulation305, Simulation306, Simulation307, Simulation308, Simulation309, Simulation310, Simulation311, Simulation312, Simulation313, Simulation314, Simulation315, Simulation316, Simulation317, Simulation318, Simulation319, Simulation320, Simulation321, Simulation322, Simulation323, Simulation324, Simulation325, Simulation326, Simulation327, Simulation328, Simulation329, Simulation330, Simulation331, Simulation332, Simulation333, Simulation334, Simulation335, Simulation336, Simulation337, Simulation338, Simulation339, Simulation340, Simulation341, Simulation342, Simulation343, Simulation344, Simulation345, Simulation346, Simulation347, Simulation348, Simulation349, Simulation350, Simulation351, Simulation352, Simulation353, Simulation354, Simulation355, Simulation356, Simulation357, Simulation358, Simulation359, Simulation360, Simulation361, Simulation362, Simulation363, Simulation364, Simulation365, Simulation366, Simulation367, Simulation368, Simulation369, Simulation370, Simulation371, Simulation372, Simulation373, Simulation374, Simulation375, Simulation376, Simulation377, Simulation378, Simulation379, Simulation380, Simulation381, Simulation382, Simulation383, Simulation384, Simulation385, Simulation386, Simulation387, Simulation388, Simulation389, Simulation390, Simulation391, Simulation392, Simulation393, Simulation394, Simulation395, Simulation396, Simulation397, Simulation398, Simulation399, Simulation400, Simulation401, Simulation402, Simulation403, Simulation404, Simulation405, Simulation406, Simulation407, Simulation408, Simulation409, Simulation410, Simulation411, Simulation412, Simulation413, Simulation414, Simulation415, Simulation416, Simulation417, Simulation418, Simulation419, Simulation420, Simulation421, Simulation422, Simulation423, Simulation424, Simulation425, Simulation426, Simulation427, Simulation428, Simulation429, Simulation430, Simulation431, Simulation432, Simulation433, Simulation434, Simulation435, Simulation436, Simulation437, Simulation438, Simulation439, Simulation440, Simulation441, Simulation442, Simulation443, Simulation444, Simulation445, Simulation446, Simulation447, Simulation448, Simulation449, Simulation450, Simulation451, Simulation452, Simulation453, Simulation454, Simulation455, Simulation456, Simulation457, Simulation458, Simulation459, Simulation460, Simulation461, Simulation462, Simulation463, Simulation464, Simulation465, Simulation466, Simulation467, Simulation468, Simulation469, Simulation470, Simulation471, Simulation472, Simulation473, Simulation474, Simulation475, Simulation476, Simulation477, Simulation478, Simulation479, Simulation480, Simulation481, Simulation482, Simulation483, Simulation484, Simulation485, Simulation486, Simulation487, Simulation488, Simulation489, Simulation490, Simulation491, Simulation492, Simulation493, Simulation494, Simulation495, Simulation496, Simulation497, Simulation498, Simulation499, Simulation500, Simulation501, Simulation502, Simulation503, Simulation504, Simulation505, Simulation506, Simulation507, Simulation508, Simulation509, Simulation510, Simulation511, Simulation512, Simulation513, Simulation514, Simulation515, Simulation516, Simulation517, Simulation518, Simulation519, Simulation520, Simulation521, Simulation522, Simulation523, Simulation524, Simulation525, Simulation526, Simulation527, Simulation528, Simulation529, Simulation530, Simulation531, Simulation532, Simulation533, Simulation534, Simulation535, Simulation536, Simulation537, Simulation538, Simulation539, Simulation540, Simulation541, Simulation542, Simulation543, Simulation544, Simulation545, Simulation546, Simulation547, Simulation548, Simulation549, Simulation550, Simulation551, Simulation552, Simulation553, Simulation554, Simulation555, Simulation556, Simulation557, Simulation558, Simulation559, Simulation560, Simulation561]
    Simulation Base
      Clock: StartDate=1900-01-01; EndDate=1900-12-31
      Summary SummaryFile
      Weather: FileName=%root%\Examples\WeatherFiles\Dalby.met
      SoilArbitrator
      Zone Field: Area=1; Slope=0
        Report: EventNames=[Wheat].Harvesting
          VariableNames:
            [Clock].Today
            [Wheat].Phenology.Zadok.Stage
            [Wheat].Phenology.CurrentStageName
            [Wheat].AboveGround.Wt
            [Wheat].AboveGround.N
            [Wheat].Grain.Total.Wt*10 as Yield
            [Wheat].Grain.Protein
            [Wheat].Grain.Size
            [Wheat].Grain.Number
            [Wheat].Grain.Total.Wt
            [Wheat].Grain.Total.N
            [Wheat].Total.Wt
        Fertiliser
        Soil: ASCOrder=Vertosol; ASCSubOrder=Black; SoilType=Clay; Site=Norwin; NearestTown=Norwin; Region=Darling Downs and Granite Belt; State=Queensland; Country=Australia; NaturalVegetation=Qld. Bluegrass, possible Qld. Blue gum; ApsoilNumber=900; Latitude=-27.581836; Longitude=151.320206; LocationAccuracy=+/- 20m
          DataSource=CSIRO Sustainable Ecosystems, Toowoomba; Characteriesd as part of the GRDC funded project"Doing it better, doing it smarter, managing soil water in Australian agriculture' 2011
          Comments=OC, CLL for all crops estimated-based on Bongeen Mywybilla Soil No1
          Water
            Thickness  BD       AirDry    LL15      DUL       SAT       KS
            150        1.01056  0.13025   0.2605    0.521     0.588655  20
            150        1.07146  0.198689  0.248362  0.496723  0.565677  20
            300        1.09394  0.28      0.28      0.488438  0.557193  20
            300        1.15861  0.28      0.28      0.480297  0.532787  20
            300        1.17301  0.28      0.28      0.471584  0.527354  20
            300        1.16287  0.28      0.28      0.457071  0.53118   20
            300        1.1875   0.28      0.28      0.452332  0.521888  20
            SoilCrop WheatSoil: LL=[0.261, 0.248, 0.28, 0.306, 0.36, 0.392, 0.446]; KL=[0.06, 0.06, 0.06, 0.04, 0.04, 0.02, 0.01]; XF=[1, 1, 1, 1, 1, 1, 1]
          SoilWater: SummerDate=1-Nov; SummerU=5; SummerCona=5; WinterDate=1-Apr; WinterU=5; WinterCona=5; DiffusConst=40; DiffusSlope=16; Salb=0.12; CN2Bare=73; CNRed=20; CNCov=0.8; max_pond=0; Thickness=[150, 150, 300, 300, 300, 300, 300]; SWCON=[0.3, 0.3, 0.3, 0.3, 0.3, 0.3, 0.3]; ResidueInterception=0
          SoilNitrogen: fom_type=[default, manure, mucuna, lablab, shemp, stable]; fract_carb=[0.2, 0.3, 0.54, 0.57, 0.45, 0]; fract_cell=[0.7, 0.3, 0.37, 0.37, 0.47, 0.1]; fract_lign=[0.1, 0.4, 0.09, 0.06, 0.08, 0.9]
          SoilOrganicMatter: RootCN=40; RootWt=1000; SoilCN=12; EnrACoeff=7.4; EnrBCoeff=0.2; OCUnits=Total
            Thickness  OC    FBiom  FInert
            150        1.2   0.04   0.4
            150        0.96  0.02   0.6
            300        0.6   0.02   0.8
            300        0.3   0.02   1
            300        0.18  0.01   1
            300        0.12  0.01   1
            300        0.12  0.01   1
          Analysis: Thickness=[150, 150, 300, 300, 300, 300, 300]; PH=[8, 8, 8, 8, 8, 8, 8]; PHUnits=Water; BoronUnits=HotWater
          InitialWater: PercentMethod=EvenlyDistributed; FractionFull=1
          Sample InitialN: NO3Units=ppm; NH4Units=ppm; SWUnits=Volumetric; OCUnits=Total; PHUnits=Water
            Thickness  NO3  NH4
            150        1    0.1
            150        1    0.1
            300        1    0.1
            300        1    0.1
            300        1    0.1
            300        1    0.1
            300        1    0.1
          CERESSoilTemperature
        SurfaceOrganicMatter: InitialResidueName=wheat_stubble; InitialResidueType=wheat; InitialResidueMass=500; InitialStandingFraction=0; InitialCPR=0; InitialCNR=100; FractionFaecesAdded=0.5
        Plant Wheat: CropType=Wheat
        MicroClimate: a_interception=0; b_interception=1; c_interception=0; d_interception=0; soil_albedo=0.3; SoilHeatFluxFraction=0.4; NightInterceptionFraction=0.5; ReferenceHeight=2
        Manager SowingFertiliser
          Amount = 160
          CropName = wheat
```csharp
using System;
using Models.Core;
using Models.PMF;
namespace Models
{
    [Serializable]
    public class Script : Model
    {
        [Link] Clock Clock;
        [Link] Fertiliser Fertiliser;
        [Link] Summary Summary;
        
        
        [Description("Amount of fertiliser to be applied (kg/ha)")]
        public double Amount { get; set;}
        
        [Description("Crop to be fertilised")]
        public string CropName { get; set;}
        
        
        

        [EventSubscribe("Sowing")]
        private void OnSowing(object sender, EventArgs e)
        {
            Model crop = sender as Model;
            if (crop.Name.ToLower()==CropName.ToLower())
                Fertiliser.Apply(Amount: Amount, Type: Fertiliser.Types.NO3N);
        }
        
    }
}
```
        Manager Harvest
```csharp
using System;
using Models.Core;
using Models.PMF;
using Models.Soils;
using Models.Utilities;
using APSIM.Shared.Utilities;

namespace Models
{
    [Serializable]
    public class Script : Model
    {
        [Link] Plant Wheat;

        [EventSubscribe("DoManagement")]
        private void OnDoManagement(object sender, EventArgs e)
        {
            if (Wheat.IsReadyForHarvesting)
            {
               Wheat.Harvest();
               Wheat.EndCrop();    
            }
        
        }
        
    }
}
```
        SoluteManager
        Manager SowingRule1
          StartDate = 1-may
          EndDate = 10-jul
          MinESW = 100
          MinRain = 25
          RainDays = 7
          CultivarName = Hartog
          SowingDepth = 30
          RowSpacing = 250
          Population = 120
```csharp
using System;
using Models.Core;
using Models.PMF;
using Models.Soils;
using Models.Utilities;
using APSIM.Shared.Utilities;

namespace Models
{
    [Serializable]
    public class Script : Model
    {
        [Link] Clock Clock;
        [Link] Fertiliser Fertiliser;
        [Link] Summary Summary;
        [Link] Plant Wheat;
        [Link] Soil Soil; 
        Accumulator accumulatedRain;
        
        [Description("Start of sowing window (d-mmm)")]
        public string StartDate { get; set;}
        [Description("End of sowing window (d-mmm)")]
        public string EndDate { get; set;}
        [Description("Minimum extractable soil water for sowing (mm)")]
        public double MinESW { get; set;}
        [Description("Accumulated rainfall required for sowing (mm)")]
        public double MinRain { get; set;}
        [Description("Duration of rainfall accumulation (d)")]
        public int RainDays { get; set;}
        [Description("Cultivar to be sown")]
        [Display(Type=DisplayType.CultivarName)]
        public string CultivarName { get; set;}
        [Description("Sowing depth (mm)")]
        public double SowingDepth { get; set;}        
        [Description("Row spacing (mm)")]
        public double RowSpacing { get; set;}    
        [Description("Plant population (/m2)")]
        public double Population { get; set;}    
        
        
        [EventSubscribe("Commencing")]
        private void OnSimulationCommencing(object sender, EventArgs e)
        {
            accumulatedRain = new Accumulator(this, "[Weather].Rain", RainDays);
        }
        

        [EventSubscribe("DoManagement")]
        private void OnDoManagement(object sender, EventArgs e)
        {
            accumulatedRain.Update();
            
            if (DateUtilities.WithinDates(StartDate,Clock.Today,EndDate) &&
                !Wheat.IsAlive &&
                MathUtilities.Sum(Soil.SoilWater.ESW) > MinESW &&
                accumulatedRain.Sum > MinRain)
            {
               Wheat.Sow(population:Population, cultivar:CultivarName, depth:SowingDepth, rowSpacing:RowSpacing);    
            }
        
        }
        
    }
}
```
  DataStore
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