Simulations: Version=24
  Simulation OilPalm
    Weather: FileName=%root%\Examples\WeatherFiles\Popondetta.met
    Clock: StartDate=1996-03-01; EndDate=2010-09-29
    Summary
    Zone Block: Area=1; Slope=0
      Fertiliser
      SurfaceOrganicMatter SurfaceOM: PoolName=oilpalm oilpalmstem; type=oilpalm oilpalmstem; mass=24000 63000; standing_fraction=0 0; cnr=39 145; CriticalResidueWeight=2000; OptimumDecompTemp=20; MaxCumulativeEOS=20; CNRatioDecompCoeff=0.277; CNRatioDecompThreshold=25; TotalLeachRain=25; MinRainToLeach=10; CriticalMinimumOrganicC=0.004; DefaultCPRatio=0; DefaultStandingFraction=0; StandingExtinctCoeff=0.5; FractionFaecesAdded=0.5
        Pools:
          PoolName     ResidueType  Mass   CNRatio  StandingFraction
          oilpalm      oilpalm      24000  39       0
          oilpalmstem  oilpalmstem  63000  145      0
        ResidueTypes: LoadFromResource=ResidueTypes
        TillageTypes TillageTypesList
      Soil: SoilType=Higaturu Series; Site=Sangara Estate; NearestTown=Popondetta; Region=Oro Province; Country=PNG; Latitude=0; Longitude=0
        Water
          Thickness  BD    AirDry  LL15   DUL    SAT
          100        1.22  0.127   0.38   0.48   0.53
          200        1.22  0.127   0.38   0.48   0.53
          300        1.43  0.1     0.3    0.4    0.45
          300        1.14  0.137   0.41   0.51   0.56
          300        1.15  0.135   0.406  0.506  0.556
          300        1.15  0.135   0.406  0.506  0.556
          500        1.43  0.1     0.3    0.4    0.45
          500        1.43  0.1     0.3    0.4    0.45
          500        1.43  0.1     0.3    0.4    0.45
          500        1.43  0.1     0.3    0.4    0.45
          500        1.43  0.1     0.3    0.4    0.45
          1000       1.43  0.1     0.3    0.4    0.45
          SoilCropOilPalm OilPalmSoil: XF=[1, 1, 1, 1, 1, 1, 1, 1, 1, 0, 0, 0]
            KL=[0.06, 0.04, 0.03, 0.02, 0.02, 0.02, 0.01, 0.01, 0.01, 0, 0, 0]
        SoilWater: SummerDate=1-Nov; SummerU=5; SummerCona=5; WinterDate=1-Apr; WinterU=5; WinterCona=5; DiffusConst=88; DiffusSlope=35.4; Salb=0.18; CN2Bare=68; CNRed=20; CNCov=0.8; slope=0; discharge_width=0; catchment_area=0; max_pond=0; residueinterception=0
          Thickness  SWCON  KLAT
          100        0.7    0
          200        0.7    0
          300        0.7    0
          300        0.7    0
          300        0.7    0
          300        0.7    0
          500        0.5    0
          500        0.5    0
          500        0.5    0
          500        0.5    0
          500        0.5    0
          1000       0.5    0
        SoilNitrogen: fom_type=[default, manure, mucuna, lablab, shemp, stable]; fract_carb=[0.2, 0.3, 0.54, 0.57, 0.45, 0]; fract_cell=[0.7, 0.3, 0.37, 0.37, 0.47, 0.1]; fract_lign=[0.1, 0.4, 0.09, 0.06, 0.08, 0.9]
        SoilOrganicMatter: RootCN=30; RootWt=3000; SoilCN=12; EnrACoeff=7.4; EnrBCoeff=0.2; OCUnits=Total
          Thickness  OC    FBiom  FInert
          100        2.1   0.04   0.24
          100        1.06  0.03   0.47
          100        0.65  0.015  0.77
          300        0.5   0.01   0.95
          300        0.4   0.01   0.99
          600        0.4   0.01   0.99
          500        0.4   0.01   0.99
          500        0.4   0.01   0.99
          500        0.4   0.01   0.99
          500        0.4   0.01   0.99
          500        0.4   0.01   0.99
          1000       0.4   0.01   0.99
        Analysis: PHUnits=Water; BoronUnits=HotWater
          Thickness=[100, 200, 300, 300, 300, 300, 500, 500, 500, 500, 500, 1000]
          PH=[6.3, 6.4, 6.7, 6.8, 6.8, 6.8, 6.8, 6.8, 6.8, 6.8, 6.8, 6.8]
        InitialWater: PercentMethod=EvenlyDistributed; FractionFull=1
        Sample InitialNitrogen: NO3Units=ppm; NH4Units=ppm; SWUnits=Volumetric; OCUnits=Total; PHUnits=Water
          Thickness  NO3  NH4
          100        5    0
          200        5    0
          300        1    0
          300        1    0
          300        1    0
          300        0    0
          500        0    0
          500        0    0
          500        0    0
          500        0    0
          500        0    0
          1000       0    0
        CERESSoilTemperature
      Report AnnualOutput: EventNames=[Clock].EndOfYear
        VariableNames:
          [Clock].Today
          [Clock].Today.Year
          [OilPalm].Age
          [OilPalm].LAI
          sum of [Weather].Rain from 1-Jan to 31-Dec as AnnualRain
          sum of [Soil].SoilWater.Eo from 1-Jan to 31-Dec as AnnualPotentialEvaporation
          sum of [Irrigation].IrrigationApplied from 1-Jan to 31-Dec as AnnualIrrigation
          sum of [Fertiliser].NitrogenApplied from 1-Jan to 31-Dec as AnnualFertiliserNAdded
          sum of [Soil].SoilWater.LeachNO3 from 1-Jan to 31-Dec as AnnualNLeaching
          sum of sum([Soil].SoilNitrogen.Denitrification) from 1-Jan to 31-Dec as AnnualDenitrification
          sum of sum([Soil].SoilNitrogen.n2o_atm) from 1-Jan to 31-Dec as AnnualN2O
          sum of ([OilPalm].UnderstoryNFixation+[Fertiliser].NitrogenApplied) from 1-Jan to 31-Dec as AnnualTotalNInput
          [Calculations].Script.AnnualFronds
          [Calculations].Script.AnnualBunches
          [Calculations].Script.AnnualYield
          [Calculations].Script.AnnualBunchSize
          [Calculations].Script.AnnualET
          sum of [OilPalm].UnderstoryDltDM*10 from 1-Jan to 31-Dec as AnnualUnderstoryNPP
          sum of [OilPalm].UnderstoryNFixation from 1-Jan to 31-Dec as AnnualUnderstoryNFixation
          sum of sum([OilPalm].UnderstoryNUptake) from 1-Jan to 31-Dec as AnnualUnderstoryNUptake
          sum of sum([OilPalm].NUptake) from 1-Jan to 31-Dec as AnnualPalmNUptake
          sum of [OilPalm].RootGrowth*10 from 1-Jan to 31-Dec as AnnualRootNPP
          sum of [OilPalm].StemGrowth*10 from 1-Jan to 31-Dec as AnnualStemNPP
          sum of [OilPalm].FrondGrowth*10 from 1-Jan to 31-Dec as AnnualFrondNPP
          sum of [OilPalm].BunchGrowth*10 from 1-Jan to 31-Dec as AnnualBunchNPP
          sum of (([OilPalm].RootGrowth+[OilPalm].StemGrowth+[OilPalm].FrondGrowth+[OilPalm].UnderstoryDltDM)*10) from 1-Jan to 31-Dec as AnnualTotalVegetativeNPP
          sum of (([OilPalm].RootGrowth+[OilPalm].StemGrowth+[OilPalm].FrondGrowth)*10) from 1-Jan to 31-Dec as AnnualPalmVegetativeNPP
          [Calculations].Script.AnnualNRemoved
          avg of sum([Soil].SoilNitrogen.NO3) from 1-Jan to 31-Dec as AnnualAverageNO3
          avg of [SurfaceOM].Wt from 1-Jan to 31-Dec as AnnualLitterMass
          avg of [SurfaceOM].N from 1-Jan to 31-Dec as AnnualLitterN
      Report MonthlyOutput: EventNames=[Clock].StartOfMonth
        VariableNames:
          [Clock].Today.Year
          [Clock].Today
          [Clock].Today.Month
          [OilPalm].Age
          [SurfaceOM].N
          [SurfaceOM].Wt
          [OilPalm].LAI
          [OilPalm].StemMass
          [OilPalm].UnderstoryCoverGreen
          [Calculations].Script.surfaceom_wt_oilpalmstem
          [Calculations].Script.surfaceom_wt_oilpalmunderstory
          sum([Soil].SoilNitrogen.TotalC)/1000 as SoilCtpha
          sum([Soil].SoilNitrogen.TotalN) as SoilNkgpha
          sum([Soil].NO3N) as TotalNO3
          sum([Soil].SoilWater.SWmm) as TotalSW
          sum([Soil].DULmm) as DUL
          sum([Soil].SATmm) as SAT
      OilPalm: interception=0; UnderstoryCoverMax=0.4; UnderstoryLegumeFraction=1; InterceptionFraction=0; MaximumRootDepth=5000; RootDepth=3030; DltDM=19.8711; ReproductiveGrowthFraction=0.540023; UnderstoryCoverGreen=0.0469482; UnderstoryPotNUptake=[9.0366, 16.9496, 10.5507, 0, 0, 0, 0, 0, 0, 0, 0, 0]
      Irrigation
      Manager Palm Management
        sowing_date = 1996-03-01
        population = 135
        cultivar = Dami
        sowing_depth = 200
        year1N = 0.14
        year2N = 0.3
        year3N = 0.6
        year4N = 0.9
        MatureN = 1.05
        Irrigated = True
        WaterRequirementYoung = 20
        WaterRequirementMature = 40
        Plant_population = 0
```csharp
using System;
using Models.Core;
using Models.PMF;
using Models.PMF.OilPalm;
namespace Models
{
    [Serializable]
    [System.Xml.Serialization.XmlInclude(typeof(Model))]
    public class Script : Model
    {
        [Link] Clock Clock; 
        [Link] OilPalm oilPalm;
        [Link] Summary Summary;
        [Link] Fertiliser Fertiliser;
        [Link] Weather Weather;
        [Link] Irrigation Irrigation;
        
        [Description("Sowing date")]
        public DateTime sowing_date {get; set;}
        
        [Description("Plant population (/ha)")]
        public double population {get; set;}

        [Description("Cultivar")]
        [Display(DisplayType = DisplayAttribute.DisplayTypeEnum.CultivarName)]
        public string cultivar {get; set;}

        [Description("Sowing depth (mm)")]
        public double sowing_depth {get; set;}
        
        [Description("N applied in year 1 (kg/palm)")]
        public double year1N {get;set;}
        [Description("N applied in year 2 (kg/palm)")]
        public double year2N {get;set;}
        [Description("N applied in year 3 (kg/palm)")]
        public double year3N {get;set;}
        [Description("N applied in year 4 (kg/palm)")]
        public double year4N {get;set;}
        [Description("N applied to mature palms (kg/palm)")]
        public double MatureN {get;set;}
        [Description ("Are the palms irrigated? (True/False)")]
        public bool Irrigated {get; set;}
        [Description ("Weekly water requirement young palms (mm)")]
        public double WaterRequirementYoung {get; set;}
        [Description ("Weekly water requirement mature palms (mm)")]
        public double WaterRequirementMature {get; set;}        
        
        private double WeeklyRain = 0;
        private double DayCounter = 0;
        
        
        public double Plant_population {get;set;}
        
        [EventSubscribe("Commencing")]
        public void OnSimulationCommencing(object Sender, EventArgs e)
        {
            Plant_population = 0;
        }
        
        [EventSubscribe("DoManagement")]
        private void OnDoManagement(object sender, EventArgs e)
        {    
            if (Clock.Today.Date == sowing_date)
            {
                oilPalm.Sow(population: population / 10000, cultivar:cultivar, depth:sowing_depth, rowSpacing:150);
            }
            if (Clock.Today.Day == 1 && (Clock.Today.Month == 3 || Clock.Today.Month == 6 || Clock.Today.Month == 9))
            {
               double Nrate = 0;
               if (oilPalm.Age <= 1)
                  Nrate = year1N * population / 3;
               else if (oilPalm.Age <= 2)
                  Nrate = year2N * population / 3;
               else if (oilPalm.Age <= 3)
                  Nrate = year3N * population / 3;
               else if (oilPalm.Age <= 4)
                  Nrate = year4N * population / 3;
               else
                  Nrate = MatureN * population / 3;

               Fertiliser.Apply(Nrate, Fertiliser.Types.NH4NO3N, 10);            
            }
           DayCounter +=1;
           WeeklyRain += Weather.Rain;
           if (DayCounter == 7)
           {
              double Deficit = 0;
              if (oilPalm.Age<=3)
                 Deficit = Math.Max(WaterRequirementYoung - WeeklyRain,0);
              else
                 Deficit = Math.Max(WaterRequirementMature - WeeklyRain,0);
              if (Irrigated)
                 Irrigation.Apply(amount:Deficit);
              DayCounter = 0;
              WeeklyRain = 0;
           }
        }
    }
}
```
      Manager Calculations
        Offset = 6
        AnnualFronds = 0
        AnnualBunches = 0
        AnnualYield = 0
        AnnualBunchSize = 0
        surfaceom_wt_oilpalmstem = -
        surfaceom_wt_oilpalmunderstory = 0
        OilPalmYield = 0
        AnnualNRemoved = 0
        AnnualET = 0
```csharp
using System;
using Models.Core;
using Models.PMF;
using Models.PMF.OilPalm;
using Models.Soils;
using Models.SurfaceOM;

namespace Models
{ 
    [Serializable]
    [System.Xml.Serialization.XmlInclude(typeof(Model))]
    public class Script : Model
    {
        [Link] Clock Clock;
        [Link] OilPalm OilPalm;
        [Link] Soil Soil;
        [Link] SurfaceOrganicMatter SurfaceOM;
        [Link] Summary Summary;
        [Link] Fertiliser Fertiliser;
        [Link] Weather Weather;
        [Link] Irrigation Irrigation;
        
        public double Offset {get; set;}
        public double AnnualFronds {get; set;}
        public double AnnualBunches {get; set;}
        public double AnnualYield {get; set;}
        public double AnnualBunchSize {get; set;}
        public double surfaceom_wt_oilpalmstem {get; set;}
        public double surfaceom_wt_oilpalmunderstory {get; set;}
        public double OilPalmYield {get; set;}
        public double AnnualNRemoved {get; set;}
        public double AnnualET {get; set;}


        
        [EventSubscribe("Commencing")]
        private void OnSimulationCommencing(object sender, EventArgs e)
        {
            Offset = 0;
            OilPalmYield = 0;
            AnnualFronds = 0;
            AnnualBunches = 0;
            AnnualBunchSize = 0;
            AnnualYield = 0;
            surfaceom_wt_oilpalmstem = 0;
            surfaceom_wt_oilpalmunderstory = 0;    
            AnnualNRemoved = 0;
            AnnualET = 0;

        }
        

       [EventSubscribe("StartOfYear")]
       private void OnStartOfYear(object sender, EventArgs e)
       {
               Offset = OilPalm.CumulativeFrondNumber;
            AnnualYield = 0;
            AnnualBunches = 0;
            AnnualBunchSize = 0;
            AnnualNRemoved = 0;
            AnnualET = 0;
        }
        
       [EventSubscribe("DoManagementCalculations")]
       private void OnDoManagement(object sender, EventArgs e)
        {
            surfaceom_wt_oilpalmstem = SurfaceOM.GetWeightFromPool("oilpalmstem");
            AnnualFronds = OilPalm.CumulativeFrondNumber - Offset;  
            AnnualET += Soil.SoilWater.Es + OilPalm.EP + OilPalm.UnderstoryEP;                          

        }
        
        [EventSubscribe("Harvesting")]
        private void OnHarvesting(object sender, EventArgs e)
        {
            AnnualYield += OilPalm.HarvestFFB;
            AnnualBunches += OilPalm.HarvestBunches;
            if (AnnualBunches > 0)
                AnnualBunchSize = AnnualYield * 1000 / AnnualBunches / (OilPalm.Population * 10000);
            AnnualNRemoved += OilPalm.HarvestNRemoved;
        }
    }
}
```
      SoluteManager
  DataStore
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