Simulations: Version=67
  Memo About this example
    **About this example**

    The is a nonsense sort of simulation - its only purpose is to show examples of the different reporting capabilities.

    You will see that many of the Report models have been placed inside Folders. This is not required to make the simulation run but neither does it break the simulation. Their purpose is only to create headings in the generated documentation.
  Folder Simple Reporting
    Memo Reporting basics
      Setting up outputs from a simulation requires describing **what** to output and **when** that should be done.

      **Properties - setting up what should be reported**

      Figure 1 shows a screen capture of a simple report. The upper box (Properties) holds descriptions of what should be reported. The general syntax is:

      			[Model].Variable
      The first part, "[Model]" just above, gives the name of a model in the simulation. Models are almost any component in the simulation - e.g. Clock, Weather, Wheat, Irrigation - including Manager scripts (lthough these are a slightly special case and more on that below). The name of the model must be in square brackets. As with Manager scripts, Properties uses Intellisense to assist with constructing the output descripters. For example, see row 1 of Figure 1. After typing "[Clock]" once a "." is typed a drop-down list of possible variables will appear as hints and in Figure 1 the choice from the list was "Today" which gives the date of the simulation output.

      *Note that model and variable names are case-sensitive. Capitalisation in the right places is important.*

      **Reporting frequency - setting up when reports should happen**
      Also needed is a specification of *when* an output should be made. The instruction for when to report is in the form of:

      			[Model].Event
      An Event is something that happens, like a stage of the day or a management action. The most-used examples of a reporting frequency are:

      			[Clock].EndOfDay
      and

      			[Wheat].Harvesting
      where “Wheat” might be any crop.

      It is possible to place multiple events in the frequency. For example:

      			[Wheat].Sowing
      			[Wheat].Flowering
      			[Wheat].Harvesting
      			[Wheat].PlantEnding

      Other events:

      			[Irrigation].Irrigated
      			[Fertiliser].Fertilised
      should work but currently do not.

      [Note that all the examples here are for reporting at the end of the simulation day. This is the most sensible time to do an output as all the models will have finished their calculations. It is possible to create outputs at different times of the day. This is an advanced topic and users are directed to https://apsimnextgeneration.netlify.com/development to understand stages within a simulation day.]

      **More advanced features**
      This is the minimum that is needed to specify what to output but for convieience of users several other basic features are provided.
    Simulation SimpleReportingSim
      Clock: Start=1980-01-01; End=1981-12-31
      Summary SummaryFile
      Weather: FileName=%root%\Examples\WeatherFiles\Dalby.met
      SoilArbitrator
      Zone Field: Area=1; Slope=0
        Folder Managers
          Manager SowingRule
            StartDate = 1-may
            EndDate = 10-jul
            MinESW = 100
            MinRain = 25
            RainDays = 7
            CultivarName = Hartog
            SowingDepth = 30
            RowSpacing = 250
            Population = 120
```csharp
using System;
using Models.Core;
using Models.PMF;
using Models.Soils;
using Models.Soils.Nutrients;
using Models.Utilities;
using APSIM.Shared.Utilities;

namespace Models
{
    [Serializable]
    public class Script : Model
    {
        [Link] Clock Clock;
        [Link] Fertiliser Fertiliser;
        [Link] Summary Summary;
        [Link] Plant Wheat;
        [Link] Soil Soil; 
        Accumulator accumulatedRain;
        
        [Description("Start of sowing window (d-mmm)")]
        public string StartDate { get; set;}
        [Description("End of sowing window (d-mmm)")]
        public string EndDate { get; set;}
        [Description("Minimum extractable soil water for sowing (mm)")]
        public double MinESW { get; set;}
        [Description("Accumulated rainfall required for sowing (mm)")]
        public double MinRain { get; set;}
        [Description("Duration of rainfall accumulation (d)")]
        public int RainDays { get; set;}
        [Description("Cultivar to be sown")]
        [Display(Type=DisplayType.CultivarName)]
        public string CultivarName { get; set;}
        [Description("Sowing depth (mm)")]
        public double SowingDepth { get; set;}        
        [Description("Row spacing (mm)")]
        public double RowSpacing { get; set;}    
        [Description("Plant population (/m2)")]
        public double Population { get; set;}    
        
        
        [EventSubscribe("Commencing")]
        private void OnSimulationCommencing(object sender, EventArgs e)
        {
            accumulatedRain = new Accumulator(this, "[Weather].Rain", RainDays);
        }
        

        [EventSubscribe("DoManagement")]
        private void OnDoManagement(object sender, EventArgs e)
        {
            accumulatedRain.Update();
            
            if (DateUtilities.WithinDates(StartDate,Clock.Today,EndDate) &&
                !Wheat.IsAlive &&
                MathUtilities.Sum(Soil.SoilWater.ESW) > MinESW &&
                accumulatedRain.Sum > MinRain)
            {
               Wheat.Sow(population:Population, cultivar:CultivarName, depth:SowingDepth, rowSpacing:RowSpacing);    
            }
        
        }
        
    }
}
```
          Manager SowingFertiliser
            Amount = 160
            CropName = wheat
```csharp
using System;
using Models.Core;
using Models.PMF;
namespace Models
{
    [Serializable]
    public class Script : Model
    {
        [Link] Clock Clock;
        [Link] Fertiliser Fertiliser;
        [Link] Summary Summary;
        
        
        [Description("Amount of fertiliser to be applied (kg/ha)")]
        public double Amount { get; set;}
        
        [Description("Crop to be fertilised")]
        public string CropName { get; set;}
        
        
        

        [EventSubscribe("Sowing")]
        private void OnSowing(object sender, EventArgs e)
        {
            Model crop = sender as Model;
            if (crop.Name.ToLower()==CropName.ToLower())
                Fertiliser.Apply(Amount: Amount, Type: Fertiliser.Types.NO3N);
        }
        
    }
}
```
          Manager Harvest
```csharp
using System;
using Models.Core;
using Models.PMF;
using Models.Soils;
using Models.Soils.Nutrients;
using Models.Utilities;
using APSIM.Shared.Utilities;

namespace Models
{
    [Serializable]
    public class Script : Model
    {
        [Link] Plant Wheat;

        [EventSubscribe("DoManagement")]
        private void OnDoManagement(object sender, EventArgs e)
        {
            if (Wheat.IsReadyForHarvesting)
            {
               Wheat.Harvest();
               Wheat.EndCrop();    
            }
        
        }
        
    }
}
```
          Manager AutoIrrig
            FASW = 0
            WaterDeficit = 0
            AutoIrrigationOn = True
            FASWThreshold = 0.9
            FASWDepth = 600
```csharp
using System;
using Models.Core;
using System.Collections.Generic;
using System.Text;
using Models.Soils;
using Models.PMF;
using Models;
using System.Xml.Serialization;
using APSIM.Shared.Utilities;

namespace Models
{
    [Serializable] 
    public class Script : Model
    {
        public double FASW { get; set; }
        public double WaterDeficit  { get; set; }
    
        [Link] Zone zone;
        [Link] Irrigation irrigation;
        [Link] Soil soil;
        
        [Description("Auto irrigation on?")]
        public bool AutoIrrigationOn { get; set; }

        [Description("Threshold fraction available water (0-1)")]
        public double FASWThreshold { get; set; }

        [Description("Soil depth (mm) to which fraction available water is calculated")]
        public double FASWDepth { get; set; }

        [EventSubscribe("DoManagement")]
        private void OnDoManagement(object sender, EventArgs e)
        {
            CalculateFASW();
            if (AutoIrrigationOn)
            {
                if (FASW < FASWThreshold)
                {
                    double amount = 10;
                    irrigation.Apply(WaterDeficit, depth: 0);
                }
            }
        }
        
        private void CalculateFASW()
        {
            double[] LL15 = MathUtilities.Multiply(soil.LL15, soil.Thickness);
            double[] DUL = MathUtilities.Multiply(soil.DUL, soil.Thickness);
        
            int nlayr = GetLayerIndex();
            double cumdep = MathUtilities.Sum(soil.Thickness, 0, nlayr, 0.0);

            double excess_fr = MathUtilities.Divide((cumdep - FASWDepth), soil.Thickness[nlayr], 0.0);

            // note that results may be strange if swdep < ll15
            double avail_sw = (MathUtilities.Sum(soil.Water, 0, nlayr, 0.0)
                              - excess_fr * soil.Water[nlayr])
                              - (MathUtilities.Sum(LL15, 0, nlayr, 0.0)
                              - excess_fr * LL15[nlayr]);


            double pot_avail_sw = (MathUtilities.Sum(DUL, 0, nlayr, 0.0)
                                  - excess_fr * DUL[nlayr])
                                  - (MathUtilities.Sum(LL15, 0, nlayr, 0.0)
                                  - excess_fr * LL15[nlayr]);

            FASW = MathUtilities.Divide(avail_sw, pot_avail_sw, 0.0);
            WaterDeficit = MathUtilities.Constrain(pot_avail_sw - avail_sw, 0.0, 100000);
        }

        private int GetLayerIndex()
        {
            double[] cumThickness = soil.ThicknessCumulative;
            for (int i = 1; i < cumThickness.Length; i++)
            {
                if (FASWDepth < cumThickness[i])
                    return i - 1;
            }
            
            return cumThickness.Length - 1;
        }

    }
}
```
        Report ReportSimple: EventNames=[Clock].EndOfDay
          VariableNames:
            [Clock].Today
            [Weather].Rain as DailyRainfall
            [Wheat].Grain.Total.Wt*10 as Yield_kgDMha  // example of changing units from g/m2 to kg/ha
            [SowingRule].Script.SowingDepth
        Report ReportOnCropEvents
          VariableNames:
            [Clock].Today
            [Wheat].AboveGroundLive.Wt
          EventNames:
            [Wheat].Sowing
            [Wheat].Flowering
            [Wheat].Harvesting
            [Wheat].PlantEnding
        Fertiliser
        Irrigation
        Soil: ASCOrder=Vertosol; ASCSubOrder=Black; SoilType=Clay; Site=Norwin; NearestTown=Norwin; Region=Darling Downs and Granite Belt; State=Queensland; Country=Australia; NaturalVegetation=Qld. Bluegrass, possible Qld. Blue gum; ApsoilNumber=900; Latitude=-27.581836; Longitude=151.320206; LocationAccuracy=+/- 20m
          DataSource=CSIRO Sustainable Ecosystems, Toowoomba; Characteriesd as part of the GRDC funded project"Doing it better, doing it smarter, managing soil water in Australian agriculture' 2011
          Comments=OC, CLL for all crops estimated-based on Bongeen Mywybilla Soil No1
          Physical
            Thickness  BD       AirDry    LL15      DUL       SAT       KS
            150        1.01056  0.13025   0.2605    0.521     0.588655  20
            150        1.07146  0.198689  0.248362  0.496723  0.565677  20
            300        1.09394  0.28      0.28      0.488438  0.557193  20
            300        1.15861  0.28      0.28      0.480297  0.532787  20
            300        1.17301  0.28      0.28      0.471584  0.527354  20
            300        1.16287  0.28      0.28      0.457071  0.53118   20
            300        1.1875   0.28      0.28      0.452332  0.521888  20
            SoilCrop WheatSoil: LL=[0.261, 0.248, 0.28, 0.306, 0.36, 0.392, 0.446]; KL=[0.06, 0.06, 0.06, 0.04, 0.04, 0.02, 0.01]; XF=[1, 1, 1, 1, 1, 1, 1]
          SoilWater: SummerDate=1-Nov; SummerU=5; SummerCona=5; WinterDate=1-Apr; WinterU=5; WinterCona=5; DiffusConst=40; DiffusSlope=16; Salb=0.12; CN2Bare=73; CNRed=20; CNCov=0.8; max_pond=0; Thickness=[150, 150, 300, 300, 300, 300, 300]; SWCON=[0.3, 0.3, 0.3, 0.3, 0.3, 0.3, 0.3]
          Organic: FOMCNRatio=40
            Thickness  Carbon  SoilCNRatio  FBiom  FInert  FOM
            150        1.2     12           0.04   0.4     347.129
            150        0.96    12           0.02   0.6     270.344
            300        0.6     12           0.02   0.8     163.972
            300        0.3     12           0.02   1       99.4541
            300        0.18    12           0.01   1       60.322
            300        0.12    12           0.01   1       36.5871
            300        0.12    12           0.01   1       22.1912
          Chemical
            Thickness  NO3N  NH4N  PH
            150        1     0.1   8
            150        1     0.1   8
            300        1     0.1   8
            300        1     0.1   8
            300        1     0.1   8
            300        1     0.1   8
            300        1     0.1   8
          InitialWater: PercentMethod=1; FractionFull=1
          Sample InitialN: Thickness=[150, 150, 300, 300, 300, 300, 300]; SWUnits=Volumetric; OCUnits=Total; PHUnits=Water
          CERESSoilTemperature
          Nutrient
            DirectedGraphInfo={Nodes=[{Name=Inert, OutlineColour=Black}, {Name=SurfaceResidue, OutlineColour=Black}, {Name=FOMLignin, OutlineColour=Black}, {Name=FOMCellulose, OutlineColour=Black}, {Name=FOMCarbohydrate, OutlineColour=Black}, {Name=Microbial, OutlineColour=Black}, {Name=Humic, OutlineColour=Black}, {Name=Urea, OutlineColour=Black}, {Name=NO3, OutlineColour=Black}, {Name=NH4, OutlineColour=Black}, {Name=Atmosphere, OutlineColour=White}, {Name=PlantAvailableNO3, OutlineColour=Black}, {Name=PlantAvailableNH4, OutlineColour=Black}], Arcs=[{SourceName=SurfaceResidue, DestinationName=Microbial}, {SourceName=SurfaceResidue, DestinationName=Humic}, {SourceName=FOMLignin, DestinationName=Microbial}, {SourceName=FOMLignin, DestinationName=Humic}, {SourceName=FOMCellulose, DestinationName=Microbial}, {SourceName=FOMCellulose, DestinationName=Humic}, {SourceName=FOMCarbohydrate, DestinationName=Microbial}, {SourceName=FOMCarbohydrate, DestinationName=Humic}, {SourceName=Microbial, DestinationName=Microbial}, {SourceName=Microbial, DestinationName=Humic}, {SourceName=Humic, DestinationName=Microbial}, {SourceName=Urea, DestinationName=NH4}, {SourceName=NO3, DestinationName=Atmosphere}, {SourceName=NH4, DestinationName=NO3}]}
        SurfaceOrganicMatter: InitialResidueName=wheat_stubble; InitialResidueType=wheat; InitialResidueMass=500; InitialStandingFraction=0; InitialCPR=0; InitialCNR=100; FractionFaecesAdded=0.5
        Plant Wheat: CropType=Wheat; IsEnding=false; DaysAfterEnding=0
        MicroClimate: a_interception=0; b_interception=1; c_interception=0; d_interception=0; soil_albedo=0.3; SoilHeatFluxFraction=0.4; NightInterceptionFraction=0.5; ReferenceHeight=2
  Simulation
    Clock: Start=1980-01-01; End=1981-12-31
    Summary SummaryFile
    Weather: FileName=%root%\Examples\WeatherFiles\Dalby.met
    SoilArbitrator
    Zone Field: Area=1; Slope=0
      Folder Managers
        Manager SowingRule: same as Simple Reporting.SimpleReportingSim.Field.Managers.SowingRule
        Manager SowingFertiliser: same as Simple Reporting.SimpleReportingSim.Field.Managers.SowingFertiliser
        Manager Harvest: same as Simple Reporting.SimpleReportingSim.Field.Managers.Harvest
        Manager AutoIrrig: same as Simple Reporting.SimpleReportingSim.Field.Managers.AutoIrrig
        Manager ReportExampleHelper
          ReportEveryYear_Name = ReportWheneverEveryYear
          ReportEveryYear_Dates = 21-mar,23-nov,11-aug
          ReportSpecificDates_Name = ReportOnSpecificDates
          ReportSpecificDates_Dates = 03/01/1980 00:00:00,10/15/1981 00:00:00
```csharp
using System;
using Models.Core;
using System.Collections.Generic;
using System.Text;
using Models.Soils;
using Models.PMF;
using Models;
using System.Xml.Serialization;
using APSIM.Shared.Utilities;

namespace Models
{
    [Serializable]
    public class Script : Model
    {
        [Link] Clock clock;
        [Link] Zone zone;

        [Separator("NOTE - all dates or date strings are entered with comma-separation and no spaces")]
        [Separator("Example for reporting in particular days but the same days every year")]
        [Description("Name of the Report model for reporting on below dates every year: ")] public string ReportEveryYear_Name { get; set; } 
        [Description("Enter one or more dates (as dd-mmm) for reporting : ")] public string[] ReportEveryYear_Dates { get; set; } 

        [Separator("Example for reporting on absolute dates")]
        [Description("Name of the Report model for reporting on completely specified dates: ")] public string ReportSpecificDates_Name { get; set; } 
        [Description("Enter one or more dates (as dd-mmm) for reporting : ")] public DateTime[] ReportSpecificDates_Dates { get; set; } 



        [EventSubscribe("DoManagementCalculations")]
        private void OnDoManagement(object sender, EventArgs e)
        {


			// example for reporting on irregular dates but the same dates every year
        	foreach (string ddMMM in ReportEveryYear_Dates)
        	{
    			if (DateUtilities.DatesEqual(ddMMM, clock.Today))
    			{
	                Models.Report.Report myReport = Apsim.Find(zone, ReportEveryYear_Name) as Models.Report.Report;
    	            if (myReport == null)
        	            throw new Exception(string.Format("Unable to locate report {0}.", ReportEveryYear_Name));
            	    myReport.DoOutput();
    			}
        	}

			// example for reporting on fully-specified dates that are not necessarily the same dates every year
        	foreach (DateTime ddMMMyy in ReportSpecificDates_Dates)
        	{
    			if (DateUtilities.Equals(ddMMMyy, clock.Today))
    			{
	                Models.Report.Report myReport = Apsim.Find(zone, ReportSpecificDates_Name) as Models.Report.Report;
    	            if (myReport == null)
        	            throw new Exception(string.Format("Unable to locate report {0}.", ReportSpecificDates_Name));
            	    myReport.DoOutput();
    			}
        	}

        }
        
    }
}
```
      Report ReportDaily: EventNames=[Clock].EndOfDay
        VariableNames:
          [Clock].Today
          [Wheat].Grain.Total.Wt*10 as Yield_kgDMha  // example of changing units from g/m2 to kg/ha
          [Weather].Rain as DailyRainfall
          //this should work from any Clock event but "StartOfSimulation" fails so use "StartDay"
          Sum of [Weather].Rain from [Clock].StartDate to [Clock].Today as CumulativeRainfall
          //Sum of [Weather].Rain from [ReportExampleHelper].Script.ReportDate to [Clock].Today as CumulativeRainfall
          //the "from 1-Jan" means that the accumulation re-zeroes every year
          Sum of [Weather].Rain from 1-Jan to [Clock].Today as AnnualRainfall
          //the "from [Clock].StartOfMonth" means that the accumulation re-zeroes every first day of the month.
          Sum of [Weather].Rain from [Clock].StartOfMonth to [Clock].Today as MonthlyRainfall
          // For the examples on maximum temperature
          [Weather].MaxT as MaxT
      Report ReportWeekly: EventNames=[Clock].EndOfWeek
        VariableNames:
          [Clock].Today
          Avg of [Weather].MaxT from [Clock].StartOfWeek to [Clock].Today as AverageWeeklyMaxT
      Report ReportMonthly: EventNames=[Clock].EndOfMonth
        VariableNames:
          [Clock].Today
          Avg of [Weather].MaxT from [Clock].StartOfMonth to [Clock].Today as AverageMonthlyMaxT
          Max of [Weather].MaxT from [Clock].StartOfMonth to [Clock].Today as MaxMonthlyMaxT
          Min of [Weather].MaxT from [Clock].StartOfMonth to [Clock].Today as MinMonthlyMaxT
      Folder Reporting At Irregular Intervals
        Report ReportWheneverEveryYear
          VariableNames:
            [Clock].Today
            Sum of [Weather].Rain from [ReportWheneverEveryYear].DateOfLastOutput to [Clock].Today as IrregularIntervalRainfall
        Report ReportOnSpecificDates
          VariableNames:
            [Clock].Today
            Sum of [Weather].Rain from [ReportWheneverEveryYear].DateOfLastOutput to [Clock].Today as IntervalRainfall
            Sum of [Weather].Rain from [Clock].StartDate to [Clock].Today as CumulativeIntervalAnnualRainfall
        Memo
          Sometimes in a simulation you might want to report at irregular intervals. These might align with measurement dates, some key dates in the production system.

          the first thing to note is that if you are triggering reporting from a Manager (in this example it is called "ReportExampleHelper" in the "Managers" folder) the trigger should happen after all the science models and Manager scripts have done their calculations for the day. This is acheived by putting the Manager after all the other Managers and using the "DoManagementCalculations" stage of the day when subscribing to the event in the Manager. See approximately line 26 (this may get a bit out of date sorry) in the Manager.

          		[EventSubscribe("DoManagementCalculations")]

          **Report irregularly but on the same days every year**

          The reporting from "ReportWheneverEveryYear" is driven by the Manager script "ReportExampleHelper". The first two properties give then name of this report and a list of year-free dates (i.e. as dd-mmm) on which the reporting should happen every year. See the code in ReportExampleHelper pasted below as an example of how to do this. Note that the dates do not have to be in any sensible order.

          			// example for reporting on irregular dates but the same dates every year
                  	foreach (string ddMMM in ReportEveryYear_Dates)
                  	{
              			if (DateUtilities.DatesEqual(ddMMM, clock.Today))
              			{
          	                Models.Report.Report myReport = Apsim.Find(zone, ReportEveryYear_Name) as Models.Report.Report;
              	            if (myReport == null)
                  	            throw new Exception(string.Format("Unable to locate report {0}.", ReportEveryYear_Name));
                      	    myReport.DoOutput();
              			}
                  	}

          Looking in the data reported from this component, there are six lines (three dates entered in "ReportExampleHelper" and a two-year simulation) showing the actual data for reporting and the sum of the rainfall since the last time this report model produced an output. There is no value for the first row because there is no DateOfLastOutput until the simulation progressed past an output date (that should make some sort of sense!). Of course any type(s) of outputs could be reported on these dates.

          		Sum of [Weather].Rain from [ReportWheneverEveryYear].DateOfLastOutput to [Clock].Today as IrregularIntervalRainfall

          **Report on fully-specified dates**

          This example is for when the reporting is for fully-specified dates and usually these will not be the same every year. This also driven by the Manager script "ReportExampleHelper". The third and fourth properties then name of the date-specific report and a list of one or more full dates (i.e. as dd-mmm-yyyy) on which the reporting should be tgriggered. See the code in ReportExampleHelper pasted below as an example of how to do this. Note that the dates do not have to be in any sensible order.

          			// example for reporting on fully specified dates that are not necessarily the same dates every year
                  	foreach (DateTime ddMMMyy in ReportSpecificDates_Dates)
                  	{
              			if (DateUtilities.Equals(ddMMMyy, clock.Today))
              			{
          	                Models.Report.Report myReport = Apsim.Find(zone, ReportSpecificDates_Name) as Models.Report.Report;
              	            if (myReport == null)
                  	            throw new Exception(string.Format("Unable to locate report {0}.", ReportSpecificDates_Name));
                      	    myReport.DoOutput();
              			}
                  	}

          Examining the output data in "ReportOnSpecificDates" there are only two rows - these correspond to the dates entered in "ReportExampleHelper". There are two data columns. One of these is the raainfall since the last report (as in the any-year example just above) and the other is the sum of rainfall since the start of the simulation.

          	Sum of [Weather].Rain from [ReportWheneverEveryYear].DateOfLastOutput to [Clock].Today as IntervalRainfall
          	Sum of [Weather].Rain from [Clock].StartDate to [Clock].Today as CumulativeIntervalAnnualRainfall
      Report ReportSpecificDates
        VariableNames:
          [Clock].Today
          //Sum of [Weather].Rain from [ReportWhenever].DateOfLastOutput to [Clock].Today as AnnualRainfall
        Memo
          **Report whenever you want**

          Sometimes in a simulation you might want to report at irregular intervals. These might align with measurement dates
      Report ReportOnHarvesting (disabled): EventNames=[Wheat].Harvesting
        VariableNames:
          [Clock].Today
          [Wheat].Grain.Total.Wt*10 as Yield_kgDMha  // example of changing units from g/m2 to kg/ha
          [Weather].Rain as DailyRainfall
          Sum of [Weather].Rain from 1-Jan to 31-Dec as AnnualRainfall
      Fertiliser
      Irrigation
      Soil: same as Simple Reporting.SimpleReportingSim.Field.Soil
      SurfaceOrganicMatter: InitialResidueName=wheat_stubble; InitialResidueType=wheat; InitialResidueMass=500; InitialStandingFraction=0; InitialCPR=0; InitialCNR=100; FractionFaecesAdded=0.5
      Plant Wheat: CropType=Wheat; IsEnding=false; DaysAfterEnding=0
      MicroClimate: a_interception=0; b_interception=1; c_interception=0; d_interception=0; soil_albedo=0.3; SoilHeatFluxFraction=0.4; NightInterceptionFraction=0.5; ReferenceHeight=2
  DataStore
  Folder
    Folder
  Folder Folder1
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