Simulations: Version=195
  DataStore
  Folder Replacements
    Plant SCRUM: PlantType=SCRUM
      Memo TitlePage
        # SCRUM: the Simple Crop Resource Uptake Model

        _Hamish Brown, Edith Khaembah, Rogerio Cichota, Xiumei Yang and Jo Sharp, New Zealand Institute for Biological Science_

        _Neil Huth and Dean Holzworth, Commonwealth Scientific and Industrial Research Organisation_

        _Steven Reeves, Queensland Department of the Environment, Tourism, Science and Innovation_

        The SCRUM model serves two main purposes:
        1. To represent annual crops in APSIM simulations that we do not yet have a detailed model for and/or lack the experimental data required to parametrise one.  SCRUM has been designed to be parameterised with some basic crop information that an expert in a specific crop type will have close to hand.  This provides an alternative to using another crop type as a proxy when we are simulating rotations that include crop that do not have a detailed crop model.
        2. For studies that are not interested in the crop and don’t want to invest a lot of time in setting the crop component of simulations but still need something to provide sensible boundaries to the nitrogen and water balance.

        To be able to represent a broad range of annual crops SCRUM makes a number of simplifications:
        * It does not predict potential yield.  This is a user input and a value must be provided that is sensible for the context being simulated.  Harvest index and root proportion coefficients are used to determine stover and root biomass.  Crop yields may be less than the yield specified if stress events occur.
        * Daily patterns of biomass accumulation, cover, root depth and height are calculated from basic linear and sigmoidal functions anchored to phenological stages as shown below.
        ![Schematic of biomass, cover, root depth and height with crop development stages](SCRUM_Patterns.jpg)
        * The model does not predict when harvests occur.  Instead, the user provides dates and crop stages for establishment and harvest as inputs.  Scrum scales it development patterns (shown above) between the user specified dates and stages to give daily patterns.  An example for biomass accumulation patterns is shown in the figure below.  Dotted, dashed and solid lines represent seedling, emergence and seed establishment stages respectively.   All of the patterns displayed are possible depending on which stage is specified for establishment and harvest. So by changing the establishment and harvest dates and stages a wide range of development patterns can be simulated to represent most crop situations.
        * Establishment Stages:
            - Seed is selected to represent a crop that is sown and emerges after establishment date.
           - Emergence is selected if the crop is to start growing on the day of establishment
           - Seedling is selected to represent transplanted crops that already have some biomass and leaf area on the day of establishment.
        * Harvest Stages:
           - Vegetative is selected for crops such as lettuce that are harvested while still in rapid growth.
           - Early, mid and late reproductive are other options for crops that are harvested before maturity such as whole crop silage, fresh legumes and oil seeds (respectively)
           - Maturity is selected for a crop that is harvested as soon as biomass accumulation has finished
           - Ripe is selected for crops that are harvested after maturity and a period of field drying such as most cereals.
        ![Schematic of biomass, accumulation patterns possible with different establishment and harvest stages.  Dotted, dashed and solid lines represent seedling, emergence and seed establishment stages respectively](SCRUM_Scaling.jpg)
        * Water stress responses may be switched on or off by the user depending on the simulation needs.  When water stress is switched on it will affect crop cover and biomass accumulation.
        * Nitrogen stress reduces biomass accumulation if there is insufficient N to meat minimum N concentration of growing organs.  Nitrogen stress does not affect cover.
        * SCRUM is not released with sets of coefficients to represent different crop types.  Instead and SCRUM Instance model is included in a simulation where the user sets coefficients to represent the crop required.  This provide great flexibility parameterising crops but puts the responsibility for having sensible parameters on the model user.  A set of SCRUM instances parameterised for a wide range of crops are provided in examples but these are intended as a start point that users refine to meet their needs.  The name of SCRUM instance models is arbitrary and they can be called what ever they like.
        * The SCRUM instance can be set to specify sowing and harvest dates so there is no need to include a manager to trigger these events.  There is a SCRUM rotation component that can be used for specifying rotations of SCRUM crops without needing to use a manager and it is possible to trigger these events from manager if more sophisticated set ups are required.

        The SCRUM model is built using the Plant Modelling Framework (PMF) of [brown_plant_2014] so it interfaces with other APSIM models in the same way as other plant models.
        SCRUM has 4 organ classes to represent different biomass components. The real biomass components that these classes represent changes from crop to crop:
           1. A Simple leaf class called <b>Stover</b> which represents the unharvested parts of the plant.  Generally, this represents the leaf and stem components of the crop but for crops where stem and leaf are part of the harvested product (e.g forages and leafy vegetables) than stover is the residual fraction of leaf and stem that is not harvested.
           2. A Generic organ class called <b>Product</b> which represents the plant parts that are harvested and removed from the field.  This could represent grain, fruits, tubers, leaf or stem depending on what sort of crop is being represented.
           3. A Root organ which extracts water and nitrogen from the soil for plant growth and returns biomass to the soil on harvest
           4. A Nodule organ which is only activated and fixes nitrogen for the legume crops.
      Phenology
        Memo Description
          Phenological phases for SCRUM do not correspond to objective development stages as they do for detailed crop models.  Instead they represent subjective stages in the development of an annual crop when they may be established or harvested and so provide weigh points for scalling biomass, cover, root depth and height between.  As ThermalTime accumulates the crop progresses through the following phases:
        WeightedTemperatureFunction ThermalTime: MaximumTemperatureWeighting=0.5
          XYPairs: X=[0, 30, 40]; Y=[0, 30, 0]
        GenericPhase Seed: Start=Seed; End=Emergence; IsEmerged=false
          Memo Description
            The phase that runs from sowing until the seedlings emergence is complete.
          Constant Target: FixedValue=0; Units=<sup>o</sup>Cd
            Memo Parameter set at establishment
              SCRUM calculates this parameter during run-time, when the crop is being established. This is done in ScrumCropInstance based on parameter values set in the relevant ScrumCrop and CropManagement script.
          MultiplyFunction Progression
            VariableReference ThermalTime: VariableName=[Phenology].ThermalTime
            LessThanFunction SoilMoistureFunction
              VariableReference TopLayerMoisture: VariableName=[ISoilWater].SWmm[1]
              VariableReference TopLayerLL: VariableName=[IPhysical].LL15mm[1]
              Constant IfLessThan0Return0: FixedValue=0
              Constant IfGreaterThan0Return1: FixedValue=1
        GenericPhase Seedling: Start=Emergence; End=Seedling; IsEmerged=true
          Memo Description
            The phase that runs from emergence until the seedlings are established (later than emergence) or ready for transplanting.
          Constant Target: same as Replacements.SCRUM.Phenology.Seed.Target
          VariableReference Progression: VariableName=[Phenology].ThermalTime
        GenericPhase Vegetative: Start=Seedling; End=Vegetative; IsEmerged=true
          Memo Description
            The phase in which the plant is rapidly growing and closing its canopy, represents the period of pure vegetative growth.
          Constant Target: same as Replacements.SCRUM.Phenology.Seed.Target
          VariableReference Progression: VariableName=[Phenology].ThermalTime
        GenericPhase EarlyReproductive: Start=Vegetative; End=EarlyReproductive; IsEmerged=true
          Memo Description
            The phase with substantial plant growth and when canopy reaches full development, represents the period in which crops are flowering.
          Constant Target: same as Replacements.SCRUM.Phenology.Seed.Target
          VariableReference Progression: VariableName=[Phenology].ThermalTime
        GenericPhase MidReproductive: Start=EarlyReproductive; End=MidReproductive; IsEmerged=true
          Memo Description
            The phase in which plant growth starts to slow down while still maintaining full canopy, represents the period when crops have started grain filling.
          Constant Target: same as Replacements.SCRUM.Phenology.Seed.Target
          VariableReference Progression: VariableName=[Phenology].ThermalTime
        GenericPhase LateReproductive: Start=MidReproductive; End=LateReproductive; IsEmerged=true
          Memo Description
            The phase in which plant growth is near completion, represents the period when crops are completing grain filling.
          Constant Target: same as Replacements.SCRUM.Phenology.Seed.Target
          VariableReference Progression: VariableName=[Phenology].ThermalTime
        GenericPhase Maturity: Start=LateReproductive; End=Maturity; IsEmerged=true
          Memo Description
            The phase in which plant growth ends reaching maximum biomass and cover, represents the period where grain filling is nearly complete
          Constant Target: same as Replacements.SCRUM.Phenology.Seed.Target
          VariableReference Progression: VariableName=[Phenology].ThermalTime
        GenericPhase Ripe: Start=Maturity; End=Ripe; IsEmerged=true
          Memo Description
            The phase in which canopy cover starts to decline, represents the period when grains are drying down to be ready for harvest.
          Constant Target: same as Replacements.SCRUM.Phenology.Seed.Target
          VariableReference Progression: VariableName=[Phenology].ThermalTime
        EndPhase ReadyForHarvesting: Start=Ripe; End=Unused; IsEmerged=true
          VariableReference ThermalTime: VariableName=[Phenology].ThermalTime
      OrganArbitrator Arbitrator
        BiomassTypeArbitrator DMArbitration
          Folder PotentialPartitioningMethods
            ReallocationMethod
            AllocateFixationMethod
            RetranslocationMethod
            SendPotentialDMAllocationsMethod
          Folder AllocationMethods
            NutrientConstrainedAllocationMethod
            DryMatterAllocationsMethod
          RelativeAllocation ArbitrationMethod
        BiomassTypeArbitrator NArbitration
          Folder PotentialPartitioningMethods
            ReallocationMethod
          Folder ActualPartitioningMethods
            AllocateFixationMethod
            RetranslocationMethod
          Folder AllocationMethods
            NitrogenAllocationsMethod
          RelativeAllocation ArbitrationMethod
          AllocateUptakesMethod
        WaterUptakeMethod
        NitrogenUptakeMethod
      GenericOrgan Product: IsAboveGround=true
        Memo Description
          This organ represents the biomass that is typically removed from the crop at harvest. It may include grain, root, leaf, stem, pod, tuber, or any other organ depending on the type of crop and how it is harvested.
        NutrientPoolFunctions InitialWt
          Constant Structural: FixedValue=0; Units=g/m^2
          Constant Metabolic: FixedValue=0; Units=g/m^2
          Constant Storage: FixedValue=0; Units=g/m^2
        VariableReference initialNConcFunction: VariableName=[Product].MaximumNConc
        Constant MaxNConcAtMaturity: FixedValue=0; Units=g/g
          Memo Parameter set at establishment
            This represents the maximum N concentration for Product at harvest time. SCRUM assumes that the maximum N concentration decreases as plants grow, starting at MaxNConcAtSeedling and reaching the value specified here at Maturity.
            SCRUM calculates this parameter during run-time, when the crop is being established. This is done in ScrumCropInstance based on parameter values set in the relevant ScrumCrop and CropManagement script.
        AddFunction MaximumNConc
          VariableReference MaxNConcAtMaturity: VariableName=[Product].MaxNConcAtMaturity
          MultiplyFunction EarlyNConcElevation
            SubtractFunction DeltaNConcentration
              VariableReference MaxNConcAtSeedling: VariableName=[SCRUM].MaxNConcAtSeedling
              VariableReference MaxNConcAtMaturity: VariableName=[Product].MaxNConcAtMaturity
            ExpressionFunction StageDilution: Expression=Min(1,exp(-[NDilutionConstant]*([Phenology].Stage-3)))
        MultiplyFunction CriticalNConc
          VariableReference MaxNConcAtMaturity: VariableName=[Product].MaxNConcAtMaturity
          Constant StructuralNFactor: FixedValue=0.6
        MultiplyFunction MinimumNConc
          VariableReference MaxNConcAtMaturity: VariableName=[Product].MaxNConcAtMaturity
          Constant StructuralNFactor: FixedValue=0.6
        Constant CarbonConcentration: FixedValue=0.4; Units=g/g
        Constant ExpectedYield: FixedValue=0; Units=g/m^2 fresh mass
          Memo Parameter set at establishment
            This value represents the expected biomass for Product at harvest time, in fresh weight basis. The actual yield may be lower due to water or N stress.
            SCRUM gets the value for this parameter during run-time, when the crop is established. The value is set on ScrumCropInstance or CropManagement script.
        Constant HarvestIndex: FixedValue=0; Units=g/g
          Memo Parameter set at establishment
            SCRUM gets the value for this parameter during run-time, when the crop is established. The value is set on ScrumCropInstance or CropManagement script.
        Constant DryMatterContent: FixedValue=0; Units=g/g
          Memo Parameter set at establishment
            SCRUM gets the value for this parameter during run-time, when the crop is established. The value is set on ScrumCropInstance or CropManagement script.
        SubtractFunction WaterContent
          Memo Description
            This is used to convert the biomass weights of this organ from dry matter basis back to fresh mass once daily partitining is complete.
          Constant One: FixedValue=1
          VariableReference DryMatterContent: VariableName=[Product].DryMatterContent
        MultiplyFunction DMAtHarvest
          Memo Description
            This is the expected yield at harvest time expressed in dry matter basis. It is calculated by the product of ExpectedYield (which is assumed to be given on fresh mass basis) and the dry matter content of the Product. Both are set during runtime, when the crop is stablished.
          VariableReference ExpectedYield: VariableName=[Product].ExpectedYield
          VariableReference DryMatterContent: VariableName=[Product].DryMatterContent
        ExpressionFunction Yield: Expression=(divide(1,[Product].DryMatterContent,0)*[Product].Wt)/100
          Memo Description
            Product fresh yield (t/ha).
        Constant Photosynthesis: FixedValue=0; Units=g/m^2
        Constant DMConversionEfficiency: FixedValue=1; Units=0-1
        Constant MaintenanceRespirationFunction: FixedValue=0; Units=0-1
        Constant SenescenceRate: FixedValue=0; Units=/d
        Constant DetachmentRateFunction: FixedValue=0; Units=/d
        Constant RemobilisationCost: FixedValue=0
        Constant DMReallocationFactor: FixedValue=0; Units=/d
        Constant DMRetranslocationFactor: FixedValue=0; Units=/d
        PhaseLookupValue NitrogenDemandSwitch: Start=Emergence; End=MidReproductive
          Constant: FixedValue=1
        Constant NReallocationFactor: FixedValue=0; Units=/d
        Constant NRetranslocationFactor: FixedValue=0; Units=/d
        RetranslocateNonStructural RetranslocateNitrogen
        BiomassRemoval BiomassRemovalDefaults: HarvestFractionLiveToRemove=1; HarvestFractionDeadToRemove=1; HarvestFractionLiveToResidue=0; HarvestFractionDeadToResidue=0
        NutrientDemandFunctions DMDemands
          MultiplyFunction Structural
            PartitionFractionDemandFunction DMDemandFunction
              SubtractFunction PartitionFraction
                Constant One: FixedValue=1
                VariableReference RootFraction
                  VariableName=[Root].DMDemands.Structural.DMDemandFunction.PartitionFraction
                VariableReference StoverFraction
                  VariableName=[Stover].DMDemands.Structural.DMDemandFunction.PartitionFraction
            Constant StructuralFraction: FixedValue=1; Units=0-1
          Constant Metabolic: FixedValue=0
          Constant Storage: FixedValue=0
          Constant QStructuralPriority: FixedValue=1
          Constant QMetabolicPriority: FixedValue=1
          Constant QStoragePriority: FixedValue=1
        NutrientDemandFunctions NDemands
          MultiplyFunction Structural
            VariableReference MinNConc: VariableName=[Product].minimumNconc
            VariableReference PotentialDMAllocation: VariableName=[Product].potentialDMAllocation.Structural
          MultiplyFunction Metabolic
            SubtractFunction MetabolicNConc
              VariableReference CritNConc: VariableName=[Product].criticalNConc
              VariableReference MinNConc: VariableName=[Product].minimumNconc
            VariableReference PotentialDMAllocation: VariableName=[Product].potentialDMAllocation.Structural
          StorageNDemandFunction Storage
            VariableReference NitrogenDemandSwitch: VariableName=[Product].nitrogenDemandSwitch
            VariableReference MaxNConc: VariableName=[Product].MaximumNconc
          Constant QStructuralPriority: FixedValue=1
          Constant QMetabolicPriority: FixedValue=1
          Constant QStoragePriority: FixedValue=1
      SimpleLeaf Stover: Albedo=0.18; Gsmax350=0.01; R50=150; LeafInitialisationStage=Emergence; Height=0; BaseHeight=0; Width=0; FRGR=0; PotentialEP=0; WaterDemand=0; KDead=0.1; LAIDead=0
        Memo Description
          This organ represents the biomass that is typically not removed at harvest. It may include leaf, stem, or any other organ depending on the type of crop and how it is harvested. The processes defining biomass accumulation over time (akin to photosythesis) are accounted for in this organ. It also holds the information about the canopy (cover, height, etc.).
        Constant InitialWt: FixedValue=0; Units=g/m^2
        Constant MaxNConcAtMaturity: FixedValue=0; Units=g/g
          Memo Parameter set at establishment
            This represents the maximum N concentration for Stover at harvest time. SCRUM assumes that the maximum N concentration decreases as plants grow, starting at MaxNConcAtSeedling and reaching the value specified here at Maturity.
            SCRUM calculates this parameter during run-time, when the crop is being established. This is done in ScrumCropInstance based on parameter values set in the relevant ScrumCrop and CropManagement script.
        AddFunction MaximumNConc
          VariableReference MaxNConcAtMaturity: VariableName=[Stover].MaxNConcAtMaturity
          MultiplyFunction EarlyNConcElevation
            SubtractFunction
              VariableReference MaxNConcAtSeedling: VariableName=[SCRUM].MaxNConcAtSeedling
              VariableReference MaxNConcAtMaturity: VariableName=[Stover].MaxNConcAtMaturity
            ExpressionFunction StageDilution: Expression=Min(1,exp(-[NDilutionConstant]*([Phenology].Stage-3)))
        MultiplyFunction CriticalNConc
          VariableReference MaxNConcAtMaturity: VariableName=[Stover].MaxNConcAtMaturity
          Constant StructuralNFactor: FixedValue=0.6
        MultiplyFunction MinimumNConc
          VariableReference MaxNConcAtMaturity: VariableName=[Stover].MaxNConcAtMaturity
          Constant StructuralNFactor: FixedValue=0.6
        Constant CarbonConcentration: FixedValue=0.4; Units=g/g
        SubtractFunction DMAtHarvest
          Memo Description
            This is the expected biomass for Stover at harvest time expressed in dry matter basis.
          VariableReference AbovegroundDMAtHarvest: VariableName=[SCRUM].AbovegroundDMAtHarvest
          VariableReference ProductDMAtHarvest: VariableName=[Product].DMAtHarvest
        MultiplyFunction Photosynthesis
          DeltaFunction UnStressedBiomass: StartStageName=Emergence
            SigmoidFunction Integral
              MultiplyFunction Ymax
                VariableReference TotalDMAtHarvest: VariableName=[SCRUM].TotalDMAtHarvest
                Constant InvertedRelativeDMAtHarvest
                  Memo Parameter set at establishment
                    This parameter is used to normalise the sigmoid function, ensuring it reached the maximum value at the specified time for harvest.
                    SCRUM calculates this parameter during run-time, when the crop is being established. This is done in ScrumCropInstance based on parameter values set in the relevant ScrumCrop and CropManagement script.
              SubtractFunction XValue
                VariableReference AccumulatedTt: VariableName=[Phenology].AccumulatedTt
                VariableReference TtEmergence: VariableName=[Phenology].Seed.Target
              Constant Xo: FixedValue=0
                Memo Parameter set at establishment
                  SCRUM calculates this parameter during run-time, when the crop is being established. This is done in ScrumCropInstance based on parameter values set in the relevant ScrumCrop and CropManagement script.
              Constant b: same as Replacements.SCRUM.Stover.Photosynthesis.UnStressedBiomass.Integral.Xo
          LinearInterpolationFunction WaterStressFactor
            XYPairs: X=[0, 1]; Y=[0, 1]
            VariableReference XValue: VariableName=[Stover].Fw
          Constant CorrectionFactor: FixedValue=1.0068
            Memo Why
              The sigmoid curve only reaches its asymtotes of 0.0 and 1.0 at infinity, thus never getting to its maximum for practical purposes. Given the parameters used in SCRUM, the sigmoid only gets to ~99.3% at the Maturity stage, when the crop should be at its maximum biomass accumulation. So, this correction factor is used to stretch the sigmoid out a bit so it covers 100% of its range between emergence and Maturity.
          PhaseLookup StageFactor
            PhaseLookupValue Emerging: Start=Seed; End=Emergence
              Constant: FixedValue=0
            PhaseLookupValue Growing: Start=Emergence; End=Maturity
              Constant: FixedValue=1
            PhaseLookupValue Ripening: Start=Maturity; End=Ripe
              Constant: FixedValue=0
        Constant DMConversionEfficiency: FixedValue=1; Units=0-1
        Constant MaintenanceRespiration: FixedValue=0; Units=0-1
        MinimumFunction FRGR
          SubDailyInterpolation FRGRFunctionTemp: agregationMethod=0
            XYPairs Response: X=[0, 10, 25, 40]; Y=[0, 1, 1, 0]
            ThreeHourAirTemperature InterpolationMethod
          VariableReference NitrogenStress: VariableName=[SCRUM].Arbitrator.FN
        AddFunction Cover
          AccumulateFunctionGeneral Growth: AccumulateEventName=[SCRUM].Phenology.PostPhenology; StartStageName=Seed; EndStageName=Ripe; FractionRemovedOnStage=0; FractionRemovedOnEvent=0; FractionRemovedOnDate=0; FractionRemovedOnCut=0; FractionRemovedOnHarvest=1; FractionRemovedOnGraze=0; FractionRemovedOnPrune=0
            MultiplyFunction Expansion
              DeltaFunction Delta: StartStageName=Seed
                SigmoidFunction Integral
                  Constant Ymax: FixedValue=0.97
                    Memo Parameter set at establishment
                      This is the maximum canopy cover for the crop, reached around the end of the Vegetative phase. Cover starts to decrease during the LaterReproductive phase.
                      SCRUM gets the value for this parameter during run-time, when the crop is established. The value is set on ScrumCropInstance or CropManagement script.
                  VariableReference XValue: VariableName=[Phenology].AccumulatedEmergedTt
                  Constant Xo: FixedValue=403.8
                    Memo Parameter set at establishment
                      SCRUM calculates this parameter during run-time, when the crop is being established. This is done in ScrumCropInstance based on parameter values set in the relevant ScrumCrop and CropManagement script.
                  Constant b: FixedValue=80.75
                    Memo Parameter set at establishment
                      SCRUM calculates this parameter during run-time, when the crop is being established. This is done in ScrumCropInstance based on parameter values set in the relevant ScrumCrop and CropManagement script.
              LinearInterpolationFunction WaterStressFactor
                XYPairs: X=[0.5, 1]; Y=[0, 1]
                VariableReference XValue: VariableName=[Stover].Fw
            PhaseLookupValue Senescence: Start=MidReproductive; End=Ripe
              DeltaFunction Delta: StartStageName=Seed
                MultiplyFunction Integral
                  HoldFunction MaxCover: WhenToHold=MidReproductive
                    VariableReference ValueToHold: VariableName=[Stover].CoverGreen
                  AggregateOverMultiplePhases: StartStageName=MidReproductive; EndStageName=Maturity; Method=1
          Constant InitialCover: FixedValue=0; Units=g/m2
          AccumulateFunctionGeneral Removal: AccumulateEventName=[Clock].PrePhenology; StartStageName=Seed; EndStageName=Ripe; FractionRemovedOnStage=0; FractionRemovedOnEvent=0; FractionRemovedOnDate=0; FractionRemovedOnCut=0; FractionRemovedOnHarvest=1; FractionRemovedOnGraze=0; FractionRemovedOnPrune=0
            MultiplyFunction Cover Removed
              VariableReference: VariableName=[Stover].CoverGreenRemoved
              Constant MakeNegative: FixedValue=-1; Units=0-1
        Constant ExtinctionCoefficient: FixedValue=0; Units=0-1
          Memo Parameter set at establishment
            This parameter does not have a functional use in SCRUM. As cannopy cover is calculated directly, this value is only used to estimate the value of LAI.
            SCRUM gets the value for this parameter during run-time, when the crop is established. The value is set on ScrumCropInstance or CropManagement script.
        Constant StomatalConductanceCO2Modifier: FixedValue=1
        SubtractFunction LaiDead
          AccumulateFunctionGeneral Senescence: AccumulateEventName=[Clock].PartitioningComplete; StartStageName=EarlyReproductive; FractionRemovedOnStage=0; FractionRemovedOnEvent=0; FractionRemovedOnDate=0; FractionRemovedOnCut=0; FractionRemovedOnHarvest=1; FractionRemovedOnGraze=0; FractionRemovedOnPrune=0
            MultiplyFunction DailyLAILoss
              DeltaFunction DailyLAILoss: StartStageName=EarlyReproductive
                VariableReference Integral: VariableName=[SCRUM].Stover.LAI
              Constant Invert: FixedValue=-1
          AccumulateFunctionGeneral Removal: AccumulateEventName=[Clock].PartitioningComplete; StartStageName=Seed; FractionRemovedOnStage=0; FractionRemovedOnEvent=0; FractionRemovedOnDate=0; FractionRemovedOnCut=0; FractionRemovedOnHarvest=1; FractionRemovedOnGraze=0; FractionRemovedOnPrune=0
            VariableReference: VariableName=[Stover].LAIDeadRemoved
        SigmoidFunction HeightFunction
          Constant Ymax: FixedValue=0
            Memo Parameter set at establishment
              This represents the maximum height for the plant, it is reached at the LateReproductive phase. The height is not affected by water or N stresses.
              SCRUM gets the value for this parameter during run-time, when the crop is established. The value is set on ScrumCropInstance or CropManagement script.
          VariableReference XValue: VariableName=[Phenology].AccumulatedEmergedTt
          Constant Xo: FixedValue=0
            Memo Parameter set at establishment
              SCRUM calculates this parameter during run-time, when the crop is being established. This is done in ScrumCropInstance based on parameter values set in the relevant ScrumCrop and CropManagement script
          Constant b: same as Replacements.SCRUM.Stover.HeightFunction.Xo
        Constant SenescenceRate: FixedValue=0; Units=/d
        Constant DetachmentRate: FixedValue=0; Units=/d
        Constant RemobilisationCost: FixedValue=0
        Constant DMReallocationFactor: FixedValue=0; Units=/d
        Constant DMRetranslocationFactor: FixedValue=0; Units=/d
        PhaseLookupValue NitrogenDemandSwitch: Start=Emergence; End=MidReproductive
          Constant: FixedValue=1
        Constant NReallocationFactor: FixedValue=0; Units=/d
        Constant NRetranslocationFactor: FixedValue=0; Units=/d
        BiomassRemoval BiomassRemovalDefaults: HarvestFractionLiveToRemove=0; HarvestFractionDeadToRemove=0; HarvestFractionLiveToResidue=1; HarvestFractionDeadToResidue=1
        NutrientDemandFunctions DMDemands
          MultiplyFunction Structural
            PartitionFractionDemandFunction DMDemandFunction
              Memo Description
                DM demand is based on a simple partitioning coefficients.  At harvest the biomass partitioned to the stover = TotalDM * (1 - RootProportion) * (1 - Harvest index).  However the partitioningFraction is more complicated that this as it partitions more biomass to the stover in the CanopyExpanding Phase and less in the Yield increasing phase to give realistic patterns of accumulation of biomass in the Stover and Product over the duration of the crop
              DivideFunction PartitionFraction
                VariableReference StoverDMAtHarvest: VariableName=[Stover].DMAtHarvest
                VariableReference TotalDMAtHarvest: VariableName=[Scrum].TotalDMAtHarvest
            Constant StructuralFraction: FixedValue=1; Units=0-1
          Constant Metabolic: FixedValue=0
          Constant Storage: FixedValue=0
          Constant QStructuralPriority: FixedValue=1
          Constant QMetabolicPriority: FixedValue=1
          Constant QStoragePriority: FixedValue=1
        NutrientDemandFunctions NDemands
          MultiplyFunction Structural
            VariableReference MinNConc: VariableName=[Stover].minimumNconc
            VariableReference PotentialDMAllocation: VariableName=[Stover].potentialDMAllocation.Structural
          MultiplyFunction Metabolic
            SubtractFunction MetabolicNConc
              VariableReference CritNConc: VariableName=[Stover].criticalNConc
              VariableReference MinNConc: VariableName=[Stover].minimumNconc
            VariableReference PotentialDMAllocation: VariableName=[Stover].potentialDMAllocation.Structural
          StorageNDemandFunction Storage
            VariableReference NitrogenDemandSwitch: VariableName=[Stover].nitrogenDemandSwitch
            VariableReference MaxNConc: VariableName=[Stover].MaximumNconc
          Constant QStructuralPriority: FixedValue=1
          Constant QMetabolicPriority: FixedValue=1
          Constant QStoragePriority: FixedValue=1
      Root: GrowthRespiration=0; MaintenanceRespiration=0
        Memo Description
          This organ represents the biomass below ground that is typically not removed at harvest. The processes related to water and nitrogen uptake are handled through this organ, which also contains the information about the distribution or roots over the soil profile.
          The SCRUM model assumes that a fixed proportion of biomass is allocated to roots as the crop grows, and that it has a fixed N concentration. No retranslocation for either biomass or N is enabled from roots.
          The roots grow over time is controlled by thermal time, reaching is maximum(MaximumRootDepth) at the end of the EarlyReproductive phase.
        NutrientPoolFunctions InitialWt: same as Replacements.SCRUM.Product.InitialWt
        Constant MaximumNConc: FixedValue=0; Units=g/g
          Memo Parameter set at establishment
            SCRUM gets the value for this parameter during run-time, when the crop is established. The value is set on ScrumCropInstance or CropManagement script.
        VariableReference CriticalNConc: VariableName=[Root].MaximumNConc
        VariableReference MinimumNConc: VariableName=[Root].MaximumNConc
        Constant CarbonConcentration: FixedValue=0.4; Units=g/g
        Constant RootProportion: FixedValue=0.1; Units=g/g
          Memo Parameter set at establishment
            This represents the ratio between the biomass of roots to the otehr organs (Product plus Stover), akin to root to shoot ratio for crops that have product aboveground only.
            SCRUM gets the value for this parameter during run-time, when the crop is established. The value is set on ScrumCropInstance or CropManagement script.
        MultiplyFunction DMAtHarvest
          Memo Description
            This is the expected biomass for Roots at harvest time expressed in dry matter basis.
          VariableReference AbovegroundDMAtHarvest: VariableName=[SCRUM].AboveGroundDMAtHarvest
          VariableReference PartitionFraction: VariableName=[Root].RootProportion
        Constant DMConversionEfficiency: FixedValue=1; Units=0-1
        Constant MaintenanceRespirationFunction: FixedValue=0
        RootShapeCylinder RootShape
        Constant SpecificRootLength: FixedValue=40; Units=m/g
        Constant MaximumRootDepth: FixedValue=0; Units=mm
          Memo Parameter set at establishment
            SCRUM gets the value for this parameter during run-time, when the crop is established. The value is set on ScrumCropInstance or CropManagement script
        MultiplyFunction RootFrontVelocity
          LessThanFunction RootFrontVelocity
            VariableReference TestVariable: VariableName=[Phenology].AccumulatedEmergedTt
            AddFunction GrowthDuration
              VariableReference Emerging: VariableName=[Phenology].Seed.Target
              VariableReference Seedling: VariableName=[Phenology].Seedling.Target
              VariableReference Vegetative: VariableName=[Phenology].Vegetative.Target
              VariableReference EarlyReproductive: VariableName=[Phenology].EarlyReproductive.Target
            DivideFunction IfTrue
              VariableReference MaxRootDepth: VariableName=[Root].MaximumRootDepth
              VariableReference GrowthDuration: VariableName=[Root].RootFrontVelocity.RootFrontVelocity.GrowthDuration
            Constant IfFalse: FixedValue=0
          VariableReference ThermalTime: VariableName=[Phenology].ThermalTime
        KLModiferVsDepthFunction KLModifier
          VariableReference LayerDepth: VariableName=[Physical].DepthMidPoints
          VariableReference MaximumRootDepth: VariableName=[Root].MaximumRootDepth
        Constant SoilWaterEffect: FixedValue=1
        Constant SenescenceRate: FixedValue=0; Units=/d
        Constant RemobilisationCost: FixedValue=0
        Constant NitrogenDemandSwitch: FixedValue=1
        LinearInterpolationFunction KNO3
          XYPairs: X=[0, 0.003]; Y=[0.02, 0.02]
          VariableReference XValue: VariableName=[Root].LengthDensity
        LinearInterpolationFunction KNH4
          XYPairs: X=[0, 0.003]; Y=[0, 0]
          VariableReference XValue: VariableName=[Root].LengthDensity
        LinearInterpolationFunction NUptakeSWFactor
          XYPairs: X=[0, 1]; Y=[1, 1]
          VariableReference XValue: VariableName=[Root].RWC
        Constant MaxDailyNUptake: FixedValue=30; Units=kg N/ha/d
        BiomassRemoval BiomassRemovalDefaults: HarvestFractionLiveToRemove=0; HarvestFractionDeadToRemove=0; HarvestFractionLiveToResidue=1; HarvestFractionDeadToResidue=1
        NutrientDemandFunctions DMDemands
          MultiplyFunction Structural
            PartitionFractionDemandFunction DMDemandFunction
              DivideFunction PartitionFraction
                VariableReference RootDMAtHarvest: VariableName=[Root].DMAtHarvest
                VariableReference TotalDMAtHarvest: VariableName=[Scrum].TotalDMAtHarvest
            Constant StructuralFraction: FixedValue=1
          Constant Metabolic: FixedValue=0
          Constant Storage: FixedValue=0
          Constant QStructuralPriority: FixedValue=1
          Constant QMetabolicPriority: FixedValue=1
          Constant QStoragePriority: FixedValue=1
        NutrientDemandFunctions NDemands
          MultiplyFunction Structural
            VariableReference MinNConc: VariableName=[Root].MinimumNconc
            VariableReference PotentialDMAllocation: VariableName=[Root].potentialDMAllocation.Structural
          Constant Metabolic: FixedValue=0
          Constant Storage: FixedValue=0
          Constant QStructuralPriority: FixedValue=1
          Constant QMetabolicPriority: FixedValue=1
          Constant QStoragePriority: FixedValue=1
      Nodule
        Memo Description
          This is parameterised as a dummy organ, it can supply nitrogen if the plant is a legume, but has no biomass (DM or N) nor any other function. The organ is 'activated' using a switch, which should be turned on for legume crops (so N fixation can be added as supply to the Arbitrator to help covering the crop N demand). To turn this feature on, the value for LegumeFactor should be set to a non-zero value, this parameter represents the proportion of the potential N fixation rate that the nodules are capable of supplying. The potential fixation is linked to the daily fixation and controlled by the MaximumFixation parameter. Nitrogen fixation is switched off by setting LegumeFactor to zero.
        Constant InitialWtFunction: FixedValue=0; Units=g/m^2
        Constant MaximumNConc: FixedValue=0; Units=g/g
        Constant CriticalNConc: FixedValue=0; Units=g/g
        Constant MinimumNConc: FixedValue=0; Units=g/g
        Constant CarbonConcentration: FixedValue=0.4; Units=g/g
        Constant DMConversionEfficiency: FixedValue=1; Units=0-1
        Constant MaintenanceRespirationFunction: FixedValue=0; Units=0-1
        MultiplyFunction FixationRate
          Constant MaximumFixation: FixedValue=0.03; Units=g N / g Photosynthesis
            Memo
              This represents the maximum concentration in the plant that N fixation can maintain.
          VariableReference DailyPhotosynthesis: VariableName=[Stover].Photosynthesis
          VariableReference LegumeFactor: VariableName=[SCRUM].LegumeFactor
        Constant FixationMetabolicCost: FixedValue=0
        Constant SenescenceRate: FixedValue=0; Units=/d
        Constant DetachmentRateFunction: FixedValue=0; Units=/d
        Constant RemobilisationCost: FixedValue=0
        Constant DMReallocationFactor: FixedValue=0; Units=/d
        Constant DMRetranslocationFactor: FixedValue=0; Units=/d
        Constant NitrogenDemandSwitch: FixedValue=0
        Constant NReallocationFactor: FixedValue=0; Units=/d
        Constant NRetranslocationFactor: FixedValue=0; Units=/d
        BiomassRemoval BiomassRemovalDefaults: HarvestFractionLiveToRemove=0; HarvestFractionDeadToRemove=0; HarvestFractionLiveToResidue=0; HarvestFractionDeadToResidue=0
        NutrientPoolFunctions DMDemands
          Constant Structural: FixedValue=0
          Constant Metabolic: FixedValue=0
          Constant Storage: FixedValue=0
        NutrientPoolFunctions NDemands: same as Replacements.SCRUM.Nodule.DMDemands
      CompositeBiomass Total: OrganNames=[Stover, Product, Root]; IncludeLive=true; IncludeDead=true
      CompositeBiomass AboveGround: OrganNames=[Stover, Product]; IncludeLive=true; IncludeDead=true
        Memo
          The AboveGround composite biomass object includes Stover and Product organs.
      Constant MortalityRate: FixedValue=0
      Constant SeedMortalityRate: FixedValue=0
      Constant LegumeFactor: FixedValue=1; Units=0-1
        Memo Parameter set at establishment
          This parameter controls the potential N fixation for the crop. It varies from zero, no fixation, to one when fixation is at its maximum.
          SCRUM gets the value for this parameter during run-time, when the crop is established. The value is set on ScrumCropInstance or CropManagement script.
      DivideFunction AbovegroundDMAtHarvest
        VariableReference ProductDMAtHarvest: VariableName=[Product].DMAtHarvest
        VariableReference HarvestIndex: VariableName=[Product].HarvestIndex
      AddFunction TotalDMAtHarvest
        VariableReference AbovegroundDMAtHarvest: VariableName=[SCRUM].AbovegroundDMAtHarvest
        VariableReference RootDMAtHarvest: VariableName=[Root].DMAtHarvest
      Constant MaxNConcAtSeedling: FixedValue=0.04
        Memo Parameter set at establishment
          This represents the maximum N concentration for Stover and Product at Seedling stage. SCRUM assumes that the value for naximum N concentration decreases as plants grow, strating with the value given here and reaching values specific for each organ at Maturity.
          SCRUM gets the value for this parameter during run-time, when the crop is established. The value is set on ScrumCropInstance or CropManagement script.
      Constant NDilutionConstant: FixedValue=2
        Memo Parameter set at establishment
          This parameters controls how the maximum N concentration for Stover and Product decrease over time. Follows a exponential decrease from MaxNConcAtSeedling.
          SCRUM gets the value for this parameter during run-time, when the crop is established. The value is set on ScrumCropInstance or CropManagement script.
  Simulation SCRUMSinglePlantingFromManager
    Memo Description
      This example runs scrum in the simplest way.   The necessary components in the Field are:
      * the SCRUM model.
      * A SCRUMCropInstance, named SCRUMCereal in this case but the name can be anything.
      * A manager model called EstablishCrop that sets the management information for SCRUMCereal on the first day and establishes the crop on the appropriate day.
    Weather: FileName=%root%/Tests/WeatherFiles/lincoln.met
    Clock: Start=2000-07-01; End=2001-06-30
    Summary
    SoilArbitrator Soil Arbitrator
    Zone Field: Area=1; Slope=0; AspectAngle=0; Altitude=50
      Soil: Latitude=0; Longitude=0
        Chemical: PHUnits=Water
          Thickness  PH   CEC
          100        6.6  12.44
          200        6.2  11.6525
          300        5.7  11.045
          300        5.5  10.6625
          300        5.5  9.4025
          300        5.5  9.4025
          CEC source: Calculated
        Water: Thickness=[100, 200, 300, 300, 300, 300]; InitialValues=[0.33, 0.33, 0.31, 0.15, 0.1, 0.06]; InitialPAWmm=180; RelativeTo=LL15; FilledFromTop=false
        Physical
          Thickness  ParticleSizeSand  ParticleSizeSilt  ParticleSizeClay  Rocks     BD   AirDry  LL15  DUL   SAT
          100        5                 65                30                0         1.2  0.08    0.13  0.33  0.5
          200        5                 65                30                0         1.2  0.13    0.13  0.33  0.5
          300        5                 65                30                0.135336  1.2  0.1     0.1   0.31  0.44
          300        5                 65                30                0         1.2  0.06    0.06  0.15  0.46
          300        5                 65                30                0.135336  1.2  0.04    0.04  0.1   0.44
          300        5                 65                30                0.135336  1.2  0.02    0.02  0.06  0.44
          Rocks, ParticleSizeSand, ParticleSizeSilt, ParticleSizeClay source: Calculated
          SoilCrop SCRUMSoil: LL=[0.13, 0.13, 0.1, 0.08, 0.11, 0.11]; KL=[0.1, 0.1, 0.1, 0.1, 0.1, 0.1]; XF=[1, 1, 1, 1, 1, 1]
          SoilCrop PotatoSoil: LL=[0.13, 0.13, 0.27, 0.27, 0.3, 0.3]; KL=[0.1, 0.06, 0.03, 0.01, 0, 0]; XF=[1, 1, 0.1, 0, 0, 0]
        WaterBalance SoilWater: SummerDate=1-Nov; SummerU=9; SummerCona=4.4; WinterDate=1-Apr; WinterU=9; WinterCona=4.4; DiffusConst=88; DiffusSlope=35.4; Salb=0.18; CN2Bare=68; CNRed=20; CNCov=0.8; DischargeWidth=0; CatchmentArea=0; PSIDul=-100
          Thickness  SWCON  KLAT
          100        0.55   0
          200        0.55   0
          300        0.55   0
          300        0.55   0
          300        0.55   0
          300        0.55   0
        Nutrient
        Organic: FOMCNRatio=30; CarbonUnits=Total
          Thickness  Carbon  SoilCNRatio  FBiom  FInert  FOM
          100        1.82    11.5         0.025  0.3     1243.93
          200        1.47    11.5         0.025  0.4     833.832
          300        1.2     11.5         0.015  0.75    457.617
          300        1.03    11.5         0.01   0.9     251.145
          300        0.47    11.5         0.01   0.96    137.831
          300        0.47    11.5         0.01   0.96    75.6435
        LayerStructure
          Thickness=[100, 100, 100, 100, 100, 100, 100, 100, 100, 100, 100, 100, 100, 100, 100]
        Solute NO3: Thickness=[100, 200, 300, 300, 300, 300]; InitialValues=[225, 12.5, 1.38889, 1.38889, 0, 0]; InitialValuesUnits=ppm; WaterTableConcentration=0; D0=0; DepthConstant=0; MaxDepthSoluteAccessible=0; RunoffEffectivenessAtMovingSolute=0; MaxEffectiveRunoff=0
        Solute NH4: Thickness=[100, 200, 300, 300, 300, 300]; InitialValues=[0, 0, 0, 0, 0, 0]; InitialValuesUnits=ppm; WaterTableConcentration=0; D0=0; DepthConstant=0; MaxDepthSoluteAccessible=0; RunoffEffectivenessAtMovingSolute=0; MaxEffectiveRunoff=0
        Solute Urea: Thickness=[100, 200, 300, 300, 300, 300]; InitialValues=[0, 0, 0, 0, 0, 0]; InitialValuesUnits=kg/ha; WaterTableConcentration=0; D0=0; DepthConstant=0; MaxDepthSoluteAccessible=0; RunoffEffectivenessAtMovingSolute=0; MaxEffectiveRunoff=0
        SoilTemperature Temperature
      SurfaceOrganicMatter: InitialResidueName=wheat; InitialResidueType=wheat; InitialResidueMass=2000; InitialStandingFraction=0; InitialCPR=0; InitialCNR=80
      MicroClimate: a_interception=0; b_interception=1; c_interception=0; d_interception=0; SoilHeatFluxFraction=0.4; MinimumHeightDiffForNewLayer=0; NightInterceptionFraction=0.5; ReferenceHeight=2
      Plant SCRUM
      Irrigation
      Fertiliser
      Manager EstablishCrop
        CropName = ScrumCereal
        EstablishDate = 14/10/2000
        EstablishStage = Seed
        PlantingDepth = 15
        HarvestTimeOption = SettingThermalTime
        HarvestDate = 01/01/0001 00:00:00
        Tt_EstablishToHarvest = 1500
        HarvestStage = Maturity
        ExpectedYield = 8
        FieldLoss = 0
        ResidueRemoval = 0
        ResidueIncorporation = 1
        ResidueIncorporationDepth = 150
```csharp
using System;
using System.Linq;
using APSIM.Shared.Utilities;
using Models.Core;
using Models.Soils;
using Models.PMF;
using Models.PMF.SimplePlantModels;
using Models.Utilities;

namespace Models
{
    [Serializable]
    public class Script : Model
    {
        [Link] Clock clock;
        [Link] Zone zone;
        [Link(Type = LinkType.Scoped, ByName = true)]
        public Plant scrum = null;

        [Separator("Define the SCRUM crop to plant and its basic management")]

        /// <summary>SCRUM crop to stablish</summary>
        [Description("Chose the crop to plant:")]
        [Display(Type = DisplayType.SCRUMcropName)]
        public string CropName { get; set; }

        [Separator("Specify establishment and harvest conditions for this crop")]

        /// <summary>Date to establishment the crop</summary>
        [Description("Establishment date (dd-mmm or dd/mm/yyyy):")]
        public string EstablishDate { get; set; }

        /// <summary>Stages at which the SCRUM is established</summary>
        [Description("Choose the establishment stage")]
        [Display(Type = DisplayType.ScrumEstablishStages)]
        public string EstablishStage {get; set;}

        /// <summary>Depth at which the crop/seeds are planted.</summary>
        [Description(" Planting depth (mm):")]
        public double PlantingDepth { get; set; }

        /// <summary>Choice on how the duration of crop is defined</summary>
        [Description("Choose how the crop cycle is defined:")]
        public HarvestTimingOption HarvestTimeOption {get; set;}

        private bool isHarvestDateDefined { get { return HarvestTimeOption == HarvestTimingOption.SettingDate; } }
        private bool isThermalTimeDefined { get { return HarvestTimeOption == HarvestTimingOption.SettingThermalTime; } }

        /// <summary>Date to establishment the crop</summary>
        [Description("  Harvest date (dd/mm/yyyy):")]
        [Display(VisibleCallback = "isHarvestDateDefined")]
        public DateTime HarvestDate { get; set; }

        /// <summary>Thermal time from establishment to harvest (if blank or zero must specify harvest date)</summary>
        [Description("  Thermal time from establishment to harvest (oCd):")]
        [Display(VisibleCallback = "isThermalTimeDefined")]
        public double Tt_EstablishToHarvest { get; set; }

        /// <summary>Stage at which the crop is to be harvested at</summary>
        [Description("Choose the stage to harvest the crop:")]
        [Display(Type = DisplayType.ScrumHarvestStages)]
        public string HarvestStage {get; set;}

        [Separator("Specify an appropriate potential yield for the crop (based on assumed genotype, sowing date, and local conditions)\n" +
                   "  *SCRUM will reduce yield if water or N stress are predicted")]

        /// <summary>Expected crop yield (t FW/ha)</summary>
        [Description("Potential crop yield, fresh weight (t/ha)")]
        public double ExpectedYield {get; set;}

        [Separator("Specify proportions of field loss and residue removal at harvest")]

        /// <summary>Proportion of product that is left in the field at harvest (due to disease, market, ect.)</summary>
        [Description("Proportion of product lost in the field at harvest (0-1):")]
        public double FieldLoss { get; set; }

        /// <summary>Proportion of stover that is removed from the field at harvest (e.g., bailing)</summary>
        [Description("Proportion of stover removed from the field at harvest (0-1):")]
        public double ResidueRemoval { get; set; }

        /// <summaryProportion of residues that is incorporated by cultivation after harvest</summary>
        [Description("Proportion of residue incorporated to soil at harvest (0-1):")]
        public double ResidueIncorporation { get; set; }

        /// <summary>Depth down to which the residues that are incorporated to by cultivation after harvest</summary>
        [Description("Depth to incorporate residues (mm):")]
        public double ResidueIncorporationDepth { get; set; }

        private ScrumManagementInstance management;


        [EventSubscribe("DoManagement")]
        private void OnDoManagement(object sender, EventArgs e)
        {
            if (DateUtilities.DatesAreEqual(EstablishDate, clock.Today))
            {
                if (isHarvestDateDefined && (HarvestDate <= clock.Today))
                {
                    throw new Exception("Harvest date is earlier than establishment date");
                }

                management = new ScrumManagementInstance(cropName: CropName,
                                                         establishDate: clock.Today,
                                                         establishStage: EstablishStage,
                                                         plantingDepth: PlantingDepth,
                                                         harvestStage: HarvestStage,
                                                         expectedYield: ExpectedYield,
                                                         harvestDate: isHarvestDateDefined? HarvestDate : null,
                                                         ttEstablishmentToHarvest: isThermalTimeDefined? Tt_EstablishToHarvest: double.NaN,
                                                         fieldLoss: FieldLoss,
                                                         residueRemoval: ResidueRemoval,
                                                         residueIncorporation: ResidueIncorporation,
                                                         residueIncorporationDepth: ResidueIncorporationDepth);
                ScrumCropInstance currentCrop = zone.FindDescendant<ScrumCropInstance>(CropName);
                currentCrop.Establish(management);
            }
        }

        /// <summary>Flag how harvest time is defined.</summary>
        public enum HarvestTimingOption
        {
            /// <summary>A date is to be used.</summary>
            SettingDate,
            /// <summary>A given thermal time sum is to be used.</summary>
            SettingThermalTime
        }
    }
}
```
      Manager AutomaticIrrigation
        IrrigationIsEnabled = True
        SeasonStartDate = 1-Sep
        SeasonEndDate = 30-Apr
        OnlyApplyOntoCrop = True
        SeasonsAllocation = 1000
        TriggerFraction = 0.8
        RefillFraction = 0.95
        MaximumIrrigationAmount = 40
        ReturnDays = 3
        DepthToMonitor = 600
        LimitMonitoringDepth = True
```csharp
// This script can be used to apply irrigation automatically, based soil water status
// Blame to RCichota, last updated in 18/Mar/2025

using System;
using System.Xml.Serialization;
using Newtonsoft.Json;
using APSIM.Shared.Utilities;
using Models.Core;
using Models.Soils;
using Models.PMF;
using Models.Interfaces;
using Models.Soils.Nutrients;

namespace Models
{
    [Serializable]
    [System.Xml.Serialization.XmlInclude(typeof(Model))]
    public class Script : Model
    {
        //Communication to other modules
        [Link] private Clock clock;
        [Link] private ISummary summary;
        [Link] private IPhysical soilPhysical;
        [Link] private ISoilWater waterBalance;
        [Link] private Irrigation Irrigation;
        [Link] private Plant SCRUM;

        //User inputs from properties tab
        [Separator("Generic irrigation management")]
        [Description(" Enable automatic irrigation management?              ")]
        public bool IrrigationIsEnabled {get; set;}

        [Description(" Date to start the irrigation season (dd-mmm):")]
        [Display(VisibleCallback = "IrrigationIsEnabled")]
        public string SeasonStartDate {get; set;}

        [Description(" Date to end the irrigation season (dd-mmm):")]
        [Display(VisibleCallback = "IrrigationIsEnabled")]
        public string SeasonEndDate {get; set;}

        [Description(" Only irrigate if there is a crop on the field?")]
        [Display(VisibleCallback = "IrrigationIsEnabled")]
        public bool OnlyApplyOntoCrop {get; set;}

        [Description(" Season allocation (mm):")]
        [Display(VisibleCallback = "IrrigationIsEnabled")]
        public double SeasonsAllocation {get; set;}

        [Description(" Fraction of PAWC to trigger irrigation (0-1):")]
        [Display(VisibleCallback = "IrrigationIsEnabled")]
        public double TriggerFraction {get; set;}

        [Description(" Fraction of PAWC to refill soil to (0-1):")]
        [Display(VisibleCallback = "IrrigationIsEnabled")]
        public double RefillFraction {get; set;}

        [Description(" Maximum irrigation amount per application (mm):")]
        [Display(VisibleCallback = "IrrigationIsEnabled")]
        public double MaximumIrrigationAmount {get; set;}

        [Description(" Minimum number of days between irrigations:")]
        [Display(VisibleCallback = "IrrigationIsEnabled")]
        public double ReturnDays {get; set;}

        [Description(" Depth to calculate PAWC (mm):")]
        [Display(VisibleCallback = "IrrigationIsEnabled")]
        public double DepthToMonitor {get; set;}

        [Description(" Limit the depth to the rooting depth?")]
        [Display(VisibleCallback = "IrrigOnAndOnlyOnCrops")]
        public bool LimitMonitoringDepth {get; set;}

        //Class members
        [JsonIgnore] public bool SeasonIsOpen {get; set;}
        [JsonIgnore] private bool CropIsActive {get; set;}
        [JsonIgnore] private bool IrrigatorIsAvailable {get; set;}
        [JsonIgnore] private bool SoilIsDry {get; set;}
        [JsonIgnore] private bool WaterIsAvailable {get; set;}

        [JsonIgnore] public double MonitoredLayerTrigger {get; set;}
        [JsonIgnore] public double MonitoredLayerTarget {get; set;}
        [JsonIgnore] public double MonitoredLayerDUL {get; set;}
        [JsonIgnore] public double MonitoredLayerLL {get; set;}
        [JsonIgnore] public double MonitoredLayerSW {get; set;}
        [JsonIgnore] public double MonitoredLayerPAWC {get; set;}
        [JsonIgnore] public double MonitoredLayerPAW {get; set;}
        [JsonIgnore] public double MonitoredDepth {get; set;}

        [JsonIgnore] public double AmountToApply {get; set;}
        [JsonIgnore] public double SeasonAppliedAmount {get; set;}
        [JsonIgnore] public double DaysSinceLastApplication {get; set;}

        //Internal Variables
        private bool IrrigOnAndOnlyOnCrops
        { get {return IrrigationIsEnabled && OnlyApplyOntoCrop; }}
        private double lastLayerFraction;
        private int lastLayer;


        [EventSubscribe("StartOfSimulation")]
        private void OnStartOfSimulation(object sender, EventArgs e)
        {
            // initialise some variables
            DaysSinceLastApplication = ReturnDays;
            if (!OnlyApplyOntoCrop)
            {
                LimitMonitoringDepth = false;
            }

            // calculate soil water variables
            calculateWaterThresholds(DepthToMonitor);
            MonitoredLayerTrigger = MonitoredLayerLL + MonitoredLayerPAWC*TriggerFraction;
            MonitoredLayerTarget = MonitoredLayerLL + MonitoredLayerPAWC*RefillFraction;
            MonitoredDepth = DepthToMonitor;
        }

        [EventSubscribe("StartOfDay")]
        private void OnStartOfDay(object sender, EventArgs e)
        {
            // check whether we are starting a new season, zero amount
            if (DateUtilities.DatesAreEqual(SeasonStartDate, clock.Today))
            {
                SeasonAppliedAmount = 0.0;
            }
        }

        [EventSubscribe("DoManagement")]
        private void OnDoManagement(object sender, EventArgs e)
        {
            // get the current amount of water in the soil
            if (LimitMonitoringDepth)
            { // get the current rooting depth, no less than 50mm, no more than DepthToMonitor
                MonitoredDepth = DepthToMonitor;
                if (SCRUM.IsAlive)
                {
                    MonitoredDepth = Math.Min(DepthToMonitor, Math.Max(50.0, SCRUM.Root.Depth));
                }

                // re-calculate the soil water variables
                calculateWaterThresholds(MonitoredDepth);
                MonitoredLayerTrigger = MonitoredLayerLL + MonitoredLayerPAWC*TriggerFraction;
                MonitoredLayerTarget = MonitoredLayerLL + MonitoredLayerPAWC*RefillFraction;
            }

            calculateSoilWater(MonitoredDepth);

            // check water status and management conditions, if we can irrigate at all
            if (IrrigationIsEnabled)
            {
                DaysSinceLastApplication += 1;

                // are we within the irrigation season?
                SeasonIsOpen = false;
                if (DateUtilities.WithinDates(SeasonStartDate, clock.Today, SeasonEndDate))
                {
                    SeasonIsOpen = true;
                }

                // is there a crop in the ground that needs irrigation?
                CropIsActive = true;
                if (OnlyApplyOntoCrop)
                {
                    CropIsActive = false;
                    if (SCRUM.IsAlive)
                    {
                        CropIsActive = true;
                    }
                }

                // is the irrigator available?
                IrrigatorIsAvailable = false;
                if (DaysSinceLastApplication >= ReturnDays)
                {
                    IrrigatorIsAvailable = true;
                }

                // is the soil dry enough to require irrigation?
                SoilIsDry = false;
                if (MonitoredLayerSW <= MonitoredLayerTrigger)
                {
                    SoilIsDry = true;
                }

                // is there water available, within allocation?
                WaterIsAvailable = false;
                if (SeasonAppliedAmount < SeasonsAllocation)
                {
                    WaterIsAvailable = true;
                }

                //Lets bloody well irrigate then!!!!
                if (SeasonIsOpen && CropIsActive && IrrigatorIsAvailable && SoilIsDry && WaterIsAvailable)
                {
                    AmountToApply = MonitoredLayerTarget - MonitoredLayerSW;
                    AmountToApply = Math.Min(AmountToApply, MaximumIrrigationAmount);
                    AmountToApply = Math.Min(AmountToApply, SeasonsAllocation - SeasonAppliedAmount);
                    AmountToApply = Math.Max(AmountToApply, 0.0);
                    Irrigation.Apply(amount: AmountToApply, depth: 0.0);
                    DaysSinceLastApplication = 0;
                    SeasonAppliedAmount += AmountToApply;
                    summary.WriteMessage(this, "Automatic irrigation  applied, " + AmountToApply.ToString("#0.0") + " mm", MessageType.Diagnostic);
                }
            }
        }

        // computes the water thresholds in the soil down to a given depth
        private void calculateWaterThresholds(double depthToCalculate)
        {
            MonitoredLayerLL = 0.0;
            MonitoredLayerDUL = 0.0;
            double accumulatedDepth = 0.0;
            lastLayerFraction = 0.0;
            lastLayer = 0;
            for (int layer = 0; accumulatedDepth <= depthToCalculate; layer++)
            {
                double layerFraction = (depthToCalculate - accumulatedDepth)/soilPhysical.Thickness[layer];
                layerFraction = Math.Min(1.0, Math.Max(0.0, layerFraction));
                MonitoredLayerLL += soilPhysical.LL15mm[layer]*layerFraction;
                MonitoredLayerDUL += soilPhysical.DULmm[layer]*layerFraction;
                accumulatedDepth += soilPhysical.Thickness[layer];
                if (accumulatedDepth >= depthToCalculate)
                {
                    lastLayerFraction = layerFraction;
                    lastLayer = layer;
                }
            }

            MonitoredLayerPAWC = MonitoredLayerDUL - MonitoredLayerLL;
        }

        // computes the amount of water in the soil down to a given depth
        private void calculateSoilWater(double depthToCalculate)
        {
            MonitoredLayerSW = 0.0;
            double accumulatedDepth = 0.0;
            for (int layer = 0; accumulatedDepth <= depthToCalculate; layer++)
            {
                if (layer < lastLayer)
                {
                    MonitoredLayerSW += waterBalance.SWmm[layer];
                }
                else
                {
                    MonitoredLayerSW += waterBalance.SWmm[layer]*lastLayerFraction;
                }

                accumulatedDepth += soilPhysical.Thickness[layer];
            }

            MonitoredLayerPAW = Math.Max(0.0, MonitoredLayerSW - MonitoredLayerLL);
        }
    }
}
```
      Manager AutomaticFertiliser
        FertiliserIsEnabled = True
        SeasonStartDate = 1-Aug
        SeasonEndDate = 30-Apr
        OnlyApplyOntoCrop = False
        SeasonsAllocation = 1000
        TriggerSoilN = 50
        AmountToApply = 25
        FertiliserType = UreaN
        ReturnDays = 3
        DepthToMonitor = 300
        LimitMonitoringDepth = False
```csharp
// This script can be used to apply N fertiliser automatically, based soil mineral N status
// Blame to RCichota, last updated in 18/Mar/2025

using System;
using System.Xml.Serialization;
using Newtonsoft.Json;
using APSIM.Shared.Utilities;
using Models.Core;
using Models.Soils;
using Models.PMF;
using Models.Interfaces;
using Models.Soils.Nutrients;

namespace Models
{
    [Serializable]
    [System.Xml.Serialization.XmlInclude(typeof(Model))]
    public class Script : Model
    {
        //Communication to other modules
        [Link] private Clock clock;
        [Link] private ISummary summary;
        [Link] private IPhysical soilPhysical;
        [Link] private INutrient soilNutrient;
        [Link] private Fertiliser Fertiliser;
        [Link] private Plant SCRUM;

        //User inputs from properties tab
        [Separator("Generic N fertiliser management")]
        [Description(" Enable automatic fertiliser management?                           ")]
        public bool FertiliserIsEnabled {get; set;}

        [Description(" Date to start the fertiliser season (dd-mmm):")]
        [Display(VisibleCallback = "FertiliserIsEnabled")]
        public string SeasonStartDate {get; set;}

        [Description(" Date to end the fertiliser season (dd-mmm):")]
        [Display(VisibleCallback = "FertiliserIsEnabled")]
        public string SeasonEndDate {get; set;}

        [Description(" Only fertilise if there is a crop on the field?")]
        [Display(VisibleCallback = "FertiliserIsEnabled")]
        public bool OnlyApplyOntoCrop {get; set;}

        [Description(" Season allocation (kg N/ha):")]
        [Display(VisibleCallback = "FertiliserIsEnabled")]
        public double SeasonsAllocation {get; set;}

        [Description(" Minimum soil mineral N, trigger an application (kg N/ha):")]
        [Display(VisibleCallback = "FertiliserIsEnabled")]
        public double TriggerSoilN {get; set;}

        [Description(" Fertiliser N amount per application (kg N/ha):")]
        [Display(VisibleCallback = "FertiliserIsEnabled")]
        public double AmountToApply {get; set;}

        [Description(" Type of fertiliser to apply:")]
        [Display(VisibleCallback = "FertiliserIsEnabled", Type = DisplayType.FertiliserType)]
        public string FertiliserType { get; set; }

        [Description(" Minimum number of days between applications:")]
        [Display(VisibleCallback = "FertiliserIsEnabled")]
        public double ReturnDays {get; set;}

        [Description(" Depth to calculate soil mineral N (mm):")]
        [Display(VisibleCallback = "FertiliserIsEnabled")]
        public double DepthToMonitor {get; set;}

        [Description(" Limit the depth to the rooting depth?")]
        [Display(VisibleCallback = "FertOnAndOnlyOnCrops")]
        public bool LimitMonitoringDepth {get; set;}

        //Class members
        [JsonIgnore] public bool SeasonIsOpen {get; set;}
        [JsonIgnore] private bool CropIsActive {get; set;}
        [JsonIgnore] private bool SpreaderIsAvailable {get; set;}
        [JsonIgnore] private bool SoilNitrogenIsLow {get; set;}
        [JsonIgnore] private bool FertiliserIsAvailable {get; set;}

        [JsonIgnore] public double MonitoredLayerSoilN {get; set;}
        [JsonIgnore] public double MonitoredDepth {get; set;}

        [JsonIgnore] public double SeasonAppliedAmount {get; set;}
        [JsonIgnore] public double DaysSinceLastApplication {get; set;}

        //Internal Variables
        private bool FertOnAndOnlyOnCrops
        { get {return FertiliserIsEnabled && OnlyApplyOntoCrop; }}


        [EventSubscribe("StartOfSimulation")]
        private void OnStartOfSimulation(object sender, EventArgs e)
        {
            // initialise some variables
            DaysSinceLastApplication = ReturnDays;
            if (!OnlyApplyOntoCrop)
            {
                LimitMonitoringDepth = false;
            }

            MonitoredDepth = DepthToMonitor;
        }

        [EventSubscribe("StartOfDay")]
        private void OnStartOfDay(object sender, EventArgs e)
        {
            // check whether we are starting a new season, zero amount
            if (DateUtilities.DatesAreEqual(SeasonStartDate, clock.Today))
            {
                SeasonAppliedAmount = 0.0;
            }
        }

        [EventSubscribe("DoManagement")]
        private void OnDoManagement(object sender, EventArgs e)
        {
            // get the current amount of nitrogen in the soil
            if (LimitMonitoringDepth)
            { // get the current rooting depth, no less than 50mm, no more than DepthToMonitor
                MonitoredDepth = DepthToMonitor;
                if (SCRUM.IsAlive)
                {
                    MonitoredDepth = Math.Min(DepthToMonitor, Math.Max(50.0, SCRUM.Root.Depth));
                }
            }

            calculateSoilMineralNitrogen(MonitoredDepth);

            // check N status and management conditions, if we can fertilise at all
            if (FertiliserIsEnabled)
            {
                DaysSinceLastApplication += 1;

                // are we within the irrigation season?
                SeasonIsOpen = false;
                if (DateUtilities.WithinDates(SeasonStartDate, clock.Today, SeasonEndDate))
                {
                    SeasonIsOpen = true;
                }

                // is there a crop in the ground that needs fertiliser?
                CropIsActive = true;
                if (OnlyApplyOntoCrop)
                {
                    CropIsActive = false;
                    if (SCRUM.IsAlive)
                    {
                        CropIsActive = true;
                    }
                }

                // is the spreader available?
                SpreaderIsAvailable = false;
                if (DaysSinceLastApplication >= ReturnDays)
                {
                    SpreaderIsAvailable = true;
                }

                // is the soil N low enough to require fertiliser?
                SoilNitrogenIsLow = false;
                if (MonitoredLayerSoilN <= TriggerSoilN)
                {
                    SoilNitrogenIsLow = true;
                }

                // is there N fertiliser available, within allocation?
                FertiliserIsAvailable = false;
                if (SeasonAppliedAmount < SeasonsAllocation)
                {
                    FertiliserIsAvailable = true;
                }

                //Lets bloody well fertilise then!!!!
                if (SeasonIsOpen && CropIsActive && SpreaderIsAvailable && SoilNitrogenIsLow && FertiliserIsAvailable)
                {
                    AmountToApply = Math.Min(AmountToApply, SeasonsAllocation - SeasonAppliedAmount);
                    AmountToApply = Math.Max(AmountToApply, 0.0);
                    Fertiliser.Apply(amount: AmountToApply, type: FertiliserType, depth: 10.0);
                    DaysSinceLastApplication = 0;
                    SeasonAppliedAmount += AmountToApply;
                    summary.WriteMessage(this, "Automatic N fertiliser applied, " + AmountToApply.ToString("#0.0") + " kgN/ha", MessageType.Diagnostic);
                }
            }
        }

        // computes the amount of mineral N in the soil down to a given depth
        private void calculateSoilMineralNitrogen(double depthToCalculate)
        {
            MonitoredLayerSoilN = 0.0;
            double accumulatedDepth = 0.0;
            for (int layer = 0; accumulatedDepth <= depthToCalculate; layer++)
            {
                double layerFraction = (depthToCalculate - accumulatedDepth)/soilPhysical.Thickness[layer];
                layerFraction = Math.Min(1.0, Math.Max(0.0, layerFraction));
                MonitoredLayerSoilN += (soilNutrient.MineralN[layer])*layerFraction;
                accumulatedDepth += soilPhysical.Thickness[layer];
            }
        }
    }
}
```
      Report: EventNames=[Clock].DoReport
        VariableNames:
          [Clock].Today
          [SCRUM].SowingData.Cultivar
          // SCRUM Biomass
          [SCRUM].Total.Wt
          [SCRUM].Total.N
          [SCRUM].TotalDMAtHarvest
          [SCRUM].Product.Live.Wt
          [SCRUM].Product.Live.N
          [SCRUM].Product.Live.NConc
          [SCRUM].Product.DMAtHarvest
          [SCRUM].Product.ExpectedYield
          [SCRUM].Product.DryMatterContent
          [SCRUM].Product.Yield
          [SCRUM].Stover.Live.Wt
          [SCRUM].Stover.Live.N
          [SCRUM].Stover.Live.NConc
          [SCRUM].Stover.DMAtHarvest
          [SCRUM].Stover.Height
          [SCRUM].Stover.LAI
          [SCRUM].Stover.LAIDead
          [SCRUM].Stover.LAITotal
          [SCRUM].Stover.CoverDead
          [SCRUM].Stover.CoverGreen
          [SCRUM].Stover.CoverTotal
          [SCRUM].Root.Live.Wt
          [SCRUM].Root.Live.N
          [SCRUM].Root.Live.NConc
          [SCRUM].Root.DMatHarvest
          [SCRUM].Root.Depth
          // SCRUM Phenology
          [SCRUM].Phenology.AccumulatedEmergedTt
          [SCRUM].Phenology.AccumulatedTt
          [SCRUM].Phenology.CurrentPhaseName
          [SCRUM].Phenology.CurrentStageName
          [SCRUM].Phenology.Stage
          [SCRUM].Phenology.ThermalTime
          // SCRUM Allocation
          [SCRUM].Product.DMDemands.Structural.DMDemandFunction.PartitionFraction
          [SCRUM].Stover.DMDemands.Structural.DMDemandFunction.PartitionFraction
          [SCRUM].Root.DMDemands.Structural.DMDemandFunction.PartitionFraction
          [SCRUM].Arbitrator.DM.TotalPlantDemand
          [SCRUM].Arbitrator.DM.TotalFixationSupply
          [SCRUM].Arbitrator.N.TotalPlantDemand
          [SCRUM].Arbitrator.N.TotalPlantSupply
          [SCRUM].Arbitrator.N.TotalPlantSupply
          [SCRUM].Product.Allocated.Wt
          [SCRUM].Stover.Allocated.Wt
          [SCRUM].Root.Allocated.Wt
          // SCRUM limiting factors
          [SCRUM].Arbitrator.DM.NutrientLimitation
          [SCRUM].Arbitrator.DM.SinkLimitation
          [SCRUM].Arbitrator.FN
          [SCRUM].Stover.Fn
          [SCRUM].Stover.Fw
          // Water balance
          sum([Soil].SoilWater.SWmm) as SoilTotalWater
          [Soil].SoilWater.Drainage
          [Soil].SoilWater.Es
          [Soil].SoilWater.Runoff
          [Irrigation].IrrigationApplied
          [SCRUM].Stover.WaterDemand
          [SCRUM].Stover.Transpiration
          [SCRUM].Root.WaterUptake
          [AutomaticIrrigation].Script.AmountToApply
          [AutomaticIrrigation].Script.MonitoredLayerLL
          [AutomaticIrrigation].Script.MonitoredLayerDUL
          [AutomaticIrrigation].Script.MonitoredLayerSW
          [AutomaticIrrigation].Script.MonitoredLayerTarget
          [AutomaticIrrigation].Script.MonitoredLayerTrigger
          // Nitrogen balance
          sum([Soil].Nutrient.MineralN) as TotalSoilNitrogen
          [Fertiliser].NitrogenApplied
          [Soil].SoilWater.LeachNO3
          [Soil].Nutrient.DenitrifiedN
          [SCRUM].Root.NUptake
          [AutomaticFertiliser].Script.MonitoredLayerSoilN
          [AutomaticFertiliser].Script.AmountToApply
      ScrumCropInstance ScrumCereal: HarvestIndex=0.45; MoistureContent=0.14; RootProportion=0.1; MaxRootDepth=1005; MaxHeight=700; MaxCover=0.97; ExtinctionCoefficient=0.55; rCover=1; TypicalHarvestStage=Ripe; SeedlingNConc=0.05; ProductHarvestNConc=0.015; StoverHarvestNConc=0.01; RootNConc=0.01; OptimumTemperature=30; MaxTemperature=40; Tt_SowToEmergence=100; GSMax=0.008; R50=150; ConsiderWaterStress=true; Factor_XoBiomass=0.5; Factor_bBiomass=0.2; Factor_XoCover=0.4; Factor_bCover=0.2; Factor_XoHeight=0.7; Factor_bHeight=0.2
        zero: LegumeFactor, BaseTemperature, PlantingDepth, ExpectedYield, Tt_EstablishmentToHarvest, FieldLoss, ResidueRemoval, ResidueIncorporation, ResidueIncorporationDepth, Tt_EmergenceToMaturity
  Simulation SCRUMRepeatPlantingFromManager
    Memo Description
      This example specifies a SCRUMCropInstance and sows it on the same date each year.   The necessary components in the Field are:
      * the SCRUM model
      * A SCRUMCropInstance, named SCRUMCereal in this case but the name can be anything
      * A manager model called "Sow Cereal same date each year" that sets the management information for SCRUMCereal and establishs it on the same date each year.
    Weather: FileName=%root%/Tests/WeatherFiles/lincoln.met
    Clock: Start=1998-10-14; End=2006-03-01
    Summary
    SoilArbitrator Soil Arbitrator
    Zone Field: Area=1; Slope=0; AspectAngle=0; Altitude=50
      Soil: same as SCRUMSinglePlantingFromManager.Field.Soil
      SurfaceOrganicMatter: InitialResidueName=wheat; InitialResidueType=wheat; InitialResidueMass=2000; InitialStandingFraction=0; InitialCPR=0; InitialCNR=80
      MicroClimate: a_interception=0; b_interception=1; c_interception=0; d_interception=0; SoilHeatFluxFraction=0.4; MinimumHeightDiffForNewLayer=0; NightInterceptionFraction=0.5; ReferenceHeight=2
      Manager Sow Cereal same date each year
        CropName = ScrumCereal
        EstablishDate = 01-Sep
        EstablishStage = Seed
        PlantingDepth = 15
        HarvestTimeOption = SettingThermalTime
        HarvestDate = 01/01/0001 00:00:00
        Tt_EstablishToHarvest = 1000
        HarvestStage = Maturity
        ExpectedYield = 8
        FieldLoss = 0
        ResidueRemoval = 0
        ResidueIncorporation = 1
        ResidueIncorporationDepth = 100
        script: same as in SCRUMSinglePlantingFromManager.Field.EstablishCrop
      Plant SCRUM
      Irrigation
      Fertiliser
      Manager AutomaticIrrigation: same as SCRUMSinglePlantingFromManager.Field.AutomaticIrrigation
      Manager AutomaticFertiliser
        FertiliserIsEnabled = True
        SeasonStartDate = 1-Aug
        SeasonEndDate = 30-Apr
        OnlyApplyOntoCrop = False
        SeasonsAllocation = 1000
        TriggerSoilN = 75
        AmountToApply = 25
        FertiliserType = UreaN
        ReturnDays = 3
        DepthToMonitor = 300
        LimitMonitoringDepth = False
        script: same as in SCRUMSinglePlantingFromManager.Field.AutomaticFertiliser
      Report: same as SCRUMSinglePlantingFromManager.Field.Report
      ScrumCropInstance ScrumCereal: HarvestIndex=0.45; MoistureContent=0.14; RootProportion=0.1; MaxRootDepth=1005; MaxHeight=700; MaxCover=0.97; ExtinctionCoefficient=0.55; rCover=1; TypicalHarvestStage=Ripe; SeedlingNConc=0.05; ProductHarvestNConc=0.015; StoverHarvestNConc=0.01; RootNConc=0.01; OptimumTemperature=30; MaxTemperature=40; Tt_SowToEmergence=100; GSMax=0.008; R50=150; ConsiderWaterStress=true; Factor_XoBiomass=0.5; Factor_bBiomass=0.2; Factor_XoCover=0.4; Factor_bCover=0.2; Factor_XoHeight=0.7; Factor_bHeight=0.2
        zero: LegumeFactor, BaseTemperature, PlantingDepth, ExpectedYield, Tt_EstablishmentToHarvest, FieldLoss, ResidueRemoval, ResidueIncorporation, ResidueIncorporationDepth, Tt_EmergenceToMaturity
  Simulation SCRUMRotationFromManager
    Memo Description
      This example specifies a simple rotation of two seperate crops simulated using SCRUM.  The necessary components in the Field are:
      * the SCRUM model
      * A SCRUMCropInstance (SCRUMCereal) that parameterises the first crop and a manager script ("Sow Cereal on Oct2000 harvest apr2001") that sets the management informaiton for this crop and establishes it on the appropriate date.
      * A SCRUMCropInstance (SCRUMLegume) that parameterises the second crop and a manager script ("Sow legume Jun2001 harvest after 600 oCd") that sets the management informaiton for this crop and establishes it on the appropriate date.
    Weather: FileName=%root%/Tests/WeatherFiles/lincoln.met
    Clock: Start=2000-07-01; End=2002-01-01
    Summary
    SoilArbitrator Soil Arbitrator
    Zone Field: Area=1; Slope=0; AspectAngle=0; Altitude=50
      Soil: Latitude=0; Longitude=0
        Chemical: same as SCRUMSinglePlantingFromManager.Field.Soil.Chemical
        Water: Thickness=[100, 200, 300, 300, 300, 300]; InitialValues=[0.33, 0.33, 0.31, 0.15, 0.1, 0.06]; InitialPAWmm=180; RelativeTo=LL15; FilledFromTop=false
        Physical: same as SCRUMSinglePlantingFromManager.Field.Soil.Physical
        WaterBalance SoilWater: same as SCRUMSinglePlantingFromManager.Field.Soil.SoilWater
        Nutrient
        Organic: same as SCRUMSinglePlantingFromManager.Field.Soil.Organic
        LayerStructure
          Thickness=[100, 100, 100, 100, 100, 100, 100, 100, 100, 100, 100, 100, 100, 100, 100]
        Solute NO3: Thickness=[100, 200, 300, 300, 300, 300]; InitialValues=[225, 12.5, 1.389, 1.389, 0, 0]; InitialValuesUnits=ppm; WaterTableConcentration=0; D0=0; DepthConstant=0; MaxDepthSoluteAccessible=0; RunoffEffectivenessAtMovingSolute=0; MaxEffectiveRunoff=0
        Solute NH4: same as SCRUMSinglePlantingFromManager.Field.Soil.NH4
        Solute Urea: same as SCRUMSinglePlantingFromManager.Field.Soil.Urea
        SoilTemperature Temperature
      SurfaceOrganicMatter: InitialResidueName=wheat; InitialResidueType=wheat; InitialResidueMass=2000; InitialStandingFraction=0; InitialCPR=0; InitialCNR=80
      MicroClimate: a_interception=0; b_interception=1; c_interception=0; d_interception=0; SoilHeatFluxFraction=0.4; MinimumHeightDiffForNewLayer=0; NightInterceptionFraction=0.5; ReferenceHeight=2
      Plant SCRUM
      Manager Sow Cereal on Oct2000 harvest apr2001
        CropName = ScrumCereal
        EstablishDate = 14/10/2000
        EstablishStage = Seed
        PlantingDepth = 15
        HarvestTimeOption = SettingDate
        HarvestDate = 04/14/2001 00:00:00
        Tt_EstablishToHarvest = 1000
        HarvestStage = Maturity
        ExpectedYield = 8
        FieldLoss = 0
        ResidueRemoval = 0
        ResidueIncorporation = 1
        ResidueIncorporationDepth = 150
        script: same as in SCRUMSinglePlantingFromManager.Field.EstablishCrop
      Manager Sow legume Jun2001 harvest after 600 oCd
        CropName = ScrumLegume
        EstablishDate = 01/06/2001
        EstablishStage = Seed
        PlantingDepth = 15
        HarvestTimeOption = SettingThermalTime
        HarvestDate = 01/01/0001 00:00:00
        Tt_EstablishToHarvest = 600
        HarvestStage = LateReproductive
        ExpectedYield = 3
        FieldLoss = 0.1
        ResidueRemoval = 0.6
        ResidueIncorporation = 0.5
        ResidueIncorporationDepth = 50
        script: same as in SCRUMSinglePlantingFromManager.Field.EstablishCrop
      Irrigation
      Fertiliser
      Manager AutomaticIrrigation: same as SCRUMSinglePlantingFromManager.Field.AutomaticIrrigation
      Manager AutomaticFertiliser: same as SCRUMSinglePlantingFromManager.Field.AutomaticFertiliser
      Report: same as SCRUMSinglePlantingFromManager.Field.Report
      ScrumCropInstance ScrumLegume: HarvestIndex=0.45; MoistureContent=0.14; RootProportion=0.1; MaxRootDepth=1005; MaxHeight=700; MaxCover=0.9; ExtinctionCoefficient=0.55; rCover=1; TypicalHarvestStage=Ripe; SeedlingNConc=0.05; ProductHarvestNConc=0.015; StoverHarvestNConc=0.01; RootNConc=0.01; LegumeFactor=1; OptimumTemperature=30; MaxTemperature=40; Tt_SowToEmergence=200; GSMax=0.008; R50=150; ConsiderWaterStress=true; Factor_XoBiomass=0.5; Factor_bBiomass=0.2; Factor_XoCover=0.4; Factor_bCover=0.2; Factor_XoHeight=0.7; Factor_bHeight=0.2
        zero: BaseTemperature, PlantingDepth, ExpectedYield, Tt_EstablishmentToHarvest, FieldLoss, ResidueRemoval, ResidueIncorporation, ResidueIncorporationDepth, Tt_EmergenceToMaturity
      ScrumCropInstance ScrumCereal: same as SCRUMRepeatPlantingFromManager.Field.ScrumCereal
  Simulation SCRUMRotationComponent
    Memo Description
      This example specifies a more detailed rotation is simulated using SCRUM.  The necessary components in the Field are:
      * the SCRUM model
      * A set of scrum SCRUMCropInstances to represent each of the crops in the rotation (Potato, Wheat, OatForage, Carrot and TrunipForrage)
      * A SCRUMRotation Model that sets the management for each of the crops in the rotation.  To facilitate the process of setting up a rotation this component uses a grid input with a column for each crop (The header Name must match the SCRUMCropInstance Name) and a row for each of the parameters required to define the managment for each crop.  Note that the grid reads and writes to a .csv file and rotation parameters may be changed through the userinterface view or by editing and saving the .csv file.
    Clock: End=1969-09-21
    Weather: FileName=%root%/Tests/WeatherFiles/lincoln.met
    Summary
    SoilArbitrator Soil Arbitrator
    Manager TreatmentID
```csharp
using Models.Soils;
using System.Data;
using System.IO;
using APSIM.Shared.Utilities;
using System.Xml.Serialization;
using Models;
using Models.PMF;
using System.Text;
using System.Collections.Generic;
using Models.Core;
using System;
using Newtonsoft.Json;
      

namespace Models
{
    [Serializable] 
    public class Script : Model
    {
        [JsonIgnore] public string Rotation { get; set; }
        [JsonIgnore] public string Irrigation { get; set; }
        [JsonIgnore] public string Nitrogen { get; set; }
        
        [JsonIgnore] public string TreatmentName { get; set; }
        
        [EventSubscribe("StartOfSimulation")]
        private void OnStartOfSimulation(object sender, EventArgs e)
        {
            TreatmentName = Rotation + "_" + Irrigation + "_" + Nitrogen;
        }
    }
}
```
    Zone Field: Area=1; Slope=0; AspectAngle=0; Altitude=50
      Soil: Region=Plains; State=Canterbury; Country=New Zealand; Latitude=0; Longitude=0
        DataSource=Generic profile descriptions provided by Trevor Webb and data for functional horizions based on SWAMP project results
        Comments=Bulk density values were measured on the fine earth fraction so values entered into apsim soil are adjusted down to account for stone content (assuming stones are inert from all soil process so their mass and volume is removed from model paramaters).  SAT, DUL, LL15 and Air dry have been adjusted down to account for stone content.  OC has not been adjusted so the model will get the correct carbon and N amounts using the adjusted BD.
        Chemical: PHUnits=Water
          Thickness  PH  CEC
          100        6   14.36825
          200        6   14.609
          200        6   11.6165
          100        6   9.20675
          300        6   8.89175
          200        6   8.89175
          100        6   8.89175
          300        6   8.89175
          CEC source: Calculated
        Physical
          Thickness  ParticleSizeSand  ParticleSizeSilt  ParticleSizeClay  Rocks     BD     AirDry  LL15   DUL   SAT
          100        5                 65                30                0.276409  1      0.05    0.1    0.27  0.419
          200        5                 65                30                0.317856  1      0.05    0.1    0.27  0.395
          300        5                 65                30                0         1.59   0.157   0.157  0.29  0.36
          200        5                 65                30                0         1.57   0.173   0.173  0.3   0.366
          100        5                 65                30                0         1.57   0.173   0.173  0.3   0.366
          200        5                 65                30                0         1.6    0.165   0.165  0.3   0.358
          100        5                 65                30                0         1.6    0.165   0.165  0.3   0.358
          300        5                 65                30                0.14163   1.601  0.115   0.115  0.3   0.316
          Rocks, ParticleSizeSand, ParticleSizeSilt, ParticleSizeClay source: Calculated
          SoilCrop SCRUMSoil: LL=[0.1, 0.1, 0.157, 0.173, 0.173, 0.165, 0.165, 0.115]; KL=[0.1, 0.1, 0.1, 0.1, 0.1, 0.1, 0.1, 0.1]; XF=[1, 1, 1, 1, 1, 1, 1, 1]
        WaterBalance SoilWater: SummerDate=1-oct; SummerU=9; SummerCona=4.4; WinterDate=1-Apr; WinterU=2; WinterCona=1.5; DiffusConst=88; DiffusSlope=35; Salb=0.13; CN2Bare=73; CNRed=20; CNCov=0.8; PSIDul=-100; Thickness=[100, 200, 300, 200, 100, 200, 100, 300]; SWCON=[0.9, 0.6, 0.4, 0.4, 0.4, 0.9, 0.9, 0.9]
        Nutrient
        Organic: FOMCNRatio=31.5; CarbonUnits=Total
          Thickness  Carbon  SoilCNRatio  FBiom  FInert  FOM
          100        2.677   11           0.025  0.45    536.934
          200        2.784   11           0.025  0.6     359.917
          300        1.454   11           0.015  0.75    197.527
          200        0.383   11           0.01   0.9     132.406
          100        0.243   11           0.01   0.96    108.405
          200        0.243   11           0.01   0.96    72.6661
          100        0.243   11           0.01   0.96    59.4939
          300        0.243   11           0.01   0.96    32.651
        Water: Thickness=[100, 200, 300, 200, 100, 200, 100, 300]; InitialValues=[0.27, 0.27, 0.29, 0.3, 0.3, 0.3, 0.3, 0.225]; InitialPAWmm=202.5; RelativeTo=LL15; FilledFromTop=true
        Solute NO3: Thickness=[100, 200, 200, 100, 300, 200, 100, 300]; InitialValuesUnits=ppm; WaterTableConcentration=0; D0=0; DepthConstant=0; MaxDepthSoluteAccessible=0; RunoffEffectivenessAtMovingSolute=0; MaxEffectiveRunoff=0
          InitialValues=[35, 15, 6.07966, 6.07966, 0.849257, 0.3125, 0.625, 0.208203]
        Solute NH4: Thickness=[100, 200, 200, 100, 300, 200, 100, 300]; InitialValuesUnits=ppm; WaterTableConcentration=0; D0=0; DepthConstant=0; MaxDepthSoluteAccessible=0; RunoffEffectivenessAtMovingSolute=0; MaxEffectiveRunoff=0
          InitialValues=[6.18, 3.09, 0.672956, 0.672956, 0.552017, 0.28125, 0.0625, 0.0208203]
        Solute Urea: Thickness=[100, 200, 200, 100, 300, 200, 100, 300]; InitialValues=[0, 0, 0, 0, 0, 0, 0, 0]; InitialValuesUnits=kg/ha; WaterTableConcentration=0; D0=0; DepthConstant=0; MaxDepthSoluteAccessible=0; RunoffEffectivenessAtMovingSolute=0; MaxEffectiveRunoff=0
        SoilTemperature Temperature
      SurfaceOrganicMatter: InitialResidueName=grass; InitialResidueType=grass; InitialResidueMass=2500; InitialStandingFraction=0; InitialCPR=0; InitialCNR=15
      MicroClimate: a_interception=0; b_interception=1; c_interception=0; d_interception=0; SoilHeatFluxFraction=0.4; MinimumHeightDiffForNewLayer=0; NightInterceptionFraction=0.5; ReferenceHeight=2
      Irrigation
      Fertiliser
      Plant SCRUM
      ScrumCropInstance Potato: HarvestIndex=0.9; MoistureContent=0.78; RootProportion=0.1; MaxRootDepth=600; MaxHeight=100; MaxCover=0.95; ExtinctionCoefficient=0.55; rCover=1; TypicalHarvestStage=LateReproductive; SeedlingNConc=0.04; ProductHarvestNConc=0.012; StoverHarvestNConc=0.009; RootNConc=0.01; BaseTemperature=5; OptimumTemperature=30; MaxTemperature=40; Tt_SowToEmergence=300; GSMax=0.008; R50=150; ConsiderWaterStress=true; Factor_XoBiomass=0.5; Factor_bBiomass=0.2; Factor_XoCover=0.4; Factor_bCover=0.2; Factor_XoHeight=0.7; Factor_bHeight=0.2
        zero: LegumeFactor, PlantingDepth, ExpectedYield, Tt_EstablishmentToHarvest, FieldLoss, ResidueRemoval, ResidueIncorporation, ResidueIncorporationDepth, Tt_EmergenceToMaturity
      ScrumCropInstance Wheat: HarvestIndex=0.5; MoistureContent=0.14; RootProportion=0.1; MaxRootDepth=2000; MaxHeight=1800; MaxCover=0.97; ExtinctionCoefficient=0.55; rCover=1; TypicalHarvestStage=Ripe; SeedlingNConc=0.03; ProductHarvestNConc=0.012; StoverHarvestNConc=0.009; RootNConc=0.01; OptimumTemperature=30; MaxTemperature=40; Tt_SowToEmergence=100; GSMax=0.008; R50=150; ConsiderWaterStress=true; Factor_XoBiomass=0.5; Factor_bBiomass=0.2; Factor_XoCover=0.4; Factor_bCover=0.2; Factor_XoHeight=0.7; Factor_bHeight=0.2
        zero: LegumeFactor, BaseTemperature, PlantingDepth, ExpectedYield, Tt_EstablishmentToHarvest, FieldLoss, ResidueRemoval, ResidueIncorporation, ResidueIncorporationDepth, Tt_EmergenceToMaturity
      ScrumCropInstance OatForage: HarvestIndex=0.95; RootProportion=0.1; MaxRootDepth=1000; MaxHeight=700; MaxCover=0.97; ExtinctionCoefficient=0.8; rCover=1; TypicalHarvestStage=EarlyReproductive; SeedlingNConc=0.05; ProductHarvestNConc=0.03; StoverHarvestNConc=0.02; RootNConc=0.01; BaseTemperature=5; OptimumTemperature=30; MaxTemperature=40; Tt_SowToEmergence=100; GSMax=0.008; R50=150; ConsiderWaterStress=true; Factor_XoBiomass=0.5; Factor_bBiomass=0.2; Factor_XoCover=0.4; Factor_bCover=0.2; Factor_XoHeight=0.7; Factor_bHeight=0.2
        zero: MoistureContent, LegumeFactor, PlantingDepth, ExpectedYield, Tt_EstablishmentToHarvest, FieldLoss, ResidueRemoval, ResidueIncorporation, ResidueIncorporationDepth, Tt_EmergenceToMaturity
      ScrumCropInstance Carrot: HarvestIndex=0.7; MoistureContent=0.88; RootProportion=0.1; MaxRootDepth=1000; MaxHeight=400; MaxCover=0.9; ExtinctionCoefficient=0.7; rCover=1; TypicalHarvestStage=LateReproductive; SeedlingNConc=0.03; ProductHarvestNConc=0.012; StoverHarvestNConc=0.009; RootNConc=0.01; BaseTemperature=3; OptimumTemperature=30; MaxTemperature=40; Tt_SowToEmergence=300; GSMax=0.008; R50=150; ConsiderWaterStress=true; Factor_XoBiomass=0.5; Factor_bBiomass=0.2; Factor_XoCover=0.4; Factor_bCover=0.2; Factor_XoHeight=0.7; Factor_bHeight=0.2
        zero: LegumeFactor, PlantingDepth, ExpectedYield, Tt_EstablishmentToHarvest, FieldLoss, ResidueRemoval, ResidueIncorporation, ResidueIncorporationDepth, Tt_EmergenceToMaturity
      ScrumCropInstance TurnipForage: HarvestIndex=0.8; RootProportion=0.1; MaxRootDepth=1000; MaxHeight=400; MaxCover=0.95; ExtinctionCoefficient=0.85; rCover=1; TypicalHarvestStage=Vegetative; SeedlingNConc=0.03; ProductHarvestNConc=0.012; StoverHarvestNConc=0.009; RootNConc=0.01; BaseTemperature=3; OptimumTemperature=30; MaxTemperature=40; Tt_SowToEmergence=200; GSMax=0.008; R50=150; ConsiderWaterStress=true; Factor_XoBiomass=0.5; Factor_bBiomass=0.2; Factor_XoCover=0.4; Factor_bCover=0.2; Factor_XoHeight=0.7; Factor_bHeight=0.2
        zero: MoistureContent, LegumeFactor, PlantingDepth, ExpectedYield, Tt_EstablishmentToHarvest, FieldLoss, ResidueRemoval, ResidueIncorporation, ResidueIncorporationDepth, Tt_EmergenceToMaturity
      Report: same as SCRUMSinglePlantingFromManager.Field.Report
      ScrumRotation: CoefficientFile=Rotation1.csv
      Manager AutomaticIrrigation
        IrrigationIsEnabled = True
        SeasonStartDate = 1-Sep
        SeasonEndDate = 30-Apr
        OnlyApplyOntoCrop = True
        SeasonsAllocation = 2000
        TriggerFraction = 0.6
        RefillFraction = 0.9
        MaximumIrrigationAmount = 100
        ReturnDays = 2
        DepthToMonitor = 600
        LimitMonitoringDepth = True
        script: same as in SCRUMSinglePlantingFromManager.Field.AutomaticIrrigation
      Manager AutomaticFertiliser: same as SCRUMRepeatPlantingFromManager.Field.AutomaticFertiliser
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