Simulations: Version=75
  DataStore
  Simulation SimpleRotation
    Clock: Start=1980-07-01; End=1982-07-30
    Weather: FileName=%root%\Examples\WeatherFiles\Dalby.met
    SoilArbitrator
    Summary
    Zone Field: Area=1; Slope=0; AspectAngle=0; Altitude=50
      SimpleGrazing: Verbose=true; SimpleGrazingFrequency=21; SimpleGrazingResidual=2000; SimpleMinGrazable=3500; NoGrazingStartString=01-jun; NoGrazingEndString=15-sep; FractionOfBiomassToUrine=[0.3]; DepthUrineIsAdded=10; FractionOfBiomassToDung=[0.3]; CNRatioDung=10
        zero: GrazingRotationType, FlexibleGrazePostDM, DaysSinceGraze, GrazingInterval, GrazedDM, GrazedN, GrazedME, AmountUrineNReturned, AmountDungCReturned, AmountDungNReturned, PreGrazeDM, PostGrazeDM
        PreGrazeDMArray=[2000, 2000, 2000, 2000, 2000, 2000, 2000, 2000, 2000, 2000, 2000, 2000]
        PostGrazeDMArray=[1000, 1000, 1000, 1000, 1000, 1000, 1000, 1000, 1000, 1000, 1000, 1000]
      Manager FertiliseFixedDates
        EachYear = True
        Dates = 1-jan,15-jan,1-feb,15-feb,1-mar,15-mar,1-apr,15-apr,1-may,15-may,1-jun,15-jun,1-jul,15-jul,1-aug-15-aug,1-sep,15-sep,1-oct,15-oct,1-nov,15-nov,1-dec,15-dec
        UseCritNThreshold = False
        CritNThreshold = 50
        CritNDepth = 75
        Depth = 50
        Amount = 100
        FertiliserType = DAP
```csharp
using System;
using Models.Core;
using Models.Soils;
using Models.Soils.Nutrients;
using Models.PMF;
using APSIM.Shared.Utilities;
using System.Linq;

namespace Models
{
    [Serializable]
    public class Script : Model
    {
        [Link] Clock clock;
        [Link] Fertiliser fertiliser;
        [Link] ISummary summary;
        [Link] Soil soil;

        private Nutrient nutrient;
        private SoilNitrogen soilN;

        [Separator("Fertiliser will be applied on the date(s) below")]
        [Description("Apply fertiliser on the same day(s) each year? If no, then must include the year of appliaction below")]
        public bool EachYear { get; set; }

        [Description("Dates for one or more fertiliser applications (dd-mmm or dd-mmm-yyyy) as a list with a comma between dates")]
        public string[] Dates { get; set; }

        [Separator("Test for the mineral N in the soil and don't apply the fertiliser if greater than X kgN/ha is stored in the soil above a depth of Y mm")]
        [Description("Use a critical soil mineral N to prevent application above a threshold?")]
        public bool UseCritNThreshold { get; set; }

        [Description("Don't add fertiliser if N in the soil to the depth below exceeds (kg/ha)")]
        public double CritNThreshold { get; set; }

        [Description("Depth to which the amount of N in the soil should be calculated (mm)")]
        public double CritNDepth { get; set; }

        [Separator("Fertiliser application details")]
        [Description("Depth at which to apply the fertiliser (mm)")]
        public double Depth { get; set; }

        [Description("Amount of fertiliser to apply (kg N /ha) per application")]
        public double Amount { get; set; }

        [Description("Fertiliser type - select from the list")]
        public Fertiliser.Types FertiliserType { get; set; }


        [EventSubscribe("StartOfSimulation")]
        private void FindSoilNOrNutrient(object sender, EventArgs e)
        {
            nutrient = Apsim.Find(this, typeof(Nutrient)) as Nutrient;
            soilN = Apsim.Find(this, typeof(SoilNitrogen)) as SoilNitrogen;

            if (nutrient == null && soilN == null)
                throw new Exception(string.Format("Error in script {0}: Unable to find nutrient or soilN.", Name));
        }

        [EventSubscribe("DoManagement")]
        private void OnDoManagement(object sender, EventArgs e)
        {
            if (OnApplicationDate())
            {
                if (NContentBelowThreshold())
                    fertiliser.Apply(Amount, FertiliserType, Depth);
                else
                    summary.WriteMessage(this, "Skipping fertiliser application due to soil mineral N content being above critical threshold.");
            }
        }

        /// <summary>Checks if today's date is one of the specified fertiliser application dates.</summary>
        private bool OnApplicationDate()
        {
            if (EachYear)
                return Dates.Any(d => DateUtilities.DatesEqual(d, clock.Today));
            
            DateTime[] dates = Dates.Select(d => DateTime.ParseExact(d, "d-MMM-yyyy", null)).ToArray();
            return dates.Any(d => SameDate(d, clock.Today));
        }

        /// <summary>Checks if N content in soil is below critical threshold.</summary>
        private bool NContentBelowThreshold()
        {
            if (!UseCritNThreshold)
                return true;
            
            double[] weights = GetLayerWeights();
            double cumSoilN = 0;

            for (int i = 0; i < soil.Thickness.Length; i++)
            {
                if (nutrient != null)
                    cumSoilN += weights[i] * nutrient.MineralN[i];
                else if (soilN != null)
                    cumSoilN += weights[i] * soilN.mineral_n[i];
            }

            return cumSoilN <= CritNThreshold;
        }

        private double[] GetLayerWeights()
        {
            double[] weights = new double[soil.Thickness.Length];
            double cumDepth = 0;

            for (int i = 0; i < soil.Thickness.Length; i++)
            {
                cumDepth += soil.Thickness[i];
                if (cumDepth < CritNDepth)
                    weights[i] = 1;
                else if (cumDepth - soil.Thickness[i] <= CritNDepth)
                    weights[i] = (CritNDepth - (cumDepth - soil.Thickness[i])) / soil.Thickness[i];
                else
                    weights[i] = 0;
            }

            return weights;
        }

        private bool SameDate(DateTime d1, DateTime d2)
        {
            return d1.Year == d2.Year && d1.DayOfYear == d2.DayOfYear;
        }
    }
}
```
      Manager AutomaticIrrigation
        allowIrrigation = True
        seasonStart = 1-sep
        seasonEnd = 30-aug
        seasonsAllocation = 100000
        triggerDeficit = 90
        targetDeficit = 95
        returndays = 1
        maximumAmount = 300
        depthPAWC = 100
```csharp
using System;
using Models.Core;
using Models.PMF;
using Models.Soils;
using System.Xml.Serialization;
using Models.PMF;
using APSIM.Shared.Utilities;

        
namespace Models
{
    [Serializable] 
    [System.Xml.Serialization.XmlInclude(typeof(Model))]
    public class Script : Model
    {
        //Communication to other modules
        [Link] ISummary summary = null;
        [Link] Irrigation Irrigation;
        [Link] Clock Clock;
        [Link] Soil Soil;
        [Link(IsOptional = true)] IPlant existingCrop;
       
        //User inputs from properties tab
        [Description("Turn irrigation on?")]
        public bool allowIrrigation { get; set; }
        [Description("Start of irrigation season (dd-MMM)")]
        public string seasonStart { get; set; }
        [Description("End of irrigation season (dd-MMM)")]
        public string seasonEnd { get; set; }
        [Description("Season allocation (mm)")]
        public double seasonsAllocation { get; set; }
        [Description("Deficit to trigger irrigation (% PAWC)")]
        public double triggerDeficit { get; set; }
        [Description("Deficit to stop irrigaton (% PAWC)")]
        public double targetDeficit { get; set; }
        [Description("Minimum days for irrigation to return")]
        public double returndays { get; set; }
        [Description("Maximum irrigation application (mm/day)")]
        public double maximumAmount { get; set; }
        [Description("Depth to calculate PAWC (mm)")]
        public double depthPAWC { get; set; }

        //Class members
        [XmlIgnore] public double TopSWdeficit { get; set; }
        [XmlIgnore] public double TopSWC { get; set; }
        [XmlIgnore] public double DaysSinceIrrigation { get; set; }
        [XmlIgnore] public double AmountToApply { get; set; }
        [XmlIgnore] public double SeasonAppliedAmount { get; set; }
        
        private bool IrrigationIsAllowed { get; set; }
        private bool SeasonIsOpen { get; set; }
        private bool CropIsActive { get; set; }
        private bool IrrigatorIsAvailable { get; set; }
        private bool SoilIsDry { get; set; }

        private DateTime StartDate;
        private DateTime EndDate;
        private double TopDUL;
        private double TopLL;
        private int nLayers;
    
        //Calculate static soil variables
        [EventSubscribe("StartOfSimulation")]
        private void OnStartOfSimulation(object sender, EventArgs e)
        {   
            //Set the season dates
            StartDate = DateTime.Parse(seasonStart + "-" + Clock.Today.Year.ToString());
            EndDate = DateTime.Parse(seasonEnd + "-" + Clock.Today.Year.ToString());
            
            //Can we irrigate at all?
            IrrigationIsAllowed = false; 
            if (allowIrrigation)
                IrrigationIsAllowed = true; 

            //Calculate soil water variables
            double depthFromSurface = 0.0;
            double fracLayer = 0.0;
            nLayers = Soil.Thickness.Length;
            for (int layer = 0; layer < nLayers; layer++)
            {
                fracLayer = Math.Min(1.0, (depthPAWC - depthFromSurface) / Soil.Thickness[layer]);
                TopLL += Soil.LL15mm[layer] * fracLayer;
                TopDUL += Soil.DULmm[layer] * fracLayer;
                depthFromSurface += Soil.Thickness[layer];
                if (depthFromSurface >= depthPAWC)
                    layer = nLayers;
            }
        }
             
        //Determine daily requirement for irrigation
        [EventSubscribe("StartOfDay")]
        private void OnStartOfDay(object sender, EventArgs e)
        {
            //Can we irrigate today?          
            SeasonIsOpen = isBetween(Clock.Today, StartDate, EndDate);

            //Is there a crop in the ground that needs irrigation?
            CropIsActive = false;
            if ((existingCrop != null) && (existingCrop.IsAlive))
                CropIsActive = true;
            //if ((existingCrop.Phenology.Stage >= 3.0) && (existingCrop.Phenology.Stage < 6.0))
          
            //Is the irrigator available?
            IrrigatorIsAvailable = false;
            DaysSinceIrrigation += 1;
            if (DaysSinceIrrigation >= returndays)
                IrrigatorIsAvailable = true;
          
            //Is the soil dry enough to require irrigation?
            SoilIsDry = false;
            double depthFromSurface = 0.0;
            double fracLayer = 0.0;
            TopSWC = 0.0;
            for (int layer = 0; layer < nLayers; layer++)
            //for (int layer = 0; depthFromSurface < depthPAWC + Soil.Thickness[layer]; layer++)
            {
                fracLayer = Math.Min(1.0, (depthPAWC - depthFromSurface) / Soil.Thickness[layer]);
                TopSWC += Soil.SoilWater.SWmm[layer] * fracLayer;
                depthFromSurface += Soil.Thickness[layer];
                if (depthFromSurface >= depthPAWC)
                    layer = nLayers;
            }
            
            TopSWdeficit = TopSWC - TopDUL;
            if (Math.Max(0.0, -TopSWdeficit) >= (TopDUL - TopLL) * (100 - triggerDeficit) / 100)
                SoilIsDry = true;
                
            //Are all the conditions ratifying irrigation
            if (IrrigationIsAllowed && SeasonIsOpen && CropIsActive && IrrigatorIsAvailable && SoilIsDry)
            {
                //Lets bloody well irrigate then!!!!
                AmountToApply = TopDUL * targetDeficit / 100 - TopSWC;
                AmountToApply = Math.Max(0.0, Math.Min(AmountToApply, seasonsAllocation - SeasonAppliedAmount));
                Irrigation.Apply(AmountToApply);
                DaysSinceIrrigation = 0;
                SeasonAppliedAmount += AmountToApply;
            }
        }
        
        ///Checks whether theDate is between iniDate and endDate (non-year specific)
        private bool isBetween(DateTime theDay, DateTime iniDate, DateTime endDate)
        {
            bool result = false;
            if (iniDate.DayOfYear < endDate.DayOfYear)
            {
                // period is within one year, ex: summer in the northern hemisphere
                if ((theDay.DayOfYear >= iniDate.DayOfYear) && (theDay.DayOfYear <= endDate.DayOfYear))
                    result = true;
            }
            else
            {
                // period goes over the end of the year, ex: summer in the southern hemisphere
                if ((theDay.DayOfYear >= iniDate.DayOfYear) || (theDay.DayOfYear <= endDate.DayOfYear))
                    result = true;
            }
            
            return result;
        }
    }
}
```
      MicroClimate: a_interception=0; b_interception=1; c_interception=0; d_interception=0; soil_albedo=0.23; SoilHeatFluxFraction=0.4; NightInterceptionFraction=0.5; ReferenceHeight=2
      Irrigation
      Fertiliser
      SurfaceOrganicMatter: InitialResidueName=Sward; InitialResidueType=grass; InitialResidueMass=1000; InitialStandingFraction=0; InitialCPR=0; InitialCNR=15; FractionFaecesAdded=1
      PastureSpecies AGPKikuyu: InitialShootDM=3000; InitialRootDM=800; InitialRootDepth=750
      Soil SoilDalby: ASCOrder=Vertosol; ASCSubOrder=Black; SoilType=Clay; Site=Norwin; NearestTown=Norwin; Region=Darling Downs and Granite Belt; State=Queensland; Country=Australia; NaturalVegetation=Qld. Bluegrass, possible Qld. Blue gum; ApsoilNumber=900; Latitude=-27.581836; Longitude=151.320206; LocationAccuracy=+/- 20m
        DataSource=CSIRO Sustainable Ecosystems, Toowoomba; Characteriesd as part of the GRDC funded project"Doing it better, doing it smarter, managing soil water in Australian agriculture' 2011
        Comments=OC, CLL for all crops estimated-based on Bongeen Mywybilla Soil No1
        Physical
          Thickness  BD       AirDry    LL15      DUL       SAT       KS
          150        1.01056  0.13025   0.2605    0.521     0.588655  20
          150        1.07146  0.198689  0.248362  0.496723  0.565677  20
          300        1.09394  0.015     0.28      0.488438  0.557193  20
          300        1.15861  0.015     0.28      0.480297  0.532787  20
          300        1.17301  0.015     0.28      0.471584  0.527354  20
          300        1.16287  0.015     0.28      0.457071  0.53118   20
          300        1.1875   0.015     0.28      0.452332  0.521888  20
          SoilCrop AGPKikuyuSoil: LL=[0.15, 0.16, 0.15, 0.05, 0.04, 0.03, 0.03]; KL=[0.02, 0.07, 0.09, 0.08, 0.07, 0.07, 0.05]; XF=[1, 1, 1, 1, 1, 1, 1]
          SoilCrop AGPRyegrassSoil: LL=[0.15, 0.14, 0.06, 0.02, 0.01, 0.01, 0.01]; KL=[0.1, 0.1, 0.08, 0.04, 0.01, 0, 0]; XF=[1, 1, 1, 1, 1, 0, 0]
        SoilWater: SummerDate=1-Nov; SummerU=5; SummerCona=5; WinterDate=1-Apr; WinterU=5; WinterCona=5; DiffusConst=40; DiffusSlope=16; Salb=0.12; CN2Bare=73; CNRed=20; CNCov=0.8; max_pond=0; Thickness=[150, 150, 300, 300, 300, 300, 300]; SWCON=[0.3, 0.3, 0.3, 0.3, 0.3, 0.3, 0.3]; PrecipitationInterception=0
        Organic: FOMCNRatio=40
          Thickness  Carbon  SoilCNRatio  FBiom  FInert  FOM
          150        1.2     12           0.04   0.4     347.129
          150        0.96    12           0.02   0.6     270.344
          300        0.6     12           0.02   0.8     163.972
          300        0.3     12           0.02   1       99.4541
          300        0.18    12           0.01   1       60.322
          300        0.12    12           0.01   1       36.5871
          300        0.12    12           0.01   1       22.1912
        Chemical
          Thickness  NO3N  NH4N  PH
          150        1     0.1   8
          150        1     0.1   8
          300        1     0.1   8
          300        1     0.1   8
          300        1     0.1   8
          300        1     0.1   8
          300        1     0.1   8
        InitialWater: PercentMethod=1; FractionFull=1
        Sample InitialN: Thickness=[150, 150, 300, 300, 300, 300, 300]; SWUnits=Volumetric; OCUnits=Total; PHUnits=Water
        CERESSoilTemperature
        SoilNitrogen: fom_types=[default, manure, mucuna, lablab, shemp, stable]; fract_carb=[0.2, 0.3, 0.54, 0.57, 0.45, 0]; fract_cell=[0.7, 0.3, 0.37, 0.37, 0.47, 0.1]; fract_lign=[0.1, 0.4, 0.09, 0.06, 0.08, 0.9]
          SoilNitrogenNO3 NO3
          SoilNitrogenNH4 NH4
          SoilNitrogenUrea Urea
          SoilNitrogenPlantAvailableNO3 PlantAvailableNO3
          SoilNitrogenPlantAvailableNH4 PlantAvailableNH4
      Report: EventNames=[Clock].EndOfDay
        VariableNames:
          [Clock].Today as Date
          // These examples are set up for Ryegrass and WhiteClover so add in any other species as needed for your simulation
          // The format of AggregationType (variable) from [Report].DayAfterLastOutput to [Clock].Today is used so that when the reporting frequency is changed the outputs are still sensible
          // If the name of the Report component ("Report") here is changed in the simulation tree then all the references to that name in the outputs below also need to be changed
          // If all you want is an annual pattern of harvested pasture based on the production year (July to June)  ....
          [AGPKikuyu].HarvestedWt
          Sum of ([SimpleGrazing].GrazedDM) from 1-Jul to [Clock].Today as AnnualHarv
          [SimpleGrazing].GrazedDM
          [SimpleGrazing].AmountDungCReturned
          [SimpleGrazing].AmountDungNReturned
          [SimpleGrazing].AmountUrineNReturned
          [MicroClimate].RadiationInterception
          [Weather].Radn
          ([SimpleGrazing].AmountDungNReturned+[SimpleGrazing].AmountUrineNReturned) as NReturned
          [SimpleGrazing].AmountDungCReturned as CReturned
          ([AGPKikuyu].AboveGroundDeadWt/[AGPKikuyu].AboveGroundLiveWt) as DeadProportion
          [AGPKikuyu].CoverTotal
          [AGPKikuyu].CoverGreen
          [AGPKikuyu].CoverDead
          [AGPKikuyu].AboveGroundWt
          [AGPKikuyu].AboveGroundDeadWt
  Simulation TargetMass
    Clock: Start=1980-07-01; End=1982-07-30
    Weather: FileName=%root%\Examples\WeatherFiles\Dalby.met
    SoilArbitrator
    Summary
    Zone Field: Area=1; Slope=0; AspectAngle=0; Altitude=50
      SimpleGrazing: Verbose=true; GrazingRotationType=1; SimpleGrazingFrequency=21; SimpleGrazingResidual=2000; SimpleMinGrazable=3500; NoGrazingStartString=01-jun; NoGrazingEndString=15-sep; FractionOfBiomassToUrine=[0.3]; DepthUrineIsAdded=10; FractionOfBiomassToDung=[0.3]; CNRatioDung=10
        zero: FlexibleGrazePostDM, DaysSinceGraze, GrazingInterval, GrazedDM, GrazedN, GrazedME, AmountUrineNReturned, AmountDungCReturned, AmountDungNReturned, PreGrazeDM, PostGrazeDM
        PreGrazeDMArray=[3500, 3500, 3500, 3500, 3500, 3500, 3500, 3500, 3500, 3500, 3500, 3500]
        PostGrazeDMArray=[2000, 2000, 1000, 2000, 2000, 2000, 2000, 2000, 2000, 3000, 1500, 2000]
      Manager FertiliseFixedDates: same as SimpleRotation.Field.FertiliseFixedDates
      Manager AutomaticIrrigation: same as SimpleRotation.Field.AutomaticIrrigation
      MicroClimate: a_interception=0; b_interception=1; c_interception=0; d_interception=0; soil_albedo=0.23; SoilHeatFluxFraction=0.4; NightInterceptionFraction=0.5; ReferenceHeight=2
      Irrigation
      Fertiliser
      SurfaceOrganicMatter: InitialResidueName=Sward; InitialResidueType=grass; InitialResidueMass=1000; InitialStandingFraction=0; InitialCPR=0; InitialCNR=15; FractionFaecesAdded=1
      PastureSpecies AGPKikuyu: InitialShootDM=3000; InitialRootDM=800; InitialRootDepth=750
      Soil SoilDalby: same as SimpleRotation.Field.SoilDalby
      Report: EventNames=[Clock].EndOfDay
        VariableNames:
          [Clock].Today as Date
          // These examples are set up for Ryegrass and WhiteClover so add in any other species as needed for your simulation
          // The format of AggregationType (variable) from [Report].DayAfterLastOutput to [Clock].Today is used so that when the reporting frequency is changed the outputs are still sensible
          // If the name of the Report component ("Report") here is changed in the simulation tree then all the references to that name in the outputs below also need to be changed
          // If all you want is an annual pattern of harvested pasture based on the production year (July to June)  ....
          [AGPKikuyu].HarvestedWt
          Sum of ([SimpleGrazing].GrazedDM) from 1-Jul to [Clock].Today as AnnualHarv
          [SimpleGrazing].GrazedDM
          [SimpleGrazing].AmountDungCReturned
          [SimpleGrazing].AmountDungNReturned
          [SimpleGrazing].AmountUrineNReturned
          [MicroClimate].RadiationInterception
          [Weather].Radn
          ([SimpleGrazing].AmountDungNReturned+[SimpleGrazing].AmountUrineNReturned) as NReturned
          [SimpleGrazing].AmountDungCReturned as CReturned
          ([AGPKikuyu].AboveGroundDeadWt/[AGPKikuyu].AboveGroundLiveWt) as DeadProportion
          [AGPKikuyu].CoverTotal
          [AGPKikuyu].CoverGreen
          [AGPKikuyu].CoverDead
          [AGPKikuyu].AboveGroundWt
          [AGPKikuyu].AboveGroundDeadWt
  Simulation TimingControlledElsewhere
    Clock: Start=1980-07-01; End=1982-07-30
    Weather: FileName=%root%\Examples\WeatherFiles\Dalby.met
    SoilArbitrator
    Summary
    Zone Field: Area=1; Slope=0; AspectAngle=0; Altitude=50
      Operations Grazing
        1980-10-15  [SimpleGrazing].Graze(3000)
        1980-12-15  [SimpleGrazing].GrazeToResidual(2000)
        1980-12-30  [SimpleGrazing].GrazeToResidual(1000)
        1981-01-25  [SimpleGrazing].GrazeToResidual(3000)
      SimpleGrazing: Verbose=true; GrazingRotationType=2; SimpleGrazingFrequency=21; SimpleGrazingResidual=2000; SimpleMinGrazable=3500; MinimumRotationLengthArray=[5, 5, 5, 5, 5, 5, 5, 5, 5, 5, 5, 5]; FractionOfBiomassToUrine=[0.3]; DepthUrineIsAdded=10; FractionOfBiomassToDung=[0.3]; CNRatioDung=10
        zero: FlexibleGrazePostDM, DaysSinceGraze, GrazingInterval, GrazedDM, GrazedN, GrazedME, AmountUrineNReturned, AmountDungCReturned, AmountDungNReturned, PreGrazeDM, PostGrazeDM
        PreGrazeDMArray=[3500, 3500, 3500, 3500, 3500, 3500, 3500, 3500, 3500, 3500, 3500, 3500]
        PostGrazeDMArray=[2000, 2000, 2000, 2000, 2000, 2000, 2000, 2000, 2000, 2000, 2000, 2000]
      Manager FertiliseFixedDates: same as SimpleRotation.Field.FertiliseFixedDates
      Manager AutomaticIrrigation: same as SimpleRotation.Field.AutomaticIrrigation
      MicroClimate: a_interception=0; b_interception=1; c_interception=0; d_interception=0; soil_albedo=0.23; SoilHeatFluxFraction=0.4; NightInterceptionFraction=0.5; ReferenceHeight=2
      Irrigation
      Fertiliser
      SurfaceOrganicMatter: InitialResidueName=Sward; InitialResidueType=grass; InitialResidueMass=1000; InitialStandingFraction=0; InitialCPR=0; InitialCNR=15; FractionFaecesAdded=1
      PastureSpecies AGPKikuyu: InitialShootDM=3000; InitialRootDM=800; InitialRootDepth=750
      Soil SoilDalby: same as SimpleRotation.Field.SoilDalby
      Report: same as TargetMass.Field.Report
  Simulation FlexibleGrazingCover
    Clock: Start=1980-07-01; End=1982-07-30
    Weather: FileName=%root%\Examples\WeatherFiles\Dalby.met
    SoilArbitrator
    Summary
    Zone Field: Area=1; Slope=0; AspectAngle=0; Altitude=50
      SimpleGrazing: Verbose=true; GrazingRotationType=3; SimpleGrazingFrequency=21; SimpleGrazingResidual=2000; SimpleMinGrazable=3500; FlexibleExpressionForTimingOfGrazing=AGPKikuyu.CoverTotal > 0.95; FlexibleGrazePostDM=2000; FractionOfBiomassToUrine=[0.3]; DepthUrineIsAdded=10; FractionOfBiomassToDung=[0.3]; CNRatioDung=10
        zero: DaysSinceGraze, GrazingInterval, GrazedDM, GrazedN, GrazedME, AmountUrineNReturned, AmountDungCReturned, AmountDungNReturned, PreGrazeDM, PostGrazeDM
        PreGrazeDMArray=[3500, 3500, 3500, 3500, 3500, 3500, 3500, 3500, 3500, 3500, 3500, 3500]
        PostGrazeDMArray=[2000, 2000, 2000, 2000, 2000, 2000, 2000, 2000, 2000, 2000, 2000, 2000]
      Manager FertiliseFixedDates: same as SimpleRotation.Field.FertiliseFixedDates
      Manager AutomaticIrrigation: same as SimpleRotation.Field.AutomaticIrrigation
      MicroClimate: a_interception=0; b_interception=1; c_interception=0; d_interception=0; soil_albedo=0.23; SoilHeatFluxFraction=0.4; NightInterceptionFraction=0.5; ReferenceHeight=2
      Irrigation
      Fertiliser
      SurfaceOrganicMatter: InitialResidueName=Sward; InitialResidueType=grass; InitialResidueMass=1000; InitialStandingFraction=0; InitialCPR=0; InitialCNR=15; FractionFaecesAdded=1
      PastureSpecies AGPKikuyu: InitialShootDM=3000; InitialRootDM=800; InitialRootDepth=750
      Soil SoilDalby: same as SimpleRotation.Field.SoilDalby
      Report: same as TargetMass.Field.Report
  Simulation SimpleGrazingRyegrassWhiteClover
    Clock: Start=1980-07-01; End=1985-06-30
    Weather: FileName=%root%\Examples\WeatherFiles\lincoln.met
    SoilArbitrator
    Summary
    Zone Field: Area=1; Slope=0; AspectAngle=0; Altitude=50
      Operations
        1981-04-01  [SimpleGrazing].Graze(500)
        1981-05-01  [SimpleGrazing].GrazeToResidual(400)
      SimpleGrazing: Verbose=true; GrazingRotationType=2; SimpleGrazingFrequency=21; SimpleGrazingResidual=2000; SimpleMinGrazable=1000; MinimumRotationLengthArray=[14, 14, 14, 14, 14, 14, 14, 14, 14, 14, 14, 14]; FractionOfBiomassToUrine=[0.3]; DepthUrineIsAdded=10; FractionOfBiomassToDung=[0.3]; CNRatioDung=10
        zero: FlexibleGrazePostDM, DaysSinceGraze, GrazingInterval, GrazedDM, GrazedN, GrazedME, AmountUrineNReturned, AmountDungCReturned, AmountDungNReturned, PreGrazeDM, PostGrazeDM
        PreGrazeDMArray=[3200, 3200, 3200, 3200, 3200, 3200, 3200, 3200, 3200, 3200, 3200, 3200]
        PostGrazeDMArray=[1650, 1650, 1650, 1650, 1300, 1300, 1300, 1300, 1650, 1650, 1650, 1650]
      Manager FertiliseFixedDates
        EachYear = True
        Dates = 5-jan,5-feb,5-mar,5-apr,5-aug,5-sep,5-oct,5-nov,5-dec
        UseCritNThreshold = False
        CritNThreshold = 50
        CritNDepth = 75
        Depth = 50
        Amount = 15
        FertiliserType = UreaN
        script: same as in SimpleRotation.Field.FertiliseFixedDates
      Manager AutomaticIrrigation
        allowIrrigation = True
        seasonStart = 1-sep
        seasonEnd = 30-apr
        seasonsAllocation = 10000
        triggerDeficit = 75
        targetDeficit = 95
        returndays = 3
        maximumAmount = 30
        depthPAWC = 300
        script: same as in SimpleRotation.Field.AutomaticIrrigation
      MicroClimate: a_interception=0; b_interception=1; c_interception=0; d_interception=0; soil_albedo=0.23; SoilHeatFluxFraction=0.4; NightInterceptionFraction=0.5; ReferenceHeight=2
      Irrigation
      Fertiliser
      SurfaceOrganicMatter: InitialResidueName=Sward; InitialResidueType=grass; InitialResidueMass=1000; InitialStandingFraction=0; InitialCPR=0; InitialCNR=15; FractionFaecesAdded=1
      Soil: SoilType=NZ_Sedimentary; LocalName=Lismore; Site=Winchmore; NearestTown=Ashburton; Region=Canterbury; Country=New Zealand; Latitude=-48.48; Longitude=0
        Chemical
          Thickness  NO3N  NH4N  PH
          150        5     0.1   6
          150        2.5   0.1   6
          200        1     0.1   6
          150        0.75  0.1   6
          250        0.5   0.1   6
          300        0.5   0.1   6
          300        0.5   0.1   6
        Physical
          Thickness  ParticleSizeClay  BD    AirDry  LL15   DUL    SAT   KS
          150        20                1.3   0.05    0.15   0.36   0.45  5000
          150        15                1.35  0.12    0.14   0.34   0.43  2500
          200        12                1     0.055   0.055  0.19   0.25  3000
          150        8                 0.53  0.015   0.015  0.065  0.15  10000
          250        6                 0.31  0.01    0.01   0.04   0.11  17500
          300        5                 0.3   0.01    0.01   0.03   0.11  20000
          300        5                 0.3   0.01    0.01   0.03   0.11  20000
          SoilCrop AGPRyegrassSoil: LL=[0.15, 0.14, 0.06, 0.02, 0.01, 0.01, 0.01]; KL=[0.1, 0.1, 0.08, 0.04, 0.01, 0, 0]; XF=[1, 1, 1, 1, 1, 0, 0]
          SoilCrop AGPWhiteCloverSoil: LL=[0.15, 0.14, 0.06, 0.02, 0.01, 0.01, 0.01]; KL=[0.1, 0.1, 0.08, 0.04, 0.01, 0, 0]; XF=[1, 1, 1, 1, 1, 0, 0]
        SoilWater: SummerDate=1-Nov; SummerU=6; SummerCona=3.5; WinterDate=1-apr; WinterU=2; WinterCona=2; DiffusConst=88; DiffusSlope=35; Salb=0.13; CN2Bare=73; CNRed=20; CNCov=0.8; slope=0; discharge_width=0; catchment_area=0; max_pond=0; PrecipitationInterception=0
          Thickness  SWCON  KLAT
          150        0.5    0
          150        0.52   0
          200        0.55   0
          150        0.6    0
          250        0.65   0
          300        0.65   0
          300        0.65   0
        SoilNitrogen: same as SimpleRotation.Field.SoilDalby.SoilNitrogen
        Organic: FOMCNRatio=40
          Thickness  Carbon  SoilCNRatio  FBiom  FInert  FOM
          150        3       12           0.04   0.5     331.337
          150        1       12           0.02   0.7     245.461
          200        0.6     12           0.02   0.83    164.537
          150        0.4     12           0.01   0.9     121.892
          250        0.25    12           0.01   0.95    73.9313
          300        0.15    12           0      0.99    40.5743
          300        0.1     12           0      0.99    22.2677
        InitialWater Initial water: PercentMethod=1; FractionFull=0.95
        Sample Initial nitrogen: Thickness=[150, 150, 200, 150, 250, 300, 300]; SWUnits=Volumetric; OCUnits=Total; PHUnits=Water
        CERESSoilTemperature
      PastureSpecies AGPRyegrass: InitialShootDM=1500; InitialRootDM=450; InitialRootDepth=750
      PastureSpecies AGPWhiteClover: InitialShootDM=500; InitialRootDM=150; InitialRootDepth=350
      Report: EventNames=[Clock].EndOfDay
        VariableNames:
          [Clock].Today as Date
          Sum of ([SimpleGrazing].GrazedDM) from 1-Jul to [Clock].Today as HarvestedWt   //the amount harvested (kg DM /ha)
          Sum of ([SimpleGrazing].AmountDungCReturned) from 1-Jul to [Clock].Today as DungC
          Sum of ([SimpleGrazing].AmountDungNReturned) from 1-Jul to [Clock].Today as DungN
          Sum of ([SimpleGrazing].AmountUrineNReturned) from 1-Jul to [Clock].Today as UrineN
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