Simulations: Version=57
  DataStore
  Sobol: NumPaths=100
    Parameters:
      Name  Path                             LowerBound  UpperBound
      CN2   Field.Soil.SoilWater.CN2Bare     70          85
      Cona  Field.Soil.SoilWater.SummerCona  3           9
    ParameterValues:
      V1          V2
      75.98287    3.99799156
      70.02752    4.92074871
      75.81454    6.392914
      70.91431    4.59856
      82.6944     4.90610361
      76.30291    3.370611
      80.86516    5.955622
      71.05842    4.88721657
      84.4239655  5.66090631
      74.9422     8.602091
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    X1:
      X1          X2
      75.98287    3.99799156
      70.02752    4.92074871
      75.81454    6.392914
      70.91431    4.59856
      82.6944     4.90610361
      76.30291    3.370611
      80.86516    5.955622
      71.05842    4.88721657
      84.4239655  5.66090631
      74.9422     8.602091
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    X2:
      X1          X2
      82.43734    7.18177938
      77.07837    8.2584095
      82.70593    6.538642
      82.6090851  6.18411446
      80.10148    7.275134
      72.8186646  8.177044
      82.09863    8.796532
      81.8201141  6.67827368
      78.4518051  6.89499426
      81.16975    3.93821859
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    Simulation FallowSensitivityBase
      Clock: StartDate=1990-01-01; EndDate=1995-12-31
      Summary SummaryFile
      Weather: FileName=%root%\Examples\WeatherFiles\Dalby.met
      SoilArbitrator
      Zone Field: Area=1; Slope=0
        Report: EventNames=[ResetAndOutput].Script.Reporting
          VariableNames:
            [Clock].Today
            [Clock].Today.Year
            Sum of [Weather].Rain from [ResetAndOutput].Script.Reseting to [ResetAndOutput].Script.Reporting as FallowRainfall
            Sum of [Soil].SoilWater.Es from [ResetAndOutput].Script.Reseting to [ResetAndOutput].Script.Reporting as FallowEvaporation
            Sum of [Soil].SoilWater.Runoff from [ResetAndOutput].Script.Reseting to [ResetAndOutput].Script.Reporting as FallowRunoff
            sum([Soil].SoilWater.SWmm) as TotalSW
            sum([Soil].SoilWater.ESW) as TotalESW
            (sum([Soil].Nutrient.NH4.kgha) + sum([Soil].Nutrient.NO3.kgha)) as TotalMinN
            [SurfaceOrganicMatter].Wt as FinalResidueWt
            [SurfaceOrganicMatter].Cover as FinalResidueCover
        Fertiliser
        Soil: ASCOrder=Vertosol; ASCSubOrder=Black; SoilType=Clay; Site=Norwin; NearestTown=Norwin; Region=Darling Downs and Granite Belt; State=Queensland; Country=Australia; NaturalVegetation=Qld. Bluegrass, possible Qld. Blue gum; ApsoilNumber=900; Latitude=-27.581836; Longitude=151.320206; LocationAccuracy=+/- 20m
          DataSource=CSIRO Sustainable Ecosystems, Toowoomba; Characteriesd as part of the GRDC funded project"Doing it better, doing it smarter, managing soil water in Australian agriculture' 2011
          Comments=OC, CLL for all crops estimated-based on Bongeen Mywybilla Soil No1
          Water
            Thickness  BD       AirDry    LL15      DUL       SAT       KS
            150        1.01056  0.13025   0.2605    0.521     0.588655  20
            150        1.07146  0.198689  0.248362  0.496723  0.565677  20
            300        1.09394  0.28      0.28      0.488438  0.557193  20
            300        1.15861  0.28      0.28      0.480297  0.532787  20
            300        1.17301  0.28      0.28      0.471584  0.527354  20
            300        1.16287  0.28      0.28      0.457071  0.53118   20
            300        1.1875   0.28      0.28      0.452332  0.521888  20
            SoilCrop WheatSoil: LL=[0.261, 0.248, 0.28, 0.306, 0.36, 0.392, 0.446]; KL=[0.06, 0.06, 0.06, 0.04, 0.04, 0.02, 0.01]; XF=[1, 1, 1, 1, 1, 1, 1]
          SoilWater: SummerDate=1-Nov; SummerU=5; SummerCona=5; WinterDate=1-Apr; WinterU=5; WinterCona=5; DiffusConst=40; DiffusSlope=16; Salb=0.12; CN2Bare=73; CNRed=20; CNCov=0.8; max_pond=0; Thickness=[1800]; SWCON=[0.3]; ResidueInterception=0
          SoilOrganicMatter: RootCN=40; EnrACoeff=7.4; EnrBCoeff=0.2; OCUnits=Total
            Thickness  OC    SoilCN  FBiom  FInert  RootWt
            150        1.2   12      0.04   0.4     347.129
            150        0.96  12      0.02   0.6     270.344
            300        0.6   12      0.02   0.8     163.972
            300        0.3   12      0.02   1       99.4541
            300        0.18  12      0.01   1       60.322
            300        0.12  12      0.01   1       36.5871
            300        0.12  12      0.01   1       22.1912
          Analysis: Thickness=[150, 150, 300, 300, 300, 300, 300]; PH=[8, 8, 8, 8, 8, 8, 8]; PHUnits=Water; BoronUnits=0
          InitialWater: PercentMethod=0; FractionFull=0; RelativeTo=WheatSoil
          Sample InitialN: NO3Units=ppm; NH4Units=ppm; SWUnits=Volumetric; OCUnits=Total; PHUnits=Water
            Thickness  NO3  NH4
            150        1    0.1
            150        1    0.1
            300        1    0.1
            300        1    0.1
            300        1    0.1
            300        1    0.1
            300        1    0.1
          CERESSoilTemperature
          Nutrient
            DirectedGraphInfo={Nodes=[{Name=Inert, OutlineColour=Black}, {Name=SurfaceResidue, OutlineColour=Black}, {Name=FOMLignin, OutlineColour=Black}, {Name=FOMCellulose, OutlineColour=Black}, {Name=FOMCarbohydrate, OutlineColour=Black}, {Name=Microbial, OutlineColour=Black}, {Name=Humic, OutlineColour=Black}, {Name=Urea, OutlineColour=Black}, {Name=NO3, OutlineColour=Black}, {Name=NH4, OutlineColour=Black}, {Name=Atmosphere, OutlineColour=White}, {Name=PlantAvailableNO3, OutlineColour=Black}, {Name=PlantAvailableNH4, OutlineColour=Black}], Arcs=[{SourceName=SurfaceResidue, DestinationName=Microbial}, {SourceName=SurfaceResidue, DestinationName=Humic}, {SourceName=FOMLignin, DestinationName=Microbial}, {SourceName=FOMLignin, DestinationName=Humic}, {SourceName=FOMCellulose, DestinationName=Microbial}, {SourceName=FOMCellulose, DestinationName=Humic}, {SourceName=FOMCarbohydrate, DestinationName=Microbial}, {SourceName=FOMCarbohydrate, DestinationName=Humic}, {SourceName=Microbial, DestinationName=Microbial}, {SourceName=Microbial, DestinationName=Humic}, {SourceName=Humic, DestinationName=Microbial}, {SourceName=Urea, DestinationName=NH4}, {SourceName=NO3, DestinationName=Atmosphere}, {SourceName=NH4, DestinationName=NO3}]}
        SurfaceOrganicMatter: InitialResidueName=wheat_stubble; InitialResidueType=wheat; InitialResidueMass=500; InitialStandingFraction=0; InitialCPR=0; InitialCNR=100; FractionFaecesAdded=0.5
        MicroClimate: a_interception=0; b_interception=1; c_interception=0.55; d_interception=0; soil_albedo=0.3; SoilHeatFluxFraction=0.4; NightInterceptionFraction=0.5; ReferenceHeight=2
        Manager ResetAndOutput
          OutputDate = 30-Apr
          ResetDate = 1-Nov
          ResetWater = Yes
          ResetN = Yes
          ResetSOM = Yes
```csharp
using System;
using Models.Core;
using Models.PMF;
using Models.Soils;
using Models.Soils.Nutrients;
using Models.Soils.Nutrients;
using Models.Soils.Nutrients;
using Models.Interfaces;
using Models.Utilities;
using Models.Surface;
using APSIM.Shared.Utilities;
using Models.Report;

namespace Models
{
    [Serializable]
    public class Script : Model
    {
        [Link] Clock Clock;
        [Link] SoilWater SoilWater = null;
        [Link] INutrient Nutrient = null;
        [Link] SurfaceOrganicMatter SOM = null;
        [Link] Summary Summary;
        [Link] Report.Report Report;

        [Description("Date for output:")]
        public string OutputDate {get;set;}

        [Description("Date for reset:")]
        public string ResetDate {get;set;}

        [Description("Reset Water?")]
        public string ResetWater {get;set;}

        [Description("Reset Nitrogen?")]
        public string ResetN {get;set;}

        [Description("Reset Surface Organic Matter?")]
        public string ResetSOM {get;set;}

                /// <summary>Occurs when a plant is about to be harvested.</summary>
        public event EventHandler Reseting;
                /// <summary>Occurs when a plant is about to be harvested.</summary>
        public event EventHandler Reporting;


        [EventSubscribe("DoManagement")]
        private void OnDoManagement(object sender, EventArgs e)
        {
            if (DateUtilities.WithinDates(OutputDate, Clock.Today, OutputDate))
            {
               Reporting.Invoke(this, new EventArgs());
               //Report.DoOutput();
            }

            if (DateUtilities.WithinDates(ResetDate, Clock.Today, ResetDate))
            {
                if (ResetWater == "Yes")
                {
                    Summary.WriteMessage(this, "Reset Water");
                    SoilWater.Reset();
                }
                if (ResetN == "Yes")
                {
                    Summary.WriteMessage(this, "Reset Nitrogen");
                    Nutrient.Reset();
                }
                if (ResetSOM == "Yes")
                {
                    Summary.WriteMessage(this, "Reset Surface OM");
                    SOM.Reset();
                }

                Reseting.Invoke(this, new EventArgs());
            }
        }
    }
}
```
