Simulations: Version=138
  DataStore
  Simulation
    Weather: FileName=%root%/Examples/WeatherFiles/Ingham.met
    Clock: Start=1990-01-01; End=2000-12-31
    Summary summaryfile
    MicroClimate: a_interception=0; b_interception=1; c_interception=0; d_interception=0; SoilHeatFluxFraction=0.4; MinimumHeightDiffForNewLayer=0; NightInterceptionFraction=0.5; ReferenceHeight=2
    Zone Field: Area=1; Slope=0; AspectAngle=0; Altitude=50
      Fertiliser
      Sugarcane
      Folder Manager folder
        Manager SUGAR management
          planting_day = 1-apr
          plantlen = 450
          plant_stalks = 10
          variety = q117
          sowing_depth = 150
          NoRatoons = 4
          ratoonlen = 390
          ratoon_stalks = 10
```csharp
using APSIM.Shared.Utilities;
using Models.PMF;
using Models.Core;
using System;
using System.Linq;

namespace Models
{
    [Serializable]
    [System.Xml.Serialization.XmlInclude(typeof(Model))]
    public class Script : Model
    {
        [Link] Clock Clock;
        [Link] Sugarcane Sugarcane;
        
        [Description("Enter planting date (dd-mmm)")]
        public string planting_day { get; set; }
        [Description("Duration of a plant crop (days) (30days/mth x 15mths)")]
        public int    plantlen { get; set; }
        [Description("Stalk density of plant crop (/m2)")]
        public double plant_stalks { get; set; }
        [Description("Planting variety")]
        [Display(Type=DisplayType.CultivarName, PlantName = "Sugarcane")]
        public string variety { get; set; }
        [Description("Planting depth (mm)")]
        public double sowing_depth { get; set; }
        [Description("Number of ratoons before EndCrop")]  
        public int    NoRatoons { get; set; }
        [Description("Duration of a ratoon crop (days) (30days/mth x 13mths)")]
        public int    ratoonlen { get; set; }
        [Description("Stalk density of ratoon crop (/m2)")]
        public double ratoon_stalks { get; set; }
        

        private int dah;
        //Remove this later, I don't think they use it. Days After Harvest.
        
        //two below are used for rotations. Remove this. I don't think ApsimX does rotations like this.
        private int nextcrop;
        private int fallowin;

        
        [EventSubscribe("StartOfSimulation")]
        private void OnStartOfSimulation(object sender, EventArgs e)
        {
            //Rotation variables. Not sure if these are still needed in ApsimX rotations
            nextcrop = 0;
            fallowin = 0;
        }


        [EventSubscribe("StartOfDay")]
        private void OnStartOfDay(object sender, EventArgs e)
        {

            //! Initialise and set a time counter for entire run
            dah = 0;


            if (Sugarcane.crop_status == "alive")
            {
                dah = 0;

                //! Set harvest dates for each crop phase
                if (((Sugarcane.DaysAfterSowing == plantlen) && (Sugarcane.ratoon_no == 0))
                    || ((Sugarcane.DaysAfterSowing == ratoonlen) && (Sugarcane.ratoon_no > 0)))
                {
                    
                    Sugarcane.HarvestCrop();
                    if (Sugarcane.ratoon_no == NoRatoons + 1)
                    {
                        //! plough the crop out
                        Sugarcane.KillCrop();
                        Sugarcane.EndCrop();
                    }
                    else
                    {
                        //! Set stalk density
                        Sugarcane.plants = ratoon_stalks;
                    }
                }
                else
                {
                    //! We have not reached the harvest date for this ratoon.
                }
            }
            else if (Sugarcane.crop_status == "dead")
            {
                Sugarcane.HarvestCrop();
                Sugarcane.EndCrop();
            }
            else if ((Sugarcane.crop_status == "out") && (DateUtilities.DatesEqual(planting_day, Clock.Today)))
            {
                Sugarcane.SowNewPlant(PlantingDensity: 10, Depth: sowing_depth, CultivarName: variety);
                Sugarcane.plants = plant_stalks;
                dah = 0;
            }
            else
            {
                dah = dah + 1;
            }
     
        }
    }
}
```
        Manager Fertilise on fixed date
          fert_date = 1-Sep
          fert_criteria = 1000
          fert_amount = 200
          fert_type = hard coded
```csharp
using Models.Soils.Nutrients;
using Models.Interfaces;
using APSIM.Shared.Utilities;
using Models.Soils;
using Models.Soils.Nutrients;
using Models.PMF;
using Models.Core;
using System;
using System.Linq;

namespace Models
{
    [Serializable]
    [System.Xml.Serialization.XmlInclude(typeof(Model))]
    public class Script : Model
    {
        [Link] private Clock Clock;
        [Link] private Soil Soil;
        [Link] private Fertiliser Fertiliser;
        [Link] private Summary Summary;
        private double N_topsoil;
        [Link(ByName = true)]
        private ISolute NO3;
        [Link(ByName = true)]
        private ISolute NH4;

        
        [Description("Fertilise on this date (dd-mmm)")]
        public string fert_date { get; set; }
        
        [Description("Don't add fertiliser if N in top 2 layers exceeds (kg/ha)")]
        public double fert_criteria { get; set; }
        
        [Description("Amount to apply (kg/ha)")]
        public double fert_amount { get; set; }
        
        [Description("Type of fertilser to apply")]
        public string fert_type { get; set; }
    


        /*
         if (today = date('[fert_date]') then
            N_topsoil = no3(1) + nh4(1) + no3(2) + nh4(2)
            if (N_topsoil < [fert_criteria]) then
               [fertmodule] apply amount = [fert_amount] (kg/ha), depth = 50 (mm), type = [fert_type] ()
            endif
         endif 
        */
        
        
        [EventSubscribe("StartOfDay")]
        private void OnStartOfDay(object sender, EventArgs e)
        {

            if (DateUtilities.DatesEqual(fert_date, Clock.Today))
            {
                N_topsoil = NO3.kgha[1] + NH4.kgha[1] + NO3.kgha[2] + NH4.kgha[2];                    
                if (N_topsoil < fert_criteria)
                {
                    Fertiliser.Apply(Amount: fert_amount, Depth: 50, Type: Fertiliser.Types.UreaN);
                }
            }

        }
      
    }
}
```
      Report: EventNames=[Clock].DoReport
        VariableNames:
          [Clock].Today
          [Sugarcane].crop_status
          [Sugarcane].biomass
          [Sugarcane].cane_wt
          [Sugarcane].sucrose_wt
          [Sugarcane].height
          [Sugarcane].root_depth
          [Sugarcane].node_no_detached
          [Sugarcane].leaves
          [Sugarcane].green_leaves
          [Sugarcane].dead_leaves
          [Sugarcane].lai
          [Sugarcane].tla
          [Sugarcane].plant_n_tot
          [Sugarcane].swdef_photo
          [Sugarcane].swdef_pheno
          [Sugarcane].swdef_expan
          [Sugarcane].swdef_stalk
          [Sugarcane].nfact_photo
          [Sugarcane].nfact_expan
          [Sugarcane].oxdef_photo
          [Sugarcane].ep
      SurfaceOrganicMatter Surface Organic Matter: InitialResidueName=sugar_trash; InitialResidueType=Sugarcane; InitialResidueMass=1000; InitialStandingFraction=1; InitialCPR=0; InitialCNR=80
      Soil Macknade 923 1R: Latitude=0; Longitude=0
        InitialWater Initial water: PercentMethod=0; FractionFull=1
        Physical
          Thickness  BD    AirDry  LL15  DUL   SAT
          200        1.15  0.05    0.16  0.28  0.45
          200        1.35  0.05    0.18  0.3   0.45
          200        1.4   0.05    0.2   0.32  0.45
          300        1.45  0.05    0.21  0.33  0.45
          300        1.45  0.05    0.24  0.36  0.45
          300        1.5   0.05    0.29  0.41  0.43
          300        1.5   0.05    0.29  0.41  0.43
          SoilCrop SugarcaneSoil: LL=[0.16, 0.18, 0.2, 0.21, 0.24, 0.29, 0.29]; KL=[0.1, 0.1, 0.1, 0.08, 0.08, 0.04, 0.04]; XF=[1, 1, 1, 1, 1, 1, 1]
        WaterBalance SoilWater: SummerDate=1-Nov; SummerU=4; SummerCona=3; WinterDate=1-Apr; WinterU=4; WinterCona=3; DiffusConst=40; DiffusSlope=16; Salb=0.1; CN2Bare=65; CNRed=20; CNCov=0.8; Thickness=[200, 200, 200, 300, 300, 300, 300]; SWCON=[0.4, 0.4, 0.4, 0.4, 0.4, 0.4, 0.4]
        Organic: FOMCNRatio=70
          Thickness  Carbon  SoilCNRatio  FBiom  FInert  FOM
          200        1.3     11           0.06   0.3     343.139
          200        0.9     11           0.045  0.45    245.87
          200        0.54    11           0.035  0.85    176.174
          300        0.4     11           0.015  0.95    106.855
          300        0.4     11           0.005  0.95    64.8106
          300        0.4     11           0.005  0.99    39.3096
          300        0.4     11           0.005  0.99    23.8425
        Chemical
          Thickness  NO3N  NH4N  PH
          200        2     1     6
          200        2     1     6
          200        1     1     6
          300        1     0.5   6
          300        1     0.5   6
          300        1     0.5   6
          300        1     0.5   6
        CERESSoilTemperature Temperature
        Nutrient
        Sample Initial conditions: Depth=[0-180]; Thickness=[1800]; NH4=[1]; SWUnits=Volumetric; OCUnits=Total; PHUnits=Water
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