Simulations: Version=80
  Memo TitlePage
    # LifeCycle example
  DataStore
  Simulation Tutorial_1_1_PseudoAphid_AgeBasedDevt
    Memo
      #The Dymex Pseudo Aphid Tutorials

      This is a direct copy of the Dymex tutorial and development of a pseudo Aphid model:

      **Dymex v2. Insect Tutorial. https://www.hearne.software/getattachment/0ca7c91f-dbe6-4765-8207-4e1b3f1591f2/Insect-Tutorial.aspx. Accessed 1/4/2019.**

      Tutorial_1_1_PseudoAphid_AgeBasedDevt (Dymex tutorial 1 Introduction)

      Tutorial_1_2_PseudoAphid_AgeBasedDevtResults (exploring options to graph results in ApsimX using results from Tutorial_1_1)

      Tutorial_2_1_PseudoAphid_ConstantMetTempDevt (Dymex tutorial 2 Temperature-dependent Development)

      Tutorial_2_2_PseudoAphid_ConstantTempDevt (exploring other options in ApsimX to set a constant temperature)

      Tutorial_2_3_PseudoAphid_MeanFieldTempDevt (Dymex tutorial 3 Changing to Field Temperatures)

      Tutorial_3_1_PseudoAphid_DegreeDayDevt (Dymex tutorial 4 Degree Days)

      Tutorial_4_1_PseudoAphid_3HrlyDevt (exploring the ApsimX capability to simulate degree days based on three-hourly intervals)

      Tutorial_5_1_PseudoAphid_TempDepMortality (Dymex tutorial 5 Mortality)

      Tutorial_6_1_PseudoAphid_DensityDepMortality (Dymex tutorial 6 Density-dependent Mortality)

      Tutorial_7_1_PseudoAphid_DrynessDepMortality (Dymex tutorial 7 Dryness Dependent Mortality)

      Tutorial_8_1_PseudoAphid_DrynessDepMortalitySoil (Dymex tutorial 8 Dryness Dependent Mortality using Soil Moisture)

      In Dymex tutorials 9 and 10, management operations are added to the simulations to spray the PseudoAphids. These tutorials have not been rebuilt here since ApsimX provides for spraying as part of manangement activities that can be applied in any ApsimX simulation.

      Notes are from the Dymex manual and adjusted to describe the processes required in the APSIM population model builder.

      **Each tutorial builds upon the previous one.**

      Unlike Dymex, APSIM provides timing models, climate models, and reporting models so none of these need to be created by the user. However, the model set up described in this section is requred for this and successive tutorials.

      #Tutorial_1_1_PseudoAphid Age Based Development

      This tutorial is the first in the series for modelling the lifecycle of a pseudoaphid.

      In Tutorial_1_1, ApsimX is set up to simulate an insect population for one year. A lifecycle is established that includes a single Juvenile stage that is transferred to an adult stage after ten days. The adult stage is set up with simple mortality and reproduction functions. In this tutorial, all adults die after twenty days. The reproduction function for adults allows all adults to reproduce at a fixed rate after a fixed time.

      **Clock**

      Start simulation = **01/01/2016**;
      End simulation   = **31/12/2016**

      **Weather file**

      Select the example met file = **Normal.met**

      **Summary file**

      This file provides a summary of the simulation output processes after the simulation has been run.

      **Adding and building a report**

      Add a report to hold the results of your simulation.

      To do this, go to the FIELD object, right click and select **add Model > Report**

      For many simulations, changes in results over time is of interest. To add a time component to your report, go to the **Report module** and Type "[Clock]." *(be sure to include the full stop after the closing square bracket)*. Options will appear - select "Today" to report today's date.

      Another useful time component to add to your report is the day of the year. To so this in the Report module, Type "[Clock]." *(be sure to include the full stop after the closing square bracket)*. Options will appear - select "Today". and then type another "." full stop. More options will appear and scroll down to "DayOfYear" to report the Julian day.
    Memo Memo1
      #Tutorial 1_1 Summary

      **Clock**

      Start date 1/1/2016

      End date 31/12/2016

      ***Lifecycle***

      **Juvenile**

      Transfer to adult function (Step)

      Driving variable: Chronological Age

      Transfer threshold: 10 days

      Prop.juveniles transferring: 1

      **Adults**

      Continuous mortality function (step)

      Driving variable: Chronological age

      Threshold: 20 days

      Prop. adults dying: 1

      *Reproduction*

      Fecundity:

      Constant: 5 juveniles per adult

      Progeny Production (Linear above Threshold)

      Driving variable: Chronological Age

      Threshold: 8 days

      Slope: 0.2
    Clock: Start=2016-01-01; End=2016-12-31
    Summary SummaryFile
    Weather: FileName=normal.met
    MicroClimate: a_interception=0; b_interception=1; c_interception=0; d_interception=0; soil_albedo=0.3; SoilHeatFluxFraction=0.4; MinimumHeightDiffForNewLayer=0; NightInterceptionFraction=0.5; ReferenceHeight=2
    SoilArbitrator
    Zone Field: Area=1; Slope=0; AspectAngle=0; Altitude=50
      Report: EventNames=[Clock].DoReport
        VariableNames:
          [Clock].Today
          [Clock].Today.DayOfYear
          [LifeCycle].Juvenile.TotalPopulation
          [LifeCycle].Adult.TotalPopulation
          [LifeCycle].Adult.CohortCount
          [LifeCycle].TotalPopulation
          [LifeCycle].CurrentLifeStage.CurrentCohort.PhenoAge
      Fertiliser
      Soil: ASCOrder=Vertosol; ASCSubOrder=Black; SoilType=Clay; Site=Norwin; NearestTown=Norwin; Region=Darling Downs and Granite Belt; State=Queensland; Country=Australia; NaturalVegetation=Qld. Bluegrass, possible Qld. Blue gum; ApsoilNumber=900; Latitude=-27.581836; Longitude=151.320206; LocationAccuracy=+/- 20m
        DataSource=CSIRO Sustainable Ecosystems, Toowoomba; Characteriesd as part of the GRDC funded project"Doing it better, doing it smarter, managing soil water in Australian agriculture' 2011
        Comments=OC, CLL for all crops estimated-based on Bongeen Mywybilla Soil No1
        Physical
          Thickness  BD       AirDry    LL15      DUL       SAT       KS
          150        1.01056  0.13025   0.2605    0.521     0.588655  20
          150        1.07146  0.198689  0.248362  0.496723  0.565677  20
          300        1.09394  0.28      0.28      0.488438  0.557193  20
          300        1.15861  0.28      0.28      0.480297  0.532787  20
          300        1.17301  0.28      0.28      0.471584  0.527354  20
          300        1.16287  0.28      0.28      0.457071  0.53118   20
          300        1.1875   0.28      0.28      0.452332  0.521888  20
          SoilCrop WheatSoil: LL=[0.261, 0.248, 0.28, 0.306, 0.36, 0.392, 0.446]; KL=[0.06, 0.06, 0.06, 0.04, 0.04, 0.02, 0.01]; XF=[1, 1, 1, 1, 1, 1, 1]
        SoilWater: SummerDate=1-Nov; SummerU=5; SummerCona=5; WinterDate=1-Apr; WinterU=5; WinterCona=5; DiffusConst=40; DiffusSlope=16; Salb=0.12; CN2Bare=73; CNRed=20; CNCov=0.8; max_pond=0; Thickness=[150, 150, 300, 300, 300, 300, 300]; SWCON=[0.3, 0.3, 0.3, 0.3, 0.3, 0.3, 0.3]; PrecipitationInterception=0
        Organic: FOMCNRatio=40
          Thickness  Carbon  SoilCNRatio  FBiom  FInert  FOM
          150        1.2     12           0.04   0.4     347.129
          150        0.96    12           0.02   0.6     270.344
          300        0.6     12           0.02   0.8     163.972
          300        0.3     12           0.02   1       99.4541
          300        0.18    12           0.01   1       60.322
          300        0.12    12           0.01   1       36.5871
          300        0.12    12           0.01   1       22.1912
        Chemical
          Thickness  NO3N  NH4N  PH
          150        1     0.1   8
          150        1     0.1   8
          300        1     0.1   8
          300        1     0.1   8
          300        1     0.1   8
          300        1     0.1   8
          300        1     0.1   8
        InitialWater: PercentMethod=1; FractionFull=1
        Sample InitialN: Thickness=[150, 150, 300, 300, 300, 300, 300]; SWUnits=Volumetric; OCUnits=Total; PHUnits=Water
        CERESSoilTemperature
        Nutrient
          DirectedGraphInfo={Nodes=[{Name=Inert, OutlineColour=Black}, {Name=SurfaceResidue, OutlineColour=Black}, {Name=FOMLignin, OutlineColour=Black}, {Name=FOMCellulose, OutlineColour=Black}, {Name=FOMCarbohydrate, OutlineColour=Black}, {Name=Microbial, OutlineColour=Black}, {Name=Humic, OutlineColour=Black}, {Name=Urea, OutlineColour=Black}, {Name=NO3, OutlineColour=Black}, {Name=NH4, OutlineColour=Black}, {Name=Atmosphere, OutlineColour=White}], Arcs=[{SourceName=SurfaceResidue, DestinationName=Microbial}, {SourceName=SurfaceResidue, DestinationName=Humic}, {SourceName=FOMLignin, DestinationName=Microbial}, {SourceName=FOMLignin, DestinationName=Humic}, {SourceName=FOMCellulose, DestinationName=Microbial}, {SourceName=FOMCellulose, DestinationName=Humic}, {SourceName=FOMCarbohydrate, DestinationName=Microbial}, {SourceName=FOMCarbohydrate, DestinationName=Humic}, {SourceName=Microbial, DestinationName=Microbial}, {SourceName=Microbial, DestinationName=Humic}, {SourceName=Humic, DestinationName=Microbial}, {SourceName=Urea, DestinationName=NH4}, {SourceName=NO3, DestinationName=Atmosphere}, {SourceName=NH4, DestinationName=NO3}]}
      SurfaceOrganicMatter: InitialResidueName=wheat_stubble; InitialResidueType=wheat; InitialResidueMass=500; InitialStandingFraction=0; InitialCPR=0; InitialCNR=100; FractionFaecesAdded=1
      Plant Wheat: CropType=Wheat; IsEnding=false; DaysAfterEnding=0
      LifeCycle: InitialPopulation=[1, 0]; LogSummary=false
        Memo
          ***Adding a Life Cycle***

          The first step in building a population model is to build the LifeCycle.

          To do this, go to the FIELD object, right click and select **Add Model > LifeCycle**

          ***Initiating the LifeCycle Model***

          The initial populations of all stages of individuals needs to be initiated with some individuals.

          This is done at the **LifeCycle** level.

          Select the LifeCycle model and then for "Initial population at each LifeStage" enter **"1,0"** for the two LifeStages (Juvenile and Adult) that we are using in our example, i.d., we have 1 juvenile and 0 adults.

          ***Adding a Life Stage***

          The LifeStage icon represents one LifeStage of the species being modelled.  A number of
          environmental factors (eg. temperature, moisture, predators, availability of food, diseases,
          etc.) influence the species’ rate of development, survival and reproduction.  The LifeCycle model can be
          set to simulate these processes by adding functions to the LifeStage, each of which
          controls some aspect of the LifeStage.

          Each LifeStage defines a particular stage (eg. egg, pupa, adult, etc.) together with its
          environment and attributes.  The number of stages is set by the user.

          For the PseudoAphid two stages are required (juvenile and adult); however several stages could be used depending
          upon the detail required by the model or the life cycle of the organism.  Many insects may
          require a number of LifeStages depending upon the instars that are present.  For example, a
          model of a tree fern would probably include stages corresponding to spore, gametophyte,
          gamete and sporophyte.  However, it is conceivable that a user may wish to condense two of
          these three stages into one for a particular model and might end up with the three stages of
          spore, gametophyte-gamete and sporophyte.  Exactly how the model is constructed depends
          completely on the requirements and applications of the user.

          **To add a LifeStage to the life cycle** right click on the LifeCycle and select **Add model > select LifeStage**.

          For this tutorial:

          Add a lifstage and rename it to **Juvenile**.

          Add a second LifeStage and rename to **Adult**.
        LifeStage Juvenile
          Memo
            Once the Juvenile LifeStage has been named its atributes need to be defined.

            The **LifeStage outputs** that are possible include: **Development, mortality, cohort properties, transfer to next stage, and reproduction.**

            In this initial form of the pseudo-aphid model, Juveniles have no development requirements, reproduction or death, so we dont have to define “Development”, “Reproduction” and “Mortality”. The extreme simplicity of the model means there are very few output variables to consider for this example. Therefore, for the Juvenile LifeStage in this example we only need to define the **LifeStage Outputs** that are required to produce an output from the stage and the “Stage Transfer” to set the conditions under which the pseudo-aphids become adults.

            ***LifeStage Outputs***

            Go to the **Report module** and Type "[LifeCycle]." *(be sure to include the full stop after the closing square bracket)*. Options will appear - select "Juvenile" and then type another "." full stop. More options will appear and scroll down to "TotalPopulation" to report the number of individuals within the Juvenile LifeStage (you will end up with **[LifeCycle].Juvenile.TotalPopulation**).

            ***Stage Transfer***

            The “Stage Transfer” is a process under which the pseudo-aphids
            change from Juveniles into Adults.  When variables and functions for any “rates of change”
            LifeStage process are required:

            Right click on the Juvenile LifeStage and select: **Add Model > LifeStageProcess**

            Right Click on LifeStageProcess and rename to MaturingProcess

            Select the MaturingProcess and beside the descriptor that reads "transfer to LifeStage" type **Adult**

            The reference for step function describing transfer to adult for PseudoAphid model is Sutherst RW, Maywald GF. DYMEX modelling workshops: a national, collaborative approach to pest risk analysis and IPM in Australia. Pest Management—Future Challenges. 1998;2:57-62.

            ***Linear Interpolation and YX Pairs***

            The Linear Interpolation funtion can be used to represent many relationships. In this example, the function will work as a Step function whereby when a threshold is reached, all individuals will transfer to the next growth stage.

            Right click on the maturingProcess process and select *function > LinearInterpolationFunction*

            Right click on the LinearInterpolationFunction and Rename to **"TransferToAdult"**

            We now have to provide a driving variable to the function for this model. In this example we use phenological time to drive the model.

            The “Step” function, which defines the “Juvenile to Adult Stage Transfer”, requires two
            parameters: the Chronological Age at which the juveniles become adults and the proportion
            of juveniles which actually become adults during that time step. These parameters are
            entered in the xy grid that will be added to the function but first the driving variable (x) needs to be defined in the function as **[LifeCycle].CurrentLifeStage.CurrentCohort.PhenoAge** (after each "." you will be offered options to allow you to complete the definition of X. Note that this naming is based on the naming of the types of models in the tree heirarchy that has been set up. These names can be seen by hovering your mouse cursor over each level).

            The numbers that define the value of the parameter are entered as X Y pairs

            Right Click on the **TransferToAdult** function and select add function then select **"XYPairs"**

            **To set the xy pairs:**

            **X =**  0, 9.9, 10, 20
            **Y =**  0, 0,   1,  1

            ***Document your model***

            It is good practice to describe your functions and why you have used them. This can be done by adding a memo field to the function that describes where the data came from and what papers you used

            Right click on  **TransferToAdult > add Model > Memo**
          LifeStageProcess MaturingProcess: ProcessAction=0; TransferTo=Adult
            LinearInterpolationFunction TransferToAdult
              XYPairs: X=[0, 9.9, 10, 20]; Y=[0, 0, 1, 1]
              VariableReference XValue: VariableName=[LifeCycle].CurrentLifeStage.CurrentCohort.PhenoAge
        LifeStage Adult
          Memo
            <u>**Completing the Adult Stage**</u>

            The simplicity of the example provided here for the pseudo-aphid model means that the
            **“Development”** and **“Stage Transfer”** processes can be ignored for the Adult stage; the former
            because the model uses **“Phenological Age”** to determine maturation, and the latter because
            there is no **“next stage”**.  Data output from the stage is specified by writing the **“LifeStage
            Outputs”** in the report module as we did for the Juvenile stage.

            Go to the **Report** module right click and type:

            [LifeCycle].Adult.TotalPopulation

            [LifeCycle].Adult.CohortCount

            [LifeCycle].TotalPopulation
          LifeStageProcess AdultMortalityProcess: ProcessAction=2
            Memo
              <u>**Mortality in the PseudoAphid**</u>

              ***Mortality***

              As the pseudo-aphids all need to die as adults, a **“Mortality”** process needs to be set. There
              are three types of Mortality process: **“Continuous”**, **“Establishment”** and **“Exit”**.

              **Continuous mortality** operates throughout the duration of the LifeStage and is the most common type of
              mortality.

              However, certain species pass through life cycle stages where considerable
              mortality occurs when the organism tries to gain a “foothold” in its new stage (eg. for ticks
              attaching to an animal, a large proportion are rejected during their initial attempts to attach).
              Organisms such as this will require an **“Establishment Mortality"** process (which acts only
              during the move to the new stage) in addition to, or instead of, the **“Continuous”** Mortality
              process.

              The **“Exit mortality”** acts only on those individuals that are leaving the LifeStage to
              transfer to the next stage.

              The pseudo-aphid requires only the Continuous mortality process.  Since
              the adults all die at the end of a fixed time period, their mortality-inducing variable is
              “Chronological Age”, with the effect being defined by a **“Step function”**.  The threshold
              value (i.e., the age of the adults at death) will be 20 and the constant value will be 1 (i.e, they
              all die on the 20th day).  Note that the **“Chronological Age”** is a measure of the length of time
              an individual has stayed within that stage.  The pseudo-aphids are dying at the end of a 30-
              day life span.  However, since **“Phenological Age”** in the Adult stage refers only to the
              length of time an individual has spent in that stage, 20 days is the correct value of the
              parameter.

              ***Add Mortality Function***

              Right click on **"Adult > add model> LifeStageProcess"**

              Rename to **AdultMortalityProcess**

              Right click on **"AdultMortalityProcess > add function > LinearInterpolationFunction"**

              Rename  **Mortality**

              Right click on **"Mortality > add function > XYPairs"**

              ***Populate the Mortality function***

              Click to highlight the **AdultMortalityProcess**. Click in the **Value* column beside the **LifeStage Process type Value box**, and select **"Mortality"** from the drop down list.

              Right click on the linear interpelation function **Mortality**. This function needs a driving x variable and in this case we will use the phenological age of the pseudo-aphid.  The phenological age differs for each cohort so the path for the x variable is **[LifeCycle].CurrentLifeStage.CurrentCohort.PhenoAge** (after each "." you will be offered options to allow you to complete the definition of X. Note that this naming is based on the naming of the types of models in the tree heirarchy that has been set up. These names can be seen by hovering your mouse cursor over each level)

              ***Specifying the XYPairs***

              We aim to use a step function so once the phenological age threshold has been achieved all the individuals wiii die.

              To do this, set:

              **X=** 0,19.99,20,30

              **Y=** 0,0,1,1
            LinearInterpolationFunction Mortality
              XYPairs: X=[0, 19.99, 20, 30]; Y=[0, 0, 1, 1]
              VariableReference XValue: VariableName=[LifeCycle].CurrentLifeStage.CurrentCohort.PhenoAge
          LifeStageReproductionProcess ReproductionProcesses: TransferTo=Juvenile; FecundityFunctionName=Fecundity; ProgenyFunctonName=ProgenyProduction
            Memo
              <u>**Progeny Production in the Pseudo-aphid**</u>

              ***Introduction***

              The starting point for setting Reproductive parameters is the **“Reproduction”** function.

              Three components determining reproduction can be set: **Fecundity(E)**,
              **Fecundity(R)** and **Progeny Production**.

              **Fecundity** is the total number of possible offspring
              that can be produced per individual.  The first two components set this number in slightly
              different ways.  **Fecundity(E) is an “establishment” process**, acting only when individuals
              first enter the adult stage.  This is often the most appropriate way to set the fecundity for an
              insect – i.e., a maximum number of potential offspring (which may depend on how well the
              insect has fed in the juvenile stages).  We will use Fecundity (E) in this example.

              **Progeny Production** determines the rate at which the progeny are produced over time. Note that the Fecundity does not take into account that half
              the population consists of males, and normally this will need to be modelled by adjusting the
              value of Fecundity by the sex ratio.

              For the pseudo-aphid model, only the Fecundity(E) process is used, and a constant value of 5
              was chosen.  Fecundity will usually vary with environmental factors, but in this model of the
              pseudo-aphid, Fecundity will not alter.  **“Progeny Production Rate”** defines the rate at which
              the offspring are produced.   For example, some species produce all their progeny at once;
              others produce batches of offspring over short periods of time separated by intervals, while
              others may steadily increase production of offspring over a period of time and then decrease
              the production rate gradually or rapidly back to zero. The Pseudo-aphid of our example is parthenogenetic (only females are present) and so adjustment of the Progeny Production by the sex ratio this is not a consideration.

              [insert image here ]

              While the fractional number of progeny do not apply to an individual pseudo-aphid, they are
              readily applicable to populations.  An important point to remember is that although the
              pseudo-aphid's progeny production graph shows that the actual fecundity is exactly equal to
              the potential fecundity, shown by the area under the curve (shaded), this is in general not so. It is so only because of the deliberately limited nature of this hypothetical organism.  The
              effects of Mortality invariably reduce the actual fecundity.

              ***Add reproduction***

              Right click on **"Adult > AddModel > LifeStageReproductionProcess"**

              Rename to **ReproductionProcesses**.

              Right Click on **"ReproductionProcesses > add function > LinearAfterThresholdFunction"**

              Rename to  **"ProgenyProduction"**

              Right click on **"ReproductionProcesses >add function > Constant"**

              Rename **Fecundity**

              ***Set Reproduction Process***

              Selet **ReproductionProcess** enter **Juvenile** in transfer to description,then **Fecundity** next to fecundity function name and **ProgenyProduction** next to progeny function.

              ***Progeny production***

              Select **ProgenyProduction**

              x property = **[LifeCycle].CurrentLifeStage.CurrentCohort.PhenoAge** (after each "." you will be offered options to allow you to complete the definition of X. Note that this naming is based on the naming of the types of models in the tree heirarchy that has been set up. These names can be seen by hovering your mouse cursor over each level)

              x value trigger = 8

              gradient = 0.2

              Set the value of *Fecundity* to 5.

              <u>**Running your simulation**</u>

              To run your simulation, right click on the **Simulation name** and select "**Run APSIM**".

              <u>**Results of the simulation</u>**

              The results from your simulation will appear in the Report model.

              <u>**Graphing the results of your simulation**</u>

              To graph the results of your simulation, right mouse click on the "Field" model:

              **Field > Add model > Graph**

              Rename Graph to "**Total Juvenile Population**"

              Right click on "Total Juvenile Population" and add the series to plot:

              ** Total Juvenile Population > Add model > Series **
            LinearAfterThresholdFunction ProgenyProduction: XProperty=[LifeCycle].CurrentLifeStage.CurrentCohort.PhenoAge; XTrigger=8; Slope=0.2
            Constant Fecundity: FixedValue=5
    Memo Memo2
      ------
  Simulation Tutorial_1_2_PseudoAphid_AgeBasedDevtResults
    Memo
      #The Dymex Pseudo Aphid Tutorials

      This is a direct copy of the Dymex tutorial and development of a pseudo Aphid model. Notes are from the Dymex manual and adjusted to describe the processes required in the APSIM population model builder.

      **Each tutorial builds upon the previous one.**

      #Tutorial_1_2_PseudoAphid - Age Based Development - Examining the results of the model

      Each tutorial builds upon the previous one. In this tutorial we examine the results of the model in greater detail.

      **Summary of changes made in this tutorial:**

      **Change** the length of the simulation from the full year to only 3 months.

      **Graph additional output** for the total adult population.

      <u>**Setting up the simulation**</u>

      **Duplicate** Tutorial_1_1

      **Rename** Tutorial_2_1_PseudoAphid_ExamineResults

      **Clock**

      Start simulation = **01/01/2016**;

      End simulation   = **31/03/2016**
    Memo Memo1
      #Tutorial 1_1 Summary

      **Clock**

      Start date 1/1/2016

      End date 31/03/2016

      ***Lifecycle***

      **Juvenile**

      Transfer to adult function (Step)

      Driving variable: Chronological Age

      Transfer threshold: 10 days

      Prop.juveniles transferring: 1

      **Adults**

      Continuous mortality function (step)

      Driving variable: Chronological age

      Threshold: 20 days

      Prop. adults dying: 1

      *Reproduction*

      Fecundity:

      Constant: 5 juveniles per adult

      Progeny Production (Linear above Threshold)

      Driving variable: Chronological Age

      Threshold: 8 days

      Slope: 0.2
    Clock: Start=2016-01-01; End=2016-03-31
    Weather: FileName=normal.met
    Summary SummaryFile
    SoilArbitrator
    MicroClimate: a_interception=0; b_interception=1; c_interception=0; d_interception=0; soil_albedo=0.3; SoilHeatFluxFraction=0.4; MinimumHeightDiffForNewLayer=0; NightInterceptionFraction=0.5; ReferenceHeight=2
    Zone Field: Area=1; Slope=0; AspectAngle=0; Altitude=50
      Report: EventNames=[Clock].DoReport
        VariableNames:
          [Clock].Today
          [Clock].Today.DayOfYear
          [LifeCycle].Juvenile.TotalPopulation
          [LifeCycle].Adult.TotalPopulation
          [LifeCycle].Adult.CohortCount
          [LifeCycle].TotalPopulation
          [LifeCycle].CurrentLifeStage.CurrentCohort.PhenoAge
          [LifeCycle].Adult.AdultMortalityProcess.Mortalityfunction
          [LifeCycle].Adult.Mortality
      Fertiliser
      Soil: same as Tutorial_1_1_PseudoAphid_AgeBasedDevt.Field.Soil
      SurfaceOrganicMatter: InitialResidueName=wheat_stubble; InitialResidueType=wheat; InitialResidueMass=500; InitialStandingFraction=0; InitialCPR=0; InitialCNR=100; FractionFaecesAdded=1
      Plant Wheat: CropType=Wheat; IsEnding=false; DaysAfterEnding=0
      LifeCycle: InitialPopulation=[1, 0]; LogSummary=false
        LifeStage Juvenile
          LifeStageProcess MaturingProcess: same as Tutorial_1_1_PseudoAphid_AgeBasedDevt.Field.LifeCycle.Juvenile.MaturingProcess
        LifeStage Adult
          LifeStageProcess AdultMortalityProcess: ProcessAction=2
            LinearInterpolationFunction Mortalityfunction
              XYPairs: X=[0, 19.99, 20, 30]; Y=[0, 0, 1, 1]
              VariableReference XValue: VariableName=[LifeCycle].CurrentLifeStage.CurrentCohort.PhenoAge
          LifeStageReproductionProcess ReproductionProcesses: TransferTo=Juvenile; FecundityFunctionName=Fecundity; ProgenyFunctonName=ProgenyProduction
            LinearAfterThresholdFunction ProgenyProduction: XProperty=[LifeCycle].CurrentLifeStage.CurrentCohort.PhenoAge; XTrigger=8; Slope=0.2
            Constant Fecundity: FixedValue=5
      Memo
        #Examining the output

        **Run APSIM**

        ***Modify graph for Total Juvenile Population***

        Within the graph "Total Juvenile Population", select *Series* and change the x variable to **Clock.Today.DayOfYear**

        ***Add a second Graph***

        Right click on the  **Total Juvenile Population** graph and select **"Copy"**

        Right click on the **"Field"** object and select **"Paste"**

        Rename to **"Total Adult Population"**

        Right Click on the Graph **"Total Adult Population"** and select *"Series"*

        **In Series:**

        Data source = **Report**

        X = **Clock.Today.DayOfYear**

        Y = **LifeCycle.Adult.TotalPopulation**

        Type = **scatter**

        Line type **Solid**

        Marker type **None**

        ***Create a folder of graphs to display on a single screen***

        Right click on the **"Field"** object and select **Add model>Folder**

        Rename to **"Adult"**

        ***To copy the "Total Adult Population" graph to this folder***

        Right click on the **"Total Adult Population"** graph and selelct "copy"

        Right click on the **"Adult"** folder and select "paste"

        ***To create additional graphs in the "Adult" folder***

        Using a folder to store a collection of graphs allows you to view all graphs at once from the folder icon.

        **Graph of Adult Mortality Process**

        Right click on **"Adult"** and select **"Add model > Graph"**

        Rename to **"AdultMortalityProcess"**

        Right Click on the Graph **"AdultMortalityProcess"** and select *"Series"*

        **In Series:**

        Data source = **Report**

        X = **Clock.Today.DayOfYear**

        Y = **LifeCycle.Adult.AdultMortalityProcess.MortalityFunction**

        Type = **scatter**

        Line type **Solid**

        Marker type = **None**

        ***To add a graph of Adult Mortality to the "Adult" folder***

        Right click on **"Adult"** and select **"Add model > Graph"**

        Rename to **"AdultMortality"**

        Right Click on the Graph **"AdultMortality"** and select *"Series"*

        **In Series:**

        Data source = **Report**

        X = **Clock.Today.DayOfYear**

        Y = **LifeCycle.Adult.AdultMortality**

        Type = **scatter**

        Line type **Solid**

        Marker type: **None**

        ***Run APSIM to view new results.***
    Memo Memo2
      ------
  Simulation Tutorial_2_1_PseudoAphid_ConstantMetTempDevt
    Memo
      #The Dymex Pseudo Aphid Tutorials

      This is a direct copy of the Dymex tutorial and development of a pseudo Aphid model. Notes are from the Dymex manual and adjusted to describe the processes required in the APSIM population model builder.

      **Each tutorial builds upon the previous one.**

      #Tutorial_2_1_PseudoAphid with Temperature-dependent Development obtained from a met file with constant temperatures

      ***Chronological and Physiological Age***
      In Tutorial 1_1 and 1_2, the pseudo-aphid model used chronological age to determine the sequence of development and reproduction. Chronological age is unsatisfactory as the only controlling influence on an insect's LifeCycle because the insect's physiological development (and by implication its reproduction and mortality) is often independent of chronological age and is generally controlled to a large extent by temperature. This tutorial presents an example of how APSIM-LifeCycle can model the pseudo-aphid's development from juvenile to adult when the LifeCycle development is based on physiological age and the rate of that development becomes temperature dependent. Since physiological age now enters all further tutorial models, it is defined below:

      Physiological age measures the state of development of an individual with its units generally stated as a proportion (or percentage) of completed development. As an example, the birth of the pseudoaphid could be scaled to 0 and its transition to adult scaled as 1. Since insect development is generally temperature dependent, accumulation of physiological age is usually non- uniform.

      ***Changing the Model***

      Copy Tutorial_1_2, rename and modify as described in this tutorial.

      ***The pseudo-aphid and Temperature***

      Since the pseudo-aphid's LifeCycle is ‘well known from published papers’, the effects of temperature on development are available and are presented in table form:

      [insert Life table table here ]

      The model used in Tutorial_1_2 remains essentially intact, but the transition from juvenile to adult (currently determined by Chronological Age) now becomes dependent upon Physiological Age, which in turn is dependent upon temperature. All juveniles still become adults when they reach the required Physiological Age. To preserve simplicity of the model, the PseudoAphids are maintained under temperature controlled incubator conditions.

      The results of Table 2-1 can be amended to display rate of development per day. This is done by calculating the reciprocal of the number of days taken to develop to adult (which assumes that the value “1' represents the physiological age of an adult). For example, suppose an organism takes 50 days to develop from egg to adult; its rate of development per day would therefore be 0.02 (ie. 0.02 * 50 = 1). Table 2.2 shows the results for the pseudo-aphid.

      [Insert figure 2.1 dymex manual here ]

      An inspection of Figure 2-1 shows that the development threshold is 10°C, while the slope of the graph is quite close to 0.01. These values will be used for this tutorial.

      ***Simulation set up***

      This tutorial requires the following simulation set up.

      This simulation takes place in a controlled temperature lab so the weather file has been changed to remain at a constant 20°C

      **Clock **

      Start simulation = **01/01/2016**

      End simulation   = **31/12/2016**

      **Weather file**

      Select the example met file = **20°C.met**
    Memo Memo1
      #Tutorial 2_1 Summary

      **Clock**

      See Tutorial_1_1

      **Weather**

      20<sup>o</sup>C.met

      ***Lifecycle***

      ***Juvenile***

      **Juvenile development function (Linear above Threshold)**

      Driving Variable: Mean Temperature

      Threshold: 10

      Slope: 0.01

      **Transfer to adult function (Step)**

      Driving variable: Physiological Age

      Transfer threshold: 1

      Prop.juveniles transferring: 1

      ***Adults***

      See Tutorial 1_2
    Clock: Start=2016-01-01; End=2016-12-31
    Weather: FileName=20°C.met
    Summary SummaryFile
    SoilArbitrator
    MicroClimate: a_interception=0; b_interception=1; c_interception=0; d_interception=0; soil_albedo=0.3; SoilHeatFluxFraction=0.4; MinimumHeightDiffForNewLayer=0; NightInterceptionFraction=0.5; ReferenceHeight=2
    Zone Field: Area=1; Slope=0; AspectAngle=0; Altitude=50
      Report: EventNames=[Clock].DoReport
        VariableNames:
          [Clock].Today
          [Clock].Today.DayOfYear
          [LifeCycle].Juvenile.TotalPopulation
          [LifeCycle].Adult.TotalPopulation
          [LifeCycle].Adult.CohortCount
          [LifeCycle].TotalPopulation
          [LifeCycle].CurrentLifeStage.CurrentCohort.PhenoAge
          [LifeCycle].Adult.AdultMortalityProcess.Mortality
          [LifeCycle].Adult.Mortality
      Fertiliser
      Soil: same as Tutorial_1_1_PseudoAphid_AgeBasedDevt.Field.Soil
      SurfaceOrganicMatter: InitialResidueName=wheat_stubble; InitialResidueType=wheat; InitialResidueMass=500; InitialStandingFraction=0; InitialCPR=0; InitialCNR=100; FractionFaecesAdded=1
      Plant Wheat: CropType=Wheat; IsEnding=false; DaysAfterEnding=0
      LifeCycle: InitialPopulation=[1, 0]; LogSummary=false
        LifeStage Juvenile
          Memo
            ***Modifying the model to add temperature-dependent development in Juveniles***

            Right click **Juvenile > Add model > LifeStageProcess**

            Rename to **"Development"**

            Use the control and arrow keys at the same time to place development above maturing process.

            For Development:

            Complete **Lifestage Process type** as **PhysiologicalGrowth**

            Complete **Transfer to Lifestage** as **Adult**

            **Add a *LinearAfterThresholdFunction* to Development and set values** with Development > Add function > LinearAfterThresholdFunction.

            Rename to **DevelopmentRate**

            **Set DevelopmentRate function values as:**

            **Xproperty** to **[weather].MeanT**

            **X value trigger** to **10**

            **Gradient** to **0.01**

            ***Modify Juvenile maturing process to be temperature-dependent***

            Open **LifeCycle > Juvenile > MaturingProcess**

            Select **TransferToAdult** and change the *XProperty* to **[Juvenile].CurrentCohort.PhysiologicalAge**

            Select the XYPairs and change to

            **X** = **0, 0.99, 1, 2**

            **Y** = **0, 0, 1, 1**

            ***Adult LifeStage processes are unchanged***

            ***Run APSIM***
          LifeStageProcess Development: ProcessAction=1; TransferTo=Adult
            LinearAfterThresholdFunction DevelopmentRate: XProperty=[weather].MeanT; XTrigger=10; Slope=0.01
          LifeStageProcess MaturingProcess: ProcessAction=0; TransferTo=Adult
            LinearInterpolationFunction TransferToAdult
              XYPairs: X=[0, 0.99, 1, 2]; Y=[0, 0, 1, 1]
              VariableReference XValue: VariableName=[Juvenile].CurrentCohort.PhysiologicalAge
        LifeStage Adult
          LifeStageProcess AdultMortalityProcess: ProcessAction=2
            LinearInterpolationFunction Mortality
              XYPairs: X=[0, 19.99, 20, 30]; Y=[0, 0, 1, 1]
              VariableReference XValue: VariableName=[LifeCycle].CurrentLifeStage.CurrentCohort.PhenoAge
          LifeStageReproductionProcess ReproductionProcesses: same as Tutorial_1_2_PseudoAphid_AgeBasedDevtResults.Field.LifeCycle.Adult.ReproductionProcesses
    Memo Memo2
      ------
  Simulation Tutorial_2_2_PseudoAphid_ConstantTempDevt
    Memo
      #The Dymex Pseudo Aphid Tutorials

      This is a direct copy of the Dymex tutorial and development of a pseudo Aphid model. Notes are from the Dymex manual and adjusted to describe the processes required in the APSIM population model builder.

      **Each tutorial builds upon the previous one.

      #Tutorial_2_2_PseudoAphid with Temperature-Dependant Development with temperatures calculated using a constant

      Because the phenology of diseases, pathogens and insects respond to temperature and much of the research is conducted in controlled temperature incubators and so the ability to simulate a constant temperature is important. Changing the Weather file is one way to do this, however an alternate simpler way is to add a constant Incubation temperature.

      ***Model set up for this exercise***

      Return to the original simulation settings provided in Tutorial 1_2.

      **Clock**

      Start simulation = **01/01/2016**

      End simulation   = **31/12/2016**

      **Weather file**

      Select the example met file = **Normal.met**

      **Constant incubator temperature**

      Select **"Tutorial_2_2_PseudoAphid"**

      Right click **Add function > Constant**

      Rename to **IncubatorTemp**

      Set **"The value of the constant"** to **12**.
    Memo Memo1
      #Tutorial 2_2 Summary

      **Clock**

      See Tutorial _1_1

      **Weather**

      See Tutorial_1_2

      Constant incubator temperature = 12

      ***Lifecycle***

      ***Juvenile***

      Transfer to adult function (Step)

      Driving variable: Physiological Age

      Transfer threshold: 1

      Prop.juveniles transferring: 1

      Juvenile development function (Linear above Threshold)

      Driving Variable: Incubator Temperature

      Threshold: 10

      Slope: 0.01

      ***Adults***

      See Tutorial 1_2
    Clock: Start=2016-01-01; End=2016-12-31
    Summary SummaryFile
    Weather: FileName=normal.met
    Constant IncubatorTemp: FixedValue=12
    SoilArbitrator
    MicroClimate: a_interception=0; b_interception=1; c_interception=0; d_interception=0; soil_albedo=0.3; SoilHeatFluxFraction=0.4; MinimumHeightDiffForNewLayer=0; NightInterceptionFraction=0.5; ReferenceHeight=2
    Zone Field: Area=1; Slope=0; AspectAngle=0; Altitude=50
      Report: same as Tutorial_1_2_PseudoAphid_AgeBasedDevtResults.Field.Report
      Fertiliser
      Soil: same as Tutorial_1_1_PseudoAphid_AgeBasedDevt.Field.Soil
      SurfaceOrganicMatter: InitialResidueName=wheat_stubble; InitialResidueType=wheat; InitialResidueMass=500; InitialStandingFraction=0; InitialCPR=0; InitialCNR=100; FractionFaecesAdded=1
      Plant Wheat: CropType=Wheat; IsEnding=false; DaysAfterEnding=0
      LifeCycle: InitialPopulation=[1, 0]; LogSummary=false
        LifeStage Juvenile
          Memo
            ***Modifying the model to set Juvenile development in response to constant incubator temperature***

            In the LifeCycle, open **"Juvenile > Development > DevelopmentRate"**.

            In the DevelopmentRate function set:

            **Xproperty** to **[IncubatorTemp]**

            **X value trigger** to **10**

            **Gradient** to **0.01**

            Open **LifeCycle > Juvenile > MaturingProcess**

            Select **TransferToAdult** and change the **XProperty** to **[Juvenile].CurrentCohort.PhysiologicalAge**

            Select the XYPairs and change to

            **X** = **0, 0.99, 1, 2**

            **Y** = **0, 0, 1, 1**

            ***Processes in the Adult Stage are unchanged.***

            ***Run APSIM***
          LifeStageProcess Development: ProcessAction=1; TransferTo=Adult
            LinearAfterThresholdFunction DevelopmentRate: XProperty=[IncubatorTemp]; XTrigger=10; Slope=0.01
          LifeStageProcess MaturingProcess: same as Tutorial_2_1_PseudoAphid_ConstantMetTempDevt.Field.LifeCycle.Juvenile.MaturingProcess
        LifeStage Adult
          LifeStageProcess AdultMortalityProcess: same as Tutorial_1_2_PseudoAphid_AgeBasedDevtResults.Field.LifeCycle.Adult.AdultMortalityProcess
          LifeStageReproductionProcess ReproductionProcesses: same as Tutorial_1_2_PseudoAphid_AgeBasedDevtResults.Field.LifeCycle.Adult.ReproductionProcesses
      Memo
        ###Figure showing the responce of the juvenile population when the constant temperature is lowered to 12°C
    Memo Memo2
      ------
  Simulation Tutorial_2_3_PseudoAphid_MeanFieldTempDevt
    Memo
      #The Dymex Pseudo Aphid Tutorials

      This is a direct copy of the Dymex tutorial and development of a pseudo Aphid model. Notes are from the Dymex manual and adjusted to describe the processes required in the APSIM population model builder.

      **Each tutorial builds upon the previous one.**

      #Tutorial_2_3_PseudoAphid with Temperature Based Development Using Mean Daily Temperature

      ***Changing to Field Temperatures***

      Tutorial 2_1 introduced the concept of “Physiological Age” and the effects of temperature on the development of the PseudoAphid. If a model is to simulate field conditions, it must use field temperatures. Tutorial 2_3 shows how DYMEX is able to utilize meteorological data for different geographical locations to simulate populations of the insect at those locations. The tutorial also shows how an “Expression” module can be used to combine selected variables mathematically to obtain a new variable.

      ***To set up the model for this exercise***

      Return to the original simulation settings in Tutorial 2_1.

      The simplest way to do this is to duplcate Tutorial 2-1 and rename to **Tutorial_2_3_PseudoAphid**.

      Now change the weather file back to the normal.met file.

      You should not have a constant function in the simulation and the XProperty of the LifeCycle>Juvenile>Development>DevelopmentRate function should be **[weather].MeanT**.

      **Clock**

      Start simulation = **01/01/2016**

      End simulation   = **31/12/2016**

      **Weather file**

      Select the example met file = **Normal.met**

      ***Run APSIM***
    Memo Memo1
      #Tutorial 2_3 Summary

      **Clock**

      See Tutorial_1_1

      **Weather**

      See Tutorial_1_2

      ***Lifecycle***

      ***Juvenile***

      **Juvenile development function (Linear above Threshold)**

      Driving Variable: Field Temperature

      Threshold: 10

      Slope: 0.01

      **Transfer to adult function (Step)**

      Driving variable: Physiological Age

      Transfer threshold: 1

      Prop.juveniles transferring: 1

      ***Adults***

      See Tutorial 1_2
    Clock: Start=2016-01-01; End=2016-12-31
    Weather: FileName=normal.met
    Summary SummaryFile
    SoilArbitrator
    MicroClimate: a_interception=0; b_interception=1; c_interception=0; d_interception=0; soil_albedo=0.3; SoilHeatFluxFraction=0.4; MinimumHeightDiffForNewLayer=0; NightInterceptionFraction=0.5; ReferenceHeight=2
    Zone Field: Area=1; Slope=0; AspectAngle=0; Altitude=50
      Report: same as Tutorial_1_2_PseudoAphid_AgeBasedDevtResults.Field.Report
      Fertiliser
      Soil: same as Tutorial_1_1_PseudoAphid_AgeBasedDevt.Field.Soil
      SurfaceOrganicMatter: InitialResidueName=wheat_stubble; InitialResidueType=wheat; InitialResidueMass=500; InitialStandingFraction=0; InitialCPR=0; InitialCNR=100; FractionFaecesAdded=1
      Plant Wheat: CropType=Wheat; IsEnding=false; DaysAfterEnding=0
      LifeCycle: InitialPopulation=[1, 0]; LogSummary=false
        LifeStage Juvenile
          Memo
            ##Modifying the model

            Check that the properties for the Juvenile Development Rate at **LifeCycle > Juvenile > Development > DevelopmentRate** have been set as follows:

            **Xproperty** as **[weather].MeanT**

            **X value trigger** as **10**

            **Gradient* as **0.01**

            Check that the properties for the **LifeCycle > Juvenile > MaturingProcess** have been set as follows:

            For **TransferToAdult**, **XProperty** as **[Juvenile].CurrentCohort.PhysiologicalAge**

            For **XYPairs:**

            **X** = **0, 0.99, 1, 2**

            **Y** = **0, 0, 1, 1**

            ##Run APSIM
          LifeStageProcess Development: ProcessAction=1; TransferTo=Adult
            LinearAfterThresholdFunction DevelopmentRate: XProperty=[weather].MeanT; XTrigger=10; Slope=0.01
          LifeStageProcess MaturingProcess: same as Tutorial_2_1_PseudoAphid_ConstantMetTempDevt.Field.LifeCycle.Juvenile.MaturingProcess
        LifeStage Adult: same as Tutorial_2_2_PseudoAphid_ConstantTempDevt.Field.LifeCycle.Adult
      Memo
        ###Figure showing the responce of the juvenile population when the constant temperature is lowered to 12°C
    Memo Memo2
      ------
  Simulation Tutorial_3_1_PseudoAphid_DegreeDayDevt
    Memo
      #The Dymex Pseudo Aphid Tutorials

      This is a direct copy of the Dymex tutorial and development of a pseudo Aphid model. Notes are from the Dymex manual and adjusted to describe the processes required in the APSIM population model builder.

      **Each tutorial builds upon the previous one.**

      #Tutorial_3_1_PseudoAphid Temperature Based Development Using Day Degrees

      ***Degree Days***

      **Introduction**

      In the Tutorial_2_3, development of the PseudoAphid was linked to temperatures, with actual field temperatures used as input. An average temperature was calculated from the daily minimum and maximum, and this was applied to the development process to drive the increase in Physiological Age. This approach is unsatisfactory in that it does not fully reflect the actual conditions the organisms experienced in the field. A simple example will make this clear: Minimum and maximum temperature values of 8°C and 12°C give an average temperature of 10°C, but so do 0°C and 20°. In the model of Tutorial 2, both these would give the same increase in development, yet to the insect in the field, they are likely to have quite different effects. The latter temperature regime would result in a substantial part of the day well above the developmental threshold of 10°C, and is likely to result in more development than the former regime. This concept (termed the ‘day-degree’ concept) is described and applied to the model in this tutorial.

      **The ‘Degree Day’ Concept**

      The pseudo-aphid has been given a development threshold of 10°C, which implies that once the temperature rises above that threshold, development proceeds. Suppose that the pseudo-aphid was existing under ideal conditions in an incubator, where the temperature was maintained at a steady 23°C. This situation is illustrated in Figure 4.1, where the area between the developmental threshold and the actual temperature is shaded. The shaded area represents the number of ‘degree-days’ available to the aphid’s development. The name ‘degree-days’ is derived from the fact that the size of the area is obtained by multiplying the height of the shaded rectangle (in degrees) by the width (a number of days). Each day has a temperature that is 13°C above the threshold of 10°C, thus the number of degree days accumulated over a 3-day period would be 13 x 3 = 39.

      **Figure 1** Figure 4.1 **Accumulation of “Day-degrees” at a constant temperature**

      Suppose now that the temperature is different each day, but constant within the day. Three successive days, with temperatures of 15°C, 6°and 12°C are shown in Figure 4.2. Again, the number of degree-days that have accumulated is calculated by summing the area under the temperature curve (and above the threshold temperature line). In this case, it is 5 + 0 + 2 = 7 degree days. The temperature on the second day is below the developmental threshold, and its contribution to the sum is zero. Note that the average temperature for the three days is 11°C, which would yield only 3 degree-days over the 3 days if it were applied directly.

      **Figure 2**  Figure 4.1 **Accumulation at day-degrees at different temperatures**

      An important point to note is that determining accumulated degree-days in this way is exactly equivalent to specifying development in terms of “Physiological Age”, with “Physiological Age” a function of temperature using the “Linear above Threshold” function. This is easily seen by comparing Figure 4.2 with the graph below (Figure 4.3), where the slope of the function is set to 1.

      **Figure 3** Figure 4.3 **Daily increment in Physiological Age with “Linear above Threshold” function**

      ***Calculating Degree Days Using the Circadian Cycle***

      When using actual field temperatures, the situation is more complex, as the temperature varies between the day’s minimum and maximum in some cyclical way each day. APSIM uses the daily maximum and minimum temperatures of the meteorological database to fix the “crest” and “trough” limits of a sinusoidal, circadian cycle of temperatures (Figure 4). To calculate the number of degree- days, the same procedure as in the above examples is used. The sine curve is divided into 8 segments (each of 3 hours). A rectangle (of width 3 hours) is created for each of the 8 segments, with the base on the threshold temperature and the midpoint of its top edge on the sine curve (Figure 4). The area of this rectangle is used as the degree-days accumulated for those 3 hours, and all 8 areas are added to obtain the total degree-days for the whole day. The sinusoidal approximation should be adequate for most purposes that APSIM-LifeCycle is used for, and will be used for the Pseudo-aphid model.

      **Figure 4** Figure 4.4. **Circadian cycle between daily maximum and minimum temperatures, and the 3-hourly degree-day summation**

      The current Pseudo-aphid model already implicitly uses degree-days for determining development (since the “Linear above Threshold” function is used to determine the accumulation of Physiological Age). The model will now be modified so that a circadian curve of temperature is used for driving the development.

      ***To set up the Model for the current tutorial***

      **Clock**

      Start simulation = **01/01/2016**

      End simulation   = **31/12/2016**

      **Weather file**

      Select the example met file = **Normal.met**
    Memo Memo1
      #Tutorial 3_1 - Summary

      **Clock**

      See Tutorial 2_1

      **Weather**

      See Tutorial 2-1

      ***Lifecycle***

      ***Juvenile***

      Transfer to adult function (Step)

      Driving variable: Physiological Age

      Transfer threshold: 1

      Prop.juveniles transferring: 1

      **Juvenile development function (Linear above Threshold)**

      Driving Variable: Daily Temperature Cycle

      Threshold: 10

      Slope: 0.01

      ***Adults***

      See Tutorial 1_1
    Clock: Start=2016-01-01; End=2016-12-31
    Weather: FileName=normal.met
    Summary SummaryFile
    MicroClimate: a_interception=0; b_interception=1; c_interception=0; d_interception=0; soil_albedo=0.3; SoilHeatFluxFraction=0.4; MinimumHeightDiffForNewLayer=0; NightInterceptionFraction=0.5; ReferenceHeight=2
    SoilArbitrator
    Zone Field: Area=1; Slope=0; AspectAngle=0; Altitude=50
      Report: EventNames=[Clock].DoReport
        VariableNames:
          [Clock].Today
          [Clock].Today.DayOfYear
          [LifeCycle].Juvenile.TotalPopulation
          [LifeCycle].Adult.TotalPopulation
          [LifeCycle].Adult.CohortCount
          [LifeCycle].TotalPopulation
          [LifeCycle].CurrentLifeStage.CurrentCohort.PhenoAge
      Fertiliser
      Soil: same as Tutorial_1_1_PseudoAphid_AgeBasedDevt.Field.Soil
      SurfaceOrganicMatter: InitialResidueName=wheat_stubble; InitialResidueType=wheat; InitialResidueMass=500; InitialStandingFraction=0; InitialCPR=0; InitialCNR=100; FractionFaecesAdded=1
      Plant Wheat: CropType=Wheat; IsEnding=false; DaysAfterEnding=0
      LifeCycle: InitialPopulation=[1, 0]; LogSummary=false
        LifeStage Juvenile
          Memo
            ***Add a function to calculate day degrees for development***

            Many models in APSIM use the 3 hourly sub daily day dergree calculation so apsim provides a function that reports the three hourly temeratures. To apply this to our model we need to write a function that sums these 8 values and then calculates the average. The driving variable for this function will be **[weather].Temps3Hours.**

            Right click on **LifeCycle > Juvenile > Development**

            Add function and select **ExpressionFunction**

            Rename to **DailyTempCycle**

            Use ctl and the arrow keys at the same time to place this function above the development rate function within the Development LifeStageProcess. In ApsimX, processes are used in the order that they occur in the tree-structure of the model, and so we place the DailyTempCycle at the beginning of the Development process.

            ***Writing an expression ***

            Within the DailyTempCycle expression type into the value field **sum([weather].Temps3Hours)/8**

            Now we have to use this as the XPropety for the Development rate function.

            Select **LifeCycle > Juvenile > Development > DevelopmentRate>** and change the XProperty to **[LifeCycle].Juvenile.Development.DailyTempCycle**

            ***Run APSIM***
          LifeStageProcess Development: ProcessAction=1; TransferTo=Adult
            LinearAfterThresholdFunction DevelopmentRate: XProperty=[Weather].MeanT; XTrigger=10; Slope=0.01
          LifeStageProcess MaturingProcess: same as Tutorial_2_1_PseudoAphid_ConstantMetTempDevt.Field.LifeCycle.Juvenile.MaturingProcess
        LifeStage Adult: same as Tutorial_2_1_PseudoAphid_ConstantMetTempDevt.Field.LifeCycle.Adult
    Memo Memo2
      ------
  Simulation Tutorial_4_1_PseudoAphid_3HrlyDevt
    Memo
      #The Dymex Pseudo Aphid Tutorials

      This is a direct copy of the Dymex tutorial and development of a pseudo Aphid model. Notes are from the Dymex manual and adjusted to describe the processes required in the APSIM population model builder.

      **Each tutorial builds upon the previous one.**

      #Tutorial_4_1_PseudoAphid Development Using 3-hourly Development

      ***Degree Days***

      Please refer to the previous tutorian for an introduction to degree days.

      Thermal time determines the rate of developmental progress through many of the crops phases and is used by organs to determing potential growth rates.

      Many models in APSIM use the 3 hourly sub daily day dergree calculation so APSIM provides a function that reports the three hourly temeratures. We explore this method of calculating degree days in this tutorial.

      ***Modifying the Model to simulate development in response to three-hourly temperatures***

      **Clock**

      Start simulation = **01/01/2016**

      End simulation   = **31/12/2016**

      **Weather file**

      Select the example met file = **Normal.met**
    Memo Memo1
      #Tutorial 4_1 - Summary

      **Clock**

      See Tutorial 2_1

      **Weather**

      See Tutorial 2-1

      ***Lifecycle***

      ***Juvenile***

      Transfer to adult function (Step)

      Driving variable: Physiological Age

      Transfer threshold: 1

      Prop.juveniles transferring: 1

      **Juvenile development function (Linear above Threshold)**

      Driving Variable: Daily Temperature Cycle based on three-hourly calculations

      Threshold: 10

      Slope: 0.01

      ***Adults***

      See Tutorial 1_1
    Clock: Start=2016-01-01; End=2016-12-31
    Summary SummaryFile
    Weather: FileName=normal.met
    SoilArbitrator
    MicroClimate: a_interception=0; b_interception=1; c_interception=0; d_interception=0; soil_albedo=0.3; SoilHeatFluxFraction=0.4; MinimumHeightDiffForNewLayer=0; NightInterceptionFraction=0.5; ReferenceHeight=2
    Zone Field: Area=1; Slope=0; AspectAngle=0; Altitude=50
      Report: EventNames=[Clock].DoReport
        VariableNames:
          [Clock].Today
          [Clock].Today.DayOfYear
          [LifeCycle].Juvenile.TotalPopulation
          [LifeCycle].Adult.TotalPopulation
          [LifeCycle].Adult.CohortCount
          [LifeCycle].TotalPopulation
          [LifeCycle].CurrentLifeStage.CurrentCohort.PhenoAge
          [LifeCycle].Juvenile.Development.DevelopmentRate
      Fertiliser
      Soil: ASCOrder=Vertosol; ASCSubOrder=Black; SoilType=Clay; Site=Norwin; NearestTown=Norwin; Region=Darling Downs and Granite Belt; State=Queensland; Country=Australia; NaturalVegetation=Qld. Bluegrass, possible Qld. Blue gum; ApsoilNumber=900; Latitude=-27.581836; Longitude=151.320206; LocationAccuracy=+/- 20m
        DataSource=CSIRO Sustainable Ecosystems, Toowoomba; Characteriesd as part of the GRDC funded project"Doing it better, doing it smarter, managing soil water in Australian agriculture' 2011
        Comments=OC, CLL for all crops estimated-based on Bongeen Mywybilla Soil No1
        Physical: same as Tutorial_1_1_PseudoAphid_AgeBasedDevt.Field.Soil.Physical
        SoilWater: same as Tutorial_1_1_PseudoAphid_AgeBasedDevt.Field.Soil.SoilWater
        Organic: same as Tutorial_1_1_PseudoAphid_AgeBasedDevt.Field.Soil.Organic
        Chemical
          Thickness  NO3N  NH4N  PH
          150        1     0.1   8
          150        1     0.1   8
          300        1     0.1   8
          300        1     0.1   8
          300        1     0.1   8
          300        1     0.1   8
          300        1     0.1   8
        InitialWater: PercentMethod=1; FractionFull=1
        Sample InitialN: same as Tutorial_1_1_PseudoAphid_AgeBasedDevt.Field.Soil.InitialN
        CERESSoilTemperature
      SurfaceOrganicMatter: InitialResidueName=wheat_stubble; InitialResidueType=wheat; InitialResidueMass=500; InitialStandingFraction=0; InitialCPR=0; InitialCNR=100; FractionFaecesAdded=1
      Plant Wheat: CropType=Wheat; IsEnding=false; DaysAfterEnding=0
      LifeCycle: InitialPopulation=[1, 0]; LogSummary=false
        LifeStage Juvenile
          Memo
            ***Add a function that calculates development in three-hourly intervals***

            Here we use APSIM's 3 hourly sub daily day dergree calculation to calculate three hourly temeratures.

            Right click on **LifeCycle>Juvenile>Development**

            Add function and select **AirTemperatureFunction**

            Use ctl and the arrow keys at the same time to place this function above the development rate function.

            Rename to **ThermalTimeDeveloment**

            Right click on **ThermalTimeDeveloment** and add function **XYPairs**

            Add the development cardinal temperatures to the XY Pairs function.

            **X** = 0,10,20,30,34
            **Y** = 0,0,0.1,0.2,0

            ***Run APSIM***
          LifeStageProcess Development: ProcessAction=1; TransferTo=Adult
            AirTemperatureFunction ThermalTimeDevelopment
              XYPairs: X=[0.1, 10, 20, 30, 34]; Y=[0, 0, 0.1, 0.2, 0]
          LifeStageProcess MaturingProcess: ProcessAction=0; TransferTo=Adult
            LinearInterpolationFunction TransferToAdult
              XYPairs: X=[0, 0.99, 1, 2]; Y=[0, 0, 1, 1]
              Memo
                Step function describing transfer to adult for Pseaudo-Aphid model

                DYMEX tutorial

                1.	Sutherst RW, Maywald GF. DYMEX modelling workshops: a national, collaborative approach to pest risk analysis and IPM in Australia. Pest Management—Future Challenges. 1998;2:57-62.
              VariableReference XValue: VariableName=[Juvenile].CurrentCohort.PhysiologicalAge
        LifeStage Adult: same as Tutorial_2_1_PseudoAphid_ConstantMetTempDevt.Field.LifeCycle.Adult
      Nutrient: same as Tutorial_1_1_PseudoAphid_AgeBasedDevt.Field.Soil.Nutrient
    Memo Memo2
      ------
  Simulation Tutorial_5_1_PseudoAphid_TempDepMortality
    Memo
      #The Dymex Pseudo Aphid Tutorials

      This is a direct copy of the Dymex tutorial and development of a pseudo Aphid model. Notes are from the Dymex manual and adjusted to describe the processes required in the APSIM population model builder.

      **Each tutorial builds upon the previous one.**

      #Tutorial_5_1_PseudoAphid Mortality (temperature-based)

      **Introduction**

      In the current pseudo-aphid model, the only source of mortality is in the Adult stage, where adults die of “old age” (i.e., after they reach a specified Chronological Age). Mortality can be built into each lifestage and mortality can be linked to any suitable user-selected variable(s). In the field, aphids suffer mortality for a variety of reasons, predators, humidity, disease, temperature, etc. and all of these can be modelled. In this tutorial, temperature-driven mortality will be added to the pseudo-aphid model. Aphids are affected adversely by both excessively high and low temperatures. It will be assumed that each lifestage of the pseudo-aphid suffers a linear mortality in response to unfavourably high/low temperatures and that this will be the only additional cause of mortality apart from the currently existing adult death due to age.

      **Temperature-based Mortality**

      Assume that both the juveniles and adults have the same sensitivity to extremes of cold and heat. Further assume that we have data that indicates that mortality starts to occur when temperatures drop below 4°C and increases by 0.1 for each degree temperature drop below that value (i.e., at 3°C, there is 10% mortality per timestep, at 2°C, there is 20%, etc). The data also shows that mortality occurs above 34°C, and increase by 0.05 for every degree above that temperature (so that, for example, 20% of individuals die each timestep at 38°C due to heat stress). These responses will now be incorporated into the model.
    Memo Memo1
      #Tutorial 5 - Summary

      **Clock**

      See Tutorial 1_1

      **Weather**

      See Tutorial 1_1

      ***Insect development based on circadian temperatures (day degrees)***

      See Tutorial 4_1

      **Lifecycle**

      ***Juvenile***

      **Transfer to adult function (Step)**

      See Tutorial 4

      **Juvenile development function (Linear above Threshold)**

      See Tutorial 4

      **Juvenile mortality functions introduced in this tutorial**

      **Low Temperature Mortality (Continuous, Linear below Threshold using xyPlot)**

      Driving Variable: Minimum Temperature

      Threshold: 4.0

      Slope: -0.1

      **High Temperature Mortality (Continuous, Linear below Threshold using xyPlot)**

      Driving Variable: Maximum Temperature

      Threshold: 34.0

      Slope: 0.05

      ***Adults***

      **Age-based mortality function (Step)**

      See Tutorial 1_1

      **Adult mortality functions introduced in this tutorial**

      Low Temperature Mortality (Continuous, Linear below Threshold using xyPlot)

      Driving Variable: Minimum Temperature

      Threshold: 4.0

      Slope: -0.1

      **High Temperature Mortality (Continuous, Linear below Threshold using xyPlot)**

      Driving Variable: Maximum Temperature

      Threshold: 34.0

      Slope: 0.05

      **Reproduction**

      See Tutorial 1
    Clock: Start=2016-01-01; End=2016-12-31
    Summary SummaryFile
    Weather: FileName=normal.met
    SoilArbitrator
    MicroClimate: a_interception=0; b_interception=1; c_interception=0; d_interception=0; soil_albedo=0.3; SoilHeatFluxFraction=0.4; MinimumHeightDiffForNewLayer=0; NightInterceptionFraction=0.5; ReferenceHeight=2
    Zone Field: Area=1; Slope=0; AspectAngle=0; Altitude=50
      Report: EventNames=[Clock].DoReport
        VariableNames:
          [Clock].Today
          [Clock].Today.DayOfYear
          [LifeCycle].Juvenile.TotalPopulation
          [LifeCycle].Adult.TotalPopulation
          [LifeCycle].Adult.CohortCount
          [LifeCycle].TotalPopulation
          [LifeCycle].CurrentLifeStage.CurrentCohort.PhenoAge
          [LifeCycle].Juvenile.Development.DevelopmentRate
          [LifeCycle].Juvenile.Mortality
      Fertiliser
      Soil: same as Tutorial_1_1_PseudoAphid_AgeBasedDevt.Field.Soil
      SurfaceOrganicMatter: InitialResidueName=wheat_stubble; InitialResidueType=wheat; InitialResidueMass=500; InitialStandingFraction=0; InitialCPR=0; InitialCNR=100; FractionFaecesAdded=1
      Plant Wheat: CropType=Wheat; IsEnding=false; DaysAfterEnding=0
      LifeCycle: InitialPopulation=[1, 0]; LogSummary=false
        LifeStage Juvenile
          LifeStageProcess Development: ProcessAction=1; TransferTo=Adult
            AirTemperatureFunction ThermalTimeDevelopment
              XYPairs: X=[0.1, 10, 20, 30, 34]; Y=[0, 0, 0.1, 0.2, 0]
          LifeStageProcess MaturingProcess: same as Tutorial_2_1_PseudoAphid_ConstantMetTempDevt.Field.LifeCycle.Juvenile.MaturingProcess
          LifeStageProcess JuvenileMortality: ProcessAction=2
            Memo
              ***Modifying the model to add juvenile mortality in response to low temperatures***

              Select **LifeCycle>Juvenile**

              Add **LifeStageProcess**

              Rename to **JuvenileMortality**

              In the **JuvenileMortality** LifeStageProcess for **LifeStage process type** select **Mortality**. Leave the "Transfer to life stage" field empty.

              Right click on **JuvenileMortality**

              Add function and select **LinearInterpolationFunction**

              Rename to **LowTempMortality**

              For **LowTempMortality** select as the **XProperty** **[Weather].MinT**

              Right click on **LowTempMortality**

              Add Function **XYPairs**

              Add the minimum temperature values to define rates of mortality (where 1 = 100% mortality).

              **X** = -6,-4,-2,0,1,2,3,4

              **Y** =  1,0.8,0.6,0.4,0.3,0.2,0.1,0

              ***Adding juvenile mortality in response to high temperatures***

              Select **LifeCycle>Juvenile>JuvenileMortality**

              Add function and select **LinearInterpolationFunction**

              Rename to **HighTempMortality**

              For **HighTempMortality** select as the **XProperty** **[Weather].MaxT**

              Right click on **HighTempMortality**

              Add Function **XYPairs**

              Add the minimum temperature values to define rates of mortality (where 1 = 100% mortality).

              **X** = 34,38,42,46,50,54

              **Y** =  0,0.2,0.4,0.6,0.8,1.0
            LinearInterpolationFunction LowTempMortality
              XYPairs: X=[-6, -4, -2, 0, 1, 2, 3, 4]; Y=[1, 0.8, 0.6, 0.4, 0.3, 0.2, 0.1, 0]
              VariableReference XValue: VariableName=[Weather].MinT
            LinearInterpolationFunction HighTempMortality
              XYPairs: X=[34, 38, 42, 46, 50, 54]; Y=[0, 0.2, 0.4, 0.6, 0.8, 1]
              VariableReference XValue: VariableName=[Weather].MaxT
        LifeStage Adult
          LifeStageProcess AdultMortalityProcess: same as Tutorial_2_1_PseudoAphid_ConstantMetTempDevt.Field.LifeCycle.Adult.AdultMortalityProcess
          LifeStageReproductionProcess ReproductionProcesses: same as Tutorial_1_2_PseudoAphid_AgeBasedDevtResults.Field.LifeCycle.Adult.ReproductionProcesses
          LifeStageProcess AdultMortality: ProcessAction=2
            Memo
              ***Modifying the model to add adult mortality in response to low temperatures***

              Select **LifeCycle>Adult**

              Add **LifeStageProcess**

              Rename to **AdultMortality**

              In the **AdultMortality** LifeStageProcess for **LifeStage process type** select **Mortality**. Leave the "Transfer to life stage" field empty.

              Right click on **AdultMortality**

              Add function and select **LinearInterpolationFunction**

              Rename to **LowTempMortality**

              For **LowTempMortality** select as the **XProperty** **[Weather].MinT**

              Right click on **LowTempMortality**

              Add Function **XYPairs**

              Add the minimum temperature values to define rates of mortality (where 1 = 100% mortality).

              **X** = -6,-4,-2,0,1,2,3,4

              **Y** =  1,0.8,0.6,0.4,0.3,0.2,0.1,0

              ***Adding adult mortality in response to high temperatures***

              Select **LifeCycle>Adult>AdultMortality**

              Add function and select **LinearInterpolationFunction**

              Rename to **HighTempMortality**

              For **HighTempMortality** select as the **XProperty** **[Weather].MaxT**

              Right click on **HighTempMortality**

              Add Function **XYPairs**

              Add the minimum temperature values to define rates of mortality (where 1 = 100% mortality).

              **X** = 34,38,42,46,50,54

              **Y** =  0,0.2,0.4,0.6,0.8,1.0

              ***Run APSIM***
            LinearInterpolationFunction LowTempMortality
              XYPairs: X=[-6, -4, -2, 0, 1, 2, 3, 4]; Y=[1, 0.8, 0.6, 0.4, 0.3, 0.2, 0.1, 0]
              VariableReference XValue: VariableName=[Weather].MinT
            LinearInterpolationFunction HighTempMortality
              XYPairs: X=[34, 38, 42, 46, 50, 54]; Y=[0, 0.2, 0.4, 0.6, 0.8, 1]
              VariableReference XValue: VariableName=[Weather].MaxT
    Memo Memo2
      ------
  Simulation Tutorial_6_1_PseudoAphid_DensityDepMortality
    Memo
      #The Dymex Pseudo Aphid Tutorials

      This is a direct copy of the Dymex tutorial and development of a pseudo Aphid model. Notes are from the Dymex manual and adjusted to describe the processes required in the APSIM population model builder.

      **Each tutorial builds upon the previous one.**

      #Tutorial_6_1_PseudoAphid Mortality (density-dependent)

      **Introduction**

      Two variables have so far been used to control the pseudo-aphid’s mortality: Chronological Age in the adults and temperature in both stages. In Tutorial 5, the effect of these mortality factors was explored. It was evident that population stability was not achieved – populations either increasing forever in suitable locations or becoming extinct in unfavourable locations. Much of this is due to the fact that an isolated population is being modelled and in fact populations will often die out in the field, to be re-established by immigrants later. However, many factors that cause mortality in populations are linked in some way to the density of the population, generally increasing the proportional mortality as the population density increases. These mortality factors (termed density-dependent) do have the potential to stabilize isolated populations.

      **Population Density and Mortality**

      Population density is measured as the number of individuals per unit area. If for a simple case, the living area available for the population was fixed (eg. the number of pseudo-aphids present in a lucerne crop), population density would simply be a reflection of total population. This tutorial will assume such a situation so that an increase in population will automatically mean an increase in population density. Exactly how an increase in population density affects the population growth rate depends on the individual species’ characteristics, but there are generally a few main causes of increased mortality rates in a larger population: crowding, food depletion, predation by attracted predators and increase of disease through rapid transmission of pathogens. Density dependent mortality is a stabilising influence on a population because it has a negative feedback effect. Put simply, the more the population grows, the greater will the rate of mortality become and the ensuing deaths will therefore reduce the population growth rate. As the population decreases, the mortality rate decreases also and the population growth rate increases once more. The population therefore tends to be cyclical with numbers sometimes exceeding the ability of the environment to sustain it but never quite falling away to extinction.

      This is an area of modelling where data is often absent, or if available, difficult to interpret. It is usually evident that a population is fluctuating between some limits, but the causes are usually due to many factors and difficult to establish experimentally. When modelling the population, it may be necessary to lump many into one single mortality function, and “guess” at the function shape and parameter values, so that the “model” population predicts the known field population. In that way, the model forms a hypothesis, which will stand or fall when tested with further data. As with all hypotheses, the model will lead to a more directed data collection effort and thus a better utilization of available resources. The improvement in understanding may then allow the previous, composite function to be split into component parts that represent the actual processes occurring better.

      **Defining the Mortality Rate**

      When a population is small, it can be assumed that mortality due to population density effects will be very low. For this tutorial, it will be proposed that no mortality due to population density effects occurs until a minimum of 1000 individuals is present (this might be the organism’s population on a rose bush). The proposition further suggests that as the population increases, density dependent mortality rate increases in direct proportion until once the population reaches 100,000 individuals, the mortality rate becomes 1. This mathematical structure suggests a “Linear above Threshold” function. If the data is plotted (Figure 6-1) the slope can be calculated and is approximately equal to 0.000001. For this tutorial, it is assumed that the population on the x-axis is the population of the stage whose mortality rate is being calculated (i.e., adults affect adult density dependent mortality and juveniles affect juvenile mortality). This is obviously not realistic, and an exercise suggested at the end of the tutorial will propose a better model.

      **Figure** Figure 6-1 **Density-dependent mortality function**
    Memo Memo1
      #Tutorial 6 - Summary

      **Clock**

      **Start** date of the simulation 01/01/2000

      **End** date of the simulation 31/12/2016

      **Weather**

      Select the example met file = **Toowoomba.met**

      ***Insect development based on circadian temperatures (day degrees)***

      See Tutorial 4_1

      **Lifecycle**

      ***Juvenile***

      **Development function (Linear Above Threshhold)**

      See Tutorial 4_1

      **Low Temperature Mortality (Continuous, Linear below Threshold using xyPlot)**

      Driving Variable: Minimum Temperature

      Threshold: 4.0

      Slope: -0.05

      **High Temperature Mortality (Continuous, Linear below Threshold using xyPlot)**

      See Tutorial 5_1

      **Density-dependent Mortality (Continuous, Linear above Threshold)**

      Driving Variable: Total Number of Juveniles Threshold: 1000

      Slope: 0.000001

      ***Adults***

      **Age-based mortality function (Step)**

      See Tutorial 1_1

      **Low Temperature Mortality (Continuous, Linear below Threshold)**

      See Tutorial 5_1

      **High Temperature Mortality (Continuous, Linear above Threshold)**

      See Tutorial 5_1

      **Density-dependent Mortality (Continuous, Linear above Threshold)**

      Driving Variable: Total Number of Adults

      Threshold: 1000 Slope: 0.000001

      **Reproduction**

      See Tutorial 1_1
    Clock: Start=2000-01-01; End=2016-12-31
    Summary SummaryFile
    Weather: FileName=Toowoomba.met
    SoilArbitrator
    MicroClimate: a_interception=0; b_interception=1; c_interception=0; d_interception=0; soil_albedo=0.3; SoilHeatFluxFraction=0.4; MinimumHeightDiffForNewLayer=0; NightInterceptionFraction=0.5; ReferenceHeight=2
    Zone Field: Area=1; Slope=0; AspectAngle=0; Altitude=50
      Report: EventNames=[Clock].DoReport
        VariableNames:
          [Clock].Today
          [Clock].Today.DayOfYear
          [LifeCycle].Juvenile.TotalPopulation
          [LifeCycle].Adult.TotalPopulation
          [LifeCycle].Adult.CohortCount
          [LifeCycle].Adult.Mortality
          [LifeCycle].TotalPopulation
          [LifeCycle].CurrentLifeStage.CurrentCohort.PhenoAge
          [LifeCycle].Juvenile.Mortality.LowTempMortality
          [LifeCycle].Juvenile.Development.DevelopmentRate
          [LifeCycle].Juvenile.Mortality
      Fertiliser
      Soil: same as Tutorial_1_1_PseudoAphid_AgeBasedDevt.Field.Soil
      SurfaceOrganicMatter: InitialResidueName=wheat_stubble; InitialResidueType=wheat; InitialResidueMass=500; InitialStandingFraction=0; InitialCPR=0; InitialCNR=100; FractionFaecesAdded=1
      Plant Wheat: CropType=Wheat; IsEnding=false; DaysAfterEnding=0
      LifeCycle: InitialPopulation=[1, 0]; LogSummary=false
        LifeStage Juvenile
          Memo
            ***Modifying the Model to add density-dependent mortality to the juvenile population***

            Right click on **LifeCycle>Juvenile>JuvenileMortality**

            Add function **LinearAfterThreshholdFunction**

            Rename to **DensityDependentMortality**

            Right click on **DensityDependentMortality** and complete properties

            **XProperty** as [LifeCycle].Juvenile.TotalPopulations

            **X Value Trigger** as 1000

            **Gradient** as 1E-06
          LifeStageProcess Development: ProcessAction=1; TransferTo=Adult
            AirTemperatureFunction ThermalTimeDevelopment
              XYPairs: X=[0.1, 10, 20, 30, 34]; Y=[0, 0, 0.1, 0.2, 0]
          LifeStageProcess MaturingProcess: same as Tutorial_2_1_PseudoAphid_ConstantMetTempDevt.Field.LifeCycle.Juvenile.MaturingProcess
          LifeStageProcess JuvenileMortality: ProcessAction=2
            LinearInterpolationFunction LowTempMortality
              XYPairs: X=[-16, 0, 4]; Y=[1, 0.2, 0]
              VariableReference XValue: VariableName=[Weather].MinT
            LinearInterpolationFunction HighTempMortality
              XYPairs: X=[34, 44, 54]; Y=[0, 0.5, 1]
              VariableReference XValue: VariableName=[Weather].MaxT
            LinearAfterThresholdFunction DensityDependentMortality: XProperty=[LifeCycle].Juvenile.TotalPopulation; XTrigger=1000; Slope=1e-06
        LifeStage Adult
          Memo
            ***Modifying the Model to add density-dependent mortality to the adult population***

            Right click on **LifeCycle>Adult>AdultMortality**

            Add function **LinearAfterThreshholdFunction**

            Rename to **DensityDependentMortality**

            Right click on **DensityDependentMortality** and complete properties

            **XProperty** as [LifeCycle].Adult.TotalPopulations

            **X Value Trigger** as 1000

            **Gradient** as 1E-06

            ***Run APSIM***
          LifeStageProcess AdultMortality: ProcessAction=2
            LinearInterpolationFunction AgeBasedMortality
              XYPairs: X=[0, 19.99, 20, 30]; Y=[0, 0, 1, 1]
              VariableReference XValue: VariableName=[LifeCycle].CurrentLifeStage.CurrentCohort.PhenoAge
            LinearAfterThresholdFunction DensityDependentMortality: XProperty=[LifeCycle].Adult.TotalPopulation; XTrigger=1000; Slope=1e-06
            LinearInterpolationFunction LowTempMortality
              XYPairs: X=[-16, -4, -2, 0, 1, 2, 3, 4]; Y=[1, 0.4, 0.3, 0.2, 0.15, 0.1, 0.05, 0]
              VariableReference XValue: VariableName=[Weather].MinT
            LinearInterpolationFunction HighTempMortality
              XYPairs: X=[34, 44, 54]; Y=[0, 0.5, 1]
              VariableReference XValue: VariableName=[Weather].MaxT
          LifeStageReproductionProcess ReproductionProcesses: same as Tutorial_1_2_PseudoAphid_AgeBasedDevtResults.Field.LifeCycle.Adult.ReproductionProcesses
      Folder output figures
        Memo
          #Populations approach equilibrium in the long term

          In tutorial 6 we have simulated the PseudoAphid population for a period of 17 years instead of the three-monthly or annual periods used in earlier tutorials.

          Note that while the adult and juvenile populations fluctuate seasonally, they do not increase exponentially and remain within boundaries.
    Memo Memo2
      ------
  Simulation Tutorial_7_1_PseudoAphid_DrynessDepMortalityRain
    Memo
      #Tutorial_7_1_PseudoAphid Mortality (dryness-dependent based on rainfall)

      **Introduction**

      All organisms are sensitive to the absence of water, and the pseudo-aphid is no exception. Survival can be adversely affected if it is too dry, and in this tutorial a first attempt is made to model this sensitivity to dryness using rainfall. In the next tutorial, a better way of modelling the effects of inadequate rainfall will be demonstrated.

      **Modelling Dryness Dependent Mortality**

      As rainfall decreases, the soil dries out to produce plant stress and in this in turn affects pseudo-aphid mortality. In this tutorial, this will be modelled very simply, by assuming that there is a particular level of rainfall each day that is required for no mortality due to dryness to occur. If insufficient rain falls during any one day, mortality on that day is linearly dependent on how far the rainfall is below that
      threshold. The relationship is illustrated in Figure 7-1. A Threshold of 10 mm\day is chosen – rainfall above that level produces no mortality. The slope of the function is selected so that 25 consecutive days without rainfall would produce an accumulated mortality of about 0.5.

      Hence,

      (1 - m)^25 = 0.5, where m = mortality/day

      i.e., 25 x ln(1− m) = ln(0.5)

      i.e., m = (1-e)^((ln(0.5)/25) = 0.027 (approximately)

      Using 0.025, which is close enough for our purpose, fixes the slope at –0.0025 (the “-“ sign is required as the slope is negative, with decreasing rain increasing the mortality rate).

      **Figure** [Figure 7-1] **Mortality rate as a function of Rainfall**
    Memo Memo1
      #Tutorial 7 - Summary

      **Clock**

      See Tutorial 1_1

      **Weather**

      See Tutorial 3_1

      ***Lifecycle***

      ***Juvenile***

      **Transfer to adult function (Step)**

      See Tutorial 3_1

      **Juvenile development function (Linear above Threshold)**

      See Tutorial 3_1

      **Low Temperature Mortality (Continuous, Linear below Threshold)**

      See Tutorial 6

      **High Temperature Mortality (Continuous, Linear above Threshold)**

      See Tutorial 5

      **Density-dependent Mortality (Continuous, Linear above Threshold)**

      See Tutorial 6

      **Dryness-dependent Mortality (Continuous, Linear below Threshold)**

      Driving Variable: Rainfall

      Threshold: 10

      Slope: -0.0025

      See Tutorial 3_1

      ***Adults***

      **Age-based mortality function (Step)**

      See Tutorial 1_1

      **Low Temperature Mortality (Continuous, Linear below Threshold)**

      See Tutorial 5_1

      **High Temperature Mortality (Continuous, Linear above Threshold)**

      See Tutorial 5_1

      **Density-dependent Mortality (Continuous, Linear above Threshold)**

      See Tutorial 6_1

      **Dryness-dependent Mortality (Continuous, Linear below Threshold)**

      Driving Variable: Rainfall

      Threshold: 10

      Slope: -0.0025

      **Reproduction**

      See Tutorial 1_1
    Clock: Start=2000-01-01; End=2016-12-31
    Summary SummaryFile
    Weather: FileName=Toowoomba.met
    SoilArbitrator
    MicroClimate: a_interception=0; b_interception=1; c_interception=0; d_interception=0; soil_albedo=0.3; SoilHeatFluxFraction=0.4; MinimumHeightDiffForNewLayer=0; NightInterceptionFraction=0.5; ReferenceHeight=2
    Zone Field: Area=1; Slope=0; AspectAngle=0; Altitude=50
      Report: same as Tutorial_6_1_PseudoAphid_DensityDepMortality.Field.Report
      Fertiliser
      Soil: same as Tutorial_1_1_PseudoAphid_AgeBasedDevt.Field.Soil
      SurfaceOrganicMatter: InitialResidueName=wheat_stubble; InitialResidueType=wheat; InitialResidueMass=500; InitialStandingFraction=0; InitialCPR=0; InitialCNR=100; FractionFaecesAdded=1
      Plant Wheat: CropType=Wheat; IsEnding=false; DaysAfterEnding=0
      LifeCycle: InitialPopulation=[1, 0]; LogSummary=false
        LifeStage Juvenile
          Memo
            ***Modifying the Model to add dryness-dependent mortality to the juvenile population***

            Right click on **LifeCycle>Juvenile>JuvenileMortality**

            Add function **LinearInterpolationFunction**

            Rename to **DrynessMortality**

            Right click on **DrynessMortality** and complete property

            **XProperty** as [Weather].Rain

            Right click on **DrynessMortality** and Add Function **XYPairs**

            Complete **XYPairs** as

            **X** = 0,10

            **Y** = 0,0.025
          LifeStageProcess Development: ProcessAction=1; TransferTo=Adult
            AirTemperatureFunction ThermalTimeDevelopment
              XYPairs: X=[0.1, 10, 20, 30, 34]; Y=[0, 0, 0.1, 0.2, 0]
              Memo
                Thermal time determines the rate of developmental progress through many of the crops phases and is used by organs to determing potential growth rates.
          LifeStageProcess MaturingProcess: same as Tutorial_4_1_PseudoAphid_3HrlyDevt.Field.LifeCycle.Juvenile.MaturingProcess
          LifeStageProcess JuvenileMortality: ProcessAction=2
            LinearInterpolationFunction LowTempMortality
              XYPairs: X=[-16, 0, 4]; Y=[1, 0.2, 0]
              VariableReference XValue: VariableName=[Weather].MinT
            LinearInterpolationFunction HighTempMortality
              XYPairs: X=[34, 44, 54]; Y=[0, 0.5, 1]
              VariableReference XValue: VariableName=[Weather].MaxT
            LinearAfterThresholdFunction DensityDependentMortality: XProperty=[LifeCycle].Juvenile.TotalPopulation; XTrigger=1000; Slope=1e-06
            LinearInterpolationFunction DrynessMortality
              XYPairs: X=[0, 10]; Y=[0.025, 0]
              VariableReference XValue: VariableName=[Weather].Rain
        LifeStage Adult
          Memo
            #Modifying the Model to add dryness-dependent mortality to the adult population

            Right click on **LifeCycle>Adult>AdultMortality**

            Add function **LinearInterpolationFunction**

            Rename to **DrynessMortality**

            Right click on **DrynessMortality** and complete property

            **XProperty** as [Weather].Rain

            Right click on **DrynessMortality** and Add Function **XYPairs**

            Complete **XYPairs** as

            **X** = 0,10
            **Y** = 0,0.025

            **Run APSIM**
          LifeStageProcess AdultMortality: ProcessAction=2
            LinearInterpolationFunction AgeBasedMortality
              XYPairs: X=[0, 19.99, 20, 30]; Y=[0, 0, 1, 1]
              VariableReference XValue: VariableName=[LifeCycle].CurrentLifeStage.CurrentCohort.PhenoAge
            LinearAfterThresholdFunction DensityDependentMortality: XProperty=[LifeCycle].Adult.TotalPopulation; XTrigger=1000; Slope=1e-06
            LinearInterpolationFunction LowTempMortality
              XYPairs: X=[-16, -4, -2, 0, 1, 2, 3, 4]; Y=[1, 0.4, 0.3, 0.2, 0.15, 0.1, 0.05, 0]
              VariableReference XValue: VariableName=[Weather].MinT
            LinearInterpolationFunction HighTempMortality
              XYPairs: X=[34, 44, 54]; Y=[0, 0.5, 1]
              VariableReference XValue: VariableName=[Weather].MaxT
            LinearInterpolationFunction DrynessMortality
              XYPairs: X=[0, 10, -, -, -, -, -, -, -, -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]; Y=[0.025, 0, -, -, -, -, -, -, -, -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]
              VariableReference XValue: VariableName=[Weather].Rain
          LifeStageReproductionProcess ReproductionProcesses: same as Tutorial_1_2_PseudoAphid_AgeBasedDevtResults.Field.LifeCycle.Adult.ReproductionProcesses
      Folder output figures
        Memo
          ##Effect of additional mortality from dryness on populations

          Comparison with the charts from the previous tutorial shows that the peak population size has been reduced.

          The sensitivity of the model to the dryness mortality parameters can be examined by re-running the model with the dryness dependent mortality “slopes” for both Juveniles and Adults set to -0.008. This causes the simulated population to die out completely.

          One aspect relating to rainfall that could be modelled is the effect of too much rainfall. For aphid populations in the field, excessive rainfall can cause serious losses either by washing them off the host plant, or by causing physical damage through raindrop impact or by drowning. Excess rainfall mortality can be easily added in a similar way to the rainfall deficiency modelled in this tutorial, but this will be left as an exercise for the reader.
          Rainfall is generally not a good driving variable for moisture-related effects on populations. What is important is not the amount of rain that falls on a particular day, but the accumulated effects of rainfall and evaporation. In the Pseudoaphid’s situation, for example, what is important to the insect is a healthy plant. The host plant’s moisture condition will in turn be driven by water availability from the soil. A better method is to consider rainfall as a contributor to soil moisture, which can combine the effects of both rainfall and evaporation. This will be the subject of the next tutorial.
    Memo Memo2
      ------
  Simulation Tutorial_8_1_PseudoAphid_DrynessDepMortalitySoil
    Memo
      #The Dymex Pseudo Aphid Tutorials

      This is a direct copy of the Dymex tutorial and development of a pseudo Aphid model. Notes are from the Dymex manual and adjusted to describe the processes required in the APSIM population model builder.

      **Each tutorial builds upon the previous one.**

      #Tutorial_8_1_PseudoAphid Mortality (dryness-dependent based on soil moisture)

      **Introduction**

      Tutorial 7 implied that rainfall by itself may not be the best variable to use in modelling dryness dependent mortality. This is due to the fact that rainfall is rather erratic in nature, but its effects on insects are generally not direct. The soil and plant environment tends to integrate the effects of rainfall over time. In addition, there are the effects of atmospheric moisture (measured as relative humidity or saturation deficit) which may be more appropriate drivers of insect mortality.

      Soil moisture is usually the dominant factor determining microclimatic conditions and the moisture content of vegetation. For an insect that lives in close contact with the plant (such as the Pseudo-aphid), soil moisture alone can provide a very useful indicator of the moisture conditions the insect is experiencing. ApsimX contains a soil module that is designed to simulate the changes in soil moisture with given rainfall and evaporation. The module can be described in detail (right mouse click on the Soil module and select "Include in Documentation". When documentation is generated (Simulations>Create documentation), then a detailed description of soil processes will be included in the documentation. This tutorial will illustrate the use of this module within the Pseudo-aphid model.

      **Soil Moisture in the Soil Module**

      The Soil module provides a number of output variables that reflects the simulated current state of the soil’s moisture content in response to rainfall, evaporation, runoff, drainage and plant uptake (where plants are included in the simulation). The soil moisture will be scaled between 0 and 2, with a value of 0 indicating a dry soil at lower limit, 1 denoting a soil at drained upper limit, and 2 denoting a saturated soil.

      The “Lifecycle” module previously used rainfall as the input variable that controlled dryness-dependent mortality (in Tutorial 7). This will now be changed so that soil moisture levels control this mortality. The parameters will be chosen so that dryness-dependent mortality commences to have an effect once the soil moisture level drops below drained upper limit.
    Memo Memo1
      #Tutorial 8 - Summary

      **Clock**

      See tutorial 7

      **Weather**

      See Tutorial 4

      ***Lifecycle***

      ***Juvenile***

      **Transfer to adult function (Step)**

      See Tutorial 4

      **Juvenile development function (Linear above Threshold)**

      See Tutorial 4

      **Low Temperature Mortality (Continuous, Linear below Threshold)**

      See Tutorial 6

      **High Temperature Mortality (Continuous, Linear above Threshold)**

      See Tutorial 5

      **Density-dependent Mortality (Continuous, Linear above Threshold)**

      See Tutorial 6

      **Dryness-dependent Mortality (Continuous, Linear below Threshold)**

      Driving Variable: Soil Moisture

      Threshold: 0.4

      Slope: -0.168

      ***Adults***

      **Age-based mortality function (Step)**

      See Tutorial 1_1

      **Low Temperature Mortality (Continuous, Linear below Threshold)**

      See Tutorial 5_1

      **High Temperature Mortality (Continuous, Linear above Threshold)**

      See Tutorial 5_1

      **Density-dependent Mortality (Continuous, Linear above Threshold)**

      See Tutorial 6_1

      **Dryness-dependent Mortality (Continuous, Linear below Threshold)**

      Driving Variable: Soil Moisture

      Threshold: 0.4

      Slope: -0.168

      See Tutorial 7_1

      **Reproduction**

      See Tutorial 1_1
    Clock: Start=2000-01-01; End=2016-12-31
    Summary SummaryFile
    Weather: FileName=Toowoomba.met
    SoilArbitrator
    MicroClimate: a_interception=0; b_interception=1; c_interception=0; d_interception=0; soil_albedo=0.3; SoilHeatFluxFraction=0.4; MinimumHeightDiffForNewLayer=0; NightInterceptionFraction=0.5; ReferenceHeight=2
    Zone Field: Area=1; Slope=0; AspectAngle=0; Altitude=50
      Report: same as Tutorial_6_1_PseudoAphid_DensityDepMortality.Field.Report
      Fertiliser
      Soil: same as Tutorial_1_1_PseudoAphid_AgeBasedDevt.Field.Soil
      SurfaceOrganicMatter: InitialResidueName=wheat_stubble; InitialResidueType=wheat; InitialResidueMass=500; InitialStandingFraction=0; InitialCPR=0; InitialCNR=100; FractionFaecesAdded=1
      Plant Wheat: CropType=Wheat; IsEnding=false; DaysAfterEnding=0
      LifeCycle: InitialPopulation=[1, 0]; LogSummary=false
        LifeStage Juvenile
          Memo
            ***Modifying the Model to add dryness-dependent mortality to the juvenile population***

            Right click on **LifeCycle>Juvenile>JuvenileMortality**

            Add function **LinearInterpolationFunction**

            Rename to **SoilDrynessMortality**

            Right click on **SoilDrynessMortality** and Add function **SoilWaterScale**

            This function scales the soil water between lower limit (a value of 0), drained upper limit (a value of 1) and saturation (a value of 2).

            Right click on **SoilDrynessMortality** and complete property

            **XProperty** as **SoilWaterScale**

            Right click on **SoilDrynessMortality** and Add Function **XYPairs**

            Complete **XYPairs** as

            **X** = 0,1,2

            **Y** = 1,0,1
          LifeStageProcess Development: same as Tutorial_7_1_PseudoAphid_DrynessDepMortalityRain.Field.LifeCycle.Juvenile.Development
          LifeStageProcess MaturingProcess: same as Tutorial_4_1_PseudoAphid_3HrlyDevt.Field.LifeCycle.Juvenile.MaturingProcess
          LifeStageProcess JuvenileMortality: ProcessAction=2
            LinearInterpolationFunction LowTempMortality
              XYPairs: X=[-16, 0, 4]; Y=[1, 0.2, 0]
              VariableReference XValue: VariableName=[Weather].MinT
            LinearInterpolationFunction HighTempMortality
              XYPairs: X=[34, 44, 54]; Y=[0, 0.5, 1]
              VariableReference XValue: VariableName=[Weather].MaxT
            LinearAfterThresholdFunction DensityDependentMortality: XProperty=[LifeCycle].Juvenile.TotalPopulation; XTrigger=1000; Slope=1e-06
            LinearInterpolationFunction SoilDrynessMortality
              SoilWaterScale
              XYPairs: X=[0, 1, 2]; Y=[1, 0, 1]
              VariableReference XValue: VariableName=[SoilWaterScale]
        LifeStage Adult
          Memo
            #Modifying the Model to add dryness-dependent mortality to the adult population

            Right click on **LifeCycle>Adult>AdultMortality**

            Add function **LinearInterpolationFunction**

            Rename to **SoilDrynessMortality**

            Right click on **SoilDrynessMortality** and Add function **SoilWaterScale**

            This function scales the soil water between lower limit (a value of 0), drained upper limit (a value of 1) and saturation (a value of 2).

            Right click on **SoilDrynessMortality** and complete property

            **XProperty** as **SoilWaterScale**

            Right click on **SoilDrynessMortality** and Add Function **XYPairs**

            Complete **XYPairs** as

            **X** = 0,1,2

            **Y** = 1,0,1

            ***Run APSIM***
          LifeStageProcess AdultMortality: ProcessAction=2
            LinearInterpolationFunction AgeBasedMortality
              XYPairs: X=[0, 19.99, 20, 30]; Y=[0, 0, 1, 1]
              VariableReference XValue: VariableName=[LifeCycle].CurrentLifeStage.CurrentCohort.PhenoAge
            LinearAfterThresholdFunction DensityDependentMortality: XProperty=[LifeCycle].Adult.TotalPopulation; XTrigger=1000; Slope=1e-06
            LinearInterpolationFunction LowTempMortality
              XYPairs: X=[-16, -4, -2, 0, 1, 2, 3, 4]; Y=[1, 0.4, 0.3, 0.2, 0.15, 0.1, 0.05, 0]
              VariableReference XValue: VariableName=[Weather].MinT
            LinearInterpolationFunction HighTempMortality
              XYPairs: X=[34, 44, 54]; Y=[0, 0.5, 1]
              VariableReference XValue: VariableName=[Weather].MaxT
            LinearInterpolationFunction SoilDrynessMortality
              SoilWaterScale
              XYPairs: X=[0, 1, 2]; Y=[1, 0, 1]
              VariableReference XValue: VariableName=[SoilWaterScale]
          LifeStageReproductionProcess ReproductionProcesses: same as Tutorial_1_2_PseudoAphid_AgeBasedDevtResults.Field.LifeCycle.Adult.ReproductionProcesses
      Folder output figures: same as Tutorial_7_1_PseudoAphid_DrynessDepMortalityRain.Field.output figures
    Memo Memo2
      ------
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