Simulations: Version=68
  Memo Introduction
    # Introduction

    In this tutorial we will be looking at the Sobol method. It is a quantitative sensitivity analysis method, which assigns a percentage of output variance to each input or combination of inputs. This tutorial will build on the concepts introduced in the `MorrisMethod` tutorial. It may be useful to have a look at the `MorrisMethod` tutorial first, if you have not already done so. The `MorrisMethod` tutorial introduces sensitivity analysis inputs and outputs in the context of APSIM. It also introduces the nitrogen leaching simulation used in this tutorial.

    The Sobol method is a robust, reproducible sensitivity analysis method. It is based on the idea that a mathematical function of *m* inputs can be decomposed into 2<sup>*m*</sup> functions, each corresponding to one combination of inputs. It belongs to a class of sensitivity analysis methods named variance-based methods. A good overview of these may be found in [Pianosi2016].

    Just like the Morris method, the Sobol method can be used to identify inputs that have a large contribution to output variability, or a negligible contribution to output variability. The Sobol method has two major advantages however:

    * The Sobol method can *quantify* the contribution of each input, as a percentage of total output variance.
    * The Sobol method can also quantify the contribution of interactions between inputs.

    The additional information comes at a price: the Sobol method is very computationally intensive. This is an issue for larger models, with many inputs or long run times. The Sobol method is most often used as a follow-up to less computationally intensive methods, for example the Morris method. A typical sensitivity analysis may involve the following steps:

    1. Use the Morris method to analyse *all* inputs of interest, and identify non-influential inputs.
    2. Fix non-influential inputs to a constant value.
    3. Use the Sobol method on the remaining inputs, assigning a percentage of output variance to each input or combination of inputs.

    Note we do not need to use the above approach in this example, as we are only analysing a handful of inputs.

    This tutorial will show you how to set up a Sobol analysis in APSIM. It will then look at the analysis results, and compare them to the results of the Morris method. The limitations of the current Sobol method implementation will also be highlighted.

    <br/>
  DataStore
  Memo SobolMethodSetup
    # Sobol Method Setup

    <br/>

    ## Base Simulation

    The structure of the Sobol method is very similar to the structure of the Morris method. The Sobol method is run from a `Sobol` node, which can be found in `Models`, and should be added at the same level as the `DataStore`. Like the Morris node, the Sobol node requires a base simulation. We are using the same simulation (`UrinePatchSimulation`), but with a few modifications. You may wish to expand the base simulation, to remind yourself of its structure. The current implementation of the Sobol method cannot analyse multiple values of the same output. Hence the simulation runs for 3 years only, and reports a single value of nitrogen leached (`LeachN`).

    <br>

    <hr>
    **Note**: If the output is reported more than once, the analysis will run without errors. The results will be non-sense however! You can still obtain an estimate of temporal variability, but you will need to run a separate Sobol analysis for each reporting period.
    <hr>

    The Sobol method shares some additional reporting requirements with the Morris method:

    * The report node must be named 'Report'.
    * `[Clock].Today.Year` must be included as a reporting variable.

    The finished base simulation is copied into the Sobol node. The original simulation may again be deleted.

    <br/>

    ## Sobol Node

    Select the Sobol node, `SobolMethodExample`. It has a very similar structure to the Morris node. Do not let this fool you: The underlying analysis is in fact very different! The input information is again entered in the bottom panel of the user interface. If you are unsure of the process, revisit the Morris method tutorial.

    The `LowerBound` and `UpperBound` are now used a little differently. In this implementation, each input range is used to define a uniform distribution:

    ![Input Uniform Distributions](SobolParameterDistributions.png)

    Each uniform distribution is used to produce a sample of corresponding input values. Like with the Morris method, the range is one of the most important pieces of information fed into the analysis. See the Morris method tutorial, or Section 4 of [Pianosi2016], if you need more information.

    The size of the sample drawn from each uniform distribution corresponds to the `Number of paths` (top panel of the user interface). Note that the meaning of path here is slightly different than in the Morris node. Later on, you will again see how to assess the adequacy of the `Number of paths` value. Here the value is small, to reduce analysis run time. In practice, several hundred paths may be required for a useful result.

    <hr>
    **Tip**: The number of simulations that runs in this particular implementation of the Sobol method is *n*(*m* + 2), where *n* is the number of paths, and *m* the number of inputs. You can again use this to estimate the run time of the analysis.
    <hr>

    <hr>
    **Advanced**: The choice of input distribution is limited to the uniform distribution in this implementation of the Sobol method. This is a common choice, but other distributions may also be used.
    <hr>

    <br/>

    ## The Sobol Method Algorithm

    Now run APSIM from the `Simulations` node, if you have not done so already. It may again take a couple of minutes to finish. The algorithm behind the Sobol method is complex, and largely beyond the scope of this tutorial. The method typically produces two sensitivity measures for each input:

    * A first-order index. The *i*th first-order index is the proportion of output variance due to varying input *i* alone (i.e. not considering any interaction effects).
    * A total-order index. The *i*th total-order index is the proportion of output variance due to varying input *i*, taking into account all interaction effects involving input *i*.

    Currently, only the latter is returned to the user in APSIM. Some additional information regarding the Sobol method is provided below, for the interested reader.

    <hr>
    **Advanced**: The Sobol method again implements the R language package `sensitivity`. The implemented function is `sobolSalt`, a version of the Sobol method modified by Saltelli to improve performance. The input distributions are used to produce two *n* x *m* matrices - a sampling matrix and a resampling matrix. The sampling is carried out using Sobol sequences, and is said to be *quasi-random*. Quasi-random sampling ensures a more even coverage of the sample space, than simple random sampling.

    The columns from the two matrices are 'mixed and matched' to produce the sensitivity indices. Note that in theory any order index may be produced (i.e. an index for any *group* of inputs). In practice, this has a prohibitive associated computational cost.

    The (very) mathematically inclined reader may find a detailed account of Saltelli's version of the Sobol method in [Saltelli2002].
    <hr>
    <br>
  Sobol SobolMethodExample: NumPaths=50
    Parameters:
      {Name=SOC, Path=Field.Soil.Organic.Carbon[1], LowerBound=1, UpperBound=10}
      {Name=Load, Path=Field.Folder.AddUrinePatches.Script.DepositionLoad, LowerBound=100, UpperBound=1000}
      {Name=DUL, Path=Field.Soil.Physical.DUL[1], LowerBound=0.2, UpperBound=0.4}
    ParameterValues:
      V1          V2          V3
      2.55867481  674.221252  0.395481
      2.282419    979.7954    0.3708285
      1.62909043  148.037277  0.301185
      1.52540135  680.388855  0.211788
      7.02136946  319.735962  0.295709
      5.512472    446.479675  0.298895
      1.47315812  476.7102    0.3705472
      1.088699    111.429214  0.297288
      2.79208469  421.356873  0.391626
      1.56133032  465.759827  0.338516
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    X1:
      X1          X2          X3
      2.55867481  674.221252  0.395481
      2.282419    979.7954    0.3708285
      1.62909043  148.037277  0.301185
      1.52540135  680.388855  0.211788
      7.02136946  319.735962  0.295709
      5.512472    446.479675  0.298895
      1.47315812  476.7102    0.3705472
      1.088699    111.429214  0.297288
      2.79208469  421.356873  0.391626
      1.56133032  465.759827  0.338516
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    X2:
      X1          X2          X3
      7.751094    725.65625   0.3905486
      1.11525357  751.4249    0.223348
      3.25062418  171.628983  0.27980873
      5.16542625  558.092163  0.311184
      6.181178    325.496155  0.263405
      7.884658    763.5036    0.254444
      5.98942471  282.44696   0.327306
      6.231102    243.743408  0.3050793
      8.72062     100.560837  0.271739
      8.088089    293.772369  0.24220632
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    Simulation UrinePatchSimulation
      Clock: Start=1972-01-01; End=1975-12-31
      Weather: FileName=%root%\Examples\WeatherFiles\VCS_Ruakura.met
      Summary
      SoilArbitrator
      Zone Field: Area=1; Slope=0; AspectAngle=0; Altitude=50
        Folder
          Manager CutRotation
            AllowControl = yes
            CutRotationStartDate = 01/01/1900 00:00:00
            CutRotationEndDate = 12/31/2100 00:00:00
            IntervalType = FixedInterval
            CutInterval = 21
            DurationOfCut = 1
            RemoveAmountType = ResidualDM
            AmountGiven = 1000
            DMRemoveType = BasedOnDigestibility
            FractionN2Remove = 0.75
            ReturnType = AsDungUrine
            NDungType = DefineProportion
            ProportionN2Dung = 0.4
            CNRatioDung = 0
            UrineDepth = 250
```csharp
// Defoliates AgPasture on a regular rotation or one-off via a schedule
// currenty defoliates the amount specified by spreading evenly over the specified period

using System;
using System.Collections.Generic;
using System.Xml.Serialization;
using Models.Core;
using Models.PMF;
using Models.Soils;
using APSIM.Shared.Utilities;
using Models.Interfaces;

namespace Models
{
    [Serializable]
    public class Script : Model
    {
        // - Links to APSIM models
        [Link] Zone myZone;
        [Link] Clock Clock;
        [Link] Fertiliser fertiliser;
        [ScopedLinkByName] ISolute no3;
        [Link] Soil mySoil;
        [Link] ISummary summary = null;
        
        List<AgPasture.PastureSpecies> Pasture = new List<AgPasture.PastureSpecies>();
        
        // - Paramters for this manager
        [Description("Allow this manager to control defoliation? ")]
        public yesnoType AllowControl { get; set; }
        [Description("Date to begin the rotation: ")]
        public DateTime CutRotationStartDate { get; set; }
        [Description("Date to finish the rotation: ")]
        public DateTime CutRotationEndDate { get; set; }
        [Description("How the interval is defined: ")]
        public rotationIntervalTypes IntervalType { get; set; }
        [Description("Rotation interval (days): ")]
        public int CutInterval { get; set; }
        [Description("Duration of each event (days): ")]
        public int DurationOfCut { get; set; }
        [Description("What amount is being defined: ")]
        public removeAmountTypes RemoveAmountType { get; set; }
        [Description("Amount to use (kg/ha): ")]
        public double AmountGiven { get; set; }
        [Description("How much of DM is removed from the field: ")]
        public removeDMTypes DMRemoveType { get; set; }
        [Description("Fraction of N that is removed from the field (0-1): ")]
        public double FractionN2Remove { get; set; }
        [Description("How defoliated material is returned to the field? ")]
        public returnTypes ReturnType { get; set; }
        [Description("How the partition of N to dung and urine are defined:")]
        public dungNContentTypes NDungType { get; set; }
        [Description("Proportion of returned N that goes to dung (0-1): ")]
        public double ProportionN2Dung { get; set; }
        [Description("The C:N of dung (typically around 20): ")]
        public double CNRatioDung { get; set; }
        [Description("Depth down to which urine is applied (mm): ")]
        public double UrineDepth { get; set; }

        // - Outputs from this manager
        [XmlIgnore][Units("g/m2")]// Description: Pasture DM defoliated today
        public double DefoliatedWt { get; set; }
        [XmlIgnore][Units("g/m2")]// Description: Pasture N defoliate today
        public double DefoliatedN { get; set; }
        [XmlIgnore][Units("g/m2")]// Description: Pasture DM harvested today
        public double HarvestedWt { get; set; }
        [XmlIgnore][Units("g/m2")]// Description: Pasture N harvested today
        public double HarvestedN { get; set; }
        [XmlIgnore][Units("g/m2")]// Description: Pasture DM removed from the field
        public double RemovedWt { get; set; }
        [XmlIgnore][Units("g/m2")]// Description: Pasture N removed from the field
        public double RemovedN { get; set; }
        [XmlIgnore][Units("g/m2")]// Description: Residue DM returned to the field
        public double ReturnedWt { get; set; }
        [XmlIgnore][Units("g/m2")]// Description: Residue N returned to the field
        public double ReturnedN { get; set; }
        [XmlIgnore][Units("g/m2")]// Description: Harvested N returned as dung (SurfaceOM)
        public double NReturnedInDung { get; set; }
        [XmlIgnore][Units("g/m2")]// Description: Harvested N returned as urine (urea)
        public double NReturnedInUrine { get; set; }
        [XmlIgnore][Units("day")]// Description: Number of days after last defoliation
        public int DaysAfterCut { get; set; }
        [XmlIgnore][Units("g/m2")]// Description: Total standing DM (Leaf + Stem/Sheath) before cut
        public double PreHarvestDM { get; set; }
        [XmlIgnore][Units("g/m2")]// Description: Total standing DM (Leaf + Stem/Sheath) after cut
        public double PostHarvestDM { get; set; }
        
        // - Internal variables
        // fraction of harvested Dm to actually remove from field
        private double fractionDM2Remove = 1.0;
        // number of days for each defoliation event
        private int cuttingDuration = 0;
        // counter for day within each defoliation
        private int daysCutting = 0;
        // total existing DM harvestable
        private double existingDM;
        // total herbage to remove in g/m2 per day
        private double herbageToRemove;
        // type of DM amount (ResidualDM or DMToRemove)
        private string amountType;
        // auxiliary flag for defoliation
        private bool aCutHasHappened = false;
        // fraction of urine that is applied to each layer
        private double[] fractionUrine;
        // number of layer in the soil
        private int nLayers;

        // - Event to add residue or dung to surface OM
        public event BiomassRemovedDelegate BiomassRemoved;

        [EventSubscribe("Commencing")]
        private void OnSimulationCommencing(object sender, EventArgs e)
        {
            foreach (AgPasture.PastureSpecies species in Apsim.Children(myZone, typeof(AgPasture.PastureSpecies)))
                Pasture.Add(species);

            // reset variables
            DaysAfterCut = 0;
            resetVariables();
            cuttingDuration = DurationOfCut;
            
            // get the type of amount given
            if (RemoveAmountType == removeAmountTypes.ResidualDM)
                amountType = "SetResidueAmount";
            else
                amountType = "SetRemoveAmount";

            // make sure that rotation start when startDate < simulationStartDay
            if ((Clock.Today > CutRotationStartDate) && (Clock.Today < CutRotationEndDate))
                CutRotationStartDate = Clock.Today;
                
            // set the fraction of urine for each layer
            nLayers = mySoil.Thickness.Length;
            fractionUrine = new double[nLayers];
            double soilDepth = 0.0;
            double distFactor = 1.5;
            if (ReturnType == returnTypes.AsDungUrine)
            {
                double atZ0;
                double atZ1;
                double totalProp = UrineDepth * Math.Pow(1.0, distFactor) / (distFactor + 1.0);
                
                atZ1 = (UrineDepth - soilDepth) * Math.Pow(1.0 - soilDepth / UrineDepth, distFactor) / (distFactor + 1.0);
                for (int z = 0; z < nLayers; z++)
                {
                    atZ0 = atZ1;
                    soilDepth += mySoil.Thickness[z];
                    atZ1 = (UrineDepth - soilDepth) * Math.Pow(1.0 - soilDepth / UrineDepth, distFactor) / (distFactor + 1);
                    if (1.0 - (soilDepth / UrineDepth) < 0.0)
                        atZ1 = 0;
                    fractionUrine[z] = (atZ0 - atZ1) / totalProp;
                }
            }
        }
        
        [EventSubscribe("DoManagement")]
        private void OnDoManagement(object sender, EventArgs e)
        {
            // Check whether defoliation is allowed at all
            if (AllowControl == yesnoType.yes)
            {
                // Check whether defoliation can start
                if ((Clock.Today >= CutRotationStartDate) && (Clock.Today <= CutRotationEndDate))
                {
                    if (Clock.Today == CutRotationStartDate)
                        DaysAfterCut = CutInterval;
    
                    // Check whether we should start a defoliation
                    if ((Pasture[0].IsAlive) && (DaysAfterCut >= (CutInterval - 1)))
                        StartDefoliation(AmountGiven, amountType, DurationOfCut);
                }
            }
            //// Note: Only the code above should be limited by 'AllowControl'. So the rest of the code
            ////  can be used by being called from another manager or a schedulle thingy


            // Check whether we need to continue cutting
            if ((daysCutting > 0) && (daysCutting < cuttingDuration))
            {
                // reset outputs
                resetVariables();

                defoliatePasture(herbageToRemove);
                if (ReturnType == returnTypes.AsResidue)
                    returnResidues();
                else
                    returnExcreta();
                daysCutting += 1;
                if (daysCutting == cuttingDuration)
                {
                    PostHarvestDM = 0.0;
                    foreach (AgPasture.PastureSpecies species in Pasture)
                        PostHarvestDM += species.StandingHerbageWt;
                }
            }

            // reset outputs
            if (daysCutting < 0)
            {
                resetVariables();
                daysCutting = 0;
            }
        }

        [EventSubscribe("DoManagementCalculations")]
        private void OnDoManagementCalculations(object sender, EventArgs e)
        {
            // Check whether a cutting has finished
            if (daysCutting == cuttingDuration)
            {
                aCutHasHappened = true;
                daysCutting = -1;
            }

            // Increase the counter for days after cutting
            if (aCutHasHappened && (daysCutting == 0))
                DaysAfterCut += 1;
        }

        // Resets the values of all outputs
        private void resetVariables()
        {
            DefoliatedWt = 0.0;
            DefoliatedN = 0.0;
            HarvestedWt = 0.0;
            HarvestedN = 0.0;
            RemovedWt = 0.0;
            RemovedN = 0.0;
            ReturnedWt = 0.0;
            ReturnedN = 0.0;
            NReturnedInDung = 0.0;
            NReturnedInUrine = 0.0;
        }

        // Description: Perform the basic calculations for defoliation
        public void StartDefoliation(double amountDM, string amountType, int duration)
        {
            // Get the existing plant amount
            existingDM = 0.0;
            PreHarvestDM = 0.0;
            foreach (AgPasture.PastureSpecies species in Pasture)
            {
                PreHarvestDM += species.StandingHerbageWt;
                existingDM += species.HarvestableWt;
            }
            
            // Check the amount to remove and print some info
            if ((amountType == "SetRemoveAmount") && (existingDM >= amountDM / duration))
            {
                summary.WriteMessage(this, "   Defoliating " + (10 * amountDM).ToString("#0.0") + "kg/ha over " + duration + " days");
                herbageToRemove = amountDM / duration;
            }
            else if ((amountType == "SetResidueAmount") && (existingDM >= amountDM))
            {
                summary.WriteMessage(this, "   Defoliating down to approximately " + (10 * amountDM).ToString("#0.0") + "kg/ha over " + duration + " days");
                herbageToRemove = (PreHarvestDM - amountDM) / duration;
            }
            else
            {
                summary.WriteMessage(this, "   Defoliation will not happend because there is not enough plant material");
                if (IntervalType == rotationIntervalTypes.FixedInterval)
                    DaysAfterCut = -duration;
                return;
            }

            // Start defoliation
            cuttingDuration = duration;
            defoliatePasture(herbageToRemove);
            if (ReturnType == returnTypes.AsResidue)
                returnResidues();
            else
                returnExcreta();
                
            daysCutting = 1;
            DaysAfterCut = 0;
            if (daysCutting == cuttingDuration)
            {
                PostHarvestDM = 0.0;
                foreach (AgPasture.PastureSpecies species in Pasture)
                    PostHarvestDM += species.StandingHerbageWt;
            }
        }

        // Do the DM removal
        private void defoliatePasture(double removeAmount)
        {
            // Remove a proportion of required DM from each species
            DefoliatedWt = 0.0;
            DefoliatedN = 0.0;
            foreach (AgPasture.PastureSpecies species in Pasture)
            {
                double amountToRemove = removeAmount * species.HarvestableWt / existingDM;
                species.Graze(amount: amountToRemove, type: "SetRemoveAmount");
                DefoliatedWt += species.HarvestedWt;
                DefoliatedN += species.HarvestedN;
            }
            
            // total harvested is equal total defoliated, for now
            HarvestedWt = DefoliatedWt;
            HarvestedN = DefoliatedN;

            // get amounts actually removed from field and that to be returned (dung/urine)
            if (DMRemoveType == removeDMTypes.RemoveAll)
                fractionDM2Remove = 1.0;
            else if (DMRemoveType == removeDMTypes.RemoveNone)
                fractionDM2Remove = 0.0;
            else
            {
                fractionDM2Remove = 0.0;
                foreach (AgPasture.PastureSpecies species in Pasture)
                    fractionDM2Remove += species.HarvestedDigestibility * species.HarvestedWt;
                fractionDM2Remove /= removeAmount;
            }
            
            RemovedWt = HarvestedWt * fractionDM2Remove;
            RemovedN = HarvestedN * FractionN2Remove;
            ReturnedWt = HarvestedWt - RemovedWt;
            ReturnedN = HarvestedN - RemovedN;

            if (ReturnType == returnTypes.AsDungUrine)
            {
                if (NDungType == dungNContentTypes.DefineProportion)
                    NReturnedInDung = ReturnedN * ProportionN2Dung;
                else
                    NReturnedInDung = Math.Min(ReturnedN, ReturnedWt * 0.4 / CNRatioDung);
                NReturnedInUrine = ReturnedN - NReturnedInDung;
            }
            else
            {
                NReturnedInDung = 0.0;
                NReturnedInUrine = 0.0;
            }
        }
        
        // Return dung and urine
        private void returnExcreta()
        {
            if ((ReturnedWt > 0.0) || (NReturnedInDung > 0.0))
            {
                PMF.BiomassRemovedType BiomassDung = new PMF.BiomassRemovedType();
                string[] type = new string[] { "RuminantDung_PastureFed" };
                float[] dltdm = new float[] { (Single)ReturnedWt };
                float[] dltn = new float[] { (Single)NReturnedInDung };
                float[] dltp = new float[] { 0 };
                float[] fraction = new float[] { 1 };     // fraction is always 1.0 here

                BiomassDung.crop_type = "RuminantDung_PastureFed";
                BiomassDung.dm_type = type;
                BiomassDung.dlt_crop_dm = dltdm;
                BiomassDung.dlt_dm_n = dltn;
                BiomassDung.dlt_dm_p = dltp;
                BiomassDung.fraction_to_residue = fraction;
                BiomassRemoved.Invoke(BiomassDung);
            }

            if (NReturnedInUrine > 0.0)
            {
                double[] myUrineDeposition = new double[nLayers];
                for (int z = 0; z < nLayers; z++)
                    myUrineDeposition[z] = NReturnedInUrine * fractionUrine[z];

                no3.AddKgHaDelta(SoluteSetterType.Fertiliser, myUrineDeposition);
                //fertiliser.Apply(NReturnedInUrine * 10, Fertiliser.Types.UreaN, 1.0);
            }
        }

        // Return pasture residues
        private void returnResidues()
        {
            if ((ReturnedWt > 0.0) || (ReturnedN > 0.0))
            {
                PMF.BiomassRemovedType BiomassDung = new PMF.BiomassRemovedType();
                string[] type = new string[] { "Grass" };
                float[] dltdm = new float[] { (Single)ReturnedWt };
                float[] dltn = new float[] { (Single)ReturnedN };
                float[] dltp = new float[] { 0 };
                float[] fraction = new float[] { 1 };     // fraction is always 1.0 here

                BiomassDung.crop_type = "Grass";
                BiomassDung.dm_type = type;
                BiomassDung.dlt_crop_dm = dltdm;
                BiomassDung.dlt_dm_n = dltn;
                BiomassDung.dlt_dm_p = dltp;
                BiomassDung.fraction_to_residue = fraction;
                BiomassRemoved.Invoke(BiomassDung);
            }
        }
        
        // Auxiliary bits and pieces  - - - - - - - - - - - - - - - - - - - - - - - -  - - - - -  - -

        public enum yesnoType
        {
            /// <summary>a positive answer</summary>
            yes,
            /// <summary>a negative answer</summary>
            no
        }

        public enum removeAmountTypes
        {
            /// <summary>Setting DM amount to remove</summary>
            DMToRemove,
            /// <summary>Setting residual DM amount</summary>
            ResidualDM
        }

        public enum rotationIntervalTypes
        {
            /// <summary>Setting a fixed interval</summary>
            FixedInterval,
            /// <summary>Setting a target (minimum) inteval</summary>
            TargetInterval
        }

        public enum removeDMTypes
        {
            /// <summary>Remove all DM</summary>
            RemoveAll,
            /// <summary>Remove no DM</summary>
            RemoveNone,
            /// <summary>Remove a fraction based on digestibility</summary>
            BasedOnDigestibility
        }
        
        public enum returnTypes
        {
            /// <summary>Return plant material as residue</summary>
            AsResidue,
            /// <summary>Return meterial as dung and urine</summary>
            AsDungUrine
        }

        public enum dungNContentTypes
        {
            /// <summary>Define the proportion of N returned as dung</summary>
            DefineProportion,
            /// <summary>Define the C:N of dung</summary>
            DefineCNratio,
        }
    }
}
```
          Manager AddUrinePatches
            FirstDepositionDate = 08/15/1972 00:00:00
            DepositionInterval = 2
            Depositions = 1
            DepositionLoad = 600
            DepositionDepth = 300
```csharp
// Adds a urine patch

using System;
using System.Xml.Serialization;
using Models.Core;
using Models.PMF;
using Models.Soils;
using APSIM.Shared.Utilities;
using Models.Interfaces;
namespace Models
{
    [Serializable]
    public class Script : Model
    {
        // - Links to APSIM models
        [Link] Clock Clock;
        [Link] Fertiliser fertiliser;
        [ScopedLinkByName] ISolute urea;
        [Link] Soil mySoil;
        [Link] ISummary summary = null;

        // - Parameters for this manager
        [Separator("Addition of a single urine patch")]

        //[Description("Test date array: ")] public DateTime[] TestDates { get; set; }
        [Description("Date for the urine deposition: ")] public DateTime FirstDepositionDate { get; set; }
        [Description("Interval between depositions (years): ")] public double DepositionInterval { get; set; }
        [Description("Number of depositions (-): ")] public int Depositions { get; set; }
        [Description("Nitrogen load within the urine patch (kg N /ha): ")] public double DepositionLoad { get; set; }
        [Description("Depth in the soil to which urine is applied (mm): ")] public double DepositionDepth { get; set; }

        // - Outputs from this manager
        [XmlIgnore][Units("")] public DateTime[] DepositionDates { get; set; }
        [XmlIgnore][Units("")] public int DepositionMonth { get; set; }
        [XmlIgnore][Units("")] public int DepositionYear { get; set; }  // this will change with each sucessive urine patch

        // - Internal variables

        private double[] fractionUrine;  // fraction of urine that is applied to each layer
        private int nLayers;  // number of layers in the soil

        public event BiomassRemovedDelegate BiomassRemoved;  // - Event to add residue or dung to surface OM

        [EventSubscribe("StartOfSimulation")]
        private void OnStartOfSimulation(object sender, EventArgs e)
        {
        	// sort out the array of dates
        	int maxDepositions = Convert.ToInt32(Math.Floor((Clock.EndDate.Year - Clock.StartDate.Year ) / DepositionInterval));
        	if (Depositions > maxDepositions)
        		throw new Exception("Too many Depositions specified, the maximum possible in this simulation is " + maxDepositions);
       		//summary.WriteMessage(this, "Too many Depositions specified, the maximum possible in this simulation is " + maxDepositions);
        	DepositionDates = new DateTime[Depositions];
        	for (int i = 0; i < Depositions; i++)
        	{
        		DepositionDates[i] = FirstDepositionDate.AddYears(Convert.ToInt32(i * DepositionInterval));
        		summary.WriteMessage(this, "DepositionDates[i] " + i + "  " + DepositionDates[i].ToShortDateString());
        	}
        	DepositionYear = DepositionDates[0].Year;
      		DepositionMonth = FirstDepositionDate.Month;

      		// set the fraction of urine for each layer
            nLayers = mySoil.Thickness.Length;
            fractionUrine = new double[nLayers];
            double soilDepth = 0.0;
            double distFactor = 1.5;
            double atZ0;
            double atZ1;
            double totalProp = DepositionDepth * Math.Pow(1.0, distFactor) / (distFactor + 1.0);
                
            atZ1 = (DepositionDepth - soilDepth) * Math.Pow(1.0 - soilDepth / DepositionDepth, distFactor) / (distFactor + 1.0);
            for (int z = 0; z < nLayers; z++)
            {
                atZ0 = atZ1;
                soilDepth += mySoil.Thickness[z];
                atZ1 = (DepositionDepth - soilDepth) * Math.Pow(1.0 - soilDepth / DepositionDepth, distFactor) / (distFactor + 1);
                if (1.0 - (soilDepth / DepositionDepth) < 0.0)
                    atZ1 = 0;
                fractionUrine[z] = (atZ0 - atZ1) / totalProp;
            }
        }
        
        [EventSubscribe("DoManagement")]
        private void OnDoManagement(object sender, EventArgs e)
        {
        	for (int i = 0; i < DepositionDates.Length; i++)
        	{
	        	if (Clock.Today == DepositionDates[i])
	        	{
    	            returnExcreta();
                   	DepositionYear = Clock.Today.Year;
    	        }
        	}

        }

        [EventSubscribe("DoManagementCalculations")]
        private void OnDoManagementCalculations(object sender, EventArgs e)
        {
        }



        // Return dung and urine
        private void returnExcreta()
        {
                double[] myUrineDeposition = new double[nLayers];
                double fractionNInUrea = 1 / 0.46;
                for (int z = 0; z < nLayers; z++)
                    myUrineDeposition[z] = DepositionLoad * fractionUrine[z]; // * fractionNInUrea;
                // "Urea" is being treated as UreaN at present (ditto for NO3 and NH4) - issue report #3353 submitted (5 Dec 2018)
                urea.AddKgHaDelta(SoluteSetterType.Fertiliser, myUrineDeposition);
        }
    }
}
```
          Manager FertiliseOnFixedDates
            FertiliserType = UreaN
            FertiliserDates = 5-jan, 5-feb, 5-mar, 5-apr, 5-aug, 5-sep, 5-oct, 5-nov, 5-dec
            Amount = 100
            AmountType = False
```csharp
using System;
using Models.Core;
using Models.PMF;
using APSIM.Shared.Utilities;
namespace Models
{
    [Serializable]
    public class Script : Model
    {
        [Link] Clock Clock;
        [Link] Fertiliser Fertiliser;
        
        [Separator("A component to apply fertiliser on one or more dates on every year of the simulation")]

        [Description("Type of fertiliser to apply? ")] public Fertiliser.Types FertiliserType { get; set; }

        [Description("Enter the fertilisation dates as dd-mmm with comma separation (any year information entered will be ignored): ")] public string[] FertiliserDates { get; set; }  // ignore for now

        [Description("Amount of fertiliser to be applied (kg /ha)")] public double Amount { get; set; }

        [Description("Is the above amount to be applied each time? (yes/ticked)? Or is it the total annual amount across all dates (no/unticked)")] public bool AmountType { get; set; }
        
        [EventSubscribe("DoManagement")]
        private void OnDoManagement(object sender, EventArgs e)
        {
        	foreach (string ddMMM in FertiliserDates)
        	{
    			if (DateUtilities.DatesEqual(ddMMM, Clock.Today))
        		{
        			if (AmountType)
        				Fertiliser.Apply(Amount: Amount, Type: FertiliserType);
        			else
        				Fertiliser.Apply(Amount: Amount / FertiliserDates.Length, Type: FertiliserType);
        		}
        	}
        }
    }
}
```
          Manager AutomaticIrrigation
            allowIrrigation = False
            seasonStart = 15-Aug
            seasonEnd = 30-May
            seasonsAllocation = 10000
            triggerDeficit = 50
            targetDeficit = 99
            returndays = 1
            maximumAmount = 30
            depthPAWC = 300
```csharp
using System;
using Models.Core;
using Models.PMF;
using Models.Soils;
using System.Xml.Serialization;
using Models.PMF;
using APSIM.Shared.Utilities;

        
namespace Models
{
    [Serializable] 
    [System.Xml.Serialization.XmlInclude(typeof(Model))]
    public class Script : Model
    {
        //Communication to other modules
        [Link] ISummary summary = null;
        [Link] Irrigation Irrigation;
        [Link] Clock Clock;
        [Link] Soil Soil;
        [Link(IsOptional = true)] IPlant existingCrop;
       
        //User inputs from properties tab
        [Description("Turn irrigation on?")]
        public bool allowIrrigation { get; set; }
        [Description("Start of irrigation season (dd-MMM)")]
        public string seasonStart { get; set; }
        [Description("End of irrigation season (dd-MMM)")]
        public string seasonEnd { get; set; }
        [Description("Season allocation (mm)")]
        public double seasonsAllocation { get; set; }
        [Description("Deficit to trigger irrigation (% PAWC)")]
        public double triggerDeficit { get; set; }
        [Description("Deficit to stop irrigaton (% PAWC)")]
        public double targetDeficit { get; set; }
        [Description("Minimum days for irrigation to return")]
        public double returndays { get; set; }
        [Description("Maximum irrigation application (mm/day)")]
        public double maximumAmount { get; set; }
        [Description("Depth to calculate PAWC (mm)")]
        public double depthPAWC { get; set; }

        //Class members
        [XmlIgnore] public double TopSWdeficit { get; set; }
        [XmlIgnore] public double TopSWC { get; set; }
        [XmlIgnore] public double DaysSinceIrrigation { get; set; }
        [XmlIgnore] public double AmountToApply { get; set; }
        [XmlIgnore] public double SeasonAppliedAmount { get; set; }
        
        private bool IrrigationIsAllowed { get; set; }
        private bool SeasonIsOpen { get; set; }
        private bool CropIsActive { get; set; }
        private bool IrrigatorIsAvailable { get; set; }
        private bool SoilIsDry { get; set; }

        private DateTime StartDate;
        private DateTime EndDate;
        private double TopDUL;
        private double TopLL;
        private int nLayers;
    
        //Calculate static soil variables
        [EventSubscribe("StartOfSimulation")]
        private void OnStartOfSimulation(object sender, EventArgs e)
        {   
            //Set the season dates
            StartDate = DateTime.Parse(seasonStart + "-" + Clock.Today.Year.ToString());
            EndDate = DateTime.Parse(seasonEnd + "-" + Clock.Today.Year.ToString());
            
            //Can we irrigate at all?
            IrrigationIsAllowed = false; 
            if (allowIrrigation)
                IrrigationIsAllowed = true; 

            //Calculate soil water variables
            double depthFromSurface = 0.0;
            double fracLayer = 0.0;
            nLayers = Soil.Thickness.Length;
            for (int layer = 0; layer < nLayers; layer++)
            {
                fracLayer = Math.Min(1.0, (depthPAWC - depthFromSurface) / Soil.Thickness[layer]);
                TopLL += Soil.LL15mm[layer] * fracLayer;
                TopDUL += Soil.DULmm[layer] * fracLayer;
                depthFromSurface += Soil.Thickness[layer];
                if (depthFromSurface >= depthPAWC)
                    layer = nLayers;
            }
        }
             
        //Determine daily requirement for irrigation
        [EventSubscribe("StartOfDay")]
        private void OnStartOfDay(object sender, EventArgs e)
        {
            //Can we irrigate today?          
            SeasonIsOpen = isBetween(Clock.Today, StartDate, EndDate);

            //Is there a crop in the ground that needs irrigation?
            CropIsActive = false;
            if ((existingCrop != null) && (existingCrop.IsAlive))
                CropIsActive = true;
            //if ((existingCrop.Phenology.Stage >= 3.0) && (existingCrop.Phenology.Stage < 6.0))
          
            //Is the irrigator available?
            IrrigatorIsAvailable = false;
            DaysSinceIrrigation += 1;
            if (DaysSinceIrrigation >= returndays)
                IrrigatorIsAvailable = true;
          
            //Is the soil dry enough to require irrigation?
            SoilIsDry = false;
            double depthFromSurface = 0.0;
            double fracLayer = 0.0;
            TopSWC = 0.0;
            for (int layer = 0; layer < nLayers; layer++)
            //for (int layer = 0; depthFromSurface < depthPAWC + Soil.Thickness[layer]; layer++)
            {
                fracLayer = Math.Min(1.0, (depthPAWC - depthFromSurface) / Soil.Thickness[layer]);
                TopSWC += Soil.SoilWater.SWmm[layer] * fracLayer;
                depthFromSurface += Soil.Thickness[layer];
                if (depthFromSurface >= depthPAWC)
                    layer = nLayers;
            }
            
            TopSWdeficit = TopSWC - TopDUL;
            if (Math.Max(0.0, -TopSWdeficit) >= (TopDUL - TopLL) * (100 - triggerDeficit) / 100)
                SoilIsDry = true;
                
            //Are all the conditions ratifying irrigation
            if (IrrigationIsAllowed && SeasonIsOpen && CropIsActive && IrrigatorIsAvailable && SoilIsDry)
            {
                //Lets bloody well irrigate then!!!!
                AmountToApply = TopDUL * targetDeficit / 100 - TopSWC;
                AmountToApply = Math.Max(0.0, Math.Min(AmountToApply, seasonsAllocation - SeasonAppliedAmount));
                Irrigation.Apply(AmountToApply);
                DaysSinceIrrigation = 0;
                SeasonAppliedAmount += AmountToApply;
            }
        }
        
        ///Checks whether theDate is between iniDate and endDate (non-year specific)
        private bool isBetween(DateTime theDay, DateTime iniDate, DateTime endDate)
        {
            bool result = false;
            if (iniDate.DayOfYear < endDate.DayOfYear)
            {
                // period is within one year, ex: summer in the northern hemisphere
                if ((theDay.DayOfYear >= iniDate.DayOfYear) && (theDay.DayOfYear <= endDate.DayOfYear))
                    result = true;
            }
            else
            {
                // period goes over the end of the year, ex: summer in the southern hemisphere
                if ((theDay.DayOfYear >= iniDate.DayOfYear) || (theDay.DayOfYear <= endDate.DayOfYear))
                    result = true;
            }
            
            return result;
        }
    }
}
```
          Manager DoReportingSensit
            ReportName = Report
            HarvestedWt = 0
            IntervalNHA = 0
```csharp
using Models.Interfaces;
using Models.Utilities;
using APSIM.Shared.Utilities;
using Models.Soils;
using Models.PMF;
using Models.Core;
using System.Xml.Serialization;
using System;
using System.Collections.Generic;

namespace Models
{
    [Serializable]
    public class Script : Model
    {
        [Link] private Zone zone;
        [Link] private Simulation Simulation;
        [Link] private Clock Clock;
        [Link] private Fertiliser fertiliser;
        [Link] private Soil mySoil;
        [Link] private ISummary summary;
        private double urineApplied;
        [ScopedLinkByName]
        private ISolute NO3;
        [ScopedLinkByName]
        private ISolute NH4;
        [ScopedLinkByName]
        private ISolute Urea;
        [ScopedLinkByName]
        private SoilNitrogen SoilNitrogen;
        // - Links to APSIM models
        [Link] List<AgPasture.PastureSpecies> Pastures;

        //[ScopedLinkByName] Report.Report HarvestReport;

        [Separator("Point to component and true/false variable for the harvesting")]
        [Description("Name of the component that does the reporting       :")] public string ReportName { get; set; }

        public double HarvestedWt { get; set; }
        public double IntervalNHA { get; set; }


        [XmlIgnore][Units("")] public DateTime[] ResetDates { get; set; }
        [XmlIgnore][Units("")] public DateTime[] ReportDates { get; set; }

        [XmlIgnore][Units("kgN/ha")] public double HerbageCut { get; set; }
        [XmlIgnore][Units("kgN/ha")] public double HerbageNCut { get; set; }
        [XmlIgnore][Units("kgN/ha")] public double Fixation { get; set; }
        [XmlIgnore][Units("kgN/ha")] public double LeachN { get; set; }
        [XmlIgnore][Units("kgN/ha")] public double Denit { get; set; }
        [XmlIgnore][Units("kgN/ha")] public double DenitN2O { get; set; }
        [XmlIgnore][Units("kgN/ha")] public double Drainage { get; set; }
        [XmlIgnore][Units("-")] public double PropLeached { get; set; }

        private double[] soilUrea;
        private double[] soilNH4;
        private double[] soilNO3;

        [EventSubscribe("StartOfSimulation")]
        private void OnStartOfSimulation(object sender, EventArgs e)
        {
            // set the reset and reporting dates
            DateTime[] urineDates = (DateTime[])Apsim.Get(zone, "[AddUrinePatches].Script.DepositionDates");
            ResetDates = new DateTime[urineDates.Length + 1];
            ReportDates = new DateTime[urineDates.Length + 1];
            for (int i = 0; i < urineDates.Length; i++)
            {
                ResetDates[i] = urineDates[i].AddDays(-1);  // -1 because this manager is after AddUrinePatches
                ReportDates[i] = urineDates[i].AddYears(2).AddDays(-2); // -2 to capture the data before the reset
                summary.WriteMessage(this, "ReportDate " + i + " " + ReportDates[i]);
            }
            soilUrea = new double[mySoil.Thickness.Length];
            soilNH4 = new double[mySoil.Thickness.Length];
            soilNO3 = new double[mySoil.Thickness.Length];

            urineApplied = (double)Apsim.Get(zone, "[AddUrinePatches].Script.DepositionLoad");
               summary.WriteMessage(this, "DoReportingSensit has found a urineApplied value of " + urineApplied);

               summary.WriteMessage(this, "DoReportingSensit has initialised");
        }
        
        [EventSubscribe("DoManagement")]
        private void OnDoManagement(object sender, EventArgs e)
        {
            if (DateUtilities.Equals(ResetDates[0], Clock.Today))
            {
                soilUrea = Urea.kgha;
                soilNH4 = NH4.kgha;
                soilNO3 = NO3.kgha;
                summary.WriteMessage(this, "Capturing soil mineral N values for future resetting");
            }

            foreach (DateTime myDate in ResetDates)
            {
                if (DateUtilities.Equals(myDate, Clock.Today))
                {
                    Urea.kgha = soilUrea;
                    NH4.kgha = soilNH4;
                    NO3.kgha = soilNO3;
                    summary.WriteMessage(this, "Resetting soil mineral N values prior to urine deposition");
                }
            }

            DateTime[] urineDates = (DateTime[])Apsim.Get(zone, "[AddUrinePatches].Script.DepositionDates");
            foreach (DateTime myDate in urineDates)
            {
                if (DateUtilities.Equals(myDate, Clock.Today))
                {
                    HerbageCut = 0.0;
                    HerbageNCut = 0.0;
                    Fixation = 0.0;
                    LeachN = 0.0;
                    Denit = 0.0;
                    DenitN2O = 0.0;
                    Drainage = 0.0;
                    PropLeached = 0.0;
                    summary.WriteMessage(this, "Resetting reporting values");
                }
            }
        }

        [EventSubscribe("DoManagementCalculations")]
        private void OnDoManagementCalculations(object sender, EventArgs e)
        {
            foreach (var pasture in Pastures)
            {
		        HerbageCut += pasture.HarvestedWt;
		        HerbageNCut += pasture.HarvestedN;
		        Fixation += pasture.FixedN;
            }
            LeachN += mySoil.SoilWater.LeachUrea + mySoil.SoilWater.LeachNH4 + mySoil.SoilWater.LeachNO3;
            for (int i = 0; i < mySoil.Thickness.Length; i++)
            {
                Denit += SoilNitrogen.Denitrification[i];
                DenitN2O += SoilNitrogen.n2o_atm[i];
            }
            Drainage += mySoil.SoilWater.Drainage;

            foreach (DateTime myDate in ReportDates)
            {
                if (DateUtilities.Equals(myDate, Clock.Today))
                {
                    if (urineApplied > 0.0)
                    {
                        PropLeached = LeachN / urineApplied;
                        summary.WriteMessage(this, "PropLeached calc first" + LeachN + " " + urineApplied);
                    }
                    else
                    {
                        PropLeached = 0.0;
                        summary.WriteMessage(this, "PropLeached calc second" + LeachN + " " + urineApplied);
                       }
                       Models.Report.Report myReportName = Apsim.Find(this, ReportName) as Models.Report.Report;
                    if (myReportName == null)
                           throw new Exception(string.Format("Unable to locate report {0}.", ReportName));
                    myReportName.DoOutput();
                }
            }
        }
    }
}
```
        MicroClimate: a_interception=0; b_interception=0; c_interception=0; d_interception=0; soil_albedo=0.23; SoilHeatFluxFraction=0.4; NightInterceptionFraction=0.5; ReferenceHeight=2
        Irrigation
        Fertiliser
        SurfaceOrganicMatter: InitialResidueName=Sward; InitialResidueType=grass; InitialResidueMass=1000; InitialStandingFraction=0; InitialCPR=0; InitialCNR=15; FractionFaecesAdded=0.5
        Soil: SoilType=Umbric Andosol (ANu); Country=New Zealan; Latitude=-37.967; Longitude=175.767
          DataSource=Romero, C.C., Hoogenboom, G., Baigorria, G.A., Koo, J., Gijsman, A.J., Wood, S., 2012. Reanalysis of a global soil database for crop and environmental modeling. Environmental Modelling & Software 35, 163-170.  https://harvestchoice.wufoo.com/forms/download-wisol.
          Comments=You will need to add crops to this soil before running simulations.
          Physical
            Thickness  BD     AirDry  LL15   DUL    SAT    KS
            200        1.311  0.077   0.154  0.374  0.456  4832.039
            150        1.524  0.201   0.201  0.332  0.394  389.229
            200        1.42   0.299   0.299  0.426  0.442  21.6
            350        1.424  0.308   0.308  0.446  0.456  19.051
            SoilCrop AGPRyegrassSoil: LL=[0.154, 0.201, 0.299, 0.308]; KL=[0.1, 0.1, 0.1, 0.05]; XF=[1, 0.8, 0.8, 0.3]
            SoilCrop AGPWhiteCloverSoil: LL=[0.154, 0.201, 0.299, 0.308]; KL=[0.1, 0.1, 0.1, 0.05]; XF=[1, 0.8, 0.8, 0.3]
          SoilWater: SummerDate=1-Nov; SummerU=9.12; SummerCona=3; WinterDate=1-Apr; WinterU=9.12; WinterCona=3; DiffusConst=0; DiffusSlope=0; Salb=0.13; CN2Bare=73; CNRed=0; CNCov=0; max_pond=0; Thickness=[180, 120, 210, 230]; SWCON=[0.5, 0.5, 0.5, 0.7]; PrecipitationInterception=0
          SoilNitrogen: fom_types=[default, manure, mucuna, lablab, shemp, stable]; fract_carb=[0.2, 0.3, 0.54, 0.57, 0.45, 0]; fract_cell=[0.7, 0.3, 0.37, 0.37, 0.47, 0.1]; fract_lign=[0.1, 0.4, 0.09, 0.06, 0.08, 0.9]
            SoilNitrogenNO3 NO3
            SoilNitrogenNH4 NH4
            SoilNitrogenUrea Urea
            SoilNitrogenPlantAvailableNO3 PlantAvailableNO3
            SoilNitrogenPlantAvailableNH4 PlantAvailableNH4
          Organic: FOMCNRatio=0
            Thickness  Carbon  SoilCNRatio  FBiom  FInert  FOM
            180        7.9     11.01        0.06   0.26    0
            120        2       11.01        0.04   0.5     0
            210        1       11.01        0.02   0.9     0
            230        0.5     11.01        0.01   0.99    0
          Chemical
            Thickness  NO3N  NH4N  PH
            180        10    0.1   5.6
            120        10    0.1   6.2
            210        1     0.1   6.2
            230        0.1   0.1   6.4
          InitialWater Initial Water: PercentMethod=0; FractionFull=1
          Sample Initial nitrogen: Thickness=[180, 120, 210, 230]; SWUnits=Volumetric; OCUnits=Total; PHUnits=Water
          CERESSoilTemperature
        Report
          VariableNames:
            [Clock].Today.Year
            [AddUrinePatches].Script.DepositionYear as DepositionYear
            [DoReportingSensit].Script.LeachN as LeachN
        PastureSpecies AGPRyegrass: MaximumNUptake=10; Albedo=0.26; Gsmax=0.011; R50=200; InitialShootDM=1500; InitialRootDM=450; InitialRootDepth=750; ReferencePhotosyntheticRate=1; LightExtinctionCoefficient=0.5; GrowthTminimum=1; GrowthToptimum=20; GrowthTEffectExponent=1.7; HeatOnsetTemperature=28; HeatFullTemperature=35; HeatRecoverySumDD=30; HeatRecoveryTReference=25; ColdOnsetTemperature=1; ColdFullTemperature=-5; ColdRecoverySumDD=25; MaintenanceRespirationCoefficient=0.03; GrowthRespirationCoefficient=0.25; RespirationTReference=20; RespirationExponent=1.5; NThresholdsForLeaves=[0.04, 0.012, 0.05]; NThresholdsForStems=[0.02, 0.006, 0.025]; NThresholdsForStolons=[0, 0, 0]; NThresholdsForRoots=[0.02, 0.006, 0.025]; DegreesDayForGermination=125; TargetShootRootRatio=4; MaxRootAllocation=0.25; ShootRootGlfFactor=0.5; ReproSeasonReferenceLatitude=41; ReproSeasonTimingCoeff=0.14; ReproSeasonMaxAllocationIncrease=0.5; ReproSeasonAllocationCoeff=0.1; FractionLeafMaximum=0.7; FractionLeafMinimum=0.7; FractionLeafDMThreshold=500; FractionLeafDMFactor=2000; FractionLeafExponent=3; SpecificLeafArea=20; SpecificRootLength=100; ShootMaxEffectOnLAI=1000; MaxStemEffectOnLAI=1; LiveLeavesPerTiller=3; TissueTurnoverRateShoot=0.05; TissueTurnoverRateRoot=0.02; DetachmentRateShoot=0.08; TurnoverTemperatureMin=2; TurnoverTemperatureRef=20; TurnoverTemperatureExponent=1; TurnoverDroughtEffectMax=1; TurnoverDroughtThreshold=0.5; TurnoverDefoliationCoefficient=0.5; TurnoverDefoliationRootEffect=0.1; FractionNLuxuryRemobilisable=[0.1, 0.1, 0.1]; SoilSaturationEffectMax=0.1; MinimumWaterFreePorosity=-1; SoilSaturationRecoveryFactor=0.25; NDillutionCoefficient=0.25; GlfGeneric=1; GlfSoilFertility=1; PlantHeightMinimum=300; PlantHeightMaximum=300; PlantHeightMassForMax=10000; PlantHeightExponent=2.8; RootDepthMinimum=50; RootDepthMaximum=1000; RootElongationRate=25; RootDistributionDepthParam=250; RootDistributionExponent=3.2; DigestibilitiesCellWall=[0.9, 0.7, 0.6, 0.2]; MinimumGreenWt=100; PreferenceForGreenOverDead=1; PreferenceForLeafOverStems=1
          zero: SpeciesFamily, PhotosyntheticPathway, UseHeatStressFactor, UseColdStressFactor, ColdRecoveryTReference, UseReproSeasonFactor, FractionToStolon, StolonEffectOnLAI, MinimumNFixation, MaximumNFixation, FractionStolonStanding, WaterAvailableMethod, NitrogenAvailableMethod
        PastureSpecies AGPWhiteClover: MaximumNUptake=10; Albedo=0.26; Gsmax=0.011; R50=200; SpeciesFamily=1; PhotosyntheticPathway=0; InitialShootDM=500; InitialRootDM=150; InitialRootDepth=350; ReferencePhotosyntheticRate=1; LightExtinctionCoefficient=0.8; GrowthTminimum=2; GrowthToptimum=22; GrowthTEffectExponent=1.7; UseHeatStressFactor=0; HeatOnsetTemperature=30; HeatFullTemperature=36; HeatRecoverySumDD=20; HeatRecoveryTReference=25; UseColdStressFactor=0; ColdOnsetTemperature=2; ColdFullTemperature=-5; ColdRecoverySumDD=20; ColdRecoveryTReference=0; MaintenanceRespirationCoefficient=0.04; GrowthRespirationCoefficient=0.25; RespirationTReference=20; RespirationExponent=1.5; NThresholdsForLeaves=[0.045, 0.02, 0.055]; NThresholdsForStems=[0.0225, 0.01, 0.0275]; NThresholdsForStolons=[0.0225, 0.01, 0.0275]; NThresholdsForRoots=[0.0225, 0.01, 0.0275]; DegreesDayForGermination=125; TargetShootRootRatio=4; MaxRootAllocation=0.25; ShootRootGlfFactor=0.5; UseReproSeasonFactor=0; ReproSeasonReferenceLatitude=41; ReproSeasonTimingCoeff=0.14; ReproSeasonMaxAllocationIncrease=0.5; ReproSeasonAllocationCoeff=0.1; FractionLeafMaximum=0.56; FractionLeafMinimum=0.28; FractionLeafDMThreshold=500; FractionLeafDMFactor=2000; FractionLeafExponent=3; FractionToStolon=0.2; SpecificLeafArea=32; SpecificRootLength=45; StolonEffectOnLAI=0.3; ShootMaxEffectOnLAI=500; MaxStemEffectOnLAI=0.5; LiveLeavesPerTiller=3; TissueTurnoverRateShoot=0.05; TissueTurnoverRateRoot=0.02; DetachmentRateShoot=0.11; TurnoverTemperatureMin=2; TurnoverTemperatureRef=20; TurnoverTemperatureExponent=1; TurnoverDroughtEffectMax=1; TurnoverDroughtThreshold=0.5; TurnoverDefoliationCoefficient=0.5; TurnoverDefoliationRootEffect=0.1; FractionNLuxuryRemobilisable=[0.1, 0.1, 0.1]; MinimumNFixation=0.2; MaximumNFixation=0.6; SoilSaturationEffectMax=0.1; MinimumWaterFreePorosity=-1; SoilSaturationRecoveryFactor=0.25; NDillutionCoefficient=1; GlfGeneric=1; GlfSoilFertility=1; PlantHeightMinimum=300; PlantHeightMaximum=300; PlantHeightMassForMax=7500; PlantHeightExponent=2.5; RootDepthMinimum=30; RootDepthMaximum=350; RootElongationRate=25; RootDistributionDepthParam=70; RootDistributionExponent=2.5; DigestibilitiesCellWall=[0.9, 0.8, 0.7, 0.2]; MinimumGreenWt=50; FractionStolonStanding=0; PreferenceForGreenOverDead=1; PreferenceForLeafOverStems=1; WaterAvailableMethod=0; NitrogenAvailableMethod=0
  Memo AnalysisResults
    # Analysis Results

    The Sobol analysis produces two data sources: `Report` and `Statistics`. `Report` is not very interesting in this example, so we will focus on `Statistics`. Select the graph node, `TotalEffectIndices`. The provided graph (Figure 1) contains the total effect indices for each input. The orange dots indicate a 95% confidence interval. The confidence interval is quite large in this case, and the estimates not particularly useful. The interval may be reduced by increasing the sample size (`Number of paths`). If you have time, you may wish to try increasing the `Number of paths` to 100. The analysis will take longer to run, but the results will be more useful.

    Compare this to the Morris analysis plot (`MorrisMethod` tutorial, Figure 3). Hint: use the filter feature in the `Series` node to select the year 1974. This way you can directly compare the two sets of results. Note that the results of both the Morris and Sobol method will differ somewhat between runs. The Sobol method identifies `Load` as the most influential input, which aligns with the general findings in the Morris method tutorial. The inputs `SOC` and `DUL` also account for some variability. This again aligns with the Morris method, where `SOC` and `DUL` were shown to be important in some years.

    <br>

    <hr>
    **Advanced**: The confidence interval is obtained using bootstrapping (sampling with replacement). The two matrices used to obtain the initial sensitivity indices are resampled, producing additional sensitivity index estimates. The estimates are aggregrated, and the 2.5th and 97.5th percentiles used as the minimum and maximum boundaries of the confidence interval respectively. A more visually appealing plot can be constructed in Excel. Simply export the data, and create a bar graph with error bars.
    <hr>
  Memo Conclusion
    <br>

    # Conclusion

    The urine patch simulation was used to demonstrate the use of another sensitivity analysis method. The Sobol method provided quantitative sensitivity estimates for each input (i.e. total-effect indices). The total-effect indices provided more detailed sensitivity information, but largely aligned with the findings of the Morris method. `Load` was found to be the most influential input, however `SOC` and `DUL` were also of some importance. Temporal variability was not analysed in this example, but additional Sobol analyses could be carried out to do so.

    <br>
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