Simulations: Version=1
  Memo Introduction
    The APSIM Agroforestry model has been developed to facilitate the modelling of tree-crop and silvopastoral systems.  It has been tested on a range of datasets from around the world to provide tests across a range of environmental conditions.  It makes use of APSIM's ability to simulation multiple zones within a production system [holzworth_apsim_2014] to simulate soil and plant processes at different locations within a windbreak, isolated tree or alley system.
  Replacements
    Soil SoilX: ASCOrder=Vertosol; ASCSubOrder=Grey; SoilType=Clay; Site=Warra; NearestTown=Warra, Q, 4411; Region=Darling Downs and Granite Belt; State=Queensland; Country=Australia; NaturalVegetation=Brigalow scrub; ApsoilNumber=19; Latitude=-26.897; Longitude=150.909; LocationAccuracy=+/- 20m; DataSource=0; Comments=CSIRO Sustainable Ecosystems, Toowoomba
      Water
        Thickness  BD    AirDry  LL15  DUL   SAT   KS
        50         1.39  0.06    0.18  0.4   0.45  20
        100        1.39  0.1     0.18  0.4   0.45  20
        150        1.35  0.17    0.19  0.41  0.46  20
        300        1.35  0.17    0.19  0.41  0.46  20
        300        1.43  0.17    0.2   0.38  0.43  20
        300        1.44  0.17    0.23  0.38  0.43  20
        300        1.45  0.17    0.25  0.37  0.42  20
        SoilCrop WheatSoil: LL=[0.18, 0.18, 0.19, 0.19, 0.2, 0.23, 0.25]; KL=[0.06, 0.06, 0.04, 0.03, 0.02, 0.02, 0.02]; XF=[1, 1, 1, 1, 1, 1, 1]
      SoilWater: residueinterception=0; SummerDate=1-Nov; SummerU=6; SummerCona=3.5; WinterDate=1-Apr; WinterU=6; WinterCona=3.5; DiffusConst=40; DiffusSlope=16; Salb=0.12; CN2Bare=73; CNRed=20; CNCov=0.8; max_pond=0; Thickness=[150, 150, 300, 300, 300, 300]; SWCON=[0.3, 0.3, 0.3, 0.3, 0.3, 0.3]
      SoilNitrogen: fom_type=[default, manure, mucuna, lablab, shemp, stable]; fract_carb=[0.2, 0.3, 0.54, 0.57, 0.45, 0]; fract_cell=[0.7, 0.3, 0.37, 0.37, 0.47, 0.1]; fract_lign=[0.1, 0.4, 0.09, 0.06, 0.08, 0.9]; wfpsN2N2O_x=[22, 88]; wfpsN2N2O_y=[0.1, 1]
      SoilOrganicMatter: RootCN=40; RootWt=1000; SoilCN=12; EnrACoeff=7.4; EnrBCoeff=0.2; OCUnits=Total
        Thickness  OC     FBiom  FInert
        150        0.915  0.04   0.4
        150        0.777  0.02   0.6
        300        0.346  0.02   0.8
        300        0.231  0.02   1
        300        0.154  0.01   1
        300        0.123  0.01   1
      Analysis: Thickness=[150, 150, 300, 300, 300, 300]; PH=[8, 8, 8, 8, 8, 8]; PHUnits=Water; BoronUnits=HotWater
      InitialWater: PercentMethod=FilledFromTop; FractionFull=0.33
      Sample InitialN: NO3Units=ppm; NH4Units=ppm; SWUnits=Volumetric; OCUnits=Total; PHUnits=Water
        Thickness  NO3  NH4
        150        1    0.1
        150        1    0.1
        300        1    0.1
        300        1    0.1
        300        1    0.1
        300        1    0.1
      Fertiliser
    Report DailyReport: EventNames=[Clock].DoReport; ResultsPerPage=0
      VariableNames:
        [Clock].Today as Date
        Distance
        LocalMicroClimate.Wind
        sum([Soil].NO3N) as TotalNO3N
        sum([Soil].NH4N) as TotalNH4N
        sum([TreeProxy].WaterUptake) as WaterUptake
        sum([Soil].SoilWater.SWmm[1:5]) as SW90cm
        [TreeProxy].Urel
        [TreeProxy].H
        [TreeProxy].SWDemand
        [TreeProxy].heightToday
        [MicroClimate].peta
        [MicroClimate].petr
        [Soil].SoilWater.Eo
        [TreeProxy].WaterStress
        [Soil].SoilWater.SW[1] as SurfaceSW
        [Wheat].AboveGround.Wt as BiomassWt
        [Wheat].Grain.Wt as GrainWt
        [Soil].SoilWater.Es as Es
        [Soil].SoilWater.ESW as ESW
        [Soil].SoilWater.Eo as Eo
    Plant15 Wheat: AutoHarvest=true; CropType=Wheat
    Report HarvestReport: EventNames=[Wheat].Harvesting; ResultsPerPage=0
      VariableNames:
        [Clock].Today
        [Zone].Area
        Distance
        [Wheat].AboveGround.Wt as BiomassWt
        [Wheat].Grain.Wt as GrainWt
        [Wheat].Grain.Size as GrainSize
        [Wheat].Grain.GrainNo as GrainNumber
  DataStore
    ExcelInput Observed: FileName=Observed.xlsx; SheetNames=[ObservedWarraBlock1]
    ExcelInput ObservedMoora: FileName=Observed.xlsx; SheetNames=[Moora, MooraET]
    PredictedObserved: PredictedTableName=DailyReport; ObservedTableName=ObservedWarraBlock1; FieldNameUsedForMatch=ZoneName; FieldName2UsedForMatch=Date
    PredictedObserved PredictedObservedMoora: PredictedTableName=DailyReport; ObservedTableName=Moora; FieldNameUsedForMatch=ZoneName; FieldName2UsedForMatch=Date
  Folder Validation
    Folder Warra
      Memo
        This test evaluates the performance of the APSIM AgroforestrySystem model in simulating the crop and soil water data for the data of [HuthPhD2010].  Monitoring of tree-crop competition was undertaken on a farm near the township of Warra, Qld (26.93<sup>o</sup>S, 150.93<sup>o</sup>E), where a belt of four rows of Eucalyptus argophloia Blakely at approximately 5 x 5 m spacing had been planted along the edge of fields used to grow wheat (*Triticum aestivum* L.), cotton (*Gossypium hirsutum* L.) and chickpeas (*Cicer arietinum* L.).  The trees were about 7 years old and nearly 10 m high at the start of the study. Tree-crop competition was monitored over 3 cropping seasons (two winters and one summer).  Agronomic management in the 2 cropping bays varied as they were at different stages of a cropping rotation.  The bay used in this model test was sown to wheat in the winter of 2004 and remained fallow during the ensuing summer and winter growing seasons.   Prior to harvest of the crop, plant samples were taken from quadrats consisting of 1 m of a plant row in 5 linear transects out to 50 m from the shelterbelt [HuthRobertsonPoulton2010].  Germination failure was significant next to the trees and so the positioning of samples was chosen to account for this (25m, 30m, 35m, 40m 50m).  The monitoring of soil moisture and its extraction by both trees and crops was undertaken using electromagnetic induction measurements [HuthPoulton2007] taken at 5 m intervals in four 50 m transects from the belt of trees.

        The simulations have been developed using data from various sources.  Rainfall data was obtained from an Australian Bureau of Meteorology rainfall station (No. 41291) situated on a farm 4.1 km from the study site. The soil properties have been developed using the data of [HuthRobertsonPoulton2010].
      Simulation Warra: Area=0; Slope=0
        Clock: StartDate=2004-03-22; EndDate=2005-10-04
        Summary SummaryFile
        Weather: FileName=Validation\warra.met
        SoilArbitrator Soil Arbitrator
        AgroforestrySystem WindbreakSystem: Area=0.55; Slope=0; RainfallInterceptionFraction=0; RainShaddowWidth=0
          Manager SowingRule
            SowDate = 26/06/2004
            CultivarName = h45
            SowingDepth = 30
            RowSpacing = 250
            Population = 120
            Amount = 60
            CropName = wheat
```csharp
using System;
using System.Collections.Generic;
using Models.Core;
using Models.Agroforestry;
using Models.PMF.OldPlant;
using Models.Soils;
using Models.Utilities;
using Models.Zones;
using APSIM.Shared.Utilities;

namespace Models
{
	[Serializable]
	public class Script : Model
	{
		[Link] Clock Clock;
		[Link] Summary Summary;
		
		[Description("Sowing date (d-mmm-yyyy)")]
		public string SowDate { get; set; }
		[Description("Cultivar to be sown")]
		public string CultivarName { get; set; }
		[Description("Sowing depth (mm)")]
		public double SowingDepth { get; set; }
		[Description("Row spacing (mm)")]
		public double RowSpacing { get; set; }
		[Description("Plant population (/m2)")]
		public double Population { get; set; }
		[Description("Amount of fertiliser to be applied (kg/ha)")]
		public double Amount { get; set; }
		[Description("Crop to be fertilised")]
		public string CropName { get; set; }
		
		private List<IModel> Zones;
		private Plant15 Wheat;
		private Soil Soil;
		
		[EventSubscribe("Commencing")]
		private void OnSimulationCommencing(object sender, EventArgs e)
		{
			Zones = Apsim.FindAll(this, typeof(RectangularZone));
		}
		
		[EventSubscribe("DoManagement")]
		private void OnDoManagement(object sender, EventArgs e)
		{		
			if (DateUtilities.DMYtoDate(SowDate) == Clock.Today)
			{
			
				foreach (Zone z in Zones)
				{
					Wheat = Apsim.Find(z, typeof(Plant15)) as Plant15;	
					Soil = Apsim.Find(z, typeof(Soil)) as Soil;
							
					if (Wheat != null && Wheat.plant_status == "out")
					{
						Wheat.Sow(population: Population, cultivar: CultivarName, depth: SowingDepth, rowSpacing: RowSpacing);
						Fertiliser Fertiliser = Apsim.Find(Wheat.Parent, typeof(Fertiliser)) as Fertiliser;
						Fertiliser.Apply(Amount: Amount, Type: Fertiliser.Types.NO3N);
					}
					//else
					//	throw new ApsimXException(null, "Cannot sow wheat on that date");
				}
			}
		}
	}
}
```
          TreeProxy: RootRadius=0.02; NumberOfTrees=20; Kd=1E-07; BaseKL=0.01; KValue=0.5; heights=[10000, 10000, 10000, 10000, 10000]; NDemands=[0.1, 0.1, 0.1, 0.1, 0.1]; CanopyWidths=[0.1, 0.1, 0.1, 0.1, 0.1]; TreeLeafAreas=[0.1, 0.1, 0.1, 0.1, 0.1]
            Table=[[Parameter, 0, 0.5h, 1h, 1.5h, 2h, 2.5h, 3h, 4h, 5h, 6h], [Shade (%), Root Length Density (cm/cm3), Depth (cm), 0-5, 5-15, 15-30, 30-60, 60-90, 90-120, 120-150], [80, , , 3, 3, 2, 1, .5, .1, .1], [0, , , 2, 2, 1, .5, .5, .1, .1], [0, , , 1, 1, .5, .2, .1, .1, 0], [0, , , .1, .1, .1, .1, .1, .05, 0], [0, , , .02, .02, .02, .02, .01, 0, 0], [0, , , .01, .01, .01, 0, 0, 0, 0], [0, , , .01, .01, .01, 0, 0, 0, 0], [0, , , 0, 0, 0, 0, 0, 0, 0], [0, , , 0, 0, 0, 0, 0, 0, 0], [0, , , 0, 0, 0, 0, 0, 0, 0]]
            dates=[1900-01-01, 1900-03-01, 1900-06-01, 1900-09-01, 1900-12-31]
          Report TreeReport: EventNames=[Clock].DoReport; ResultsPerPage=0
            VariableNames:
              [Clock].Today
              [TreeProxy].WaterUptake
          RectangularZone TreeRow: Area=0.05; Slope=0; Length=100; Width=5
            LocalMicroClimate
            MicroClimate: air_pressure=1010; soil_emissivity=0.96; sun_angle=15; soil_heat_flux_fraction=0.4; night_interception_fraction=0.5; windspeed_default=3; refheight=2; albedo=0.15; emissivity=0.96; gsmax=0.01; r50=200; a_interception=0; b_interception=0; c_interception=0; d_interception=0; soil_albedo=0.23
            Report: ResultsPerPage=0
              VariableNames:
                [Clock].Today
                [Zone].Area
                Distance
                Radn
                [LocalMicroClimate].Radn
                [TreeProxy].Shade
            Report DailyReport: EventNames=[Clock].DoReport; ResultsPerPage=0
              VariableNames:
                [Clock].Today
                Distance
                LocalMicroClimate.Wind
                sum([Soil].NO3N) as TotalNO3N
                sum([Soil].NH4N) as TotalNH4N
                sum([TreeProxy].WaterUptake) as WaterUptake
                sum([Soil].SoilWater.SWmm[1:5]) as SW90cm
                [TreeProxy].Urel
                [TreeProxy].H
                [TreeProxy].SWDemand
                [TreeProxy].heightToday
                [MicroClimate].peta
                [MicroClimate].petr
                [Soil].SoilWater.Eo
                [TreeProxy].WaterStress
                [Soil].SoilWater.SW[1] as SurfaceSW
            Fertiliser
            SurfaceOrganicMatter: PoolName=wheat_stubble; type=wheat; mass=500; standing_fraction=0; cnr=100; CriticalResidueWeight=2000; OptimumDecompTemp=20; MaxCumulativeEOS=20; CNRatioDecompCoeff=0.277; CNRatioDecompThreshold=25; TotalLeachRain=25; MinRainToLeach=10; CriticalMinimumOrganicC=0.004; DefaultCPRatio=0; DefaultStandingFraction=0; StandingExtinctCoeff=0.5; FractionFaecesAdded=0.5
              Pools:
                {PoolName=wheat_stubble, ResidueType=wheat, Mass=500, CNRatio=100, StandingFraction=0}
              ResidueTypes: LoadFromResource=ResidueTypes
            Soil: ASCOrder=Vertosol; ASCSubOrder=Grey; SoilType=Clay; Site=Warra; NearestTown=Warra, Q, 4411; Region=Darling Downs and Granite Belt; State=Queensland; Country=Australia; NaturalVegetation=Brigalow scrub; ApsoilNumber=19; Latitude=-26.897; Longitude=150.909; LocationAccuracy=+/- 20m; DataSource=0; Comments=CSIRO Sustainable Ecosystems, Toowoomba
              Water
                Thickness  BD    AirDry  LL15  DUL   SAT   KS
                50         1.39  0.06    0.18  0.4   0.45  20
                100        1.39  0.1     0.18  0.4   0.45  20
                150        1.35  0.17    0.19  0.41  0.46  20
                300        1.35  0.17    0.19  0.41  0.46  20
                300        1.43  0.17    0.2   0.38  0.43  20
                300        1.44  0.17    0.23  0.38  0.43  20
                300        1.45  0.17    0.25  0.37  0.42  20
              SoilWater: same as Replacements.SoilX.SoilWater
              SoilNitrogen: fom_type=[default, manure, mucuna, lablab, shemp, stable]; fract_carb=[0.2, 0.3, 0.54, 0.57, 0.45, 0]; fract_cell=[0.7, 0.3, 0.37, 0.37, 0.47, 0.1]; fract_lign=[0.1, 0.4, 0.09, 0.06, 0.08, 0.9]; wfpsN2N2O_x=[22, 88]; wfpsN2N2O_y=[0.1, 1]
              SoilOrganicMatter: same as Replacements.SoilX.SoilOrganicMatter
              Analysis: Thickness=[150, 150, 300, 300, 300, 300]; PH=[8, 8, 8, 8, 8, 8]; PHUnits=Water; BoronUnits=HotWater
              Sample InitialN: NO3Units=ppm; NH4Units=ppm; SWUnits=Volumetric; OCUnits=Total; PHUnits=Water
                Thickness  NO3  NH4
                150        1    0.1
                150        1    0.1
                300        1    0.1
                300        1    0.1
                300        1    0.1
                300        1    0.1
              Fertiliser
              Sample: NO3Units=ppm; NH4Units=ppm; SWUnits=Volumetric; OCUnits=Total; PHUnits=Water
                Thickness  NO3  NH4  SW
                50         1    0.1  0.2
                100        1    0.1  0.3
                150        1    0.1  0.29
                300        1    0.1  0.28
                300        1    0.1  0.26
                300        1    0.1  0.26
                300        1    0.1  0.29
          RectangularZone 5m: Area=0.05; Slope=0; Length=100; Width=5
            LocalMicroClimate
            MicroClimate: same as Validation.Warra.Warra.WindbreakSystem.TreeRow.MicroClimate
            Report HarvestReport: EventNames=[Wheat].Harvesting; ResultsPerPage=0
              VariableNames:
                [Clock].Today
                [Zone].Area
                Distance
                [Wheat].AboveGround.Wt as BiomassWt
                [Wheat].Grain.Wt as GrainWt
                [Wheat].Grain.Size as GrainSize
                [Wheat].Grain.GrainNo as GrainNumber
            Report DailyReport: EventNames=[Clock].DoReport; ResultsPerPage=0
              VariableNames:
                [Clock].Today
                Distance
                LocalMicroClimate.Wind
                sum([Soil].SoilWater.SWmm[1:4]) as SW90cm
                sum([Soil].NO3N) as TotalNO3N
                sum([Soil].NH4N) as TotalNH4N
                [MicroClimate].peta
                [MicroClimate].petr
                [Wheat].AboveGround.Wt as BiomassWt
                [Wheat].Grain.Wt as GrainWt
                [Soil].SoilWater.SW[1] as SurfaceSW
            Fertiliser
            SurfaceOrganicMatter: same as Validation.Warra.Warra.WindbreakSystem.TreeRow.SurfaceOrganicMatter
            Soil: ASCOrder=Vertosol; ASCSubOrder=Grey; SoilType=Clay; Site=Warra; NearestTown=Warra, Q, 4411; Region=Darling Downs and Granite Belt; State=Queensland; Country=Australia; NaturalVegetation=Brigalow scrub; ApsoilNumber=19; Latitude=-26.897; Longitude=150.909; LocationAccuracy=+/- 20m; DataSource=0; Comments=CSIRO Sustainable Ecosystems, Toowoomba
              Water
                Thickness  BD    AirDry  LL15  DUL   SAT
                50         1.39  0.06    0.18  0.4   0.45
                100        1.39  0.1     0.18  0.4   0.45
                150        1.35  0.17    0.19  0.41  0.46
                300        1.35  0.17    0.19  0.41  0.46
                300        1.43  0.17    0.2   0.38  0.43
                300        1.44  0.17    0.23  0.38  0.43
                300        1.45  0.17    0.25  0.37  0.42
                SoilCrop WheatSoil: LL=[0.18, 0.18, 0.19, 0.19, 0.2, 0.23, 0.25]; KL=[0.06, 0.06, 0.06, 0.06, 0.06, 0.06, 0.06]; XF=[1, 1, 1, 1, 1, 1, 1]
              SoilWater: same as Replacements.SoilX.SoilWater
              SoilNitrogen: fom_type=[default, manure, mucuna, lablab, shemp, stable]; fract_carb=[0.2, 0.3, 0.54, 0.57, 0.45, 0]; fract_cell=[0.7, 0.3, 0.37, 0.37, 0.47, 0.1]; fract_lign=[0.1, 0.4, 0.09, 0.06, 0.08, 0.9]; wfpsN2N2O_x=[22, 88]; wfpsN2N2O_y=[0.1, 1]
              SoilOrganicMatter: same as Replacements.SoilX.SoilOrganicMatter
              Analysis: Thickness=[150, 150, 300, 300, 300, 300]; PH=[8, 8, 8, 8, 8, 8]; PHUnits=Water; BoronUnits=HotWater
              Sample: NO3Units=ppm; NH4Units=ppm; SWUnits=Volumetric; OCUnits=Total; PHUnits=Water
                Thickness  NO3  NH4  SW
                50         1    0.1  0.2
                100        1    0.1  0.25
                150        1    0.1  0.28
                300        1    0.1  0.3
                300        1    0.1  0.31
                300        1    0.1  0.3
                300        1    0.1  0.3
            Plant15 Wheat: AutoHarvest=true; CropType=Wheat
          RectangularZone 10m: Area=0.05; Slope=0; Length=100; Width=5
            LocalMicroClimate
            MicroClimate: same as Validation.Warra.Warra.WindbreakSystem.TreeRow.MicroClimate
            Report HarvestReport: EventNames=[Wheat].Harvesting; ResultsPerPage=0
              VariableNames:
                [Clock].Today
                [Zone].Area
                Distance
                [Wheat].AboveGround.Wt as BiomassWt
                [Wheat].Grain.Wt as GrainWt
                [Wheat].Grain.Size as GrainSize
                [Wheat].Grain.GrainNo as GrainNumber
            Report DailyReport: same as Validation.Warra.Warra.WindbreakSystem.5m.DailyReport
            Fertiliser
            SurfaceOrganicMatter: same as Validation.Warra.Warra.WindbreakSystem.TreeRow.SurfaceOrganicMatter
            Soil: ASCOrder=Vertosol; ASCSubOrder=Grey; SoilType=Clay; Site=Warra; NearestTown=Warra, Q, 4411; Region=Darling Downs and Granite Belt; State=Queensland; Country=Australia; NaturalVegetation=Brigalow scrub; ApsoilNumber=19; Latitude=-26.897; Longitude=150.909; LocationAccuracy=+/- 20m; DataSource=0; Comments=CSIRO Sustainable Ecosystems, Toowoomba
              Water: same as Validation.Warra.Warra.WindbreakSystem.5m.Soil.Water
              SoilWater: same as Replacements.SoilX.SoilWater
              SoilNitrogen: fom_type=[default, manure, mucuna, lablab, shemp, stable]; fract_carb=[0.2, 0.3, 0.54, 0.57, 0.45, 0]; fract_cell=[0.7, 0.3, 0.37, 0.37, 0.47, 0.1]; fract_lign=[0.1, 0.4, 0.09, 0.06, 0.08, 0.9]; wfpsN2N2O_x=[22, 88]; wfpsN2N2O_y=[0.1, 1]
              SoilOrganicMatter: same as Replacements.SoilX.SoilOrganicMatter
              Analysis: Thickness=[150, 150, 300, 300, 300, 300]; PH=[8, 8, 8, 8, 8, 8]; PHUnits=Water; BoronUnits=HotWater
              Sample: NO3Units=ppm; NH4Units=ppm; SWUnits=Volumetric; OCUnits=Total; PHUnits=Water
                Thickness  NO3  NH4  SW
                50         1    0.1  0.2
                100        1    0.1  0.3
                150        1    0.1  0.35
                300        1    0.1  0.33
                300        1    0.1  0.3
                300        1    0.1  0.26
                300        1    0.1  0.29
            Plant15 Wheat: AutoHarvest=true; CropType=Wheat
          RectangularZone 15m: Area=0.05; Slope=0; Length=100; Width=5
            LocalMicroClimate
            MicroClimate: same as Validation.Warra.Warra.WindbreakSystem.TreeRow.MicroClimate
            Report HarvestReport: EventNames=[Wheat].Harvesting; ResultsPerPage=0
              VariableNames:
                [Clock].Today
                [Zone].Area
                Distance
                [Wheat].AboveGround.Wt as BiomassWt
                [Wheat].Grain.Wt as GrainWt
                [Wheat].Grain.Size as GrainSize
                [Wheat].Grain.GrainNo as GrainNumber
            Report DailyReport: same as Validation.Warra.Warra.WindbreakSystem.5m.DailyReport
            Fertiliser
            SurfaceOrganicMatter: same as Validation.Warra.Warra.WindbreakSystem.TreeRow.SurfaceOrganicMatter
            Soil: ASCOrder=Vertosol; ASCSubOrder=Grey; SoilType=Clay; Site=Warra; NearestTown=Warra, Q, 4411; Region=Darling Downs and Granite Belt; State=Queensland; Country=Australia; NaturalVegetation=Brigalow scrub; ApsoilNumber=19; Latitude=-26.897; Longitude=150.909; LocationAccuracy=+/- 20m; DataSource=0; Comments=CSIRO Sustainable Ecosystems, Toowoomba
              Water: same as Validation.Warra.Warra.WindbreakSystem.5m.Soil.Water
              SoilWater: same as Replacements.SoilX.SoilWater
              SoilNitrogen: fom_type=[default, manure, mucuna, lablab, shemp, stable]; fract_carb=[0.2, 0.3, 0.54, 0.57, 0.45, 0]; fract_cell=[0.7, 0.3, 0.37, 0.37, 0.47, 0.1]; fract_lign=[0.1, 0.4, 0.09, 0.06, 0.08, 0.9]; wfpsN2N2O_x=[22, 88]; wfpsN2N2O_y=[0.1, 1]
              SoilOrganicMatter: same as Replacements.SoilX.SoilOrganicMatter
              Analysis: Thickness=[150, 150, 300, 300, 300, 300]; PH=[8, 8, 8, 8, 8, 8]; PHUnits=Water; BoronUnits=HotWater
              Sample: NO3Units=ppm; NH4Units=ppm; SWUnits=Volumetric; OCUnits=Total; PHUnits=Water
                Thickness  NO3  NH4  SW
                50         1    0.1  0.2
                100        1    0.1  0.32
                150        1    0.1  0.34
                300        1    0.1  0.35
                300        1    0.1  0.38
                300        1    0.1  0.34
                300        1    0.1  0.32
            Plant15 Wheat: AutoHarvest=true; CropType=Wheat
          RectangularZone 20m: Area=0.1; Slope=0; Length=100; Width=10
            LocalMicroClimate
            MicroClimate: same as Validation.Warra.Warra.WindbreakSystem.TreeRow.MicroClimate
            Report HarvestReport: EventNames=[Wheat].Harvesting; ResultsPerPage=0
              VariableNames:
                [Clock].Today
                [Zone].Area
                Distance
                [Wheat].AboveGround.Wt as BiomassWt
                [Wheat].Grain.Wt as GrainWt
                [Wheat].Grain.Size as GrainSize
                [Wheat].Grain.GrainNo as GrainNumber
            Report DailyReport: same as Validation.Warra.Warra.WindbreakSystem.5m.DailyReport
            Fertiliser
            SurfaceOrganicMatter: same as Validation.Warra.Warra.WindbreakSystem.TreeRow.SurfaceOrganicMatter
            Soil: ASCOrder=Vertosol; ASCSubOrder=Grey; SoilType=Clay; Site=Warra; NearestTown=Warra, Q, 4411; Region=Darling Downs and Granite Belt; State=Queensland; Country=Australia; NaturalVegetation=Brigalow scrub; ApsoilNumber=19; Latitude=-26.897; Longitude=150.909; LocationAccuracy=+/- 20m; DataSource=0; Comments=CSIRO Sustainable Ecosystems, Toowoomba
              Water: same as Validation.Warra.Warra.WindbreakSystem.5m.Soil.Water
              SoilWater: same as Replacements.SoilX.SoilWater
              SoilNitrogen: fom_type=[default, manure, mucuna, lablab, shemp, stable]; fract_carb=[0.2, 0.3, 0.54, 0.57, 0.45, 0]; fract_cell=[0.7, 0.3, 0.37, 0.37, 0.47, 0.1]; fract_lign=[0.1, 0.4, 0.09, 0.06, 0.08, 0.9]; wfpsN2N2O_x=[22, 88]; wfpsN2N2O_y=[0.1, 1]
              SoilOrganicMatter: same as Replacements.SoilX.SoilOrganicMatter
              Analysis: Thickness=[150, 150, 300, 300, 300, 300]; PH=[8, 8, 8, 8, 8, 8]; PHUnits=Water; BoronUnits=HotWater
              Sample: NO3Units=ppm; NH4Units=ppm; SWUnits=Volumetric; OCUnits=Total; PHUnits=Water
                Thickness  NO3  NH4  SW
                50         1    0.1  0.32
                100        1    0.1  0.32
                150        1    0.1  0.39
                300        1    0.1  0.39
                300        1    0.1  0.38
                300        1    0.1  0.36
                300        1    0.1  0.35
            Plant15 Wheat: AutoHarvest=true; CropType=Wheat
          RectangularZone 30m: Area=0.05; Slope=0; Length=100; Width=5
            LocalMicroClimate
            MicroClimate: same as Validation.Warra.Warra.WindbreakSystem.TreeRow.MicroClimate
            Report HarvestReport: EventNames=[Wheat].Harvesting; ResultsPerPage=0
              VariableNames:
                [Clock].Today
                [Zone].Area
                Distance
                [Wheat].AboveGround.Wt as BiomassWt
                [Wheat].Grain.Wt as GrainWt
                [Wheat].Grain.Size as GrainSize
                [Wheat].Grain.GrainNo as GrainNumber
            Report DailyReport: same as Validation.Warra.Warra.WindbreakSystem.5m.DailyReport
            Fertiliser
            SurfaceOrganicMatter: same as Validation.Warra.Warra.WindbreakSystem.TreeRow.SurfaceOrganicMatter
            Soil: ASCOrder=Vertosol; ASCSubOrder=Grey; SoilType=Clay; Site=Warra; NearestTown=Warra, Q, 4411; Region=Darling Downs and Granite Belt; State=Queensland; Country=Australia; NaturalVegetation=Brigalow scrub; ApsoilNumber=19; Latitude=-26.897; Longitude=150.909; LocationAccuracy=+/- 20m; DataSource=0; Comments=CSIRO Sustainable Ecosystems, Toowoomba
              Water: same as Validation.Warra.Warra.WindbreakSystem.5m.Soil.Water
              SoilWater: same as Replacements.SoilX.SoilWater
              SoilNitrogen: fom_type=[default, manure, mucuna, lablab, shemp, stable]; fract_carb=[0.2, 0.3, 0.54, 0.57, 0.45, 0]; fract_cell=[0.7, 0.3, 0.37, 0.37, 0.47, 0.1]; fract_lign=[0.1, 0.4, 0.09, 0.06, 0.08, 0.9]; wfpsN2N2O_x=[22, 88]; wfpsN2N2O_y=[0.1, 1]
              SoilOrganicMatter: same as Replacements.SoilX.SoilOrganicMatter
              Analysis: Thickness=[150, 150, 300, 300, 300, 300]; PH=[8, 8, 8, 8, 8, 8]; PHUnits=Water; BoronUnits=HotWater
              Sample: NO3Units=ppm; NH4Units=ppm; SWUnits=Volumetric; OCUnits=Total; PHUnits=Water
                Thickness  NO3  NH4  SW
                50         1    0.1  0.32
                100        1    0.1  0.32
                150        1    0.1  0.34
                300        1    0.1  0.35
                300        1    0.1  0.38
                300        1    0.1  0.34
                300        1    0.1  0.32
            Plant15 Wheat: AutoHarvest=true; CropType=Wheat
          RectangularZone 40m: Area=0.1; Slope=0; Length=100; Width=10
            LocalMicroClimate
            MicroClimate: same as Validation.Warra.Warra.WindbreakSystem.TreeRow.MicroClimate
            Report HarvestReport: EventNames=[Wheat].Harvesting; ResultsPerPage=0
              VariableNames:
                [Clock].Today
                [Zone].Area
                Distance
                [Wheat].AboveGround.Wt as BiomassWt
                [Wheat].Grain.Wt as GrainWt
                [Wheat].Grain.Size as GrainSize
                [Wheat].Grain.GrainNo as GrainNumber
            Report DailyReport: same as Validation.Warra.Warra.WindbreakSystem.5m.DailyReport
            Fertiliser
            SurfaceOrganicMatter: same as Validation.Warra.Warra.WindbreakSystem.TreeRow.SurfaceOrganicMatter
            Soil: same as Validation.Warra.Warra.WindbreakSystem.30m.Soil
            Plant15 Wheat: AutoHarvest=true; CropType=Wheat
          RectangularZone 50m: same as Validation.Warra.Warra.WindbreakSystem.40m
    Folder Moora
      Simulation Moora: Area=0; Slope=0
        Clock: StartDate=1996-09-17; EndDate=1997-12-31
        Summary SummaryFile
        Weather: FileName=moora.met
        SoilArbitrator Soil Arbitrator
        AgroforestrySystem WindbreakSystem: Area=0.185; Slope=0; RainfallInterceptionFraction=0.1; RainShaddowWidth=1
          TreeProxy: RootRadius=0.02; NumberOfTrees=143; Kd=1E-07; BaseKL=0.05; KValue=0.5; dates=[1996-06-20, 1997-06-08, 1998-05-06]; heights=[4000, 4000, 4000]; NDemands=[0.1, 0.1, 0.1]; CanopyWidths=[0.4, 0.85, 1.25]; TreeLeafAreas=[0.1, 0.1, 0.1]
            Table=[[Parameter, 0, 0.5h, 1h, 1.5h, 2h, 2.5h, 3h, 4h, 5h, 6h], [Shade (%), Root Length Density (cm/cm3), Depth (cm), 0-10, 10-20, 20-30, 30-60, 60-90, 90-120, 120-150, 150-200, 200-250, 250-300, 300-370], [100, , , 1, 1, 1, 1, 1, 1, 1, 1, 1, 1, 1], [100, , , 1, 1, 1, 1, .5, .5, .5, .3, .3, .2, .2], [0, , , 1, 1, 1, 1, .5, .5, .5, 0, 0, 0, 0], [0, , , 1, 1, 1, 1, .5, .5, .5, 0, 0, 0, 0], [0, , , 1, 1, 1, 1, .5, .5, .5, 0, 0, 0, 0], [0, , , 1, 1, 1, 1, .5, .5, .5, 0, 0, 0, 0], [0, , , 1, 1, 1, 1, .5, .5, .5, 0, 0, 0, 0], [0, , , 1, 1, 1, 1, .5, .5, .5, 0, 0, 0, 0], [0, , , 1, 1, 1, 1, .5, .5, .5, 0, 0, 0, 0], [0, , , 0, 0, 0, 0, 0, 0, 0, 0, 0, 0, 0]]
          Report TreeReport: EventNames=[Clock].DoReport; ResultsPerPage=0
            VariableNames:
              [Clock].Today
              [TreeProxy].TreeWaterUptake
              [TreeProxy].IndividualTreeWaterDemand
              [TreeProxy].IndividualTreeWaterUptake
          RectangularZone TreeRow: Area=0.005; Slope=0; Length=100; Width=0.5
            LocalMicroClimate
            MicroClimate: same as Validation.Warra.Warra.WindbreakSystem.TreeRow.MicroClimate
            Report: ResultsPerPage=0
              VariableNames:
                [Clock].Today
                [Zone].Area
                Distance
                Radn
                [LocalMicroClimate].Radn
                [TreeProxy].Shade
            Report DailyReport: same as Validation.Warra.Warra.WindbreakSystem.TreeRow.DailyReport
            Fertiliser
            SurfaceOrganicMatter: same as Validation.Warra.Warra.WindbreakSystem.TreeRow.SurfaceOrganicMatter
            Soil: ASCOrder=Vertosol; ASCSubOrder=Grey; SoilType=Clay; Site=Warra; NearestTown=Warra, Q, 4411; Region=Darling Downs and Granite Belt; State=Queensland; Country=Australia; NaturalVegetation=Brigalow scrub; ApsoilNumber=19; Latitude=-26.897; Longitude=150.909; LocationAccuracy=+/- 20m; DataSource=0; Comments=CSIRO Sustainable Ecosystems, Toowoomba
              Water
                Thickness  BD   AirDry  LL15  DUL   SAT   KS
                100        1.8  0.01    0.02  0.08  0.32  200
                100        1.8  0.01    0.02  0.08  0.32  200
                100        1.8  0.01    0.02  0.08  0.32  200
                300        1.8  0.01    0.02  0.08  0.32  200
                300        1.8  0.01    0.02  0.08  0.32  200
                300        1.8  0.01    0.02  0.08  0.32  200
                300        1.8  0.01    0.02  0.08  0.32  200
                500        1.8  0.01    0.02  0.07  0.32  200
                500        1.8  0.01    0.02  0.07  0.32  200
                500        1.8  0.01    0.02  0.07  0.32  200
                700        1.8  0.01    0.02  0.07  0.32  200
              SoilWater: residueinterception=0; SummerDate=1-Nov; SummerU=4; SummerCona=2; WinterDate=1-Apr; WinterU=4; WinterCona=2; DiffusConst=88; DiffusSlope=35; Salb=0.12; CN2Bare=60; CNRed=20; CNCov=0.8; max_pond=0; Thickness=[150, 150, 300, 300, 300, 2500]; SWCON=[0.7, 0.7, 0.7, 0.7, 0.7, 0.7]
              SoilNitrogen: fom_type=[default, manure, mucuna, lablab, shemp, stable]; fract_carb=[0.2, 0.3, 0.54, 0.57, 0.45, 0]; fract_cell=[0.7, 0.3, 0.37, 0.37, 0.47, 0.1]; fract_lign=[0.1, 0.4, 0.09, 0.06, 0.08, 0.9]; wfpsN2N2O_x=[22, 88]; wfpsN2N2O_y=[0.1, 1]
              SoilOrganicMatter: same as Replacements.SoilX.SoilOrganicMatter
              Analysis: Thickness=[150, 150, 300, 300, 300, 300]; PH=[8, 8, 8, 8, 8, 8]; PHUnits=Water; BoronUnits=HotWater
              Sample InitialN: NO3Units=ppm; NH4Units=ppm; SWUnits=Volumetric; OCUnits=Total; PHUnits=Water
                Thickness  NO3  NH4
                150        1    0.1
                150        1    0.1
                300        1    0.1
                300        1    0.1
                300        1    0.1
                300        1    0.1
              Fertiliser
              Sample: NO3Units=ppm; NH4Units=ppm; SWUnits=Volumetric; OCUnits=Total; PHUnits=Water
                Thickness  NO3  NH4  SW
                50         1    0.1  0.02
                100        1    0.1  0.02
                150        1    0.1  0.02
                300        1    0.1  0.03
                300        1    0.1  0.05
                300        1    0.1  0.06
                2500       1    0.1  0.07
          RectangularZone 1m: Area=0.01; Slope=0; Length=100; Width=1
            LocalMicroClimate
            MicroClimate: same as Validation.Warra.Warra.WindbreakSystem.TreeRow.MicroClimate
            Report DailyReport: same as Validation.Warra.Warra.WindbreakSystem.5m.DailyReport
            Fertiliser
            SurfaceOrganicMatter: same as Validation.Warra.Warra.WindbreakSystem.TreeRow.SurfaceOrganicMatter
            Soil: ASCOrder=Vertosol; ASCSubOrder=Grey; SoilType=Clay; Site=Warra; NearestTown=Warra, Q, 4411; Region=Darling Downs and Granite Belt; State=Queensland; Country=Australia; NaturalVegetation=Brigalow scrub; ApsoilNumber=19; Latitude=-26.897; Longitude=150.909; LocationAccuracy=+/- 20m; DataSource=0; Comments=CSIRO Sustainable Ecosystems, Toowoomba
              Water: same as Validation.Moora.Moora.WindbreakSystem.TreeRow.Soil.Water
              SoilWater: same as Validation.Moora.Moora.WindbreakSystem.TreeRow.Soil.SoilWater
              SoilNitrogen: fom_type=[default, manure, mucuna, lablab, shemp, stable]; fract_carb=[0.2, 0.3, 0.54, 0.57, 0.45, 0]; fract_cell=[0.7, 0.3, 0.37, 0.37, 0.47, 0.1]; fract_lign=[0.1, 0.4, 0.09, 0.06, 0.08, 0.9]; wfpsN2N2O_x=[22, 88]; wfpsN2N2O_y=[0.1, 1]
              SoilOrganicMatter: same as Replacements.SoilX.SoilOrganicMatter
              Analysis: Thickness=[150, 150, 300, 300, 300, 300]; PH=[8, 8, 8, 8, 8, 8]; PHUnits=Water; BoronUnits=HotWater
              Sample: NO3Units=ppm; NH4Units=ppm; SWUnits=Volumetric; OCUnits=Total; PHUnits=Water
                Thickness  NO3  NH4  SW
                50         1    0.1  0.02
                100        1    0.1  0.02
                150        1    0.1  0.02
                300        1    0.1  0.03
                300        1    0.1  0.05
                300        1    0.1  0.06
                2500       1    0.1  0.07
          RectangularZone 2m: Area=0.01; Slope=0; Length=100; Width=1
            LocalMicroClimate
            MicroClimate: same as Validation.Warra.Warra.WindbreakSystem.TreeRow.MicroClimate
            Report DailyReport: same as Validation.Warra.Warra.WindbreakSystem.5m.DailyReport
            Fertiliser
            SurfaceOrganicMatter: same as Validation.Warra.Warra.WindbreakSystem.TreeRow.SurfaceOrganicMatter
            Soil: ASCOrder=Vertosol; ASCSubOrder=Grey; SoilType=Clay; Site=Warra; NearestTown=Warra, Q, 4411; Region=Darling Downs and Granite Belt; State=Queensland; Country=Australia; NaturalVegetation=Brigalow scrub; ApsoilNumber=19; Latitude=-26.897; Longitude=150.909; LocationAccuracy=+/- 20m; DataSource=0; Comments=CSIRO Sustainable Ecosystems, Toowoomba
              Water: same as Validation.Moora.Moora.WindbreakSystem.TreeRow.Soil.Water
              SoilWater: same as Validation.Moora.Moora.WindbreakSystem.TreeRow.Soil.SoilWater
              SoilNitrogen: fom_type=[default, manure, mucuna, lablab, shemp, stable]; fract_carb=[0.2, 0.3, 0.54, 0.57, 0.45, 0]; fract_cell=[0.7, 0.3, 0.37, 0.37, 0.47, 0.1]; fract_lign=[0.1, 0.4, 0.09, 0.06, 0.08, 0.9]; wfpsN2N2O_x=[22, 88]; wfpsN2N2O_y=[0.1, 1]
              SoilOrganicMatter: same as Replacements.SoilX.SoilOrganicMatter
              Analysis: Thickness=[150, 150, 300, 300, 300, 300]; PH=[8, 8, 8, 8, 8, 8]; PHUnits=Water; BoronUnits=HotWater
              Sample: NO3Units=ppm; NH4Units=ppm; SWUnits=Volumetric; OCUnits=Total; PHUnits=Water
                Thickness  NO3  NH4  SW
                50         1    0.1  0.04
                100        1    0.1  0.04
                150        1    0.1  0.04
                300        1    0.1  0.06
                300        1    0.1  0.08
                300        1    0.1  0.08
                2500       1    0.1  0.07
          RectangularZone 3m: Area=0.01; Slope=0; Length=100; Width=1
            LocalMicroClimate
            MicroClimate: same as Validation.Warra.Warra.WindbreakSystem.TreeRow.MicroClimate
            Report DailyReport: same as Validation.Warra.Warra.WindbreakSystem.5m.DailyReport
            Fertiliser
            SurfaceOrganicMatter: same as Validation.Warra.Warra.WindbreakSystem.TreeRow.SurfaceOrganicMatter
            Soil: ASCOrder=Vertosol; ASCSubOrder=Grey; SoilType=Clay; Site=Warra; NearestTown=Warra, Q, 4411; Region=Darling Downs and Granite Belt; State=Queensland; Country=Australia; NaturalVegetation=Brigalow scrub; ApsoilNumber=19; Latitude=-26.897; Longitude=150.909; LocationAccuracy=+/- 20m; DataSource=0; Comments=CSIRO Sustainable Ecosystems, Toowoomba
              Water: same as Validation.Moora.Moora.WindbreakSystem.TreeRow.Soil.Water
              SoilWater: same as Validation.Moora.Moora.WindbreakSystem.TreeRow.Soil.SoilWater
              SoilNitrogen: fom_type=[default, manure, mucuna, lablab, shemp, stable]; fract_carb=[0.2, 0.3, 0.54, 0.57, 0.45, 0]; fract_cell=[0.7, 0.3, 0.37, 0.37, 0.47, 0.1]; fract_lign=[0.1, 0.4, 0.09, 0.06, 0.08, 0.9]; wfpsN2N2O_x=[22, 88]; wfpsN2N2O_y=[0.1, 1]
              SoilOrganicMatter: same as Replacements.SoilX.SoilOrganicMatter
              Analysis: Thickness=[150, 150, 300, 300, 300, 300]; PH=[8, 8, 8, 8, 8, 8]; PHUnits=Water; BoronUnits=HotWater
              Sample: NO3Units=ppm; NH4Units=ppm; SWUnits=Volumetric; OCUnits=Total; PHUnits=Water
                Thickness  NO3  NH4  SW
                50         1    0.1  0.08
                100        1    0.1  0.08
                150        1    0.1  0.08
                300        1    0.1  0.08
                300        1    0.1  0.08
                300        1    0.1  0.08
                2500       1    0.1  0.07
          RectangularZone 4m: same as Validation.Moora.Moora.WindbreakSystem.3m
          RectangularZone 5_5m: Area=0.02; Slope=0; Length=100; Width=2
            LocalMicroClimate
            MicroClimate: same as Validation.Warra.Warra.WindbreakSystem.TreeRow.MicroClimate
            Report DailyReport: same as Validation.Warra.Warra.WindbreakSystem.5m.DailyReport
            Fertiliser
            SurfaceOrganicMatter: same as Validation.Warra.Warra.WindbreakSystem.TreeRow.SurfaceOrganicMatter
            Soil: same as Validation.Moora.Moora.WindbreakSystem.3m.Soil
          RectangularZone 8m: Area=0.03; Slope=0; Length=100; Width=3
            LocalMicroClimate
            MicroClimate: same as Validation.Warra.Warra.WindbreakSystem.TreeRow.MicroClimate
            Report DailyReport: same as Validation.Warra.Warra.WindbreakSystem.5m.DailyReport
            Fertiliser
            SurfaceOrganicMatter: same as Validation.Warra.Warra.WindbreakSystem.TreeRow.SurfaceOrganicMatter
            Soil: same as Validation.Moora.Moora.WindbreakSystem.3m.Soil
          RectangularZone 11_5m: Area=0.04; Slope=0; Length=100; Width=4
            LocalMicroClimate
            MicroClimate: same as Validation.Warra.Warra.WindbreakSystem.TreeRow.MicroClimate
            Report DailyReport: same as Validation.Warra.Warra.WindbreakSystem.5m.DailyReport
            Fertiliser
            SurfaceOrganicMatter: same as Validation.Warra.Warra.WindbreakSystem.TreeRow.SurfaceOrganicMatter
            Soil: same as Validation.Moora.Moora.WindbreakSystem.3m.Soil
          RectangularZone 16m: Area=0.05; Slope=0; Length=100; Width=5
            LocalMicroClimate
            MicroClimate: same as Validation.Warra.Warra.WindbreakSystem.TreeRow.MicroClimate
            Report DailyReport: same as Validation.Warra.Warra.WindbreakSystem.5m.DailyReport
            Fertiliser
            SurfaceOrganicMatter: same as Validation.Warra.Warra.WindbreakSystem.TreeRow.SurfaceOrganicMatter
            Soil: same as Validation.Moora.Moora.WindbreakSystem.3m.Soil
    Folder Machakos
  Folder Sensibility Test
    Simulation South Australia: Area=0; Slope=0
      Clock: StartDate=2000-01-01; EndDate=2010-12-31
      Summary SummaryFile
      Weather: FileName=Roseworthy.met
      SoilArbitrator Soil Arbitrator
      AgroforestrySystem WindbreakSystem: Area=2.05; Slope=0; RainfallInterceptionFraction=0; RainShaddowWidth=0
        Manager SowingRule
          StartDate = 23-jun
          EndDate = 24-jun
          MinESW = 0
          ESWZoneName = 50m
          MinRain = 0
          RainDays = 7
          CultivarName = h45
          SowingDepth = 30
          RowSpacing = 250
          Population = 120
          Amount = 100
          CropName = wheat
```csharp
using System;
using System.Collections.Generic;
using Models.Core;
using Models.Agroforestry;
using Models.PMF.OldPlant;
using Models.Soils;
using Models.Utilities;
using Models.Zones;
using APSIM.Shared.Utilities;

namespace Models
{
	[Serializable]
	public class Script : Model
	{
		[Link] Clock Clock;
		[Link] Summary Summary;
		Accumulator accumulatedRain;
		
		[Description("Start of sowing window (d-mmm)")]
		public string StartDate { get; set; }
		[Description("End of sowing window (d-mmm)")]
		public string EndDate { get; set; }
		[Description("Minimum extractable soil water for sowing (mm)")]
		public double MinESW { get; set; }
		[Description("Name of Zone to use for minimum ESW condition")]
		public string ESWZoneName { get; set; }
		[Description("Accumulated rainfall required for sowing (mm)")]
		public double MinRain { get; set; }
		[Description("Duration of rainfall accumulation (d)")]
		public int RainDays { get; set; }
		[Description("Cultivar to be sown")]
		public string CultivarName { get; set; }
		[Description("Sowing depth (mm)")]
		public double SowingDepth { get; set; }
		[Description("Row spacing (mm)")]
		public double RowSpacing { get; set; }
		[Description("Plant population (/m2)")]
		public double Population { get; set; }
		[Description("Amount of fertiliser to be applied (kg/ha)")]
		public double Amount { get; set; }
		[Description("Crop to be fertilised")]
		public string CropName { get; set; }
		
		private Zone ESWZone;
		private List<IModel> Zones;
		private Plant15 Wheat;
		private Soil Soil;
		
		[EventSubscribe("Commencing")]
		private void OnSimulationCommencing(object sender, EventArgs e)
		{
			Zones = Apsim.FindAll(this, typeof(RectangularZone));
			foreach (Model m in Zones)
			{
				if (m.Name == ESWZoneName)
				{
					ESWZone = m as Zone;
					break;
				}
			}
			accumulatedRain = new Accumulator(this, "[Weather].Rain", RainDays);
		}
		
		[EventSubscribe("DoManagement")]
		private void OnDoManagement(object sender, EventArgs e)
		{		
			accumulatedRain.Update();
			
			Soil ESWSoil = Apsim.Find(ESWZone, typeof(Soil)) as Soil;
			
			foreach (Zone z in Zones)
			{
				Wheat = Apsim.Find(z, typeof(Plant15)) as Plant15;	
				Soil = Apsim.Find(z, typeof(Soil)) as Soil;
						
				if (Wheat != null && DateUtilities.WithinDates(StartDate, Clock.Today, EndDate) &&
				    Wheat.plant_status == "out" &&
				    ESWSoil.SoilWater.ESW >= MinESW &&
				    accumulatedRain.Sum >= MinRain)
				{
					Wheat.Sow(population: Population, cultivar: CultivarName, depth: SowingDepth, rowSpacing: RowSpacing);
					Fertiliser Fertiliser = Apsim.Find(Wheat.Parent, typeof(Fertiliser)) as Fertiliser;
					Fertiliser.Apply(Amount: Amount, Type: Fertiliser.Types.NO3N);
				}
			}
		}
	}
}
```
        TreeProxy: RootRadius=0.02; NumberOfTrees=20; Kd=1E-07; BaseKL=0.01; KValue=0; heights=[10000, 10000, 10000, 10000, 10000]; NDemands=[0.1, 0.1, 0.1, 0.1, 0.1]; CanopyWidths=[0.1, 0.1, 0.1, 0.1, 0.1]; TreeLeafAreas=[0.1, 0.1, 0.1, 0.1, 0.1]
          Table=[[Parameter, 0, 0.5h, 1h, 1.5h, 2h, 2.5h, 3h, 4h, 5h, 6h], [Shade (%), Root Length Density (cm/cm3), Depth (cm), 0-15, 15-30, 30-60, 60-90, 90-120, 120-150], [80, , , 3, 2, 1, .5, .1, .1], [0, , , 2, 1, .5, .5, .1, .1], [0, , , 1, .5, .2, .1, .1, 0], [0, , , .1, .1, .1, .1, .05, 0], [0, , , .02, .02, .02, .01, 0, 0], [0, , , .01, .01, 0, 0, 0, 0], [0, , , .01, .01, 0, 0, 0, 0], [0, , , 0, 0, 0, 0, 0, 0], [0, , , 0, 0, 0, 0, 0, 0], [0, , , 0, 0, 0, 0, 0, 0]]
          dates=[1900-01-01, 1900-03-01, 1900-06-01, 1900-09-01, 1900-12-31]
        RectangularZone TreeRow: Area=0.05; Slope=0; Length=100; Width=5
          LocalMicroClimate
          MicroClimate: same as Validation.Warra.Warra.WindbreakSystem.TreeRow.MicroClimate
          Report: ResultsPerPage=0
            VariableNames:
              [Clock].Today
              [Zone].Area
              Distance
              Radn
              [LocalMicroClimate].Radn
              [TreeProxy].Shade
          Report DailyReport: EventNames=[Clock].DoReport; ResultsPerPage=0
            VariableNames:
              [Clock].Today
              Distance
              LocalMicroClimate.Wind
              sum([Soil].NO3N) as TotalNO3N
              sum([Soil].NH4N) as TotalNH4N
              sum([TreeProxy].WaterUptake) as WaterUptake
              sum([Soil].SoilWater.SWmm[1:4]) as SW90cm
              [TreeProxy].Urel
              [TreeProxy].H
              [TreeProxy].SWDemand
              [TreeProxy].heightToday
              [MicroClimate].peta
              [MicroClimate].petr
              [Soil].SoilWater.Eo
              [TreeProxy].WaterStress
              [Soil].SoilWater.SW[1] as SurfaceSW
          Fertiliser
          SurfaceOrganicMatter: same as Validation.Warra.Warra.WindbreakSystem.TreeRow.SurfaceOrganicMatter
          Soil: ASCOrder=Vertosol; ASCSubOrder=Grey; SoilType=Clay; Site=Warra; NearestTown=Warra, Q, 4411; Region=Darling Downs and Granite Belt; State=Queensland; Country=Australia; NaturalVegetation=Brigalow scrub; ApsoilNumber=19; Latitude=-26.897; Longitude=150.909; LocationAccuracy=+/- 20m; DataSource=0; Comments=CSIRO Sustainable Ecosystems, Toowoomba
            Water
              Thickness  BD    AirDry  LL15  DUL   SAT   KS
              150        1.39  0.1     0.18  0.4   0.45  20
              150        1.35  0.168   0.19  0.41  0.46  20
              300        1.35  0.168   0.19  0.41  0.46  20
              300        1.43  0.168   0.2   0.38  0.43  20
              300        1.44  0.168   0.23  0.38  0.43  20
              300        1.45  0.168   0.25  0.37  0.42  20
            SoilWater: same as Replacements.SoilX.SoilWater
            SoilNitrogen: fom_type=[default, manure, mucuna, lablab, shemp, stable]; fract_carb=[0.2, 0.3, 0.54, 0.57, 0.45, 0]; fract_cell=[0.7, 0.3, 0.37, 0.37, 0.47, 0.1]; fract_lign=[0.1, 0.4, 0.09, 0.06, 0.08, 0.9]; wfpsN2N2O_x=[22, 88]; wfpsN2N2O_y=[0.1, 1]
            SoilOrganicMatter: same as Replacements.SoilX.SoilOrganicMatter
            Analysis: Thickness=[150, 150, 300, 300, 300, 300]; PH=[8, 8, 8, 8, 8, 8]; PHUnits=Water; BoronUnits=HotWater
            InitialWater: PercentMethod=FilledFromTop; FractionFull=0.33
            Sample InitialN: NO3Units=ppm; NH4Units=ppm; SWUnits=Volumetric; OCUnits=Total; PHUnits=Water
              Thickness  NO3  NH4
              150        1    0.1
              150        1    0.1
              300        1    0.1
              300        1    0.1
              300        1    0.1
              300        1    0.1
            Fertiliser
        RectangularZone 5m: Area=0.05; Slope=0; Length=100; Width=5
          LocalMicroClimate
          MicroClimate: same as Validation.Warra.Warra.WindbreakSystem.TreeRow.MicroClimate
          Report HarvestReport: EventNames=[Wheat].Harvesting; ResultsPerPage=0
            VariableNames:
              [Clock].Today
              [Zone].Area
              Distance
              [Wheat].AboveGround.Wt as BiomassWt
              [Wheat].Grain.Wt as GrainWt
              [Wheat].Grain.Size as GrainSize
              [Wheat].Grain.GrainNo as GrainNumber
          Report DailyReport: same as Validation.Warra.Warra.WindbreakSystem.5m.DailyReport
          Fertiliser
          SurfaceOrganicMatter: same as Validation.Warra.Warra.WindbreakSystem.TreeRow.SurfaceOrganicMatter
          Soil: ASCOrder=Vertosol; ASCSubOrder=Grey; SoilType=Clay; Site=Warra; NearestTown=Warra, Q, 4411; Region=Darling Downs and Granite Belt; State=Queensland; Country=Australia; NaturalVegetation=Brigalow scrub; ApsoilNumber=19; Latitude=-26.897; Longitude=150.909; LocationAccuracy=+/- 20m; DataSource=0; Comments=CSIRO Sustainable Ecosystems, Toowoomba
            Water
              Thickness  BD    AirDry  LL15  DUL   SAT
              150        1.39  0.1     0.18  0.4   0.45
              150        1.35  0.17    0.19  0.41  0.46
              300        1.35  0.17    0.19  0.41  0.46
              300        1.43  0.17    0.2   0.38  0.43
              300        1.44  0.17    0.23  0.38  0.43
              300        1.45  0.17    0.25  0.37  0.42
              SoilCrop WheatSoil: LL=[0.22, 0.21, 0.22, 0.24, 0.26, 0.34]; KL=[0.06, 0.06, 0.06, 0.04, 0.04, 0.02]; XF=[1, 1, 1, 1, 1, 1]
            SoilWater: same as Replacements.SoilX.SoilWater
            SoilNitrogen: fom_type=[default, manure, mucuna, lablab, shemp, stable]; fract_carb=[0.2, 0.3, 0.54, 0.57, 0.45, 0]; fract_cell=[0.7, 0.3, 0.37, 0.37, 0.47, 0.1]; fract_lign=[0.1, 0.4, 0.09, 0.06, 0.08, 0.9]; wfpsN2N2O_x=[22, 88]; wfpsN2N2O_y=[0.1, 1]
            SoilOrganicMatter: same as Replacements.SoilX.SoilOrganicMatter
            Analysis: Thickness=[150, 150, 300, 300, 300, 300]; PH=[8, 8, 8, 8, 8, 8]; PHUnits=Water; BoronUnits=HotWater
            InitialWater: PercentMethod=FilledFromTop; FractionFull=0.36
            Sample: NO3Units=ppm; NH4Units=ppm; SWUnits=Volumetric; OCUnits=Total; PHUnits=Water
              Thickness  NO3  NH4
              150        1    0.1
              150        1    0.1
              300        1    0.1
              300        1    0.1
              300        1    0.1
              300        1    0.1
          Plant15 Wheat: AutoHarvest=true; CropType=Wheat
        RectangularZone 10m: Area=0.05; Slope=0; Length=100; Width=5
          LocalMicroClimate
          MicroClimate: same as Validation.Warra.Warra.WindbreakSystem.TreeRow.MicroClimate
          Report HarvestReport: EventNames=[Wheat].Harvesting; ResultsPerPage=0
            VariableNames:
              [Clock].Today
              [Zone].Area
              Distance
              [Wheat].AboveGround.Wt as BiomassWt
              [Wheat].Grain.Wt as GrainWt
              [Wheat].Grain.Size as GrainSize
              [Wheat].Grain.GrainNo as GrainNumber
          Report DailyReport: same as Validation.Warra.Warra.WindbreakSystem.5m.DailyReport
          Fertiliser
          SurfaceOrganicMatter: same as Validation.Warra.Warra.WindbreakSystem.TreeRow.SurfaceOrganicMatter
          Soil: ASCOrder=Vertosol; ASCSubOrder=Grey; SoilType=Clay; Site=Warra; NearestTown=Warra, Q, 4411; Region=Darling Downs and Granite Belt; State=Queensland; Country=Australia; NaturalVegetation=Brigalow scrub; ApsoilNumber=19; Latitude=-26.897; Longitude=150.909; LocationAccuracy=+/- 20m; DataSource=0; Comments=CSIRO Sustainable Ecosystems, Toowoomba
            Water: same as Sensibility Test.South Australia.WindbreakSystem.5m.Soil.Water
            SoilWater: same as Replacements.SoilX.SoilWater
            SoilNitrogen: fom_type=[default, manure, mucuna, lablab, shemp, stable]; fract_carb=[0.2, 0.3, 0.54, 0.57, 0.45, 0]; fract_cell=[0.7, 0.3, 0.37, 0.37, 0.47, 0.1]; fract_lign=[0.1, 0.4, 0.09, 0.06, 0.08, 0.9]; wfpsN2N2O_x=[22, 88]; wfpsN2N2O_y=[0.1, 1]
            SoilOrganicMatter: same as Replacements.SoilX.SoilOrganicMatter
            Analysis: Thickness=[150, 150, 300, 300, 300, 300]; PH=[8, 8, 8, 8, 8, 8]; PHUnits=Water; BoronUnits=HotWater
            InitialWater: PercentMethod=FilledFromTop; FractionFull=0.39801
            Sample: NO3Units=ppm; NH4Units=ppm; SWUnits=Volumetric; OCUnits=Total; PHUnits=Water
              Thickness  NO3  NH4
              150        1    0.1
              150        1    0.1
              300        1    0.1
              300        1    0.1
              300        1    0.1
              300        1    0.1
          Plant15 Wheat: AutoHarvest=true; CropType=Wheat
        RectangularZone 15m: Area=0.05; Slope=0; Length=100; Width=5
          LocalMicroClimate
          MicroClimate: same as Validation.Warra.Warra.WindbreakSystem.TreeRow.MicroClimate
          Report HarvestReport: EventNames=[Wheat].Harvesting; ResultsPerPage=0
            VariableNames:
              [Clock].Today
              [Zone].Area
              Distance
              [Wheat].AboveGround.Wt as BiomassWt
              [Wheat].Grain.Wt as GrainWt
              [Wheat].Grain.Size as GrainSize
              [Wheat].Grain.GrainNo as GrainNumber
          Report DailyReport: same as Validation.Warra.Warra.WindbreakSystem.5m.DailyReport
          Fertiliser
          SurfaceOrganicMatter: same as Validation.Warra.Warra.WindbreakSystem.TreeRow.SurfaceOrganicMatter
          Soil: ASCOrder=Vertosol; ASCSubOrder=Grey; SoilType=Clay; Site=Warra; NearestTown=Warra, Q, 4411; Region=Darling Downs and Granite Belt; State=Queensland; Country=Australia; NaturalVegetation=Brigalow scrub; ApsoilNumber=19; Latitude=-26.897; Longitude=150.909; LocationAccuracy=+/- 20m; DataSource=0; Comments=CSIRO Sustainable Ecosystems, Toowoomba
            Water: same as Sensibility Test.South Australia.WindbreakSystem.5m.Soil.Water
            SoilWater: same as Replacements.SoilX.SoilWater
            SoilNitrogen: fom_type=[default, manure, mucuna, lablab, shemp, stable]; fract_carb=[0.2, 0.3, 0.54, 0.57, 0.45, 0]; fract_cell=[0.7, 0.3, 0.37, 0.37, 0.47, 0.1]; fract_lign=[0.1, 0.4, 0.09, 0.06, 0.08, 0.9]; wfpsN2N2O_x=[22, 88]; wfpsN2N2O_y=[0.1, 1]
            SoilOrganicMatter: same as Replacements.SoilX.SoilOrganicMatter
            Analysis: Thickness=[150, 150, 300, 300, 300, 300]; PH=[8, 8, 8, 8, 8, 8]; PHUnits=Water; BoronUnits=HotWater
            InitialWater: PercentMethod=FilledFromTop; FractionFull=0.58
            Sample: NO3Units=ppm; NH4Units=ppm; SWUnits=Volumetric; OCUnits=Total; PHUnits=Water
              Thickness  NO3  NH4
              150        1    0.1
              150        1    0.1
              300        1    0.1
              300        1    0.1
              300        1    0.1
              300        1    0.1
          Plant15 Wheat: AutoHarvest=true; CropType=Wheat
        RectangularZone 20m: Area=0.1; Slope=0; Length=100; Width=10
          LocalMicroClimate
          MicroClimate: same as Validation.Warra.Warra.WindbreakSystem.TreeRow.MicroClimate
          Report HarvestReport: EventNames=[Wheat].Harvesting; ResultsPerPage=0
            VariableNames:
              [Clock].Today
              [Zone].Area
              Distance
              [Wheat].AboveGround.Wt as BiomassWt
              [Wheat].Grain.Wt as GrainWt
              [Wheat].Grain.Size as GrainSize
              [Wheat].Grain.GrainNo as GrainNumber
          Report DailyReport: same as Validation.Warra.Warra.WindbreakSystem.5m.DailyReport
          Fertiliser
          SurfaceOrganicMatter: same as Validation.Warra.Warra.WindbreakSystem.TreeRow.SurfaceOrganicMatter
          Soil: ASCOrder=Vertosol; ASCSubOrder=Grey; SoilType=Clay; Site=Warra; NearestTown=Warra, Q, 4411; Region=Darling Downs and Granite Belt; State=Queensland; Country=Australia; NaturalVegetation=Brigalow scrub; ApsoilNumber=19; Latitude=-26.897; Longitude=150.909; LocationAccuracy=+/- 20m; DataSource=0; Comments=CSIRO Sustainable Ecosystems, Toowoomba
            Water: same as Sensibility Test.South Australia.WindbreakSystem.5m.Soil.Water
            SoilWater: same as Replacements.SoilX.SoilWater
            SoilNitrogen: fom_type=[default, manure, mucuna, lablab, shemp, stable]; fract_carb=[0.2, 0.3, 0.54, 0.57, 0.45, 0]; fract_cell=[0.7, 0.3, 0.37, 0.37, 0.47, 0.1]; fract_lign=[0.1, 0.4, 0.09, 0.06, 0.08, 0.9]; wfpsN2N2O_x=[22, 88]; wfpsN2N2O_y=[0.1, 1]
            SoilOrganicMatter: same as Replacements.SoilX.SoilOrganicMatter
            Analysis: Thickness=[150, 150, 300, 300, 300, 300]; PH=[8, 8, 8, 8, 8, 8]; PHUnits=Water; BoronUnits=HotWater
            InitialWater: PercentMethod=FilledFromTop; FractionFull=0.65
            Sample: NO3Units=ppm; NH4Units=ppm; SWUnits=Volumetric; OCUnits=Total; PHUnits=Water
              Thickness  NO3  NH4
              150        1    0.1
              150        1    0.1
              300        1    0.1
              300        1    0.1
              300        1    0.1
              300        1    0.1
          Plant15 Wheat: AutoHarvest=true; CropType=Wheat
        RectangularZone 30m: Area=0.05; Slope=0; Length=100; Width=5
          LocalMicroClimate
          MicroClimate: same as Validation.Warra.Warra.WindbreakSystem.TreeRow.MicroClimate
          Report HarvestReport: EventNames=[Wheat].Harvesting; ResultsPerPage=0
            VariableNames:
              [Clock].Today
              [Zone].Area
              Distance
              [Wheat].AboveGround.Wt as BiomassWt
              [Wheat].Grain.Wt as GrainWt
              [Wheat].Grain.Size as GrainSize
              [Wheat].Grain.GrainNo as GrainNumber
          Report DailyReport: same as Validation.Warra.Warra.WindbreakSystem.5m.DailyReport
          Fertiliser
          SurfaceOrganicMatter: same as Validation.Warra.Warra.WindbreakSystem.TreeRow.SurfaceOrganicMatter
          Soil: ASCOrder=Vertosol; ASCSubOrder=Grey; SoilType=Clay; Site=Warra; NearestTown=Warra, Q, 4411; Region=Darling Downs and Granite Belt; State=Queensland; Country=Australia; NaturalVegetation=Brigalow scrub; ApsoilNumber=19; Latitude=-26.897; Longitude=150.909; LocationAccuracy=+/- 20m; DataSource=0; Comments=CSIRO Sustainable Ecosystems, Toowoomba
            Water: same as Sensibility Test.South Australia.WindbreakSystem.5m.Soil.Water
            SoilWater: same as Replacements.SoilX.SoilWater
            SoilNitrogen: fom_type=[default, manure, mucuna, lablab, shemp, stable]; fract_carb=[0.2, 0.3, 0.54, 0.57, 0.45, 0]; fract_cell=[0.7, 0.3, 0.37, 0.37, 0.47, 0.1]; fract_lign=[0.1, 0.4, 0.09, 0.06, 0.08, 0.9]; wfpsN2N2O_x=[22, 88]; wfpsN2N2O_y=[0.1, 1]
            SoilOrganicMatter: same as Replacements.SoilX.SoilOrganicMatter
            Analysis: Thickness=[150, 150, 300, 300, 300, 300]; PH=[8, 8, 8, 8, 8, 8]; PHUnits=Water; BoronUnits=HotWater
            InitialWater: PercentMethod=FilledFromTop; FractionFull=0.63
            Sample: NO3Units=ppm; NH4Units=ppm; SWUnits=Volumetric; OCUnits=Total; PHUnits=Water
              Thickness  NO3  NH4
              150        1    0.1
              150        1    0.1
              300        1    0.1
              300        1    0.1
              300        1    0.1
              300        1    0.1
          Plant15 Wheat: AutoHarvest=true; CropType=Wheat
        RectangularZone 40m: Area=0.1; Slope=0; Length=100; Width=10
          LocalMicroClimate
          MicroClimate: same as Validation.Warra.Warra.WindbreakSystem.TreeRow.MicroClimate
          Report HarvestReport: EventNames=[Wheat].Harvesting; ResultsPerPage=0
            VariableNames:
              [Clock].Today
              [Zone].Area
              Distance
              [Wheat].AboveGround.Wt as BiomassWt
              [Wheat].Grain.Wt as GrainWt
              [Wheat].Grain.Size as GrainSize
              [Wheat].Grain.GrainNo as GrainNumber
          Report DailyReport: same as Validation.Warra.Warra.WindbreakSystem.5m.DailyReport
          Fertiliser
          SurfaceOrganicMatter: same as Validation.Warra.Warra.WindbreakSystem.TreeRow.SurfaceOrganicMatter
          Soil: ASCOrder=Vertosol; ASCSubOrder=Grey; SoilType=Clay; Site=Warra; NearestTown=Warra, Q, 4411; Region=Darling Downs and Granite Belt; State=Queensland; Country=Australia; NaturalVegetation=Brigalow scrub; ApsoilNumber=19; Latitude=-26.897; Longitude=150.909; LocationAccuracy=+/- 20m; DataSource=0; Comments=CSIRO Sustainable Ecosystems, Toowoomba
            Water: same as Sensibility Test.South Australia.WindbreakSystem.5m.Soil.Water
            SoilWater: same as Replacements.SoilX.SoilWater
            SoilNitrogen: fom_type=[default, manure, mucuna, lablab, shemp, stable]; fract_carb=[0.2, 0.3, 0.54, 0.57, 0.45, 0]; fract_cell=[0.7, 0.3, 0.37, 0.37, 0.47, 0.1]; fract_lign=[0.1, 0.4, 0.09, 0.06, 0.08, 0.9]; wfpsN2N2O_x=[22, 88]; wfpsN2N2O_y=[0.1, 1]
            SoilOrganicMatter: same as Replacements.SoilX.SoilOrganicMatter
            Analysis: Thickness=[150, 150, 300, 300, 300, 300]; PH=[8, 8, 8, 8, 8, 8]; PHUnits=Water; BoronUnits=HotWater
            InitialWater: PercentMethod=FilledFromTop; FractionFull=0.56
            Sample: NO3Units=ppm; NH4Units=ppm; SWUnits=Volumetric; OCUnits=Total; PHUnits=Water
              Thickness  NO3  NH4
              150        1    0.1
              150        1    0.1
              300        1    0.1
              300        1    0.1
              300        1    0.1
              300        1    0.1
          Plant15 Wheat: AutoHarvest=true; CropType=Wheat
        RectangularZone 50m: Area=0.1; Slope=0; Length=100; Width=10
          LocalMicroClimate
          MicroClimate: same as Validation.Warra.Warra.WindbreakSystem.TreeRow.MicroClimate
          Report HarvestReport: EventNames=[Wheat].Harvesting; ResultsPerPage=0
            VariableNames:
              [Clock].Today
              [Zone].Area
              Distance
              [Wheat].AboveGround.Wt as BiomassWt
              [Wheat].Grain.Wt as GrainWt
              [Wheat].Grain.Size as GrainSize
              [Wheat].Grain.GrainNo as GrainNumber
          Report DailyReport: same as Validation.Warra.Warra.WindbreakSystem.5m.DailyReport
          Fertiliser
          SurfaceOrganicMatter: same as Validation.Warra.Warra.WindbreakSystem.TreeRow.SurfaceOrganicMatter
          Soil: ASCOrder=Vertosol; ASCSubOrder=Grey; SoilType=Clay; Site=Warra; NearestTown=Warra, Q, 4411; Region=Darling Downs and Granite Belt; State=Queensland; Country=Australia; NaturalVegetation=Brigalow scrub; ApsoilNumber=19; Latitude=-26.897; Longitude=150.909; LocationAccuracy=+/- 20m; DataSource=0; Comments=CSIRO Sustainable Ecosystems, Toowoomba
            Water
              Thickness  BD    AirDry  LL15  DUL   SAT
              150        1.39  0.1     0.18  0.4   0.45
              150        1.35  0.17    0.19  0.41  0.46
              300        1.35  0.17    0.19  0.41  0.46
              300        1.43  0.17    0.2   0.38  0.43
              300        1.44  0.17    0.23  0.38  0.43
              300        1.45  0.17    0.25  0.37  0.42
              SoilCrop WheatSoil: LL=[0.22, 0.21, 0.22, 0.24, 0.26, 0.34]; KL=[0.06, 0.06, 0.04, 0.03, 0.02, 0.01]; XF=[1, 1, 1, 1, 1, 1]
            SoilWater: same as Replacements.SoilX.SoilWater
            SoilNitrogen: fom_type=[default, manure, mucuna, lablab, shemp, stable]; fract_carb=[0.2, 0.3, 0.54, 0.57, 0.45, 0]; fract_cell=[0.7, 0.3, 0.37, 0.37, 0.47, 0.1]; fract_lign=[0.1, 0.4, 0.09, 0.06, 0.08, 0.9]; wfpsN2N2O_x=[22, 88]; wfpsN2N2O_y=[0.1, 1]
            SoilOrganicMatter: same as Replacements.SoilX.SoilOrganicMatter
            Analysis: Thickness=[150, 150, 300, 300, 300, 300]; PH=[8, 8, 8, 8, 8, 8]; PHUnits=Water; BoronUnits=HotWater
            InitialWater: PercentMethod=FilledFromTop; FractionFull=0.55
            Sample: NO3Units=ppm; NH4Units=ppm; SWUnits=Volumetric; OCUnits=Total; PHUnits=Water
              Thickness  NO3  NH4
              150        1    0.1
              150        1    0.1
              300        1    0.1
              300        1    0.1
              300        1    0.1
              300        1    0.1
          Plant15 Wheat: AutoHarvest=true; CropType=Wheat
        RectangularZone 75m: Area=0.25; Slope=0; Length=100; Width=25
          LocalMicroClimate
          MicroClimate: same as Validation.Warra.Warra.WindbreakSystem.TreeRow.MicroClimate
          Report HarvestReport: EventNames=[Wheat].Harvesting; ResultsPerPage=0
            VariableNames:
              [Clock].Today
              [Zone].Area
              Distance
              [Wheat].AboveGround.Wt as BiomassWt
              [Wheat].Grain.Wt as GrainWt
              [Wheat].Grain.Size as GrainSize
              [Wheat].Grain.GrainNo as GrainNumber
          Report DailyReport: same as Validation.Warra.Warra.WindbreakSystem.5m.DailyReport
          Fertiliser
          SurfaceOrganicMatter: same as Validation.Warra.Warra.WindbreakSystem.TreeRow.SurfaceOrganicMatter
          Soil: same as Sensibility Test.South Australia.WindbreakSystem.50m.Soil
          Plant15 Wheat: AutoHarvest=true; CropType=Wheat
        RectangularZone 100m: same as Sensibility Test.South Australia.WindbreakSystem.75m
        RectangularZone 150m: Area=0.5; Slope=0; Length=100; Width=50
          LocalMicroClimate
          MicroClimate: same as Validation.Warra.Warra.WindbreakSystem.TreeRow.MicroClimate
          Report HarvestReport: EventNames=[Wheat].Harvesting; ResultsPerPage=0
            VariableNames:
              [Clock].Today
              [Zone].Area
              Distance
              [Wheat].AboveGround.Wt as BiomassWt
              [Wheat].Grain.Wt as GrainWt
              [Wheat].Grain.Size as GrainSize
              [Wheat].Grain.GrainNo as GrainNumber
          Report DailyReport: same as Validation.Warra.Warra.WindbreakSystem.5m.DailyReport
          Fertiliser
          SurfaceOrganicMatter: same as Validation.Warra.Warra.WindbreakSystem.TreeRow.SurfaceOrganicMatter
          Soil: same as Sensibility Test.South Australia.WindbreakSystem.50m.Soil
          Plant15 Wheat: AutoHarvest=true; CropType=Wheat
        RectangularZone 200m: same as Sensibility Test.South Australia.WindbreakSystem.150m
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