Simulations: Version=2
  Replacements
    Report DailyReport: EventNames=[Clock].DoReport; ResultsPerPage=0
      VariableNames:
        [Clock].Today as Date
        Distance
        LocalMicroClimate.Wind
        [Soil].SoilWater.Es
        sum([Soil].NO3N) as TotalNO3N
        sum([Soil].NH4N) as TotalNH4N
        sum([TreeProxy].WaterUptake) as WaterUptake
        sum([Soil].SoilWater.SWmm[1:4]) as SW90cm
        [Soil].SoilWater.SW[2] as SW35cm
        [Soil].SoilWater.SW[3] as SW55cm
        [Soil].SoilWater.SW[4] as SW75cm
        [TreeProxy].Urel
        [TreeProxy].H
        [TreeProxy].SWDemand
        [TreeProxy].heightToday
        [MicroClimate].peta
        [MicroClimate].petr
        [Soil].SoilWater.Eo
        [TreeProxy].WaterStress
        [Soil].SoilWater.SW[1] as SurfaceSW
        [Maize].Leaf.Fw
        [Maize].Leaf.Photosynthesis.FVPD.Value()
        [Maize].Leaf.Photosynthesis.FT.Value()
        [Maize].Leaf.Fn
        [Maize].Root.Depth
    SurfaceOrganicMatter: PoolName=beanresidues; type=cowpea; mass=1000; standing_fraction=0; cnr=40; CriticalResidueWeight=2000; OptimumDecompTemp=20; MaxCumulativeEOS=20; CNRatioDecompCoeff=0.277; CNRatioDecompThreshold=25; TotalLeachRain=25; MinRainToLeach=10; CriticalMinimumOrganicC=0.004; DefaultCPRatio=0; DefaultStandingFraction=0; StandingExtinctCoeff=0.5; FractionFaecesAdded=0.5
      Pools:
        {PoolName=beanresidues, ResidueType=cowpea, Mass=1000, CNRatio=40, StandingFraction=0}
      ResidueTypes: LoadFromResource=ResidueTypes
    Plant Maize: CropType=Maize
    Soil: Site=ICRAF Machakos Research Station; NearestTown=Machakos; Country=Kenya; Latitude=-1.55; Longitude=37.13
      Water
        Thickness  BD    AirDry  LL15  DUL   SAT
        200        1.35  0.04    0.1   0.2   0.35
        200        1.35  0.14    0.1   0.2   0.35
        200        1.35  0.14    0.14  0.22  0.37
        200        1.4   0.15    0.17  0.24  0.37
        200        1.4   0.16    0.17  0.24  0.38
        200        1.4   0.16    0.17  0.24  0.38
        200        1.4   0.16    0.17  0.24  0.38
        200        1.4   0.16    0.17  0.24  0.38
        SoilCrop MaizeSoil: LL=[0.1, 0.1, 0.14, 0.17, 0.17, 0.17, 0.17, 0.17]; KL=[0.08, 0.08, 0.08, 0.08, 0.06, 0.04, 0.03, 0.02]; XF=[1, 1, 1, 1, 1, 1, 1, 1]
      SoilWater: residueinterception=0; SummerDate=1-Nov; SummerU=9; SummerCona=2.5; WinterDate=1-Apr; WinterU=9; WinterCona=2.5; DiffusConst=88; DiffusSlope=35.4; Salb=0.13; CN2Bare=65; CNRed=20; CNCov=0.8; max_pond=0; Thickness=[200, 1400]; SWCON=[0.7, 0.7]
      SoilNitrogen: fom_type=[default, manure, mucuna, lablab, shemp, stable]; fract_carb=[0.2, 0.3, 0.54, 0.57, 0.45, 0]; fract_cell=[0.7, 0.3, 0.37, 0.37, 0.47, 0.1]; fract_lign=[0.1, 0.4, 0.09, 0.06, 0.08, 0.9]; wfpsN2N2O_x=[22, 88]; wfpsN2N2O_y=[0.1, 1]
      SoilOrganicMatter: RootCN=45; RootWt=500; SoilCN=12; EnrACoeff=7.4; EnrBCoeff=0.2; OCUnits=Total
        Thickness  OC   FBiom  FInert
        200        1.1  0.04   0.4
        200        0.8  0.02   0.5
        200        0.6  0.01   0.8
        200        0.6  0.01   0.9
        200        0.2  0.01   0.95
        200        0.1  0.01   0.95
        200        0.1  0.01   0.99
        200        0.1  0.01   0.99
      Analysis: Thickness=[200, 200, 200, 200, 200, 200, 200, 200]; PH=[6.5, 6.5, 6.5, 6.5, 6.5, 6.5, 6.5, 6.5]; PHUnits=Water; BoronUnits=HotWater
      Sample: NO3Units=ppm; NH4Units=ppm; SWUnits=Volumetric; OCUnits=Total; PHUnits=Water
        Thickness  NO3  NH4  SW
        200        10   10   0.13
        200        5    5    0.13
        200        2    2    0.16
        200        1    1    0.176
        200        0.5  0.5  0.17
        200        0.5  0.5  0.17
        200        0.5  0.5  0.17
        200        0.5  0.5  0.17
  DataStore
    ExcelInput Observed: FileName=OdhiamboObserved.xlsx; SheetNames=[OBSCrop, OBSSW35cm, OBSSW55cm, OBSSW75cm]
    PredictedObserved PvO35cm: PredictedTableName=DailyReport; ObservedTableName=OBSSW35cm; FieldNameUsedForMatch=ZoneName; FieldName2UsedForMatch=Date
    PredictedObserved PvO55cm: PredictedTableName=DailyReport; ObservedTableName=OBSSW55cm; FieldNameUsedForMatch=ZoneName; FieldName2UsedForMatch=Date
    PredictedObserved PvO75cm: PredictedTableName=DailyReport; ObservedTableName=OBSSW75cm; FieldNameUsedForMatch=ZoneName; FieldName2UsedForMatch=Date
  Folder Grevillea
    Simulation Grevillea: Area=0; Slope=0
      Clock: StartDate=1996-03-01; EndDate=1997-12-31
      Summary SummaryFile
      Weather: FileName=Machakos1992-1998 PS1509020.met
      SoilArbitrator Soil Arbitrator
      AgroforestrySystem WindbreakSystem: Area=0.085; Slope=0
        Report TreeReport: EventNames=[Clock].DoReport; ResultsPerPage=0
          VariableNames:
            [Clock].Today
            [TreeProxy].heightToday
            [TreeProxy].LeafAreaToday
            [TreeProxy].CanopyWidthToday
        Manager Sowing1996
          SowDate = 13/03/1996
          CultivarName = Katumani
          SowingDepth = 30
          RowSpacing = 1000
          Population = 2.8
          Amount = 100
          CropName = Maize
```csharp
using System;
using System.Collections.Generic;
using Models.Core;
using Models.Agroforestry;
using Models.PMF;
using Models.Soils;
using Models.Utilities;
using Models.Zones;
using APSIM.Shared.Utilities;

namespace Models
{
	[Serializable]
	public class Script : Model
	{
		[Link] Clock Clock;
		[Link] Summary Summary;
		
		[Description("Sowing date (d-mmm-yyyy)")]
		public string SowDate { get; set; }
		[Description("Cultivar to be sown")]
		public string CultivarName { get; set; }
		[Description("Sowing depth (mm)")]
		public double SowingDepth { get; set; }
		[Description("Row spacing (mm)")]
		public double RowSpacing { get; set; }
		[Description("Plant population (/m2)")]
		public double Population { get; set; }
		[Description("Amount of fertiliser to be applied (kg/ha)")]
		public double Amount { get; set; }
		[Description("Crop to be fertilised")]
		public string CropName { get; set; }
		
		private List<IModel> Zones;
		private Plant Maize;
		private Soil Soil;
		
		[EventSubscribe("Commencing")]
		private void OnSimulationCommencing(object sender, EventArgs e)
		{
			Zones = Apsim.FindAll(this, typeof(RectangularZone));
		}
		
		[EventSubscribe("DoManagement")]
		private void OnDoManagement(object sender, EventArgs e)
		{		
			if (DateUtilities.DMYtoDate(SowDate) == Clock.Today)
			{
			
				foreach (Zone z in Zones)
				{
					Maize = Apsim.Find(z, typeof(Plant)) as Plant;	
					Soil = Apsim.Find(z, typeof(Soil)) as Soil;
							
					if (Maize != null)
					{
						Maize.Sow(population: Population, cultivar: CultivarName, depth: SowingDepth, rowSpacing: RowSpacing);
						Fertiliser Fertiliser = Apsim.Find(Maize.Parent, typeof(Fertiliser)) as Fertiliser;
						Fertiliser.Apply(Amount: Amount, Type: Fertiliser.Types.NO3N);
					}
					//else
					//	throw new ApsimXException(null, "Cannot sow Maize on that date");
				}
			}
		}
	}
}
```
        Manager Sowing1997
          SowDate = 02/04/1997
          CultivarName = Katumani
          SowingDepth = 30
          RowSpacing = 1000
          Population = 2.8
          Amount = 100
          CropName = Maize
          script: same as in Grevillea.Grevillea.WindbreakSystem.Sowing1996
        TreeProxy: RootRadius=0.02; Kd=1E-07; BaseKL=0.01; KValue=0; CanopyWidths=[2, 2, 2, 2, 2, 2, 2, 2, 2, 2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]; TreeLeafAreas=[2, 2, 2, 2, 2, 2, 2, 2, 2, 2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]
          Table=[[Parameter, 0, 0.5h, 1h, 1.5h, 2h, 2.5h, 3h, 4h, 5h, 6h], [Shade (%), Root Length Density (cm/cm3), Depth (cm), 0-20, 20-40, 40-60, 60-80, 80-100, 100-120, 120-140, 140-160], [80, , , 3, 2, 1, .5, .1, .1, .1, .1], [0, , , 2, 1, .5, .5, .1, .1, .1, .1], [0, , , 1, .5, .2, .1, .1, 0, 0, 0], [0, , , .5, .3, .2, .2, .05, 0, 0, 0], [0, , , .02, .02, .02, .01, 0, 0, 0, 0], [0, , , .01, .01, 0, 0, 0, 0, 0, 0], [0, , , .01, .01, 0, 0, 0, 0, 0, 0], [0, , , 0, 0, 0, 0, 0, 0, 0, 0], [0, , , 0, 0, 0, 0, 0, 0, 0, 0], [0, , , 0, 0, 0, 0, 0, 0, 0, 0]]
          dates=[1993-12-15, 1994-01-15, 1994-02-15, 1994-03-15, 1994-04-15, 1994-05-15, 1994-06-15, 1994-07-15, 1994-08-15, 1994-09-15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]
          heights=[921.532, 1164.66, 1332.5, 1613.06, 1912.55, 2268.62, 2567.99, 2641.61, 2621.22, 2713.55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]
          NDemands=[0.1, 0.1, 0.1, 0.1, 0.1, 0.1, 0.1, 0.1, 0.1, 0.1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]
        RectangularZone TreeRow: Area=0.005; Slope=0; Length=100; Width=0.5
          LocalMicroClimate
          MicroClimate: air_pressure=1010; soil_emissivity=0.96; sun_angle=15; soil_heat_flux_fraction=0.4; night_interception_fraction=0.5; windspeed_default=3; refheight=2; albedo=0.15; emissivity=0.96; gsmax=0.01; r50=200; a_interception=0; b_interception=0; c_interception=0; d_interception=0; soil_albedo=0.23
          Report: ResultsPerPage=0
            VariableNames:
              [Clock].Today
              [Zone].Area
              Distance
              Radn
              [LocalMicroClimate].Radn
              [TreeProxy].Shade
          Report DailyReport: EventNames=[Clock].DoReport; ResultsPerPage=0
            VariableNames:
              [Clock].Today
              Distance
              LocalMicroClimate.Wind
              sum([Soil].NO3N) as TotalNO3N
              sum([Soil].NH4N) as TotalNH4N
              sum([TreeProxy].WaterUptake) as WaterUptake
              sum([Soil].SoilWater.SWmm[1:4]) as SW90cm
              [TreeProxy].Urel
              [TreeProxy].H
              [TreeProxy].SWDemand
              [TreeProxy].heightToday
              [MicroClimate].peta
              [MicroClimate].petr
              [Soil].SoilWater.Eo
              [TreeProxy].WaterStress
              [Soil].SoilWater.SW[1] as SurfaceSW
          Fertiliser
          SurfaceOrganicMatter: PoolName=wheat_stubble; type=wheat; mass=500; standing_fraction=0; cnr=100; CriticalResidueWeight=2000; OptimumDecompTemp=20; MaxCumulativeEOS=20; CNRatioDecompCoeff=0.277; CNRatioDecompThreshold=25; TotalLeachRain=25; MinRainToLeach=10; CriticalMinimumOrganicC=0.004; DefaultCPRatio=0; DefaultStandingFraction=0; StandingExtinctCoeff=0.5; FractionFaecesAdded=0.5
            Pools:
              {PoolName=wheat_stubble, ResidueType=wheat, Mass=500, CNRatio=100, StandingFraction=0}
            ResidueTypes: LoadFromResource=ResidueTypes
          Soil: Site=ICRAF Machakos Research Station; NearestTown=Machakos; Country=Kenya; Latitude=-1.55; Longitude=37.13
            Water
              Thickness  BD    AirDry  LL15   DUL   SAT
              200        1.35  0.04    0.1    0.2   0.35
              200        1.35  0.14    0.1    0.2   0.35
              200        1.35  0.14    0.14   0.29  0.37
              200        1.4   0.15    0.174  0.29  0.37
              200        1.4   0.16    0.174  0.29  0.38
              200        1.4   0.16    0.174  0.29  0.38
              200        1.4   0.16    0.174  0.29  0.38
              200        1.4   0.16    0.174  0.29  0.38
              SoilCrop MaizeSoil: LL=[0.1, 0.1, 0.14, 0.174, 0.17, 0.17, 0.17, 0.17]; KL=[0.08, 0.08, 0.08, 0.08, 0.06, 0.04, 0.03, 0.02]; XF=[1, 1, 1, 1, 1, 1, 1, 1]
            SoilWater: residueinterception=0; SummerDate=1-Nov; SummerU=9; SummerCona=2.5; WinterDate=1-Apr; WinterU=9; WinterCona=2.5; DiffusConst=88; DiffusSlope=35.4; Salb=0.13; CN2Bare=65; CNRed=20; CNCov=0.8; max_pond=0; Thickness=[200, 1400]; SWCON=[0.5, 0.5]
            SoilNitrogen: fom_type=[default, manure, mucuna, lablab, shemp, stable]; fract_carb=[0.2, 0.3, 0.54, 0.57, 0.45, 0]; fract_cell=[0.7, 0.3, 0.37, 0.37, 0.47, 0.1]; fract_lign=[0.1, 0.4, 0.09, 0.06, 0.08, 0.9]; wfpsN2N2O_x=[22, 88]; wfpsN2N2O_y=[0.1, 1]
            SoilOrganicMatter: same as Replacements.Soil.SoilOrganicMatter
            Analysis: Thickness=[200, 200, 200, 200, 200, 200, 200, 200]; PH=[6.5, 6.5, 6.5, 6.5, 6.5, 6.5, 6.5, 6.5]; PHUnits=Water; BoronUnits=HotWater
            Sample: NO3Units=ppm; NH4Units=ppm; SWUnits=Volumetric; OCUnits=Total; PHUnits=Water
              Thickness  NO3  NH4  SW
              200        10   10   0.1
              200        5    5    0.1
              200        2    2    0.14
              200        1    1    0.15
              200        0.5  0.5  0.16
              200        0.5  0.5  0.16
              200        0.5  0.5  0.16
              200        0.5  0.5  0.16
        RectangularZone 1m: Area=0.01; Slope=0; Length=100; Width=1
          LocalMicroClimate
          MicroClimate: same as Grevillea.Grevillea.WindbreakSystem.TreeRow.MicroClimate
          Report HarvestReport: EventNames=[Maize].Harvesting; ResultsPerPage=0
            VariableNames:
              [Clock].Today
              [Zone].Area
              Distance
              [Maize].Phenology.CurrentStageName as Stage
              [Maize].Grain.Live.Wt as GrainWt
              [Maize].Stem.Live.Wt
              [Maize].EarLive.Wt
              [Maize].Leaf.Live.Wt
              [Maize].Root.Live.Wt
              [Maize].Husk.Live.Wt
              [Maize].Rachis.Live.Wt
              [Maize].EarLive.N
              [Maize].Grain.Live.N
              [Maize].Stem.Live.N
              [Maize].Leaf.Live.N
              [Maize].Root.Live.N
              [Maize].Root.Depth
              [Maize].AboveGround.N
              [Maize].AboveGround.Wt as Biomass
              [Maize].Total.N
              [Maize].Total.Wt
              max of [Maize].Leaf.LAI from [Maize].Sowing to [Maize].Harvesting as LAImax
              [Maize].Grain.NumberFunction.Value() as GPSM
              [Maize].Grain.Size as GrainSize
              [Maize].Population
              [Maize].Phenology.FloweringDAS.Value() as FloweringDAS
          Report DailyReport: EventNames=[Clock].DoReport; ResultsPerPage=0
            VariableNames:
              [Clock].Today
              Distance
              LocalMicroClimate.Wind
              sum([Soil].SoilWater.SWmm[1:4]) as SW90cm
              sum([Soil].NO3N) as TotalNO3N
              sum([Soil].NH4N) as TotalNH4N
              [MicroClimate].peta
              [MicroClimate].petr
              [Maize].AboveGround.Wt as BiomassWt
              [Maize].Grain.Wt as GrainWt
              [Soil].SoilWater.SW[1] as SurfaceSW
          Fertiliser
          SurfaceOrganicMatter: same as Grevillea.Grevillea.WindbreakSystem.TreeRow.SurfaceOrganicMatter
          Plant Maize: CropType=Maize
          Manager Harvesting
```csharp
using System;
using Models.Core;
using System.Collections.Generic;
using System.Text;
using Models.Soils;
using Models.PMF;
using Models;
using System.Xml.Serialization;
using APSIM.Shared.Utilities;

namespace Models
{
	[Serializable] 
	public class Script : Model
	{
		[Link] Plant Maize;
		[Link] Zone zone;
					
        
		[EventSubscribe("Commencing")]
		private void OnSimulationCommencing(object sender, EventArgs e)
		{
		}
		
		[EventSubscribe("DoManagement")]
		private void OnDoManagement(object sender, EventArgs e)
		{
			if (Maize.Phenology.CurrentPhaseName == "ReadyForHarvesting")
			{
				Maize.Harvest();
				Maize.EndCrop();
			}
		}
		
		[EventSubscribe("DoManagementCalculations")]
		private void OnDoManagementCalculations(object sender, EventArgs e)
		{
			
		}
	}
}
```
          Soil: Site=ICRAF Machakos Research Station; NearestTown=Machakos; Country=Kenya; Latitude=-1.55; Longitude=37.13
            Water
              Thickness  BD    AirDry  LL15  DUL   SAT
              200        1.35  0.04    0.1   0.2   0.35
              200        1.35  0.14    0.1   0.2   0.35
              200        1.35  0.14    0.14  0.29  0.37
              200        1.4   0.15    0.15  0.29  0.37
              200        1.4   0.16    0.16  0.29  0.38
              200        1.4   0.16    0.16  0.29  0.38
              200        1.4   0.16    0.16  0.29  0.38
              200        1.4   0.16    0.16  0.29  0.38
              SoilCrop MaizeSoil: LL=[0.1, 0.1, 0.14, 0.15, 0.16, 0.16, 0.16, 0.16]; KL=[0.08, 0.08, 0.08, 0.08, 0.06, 0.04, 0.03, 0.02]; XF=[1, 1, 1, 1, 1, 1, 1, 1]
            SoilWater: same as Grevillea.Grevillea.WindbreakSystem.TreeRow.Soil.SoilWater
            SoilNitrogen: fom_type=[default, manure, mucuna, lablab, shemp, stable]; fract_carb=[0.2, 0.3, 0.54, 0.57, 0.45, 0]; fract_cell=[0.7, 0.3, 0.37, 0.37, 0.47, 0.1]; fract_lign=[0.1, 0.4, 0.09, 0.06, 0.08, 0.9]; wfpsN2N2O_x=[22, 88]; wfpsN2N2O_y=[0.1, 1]
            SoilOrganicMatter: same as Replacements.Soil.SoilOrganicMatter
            Analysis: Thickness=[200, 200, 200, 200, 200, 200, 200, 200]; PH=[6.5, 6.5, 6.5, 6.5, 6.5, 6.5, 6.5, 6.5]; PHUnits=Water; BoronUnits=HotWater
            Sample: same as Grevillea.Grevillea.WindbreakSystem.TreeRow.Soil.Sample
        RectangularZone 2m: Area=0.01; Slope=0; Length=100; Width=1
          LocalMicroClimate
          MicroClimate: same as Grevillea.Grevillea.WindbreakSystem.TreeRow.MicroClimate
          Report HarvestReport: same as Grevillea.Grevillea.WindbreakSystem.1m.HarvestReport
          Report DailyReport: same as Grevillea.Grevillea.WindbreakSystem.1m.DailyReport
          Fertiliser
          SurfaceOrganicMatter: same as Grevillea.Grevillea.WindbreakSystem.TreeRow.SurfaceOrganicMatter
          Plant Maize: CropType=Maize
          Manager Harvesting
            script: same as in Grevillea.Grevillea.WindbreakSystem.1m.Harvesting
          Soil: Site=ICRAF Machakos Research Station; NearestTown=Machakos; Country=Kenya; Latitude=-1.55; Longitude=37.13
            Water
              Thickness  BD    AirDry  LL15  DUL   SAT
              200        1.35  0.04    0.1   0.2   0.35
              200        1.35  0.14    0.1   0.2   0.35
              200        1.35  0.14    0.14  0.29  0.37
              200        1.4   0.15    0.17  0.29  0.37
              200        1.4   0.16    0.17  0.29  0.38
              200        1.4   0.16    0.17  0.29  0.38
              200        1.4   0.16    0.17  0.29  0.38
              200        1.4   0.16    0.17  0.29  0.38
              SoilCrop MaizeSoil: LL=[0.1, 0.1, 0.14, 0.17, 0.17, 0.17, 0.17, 0.17]; KL=[0.08, 0.08, 0.08, 0.08, 0.06, 0.04, 0.03, 0.02]; XF=[1, 1, 1, 1, 1, 1, 1, 1]
            SoilWater: same as Grevillea.Grevillea.WindbreakSystem.TreeRow.Soil.SoilWater
            SoilNitrogen: fom_type=[default, manure, mucuna, lablab, shemp, stable]; fract_carb=[0.2, 0.3, 0.54, 0.57, 0.45, 0]; fract_cell=[0.7, 0.3, 0.37, 0.37, 0.47, 0.1]; fract_lign=[0.1, 0.4, 0.09, 0.06, 0.08, 0.9]; wfpsN2N2O_x=[22, 88]; wfpsN2N2O_y=[0.1, 1]
            SoilOrganicMatter: same as Replacements.Soil.SoilOrganicMatter
            Analysis: Thickness=[200, 200, 200, 200, 200, 200, 200, 200]; PH=[6.5, 6.5, 6.5, 6.5, 6.5, 6.5, 6.5, 6.5]; PHUnits=Water; BoronUnits=HotWater
            Sample: NO3Units=ppm; NH4Units=ppm; SWUnits=Volumetric; OCUnits=Total; PHUnits=Water
              Thickness  NO3  NH4  SW
              200        10   10   0.1
              200        5    5    0.1
              200        2    2    0.14
              200        1    1    0.17
              200        0.5  0.5  0.17
              200        0.5  0.5  0.17
              200        0.5  0.5  0.17
              200        0.5  0.5  0.17
        RectangularZone 3m: same as Grevillea.Grevillea.WindbreakSystem.1m
        RectangularZone 4m: same as Grevillea.Grevillea.WindbreakSystem.1m
        RectangularZone 5m: same as Grevillea.Grevillea.WindbreakSystem.1m
        RectangularZone 6m: same as Grevillea.Grevillea.WindbreakSystem.1m
        RectangularZone 7m: same as Grevillea.Grevillea.WindbreakSystem.1m
        RectangularZone 8m: Area=0.01; Slope=0; Length=100; Width=1
          LocalMicroClimate
          MicroClimate: same as Grevillea.Grevillea.WindbreakSystem.TreeRow.MicroClimate
          Report HarvestReport: same as Grevillea.Grevillea.WindbreakSystem.1m.HarvestReport
          Report DailyReport: EventNames=[Clock].DoReport; ResultsPerPage=0
            VariableNames:
              [Clock].Today
              Distance
              LocalMicroClimate.Wind
              sum([Soil].SoilWater.SWmm[1:4]) as SW90cm
              sum([Soil].NO3N) as TotalNO3N
              sum([Soil].NH4N) as TotalNH4N
              [MicroClimate].peta
              [MicroClimate].petr
              [Maize].AboveGround.Wt as BiomassWt
              [Maize].Grain.Wt as GrainWt
              [Soil].SoilWater.SW[1] as SurfaceSW
              [Maize].Leaf.Fn
          Fertiliser
          SurfaceOrganicMatter: same as Grevillea.Grevillea.WindbreakSystem.TreeRow.SurfaceOrganicMatter
          Plant Maize: CropType=Maize
          Manager Harvesting: same as Grevillea.Grevillea.WindbreakSystem.1m.Harvesting
          Soil: same as Grevillea.Grevillea.WindbreakSystem.1m.Soil
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