Simulations: Version=1
  Simulation Prawns: Area=0; Slope=0
    Weather: FileName=Ingham.met
    Clock: StartDate=1990-01-01; EndDate=1990-12-31
    Summary summaryfile
    Zone Pond: Area=1; Slope=0
      PondWater: SurfaceArea=10000; MaxPondDepth=1; Kpan=1
      FoodInPond
      Prawns: PrawnSpecies=Penaeus Monodon; Ki1=0.101; Ki2=0.65; Ki3=2200; Ki4=0.33; Ki5=0.37; Ki6=0.026; Ki7=0.62; Ki8=0.015; Kt1=36; Kt2=15; Kt3=2; Km1=0.115; Km2=0.8; Ks1=0.0032; Kg1=0.2; Kg4=0.4; Kd1=0.0006; Kd2=0.1; Kd3=20; Kd4=4; Kd5=2.5
      Folder Manager folder
        Manager Add water on fixed date
          added_date = 01-jan
          volume = 10000
          temperature = 15
          salinity = 5
          ph = 2
          n = 3
          p = 4
          tss = 10
```csharp
using System;
using Models.Core;
using APSIM.Shared.Utilities;
using Models.Aqua;

namespace Models
{
	[Serializable]
	[System.Xml.Serialization.XmlInclude(typeof(Model))]
	public class Script : Model
	{

		[Link] Clock Clock;
		[Link] Summary Summary;
		[Link] PondWater PondWater;
		
		
	    [Description("Add Water on this date (dd-mmm)")]
		public string added_date {get; set;}
		
		[Description("Volume of Water Added (m^3)")]
		public double volume {get; set;}
		
		[Description("Temperature of Water Added (oC)")]
		public double temperature {get; set;}
		
		[Description("Salinity of Water Added (kg/m^3)")]
		public double salinity {get; set;}
		
		[Description("PH of Water Added")]
		public double ph {get; set;}
		
		[Description("Nitrogen of Water Added (kg/m^3)")]
		public double n {get; set;}
	
	    [Description("Phosphorus of Water Added (kg/m^3)")]
		public double p {get; set;}
		
		[Description("Total Suspended Solids of Water Added (kg/m^3)")]
		public double tss {get; set;}


        
       [EventSubscribe("StartOfSimulation")]
		private void OnStartOfSimulation(object sender, EventArgs e)
		{
		}
        
        
        
		[EventSubscribe("StartOfDay")]
		private void OnStartOfDay(object sender, EventArgs e)
		{

        if (DateUtilities.DatesEqual(added_date, Clock.Today))
			{
			WaterProperties addedProps = new WaterProperties(temperature, salinity, ph, n, p, tss);
			PondWater.Fill(Volume: volume, WaterProperties: addedProps);
			}

		}
      
	}
}
```
        Manager Add water on fixed date1
          added_date = 01-oct
          volume = 10000
          temperature = 15
          salinity = 5
          ph = 2
          n = 3
          p = 4
          tss = 10
          script: same as in Prawns.Pond.Manager folder.Add water on fixed date
        Manager Add Feed on fixed date
          added_date = 05-jan
          FeedName = TestFeed
          DryMatter = 400
          Nitrogen = 20
          DigestibleEnergy = 3000
```csharp
using System;
using Models.Core;
using APSIM.Shared.Utilities;
using Models.Aqua;

namespace Models
{
	[Serializable]
	[System.Xml.Serialization.XmlInclude(typeof(Model))]
	public class Script : Model
	{

		[Link] Clock Clock;
		[Link] Summary Summary;
		[Link] FoodInPond FoodInPond;
		
		
	    [Description("Add feed on this date (dd-mmm)")]
		public string added_date {get; set;}

	    [Description("Name of the feed")]
		public string FeedName {get; set;}
		
		[Description("Amount of feed added (as Dry Matter) (kg)")]
		public double DryMatter {get; set;}
		
		[Description("Amount of Nitrogen in the feed added (kg)")]
		public double Nitrogen {get; set;}
		
		[Description("Amount of Digestible Energy in the feed added (MJ)")]
		public double DigestibleEnergy {get; set;}
		


        
       [EventSubscribe("StartOfSimulation")]
		private void OnStartOfSimulation(object sender, EventArgs e)
		{
		}
        
        
        
		[EventSubscribe("StartOfDay")]
		private void OnStartOfDay(object sender, EventArgs e)
		{

        if (DateUtilities.DatesEqual(added_date, Clock.Today))
			{
			Feed newFeed = new Feed(FeedName, DryMatter, Nitrogen, DigestibleEnergy);
			FoodInPond.Food.AddFeed(newFeed);
			}

		}
      
	}
}
```
        Manager Add Feed on fixed date1
          added_date = 10-jan
          FeedName = ShaunFeed
          DryMatter = 100
          Nitrogen = 20
          DigestibleEnergy = 3000
          script: same as in Prawns.Pond.Manager folder.Add Feed on fixed date
        Manager Add Prawns on fixed date
          added_date = 05-jan
          NumberOfPrawns = 1000
          LiveWeight = 1
          NitrogenMass = 0.02
```csharp
using System;
using Models.Core;
using APSIM.Shared.Utilities;
using Models.Aqua;

namespace Models
{
	[Serializable]
	[System.Xml.Serialization.XmlInclude(typeof(Model))]
	public class Script : Model
	{

		[Link] Clock Clock;
		[Link] Summary Summary;
		[Link] Prawns Prawns;
		
		
		[Description("Add feed on this date (dd-mmm)")]
		public string added_date { get; set; }

		[Description("Number of prawns to add to the pond")]
		public int NumberOfPrawns { get; set; }
		
		[Description("Starting live weight of a prawn (g/prawn)")]
		public double LiveWeight { get; set; }
		
		[Description("Starting mass of Nitrogen in a prawn (g N/prawn)")]
		public double NitrogenMass { get; set; }
		

        
		[EventSubscribe("StartOfSimulation")]
		private void OnStartOfSimulation(object sender, EventArgs e)
		{
		}
        
        
        
		[EventSubscribe("StartOfDay")]
		private void OnStartOfDay(object sender, EventArgs e)
		{

			if (DateUtilities.DatesEqual(added_date, Clock.Today))
			{
				Prawns.AddPrawnsToPond(NumberOfPrawns, LiveWeight, NitrogenMass);
			}

		}
      
	}
}
```
      Report: EventNames=[Clock].DoReport
        VariableNames:
          [Clock].Today
          [FoodInPond].Food.TotalDM as FoodDM
          [FoodInPond].Food.TotalN as FoodN
          [FoodInPond].Food.TotalDE as FoodDE
          [Prawns].NumOfPrawns as Prawns
          [Prawns].LiveWeight as Weight
          [Prawns].Nitrogen as NWeight
          [Prawns].Deaths as Deaths
          [Prawns].ConsumedDM as Consumed
          [Prawns].FaecesDM as Faeces
          [Prawns].ExcretedNH4 as Ammonium
          [FoodInPond].Food.FeedNames as FoodNames
          [FoodInPond].Food.FeedDMs as FoodDMs
  DataStore
  Tests
    Test:
      SimulationName  TableName  Type       ColumnNames   Parameters
      Prawns          Report     Tolerance  FoodDM        1,1
      Prawns          Report     Tolerance  FoodN         1,1
      Prawns          Report     Tolerance  FoodDE        1,1
      Prawns          Report     Tolerance  Prawns        1,1
      Prawns          Report     Tolerance  Weight        1,1
      Prawns          Report     Tolerance  NWeight       1,1
      Prawns          Report     Tolerance  Deaths        1,1
      Prawns          Report     Tolerance  Consumed      1,1
      Prawns          Report     Tolerance  Faeces        1,1
      Prawns          Report     Tolerance  Ammonium      1,1
      Prawns          Report     Tolerance  FoodNames(1)  1,1
      Prawns          Report     Tolerance  FoodNames(2)  1,1
      Prawns          Report     Tolerance  FoodNames(3)  1,1
      Prawns          Report     Tolerance  FoodDMs(1)    1,1
      Prawns          Report     Tolerance  FoodDMs(2)    1,1
      Prawns          Report     Tolerance  FoodDMs(3)    1,1
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