Simulations: Version=2
  Replacements
    Plant Bambatsi: CropType=Bambatsi
      AccumulateFunction Age: StartStageName=Emergence; EndStageName=Old
        Constant day: Value=0.00273973
      Phenology: DaysAfterSowing=0
        StageBasedInterpolation StageCode: Stages=[Emergence, EndJuvenile, Maturity, Old]; Codes=[1, 2, 3, 4]; Proportional=true
        Constant ThermalTime: Value=1
        GerminatingPhase Germinating: Start=Sowing; End=Germination
        EmergingPhase Emerging: Start=Germination; End=Emergence; ShootLag=1; ShootRate=0
          VariableReference ThermalTime: VariableName=[Phenology].ThermalTime.Value
        GenericPhase Juvenile: Start=Emergence; End=EndJuvenile
          Constant ThermalTime: Value=1
          Constant Target: Value=365
        GenericPhase Mature: Start=EndJuvenile; End=Maturity
          Constant ThermalTime: Value=1
          Constant Target: Value=1825
        GenericPhase Declining: Start=Maturity; End=Old
          Constant ThermalTime: Value=1
          Constant Target: Value=27010
        EndPhase Old: Start=Old; End=Unused
          Constant ThermalTime: Value=1
      OrganArbitrator Arbitrator: NArbitrationOption=RelativeAllocation; DMArbitrationOption=RelativeAllocation
      CompositeBiomass AboveGround: Propertys=[[Leaf].Live, [Leaf].Dead, [Stem].Live, [Stem].Dead]
      CompositeBiomass AboveGroundLive: Propertys=[[Leaf].Live, [Stem].Live]
      CompositeBiomass AboveGroundDead: Propertys=[[Leaf].Dead, [Stem].Dead]
      CompositeBiomass BelowGround: Propertys=[[Root].Live, [Root].Dead]
      CompositeBiomass Total
        Propertys=[[Leaf].Live, [Leaf].Dead, [Stem].Live, [Stem].Dead, [Root].Live, [Root].Dead]
      CompositeBiomass TotalLive: Propertys=[[Leaf].Live, [Stem].Live, [Root].Live]
      CompositeBiomass TotalDead: Propertys=[[Leaf].Dead, [Stem].Dead, [Root].Dead]
      PerennialLeaf Leaf: CohortsInitialised=false; Albedo=0.18; Gsmax=0.015; R50=150
        zero: MaintenanceRespiration, GrowthRespiration, TipsAtEmergence, CohortsAtInitialisation, InitialisedCohortNo, AppearedCohortNo, PlantAppearedLeafNo, LAI, Height, FRGR, PotentialEP, KDead, LAIDead
        MultiplyFunction InitialWtFunction
          Constant InitialPlantWt: Value=0.01; Units=g/plant
          VariableReference Population: VariableName=[Plant].Population
        Constant LaiDeadFunction: Value=0; Units=m^2/m^2
        Constant StructuralFraction: Value=1; Units=0-1
        MinimumFunction FRGRFunction
          AirTemperatureFunction FRGRFunctionTemp
            XYPairs: X=[5, 20, 25, 35]; Y=[0, 1, 1, 0]
        PartitionFractionDemandFunction DMDemandFunction
          Constant PartitionFraction: Value=0.33
            Memo
              Value of 0.57 from
              Radiation Interception and Growth of Planted and Coppice Stands of Four Fast-GrowingTropical Trees
              Author(s): Robin A. Harrington and James H. Fownes
              Source: Journal of Applied Ecology, Vol. 32, No. 1 (Feb., 1995), pp. 1-8

              But their data suggests a value of 0.3
        Constant ExtinctionCoefficient: Value=0.57
          Memo
            Value of 0.57 from
            Radiation Interception and Growth of Planted and Coppice Stands of Four Fast-GrowingTropical Trees
            Author(s): Robin A. Harrington and James H. Fownes
            Source: Journal of Applied Ecology, Vol. 32, No. 1 (Feb., 1995), pp. 1-8

            But their data suggests a value of 0.3
        LinearInterpolationFunction HeightFunction: XProperty=[Phenology].Stage
          XYPairs: X=[3, 5, 6]; Y=[100, 800, 1200]
        Constant MaximumNConc: Value=0.03
          Memo
            0.043 gN/g from R.B. Thomas 1, D.D. Richter 2, H. Ye 2, P.R. Heine z, and B.R. Strain 1 Nitrogen dynamics and growth of seedlings of an N-fixing tree
            (GKricidia sepium (Jacq.) Walp.) exposed to elevated atmospheric carbon dioxide Oecologia (1991) 88:415-421
        Constant MinimumNConc: Value=0.015
        Constant NReallocationFactor: Value=0
        BiomassRemoval BiomassRemovalDefaults
          OrganBiomassRemovalType Harvest: FractionLiveToRemove=0; FractionDeadToRemove=0; FractionLiveToResidue=0.9; FractionDeadToResidue=0.9
          OrganBiomassRemovalType Cut: FractionLiveToRemove=0.8; FractionDeadToRemove=0; FractionLiveToResidue=0; FractionDeadToResidue=0
          OrganBiomassRemovalType Prune: FractionLiveToRemove=0; FractionDeadToRemove=0; FractionLiveToResidue=0.6; FractionDeadToResidue=0
          OrganBiomassRemovalType Graze: FractionLiveToRemove=0.6; FractionDeadToRemove=0; FractionLiveToResidue=0.1; FractionDeadToResidue=0
        MultiplyFunction LAIFunction
          VariableReference LeafWt: VariableName=[Leaf].Live.Wt
          LinearInterpolationFunction SLA: XProperty=[Bambatsi].Age.Value
            XYPairs: X=[0, 1]; Y=[0.015, 0.015]
        Constant LeafResidenceTime: Value=130
        Constant DMConversionEfficiency: Value=1
        Constant LeafDetachmentTime: Value=7
        Constant DMRetranslocationFactor: Value=0
        Constant NRetranslocationFactor: Value=0
        RUEModel Photosynthesis
          Constant RUE: Value=2
          WeightedTemperatureFunction FT: MaximumTemperatureWeighting=0.5
            XYPairs: X=[8, 20, 35, 50]; Y=[0, 1, 1, 0]
          LinearInterpolationFunction FVPD: XProperty=[Leaf].Photosynthesis.VPD
            XYPairs: X=[0, 10, 50]; Y=[1, 1, 0]
          LinearInterpolationFunction FN: XProperty=[Leaf].Fn
            XYPairs: X=[0, 1, 1.5]; Y=[0, 1, 1]
          LinearInterpolationFunction FW: XProperty=[Leaf].Fw
            XYPairs: X=[0, 1, 1.5]; Y=[0, 1, 1]
          RUECO2Function FCO2: PhotosyntheticPathway=C3
          Memo
            Ayaz eta 2004 presented a RUE of 1.6 g/MJ PAR during non-limiting temperature conditions for field pea.  Halving this to make it total radiation gives 0.8 g/MJ and adding 20% to account for root and  nodule production and N fixiation costs gives 1.0 g/MJ
          VariableReference RadnInt: VariableName=[Leaf].RadIntTot
        LinearInterpolationFunction LeafKillFraction: XProperty=[Weather].MinT
          XYPairs: X=[0, 2]; Y=[1, 0]
        Constant MinimumLAI: Value=0.1; Units=m2/m2
      Root: GrowthRespiration=0; MaintenanceRespiration=0
        CompositeBiomass Live: Propertys=[[Root].LayerLive]
        CompositeBiomass Dead: Propertys=[[Root].LayerDead]
        PhaseBasedSwitch NitrogenDemandSwitch: Start=Emergence; End=Old
        Constant RootFrontVelocity: Value=4
        Constant SenescenceRate: Value=0.005
        PhaseLookup PartitionFraction
          PhaseLookupValue: Start=Emergence; End=Old
            Constant: Value=0.2
        Constant MaximumNConc: Value=0.01
        Constant MaxDailyNUptake: Value=6
        Constant MinimumNConc: Value=0.008
        Constant MaximumRootDepth: Value=1000000
        LinearInterpolationFunction KLModifier: XProperty=[Leaf].LAI
          XYPairs: X=[0, 3]; Y=[1, 1]
        LinearInterpolationFunction KNO3: XProperty=[Root].RootLengthDenisty
          XYPairs: X=[0, 0.003]; Y=[0.03, 0.03]
        LinearInterpolationFunction KNH4: XProperty=[Root].RootLengthDenisty
          XYPairs: X=[0, 0.003]; Y=[0, 0]
        LinearInterpolationFunction NUptakeSWFactor: XProperty=[Root].RWC
          XYPairs: X=[0, 1]; Y=[0, 1]
        Constant InitialDM: Value=5; Units=g/plant
        Constant SpecificRootLength: Value=100; Units=m/g
        Folder BiomassRemovalDefaults
          OrganBiomassRemovalType Harvest: FractionLiveToRemove=0; FractionDeadToRemove=0; FractionLiveToResidue=0; FractionDeadToResidue=0
          OrganBiomassRemovalType Cut: FractionLiveToRemove=0; FractionDeadToRemove=0; FractionLiveToResidue=0.3; FractionDeadToResidue=0
          OrganBiomassRemovalType Prune: FractionLiveToRemove=0; FractionDeadToRemove=0; FractionLiveToResidue=0.1; FractionDeadToResidue=0
          OrganBiomassRemovalType Graze: FractionLiveToRemove=0; FractionDeadToRemove=0; FractionLiveToResidue=0.15; FractionDeadToResidue=0
          OrganBiomassRemovalType Thin: FractionLiveToRemove=0; FractionDeadToRemove=0; FractionLiveToResidue=0.05; FractionDeadToResidue=0
      GenericOrgan Stem
        Constant NReallocationFactor: Value=0
        Constant NRetranslocationFactor: Value=0.05
        PhaseBasedSwitch NitrogenDemandSwitch: Start=Emergence; End=Old
        Constant DMRetranslocationFactor: Value=0
        PartitionFractionDemandFunction DMDemandFunction
          Constant PartitionFraction: Value=0.3
        Constant SenescenceRate: Value=0; Units=/d
        Constant MaximumNConc: Value=0.0015
        Constant MinimumNConc: Value=0.0014
        Biomass Live
        Biomass Dead
        Constant InitialWtFunction: Value=0; Units=g/m^2
        Constant StructuralFraction: Value=1; Units=g/g
        Constant DetachmentRateFunction: Value=0; Units=/d
        BiomassRemoval BiomassRemovalDefaults
          OrganBiomassRemovalType Harvest: FractionLiveToRemove=0.9; FractionDeadToRemove=0.9; FractionLiveToResidue=0; FractionDeadToResidue=0
          OrganBiomassRemovalType Cut: FractionLiveToRemove=0.8; FractionDeadToRemove=0; FractionLiveToResidue=0; FractionDeadToResidue=0
          OrganBiomassRemovalType Prune: FractionLiveToRemove=0.9; FractionDeadToRemove=0.9; FractionLiveToResidue=0.1; FractionDeadToResidue=0.1
          OrganBiomassRemovalType Graze: FractionLiveToRemove=0.6; FractionDeadToRemove=0; FractionLiveToResidue=0.2; FractionDeadToResidue=0
          OrganBiomassRemovalType Thin: FractionLiveToRemove=0; FractionDeadToRemove=0; FractionLiveToResidue=0.05; FractionDeadToResidue=0
        Constant MaintenanceRespirationFunction: Value=0; Units=0-1
        Constant DMConversionEfficiency: Value=1; Units=0-1
      Cultivar Bambatsi
  DataStore
    ExcelInput Observed: FileName=Observed.xlsx; SheetNames=[Observed, ObservedSoilWater]
    PredictedObserved: PredictedTableName=Report; ObservedTableName=Observed; FieldNameUsedForMatch=Clock.Today
    PredictedObserved PredictedObservedSoilWater: PredictedTableName=Report; ObservedTableName=ObservedSoilWater; FieldNameUsedForMatch=Clock.Today
  Folder Validation
    Folder LiverpoolPlains
      Simulation Hudson
        Weather: FileName=Hudson.met
        Clock: StartDate=1994-08-05; EndDate=2000-01-23
        Summary
        SoilArbitrator Soil Arbitrator
        Zone Field: Area=0; Slope=0
          Soil: Latitude=0; Longitude=0; Area=0
            Water
              Thickness  BD   AirDry  LL15  DUL   SAT
              100        1    0.1     0.24  0.47  0.53
              200        1.1  0.1     0.28  0.53  0.57
              200        1.1  0.1     0.28  0.52  0.57
              200        1.1  0.1     0.29  0.52  0.55
              200        1.1  0.1     0.29  0.51  0.54
              200        1.2  0.1     0.29  0.5   0.53
              200        1.2  0.1     0.29  0.5   0.53
              200        1.2  0.1     0.33  0.48  0.51
              200        1.2  0.1     0.33  0.48  0.51
              200        1.2  0.1     0.35  0.48  0.51
              200        1.2  0.1     0.35  0.47  0.5
              200        1.2  0.1     0.35  0.45  0.48
              200        1.3  0.1     0.35  0.45  0.48
              200        1.3  0.1     0.35  0.45  0.48
              200        1.3  0.1     0.35  0.45  0.48
              200        1.3  0.1     0.35  0.45  0.48
              SoilCrop BambatsiSoil
                LL=[0.25, 0.3, 0.3, 0.3, 0.3, 0.33, 0.35, 0.38, 0.38, 0.4, 0.4, 0.4, 0.4, 0.4, 0.4, 0.4]
                KL=[0.04, 0.04, 0.04, 0.03, 0.02, 0.01, 0.01, 0.01, 0.005, 0.005, 0.005, 0.005, 0.005, 0.005, 0.005, 0.005]
                XF=[1, 1, 1, 1, 1, 0.75, 0.75, 0.5, 0.5, 0.25, 0.25, 0, 0, 0, 0, 0]
            SoilWater: SummerDate=1-Nov; SummerU=9; SummerCona=5; WinterDate=1-Apr; WinterU=9; WinterCona=5; DiffusConst=40; DiffusSlope=16; Salb=0.13; CN2Bare=75; CNRed=20; CNCov=0.8; max_pond=0; residueinterception=0
              Thickness=[100, 200, 200, 200, 200, 200, 200, 200, 200, 200, 200, 200, 200, 200, 200, 200]
              SWCON=[0.4, 0.4, 0.4, 0.4, 0.4, 0.4, 0.4, 0.4, 0.4, 0.4, 0.4, 0.4, 0.4, 0.4, 0.4, 0.4]
            SoilNitrogen: fom_type=[default, manure, mucuna, lablab, shemp, stable]; fract_carb=[0.2, 0.3, 0.54, 0.57, 0.45, 0]; fract_cell=[0.7, 0.3, 0.37, 0.37, 0.47, 0.1]; fract_lign=[0.1, 0.4, 0.09, 0.06, 0.08, 0.9]; wfpsN2N2O_x=[22, 88]; wfpsN2N2O_y=[0.1, 1]
            SoilOrganicMatter: RootCN=40; RootWt=10; SoilCN=14.5; EnrACoeff=7.4; EnrBCoeff=0.2; OCUnits=Total
              Thickness  OC    FBiom  FInert
              100        1.4   0.03   0.45
              200        1.4   0.03   0.45
              200        1.4   0.02   0.6
              200        1.35  0.015  0.7
              200        0.95  0.01   0.85
              200        1     0.01   0.9
              200        0.8   0.01   0.99
              200        0.45  0.01   0.99
              200        0.45  0.01   0.99
              200        0.45  0.01   0.99
              200        0.45  0.01   0.99
              200        0.45  0.01   0.99
              200        0.45  0.01   0.99
              200        0.45  0.01   0.99
              200        0.45  0.01   0.99
              200        0.45  0.01   0.99
            Analysis: PH=[6, 6.4, 6.8, 7.2, 7.6, 8, 8, 8, 8, 8, 8, 8, 8, 8, 8, 8]; PHUnits=Water; BoronUnits=HotWater
              Thickness=[100, 200, 200, 200, 200, 200, 200, 200, 200, 200, 200, 200, 200, 200, 200, 200]
            Sample Initial nitrogen: NO3Units=ppm; NH4Units=ppm; SWUnits=Volumetric; OCUnits=Total; PHUnits=Water
              Thickness  NO3   NH4
              100        10.7  0.3
              200        9.99  0.3
              200        7.87  0.3
              200        6.2   0.3
              200        4.85  0.3
              200        3.56  0.3
              200        2.72  0.3
              200        2.34  0.3
              200        2.47  0.3
              200        3.24  0.3
              200        4.25  0.3
              200        4.94  0.3
              200        5.2   0.3
              200        4.95  0.3
              200        4.52  0.3
              200        4.24  0.3
            Sample Initial water: NO3Units=ppm; NH4Units=ppm; SWUnits=Volumetric; OCUnits=Total; PHUnits=Water
              Thickness=[100, 200, 200, 200, 200, 200, 200, 200, 200, 200, 200, 200, 200, 200, 200, 200]
              SW=[0.47, 0.47, 0.53, 0.5, 0.47, 0.46, 0.45, 0.45, 0.45, 0.43, 0.42, 0.42, 0.41, 0.43, 0.42, 0.41]
          Irrigation
          Fertiliser
          SurfaceOrganicMatter: PoolName=Wheat; type=Wheat; mass=2000; standing_fraction=0; cnr=80; CriticalResidueWeight=2000; OptimumDecompTemp=20; MaxCumulativeEOS=20; CNRatioDecompCoeff=0.277; CNRatioDecompThreshold=25; TotalLeachRain=25; MinRainToLeach=10; CriticalMinimumOrganicC=0.004; DefaultCPRatio=0; DefaultStandingFraction=0; StandingExtinctCoeff=0.5; FractionFaecesAdded=0.5
            Pools:
              {PoolName=Wheat, ResidueType=Wheat, Mass=2000, CNRatio=80, StandingFraction=0}
            ResidueTypes: LoadFromResource=ResidueTypes
            TillageTypes
          MicroClimate: a_interception=0; b_interception=1; c_interception=0; d_interception=0; soil_albedo=0.13; air_pressure=1010; soil_emissivity=0.96; sun_angle=15; soil_heat_flux_fraction=0.4; night_interception_fraction=0.5; windspeed_default=3; refheight=2; albedo=0.293662; emissivity=0.96; gsmax=0.01; r50=200; RadIntTotal=0
          Plant Bambatsi: CropType=Bambatsi
          Operations
            1994-01-01  [Fertiliser].Apply(20.0, Fertiliser.Types.UreaN, 0);
            1995-01-01  [Bambatsi].Sow(population: 100, cultivar: Bambatsi, depth: 100, rowSpacing: 100);
            1995-10-09  [Bambatsi].Harvest();
            1995-11-21  [Fertiliser].Apply(50.0, Fertiliser.Types.UreaN, 0);
            1995-12-01  [Bambatsi].Harvest();
            1996-01-30  [Bambatsi].Harvest();
            1996-02-28  [Bambatsi].Harvest();
            1996-11-26  [Bambatsi].Harvest();
            1996-12-22  [Fertiliser].Apply(50.0, Fertiliser.Types.UreaN, 0);
            1997-01-14  [Bambatsi].Harvest();
            1997-03-04  [Bambatsi].Harvest();
            1997-06-26  [Fertiliser].Apply(22.0, Fertiliser.Types.UreaN, 0);
            1997-11-17  [Bambatsi].Harvest();
            1998-04-07  [Bambatsi].Harvest();
            1998-10-09  [Fertiliser].Apply(30.0, Fertiliser.Types.UreaN, 0);
            1998-12-17  [Bambatsi].Harvest();
            1999-02-16  [Bambatsi].Harvest();
            1999-06-02  [Bambatsi].Harvest();
            1999-11-10  [Fertiliser].Apply(50.0, Fertiliser.Types.UreaN, 0);
            1999-09-29  [Bambatsi].Harvest();
            2000-02-02  [Bambatsi].Harvest();
          Report: EventNames=[Clock].DoReport
            VariableNames:
              [Clock].Today
              Bambatsi.Phenology.CurrentPhaseName
              Bambatsi.Phenology.StageCode.Value
              Bambatsi.Root.NSupplyUptake
              [Soil].SoilWater.Eo
              [Soil].SoilWater.Es
              [Soil].SoilWater.Drainage
              [Soil].SoilWater.Runoff
              [Soil].SoilWater.pond
              sum([Soil].SoilWater.SWmm[2:3]) as SW10_50cm
              sum([Soil].SoilWater.SWmm[4:5]) as SW50_90cm
              sum([Soil].SoilWater.SWmm[6:7]) as SW90_130cm
              sum([Soil].SoilWater.SWmm[8:9]) as SW130_170cm
              sum([Soil].SoilWater.SWmm[10:11]) as SW170_210cm
              sum([Soil].SoilWater.SWmm[12:13]) as SW210_250cm
              sum([Soil].SoilWater.SWmm[2:13]) as SW10_250cm
              Bambatsi.AboveGround.Wt
              Bambatsi.AboveGroundLive.Wt
              Bambatsi.AboveGroundDead.Wt
              Bambatsi.BelowGround.Wt
              Bambatsi.Total.Wt
              Bambatsi.Leaf.Dead.Wt
              Bambatsi.Leaf.Live.Wt
              Bambatsi.Stem.Dead.Wt
              Bambatsi.Stem.Live.Wt
              Bambatsi.Root.Dead.Wt
              Bambatsi.Root.Live.Wt
              Bambatsi.AboveGround.N
              Bambatsi.BelowGround.N
              Bambatsi.Total.N
              Bambatsi.TotalLive.N
              Bambatsi.TotalDead.N
              Bambatsi.Leaf.Dead.N
              Bambatsi.Leaf.Live.N
              Bambatsi.Stem.Dead.N
              Bambatsi.Stem.Live.N
              Bambatsi.Branch.Live.Wt
              Bambatsi.Branch.Live.N
              Bambatsi.Wood.Wt
              Bambatsi.Root.Live.N
              Bambatsi.Root.Dead.N
              Bambatsi.Leaf.Live.NConc
              Bambatsi.Leaf.Dead.NConc
              Bambatsi.Stem.Live.NConc
              Bambatsi.Root.Live.NConc
              Bambatsi.Root.WaterSupply
              Bambatsi.Root.WaterUptake
              Bambatsi.Leaf.Transpiration
              Bambatsi.Leaf.WaterDemand
              Bambatsi.Root.Depth
              Bambatsi.Leaf.CoverGreen
              Bambatsi.Leaf.CoverTotal
              Bambatsi.Leaf.CoverDead
              Bambatsi.Leaf.LAI
              Bambatsi.Leaf.LAIDead
              Bambatsi.Leaf.Fn
              Bambatsi.Leaf.Fw
              Bambatsi.Leaf.Photosynthesis.FT.Value
              Bambatsi.Leaf.Photosynthesis.FVPD.Value
              Bambatsi.Leaf.Photosynthesis.RueAct
              Bambatsi.Stem.MinimumNConc.Value
              Bambatsi.Root.MinimumNConc.Value
              Bambatsi.Stem.MaximumNConc.Value
              Bambatsi.Root.MaximumNConc.Value
              Bambatsi.TotalLive.Wt
              Bambatsi.Stem.Live.StructuralWt
              Bambatsi.Stem.Live.NonStructuralWt
              Bambatsi.Leaf.SpecificArea
              Bambatsi.TotalDead.Wt
              [Soil].SoilWater.SWmm
              [Soil].NO3N
              Bambatsi.Arbitrator.NDemand
              Bambatsi.Leaf.LAIFunction.SpecificLeafArea.Value
              Bambatsi.IndividualTreeLiveWt.Value
              Bambatsi.Age.Value
    Folder Dalby
      Experiment Dalby
        Factors
          Factor Irr: Specifications=[IrrigationLogic]
            Manager Wet
              FASW = 0
              WaterDeficit = 0
              AutoIrrigationOn = True
              FASWThreshold = 0.25
              FASWDepth = 500
```csharp
using System;
using Models.Core;
using System.Collections.Generic;
using System.Text;
using Models.Soils;
using Models.PMF;
using Models;
using System.Xml.Serialization;
using APSIM.Shared.Utilities;

namespace Models
{
	[Serializable] 
	public class Script : Model
	{
		public double FASW { get; set; }
		public double WaterDeficit  { get; set; }
	
		[Link] Plant Chickpea;
		[Link] Zone zone;
		[Link] Irrigation irrigation;
		[Link] Fertiliser fertiliser;
		[Link] Soil soil;
		
		[Description("Auto irrigation on?")]
		public bool AutoIrrigationOn { get; set; }
		
		[Description("Threshold fraction available water (0-1)")]
		public double FASWThreshold { get; set; }

		[Description("Soil depth (mm) to which fraction available water is calculated")]
		public double FASWDepth { get; set; }

		[EventSubscribe("DoManagement")]
		private void OnDoManagement(object sender, EventArgs e)
		{
			CalculateFASW();
			if (AutoIrrigationOn)
			{
				if (FASW < FASWThreshold)
				{
					double amount = 10;
					irrigation.Apply(WaterDeficit, depth: 0);
				}
			}
		}
		
		private void CalculateFASW()
		{
			double[] LL15 = MathUtilities.Multiply(soil.LL15, soil.Thickness);
			double[] DUL = MathUtilities.Multiply(soil.DUL, soil.Thickness);
		
			int nlayr = GetLayerIndex();
			double cumdep = MathUtilities.Sum(soil.Thickness, 0, nlayr, 0.0);

			double excess_fr = MathUtilities.Divide((cumdep - FASWDepth), soil.Thickness[nlayr], 0.0);

			// note that results may be strange if swdep < ll15
			double avail_sw = (MathUtilities.Sum(soil.Water, 0, nlayr, 0.0)
			                  - excess_fr * soil.Water[nlayr])
			                  - (MathUtilities.Sum(LL15, 0, nlayr, 0.0)
			                  - excess_fr * LL15[nlayr]);


			double pot_avail_sw = (MathUtilities.Sum(DUL, 0, nlayr, 0.0)
			                      - excess_fr * DUL[nlayr])
			                      - (MathUtilities.Sum(LL15, 0, nlayr, 0.0)
			                      - excess_fr * LL15[nlayr]);

			FASW = MathUtilities.Divide(avail_sw, pot_avail_sw, 0.0);
			WaterDeficit = MathUtilities.Constrain(pot_avail_sw - avail_sw, 0.0, 100000);
		}

		private int GetLayerIndex()
		{
			double[] cumThickness = Soil.ToCumThickness(soil.Thickness);
			for (int i = 1; i < cumThickness.Length; i++)
			{
				if (FASWDepth < cumThickness[i])
					return i - 1;
			}
			
			return cumThickness.Length - 1;
		}

	}
}
```
            Manager Dry
              FASW = 0
              WaterDeficit = 0
              AutoIrrigationOn = False
              FASWThreshold = 0.9
              FASWDepth = 1000
              script: same as in Validation.Dalby.Dalby.Factors.Irr.Wet
        Simulation DalbyBase
          Weather: FileName=DALBYCOL.met
          Clock: StartDate=1982-01-12; EndDate=1984-04-29
          Summary
          SoilArbitrator Soil Arbitrator
          Zone Field: Area=0; Slope=0
            Soil: Latitude=0; Longitude=0; Area=0
              Water
                Thickness  BD    AirDry  LL15  DUL   SAT
                100        1.24  0.1     0.25  0.43  0.48
                125        1.24  0.1     0.27  0.43  0.48
                200        1.27  0.1     0.32  0.43  0.48
                275        1.3   0.1     0.35  0.43  0.48
                300        1.32  0.1     0.37  0.43  0.48
                300        1.34  0.1     0.38  0.43  0.48
                300        1.35  0.1     0.39  0.43  0.48
                300        1.38  0.1     0.41  0.43  0.48
                SoilCrop BambatsiSoil: LL=[0.25, 0.27, 0.32, 0.35, 0.37, 0.38, 0.39, 0.41]; KL=[0.04, 0.04, 0.03, 0.02, 0.02, 0.01, 0.005, 0.005]; XF=[1, 1, 1, 1, 1, 1, 1, 1]
              SoilWater: SummerDate=1-Nov; SummerU=5; SummerCona=5; WinterDate=1-Apr; WinterU=5; WinterCona=5; DiffusConst=40; DiffusSlope=16; Salb=0.13; CN2Bare=80; CNRed=20; CNCov=0.8; max_pond=0; residueinterception=0
                Thickness=[100, 200, 200, 200, 200, 200, 200, 200, 200, 200, 200, 200, 200, 200, 200, 200]
                SWCON=[0.4, 0.4, 0.4, 0.4, 0.4, 0.4, 0.4, 0.4, 0.4, 0.4, 0.4, 0.4, 0.4, 0.4, 0.4, 0.4]
              SoilNitrogen: fom_type=[default, manure, mucuna, lablab, shemp, stable]; fract_carb=[0.2, 0.3, 0.54, 0.57, 0.45, 0]; fract_cell=[0.7, 0.3, 0.37, 0.37, 0.47, 0.1]; fract_lign=[0.1, 0.4, 0.09, 0.06, 0.08, 0.9]; wfpsN2N2O_x=[22, 88]; wfpsN2N2O_y=[0.1, 1]
              SoilOrganicMatter: RootCN=60; RootWt=2000; SoilCN=14; EnrACoeff=7.4; EnrBCoeff=0.2; OCUnits=Total
                Thickness  OC    FBiom  FInert
                100        1     0.03   0.6
                125        0.45  0.02   0.7
                200        0.27  0.015  0.85
                275        0.27  0.01   0.95
                300        0.27  0.01   0.95
                300        0.27  0.01   0.95
                300        0.27  0.01   0.95
                300        0.27  0.01   0.95
              Analysis: PH=[6, 6.4, 6.8, 7.2, 7.6, 8, 8, 8, 8, 8, 8, 8, 8, 8, 8, 8]; PHUnits=Water; BoronUnits=HotWater
                Thickness=[100, 200, 200, 200, 200, 200, 200, 200, 200, 200, 200, 200, 200, 200, 200, 200]
              Sample Initial nitrogen: NO3Units=ppm; NH4Units=ppm; SWUnits=Volumetric; OCUnits=Total; PHUnits=Water
                Thickness  NO3  NH4
                100        1    0.1
                125        0.5  0.1
                200        0.1  0.1
                275        0.1  0.1
                300        0.1  0.1
                300        0.1  0.1
                300        0.1  0.1
                300        0.1  0.1
              Sample Initial water: Thickness=[100, 125, 200, 275, 300, 300, 300, 300]; SW=[0.25, 0.27, 0.32, 0.4, 0.4, 0.42, 0.42, 0.42]; NO3Units=ppm; NH4Units=ppm; SWUnits=Volumetric; OCUnits=Total; PHUnits=Water
            Irrigation
            Fertiliser
            SurfaceOrganicMatter: same as Validation.LiverpoolPlains.Hudson.Field.SurfaceOrganicMatter
            MicroClimate: same as Validation.LiverpoolPlains.Hudson.Field.MicroClimate
            Plant Bambatsi: CropType=Bambatsi
            Operations
              1982-01-12  [Bambatsi].Sow(population: 200, cultivar: Bambatsi, depth: 100, rowSpacing: 100);
              1982-01-12  [Fertiliser].Apply(100.0, Fertiliser.Types.UreaN, 0);
              1982-08-01  [Fertiliser].Apply(100.0, Fertiliser.Types.UreaN, 0);
              1982-08-01  [Bambatsi].Harvest();
              1983-08-01  [Fertiliser].Apply(100.0, Fertiliser.Types.UreaN, 0);
              1983-08-01  [Bambatsi].Harvest();
              1984-08-01  [Fertiliser].Apply(100.0, Fertiliser.Types.UreaN, 0);
              1984-08-01  [Bambatsi].Harvest();
            Report: EventNames=[Clock].DoReport
              VariableNames:
                [Clock].Today
                Bambatsi.Phenology.CurrentPhaseName
                Bambatsi.Phenology.StageCode.Value
                Bambatsi.Root.NSupplyUptake
                [Soil].SoilWater.Eo
                [Soil].SoilWater.Es
                [Soil].SoilWater.Drainage
                [Soil].SoilWater.Runoff
                [Soil].SoilWater.pond
                sum([Soil].SoilWater.SWmm[1:3]) as SW0_42cm
                sum([Soil].SoilWater.SWmm[4:5]) as SW42_100cm
                sum([Soil].SoilWater.SWmm[6:8]) as SW100_190cm
                sum([Soil].SoilWater.SWmm[1:8]) as SW0_190cm
                Bambatsi.AboveGround.Wt
                Bambatsi.AboveGroundLive.Wt
                Bambatsi.AboveGroundDead.Wt
                Bambatsi.BelowGround.Wt
                Bambatsi.Total.Wt
                Bambatsi.Leaf.Dead.Wt
                Bambatsi.Leaf.Live.Wt
                Bambatsi.Stem.Dead.Wt
                Bambatsi.Stem.Live.Wt
                Bambatsi.Root.Dead.Wt
                Bambatsi.Root.Live.Wt
                Bambatsi.AboveGround.N
                Bambatsi.BelowGround.N
                Bambatsi.Total.N
                Bambatsi.TotalLive.N
                Bambatsi.TotalDead.N
                Bambatsi.Leaf.Dead.N
                Bambatsi.Leaf.Live.N
                Bambatsi.Stem.Dead.N
                Bambatsi.Stem.Live.N
                Bambatsi.Branch.Live.Wt
                Bambatsi.Branch.Live.N
                Bambatsi.Wood.Wt
                Bambatsi.Root.Live.N
                Bambatsi.Root.Dead.N
                Bambatsi.Leaf.Live.NConc
                Bambatsi.Leaf.Dead.NConc
                Bambatsi.Stem.Live.NConc
                Bambatsi.Root.Live.NConc
                Bambatsi.Root.WaterSupply
                Bambatsi.Root.WaterUptake
                Bambatsi.Leaf.Transpiration
                Bambatsi.Leaf.WaterDemand
                Bambatsi.Root.Depth
                Bambatsi.Leaf.CoverGreen
                Bambatsi.Leaf.CoverTotal
                Bambatsi.Leaf.CoverDead
                Bambatsi.Leaf.LAI
                Bambatsi.Leaf.LAIDead
                Bambatsi.Leaf.Fn
                Bambatsi.Leaf.Fw
                Bambatsi.Leaf.Photosynthesis.FT.Value
                Bambatsi.Leaf.Photosynthesis.FVPD.Value
                Bambatsi.Leaf.Photosynthesis.RueAct
                Bambatsi.Stem.MinimumNConc.Value
                Bambatsi.Root.MinimumNConc.Value
                Bambatsi.Stem.MaximumNConc.Value
                Bambatsi.Root.MaximumNConc.Value
                Bambatsi.TotalLive.Wt
                Bambatsi.Stem.Live.StructuralWt
                Bambatsi.Stem.Live.NonStructuralWt
                Bambatsi.Leaf.SpecificArea
                Bambatsi.TotalDead.Wt
                [Soil].SoilWater.SWmm
                [Soil].NO3N
                Bambatsi.Arbitrator.NDemand
                Bambatsi.Leaf.LAIFunction.SpecificLeafArea.Value
                Bambatsi.IndividualTreeLiveWt.Value
                Bambatsi.Age.Value
            Manager IrrigationLogic
              FASW = 0
              WaterDeficit = 0
              AutoIrrigationOn = True
              FASWThreshold = 0.9
              FASWDepth = 1000
```csharp
using System;
using Models.Core;
using System.Collections.Generic;
using System.Text;
using Models.Soils;
using Models.PMF;
using Models;
using System.Xml.Serialization;
using APSIM.Shared.Utilities;

namespace Models
{
	[Serializable] 
	public class Script : Model
	{
		public double FASW { get; set; }
		public double WaterDeficit  { get; set; }
	
		[Link] Plant Chickpea;
		[Link] Zone zone;
		[Link] Irrigation irrigation;
		[Link] Fertiliser fertiliser;
		[Link] Soil soil;
		
		[Description("Auto irrigation on?")]
		public bool AutoIrrigationOn { get; set; }
		
		[Description("Threshold fraction available water (0-1)")]
		public double FASWThreshold { get; set; }

		[Description("Soil depth (mm) to which fraction available water is calculated")]
		public double FASWDepth { get; set; }

		[EventSubscribe("DoManagement")]
		private void OnDoManagement(object sender, EventArgs e)
		{
			CalculateFASW();
			if (AutoIrrigationOn)
			{
				if (FASW < FASWThreshold)
				{
					double amount = 10;
					irrigation.Apply(WaterDeficit, depth: 0);
					fertiliser.Apply(Amount: 10, Type: Fertiliser.Types.NO3N);
				}
			}
		}
		
		private void CalculateFASW()
		{
			double[] LL15 = MathUtilities.Multiply(soil.LL15, soil.Thickness);
			double[] DUL = MathUtilities.Multiply(soil.DUL, soil.Thickness);
		
			int nlayr = GetLayerIndex();
			double cumdep = MathUtilities.Sum(soil.Thickness, 0, nlayr, 0.0);

			double excess_fr = MathUtilities.Divide((cumdep - FASWDepth), soil.Thickness[nlayr], 0.0);

			// note that results may be strange if swdep < ll15
			double avail_sw = (MathUtilities.Sum(soil.Water, 0, nlayr, 0.0)
			                  - excess_fr * soil.Water[nlayr])
			                  - (MathUtilities.Sum(LL15, 0, nlayr, 0.0)
			                  - excess_fr * LL15[nlayr]);


			double pot_avail_sw = (MathUtilities.Sum(DUL, 0, nlayr, 0.0)
			                      - excess_fr * DUL[nlayr])
			                      - (MathUtilities.Sum(LL15, 0, nlayr, 0.0)
			                      - excess_fr * LL15[nlayr]);

			FASW = MathUtilities.Divide(avail_sw, pot_avail_sw, 0.0);
			WaterDeficit = MathUtilities.Constrain(pot_avail_sw - avail_sw, 0.0, 100000);
		}

		private int GetLayerIndex()
		{
			double[] cumThickness = Soil.ToCumThickness(soil.Thickness);
			for (int i = 1; i < cumThickness.Length; i++)
			{
				if (FASWDepth < cumThickness[i])
					return i - 1;
			}
			
			return cumThickness.Length - 1;
		}

	}
}
```
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