Simulations: Version=220
  Folder Replacements
    Report DailyReport: EventNames=[Clock].DoReport
      VariableNames:
        [Clock].Today
        [IWeather].Radn
        [IWeather].MeanT
        [Barley].Phenology.Photoperiod
        [Barley].Phenology.HaunStage
        ([Barley].Leaf.Transpiration + [Soil].SoilWater.Es + [MicroClimate].PrecipitationInterception) as ET
        [Barley].AboveGround.N
        [Barley].AboveGround.Wt
        [Barley].AboveGroundLive.N
        [Barley].AboveGroundLive.Wt
        [Barley].Ear.N
        [Barley].Ear.NConc
        [Barley].Ear.Wt
        [Barley].Grain.N
        [Barley].Grain.NConc
        [Barley].Grain.Number
        [Barley].Grain.Size
        [Barley].Grain.Wt
        [Barley].Leaf.CoverGreen
        [Barley].Leaf.CoverTotal
        [Barley].Leaf.Dead.Wt
        [Barley].Leaf.Ligules
        [Barley].Leaf.LAI
        [Barley].Leaf.Live.NConc
        [Barley].Leaf.Live.Wt
        [Barley].Leaf.SpecificArea
        [Barley].Leaf.SpecificAreaCanopy
        [Barley].AboveGround.NConc
        [Barley].Leaf.Live.N
        [Barley].Leaf.Wt
        [Barley].Stem.N
        [Barley].Phenology.AccumulatedEmergedTT
        [Barley].Phenology.CurrentStageName
        [Barley].Phenology.FlagLeafDAS
        [Barley].Phenology.FloweringDAS
        [Barley].Phenology.Stage
        [Barley].Phenology.Zadok.Stage
        [Barley].SowingData.Cultivar
        [Barley].Spike.Wt
        [Barley].Stem.NConc
        [Barley].Stem.Wt
        [Barley].Phenology.HaunStage
        [Barley].Leaf.Height
        [Barley].Leaf.Tips
        [Barley].Leaf.MainStemPopulation
        [Barley].Leaf.Fn
        [Barley].Leaf.Fw
        [Soil].Nutrient.MineralN
        [Soil].Water.Volumetric
        [Soil].Water.MM
        sum([Soil].Nutrient.MineralN) as ProfileN
        sum([Soil].Water.MM) as ProfileWater
    Report HarvestReport: EventNames=[Barley].Harvesting
      VariableNames:
        [Clock].Today
        [Barley].Phenology.CurrentPhase.Name
        [Barley].Phenology.CurrentStageName
        [Barley].Phenology.EmergenceDAS
        [Barley].Phenology.FlagLeafDAS
        [Barley].Phenology.FloweringDAS
        [Barley].Phenology.MaturityDAS
        [Barley].Grain.Wt
        [Barley].Grain.N
        [Barley].Grain.Number
        [Barley].Grain.NConc
        [Barley].AboveGround.Wt
        [Barley].AboveGround.N
        [Barley].Grain.Protein
        [Barley].Grain.Size
        [Barley].Phenology.HaunStage
        [Barley].Phenology.FinalLeafNumber
        [Barley].Leaf.MainStemPopulation
        [Barley].SowingData.Cultivar
        [Barley].SowingDate.DayOfYear
        [Clock].StartDate
    Manager Harvesting
```csharp
using Models.PMF.Phen;
using System;
using Models.Core;
using System.Collections.Generic;
using System.Text;
using Models.Soils;
using Models.PMF;
using Models;
using System.Xml.Serialization;
using APSIM.Shared.Utilities;

namespace Models
{
    [Serializable] 
    public class Script : Model
    {
        [Link] private Plant Barley;
        [Link(Type = LinkType.Path, Path = "[Barley].Phenology")]
        private Phenology phenology;
        [EventSubscribe("DoManagement")]
        private void OnDoManagement(object sender, EventArgs e)
        {
            if (phenology.CurrentPhase.Name == "Maturing")
            {
                Barley.Harvest();
                Barley.EndCrop();
            }
        }
    }
}
```
    Report SowingReport: EventNames=[Barley].Sowing
      VariableNames:
        [Clock].Today
        [Barley].SowingData.Cultivar
        [IWeather].Latitude
        [IWeather].Longitude
    Plant Barley: ResourceName=WinterCereal
      ModelOverrides
        Overrides=[[Barley].PlantType=Barley, [Phenology].Flowering.Target.FixedValue=0, [Phenology].HeadEmergenceLongDayBase.FixedValue = 140, [Phenology].HeadEmergencePpSensitivity.FixedValue = 0.33, , // underestimated biomass: increase the biomass supply, [Leaf].Photosynthesis.RUE.FixedValue=1.65 // 1.55 // 1.5 (release), , [Leaf].Photosynthesis.FW.XYPairs.X=0, 0.5, 1, [Leaf].Photosynthesis.FW.XYPairs.Y=0, 1,   1, , //[Leaf].Photosynthesis.FN.XYPairs.X=0, 0.5, 1, //[Leaf].Photosynthesis.FN.XYPairs.Y=0, 1,   1, , , // overestiamted green cover and total cover at early stages and LAI: lower leaf area dimensions (LAI, green and total cover), [Leaf].AreaLargestLeaf.FixedValue=0.002, , // The AgeFactor has the effect of increasing leaf size from a minimum for the first leaf appeared to a maximum for leaves that appear soon after TerminalSpikelet (stage 5),, // and then decreasing again for leaves appearing between TerminalSpikelet and FlagLeaf (stage 6), //[Leaf].DMDemands.Structural.DeltaLAIPotential.Vegetative.Delta.RelativeArea.XYPairs.X= 3,   3.5, 4.0,  5.0,  6.0 // 3,   3.6,  4.2,  5.0 // stage, //[Leaf].DMDemands.Structural.DeltaLAIPotential.Vegetative.Delta.RelativeArea.XYPairs.Y= 0.1, 0.6, 0.8,  1.0,  0.4 // 0.1, 0.5,  1.0,  0.4, // [Leaf].DMDemands.Structural.DeltaLAIPotential.Vegetative.Delta.RelativeArea.XYPairs.X= 3,   3.1, 4.0,  5.0, 5.5,  6.0 // 3,   3.6,  4.2,  5.0 // stage, // [Leaf].DMDemands.Structural.DeltaLAIPotential.Vegetative.Delta.RelativeArea.XYPairs.Y= 0.1, 0.2, 0.4,  0.9, 1.0,  0.4 // 0.1, 0.5,  1.0,  0.4, , [Leaf].DMDemands.Structural.DeltaLAIPotential.Vegetative.Delta.RelativeArea.XYPairs.X= 3.0, 4.0,  5.0,  5.2,  6.0  // 3,   3.6,  4.2,  5.0 // stage, [Leaf].DMDemands.Structural.DeltaLAIPotential.Vegetative.Delta.RelativeArea.XYPairs.Y= 0.1, 0.4,  0.9,  1.0,  0.4 // 0.1, 0.5,  1.0,  0.4, , // Extinction coefficient increases at early stages: exntiction coefficient increases at stem extension as leaves become more prostrate, // k = VegetativePhase + (EarlyValue(X = RowSpacing) − VegetativePhase)​ ​× DevelopmentFactor(X = Stage), // cover=1−e^(−k * LAI), [Leaf].ExtinctionCoefficient.EarlyIncrease.DevelopmentFactor.XYPairs.X= 3,    4,    4.5,  5,    5.5,   6 // 3, 4, 6 // stage, //[Leaf].ExtinctionCoefficient.EarlyIncrease.DevelopmentFactor.XYPairs.Y= 0.67, 0.60, 0.38, 0.20, 0.02,  0 // 1, 1, 0 // 0.6 (release), [Leaf].ExtinctionCoefficient.EarlyIncrease.DevelopmentFactor.XYPairs.Y= 0.63, 0.56, 0.38, 0.20, 0.02,  0 // 1, 1, 0, , , [Leaf].ExtinctionCoefficient.EarlyIncrease.Range.EarlyValue.XYPairs.X=150,  250,  500 // row spaceing, [Leaf].ExtinctionCoefficient.EarlyIncrease.Range.EarlyValue.XYPairs.Y=0.72, 0.68, 0.6 // 0.9, 0.8, 0.7, , [Leaf].ExtinctionCoefficient.VegetativePhase.FixedValue=0.6 // 0.6, , // LAI ∝ ΔLAIpot (leaf expansion) ​​​∝ AreaLargestLeaf × RelativeArea(X = Stage) × LAR × [ExpansionStress] (min(SWEffect, TempEffect, NEffect)), [Leaf].ExpansionStress.SWEffect.XYPairs.X= 0.6, 0.8, 0.9, 1 // 0.8, 1 //WaterTensionFactor, [Leaf].ExpansionStress.SWEffect.XYPairs.Y= 0,   0.3, 0.7, 1 // 0.5, 1, , //[Leaf].ExpansionStress.NitrogenEffect.XYPairs.X= 0.6, 0.8, 0.9, 1 // 0.8, 1 // fn, //[Leaf].ExpansionStress.NitrogenEffect.XYPairs.Y= 0,   0.3, 0.7, 1 // 0, 1, , , // SLA, // SpecificArea_realized = PotentialSpecificArea(x = LAI) × min(SWFactor, TemperatureFactor), //[Leaf].SpecificArea.Potential.XYPairs.X =0.25,   1.50,   3.50,    6.00    // 0,    1.5 // LAI, //[Leaf].SpecificArea.Potential.XYPairs.Y =0.0190, 0.0223, 0.02586, 0.03278 // 0.03, 0.03, , //[Leaf].SpecificArea.Potential.XYPairs.X =0.125,  0.375,  0.625,  0.875,  1.25,   1.75,   2.50,   3.50,   5.00,   7.00  // 0,    1.5 // LAI, //[Leaf].SpecificArea.Potential.XYPairs.Y =0.0200, 0.0210, 0.0215, 0.0220, 0.0225, 0.035, 0.035,  0.035,  0.035,  0.0350 // 0.03, 0.03, , [Leaf].SpecificArea.Potential.XYPairs.X =0,     1.5 // 0,    1.5 // LAI, [Leaf].SpecificArea.Potential.XYPairs.Y =0.035, 0.035 // 0.03, 0.03, , , // water stress cause thicker leaf (lower SLA), [Leaf].SpecificArea.ReductionFactor.SWFactor.XYPairs.X = 0.6,  0.8,  1 // 0.8, 1 // WaterTensionFactor, [Leaf].SpecificArea.ReductionFactor.SWFactor.XYPairs.Y = 0.85, 0.95, 1 // 0.5, 1, , // temperature stress cause thicker leaf (lower SLA), //[Leaf].SpecificArea.ReductionFactor.TemperatureFactor.XYPairs.X= 5,   10,  15 // 5,  15 // weighted temperature, //[Leaf].SpecificArea.ReductionFactor.TemperatureFactor.XYPairs.Y= 0.3, 0.5, 1 // 0.5, 1, , [Leaf].TilleringRate.Vegetative.StressedRate.Stresses.CoverEffect.XYPairs.X=0, 0.35, 0.5// 0, 0.35, 0.5, [Leaf].TilleringRate.Vegetative.StressedRate.Stresses.CoverEffect.XYPairs.Y=1, 1, 0, , , [Grain].MaximumPotentialGrainSize.FixedValue=0.055, [Grain].NumberFunction.GrainNumber.GrainsPerGramOfStem.FixedValue=35]
      Folder Cultivars1
        Cultivar Alestar_org
          Command:
            [Phenology].CAMP.FLNparams.MinLN = 9
            [Phenology].CAMP.FLNparams.PpLN = -3
            [Phenology].CAMP.FLNparams.VrnLN = 6
            [Phenology].CAMP.FLNparams.VxPLN = -7
            [Phenology].Phyllochron.BasePhyllochron.FixedValue = 120.9431217
            [Phenology].PhyllochronPpSensitivity.FixedValue = 0.207440505
            [Phenology].CAMP.EnvData.VrnTreatTemp = 5.8
            [Phenology].HeadEmergenceLongDayBase.FixedValue = 50
            [Phenology].HeadEmergencePpSensitivity.FixedValue = 0
        Cultivar Banks_org
          Command:
            [Phenology].CAMP.FLNparams.MinLN = 8
            [Phenology].CAMP.FLNparams.PpLN = -2
            [Phenology].CAMP.FLNparams.VrnLN = 4
            [Phenology].CAMP.FLNparams.VxPLN = -6
            [Phenology].Phyllochron.BasePhyllochron.FixedValue = 120.3588019
            [Phenology].PhyllochronPpSensitivity.FixedValue = 0.23234103
            [Phenology].CAMP.EnvData.VrnTreatTemp = 5.8
            [Phenology].HeadEmergenceLongDayBase.FixedValue = 70
            [Phenology].HeadEmergencePpSensitivity.FixedValue = 2
        Cultivar Bass_org
          Command:
            [Phenology].CAMP.FLNparams.MinLN = 8.333333333
            [Phenology].CAMP.FLNparams.PpLN = -2.333333333
            [Phenology].CAMP.FLNparams.VrnLN = 4
            [Phenology].CAMP.FLNparams.VxPLN = -3.333333333
            [Phenology].Phyllochron.BasePhyllochron.FixedValue = 110.9847693
            [Phenology].PhyllochronPpSensitivity.FixedValue = 0.261968924
            [Phenology].CAMP.EnvData.VrnTreatTemp = 5.8
            [Phenology].HeadEmergenceLongDayBase.FixedValue = 50
            [Phenology].HeadEmergencePpSensitivity.FixedValue = 2
        Cultivar Baudin_org
          Command:
            [Phenology].CAMP.FLNparams.MinLN = 7.333333333
            [Phenology].CAMP.FLNparams.PpLN = 3.666666667
            [Phenology].CAMP.FLNparams.VrnLN = 2
            [Phenology].CAMP.FLNparams.VxPLN = -1.333333333
            [Phenology].Phyllochron.BasePhyllochron.FixedValue = 69.95241059
            [Phenology].PhyllochronPpSensitivity.FixedValue = 0.748224618
            [Phenology].CAMP.EnvData.VrnTreatTemp = 5.8
            [Phenology].HeadEmergenceLongDayBase.FixedValue = 50
            [Phenology].HeadEmergencePpSensitivity.FixedValue = 6
        Cultivar Biere_org
          Command:
            [Phenology].CAMP.FLNparams.MinLN = 8.333333333
            [Phenology].CAMP.FLNparams.PpLN = -2.333333333
            [Phenology].CAMP.FLNparams.VrnLN = 0
            [Phenology].CAMP.FLNparams.VxPLN = -2.333333333
            [Phenology].Phyllochron.BasePhyllochron.FixedValue = 118.6729904
            [Phenology].PhyllochronPpSensitivity.FixedValue = 0.182591106
            [Phenology].CAMP.EnvData.VrnTreatTemp = 5.8
            [Phenology].HeadEmergenceLongDayBase.FixedValue = 50
            [Phenology].HeadEmergencePpSensitivity.FixedValue = 4
        Cultivar Buloke_org
          Command:
            [Phenology].CAMP.FLNparams.MinLN = 9
            [Phenology].CAMP.FLNparams.PpLN = 4
            [Phenology].CAMP.FLNparams.VrnLN = 0
            [Phenology].CAMP.FLNparams.VxPLN = 0
            [Phenology].Phyllochron.BasePhyllochron.FixedValue = 85
            [Phenology].PhyllochronPpSensitivity.FixedValue = 1.1
            [Phenology].CAMP.EnvData.VrnTreatTemp = 5.8
        Cultivar Bumpa
          Command:
            [Phenology].CAMP.FLNparams.MinLN = 9
            [Phenology].CAMP.FLNparams.PpLN = 3
            [Phenology].CAMP.FLNparams.VrnLN = 0
            [Phenology].CAMP.FLNparams.VxPLN = 0
            [Phenology].Phyllochron.BasePhyllochron.FixedValue = 59.1603
            [Phenology].PhyllochronPpSensitivity.FixedValue = 1.1
            [Phenology].CAMP.EnvData.VrnTreatTemp = 5.8
        Cultivar Capstan_org
          Command:
            [Phenology].CAMP.FLNparams.MinLN = 8
            [Phenology].CAMP.FLNparams.PpLN = 4
            [Phenology].CAMP.FLNparams.VrnLN = 0
            [Phenology].CAMP.FLNparams.VxPLN = -2
            [Phenology].Phyllochron.BasePhyllochron.FixedValue = 87.44227888
            [Phenology].PhyllochronPpSensitivity.FixedValue = 0.655991185
            [Phenology].CAMP.EnvData.VrnTreatTemp = 5.8
            [Phenology].HeadEmergenceLongDayBase.FixedValue = 50
            [Phenology].HeadEmergencePpSensitivity.FixedValue = 5
        Cultivar Cassiopee
          Command:
            [Phenology].CAMP.FLNparams.MinLN = 11.33333333
            [Phenology].CAMP.FLNparams.PpLN = -0.33333333
            [Phenology].CAMP.FLNparams.VrnLN = 14
            [Phenology].CAMP.FLNparams.VxPLN = -14.33333333
            [Phenology].Phyllochron.BasePhyllochron.FixedValue = 111.760502
            [Phenology].PhyllochronPpSensitivity.FixedValue = 0.154654968
            [Phenology].CAMP.EnvData.VrnTreatTemp = 5.8
            [Phenology].HeadEmergenceLongDayBase.FixedValue = 50
            [Phenology].HeadEmergencePpSensitivity.FixedValue = 0
        Cultivar Commander_org
          Command:
            [Phenology].CAMP.FLNparams.MinLN = 7.666666667
            [Phenology].CAMP.FLNparams.PpLN = 2.333333333
            [Phenology].CAMP.FLNparams.VrnLN = 4
            [Phenology].CAMP.FLNparams.VxPLN = -5.666666667
            [Phenology].Phyllochron.BasePhyllochron.FixedValue = 96.92081575
            [Phenology].PhyllochronPpSensitivity.FixedValue = 0.369052131
            [Phenology].CAMP.EnvData.VrnTreatTemp = 5.8
            [Phenology].HeadEmergenceLongDayBase.FixedValue = 50
            [Phenology].HeadEmergencePpSensitivity.FixedValue = 1
        Cultivar Compass_org
          Command:
            [Phenology].CAMP.FLNparams.MinLN = 9
            [Phenology].CAMP.FLNparams.PpLN = -3
            [Phenology].CAMP.FLNparams.VrnLN = 5
            [Phenology].CAMP.FLNparams.VxPLN = -5
            [Phenology].Phyllochron.BasePhyllochron.FixedValue = 104.3258054
            [Phenology].PhyllochronPpSensitivity.FixedValue = 0.246502671
            [Phenology].CAMP.EnvData.VrnTreatTemp = 5.8
            [Phenology].HeadEmergenceLongDayBase.FixedValue = 50
            [Phenology].HeadEmergencePpSensitivity.FixedValue = 0
        Cultivar Csirob1_org
          Command:
            [Phenology].CAMP.FLNparams.MinLN = 7.333333333
            [Phenology].CAMP.FLNparams.PpLN = 0.666666667
            [Phenology].CAMP.FLNparams.VrnLN = 5
            [Phenology].CAMP.FLNparams.VxPLN = -3.333333333
            [Phenology].Phyllochron.BasePhyllochron.FixedValue = 76.78280555
            [Phenology].PhyllochronPpSensitivity.FixedValue = 0.619292867
            [Phenology].CAMP.EnvData.VrnTreatTemp = 5.8
            [Phenology].HeadEmergenceLongDayBase.FixedValue = 90
            [Phenology].HeadEmergencePpSensitivity.FixedValue = 6
        Cultivar Csirob3_org
          Command:
            [Phenology].CAMP.FLNparams.MinLN = 6
            [Phenology].CAMP.FLNparams.PpLN = 4
            [Phenology].CAMP.FLNparams.VrnLN = 0
            [Phenology].CAMP.FLNparams.VxPLN = 0
            [Phenology].Phyllochron.BasePhyllochron.FixedValue = 57.45009872
            [Phenology].PhyllochronPpSensitivity.FixedValue = 1.18910351
            [Phenology].CAMP.EnvData.VrnTreatTemp = 5.8
            [Phenology].HeadEmergenceLongDayBase.FixedValue = 50
            [Phenology].HeadEmergencePpSensitivity.FixedValue = 4
        Cultivar Fathom_org
          Command:
            [Phenology].CAMP.FLNparams.MinLN = 6
            [Phenology].CAMP.FLNparams.PpLN = 5
            [Phenology].CAMP.FLNparams.VrnLN = 7
            [Phenology].CAMP.FLNparams.VxPLN = -6
            [Phenology].Phyllochron.BasePhyllochron.FixedValue = 82.17586355
            [Phenology].PhyllochronPpSensitivity.FixedValue = 0.85248787
            [Phenology].CAMP.EnvData.VrnTreatTemp = 5.8
            [Phenology].HeadEmergenceLongDayBase.FixedValue = 50
            [Phenology].HeadEmergencePpSensitivity.FixedValue = 1
        Cultivar Fleet_org
          Command:
            [Phenology].CAMP.FLNparams.MinLN = 8
            [Phenology].CAMP.FLNparams.PpLN = 3
            [Phenology].CAMP.FLNparams.VrnLN = 0
            [Phenology].CAMP.FLNparams.VxPLN = -2
            [Phenology].Phyllochron.BasePhyllochron.FixedValue = 90.88228131
            [Phenology].PhyllochronPpSensitivity.FixedValue = 0.4688122
            [Phenology].CAMP.EnvData.VrnTreatTemp = 5.8
            [Phenology].HeadEmergenceLongDayBase.FixedValue = 50
            [Phenology].HeadEmergencePpSensitivity.FixedValue = 2
        Cultivar Flinders_org
          Command:
            [Phenology].CAMP.FLNparams.MinLN = 8.333333333
            [Phenology].CAMP.FLNparams.PpLN = -2.333333333
            [Phenology].CAMP.FLNparams.VrnLN = 5
            [Phenology].CAMP.FLNparams.VxPLN = -7.333333333
            [Phenology].Phyllochron.BasePhyllochron.FixedValue = 129.3942158
            [Phenology].PhyllochronPpSensitivity.FixedValue = 0.105323488
            [Phenology].CAMP.EnvData.VrnTreatTemp = 5.8
            [Phenology].HeadEmergenceLongDayBase.FixedValue = 70
            [Phenology].HeadEmergencePpSensitivity.FixedValue = 1
        Cultivar Franklin_org
          Command:
            [Phenology].CAMP.FLNparams.MinLN = 10
            [Phenology].CAMP.FLNparams.PpLN = -2
            [Phenology].CAMP.FLNparams.VrnLN = 5
            [Phenology].CAMP.FLNparams.VxPLN = -7
            [Phenology].Phyllochron.BasePhyllochron.FixedValue = 103.9731331
            [Phenology].PhyllochronPpSensitivity.FixedValue = 0.195075087
            [Phenology].CAMP.EnvData.VrnTreatTemp = 5.8
            [Phenology].HeadEmergenceLongDayBase.FixedValue = 50
            [Phenology].HeadEmergencePpSensitivity.FixedValue = 7
        Cultivar Gairdner_org
          Command:
            [Phenology].CAMP.FLNparams.MinLN = 10
            [Phenology].CAMP.FLNparams.PpLN = 0
            [Phenology].CAMP.FLNparams.VrnLN = 4
            [Phenology].CAMP.FLNparams.VxPLN = -5
            [Phenology].Phyllochron.BasePhyllochron.FixedValue = 88.54255431
            [Phenology].PhyllochronPpSensitivity.FixedValue = 0.325049926
            [Phenology].CAMP.EnvData.VrnTreatTemp = 5.8
            [Phenology].HeadEmergenceLongDayBase.FixedValue = 50
            [Phenology].HeadEmergencePpSensitivity.FixedValue = 2
        Cultivar Granger_org
          Command:
            [Phenology].CAMP.FLNparams.MinLN = 9
            [Phenology].CAMP.FLNparams.PpLN = 2
            [Phenology].CAMP.FLNparams.VrnLN = 0
            [Phenology].CAMP.FLNparams.VxPLN = -3
            [Phenology].Phyllochron.BasePhyllochron.FixedValue = 108.6702997
            [Phenology].PhyllochronPpSensitivity.FixedValue = 0.190962591
            [Phenology].CAMP.EnvData.VrnTreatTemp = 5.8
            [Phenology].HeadEmergenceLongDayBase.FixedValue = 50
            [Phenology].HeadEmergencePpSensitivity.FixedValue = 0
        Cultivar Grimmett
          Command:
            [Phenology].CAMP.FLNparams.MinLN = 9
            [Phenology].CAMP.FLNparams.PpLN = 5
            [Phenology].CAMP.FLNparams.VrnLN = 0
            [Phenology].CAMP.FLNparams.VxPLN = 0
            [Phenology].Phyllochron.BasePhyllochron.FixedValue = 60
            [Phenology].PhyllochronPpSensitivity.FixedValue = 1.1
            [Phenology].CAMP.EnvData.VrnTreatTemp = 5.8
        Cultivar Grout_org
          Command:
            [Phenology].CAMP.FLNparams.MinLN = 7.333333333
            [Phenology].CAMP.FLNparams.PpLN = 2.666666667
            [Phenology].CAMP.FLNparams.VrnLN = 0
            [Phenology].CAMP.FLNparams.VxPLN = -1.333333333
            [Phenology].Phyllochron.BasePhyllochron.FixedValue = 86.48989044
            [Phenology].PhyllochronPpSensitivity.FixedValue = 0.62631665
            [Phenology].CAMP.EnvData.VrnTreatTemp = 5.8
            [Phenology].HeadEmergenceLongDayBase.FixedValue = 50
            [Phenology].HeadEmergencePpSensitivity.FixedValue = 3
        Cultivar Hindmarsh_org: same as Replacements.Barley.Cultivars1.Buloke_org
        Cultivar Keel_org
          Command:
            [Phenology].CAMP.FLNparams.MinLN = 6
            [Phenology].CAMP.FLNparams.PpLN = 4
            [Phenology].CAMP.FLNparams.VrnLN = 1
            [Phenology].CAMP.FLNparams.VxPLN = -1
            [Phenology].Phyllochron.BasePhyllochron.FixedValue = 58.40056656
            [Phenology].PhyllochronPpSensitivity.FixedValue = 1.251746574
            [Phenology].CAMP.EnvData.VrnTreatTemp = 5.8
            [Phenology].HeadEmergenceLongDayBase.FixedValue = 70
            [Phenology].HeadEmergencePpSensitivity.FixedValue = 7
        Cultivar Lockyer_org
          Command:
            [Phenology].CAMP.FLNparams.MinLN = 6.666666667
            [Phenology].CAMP.FLNparams.PpLN = 3.333333333
            [Phenology].CAMP.FLNparams.VrnLN = 10
            [Phenology].CAMP.FLNparams.VxPLN = -10.666666667
            [Phenology].Phyllochron.BasePhyllochron.FixedValue = 97.89121109
            [Phenology].PhyllochronPpSensitivity.FixedValue = 0.405093218
            [Phenology].CAMP.EnvData.VrnTreatTemp = 5.8
            [Phenology].HeadEmergenceLongDayBase.FixedValue = 70
            [Phenology].HeadEmergencePpSensitivity.FixedValue = 1
        Cultivar Mundah_org
          Command:
            [Phenology].CAMP.FLNparams.MinLN = 9
            [Phenology].CAMP.FLNparams.PpLN = 1
            [Phenology].CAMP.FLNparams.VrnLN = 0
            [Phenology].CAMP.FLNparams.VxPLN = -1
            [Phenology].Phyllochron.BasePhyllochron.FixedValue = 99.85179413
            [Phenology].PhyllochronPpSensitivity.FixedValue = 0.253014157
            [Phenology].CAMP.EnvData.VrnTreatTemp = 5.8
            [Phenology].HeadEmergenceLongDayBase.FixedValue = 110
            [Phenology].HeadEmergencePpSensitivity.FixedValue = 7
        Cultivar Navigator_org
          Command:
            [Phenology].CAMP.FLNparams.MinLN = 8
            [Phenology].CAMP.FLNparams.PpLN = 4
            [Phenology].CAMP.FLNparams.VrnLN = 5
            [Phenology].CAMP.FLNparams.VxPLN = -7
            [Phenology].Phyllochron.BasePhyllochron.FixedValue = 93.43659898
            [Phenology].PhyllochronPpSensitivity.FixedValue = 0.400967405
            [Phenology].CAMP.EnvData.VrnTreatTemp = 5.8
            [Phenology].HeadEmergenceLongDayBase.FixedValue = 50
            [Phenology].HeadEmergencePpSensitivity.FixedValue = 1
        Cultivar Omaka1: same as Replacements.Barley.Cultivars1.Bumpa
        Cultivar Oxford_org
          Command:
            [Phenology].CAMP.FLNparams.MinLN = 9.666666667
            [Phenology].CAMP.FLNparams.PpLN = -3.666666667
            [Phenology].CAMP.FLNparams.VrnLN = 3
            [Phenology].CAMP.FLNparams.VxPLN = -6.666666667
            [Phenology].Phyllochron.BasePhyllochron.FixedValue = 139.8064143
            [Phenology].PhyllochronPpSensitivity.FixedValue = 0.107968397
            [Phenology].CAMP.EnvData.VrnTreatTemp = 5.8
            [Phenology].HeadEmergenceLongDayBase.FixedValue = 50
            [Phenology].HeadEmergencePpSensitivity.FixedValue = 1
        Cultivar Planet_org
          Command:
            [Phenology].CAMP.FLNparams.MinLN = 9
            [Phenology].CAMP.FLNparams.PpLN = 1
            [Phenology].CAMP.FLNparams.VrnLN = 0
            [Phenology].CAMP.FLNparams.VxPLN = -1
            [Phenology].Phyllochron.BasePhyllochron.FixedValue = 117.2869488
            [Phenology].PhyllochronPpSensitivity.FixedValue = 0.244404645
            [Phenology].CAMP.EnvData.VrnTreatTemp = 5.8
            [Phenology].HeadEmergenceLongDayBase.FixedValue = 70
            [Phenology].HeadEmergencePpSensitivity.FixedValue = 6
        Cultivar Rosalind_org
          Command:
            [Phenology].CAMP.FLNparams.MinLN = 9
            [Phenology].CAMP.FLNparams.PpLN = -3
            [Phenology].CAMP.FLNparams.VrnLN = 6
            [Phenology].CAMP.FLNparams.VxPLN = -9
            [Phenology].Phyllochron.BasePhyllochron.FixedValue = 113.0837881
            [Phenology].PhyllochronPpSensitivity.FixedValue = 0.350857209
            [Phenology].CAMP.EnvData.VrnTreatTemp = 5.8
            [Phenology].HeadEmergenceLongDayBase.FixedValue = 50
            [Phenology].HeadEmergencePpSensitivity.FixedValue = 0
        Cultivar Schooner_org
          Command:
            [Phenology].CAMP.FLNparams.MinLN = 8
            [Phenology].CAMP.FLNparams.PpLN = 1
            [Phenology].CAMP.FLNparams.VrnLN = 0
            [Phenology].CAMP.FLNparams.VxPLN = -2
            [Phenology].Phyllochron.BasePhyllochron.FixedValue = 90.27490591
            [Phenology].PhyllochronPpSensitivity.FixedValue = 0.517492533
            [Phenology].CAMP.EnvData.VrnTreatTemp = 5.8
            [Phenology].HeadEmergenceLongDayBase.FixedValue = 50
            [Phenology].HeadEmergencePpSensitivity.FixedValue = 7
        Cultivar Scope_org
          Command:
            [Phenology].CAMP.FLNparams.MinLN = 8
            [Phenology].CAMP.FLNparams.PpLN = 2
            [Phenology].CAMP.FLNparams.VrnLN = 0
            [Phenology].CAMP.FLNparams.VxPLN = 1
            [Phenology].Phyllochron.BasePhyllochron.FixedValue = 93.40444263
            [Phenology].PhyllochronPpSensitivity.FixedValue = 0.379146059
            [Phenology].CAMP.EnvData.VrnTreatTemp = 5.8
            [Phenology].HeadEmergenceLongDayBase.FixedValue = 50
            [Phenology].HeadEmergencePpSensitivity.FixedValue = 5
        Cultivar Shepherd_org
          Command:
            [Phenology].CAMP.FLNparams.MinLN = 9
            [Phenology].CAMP.FLNparams.PpLN = -3
            [Phenology].CAMP.FLNparams.VrnLN = 6
            [Phenology].CAMP.FLNparams.VxPLN = -9
            [Phenology].Phyllochron.BasePhyllochron.FixedValue = 123.1871156
            [Phenology].PhyllochronPpSensitivity.FixedValue = 0.106688704
            [Phenology].CAMP.EnvData.VrnTreatTemp = 5.8
            [Phenology].HeadEmergenceLongDayBase.FixedValue = 50
            [Phenology].HeadEmergencePpSensitivity.FixedValue = 0
        Cultivar Spartacus
          Command:
            [Phenology].CAMP.FLNparams.MinLN = 6
            [Phenology].CAMP.FLNparams.PpLN = 1
            [Phenology].CAMP.FLNparams.VrnLN = 4
            [Phenology].CAMP.FLNparams.VxPLN = -4
            [Phenology].Phyllochron.BasePhyllochron.FixedValue = 96.10951301
            [Phenology].PhyllochronPpSensitivity.FixedValue = 0.435320697
            [Phenology].CAMP.EnvData.VrnTreatTemp = 5.8
            [Phenology].HeadEmergenceLongDayBase.FixedValue = 130
            [Phenology].HeadEmergencePpSensitivity.FixedValue = 7
        Cultivar Stirling_org
          Command:
            [Phenology].CAMP.FLNparams.MinLN = 8
            [Phenology].CAMP.FLNparams.PpLN = 3
            [Phenology].CAMP.FLNparams.VrnLN = 0
            [Phenology].CAMP.FLNparams.VxPLN = -2
            [Phenology].Phyllochron.BasePhyllochron.FixedValue = 76.70827864
            [Phenology].PhyllochronPpSensitivity.FixedValue = 0.636329125
            [Phenology].CAMP.EnvData.VrnTreatTemp = 5.8
            [Phenology].HeadEmergenceLongDayBase.FixedValue = 50
            [Phenology].HeadEmergencePpSensitivity.FixedValue = 4
        Cultivar Unicorn
          Command:
            [Phenology].CAMP.FLNparams.MinLN = 7
            [Phenology].CAMP.FLNparams.PpLN = 4
            [Phenology].CAMP.FLNparams.VrnLN = 0
            [Phenology].CAMP.FLNparams.VxPLN = -1
            [Phenology].Phyllochron.BasePhyllochron.FixedValue = 74.28801183
            [Phenology].PhyllochronPpSensitivity.FixedValue = 0.756480172
            [Phenology].CAMP.EnvData.VrnTreatTemp = 5.8
            [Phenology].HeadEmergenceLongDayBase.FixedValue = 110
            [Phenology].HeadEmergencePpSensitivity.FixedValue = 7
        Cultivar Urambie_org
          Command:
            [Phenology].CAMP.FLNparams.MinLN = 9.666666667
            [Phenology].CAMP.FLNparams.PpLN = -1.666666667
            [Phenology].CAMP.FLNparams.VrnLN = 14
            [Phenology].CAMP.FLNparams.VxPLN = -4.666666667
            [Phenology].Phyllochron.BasePhyllochron.FixedValue = 112.8025962
            [Phenology].PhyllochronPpSensitivity.FixedValue = 0.103185899
            [Phenology].CAMP.EnvData.VrnTreatTemp = 5.8
            [Phenology].HeadEmergenceLongDayBase.FixedValue = 50
            [Phenology].HeadEmergencePpSensitivity.FixedValue = 0
        Cultivar Valetta: same as Replacements.Barley.Cultivars1.Bumpa
        Cultivar Westminster_org
          Command:
            [Phenology].CAMP.FLNparams.MinLN = 9
            [Phenology].CAMP.FLNparams.PpLN = -3
            [Phenology].CAMP.FLNparams.VrnLN = 7
            [Phenology].CAMP.FLNparams.VxPLN = -10
            [Phenology].Phyllochron.BasePhyllochron.FixedValue = 130.4668887
            [Phenology].PhyllochronPpSensitivity.FixedValue = 0.146837949
            [Phenology].CAMP.EnvData.VrnTreatTemp = 5.8
            [Phenology].HeadEmergenceLongDayBase.FixedValue = 50
            [Phenology].HeadEmergencePpSensitivity.FixedValue = 1
        Cultivar Yagan_org
          Command:
            [Phenology].CAMP.FLNparams.MinLN = 7
            [Phenology].CAMP.FLNparams.PpLN = 3
            [Phenology].CAMP.FLNparams.VrnLN = 1
            [Phenology].CAMP.FLNparams.VxPLN = -2
            [Phenology].Phyllochron.BasePhyllochron.FixedValue = 99.45937465
            [Phenology].PhyllochronPpSensitivity.FixedValue = 0.396778567
            [Phenology].CAMP.EnvData.VrnTreatTemp = 5.8
            [Phenology].HeadEmergenceLongDayBase.FixedValue = 190
            [Phenology].HeadEmergencePpSensitivity.FixedValue = 7
        Folder Argentina
          Cultivar Andreia
            Command:
              [Phenology].MinimumLeafNumber.FixedValue = 9
              [Structure].Phyllochron.BasePhyllochron.FixedValue = 60
              [Phenology].PpSensitivity.FixedValue = 1
              [Phenology].VrnSensitivity.FixedValue = 1
              [Phenology].GrainFilling.Target.FixedValue = 550
              [Photosynthesis].RUE.FixedValue = 2.8
              [Grain].NumberFunction.GrainNumber.GrainsPerGramOfStem.FixedValue = 27
              [Structure].BranchMortality.MortalityPhase.Mortality.MortalityPerDegDay.XYPairs.Y = 0.001,0
              [Leaf].ExtinctionCoeff.FixedValue= 0.60
              [Grain].MaximumPotentialGrainSize.FixedValue = 0.045
              [Leaf].CohortParameters.GrowthDuration.Multiplier.FixedValue = 1.5
      Folder FittedCultivars
        Cultivar Booma
          Command:
            [Phenology].CAMP.FLNparams.MinLN = 8 // 9
            [Phenology].CAMP.FLNparams.PpLN = 6
            [Phenology].CAMP.FLNparams.VrnLN = 0
            [Phenology].CAMP.FLNparams.VxPLN = 0
            [Phenology].Phyllochron.BasePhyllochron.FixedValue = 95 // 85
            [Phenology].PhyllochronPpSensitivity.FixedValue = 2
            [Phenology].CAMP.EnvData.VrnTreatTemp = 5.8
        Cultivar Boss
          Command:
            [Phenology].CAMP.FLNparams.MinLN = 8.5
            [Phenology].CAMP.FLNparams.PpLN = 5
            [Phenology].CAMP.FLNparams.VrnLN = 0
            [Phenology].CAMP.FLNparams.VxPLN = 0
            [Phenology].Phyllochron.BasePhyllochron.FixedValue = 80
            [Phenology].PhyllochronPpSensitivity.FixedValue = 2
            [Phenology].CAMP.EnvData.VrnTreatTemp = 5.8
        Cultivar Doyen
          Command:
            [Phenology].CAMP.FLNparams.MinLN = 7
            [Phenology].CAMP.FLNparams.PpLN = 5
            [Phenology].CAMP.FLNparams.VrnLN = 0
            [Phenology].CAMP.FLNparams.VxPLN = 0
            [Phenology].Phyllochron.BasePhyllochron.FixedValue = 85
            [Phenology].PhyllochronPpSensitivity.FixedValue = 2
            [Phenology].CAMP.EnvData.VrnTreatTemp = 5.8
        Cultivar Hooded
          Command:
            [Phenology].CAMP.FLNparams.MinLN = 9
            [Phenology].CAMP.FLNparams.PpLN = 6
            [Phenology].CAMP.FLNparams.VrnLN = 0
            [Phenology].CAMP.FLNparams.VxPLN = 0
            [Phenology].Phyllochron.BasePhyllochron.FixedValue = 85
            [Phenology].PhyllochronPpSensitivity.FixedValue = 2
            [Phenology].CAMP.EnvData.VrnTreatTemp = 5.8
        Cultivar Optic
          Command:
            [Phenology].CAMP.FLNparams.MinLN = 7.5
            [Phenology].CAMP.FLNparams.PpLN = 5.5
            [Phenology].CAMP.FLNparams.VrnLN = 0
            [Phenology].CAMP.FLNparams.VxPLN = 0
            [Phenology].Phyllochron.BasePhyllochron.FixedValue = 85
            [Phenology].PhyllochronPpSensitivity.FixedValue = 1.5
            [Phenology].CAMP.EnvData.VrnTreatTemp = 5.8
        Cultivar Quench
          Command:
            [Phenology].CAMP.FLNparams.MinLN = 9
            [Phenology].CAMP.FLNparams.PpLN = 6
            [Phenology].CAMP.FLNparams.VrnLN = 0
            [Phenology].CAMP.FLNparams.VxPLN = 0
            [Phenology].Phyllochron.BasePhyllochron.FixedValue = 95 // 85
            [Phenology].PhyllochronPpSensitivity.FixedValue = 2
            [Phenology].CAMP.EnvData.VrnTreatTemp = 5.8
        Cultivar Retriever
          Command:
            [Phenology].CAMP.FLNparams.MinLN = 9
            [Phenology].CAMP.FLNparams.PpLN = 6
            [Phenology].CAMP.FLNparams.VrnLN = 2
            [Phenology].CAMP.FLNparams.VxPLN = 0
            [Phenology].Phyllochron.BasePhyllochron.FixedValue = 85
            [Phenology].PhyllochronPpSensitivity.FixedValue = 2
            [Phenology].CAMP.EnvData.VrnTreatTemp = 5.8
        Cultivar Pyramid
          Command:
            [Phenology].CAMP.FLNparams.MinLN = 7
            [Phenology].CAMP.FLNparams.PpLN = 8
            [Phenology].CAMP.FLNparams.VrnLN = 0
            [Phenology].CAMP.FLNparams.VxPLN = 0
            [Phenology].Phyllochron.BasePhyllochron.FixedValue = 80
            [Phenology].PhyllochronPpSensitivity.FixedValue = 2
            [Phenology].CAMP.EnvData.VrnTreatTemp = 5.8
        Cultivar Sherwood
          Command:
            [Phenology].CAMP.FLNparams.MinLN = 8
            [Phenology].CAMP.FLNparams.PpLN = 5
            [Phenology].CAMP.FLNparams.VrnLN = 0
            [Phenology].CAMP.FLNparams.VxPLN = 0
            [Phenology].Phyllochron.BasePhyllochron.FixedValue = 78
            [Phenology].PhyllochronPpSensitivity.FixedValue = 1.5
            [Phenology].CAMP.EnvData.VrnTreatTemp = 5.8
        Cultivar Tavern
          Command:
            [Phenology].CAMP.FLNparams.MinLN = 7
            [Phenology].CAMP.FLNparams.PpLN = 5
            [Phenology].CAMP.FLNparams.VrnLN = 0
            [Phenology].CAMP.FLNparams.VxPLN = 0
            [Phenology].Phyllochron.BasePhyllochron.FixedValue = 80
            [Phenology].PhyllochronPpSensitivity.FixedValue = 2
            [Phenology].CAMP.EnvData.VrnTreatTemp = 5.8
        Cultivar Triumph
          Command:
            [Phenology].CAMP.FLNparams.MinLN = 8 // 7 // 9 // 7
            [Phenology].CAMP.FLNparams.PpLN = 6
            [Phenology].CAMP.FLNparams.VrnLN = 0
            [Phenology].CAMP.FLNparams.VxPLN = 0 // 1 // 0
            [Phenology].Phyllochron.BasePhyllochron.FixedValue = 90 // 85 // 80 // 85
            [Phenology].PhyllochronPpSensitivity.FixedValue = 2
            [Phenology].CAMP.EnvData.VrnTreatTemp = 5.8
            [Phenology].HeadEmergenceLongDayBase.FixedValue = 250
            [Phenology].HeadEmergencePpSensitivity.FixedValue = 3
        Cultivar Vortex
          Command:
            [Phenology].CAMP.FLNparams.MinLN = 8
            [Phenology].CAMP.FLNparams.PpLN = 5
            [Phenology].CAMP.FLNparams.VrnLN = 0
            [Phenology].CAMP.FLNparams.VxPLN = 0
            [Phenology].Phyllochron.BasePhyllochron.FixedValue = 75
            [Phenology].PhyllochronPpSensitivity.FixedValue = 2
            [Phenology].CAMP.EnvData.VrnTreatTemp = 5.8
        Cultivar Baudin
          Command:
            [Phenology].CAMP.FLNparams.MinLN = 7
            [Phenology].CAMP.FLNparams.PpLN = 4
            [Phenology].CAMP.FLNparams.VrnLN = 0
            [Phenology].CAMP.FLNparams.VxPLN = 0
            [Phenology].Phyllochron.BasePhyllochron.FixedValue = 95
            [Phenology].PhyllochronPpSensitivity.FixedValue = 0.6
            [Phenology].CAMP.EnvData.VrnTreatTemp = 5.8
            [Phenology].HeadEmergenceLongDayBase.FixedValue = 140
            [Phenology].HeadEmergencePpSensitivity.FixedValue = 3
            [Phenology].GrainFilling.Target.FixedValue = 350
        Cultivar Capstan
          Command:
            // canot fix the flowering date from LatrobeCE
            [Phenology].CAMP.FLNparams.MinLN = 8
            [Phenology].CAMP.FLNparams.PpLN = 4
            [Phenology].CAMP.FLNparams.VrnLN = 0
            [Phenology].CAMP.FLNparams.VxPLN = -2
            [Phenology].Phyllochron.BasePhyllochron.FixedValue = 93
            [Phenology].PhyllochronPpSensitivity.FixedValue = 0.6
            [Phenology].CAMP.EnvData.VrnTreatTemp = 5.8
            [Phenology].HeadEmergenceLongDayBase.FixedValue = 50
            [Phenology].HeadEmergencePpSensitivity.FixedValue = 8
            [Phenology].GrainFilling.Target.FixedValue = 350
            //[Phenology].CAMP.FLNparams.MinLN = 8
            //[Phenology].CAMP.FLNparams.PpLN = 4
            //[Phenology].CAMP.FLNparams.VrnLN = 0
            //[Phenology].CAMP.FLNparams.VxPLN = -2
            //[Phenology].Phyllochron.BasePhyllochron.FixedValue = 87.44227888
            //[Phenology].PhyllochronPpSensitivity.FixedValue = 0.655991185
            //[Phenology].CAMP.EnvData.VrnTreatTemp = 5.8
            //[Phenology].HeadEmergenceLongDayBase.FixedValue = 50
            //[Phenology].HeadEmergencePpSensitivity.FixedValue = 5
        Cultivar Fleet
          Command:
            [Phenology].CAMP.FLNparams.MinLN = 8
            [Phenology].CAMP.FLNparams.PpLN = 3
            [Phenology].CAMP.FLNparams.VrnLN = 0
            [Phenology].CAMP.FLNparams.VxPLN = -2
            [Phenology].Phyllochron.BasePhyllochron.FixedValue = 88
            [Phenology].PhyllochronPpSensitivity.FixedValue = 0.6
            [Phenology].CAMP.EnvData.VrnTreatTemp = 5.8
            [Phenology].HeadEmergenceLongDayBase.FixedValue = 140
            [Phenology].HeadEmergencePpSensitivity.FixedValue = 2
            [Phenology].GrainFilling.Target.FixedValue = 400
            //[Phenology].CAMP.FLNparams.MinLN = 8
            //[Phenology].CAMP.FLNparams.PpLN = 3
            //[Phenology].CAMP.FLNparams.VrnLN = 0
            //[Phenology].CAMP.FLNparams.VxPLN = -2
            //[Phenology].Phyllochron.BasePhyllochron.FixedValue = 90.88228131
            //[Phenology].PhyllochronPpSensitivity.FixedValue = 0.4688122
            //[Phenology].CAMP.EnvData.VrnTreatTemp = 5.8
            //[Phenology].HeadEmergenceLongDayBase.FixedValue = 50
            //[Phenology].HeadEmergencePpSensitivity.FixedValue = 2
        Cultivar Hindmarsh
          Command:
            [Phenology].CAMP.FLNparams.MinLN = 9
            [Phenology].CAMP.FLNparams.PpLN = 4
            [Phenology].CAMP.FLNparams.VrnLN = 0
            [Phenology].CAMP.FLNparams.VxPLN = 0
            [Phenology].Phyllochron.BasePhyllochron.FixedValue = 87
            [Phenology].PhyllochronPpSensitivity.FixedValue = 0.8
            [Phenology].CAMP.EnvData.VrnTreatTemp = 5.8
            [Phenology].HeadEmergenceLongDayBase.FixedValue = 50
            [Phenology].HeadEmergencePpSensitivity.FixedValue = 0.5
            [Phenology].GrainFilling.Target.FixedValue = 400
            //[Phenology].CAMP.FLNparams.MinLN = 9
            //[Phenology].CAMP.FLNparams.PpLN = 4
            //[Phenology].CAMP.FLNparams.VrnLN = 0
            //[Phenology].CAMP.FLNparams.VxPLN = 0
            //[Phenology].Phyllochron.BasePhyllochron.FixedValue = 85
            //[Phenology].PhyllochronPpSensitivity.FixedValue = 1.1
            //[Phenology].CAMP.EnvData.VrnTreatTemp = 5.8
        Cultivar Commander
          Command:
            [Phenology].CAMP.FLNparams.MinLN = 8
            [Phenology].CAMP.FLNparams.PpLN = 3
            [Phenology].CAMP.FLNparams.VrnLN = 1
            [Phenology].CAMP.FLNparams.VxPLN = 0
            [Phenology].Phyllochron.BasePhyllochron.FixedValue = 80
            [Phenology].PhyllochronPpSensitivity.FixedValue = 0.8
            [Phenology].CAMP.EnvData.VrnTreatTemp = 5.8
            [Phenology].HeadEmergenceLongDayBase.FixedValue = 110
            [Phenology].HeadEmergencePpSensitivity.FixedValue = 2
            [Phenology].GrainFilling.Target.FixedValue = 400
            //[Phenology].CAMP.FLNparams.MinLN = 7.666666667
            //[Phenology].CAMP.FLNparams.PpLN = 2.333333333
            //[Phenology].CAMP.FLNparams.VrnLN = 4
            //[Phenology].CAMP.FLNparams.VxPLN = -5.666666667
            //[Phenology].Phyllochron.BasePhyllochron.FixedValue = 96.92081575
            //[Phenology].PhyllochronPpSensitivity.FixedValue = 0.369052131
            //[Phenology].CAMP.EnvData.VrnTreatTemp = 5.8
            //[Phenology].HeadEmergenceLongDayBase.FixedValue = 50
            //[Phenology].HeadEmergencePpSensitivity.FixedValue = 1
        Cultivar Fathom
          Command:
            [Phenology].CAMP.FLNparams.MinLN = 7
            [Phenology].CAMP.FLNparams.PpLN = 6
            [Phenology].CAMP.FLNparams.VrnLN = 8
            [Phenology].CAMP.FLNparams.VxPLN = -7
            [Phenology].Phyllochron.BasePhyllochron.FixedValue = 80
            [Phenology].PhyllochronPpSensitivity.FixedValue = 0.6
            [Phenology].CAMP.EnvData.VrnTreatTemp = 5.8
            [Phenology].HeadEmergenceLongDayBase.FixedValue = 80
            [Phenology].HeadEmergencePpSensitivity.FixedValue = 2
            //[Phenology].CAMP.FLNparams.MinLN = 6
            //[Phenology].CAMP.FLNparams.PpLN = 5
            //[Phenology].CAMP.FLNparams.VrnLN = 7
            //[Phenology].CAMP.FLNparams.VxPLN = -6
            //[Phenology].Phyllochron.BasePhyllochron.FixedValue = 82.17586355
            //[Phenology].PhyllochronPpSensitivity.FixedValue = 0.85248787
            //[Phenology].CAMP.EnvData.VrnTreatTemp = 5.8
            //[Phenology].HeadEmergenceLongDayBase.FixedValue = 50
            //[Phenology].HeadEmergencePpSensitivity.FixedValue = 1
        Cultivar Compass
          Command:
            [Phenology].CAMP.FLNparams.MinLN = 9
            [Phenology].CAMP.FLNparams.PpLN = 1
            [Phenology].CAMP.FLNparams.VrnLN = 1
            [Phenology].CAMP.FLNparams.VxPLN = 1
            [Phenology].Phyllochron.BasePhyllochron.FixedValue = 80
            [Phenology].PhyllochronPpSensitivity.FixedValue = 0.5
            [Phenology].CAMP.EnvData.VrnTreatTemp = 5.8
            [Phenology].HeadEmergenceLongDayBase.FixedValue = 100
            [Phenology].HeadEmergencePpSensitivity.FixedValue = 1
            //[Phenology].CAMP.FLNparams.MinLN = 9
            //[Phenology].CAMP.FLNparams.PpLN = -3
            //[Phenology].CAMP.FLNparams.VrnLN = 5
            //[Phenology].CAMP.FLNparams.VxPLN = -5
            //[Phenology].Phyllochron.BasePhyllochron.FixedValue = 104.3258054
            //[Phenology].PhyllochronPpSensitivity.FixedValue = 0.246502671
            //[Phenology].CAMP.EnvData.VrnTreatTemp = 5.8
            //[Phenology].HeadEmergenceLongDayBase.FixedValue = 50
            //[Phenology].HeadEmergencePpSensitivity.FixedValue = 0
        Cultivar Urambie
          Command:
            [Phenology].CAMP.FLNparams.MinLN = 10
            [Phenology].CAMP.FLNparams.PpLN = 0
            [Phenology].CAMP.FLNparams.VrnLN = 10
            [Phenology].CAMP.FLNparams.VxPLN = -4
            [Phenology].Phyllochron.BasePhyllochron.FixedValue = 88
            [Phenology].PhyllochronPpSensitivity.FixedValue = 0.45
            [Phenology].CAMP.EnvData.VrnTreatTemp = 5.8
            [Phenology].HeadEmergenceLongDayBase.FixedValue = 50
            [Phenology].HeadEmergencePpSensitivity.FixedValue = 2
            //[Phenology].CAMP.FLNparams.MinLN = 9.666666667
            //[Phenology].CAMP.FLNparams.PpLN = -1.666666667
            //[Phenology].CAMP.FLNparams.VrnLN = 14
            //[Phenology].CAMP.FLNparams.VxPLN = -4.666666667
            //[Phenology].Phyllochron.BasePhyllochron.FixedValue = 112.8025962
            //[Phenology].PhyllochronPpSensitivity.FixedValue = 0.103185899
            //[Phenology].CAMP.EnvData.VrnTreatTemp = 5.8
            //[Phenology].HeadEmergenceLongDayBase.FixedValue = 50
            //[Phenology].HeadEmergencePpSensitivity.FixedValue = 0
        Cultivar Buloke
          Command:
            [Phenology].CAMP.FLNparams.MinLN = 9
            [Phenology].CAMP.FLNparams.PpLN =  1
            [Phenology].CAMP.FLNparams.VrnLN = 0
            [Phenology].CAMP.FLNparams.VxPLN = 0
            [Phenology].Phyllochron.BasePhyllochron.FixedValue = 90
            [Phenology].PhyllochronPpSensitivity.FixedValue = 1.0
            [Phenology].CAMP.EnvData.VrnTreatTemp = 5.8
            [Phenology].HeadEmergenceLongDayBase.FixedValue = 50
            [Phenology].HeadEmergencePpSensitivity.FixedValue = 1
            [Phenology].GrainFilling.Target.FixedValue = 500
            //[Phenology].CAMP.FLNparams.MinLN = 9
            //[Phenology].CAMP.FLNparams.PpLN = 4
            //[Phenology].CAMP.FLNparams.VrnLN = 0
            //[Phenology].CAMP.FLNparams.VxPLN = 0
            //[Phenology].Phyllochron.BasePhyllochron.FixedValue = 85
            //[Phenology].PhyllochronPpSensitivity.FixedValue = 1.1
            //[Phenology].CAMP.EnvData.VrnTreatTemp = 5.8
        Cultivar Keel
          Command:
            [Phenology].CAMP.FLNparams.MinLN = 8
            [Phenology].CAMP.FLNparams.PpLN = 2
            [Phenology].CAMP.FLNparams.VrnLN = 0
            [Phenology].CAMP.FLNparams.VxPLN = 0
            [Phenology].Phyllochron.BasePhyllochron.FixedValue = 85
            [Phenology].PhyllochronPpSensitivity.FixedValue = 1.8
            [Phenology].CAMP.EnvData.VrnTreatTemp = 5.8
            [Phenology].HeadEmergenceLongDayBase.FixedValue = 50
            [Phenology].HeadEmergencePpSensitivity.FixedValue = 0
            [Phenology].GrainFilling.Target.FixedValue = 400
            //[Phenology].CAMP.FLNparams.MinLN = 6
            //[Phenology].CAMP.FLNparams.PpLN = 4
            //[Phenology].CAMP.FLNparams.VrnLN = 1
            //[Phenology].CAMP.FLNparams.VxPLN = -1
            //[Phenology].Phyllochron.BasePhyllochron.FixedValue = 58.40056656
            //[Phenology].PhyllochronPpSensitivity.FixedValue = 1.251746574
            //[Phenology].CAMP.EnvData.VrnTreatTemp = 5.8
            //[Phenology].HeadEmergenceLongDayBase.FixedValue = 70
            //[Phenology].HeadEmergencePpSensitivity.FixedValue = 7
        Cultivar Oxford
          Command:
            [Phenology].CAMP.FLNparams.MinLN = 8
            [Phenology].CAMP.FLNparams.PpLN = 3
            [Phenology].CAMP.FLNparams.VrnLN = 0
            [Phenology].CAMP.FLNparams.VxPLN = -4
            [Phenology].Phyllochron.BasePhyllochron.FixedValue = 100
            [Phenology].PhyllochronPpSensitivity.FixedValue = 0.5
            [Phenology].CAMP.EnvData.VrnTreatTemp = 5.8
            [Phenology].HeadEmergenceLongDayBase.FixedValue = 100
            [Phenology].HeadEmergencePpSensitivity.FixedValue = 1
            [Phenology].GrainFilling.Target.FixedValue = 400
            //[Phenology].CAMP.FLNparams.MinLN = 9.666666667
            //[Phenology].CAMP.FLNparams.PpLN = -3.666666667
            //[Phenology].CAMP.FLNparams.VrnLN = 3
            //[Phenology].CAMP.FLNparams.VxPLN = -6.666666667
            //[Phenology].Phyllochron.BasePhyllochron.FixedValue = 139.8064143
            //[Phenology].PhyllochronPpSensitivity.FixedValue = 0.107968397
            //[Phenology].CAMP.EnvData.VrnTreatTemp = 5.8
            //[Phenology].HeadEmergenceLongDayBase.FixedValue = 50
            //[Phenology].HeadEmergencePpSensitivity.FixedValue = 1
        Cultivar Dash
          Command:
            [Phenology].CAMP.FLNparams.MinLN = 8
            [Phenology].CAMP.FLNparams.PpLN = 5
            [Phenology].CAMP.FLNparams.VrnLN = 0
            [Phenology].CAMP.FLNparams.VxPLN = 0
            [Phenology].Phyllochron.BasePhyllochron.FixedValue = 80 // 90 // 85
            [Phenology].PhyllochronPpSensitivity.FixedValue = 1.5 // 1.5 // 2
            [Phenology].CAMP.EnvData.VrnTreatTemp = 5.8
            [Phenology].HeadEmergenceLongDayBase.FixedValue = 50
            [Phenology].HeadEmergencePpSensitivity.FixedValue = 1
            //[Phenology].CAMP.FLNparams.MinLN = 9
            //[Phenology].CAMP.FLNparams.PpLN = 6
            //[Phenology].CAMP.FLNparams.VrnLN = 0
            //[Phenology].CAMP.FLNparams.VxPLN = 0
            //[Phenology].Phyllochron.BasePhyllochron.FixedValue = 85
            //[Phenology].PhyllochronPpSensitivity.FixedValue = 2
            //[Phenology].CAMP.EnvData.VrnTreatTemp = 5.8
        Cultivar Omaka
          Command:
            [Phenology].CAMP.FLNparams.MinLN = 7 // 8
            [Phenology].CAMP.FLNparams.PpLN = 5
            [Phenology].CAMP.FLNparams.VrnLN = 0
            [Phenology].CAMP.FLNparams.VxPLN = 0
            [Phenology].Phyllochron.BasePhyllochron.FixedValue = 95 // 85
            [Phenology].PhyllochronPpSensitivity.FixedValue = 2 // 2.2
            [Phenology].CAMP.EnvData.VrnTreatTemp = 5.8
            [Phenology].HeadEmergenceLongDayBase.FixedValue = 80 // 50
            [Phenology].HeadEmergencePpSensitivity.FixedValue = 1
            //[Phenology].CAMP.FLNparams.MinLN = 9
            //[Phenology].CAMP.FLNparams.PpLN = 6
            //[Phenology].CAMP.FLNparams.VrnLN = 0
            //[Phenology].CAMP.FLNparams.VxPLN = 0
            //[Phenology].Phyllochron.BasePhyllochron.FixedValue = 80
            //[Phenology].PhyllochronPpSensitivity.FixedValue = 2
            //[Phenology].CAMP.EnvData.VrnTreatTemp = 5.8
            // [Leaf].ExtinctionCoeff.VegetativePhase.FixedValue=0.6
        Cultivar County
          Command:
            [Phenology].CAMP.FLNparams.MinLN = 8
            [Phenology].CAMP.FLNparams.PpLN = 2
            [Phenology].CAMP.FLNparams.VrnLN = 0
            [Phenology].CAMP.FLNparams.VxPLN = 0
            [Phenology].Phyllochron.BasePhyllochron.FixedValue = 90
            [Phenology].PhyllochronPpSensitivity.FixedValue = 1
            [Phenology].CAMP.EnvData.VrnTreatTemp = 5.8
            //[Phenology].HeadEmergenceLongDayBase.FixedValue = 90
            //[Phenology].HeadEmergencePpSensitivity.FixedValue = 1
            //[Phenology].CAMP.FLNparams.MinLN = 9
            //[Phenology].CAMP.FLNparams.PpLN = 6
            //[Phenology].CAMP.FLNparams.VrnLN = 0
            //[Phenology].CAMP.FLNparams.VxPLN = 0
            //[Phenology].Phyllochron.BasePhyllochron.FixedValue = 90
            //[Phenology].PhyllochronPpSensitivity.FixedValue = 1
            //[Phenology].CAMP.EnvData.VrnTreatTemp = 5.8
        Cultivar Cellar
          Command:
            [Phenology].CAMP.FLNparams.MinLN = 7
            [Phenology].CAMP.FLNparams.PpLN = 5
            [Phenology].CAMP.FLNparams.VrnLN = 0
            [Phenology].CAMP.FLNparams.VxPLN = 0
            [Phenology].Phyllochron.BasePhyllochron.FixedValue = 90
            [Phenology].PhyllochronPpSensitivity.FixedValue = 1.2
            [Phenology].CAMP.EnvData.VrnTreatTemp = 5.8
        Cultivar Alestar
          Command:
            [Phenology].CAMP.FLNparams.MinLN = 9
            [Phenology].CAMP.FLNparams.PpLN = 1
            [Phenology].CAMP.FLNparams.VrnLN = 0
            [Phenology].CAMP.FLNparams.VxPLN = 0
            [Phenology].Phyllochron.BasePhyllochron.FixedValue = 90
            [Phenology].PhyllochronPpSensitivity.FixedValue = 0.5
            [Phenology].CAMP.EnvData.VrnTreatTemp = 5.8
            [Phenology].HeadEmergenceLongDayBase.FixedValue = 150
            [Phenology].HeadEmergencePpSensitivity.FixedValue = 3.5
            //[Phenology].CAMP.FLNparams.MinLN = 9
            //[Phenology].CAMP.FLNparams.PpLN = -3
            //[Phenology].CAMP.FLNparams.VrnLN = 6
            //[Phenology].CAMP.FLNparams.VxPLN = -7
            //[Phenology].Phyllochron.BasePhyllochron.FixedValue = 120.9431217
            //[Phenology].PhyllochronPpSensitivity.FixedValue = 0.207440505
            //[Phenology].CAMP.EnvData.VrnTreatTemp = 5.8
            //[Phenology].HeadEmergenceLongDayBase.FixedValue = 50
            //[Phenology].HeadEmergencePpSensitivity.FixedValue = 0
        Cultivar Banks
          Command:
            [Phenology].CAMP.FLNparams.MinLN = 7
            [Phenology].CAMP.FLNparams.PpLN = 2
            [Phenology].CAMP.FLNparams.VrnLN = 1
            [Phenology].CAMP.FLNparams.VxPLN = 1
            [Phenology].Phyllochron.BasePhyllochron.FixedValue = 88
            [Phenology].PhyllochronPpSensitivity.FixedValue = 0.45
            [Phenology].CAMP.EnvData.VrnTreatTemp = 5.8
            [Phenology].HeadEmergenceLongDayBase.FixedValue = 240
            [Phenology].HeadEmergencePpSensitivity.FixedValue = 2
            //[Phenology].CAMP.FLNparams.MinLN = 8
            //[Phenology].CAMP.FLNparams.PpLN = -2
            //[Phenology].CAMP.FLNparams.VrnLN = 4
            //[Phenology].CAMP.FLNparams.VxPLN = -6
            //[Phenology].Phyllochron.BasePhyllochron.FixedValue = 120.3588019
            //[Phenology].PhyllochronPpSensitivity.FixedValue = 0.23234103
            //[Phenology].CAMP.EnvData.VrnTreatTemp = 5.8
            //[Phenology].HeadEmergenceLongDayBase.FixedValue = 70
            //[Phenology].HeadEmergencePpSensitivity.FixedValue = 2
        Cultivar Bass
          Command:
            [Phenology].CAMP.FLNparams.MinLN = 8
            [Phenology].CAMP.FLNparams.PpLN = 1
            [Phenology].CAMP.FLNparams.VrnLN = 1
            [Phenology].CAMP.FLNparams.VxPLN = 0
            [Phenology].Phyllochron.BasePhyllochron.FixedValue = 80
            [Phenology].PhyllochronPpSensitivity.FixedValue = 0.6
            [Phenology].CAMP.EnvData.VrnTreatTemp = 5.8
            [Phenology].HeadEmergenceLongDayBase.FixedValue = 160
            [Phenology].HeadEmergencePpSensitivity.FixedValue = 2
            //[Phenology].CAMP.FLNparams.MinLN = 8.333333333
            //[Phenology].CAMP.FLNparams.PpLN = -2.333333333
            //[Phenology].CAMP.FLNparams.VrnLN = 4
            //[Phenology].CAMP.FLNparams.VxPLN = -3.333333333
            //[Phenology].Phyllochron.BasePhyllochron.FixedValue = 110.9847693
            //[Phenology].PhyllochronPpSensitivity.FixedValue = 0.261968924
            //[Phenology].CAMP.EnvData.VrnTreatTemp = 5.8
            //[Phenology].HeadEmergenceLongDayBase.FixedValue = 50
            //[Phenology].HeadEmergencePpSensitivity.FixedValue = 2
        Cultivar Biere
          Command:
            [Phenology].CAMP.FLNparams.MinLN = 8
            [Phenology].CAMP.FLNparams.PpLN = 1
            [Phenology].CAMP.FLNparams.VrnLN = 2
            [Phenology].CAMP.FLNparams.VxPLN = 0
            [Phenology].Phyllochron.BasePhyllochron.FixedValue = 75
            [Phenology].PhyllochronPpSensitivity.FixedValue = 0.6
            [Phenology].CAMP.EnvData.VrnTreatTemp = 5.8
            [Phenology].HeadEmergenceLongDayBase.FixedValue = 220
            [Phenology].HeadEmergencePpSensitivity.FixedValue = 5
            //[Phenology].CAMP.FLNparams.MinLN = 8.333333333
            //[Phenology].CAMP.FLNparams.PpLN = -2.333333333
            //[Phenology].CAMP.FLNparams.VrnLN = 0
            //[Phenology].CAMP.FLNparams.VxPLN = -2.333333333
            //[Phenology].Phyllochron.BasePhyllochron.FixedValue = 118.6729904
            //[Phenology].PhyllochronPpSensitivity.FixedValue = 0.182591106
            //[Phenology].CAMP.EnvData.VrnTreatTemp = 5.8
            //[Phenology].HeadEmergenceLongDayBase.FixedValue = 50
            //[Phenology].HeadEmergencePpSensitivity.FixedValue = 4
        Cultivar Csirob1
          Command:
            [Phenology].CAMP.FLNparams.MinLN = 7
            [Phenology].CAMP.FLNparams.PpLN = 0
            [Phenology].CAMP.FLNparams.VrnLN = 5
            [Phenology].CAMP.FLNparams.VxPLN = -3
            [Phenology].Phyllochron.BasePhyllochron.FixedValue = 70
            [Phenology].PhyllochronPpSensitivity.FixedValue =  0.6
            [Phenology].CAMP.EnvData.VrnTreatTemp = 5.8
            [Phenology].HeadEmergenceLongDayBase.FixedValue = 300
            [Phenology].HeadEmergencePpSensitivity.FixedValue = 4
            //[Phenology].CAMP.FLNparams.MinLN = 7.333333333
            //[Phenology].CAMP.FLNparams.PpLN = 0.666666667
            //[Phenology].CAMP.FLNparams.VrnLN = 5
            //[Phenology].CAMP.FLNparams.VxPLN = -3.333333333
            //[Phenology].Phyllochron.BasePhyllochron.FixedValue = 76.78280555
            //[Phenology].PhyllochronPpSensitivity.FixedValue = 0.619292867
            //[Phenology].CAMP.EnvData.VrnTreatTemp = 5.8
            //[Phenology].HeadEmergenceLongDayBase.FixedValue = 90
            //[Phenology].HeadEmergencePpSensitivity.FixedValue = 6
        Cultivar Csirob3
          Command:
            [Phenology].CAMP.FLNparams.MinLN = 7
            [Phenology].CAMP.FLNparams.PpLN = 0
            [Phenology].CAMP.FLNparams.VrnLN = 3
            [Phenology].CAMP.FLNparams.VxPLN = -3
            [Phenology].Phyllochron.BasePhyllochron.FixedValue = 70
            [Phenology].PhyllochronPpSensitivity.FixedValue = 0.65
            [Phenology].CAMP.EnvData.VrnTreatTemp = 5.8
            [Phenology].HeadEmergenceLongDayBase.FixedValue = 300
            [Phenology].HeadEmergencePpSensitivity.FixedValue = 4
            //[Phenology].CAMP.FLNparams.MinLN = 6
            //[Phenology].CAMP.FLNparams.PpLN = 4
            //[Phenology].CAMP.FLNparams.VrnLN = 0
            //[Phenology].CAMP.FLNparams.VxPLN = 0
            //[Phenology].Phyllochron.BasePhyllochron.FixedValue = 57.45009872
            //[Phenology].PhyllochronPpSensitivity.FixedValue = 1.18910351
            //[Phenology].CAMP.EnvData.VrnTreatTemp = 5.8
            //[Phenology].HeadEmergenceLongDayBase.FixedValue = 200
            //[Phenology].HeadEmergencePpSensitivity.FixedValue = 4
        Cultivar Flinders
          Command:
            [Phenology].CAMP.FLNparams.MinLN = 6
            [Phenology].CAMP.FLNparams.PpLN = 3
            [Phenology].CAMP.FLNparams.VrnLN = 0
            [Phenology].CAMP.FLNparams.VxPLN = 3
            [Phenology].Phyllochron.BasePhyllochron.FixedValue = 100
            [Phenology].PhyllochronPpSensitivity.FixedValue = 0.4
            [Phenology].CAMP.EnvData.VrnTreatTemp = 5.8
            [Phenology].HeadEmergenceLongDayBase.FixedValue = 250
            [Phenology].HeadEmergencePpSensitivity.FixedValue = 3
            //[Phenology].CAMP.FLNparams.MinLN = 8.333333333
            //[Phenology].CAMP.FLNparams.PpLN = -2.333333333
            //[Phenology].CAMP.FLNparams.VrnLN = 5
            //[Phenology].CAMP.FLNparams.VxPLN = -7.333333333
            //[Phenology].Phyllochron.BasePhyllochron.FixedValue = 129.3942158
            //[Phenology].PhyllochronPpSensitivity.FixedValue = 0.105323488
            //[Phenology].CAMP.EnvData.VrnTreatTemp = 5.8
            //[Phenology].HeadEmergenceLongDayBase.FixedValue = 70
            //[Phenology].HeadEmergencePpSensitivity.FixedValue = 1
        Cultivar Franklin
          Command:
            [Phenology].CAMP.FLNparams.MinLN = 9
            [Phenology].CAMP.FLNparams.PpLN = 1
            [Phenology].CAMP.FLNparams.VrnLN = 1
            [Phenology].CAMP.FLNparams.VxPLN = 0
            [Phenology].Phyllochron.BasePhyllochron.FixedValue = 80
            [Phenology].PhyllochronPpSensitivity.FixedValue = 0.5
            [Phenology].CAMP.EnvData.VrnTreatTemp = 5.8
            [Phenology].HeadEmergenceLongDayBase.FixedValue = 250
            [Phenology].HeadEmergencePpSensitivity.FixedValue = 5
            //[Phenology].CAMP.FLNparams.MinLN = 10
            //[Phenology].CAMP.FLNparams.PpLN = -2
            //[Phenology].CAMP.FLNparams.VrnLN = 5
            //[Phenology].CAMP.FLNparams.VxPLN = -7
            //[Phenology].Phyllochron.BasePhyllochron.FixedValue = 103.9731331
            //[Phenology].PhyllochronPpSensitivity.FixedValue = 0.195075087
            //[Phenology].CAMP.EnvData.VrnTreatTemp = 5.8
            //[Phenology].HeadEmergenceLongDayBase.FixedValue = 50
            //[Phenology].HeadEmergencePpSensitivity.FixedValue = 7
        Cultivar Gairdner
          Command:
            [Phenology].CAMP.FLNparams.MinLN = 9
            [Phenology].CAMP.FLNparams.PpLN = 2
            [Phenology].CAMP.FLNparams.VrnLN = 1
            [Phenology].CAMP.FLNparams.VxPLN = 0
            [Phenology].Phyllochron.BasePhyllochron.FixedValue = 80
            [Phenology].PhyllochronPpSensitivity.FixedValue = 0.4
            [Phenology].CAMP.EnvData.VrnTreatTemp = 5.8
            [Phenology].HeadEmergenceLongDayBase.FixedValue = 200
            [Phenology].HeadEmergencePpSensitivity.FixedValue = 4
            //[Phenology].CAMP.FLNparams.MinLN = 10
            //[Phenology].CAMP.FLNparams.PpLN = 0
            //[Phenology].CAMP.FLNparams.VrnLN = 4
            //[Phenology].CAMP.FLNparams.VxPLN = -5
            //[Phenology].Phyllochron.BasePhyllochron.FixedValue = 88.54255431
            //[Phenology].PhyllochronPpSensitivity.FixedValue = 0.325049926
            //[Phenology].CAMP.EnvData.VrnTreatTemp = 5.8
            //[Phenology].HeadEmergenceLongDayBase.FixedValue = 50
            //[Phenology].HeadEmergencePpSensitivity.FixedValue = 2
        Cultivar Granger
          Command:
            [Phenology].CAMP.FLNparams.MinLN = 9
            [Phenology].CAMP.FLNparams.PpLN = 2
            [Phenology].CAMP.FLNparams.VrnLN = 0
            [Phenology].CAMP.FLNparams.VxPLN = -3
            [Phenology].Phyllochron.BasePhyllochron.FixedValue = 80
            [Phenology].PhyllochronPpSensitivity.FixedValue = 0.5
            [Phenology].CAMP.EnvData.VrnTreatTemp = 5.8
            [Phenology].HeadEmergenceLongDayBase.FixedValue = 200
            [Phenology].HeadEmergencePpSensitivity.FixedValue = 3
            //[Phenology].CAMP.FLNparams.MinLN = 9
            //[Phenology].CAMP.FLNparams.PpLN = 2
            //[Phenology].CAMP.FLNparams.VrnLN = 0
            //[Phenology].CAMP.FLNparams.VxPLN = -3
            //[Phenology].Phyllochron.BasePhyllochron.FixedValue = 108.6702997
            //[Phenology].PhyllochronPpSensitivity.FixedValue = 0.190962591
            //[Phenology].CAMP.EnvData.VrnTreatTemp = 5.8
            //[Phenology].HeadEmergenceLongDayBase.FixedValue = 50
            //[Phenology].HeadEmergencePpSensitivity.FixedValue = 0
        Cultivar Grout
          Command:
            [Phenology].CAMP.FLNparams.MinLN = 7
            [Phenology].CAMP.FLNparams.PpLN = 2
            [Phenology].CAMP.FLNparams.VrnLN = 0
            [Phenology].CAMP.FLNparams.VxPLN = 0
            [Phenology].Phyllochron.BasePhyllochron.FixedValue = 85
            [Phenology].PhyllochronPpSensitivity.FixedValue = 0.4
            [Phenology].CAMP.EnvData.VrnTreatTemp = 5.8
            [Phenology].HeadEmergenceLongDayBase.FixedValue = 200
            [Phenology].HeadEmergencePpSensitivity.FixedValue = 4
            //[Phenology].CAMP.FLNparams.MinLN = 7.333333333
            //[Phenology].CAMP.FLNparams.PpLN = 2.666666667
            //[Phenology].CAMP.FLNparams.VrnLN = 0
            //[Phenology].CAMP.FLNparams.VxPLN = -1.333333333
            //[Phenology].Phyllochron.BasePhyllochron.FixedValue = 86.48989044
            //[Phenology].PhyllochronPpSensitivity.FixedValue = 0.62631665
            //[Phenology].CAMP.EnvData.VrnTreatTemp = 5.8
            //[Phenology].HeadEmergenceLongDayBase.FixedValue = 50
            //[Phenology].HeadEmergencePpSensitivity.FixedValue = 3
        Cultivar Lockyer
          Command:
            [Phenology].CAMP.FLNparams.MinLN = 6
            [Phenology].CAMP.FLNparams.PpLN = 3
            [Phenology].CAMP.FLNparams.VrnLN = 1
            [Phenology].CAMP.FLNparams.VxPLN = 0
            [Phenology].Phyllochron.BasePhyllochron.FixedValue = 90
            [Phenology].PhyllochronPpSensitivity.FixedValue = 0.45
            [Phenology].CAMP.EnvData.VrnTreatTemp = 5.8
            [Phenology].HeadEmergenceLongDayBase.FixedValue = 170
            [Phenology].HeadEmergencePpSensitivity.FixedValue = 2
            //[Phenology].CAMP.FLNparams.MinLN = 6.666666667
            //[Phenology].CAMP.FLNparams.PpLN = 3.333333333
            //[Phenology].CAMP.FLNparams.VrnLN = 10
            //[Phenology].CAMP.FLNparams.VxPLN = -10.666666667
            //[Phenology].Phyllochron.BasePhyllochron.FixedValue = 97.89121109
            //[Phenology].PhyllochronPpSensitivity.FixedValue = 0.405093218
            //[Phenology].CAMP.EnvData.VrnTreatTemp = 5.8
            //[Phenology].HeadEmergenceLongDayBase.FixedValue = 70
            //[Phenology].HeadEmergencePpSensitivity.FixedValue = 1
        Cultivar Mundah
          Command:
            [Phenology].CAMP.FLNparams.MinLN = 9
            [Phenology].CAMP.FLNparams.PpLN = 1
            [Phenology].CAMP.FLNparams.VrnLN = 0
            [Phenology].CAMP.FLNparams.VxPLN = 0
            [Phenology].Phyllochron.BasePhyllochron.FixedValue = 80
            [Phenology].PhyllochronPpSensitivity.FixedValue = 0.6
            [Phenology].CAMP.EnvData.VrnTreatTemp = 5.8
            [Phenology].HeadEmergenceLongDayBase.FixedValue = 220
            [Phenology].HeadEmergencePpSensitivity.FixedValue = 3.2
            //[Phenology].CAMP.FLNparams.MinLN = 9
            //[Phenology].CAMP.FLNparams.PpLN = 1
            //[Phenology].CAMP.FLNparams.VrnLN = 0
            //[Phenology].CAMP.FLNparams.VxPLN = -1
            //[Phenology].Phyllochron.BasePhyllochron.FixedValue = 99.85179413
            //[Phenology].PhyllochronPpSensitivity.FixedValue = 0.253014157
            //[Phenology].CAMP.EnvData.VrnTreatTemp = 5.8
            //[Phenology].HeadEmergenceLongDayBase.FixedValue = 110
            //[Phenology].HeadEmergencePpSensitivity.FixedValue = 7
        Cultivar Navigator
          Command:
            [Phenology].CAMP.FLNparams.MinLN = 7
            [Phenology].CAMP.FLNparams.PpLN = 3
            [Phenology].CAMP.FLNparams.VrnLN = 5
            [Phenology].CAMP.FLNparams.VxPLN = -5
            [Phenology].Phyllochron.BasePhyllochron.FixedValue = 90
            [Phenology].PhyllochronPpSensitivity.FixedValue = 0.6
            [Phenology].CAMP.EnvData.VrnTreatTemp = 5.8
            [Phenology].HeadEmergenceLongDayBase.FixedValue = 250
            [Phenology].HeadEmergencePpSensitivity.FixedValue = 4
            //[Phenology].CAMP.FLNparams.MinLN = 8
            //[Phenology].CAMP.FLNparams.PpLN = 4
            //[Phenology].CAMP.FLNparams.VrnLN = 5
            //[Phenology].CAMP.FLNparams.VxPLN = -7
            //[Phenology].Phyllochron.BasePhyllochron.FixedValue = 93.43659898
            //[Phenology].PhyllochronPpSensitivity.FixedValue = 0.400967405
            //[Phenology].CAMP.EnvData.VrnTreatTemp = 5.8
            //[Phenology].HeadEmergenceLongDayBase.FixedValue = 50
            //[Phenology].HeadEmergencePpSensitivity.FixedValue = 1
        Cultivar Planet
          Command:
            [Phenology].CAMP.FLNparams.MinLN = 8
            [Phenology].CAMP.FLNparams.PpLN = 1
            [Phenology].CAMP.FLNparams.VrnLN = 0
            [Phenology].CAMP.FLNparams.VxPLN = -1
            [Phenology].Phyllochron.BasePhyllochron.FixedValue = 88
            [Phenology].PhyllochronPpSensitivity.FixedValue = 0.45
            [Phenology].CAMP.EnvData.VrnTreatTemp = 5.8
            [Phenology].HeadEmergenceLongDayBase.FixedValue = 200
            [Phenology].HeadEmergencePpSensitivity.FixedValue = 3.5
            //[Phenology].CAMP.FLNparams.MinLN = 9
            //[Phenology].CAMP.FLNparams.PpLN = 1
            //[Phenology].CAMP.FLNparams.VrnLN = 0
            //[Phenology].CAMP.FLNparams.VxPLN = -1
            //[Phenology].Phyllochron.BasePhyllochron.FixedValue = 117.2869488
            //[Phenology].PhyllochronPpSensitivity.FixedValue = 0.244404645
            //[Phenology].CAMP.EnvData.VrnTreatTemp = 5.8
            //[Phenology].HeadEmergenceLongDayBase.FixedValue = 70
            //[Phenology].HeadEmergencePpSensitivity.FixedValue = 6
        Cultivar Rosalind
          Command:
            [Phenology].CAMP.FLNparams.MinLN = 8
            [Phenology].CAMP.FLNparams.PpLN = 3
            [Phenology].CAMP.FLNparams.VrnLN = 0
            [Phenology].CAMP.FLNparams.VxPLN = 0
            [Phenology].Phyllochron.BasePhyllochron.FixedValue = 90
            [Phenology].PhyllochronPpSensitivity.FixedValue = 0.5
            [Phenology].CAMP.EnvData.VrnTreatTemp = 5.8
            [Phenology].HeadEmergenceLongDayBase.FixedValue = 240
            [Phenology].HeadEmergencePpSensitivity.FixedValue = 4
            //[Phenology].CAMP.FLNparams.MinLN = 9
            //[Phenology].CAMP.FLNparams.PpLN = -3
            //[Phenology].CAMP.FLNparams.VrnLN = 6
            //[Phenology].CAMP.FLNparams.VxPLN = -9
            //[Phenology].Phyllochron.BasePhyllochron.FixedValue = 113.0837881
            //[Phenology].PhyllochronPpSensitivity.FixedValue = 0.350857209
            //[Phenology].CAMP.EnvData.VrnTreatTemp = 5.8
            //[Phenology].HeadEmergenceLongDayBase.FixedValue = 50
            //[Phenology].HeadEmergencePpSensitivity.FixedValue = 0
        Cultivar Schooner
          Command:
            [Phenology].CAMP.FLNparams.MinLN = 6
            [Phenology].CAMP.FLNparams.PpLN = 3
            [Phenology].CAMP.FLNparams.VrnLN = 0
            [Phenology].CAMP.FLNparams.VxPLN = -2
            [Phenology].Phyllochron.BasePhyllochron.FixedValue = 70
            [Phenology].PhyllochronPpSensitivity.FixedValue = 0.8
            [Phenology].CAMP.EnvData.VrnTreatTemp = 5.8
            [Phenology].HeadEmergenceLongDayBase.FixedValue = 220
            [Phenology].HeadEmergencePpSensitivity.FixedValue = 5
            //[Phenology].CAMP.FLNparams.MinLN = 8
            //[Phenology].CAMP.FLNparams.PpLN = 1
            //[Phenology].CAMP.FLNparams.VrnLN = 0
            //[Phenology].CAMP.FLNparams.VxPLN = -2
            //[Phenology].Phyllochron.BasePhyllochron.FixedValue = 90.27490591
            //[Phenology].PhyllochronPpSensitivity.FixedValue = 0.517492533
            //[Phenology].CAMP.EnvData.VrnTreatTemp = 5.8
            //[Phenology].HeadEmergenceLongDayBase.FixedValue = 50
            //[Phenology].HeadEmergencePpSensitivity.FixedValue = 7
        Cultivar Scope
          Command:
            [Phenology].CAMP.FLNparams.MinLN = 8
            [Phenology].CAMP.FLNparams.PpLN = 2
            [Phenology].CAMP.FLNparams.VrnLN = 0
            [Phenology].CAMP.FLNparams.VxPLN = 1
            [Phenology].Phyllochron.BasePhyllochron.FixedValue = 85
            [Phenology].PhyllochronPpSensitivity.FixedValue = 0.38
            [Phenology].CAMP.EnvData.VrnTreatTemp = 5.8
            [Phenology].HeadEmergenceLongDayBase.FixedValue = 200
            [Phenology].HeadEmergencePpSensitivity.FixedValue = 4
            //[Phenology].CAMP.FLNparams.MinLN = 8
            //[Phenology].CAMP.FLNparams.PpLN = 2
            //[Phenology].CAMP.FLNparams.VrnLN = 0
            //[Phenology].CAMP.FLNparams.VxPLN = 1
            //[Phenology].Phyllochron.BasePhyllochron.FixedValue = 93.40444263
            //[Phenology].PhyllochronPpSensitivity.FixedValue = 0.379146059
            //[Phenology].CAMP.EnvData.VrnTreatTemp = 5.8
            //[Phenology].HeadEmergenceLongDayBase.FixedValue = 50
            //[Phenology].HeadEmergencePpSensitivity.FixedValue = 5
        Cultivar Shepherd
          Command:
            [Phenology].CAMP.FLNparams.MinLN = 8
            [Phenology].CAMP.FLNparams.PpLN = 2
            [Phenology].CAMP.FLNparams.VrnLN = 0
            [Phenology].CAMP.FLNparams.VxPLN = 1
            [Phenology].Phyllochron.BasePhyllochron.FixedValue = 100
            [Phenology].PhyllochronPpSensitivity.FixedValue = 0.1
            [Phenology].CAMP.EnvData.VrnTreatTemp = 5.8
            [Phenology].HeadEmergenceLongDayBase.FixedValue = 240
            [Phenology].HeadEmergencePpSensitivity.FixedValue = 4
            //[Phenology].CAMP.FLNparams.MinLN = 9
            //[Phenology].CAMP.FLNparams.PpLN = -3
            //[Phenology].CAMP.FLNparams.VrnLN = 6
            //[Phenology].CAMP.FLNparams.VxPLN = -9
            //[Phenology].Phyllochron.BasePhyllochron.FixedValue = 123.1871156
            //[Phenology].PhyllochronPpSensitivity.FixedValue = 0.106688704
            //[Phenology].CAMP.EnvData.VrnTreatTemp = 5.8
            //[Phenology].HeadEmergenceLongDayBase.FixedValue = 50
            //[Phenology].HeadEmergencePpSensitivity.FixedValue = 0
        Cultivar Stirling
          Command:
            [Phenology].CAMP.FLNparams.MinLN = 7
            [Phenology].CAMP.FLNparams.PpLN = 2
            [Phenology].CAMP.FLNparams.VrnLN = 0
            [Phenology].CAMP.FLNparams.VxPLN = -2
            [Phenology].Phyllochron.BasePhyllochron.FixedValue = 76.7
            [Phenology].PhyllochronPpSensitivity.FixedValue = 0.6
            [Phenology].CAMP.EnvData.VrnTreatTemp = 5.8
            [Phenology].HeadEmergenceLongDayBase.FixedValue = 130
            [Phenology].HeadEmergencePpSensitivity.FixedValue = 6
            //[Phenology].CAMP.FLNparams.MinLN = 8
            //[Phenology].CAMP.FLNparams.PpLN = 3
            //[Phenology].CAMP.FLNparams.VrnLN = 0
            //[Phenology].CAMP.FLNparams.VxPLN = -2
            //[Phenology].Phyllochron.BasePhyllochron.FixedValue = 76.70827864
            //[Phenology].PhyllochronPpSensitivity.FixedValue = 0.636329125
            //[Phenology].CAMP.EnvData.VrnTreatTemp = 5.8
            //[Phenology].HeadEmergenceLongDayBase.FixedValue = 50
            //[Phenology].HeadEmergencePpSensitivity.FixedValue = 4
        Cultivar Westminster
          Command:
            [Phenology].CAMP.FLNparams.MinLN = 8
            [Phenology].CAMP.FLNparams.PpLN = 2
            [Phenology].CAMP.FLNparams.VrnLN = 0
            [Phenology].CAMP.FLNparams.VxPLN = -1
            [Phenology].Phyllochron.BasePhyllochron.FixedValue = 95
            [Phenology].PhyllochronPpSensitivity.FixedValue = 0.5
            [Phenology].CAMP.EnvData.VrnTreatTemp = 5.8
            [Phenology].HeadEmergenceLongDayBase.FixedValue = 250
            [Phenology].HeadEmergencePpSensitivity.FixedValue = 5
            //[Phenology].CAMP.FLNparams.MinLN = 9
            //[Phenology].CAMP.FLNparams.PpLN = -3
            //[Phenology].CAMP.FLNparams.VrnLN = 7
            //[Phenology].CAMP.FLNparams.VxPLN = -10
            //[Phenology].Phyllochron.BasePhyllochron.FixedValue = 130.4668887
            //[Phenology].PhyllochronPpSensitivity.FixedValue = 0.146837949
            //[Phenology].CAMP.EnvData.VrnTreatTemp = 5.8
            //[Phenology].HeadEmergenceLongDayBase.FixedValue = 50
            //[Phenology].HeadEmergencePpSensitivity.FixedValue = 1
        Cultivar Yagan
          Command:
            [Phenology].CAMP.FLNparams.MinLN = 7
            [Phenology].CAMP.FLNparams.PpLN = 2
            [Phenology].CAMP.FLNparams.VrnLN = 0
            [Phenology].CAMP.FLNparams.VxPLN = 0
            [Phenology].Phyllochron.BasePhyllochron.FixedValue = 90
            [Phenology].PhyllochronPpSensitivity.FixedValue = 0.45
            [Phenology].CAMP.EnvData.VrnTreatTemp = 5.8
            [Phenology].HeadEmergenceLongDayBase.FixedValue = 210
            [Phenology].HeadEmergencePpSensitivity.FixedValue = 8
            //[Phenology].CAMP.FLNparams.MinLN = 7
            //[Phenology].CAMP.FLNparams.PpLN = 3
            //[Phenology].CAMP.FLNparams.VrnLN = 1
            //[Phenology].CAMP.FLNparams.VxPLN = -2
            //[Phenology].Phyllochron.BasePhyllochron.FixedValue = 99.45937465
            //[Phenology].PhyllochronPpSensitivity.FixedValue = 0.396778567
            //[Phenology].CAMP.EnvData.VrnTreatTemp = 5.8
            //[Phenology].HeadEmergenceLongDayBase.FixedValue = 190
            //[Phenology].HeadEmergencePpSensitivity.FixedValue = 7
  Virtual: FileName=%root%/Tests/Validation/Barley/Barley.apsimx; IncludeModels=[[Simulations]]
