Simulations: Version=47
  DataStore
  Simulation BankTest
    Clock: StartDate=1995-01-01; EndDate=2009-12-31
    Summary summaryfile
    ZoneCLEM CLEM: RandomSeed=0; ClimateRegion=0; EcologicalIndicatorsCalculationMonth=9; Area=0; Slope=0
      ResourcesHolder Resources
        Finance Finances
          FinanceType General account: OpeningBalance=10000000; EnforceWithdrawalLimit=false; WithdrawalLimit=0; InterestRateCharged=7.5; InterestRatePaid=2
          FinanceType Overheads account: OpeningBalance=900000; EnforceWithdrawalLimit=false; WithdrawalLimit=0; InterestRateCharged=7.5; InterestRatePaid=2
      ActivitiesHolder Activities
        FinanceActivityCalculateInterest Bank interest: OnPartialResourcesAvailableAction=0
        ActivityFolder Pay January expenses: OnPartialResourcesAvailableAction=0
          ActivityTimerInterval Perform every January: Interval=12; MonthDue=1
          FinanceActivityPayExpense Pay electricity: Amount=150; AccountName=Finances.General account; IsOverhead=false; OnPartialResourcesAvailableAction=2
          FinanceActivityPayExpense Pay internet: Amount=1200; AccountName=Finances.General account; IsOverhead=false; OnPartialResourcesAvailableAction=2
        FinanceActivityPayExpense Pay mechanic: Amount=999; AccountName=Finances.Overheads account; IsOverhead=true; OnPartialResourcesAvailableAction=2
          ActivityTimerDateRange Between98and04: StartDate=1998-01-01; EndDate=2004-01-01; Invert=false
        ActivityFolder Cash flow: OnPartialResourcesAvailableAction=0
          FinanceActivityPayExpense Pay general farm maintenance: Amount=3333.33; AccountName=Finances.General account; IsOverhead=false; OnPartialResourcesAvailableAction=0
          FinanceActivityPayExpense Pay fuel costs: Amount=2500; AccountName=Finances.General account; IsOverhead=false; OnPartialResourcesAvailableAction=0
          FinanceActivityPayExpense Pay pest control: Amount=5000; AccountName=Finances.General account; IsOverhead=false; OnPartialResourcesAvailableAction=0
            ActivityTimerMonthRange BetweenAprAndSept: StartMonth=4; EndMonth=9
          FinanceActivityPayExpense Pay contractors: Amount=30000; AccountName=Finances.General account; IsOverhead=false; OnPartialResourcesAvailableAction=0
            ActivityTimerInterval: Interval=12; MonthDue=10
          FinanceActivityPayExpense Pay administration: Amount=1666.67; AccountName=Finances.General account; IsOverhead=false; OnPartialResourcesAvailableAction=0
          FinanceActivityPayExpense Pay rates and fees: Amount=15000; AccountName=Finances.General account; IsOverhead=false; OnPartialResourcesAvailableAction=0
            ActivityTimerInterval: Interval=12; MonthDue=6
          FinanceActivityPayExpense Pay insurance: Amount=20000; AccountName=Finances.General account; IsOverhead=false; OnPartialResourcesAvailableAction=0
            ActivityTimerInterval: Interval=12; MonthDue=12
          FinanceActivityPayExpense Pay electricity: Amount=2000; AccountName=Finances.General account; IsOverhead=false; OnPartialResourcesAvailableAction=0
            ActivityTimerInterval: Interval=3; MonthDue=1
          FinanceActivityPayExpense Pay living costs: Amount=1000; AccountName=Finances.General account; IsOverhead=false; OnPartialResourcesAvailableAction=0
            ActivityTimerInterval: Interval=6; MonthDue=6
      Folder Reports
        Report FinancesLedger: EventNames=[Resources].Finances.TransactionOccurred
          VariableNames:
            [Clock].Today as Date
            [Resources].Finances.LastTransaction.Credit as Credit
            [Resources].Finances.LastTransaction.Debit as Debit
            [Resources].Finances.LastTransaction.ResourceType as Resource
            [Resources].Finances.LastTransaction.Activity as Activity
            [Resources].Finances.LastTransaction.Reason as Reason
        Report ActivityLedger: EventNames=[Activities].ActivityPerformed
          VariableNames:
            [Clock].Today as Date
            [Activities].LastActivityPerformed.Name as Name
            [Activities].LastActivityPerformed.Status as Status
        ReportActivitiesPerformed
