Simulations: Version=28
  DataStore
  Simulation SimpleManureCollection
    Clock: StartDate=1995-01-01; EndDate=2009-12-31
    Summary summaryfile
    ZoneCLEM CLEM: Area=0; Slope=0; RandomSeed=0; ClimateRegion=0; EcologicalIndicatorsCalculationMonth=12
      ResourcesHolder Resources
        Finance Finances
          FinanceType General account: OpeningBalance=100; EnforceWithdrawalLimit=false; WithdrawalLimit=0; InterestRateCharged=7.5; InterestRatePaid=2
        AnimalFoodStore
          AnimalFoodStoreType RiceStraw: DMD=45; Nitrogen=0.75; StartingAmount=10000
            Transmutation Purchase: AmountPerUnitPurchase=10000
              TransmutationCost Money: ResourceName=Finances; ResourceTypeName=General account; CostPerUnit=100
        RuminantHerd Ruminants
          RuminantType Bos indicus: Breed=Bos indicus; EMaintEfficiencyCoefficient=0.35; EMaintEfficiencyIntercept=0.503; EGrowthEfficiencyCoefficient=0.79; EGrowthEfficiencyIntercept=0; ELactationEfficiencyCoefficient=0.35; ELactationEfficiencyIntercept=0.42; EMaintExponent=8.2E-05; EMaintIntercept=0.09; EMaintCoefficient=0.26; Kme=1; GrowthEnergyIntercept1=6.7; GrowthEnergyIntercept2=20.3; GrowthEfficiency=1.09; SRWFemale=500; SRWMaleMultiplier=1.2; SRWBirth=0.08; AgeGrowthRateCoefficient=0.0115; SRWGrowthScalar=0.32; IntakeCoefficient=0.024; IntakeIntercept=1.7; ProteinCoefficient=120; ProteinDegradability=0.9; BaseAnimalEquivalent=450; GreenDietMax=0.98; GreenDietCoefficient=0.15; GreenDietZero=0.04; IntakeTropicalQuality=0.16; IntakeCoefficientQuality=1.7; IntakeCoefficientBiomass=0.006; StrictFeedingLimits=true; MilkIntakeCoefficient=0.1206; MilkIntakeIntercept=3.8146; MilkIntakeMaximum=20; MilkLWTFodderSubstitutionProportion=0.2; MaxJuvenileIntake=0.035; ProportionalDiscountDueToMilk=0.3; ProportionOfMaxWeightToSurvive=0.5; LactatingPotentialModifierConstantA=0.42; LactatingPotentialModifierConstantB=61; LactatingPotentialModifierConstantC=1.7; MaximumSizeOfIndividual=1.2; MortalityBase=0.03; MortalityCoefficient=2.5; MortalityIntercept=0.05; MortalityExponent=3; JuvenileMortalityCoefficient=3; JuvenileMortalityMaximum=0.2; JuvenileMortalityExponent=1.8; WoolCoefficient=0; CashmereCoefficient=0; MilkCurveSuckling=0.6; MilkCurveNonSuckling=0.11; MilkingDays=300; MilkPeakYield=20; MilkOffsetDay=4; MilkPeakDay=45; InterParturitionIntervalIntercept=10.847; InterParturitionIntervalCoefficient=-0.7994; GestationLength=9; MinimumAge1stMating=24; MinimumSize1stMating=0.5; MinimumDaysBirthToConception=61; TwinRate=0; CriticalCowWeight=0.5; ConceptionRateCoefficent=-12.634; ConceptionRateIntercept=5.182; ConceptionRateAsymptote=90; MaximumMaleMatingsPerDay=30; PrenatalMortality=0.079; MaximumConceptionUncontrolledBreeding=0.7; MethaneProductionCoefficient=20.7
            RuminantInitialCohorts Initial cohorts
              RuminantTypeCohort Heifers: Gender=Female; Age=12; Number=5; Weight=250; WeightSD=0; Suckling=false; Sire=false
        ProductStore Products
          ProductStoreTypeManure Manure: DecayRate=0.9; MoistureDecayRate=0.5; ProportionMoistureFresh=0.3; MaximumAge=12
      ActivitiesHolder Activities
        ActivityFolder Manage herd: OnPartialResourcesAvailableAction=ReportErrorAndStop
          RuminantActivityFeed Feed rice straw: OnPartialResourcesAvailableAction=UseResourcesAvailable; FeedTypeName=AnimalFoodStore.RiceStraw; ProportionTramplingWastage=0; FeedStyle=ProportionOfPotentialIntake
            RuminantFeedGroup Feed Bos indicus: Value=1
          RuminantActivityGrow Grow all ruminants: OnPartialResourcesAvailableAction=ReportErrorAndStop
        ActivityFolder Manage manure: OnPartialResourcesAvailableAction=ReportErrorAndStop
          ManureActivityCollectAll: OnPartialResourcesAvailableAction=UseResourcesAvailable
          ResourceActivitySell Sell manure: OnPartialResourcesAvailableAction=UseResourcesAvailable; AccountName=Finances.General account; ResourceTypeName=Products.Manure; SellWholeUnitsOnly=true; AmountReserved=0; UnitSize=10; UnitPrice=1
      Folder Reports
        Report FinancesLedger: EventNames=[Resources].Finances.TransactionOccurred
          VariableNames:
            [Clock].Today as Date
            [Resources].Finances.LastTransaction.Credit as Credit
            [Resources].Finances.LastTransaction.Debit as Debit
            [Resources].Finances.LastTransaction.ResourceType as Resource
            [Resources].Finances.LastTransaction.Activity as Activity
            [Resources].Finances.LastTransaction.Reason as Reason
        Report ProductsLedger: EventNames=[Resources].Products.TransactionOccurred
          VariableNames:
            [Clock].Today as Date
            [Resources].Products.LastTransaction.Credit as Credit
            [Resources].Products.LastTransaction.Debit as Debit
            [Resources].Products.LastTransaction.ResourceType as Resource
            [Resources].Products.LastTransaction.Activity as Activity
            [Resources].Products.LastTransaction.Reason as Reason
        Report HerdLedger: EventNames=[Resources].Ruminants.TransactionOccurred
          VariableNames:
            [Clock].Today
            [Resources].Ruminants.LastTransaction.ExtraInformation.ID as UId
            [Resources].Ruminants.LastTransaction.ExtraInformation.Breed as Breed
            [Resources].Ruminants.LastTransaction.ExtraInformation.HerdName as Herd
            [Resources].Ruminants.LastTransaction.ExtraInformation.GenderAsString as Sex
            [Resources].Ruminants.LastTransaction.ExtraInformation.Age as Age
            [Resources].Ruminants.LastTransaction.ExtraInformation.Weight as Weight
            [Resources].Ruminants.LastTransaction.ExtraInformation.SaleFlagAsString as Reason
            [Resources].Ruminants.LastTransaction.ExtraInformation.PopulationChangeDirection as Change
        Report AnimalFoodStoreLedger: EventNames=[Resources].AnimalFoodStore.TransactionOccurred
          VariableNames:
            [Clock].Today as Date
            [Resources].AnimalFoodStore.LastTransaction.Credit as Credit
            [Resources].AnimalFoodStore.LastTransaction.Debit as Debit
            [Resources].AnimalFoodStore.LastTransaction.ResourceType as Resource
            [Resources].AnimalFoodStore.LastTransaction.Activity as Activity
            [Resources].AnimalFoodStore.LastTransaction.Reason as Reason
        ReportActivitiesPerformed
        ReportResourceBalances: EventNames=[Clock].CLEMEndOfTimeStep
          VariableNames:
            [Clock].Today
            Finances
            AnimalFoodStore
            Ruminants
            Products
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