Simulations: Version=47
  Memo TitlePage
    # The APSIM Chickpea Model

    _Andreucci M. P. , Whish, J., Huth, N.I. and Holzworth, D.P._
  Memo Introduction
    The APSIM Chickpea model has been developed using the Plant Modelling Framework (PMF) of [brown_plant_2014]. This new framework provides a library of plant organ and process submodels that can be coupled, at runtime, to construct a model in much the same way that models can be coupled to construct a simulation. This means that dynamic composition of lower level process and organ classes (e.g. photosynthesis, leaf) into larger constructions (e.g. chickpea, wheat, sorghum) can be achieved by the model developer without additional coding.

    The model consists of:

    * a phenology model to simulate development between growth phases
    * a structure model to simulate plant morphology
    * a collection of organs to simulate the various plant parts
    * an arbitrator to allocate resources (N, biomass) to the various plant organs
  Replacements
    Report HarvestReport: EventNames=[Chickpea].Harvesting
      VariableNames:
        [Clock].Today
        [Chickpea].Phenology.CurrentStageName as Stage
        [Chickpea].Phenology.FloweringDAS.Value() as FloweringDAS
        [Chickpea].Phenology.MaturityDAS.Value() as MaturityDAS
        [Chickpea].Grain.Live.Wt as GrainWt
        [Chickpea].AboveGround.Wt
        [Chickpea].Phenology.FinalNodeNo.Value()
        [Chickpea].Grain.NumberFunction.Value()
        [Chickpea].Shell.PodNumber.Value()
        [Chickpea].Grain.Size
        [Chickpea].Phenology.EmergenceDAS.Value() as EmergenceDAS
        [Chickpea].SowingData.Cultivar
    Report: EventNames=[Clock].DoReport
      VariableNames:
        [Clock].Today
        [Soil].SoilWater.SW
        [Soil].SoilWater.Eo
        [Soil].SoilWater.Es
        [Soil].SoilWater.Drainage
        [Soil].SoilWater.Runoff
        [Soil].SoilWater.pond
        sum([Soil].SoilWater.SWmm) as ProfileWater
        [Soil].NO3N
        [MicroClimate].net_radn
        [MicroClimate].peta
        [MicroClimate].petr
        [Chickpea].Leaf.LAI
        [Chickpea].Leaf.Fn
        [Chickpea].Leaf.Fw
        [Chickpea].Structure.LeafTipsAppeared
        [Chickpea].Structure.PlantTotalNodeNo
        [Chickpea].Leaf.SenescingCohortNo
        [Chickpea].Structure.TotalStemPopn
        [Chickpea].AboveGround.Wt
        [Chickpea].Leaf.Live.Wt
        [Chickpea].Leaf.Live.NConc
        [Chickpea].Stem.Live.Wt
        [Chickpea].Leaf.SpecificArea
        [Chickpea].Shell.Live.Wt
        [Chickpea].Grain.Live.Wt
        [Chickpea].Grain.NumberFunction.Value()
        [Chickpea].Shell.PodNumber.Value()
        [Chickpea].Nodule.NFixed
        [Chickpea].Nodule.Live.Wt
        [Chickpea].Arbitrator.DM.NutrientLimitation
        [Chickpea].Arbitrator.DM.SinkLimitation
        [Chickpea].Arbitrator.N.TotalPlantDemand
        [Chickpea].Arbitrator.N.TotalPlantSupply
        [Chickpea].Arbitrator.DM.TotalPlantDemand
        [Chickpea].Arbitrator.DM.TotalFixationSupply
        [Chickpea].Leaf.Live.MetabolicNConc
        [Chickpea].Leaf.Live.StructuralNConc
        [Chickpea].Leaf.Live.StorageNConc
        [Chickpea].Leaf.DeadCohortNo
        [Chickpea].Stem.DMDemand
        [Chickpea].Leaf.DMSupplyPhotosynthesis
        [Chickpea].SowingData.Cultivar
        [Chickpea].Leaf.Dead.Wt
        [Chickpea].Root.Live.Wt
        [Chickpea].Leaf.Senesced.Wt
        [Chickpea].Phenology.CurrentStageName
        [Chickpea].Phenology.Stage
        [Chickpea].Leaf.LeafCohortParameters.MaxArea
        [Chickpea].Leaf.LeafCohortParameters.MaxArea.Grainfilling
        [Chickpea].Leaf.LeafCohortParameters.MaxArea.Grainfilling.MaxLeafSizeDuringGrainfilling.ExponentialFunction
        [Chickpea].Stem.Live.MetabolicWt
        [Soil].SoilWater.SWmm[2]+[Soil].SoilWater.SWmm[3]+[Soil].SoilWater.SWmm[4]+[Soil].SoilWater.SWmm[5]+[Soil].SoilWater.SWmm[6]+[Soil].SoilWater.SWmm[7] as ProfWat_less_toplayer
        [Chickpea].Root.KLModifier
        [Chickpea].Structure.BranchingRate
        [Chickpea].Structure.CoverResponse
    Plant Chickpea: CropType=Chickpea
      Memo Introduction
        The APSIM Chickpea model has been developed from the original APSIM Chickpea model described by Robertson et al(2002) using the Plant Modelling Framework of Brown et al (2014).
      OrganArbitrator Arbitrator
        RelativeAllocation NArbitrator
        RelativeAllocation DMArbitrator
      Phenology
        AirTemperatureFunction ThermalTime
          Memo
            The cardinal temperatures for calculating thermal time have been taken from Singh and Virmani (1996) as used by Robertson et al (2002).
          XYPairs: X=[0, 30, 40]; Y=[0, 30, 0]
        AirTemperatureFunction AlternateThermalTime
          Memo
            The cardinal temperatures for calculating thermal time have been taken from Singh and Virmani (1996) as used by Robertson et al (2002).
          XYPairs: X=[0, 5, 20, 30, 40]; Y=[0, 1, 20, 30, 0]
        PhotoperiodFunction Photoperiod: Twilight=-6; DayLength=0
        GerminatingPhase Germinating: Start=Sowing; End=Germination
        GenericPhase Emerging_test: Start=Emergence; End=StartFlowering
          Constant Target: FixedValue=6; Units=Degree Days
          MultiplyFunction Progression
            AirTemperatureFunction EmergeTT
              Memo
                From Soltani (2006)
              XYPairs: X=[4.5, 20, 29, 40]; Y=[0, 16, 24.5, 0]
          Memo
            Phenology model as per work of Soltani. Shape of curve can  be modified by changing the 'Critical' or 'Optimum' photoperiod parameters, or the target TT.

            For an unmodified variety, photoperiod less than the optimum photoperiod (21) means the target TT increases by 1/Photoperiod function.

            See documentation for explanatory graph.

            ***INSERT LINK TO GRAPH IMAGE FOR EXPLANATION HERE***
        EmergingPhase Emerging: ShootLag=100; ShootRate=0.7; Start=Germination; End=Emergence; TTForTimeStep=0
          VariableReference ThermalTime: VariableName=[Phenology].ThermalTime.Value()
        GenericPhase Vegetative: Start=Emergence; End=StartFlowering
          Constant Target: FixedValue=500; Units=Degree Days
          MultiplyFunction Progression
            VariableReference ThermalTime: VariableName=[Phenology].ThermalTime.Value()
            QualitativePPEffect PhotoperiodModifier: OptimumPhotoperiod=21; CriticalPhotoperiod=9
              VariableReference Photoperiod: VariableName=[Phenology].Photoperiod.Value()
          Memo
            Phenology model as per work of Soltani. Shape of curve can  be modified by changing the 'Critical' or 'Optimum' photoperiod parameters, or the target TT.

            For an unmodified variety, photoperiod less than the optimum photoperiod (21) means the target TT increases by 1/Photoperiod function.

            See documentation for explanatory graph.

            ![ChickpeaPhenologyGraph](SoltaniChickpeaPhenology.PNG)
        GenericPhase EarlyFlowering: Start=StartFlowering; End=StartPodDevelopment
          Memo
            The duration of the grain filling phase has been taken from the model of Robertson et al (2002).
          VariableReference Progression: VariableName=[Phenology].ThermalTime.Value()
          MultiplyFunction Target
            Constant NumberOfEarlyFloweringNodes: FixedValue=2.5
            VariableReference Phyllochron: VariableName=[Structure].NodeAppearanceRate.Value()
        GenericPhase EarlyPodDevelopment: Start=StartPodDevelopment; End=EndFlowering
          VariableReference Progression: VariableName=[Phenology].ThermalTime.Value()
          MultiplyFunction Target
            Constant NumberOfLateFloweringNodes: FixedValue=2.5
            VariableReference Phyllochron: VariableName=[Structure].NodeAppearanceRate.Value()
        GenericPhase EarlyGrainFilling: Start=EndFlowering; End=EndCanopyDevelopment
          VariableReference Progression: VariableName=[Phenology].ThermalTime.Value()
          Constant Target: FixedValue=35
        GenericPhase MidGrainFilling: Start=EndCanopyDevelopment; End=EndPodDevelopment
          VariableReference Progression: VariableName=[Phenology].ThermalTime.Value()
          Constant Target: FixedValue=345
        GenericPhase LateGrainFilling: Start=EndPodDevelopment; End=EndGrainFill
          VariableReference Progression: VariableName=[Phenology].ThermalTime.Value()
          Constant Target: FixedValue=310
        GenericPhase Maturing: Start=EndGrainFill; End=Maturity
          Memo
            The duration of the Maturing phase has been taken from the model of Robertson et al (2002).
          Constant Target: FixedValue=60
          VariableReference Progression: VariableName=[Phenology].ThermalTime.Value()
        GenericPhase Ripening: Start=Maturity; End=HarvestRipe
          Constant Target: FixedValue=1
          VariableReference Progression: VariableName=[Phenology].ThermalTime.Value()
        EndPhase ReadyForHarvesting: Start=HarvestRipe; End=Unused
          VariableReference ThermalTime: VariableName=[Phenology].ThermalTime.Value()
        OnEventFunction FloweringDAS: SetEvent=StartFlowering; ReSetEvent=never
          Memo
            A function is used to provide flowering date as days after sowing(DAS).
          Constant PreEventValue: FixedValue=0
          VariableReference PostEventValue: VariableName=[Phenology].DaysAfterSowing
        OnEventFunction MaturityDAS: SetEvent=Maturity; ReSetEvent=never
          Memo
            A function is used to provide maturity date as days after sowing(DAS).
          Constant PreEventValue: FixedValue=0
          VariableReference PostEventValue: VariableName=[Phenology].DaysAfterSowing
        OnEventFunction EmergenceDAS: SetEvent=Emergence; ReSetEvent=never
          Memo
            A function is used to provide maturity date as days after sowing(DAS).
          Constant PreEventValue: FixedValue=0
          VariableReference PostEventValue: VariableName=[Phenology].DaysAfterSowing
        OnEventFunction EndFloweringMSLeafNo: SetEvent=EndFlowering; ReSetEvent=never
          Memo
            A function is used to provide leaf number at end of flowering as a reference point for reducing maximum leaf size during grainfilling
          Constant PreEventValue: FixedValue=0
          VariableReference PostEventValue: VariableName=[Structure].LeafTipsAppeared
        DivideFunction MeanTemp
          AddFunction TempSum
            VariableReference MaxT: VariableName=[Weather].MaxT
            VariableReference MinT: VariableName=[Weather].MinT
          Constant Two: FixedValue=2
      Structure: CohortInitialisationStage=Germination; LeafInitialisationStage=Emergence
        VariableReference ThermalTime: VariableName=[Phenology].ThermalTime.Value()
        Constant DroughtInducedBranchMortality: FixedValue=0
        Constant HeightModel: FixedValue=1
        Constant FinalLeafNumber: FixedValue=40
        LinearInterpolationFunction Height: XProperty=[Stem].Live.Wt
          XYPairs: X=[0, 300]; Y=[10, 750]
        MultiplyFunction BranchingRate
          Memo Memo1
            Cover response as per soybean
          LinearInterpolationFunction OLDPotential_Branching_Rate (disabled): XProperty=[Structure].LeafTipsAppeared
            XYPairs: X=[0, 6, 8, 10, 20, 31]; Y=[0, 0, 1, 2, 0, 0]
          PhaseLookup Potential_Branching_Rate
            PhaseLookupValue PreEmergence: Start=Germination; End=Emergence
              Constant Function: FixedValue=0
            PhaseLookupValue Vegetative: Start=Emergence; End=StartFlowering
              LinearInterpolationFunction VegArea: XProperty=[Structure].LeafTipsAppeared
                Memo
                  Robertson et al (2002) used a maximum leaf size of 300 mm2 for the first 9 leaves and 600 mm2 thereafter.
                XYPairs: X=[0, 1, 2, 4, 5, 7, 8, 20]; Y=[0, 0, 2, 2, 0, 0, 2, 2]
            PhaseLookupValue Flowering: Start=StartFlowering; End=EndFlowering
              Constant Function: FixedValue=0
            PhaseLookupValue Grainfilling: Start=EndFlowering; End=Maturity
              Constant Function: FixedValue=0
          LinearInterpolationFunction OLDCover_response (disabled): XProperty=[leaf].CoverGreen
            XYPairs: X=[0, 0.06, 0.09, 0.11, 0.12]; Y=[1, 1, 0.7, 0.3, 0]
          LinearInterpolationFunction CHO_response (disabled): XProperty=[Stem].Live.StorageWt
            XYPairs: X=[0, 1e-05]; Y=[0.7, 1]
          LinearInterpolationFunction Cover_response: XProperty=[Structure].LAIperMetreperBranch
            XYPairs: X=[0, 0.02, 0.03, 0.04, 0.15, 0.16]; Y=[1, 0.8, 0, 0, 0, 0]
        DivideFunction LAIperMetre
          VariableReference LAI: VariableName=[Leaf].LAI
          DivideFunction Rowlength_per_metre2
            Constant: FixedValue=1000; Units=mm per 1m of row
            VariableReference RowSpacing: VariableName=[Chickpea].SowingData.RowSpacing
        Constant BranchMortality: FixedValue=0
        PhaseLookup Phyllochron
          PhaseLookupValue PreEmergence: Start=Germination; End=Emergence
            Constant Function: FixedValue=0
          PhaseLookupValue CanopyDevelopment: Start=Emergence; End=EndFlowering
            VariableReference NodeAppearanceRate: VariableName=[Structure].NodeAppearanceRate.Value()
          PhaseLookupValue Reproductive: Start=EndFlowering; End=Maturity
            Constant Function: FixedValue=0
        LinearInterpolationFunction NodeAppearanceRate: XProperty=[Structure].LeafTipsAppeared
          XYPairs: X=[1, 2, 3, 4, 30]; Y=[20, 20, 20, 50, 50]
          Memo
            One node every 20 Degree Days for first 3 nodes. After this then reverts to 50 Degree Days for each subsequent node

            Operating during both vegetative and flowering phases.
        Constant StemSenescenceAge: FixedValue=0
        DivideFunction LAIperMetreperBranch
          VariableReference LAIperMetre: VariableName=[Structure].LAIperMetre
          DivideFunction BranchesperMetre
            VariableReference Branches: VariableName=[Structure].BranchNumber
            DivideFunction Rowlength_per_metre2
              Constant: FixedValue=1000; Units=mm per 1m of row
              VariableReference RowSpacing: VariableName=[Chickpea].SowingData.RowSpacing
      GenericOrgan OLDGrain (disabled)
        Constant WaterContent: FixedValue=0.12
        Constant NConc: FixedValue=0.02
        VariableReference AboveGroundWt: VariableName=[AboveGround].Wt
        BiomassRemoval BiomassRemovalDefaults
          OrganBiomassRemovalType Harvest: FractionLiveToRemove=1; FractionDeadToRemove=0; FractionLiveToResidue=0; FractionDeadToResidue=0
          OrganBiomassRemovalType Cut: FractionLiveToRemove=1; FractionDeadToRemove=0; FractionLiveToResidue=0; FractionDeadToResidue=0
          OrganBiomassRemovalType Prune: FractionLiveToRemove=0; FractionDeadToRemove=0; FractionLiveToResidue=0.8; FractionDeadToResidue=0
          OrganBiomassRemovalType Graze: FractionLiveToRemove=0.6; FractionDeadToRemove=0; FractionLiveToResidue=0.2; FractionDeadToResidue=0
          OrganBiomassRemovalType Thin: FractionLiveToRemove=0; FractionDeadToRemove=0; FractionLiveToResidue=0.05; FractionDeadToResidue=0
        PhaseLookup HIIncrement
          PhaseLookupValue Vegetative: Start=Emergence; End=EndFlowering
            Constant Function: FixedValue=0
          PhaseLookupValue Reproductive: Start=EndFlowering; End=EndGrainFill
            MultiplyFunction HIIncrement
              DivideFunction IncrementPerDegreeDay
                Constant PotentialHarvestIndex: FixedValue=0.5
                VariableReference GrainFillingDuration: VariableName=[Phenology].GrainFilling.Target.Value()
              VariableReference ThermalTime: VariableName=[Phenology].ThermalTime.Value()
          PhaseLookupValue Ripening: Start=EndGrainFill; End=HarvestRipe
            Constant Function: FixedValue=0
      ReproductiveOrgan Grain: GrowthRespiration=0; MaintenanceRespiration=0
        Biomass Live: DMDOfStructural=0.6
        Biomass Dead: DMDOfStructural=0.6
        Constant PotentialHarvestIndex: FixedValue=0.5
        AddFunction FillingDuration
          VariableReference EarlyGrainFillingDuration: VariableName=[Phenology].EarlyGrainFilling.Target.Value()
          VariableReference MidGrainFillingDuration: VariableName=[Phenology].MidGrainFilling.Target.Value()
          VariableReference LateGrainFillingDuration: VariableName=[Phenology].LateGrainFilling.Target.Value()
        Constant MaximumPotentialGrainSize: FixedValue=0.25
        PhaseLookup DMDemandFunction
          PhaseLookupValue GrainFilling: Start=EndFlowering; End=EndGrainFill
            MultiplyFunction HIGrainDemand
              VariableReference AboveGroundWt: VariableName=[AboveGround].Wt
              DivideFunction HarvestIndexIncrease
                VariableReference PotentialHarvestIndex: VariableName=[Grain].PotentialHarvestIndex.Value()
                VariableReference FillingDuration: VariableName=[Grain].FillingDuration.Value()
              VariableReference ThermalTime: VariableName=[Phenology].ThermalTime.Value()
            FillingRateFunction
              VariableReference NumberFunction: VariableName=[Grain].NumberFunction.Value()
              VariableReference ThermalTime: VariableName=[Phenology].ThermalTime.Value()
              VariableReference PotentialSizeIncrement: VariableName=[Grain].MaximumPotentialGrainSize.Value()
              VariableReference FillingDuration: VariableName=[Grain].FillingDuration.Value()
        Constant MinimumNConc: FixedValue=0.02
        Constant MaximumNConc: FixedValue=0.02
        Constant WaterContent: FixedValue=0.12
        MultiplyFunction NFillingRate
          VariableReference NConc: VariableName=[Grain].MaximumNConc.Value()
          VariableReference DMDemand: VariableName=[Grain].DMDemands.Structural.DMDemandFunction.Value()
          VariableReference DMConversionEfficiency: VariableName=[Grain].DMConversionEfficiency.Value()
        PhaseLookup NFillingRateOLD
          PhaseLookupValue GrainFilling: Start=StartGrainFilling; End=EndGrainFill
            FillingRateFunction
              VariableReference NumberFunction: VariableName=[Grain].NumberFunction.Value()
              VariableReference ThermalTime: VariableName=[Phenology].ThermalTime.Value()
              MultiplyFunction PotentialSizeIncrement
                Constant MaximumFinalNConc: FixedValue=0.04
                VariableReference MaximumSize: VariableName=[Grain].MaximumPotentialGrainSize.Value()
              AddFunction FillingDuration
                VariableReference LatePodDevelopmentDuration: VariableName=[Phenology].LatePodDevelopment.Target.Value()
                VariableReference LateGrainFillingDuration1: VariableName=[Phenology].LateGrainFilling.Target.Value()
        MultiplyFunction NumberFunction
          Constant PeasPerPod: FixedValue=1
          VariableReference PodNumber: VariableName=[Shell].PodNumber.Value()
        BiomassRemoval BiomassRemovalDefaults
          OrganBiomassRemovalType Harvest: FractionLiveToRemove=1; FractionDeadToRemove=0; FractionLiveToResidue=0; FractionDeadToResidue=0
          OrganBiomassRemovalType Cut: FractionLiveToRemove=1; FractionDeadToRemove=0; FractionLiveToResidue=0; FractionDeadToResidue=0
          OrganBiomassRemovalType Prune: FractionLiveToRemove=0; FractionDeadToRemove=0; FractionLiveToResidue=0.8; FractionDeadToResidue=0
          OrganBiomassRemovalType Graze: FractionLiveToRemove=0.6; FractionDeadToRemove=0; FractionLiveToResidue=0.2; FractionDeadToResidue=0
          OrganBiomassRemovalType Thin: FractionLiveToRemove=0; FractionDeadToRemove=0; FractionLiveToResidue=0.05; FractionDeadToResidue=0
        Constant DMConversionEfficiency: FixedValue=0.694
        Constant RemobilisationCost: FixedValue=0
        Constant CarbonConcentration: FixedValue=0.4
        DivideFunction HarvestIndex
          VariableReference GrainWt: VariableName=[Grain].Wt
          VariableReference AboveGroundWt: VariableName=[AboveGround].Wt
        VariableReference AboveGroundWt: VariableName=[AboveGround].Wt
      Root: GrowthRespiration=0; MaintenanceRespiration=0
        LinearInterpolationFunction OLDKLModifier: XProperty=[Leaf].LAI
          XYPairs: X=[0, 3, 6]; Y=[0.1, 1, 1]
        PhaseLookup KLModifier
          PhaseLookupValue PreEmergence: Start=Germination; End=Emergence
            Constant Function: FixedValue=0.1
          PhaseLookupValue CanopyDevelopment: Start=Emergence; End=EndCanopyDevelopment
            LinearInterpolationFunction VegArea: XProperty=[Leaf].LAI
              XYPairs: X=[0, 3, 4, 6, 9]; Y=[0.1, 1, 1.15, 1.25, 1.3]
          PhaseLookupValue PostCanopyDevelopment: Start=EndCanopyDevelopment; End=Maturity
            OnEventFunction GrainfillKLModifier: SetEvent=StartFlowering; ReSetEvent=never
              LinearInterpolationFunction PreEventValue: XProperty=[Leaf].LAI
                XYPairs: X=[0, 3, 4, 6, 9]; Y=[0.1, 1, 1.15, 1.25, 1.3]
              VariableReference PostEventValue: VariableName=[Root].KLModifier
        Constant MaxDailyNUptake: FixedValue=6
        Constant SenescenceRate: FixedValue=0.005
        Constant MaximumRootDepth: FixedValue=1000000
        PhaseLookup RootFrontVelocity
          PhaseLookupValue PreEmergence: Start=Germination; End=Emergence
            Constant Function: FixedValue=3
          PhaseLookupValue early: Start=Emergence; End=StartFlowering
            Constant Function: FixedValue=15
          PhaseLookupValue late: Start=StartFlowering; End=Maturity
            Constant Function: FixedValue=17
        Constant MaximumNConc: FixedValue=0.01
        Constant MinimumNConc: FixedValue=0.005
        PhaseBasedSwitch NitrogenDemandSwitch: Start=Emergence; End=EndGrainFill
        BiomassRemoval BiomassRemovalDefaults
          OrganBiomassRemovalType Harvest: FractionLiveToRemove=0; FractionDeadToRemove=0; FractionLiveToResidue=0.2; FractionDeadToResidue=0
          OrganBiomassRemovalType Cut: FractionLiveToRemove=0; FractionDeadToRemove=0; FractionLiveToResidue=0.3; FractionDeadToResidue=0
          OrganBiomassRemovalType Prune: FractionLiveToRemove=0; FractionDeadToRemove=0; FractionLiveToResidue=0.1; FractionDeadToResidue=0
          OrganBiomassRemovalType Graze: FractionLiveToRemove=0; FractionDeadToRemove=0; FractionLiveToResidue=0.15; FractionDeadToResidue=0
        LinearInterpolationFunction KNO3: XProperty=[Root].LengthDensity
          XYPairs: X=[0, 0.003]; Y=[0.02, 0.02]
        LinearInterpolationFunction KNH4: XProperty=[Root].LengthDensity
          XYPairs: X=[0, 0.003]; Y=[0, 0]
        LinearInterpolationFunction NUptakeSWFactor: XProperty=[Root].RWC
          XYPairs: X=[0, 1]; Y=[0, 1]
        Constant InitialDM: FixedValue=0.2; Units=g/plant
        Constant SpecificRootLength: FixedValue=40; Units=m/g
        Constant DMConversionEfficiency: FixedValue=1
        Constant MaintenanceRespirationFunction: FixedValue=1
        Constant RemobilisationCost: FixedValue=0
        Constant CarbonConcentration: FixedValue=0.4
        BiomassDemand DMDemands
          MultiplyFunction Structural
            PartitionFractionDemandFunction DMDemandFunction
              PhaseLookup PartitionFraction
                PhaseLookupValue Early: Start=Emergence; End=StartFlowering
                  Constant Function: FixedValue=0.2
                PhaseLookupValue Middle: Start=StartFlowering; End=EndFlowering
                  Constant Function: FixedValue=0.1
                PhaseLookupValue Late: Start=EndFlowering; End=Maturity
                  Constant Function: FixedValue=0
            Constant StructuralFraction: FixedValue=1
          Constant Metabolic: FixedValue=0
          StorageDMDemandFunction Storage
            SubtractFunction StorageFraction
              Constant One: FixedValue=1
              VariableReference StructuralFraction: VariableName=[Root].DMDemands.Structural.StructuralFraction.Value()
        BiomassDemand NDemands
          MultiplyFunction Structural
            VariableReference MinNconc: VariableName=[Root].minimumNconc.Value()
            VariableReference PotentialDMAllocation: VariableName=[Root].potentialDMAllocation.Structural
          MultiplyFunction Metabolic
            SubtractFunction MetabolicNconc
              VariableReference CritNconc: VariableName=[Root].criticalNConc.Value()
              VariableReference MinNconc: VariableName=[Root].minimumNconc.Value()
            VariableReference PotentialDMAllocation: VariableName=[Root].potentialDMAllocation.Structural
          StorageNDemandFunction Storage
            VariableReference NitrogenDemandSwitch: VariableName=[Root].nitrogenDemandSwitch.Value()
            VariableReference MaxNconc: VariableName=[Root].maximumNconc.Value()
      GenericOrgan Shell
        MultiplyFunction PodNumber
          Constant PodsPerNode: FixedValue=1
          VariableReference StemPopulation: VariableName=[Structure].TotalStemPopn
          AddFunction FloweringNodes
            VariableReference EarlyFloweringNodes
              VariableName=[Phenology].Flowering.Target.NumberOfEarlyFloweringNodes.Value()
            VariableReference LateFloweringNodes
              VariableName=[Phenology].Flowering.Target.NumberOfLateFloweringNodes.Value()
        Constant NReallocationFactor: FixedValue=0
        Constant NRetranslocationFactor: FixedValue=0.1
        Constant MaximumNConc: FixedValue=0.02
        Constant MinimumNConc: FixedValue=0.007
        Constant DMRetranslocationFactor: FixedValue=0.1
        PhaseBasedSwitch NitrogenDemandSwitch: Start=Germination; End=Maturity
        BiomassRemoval BiomassRemovalDefaults
          OrganBiomassRemovalType Harvest: FractionLiveToRemove=0.5; FractionDeadToRemove=0; FractionLiveToResidue=0.1; FractionDeadToResidue=0
          OrganBiomassRemovalType Cut: FractionLiveToRemove=0.8; FractionDeadToRemove=0; FractionLiveToResidue=0; FractionDeadToResidue=0
          OrganBiomassRemovalType Prune: FractionLiveToRemove=0; FractionDeadToRemove=0; FractionLiveToResidue=0.6; FractionDeadToResidue=0
          OrganBiomassRemovalType Graze: FractionLiveToRemove=0.6; FractionDeadToRemove=0; FractionLiveToResidue=0.2; FractionDeadToResidue=0
        Constant InitialWtFunction: FixedValue=0; Units=g/m^2
        Constant SenescenceRate: FixedValue=0; Units=/d
        Constant DetachmentRateFunction: FixedValue=0; Units=/d
        Constant MaintenanceRespirationFunction: FixedValue=0; Units=0-1
        Constant DMConversionEfficiency: FixedValue=1; Units=0-1
        Constant DMReallocationFactor: FixedValue=0
        VariableReference CriticalNConc: VariableName=[Shell].MinimumNConc.Value()
        Constant RemobilisationCost: FixedValue=0
        Constant CarbonConcentration: FixedValue=0.4
        Constant PotentialHarvestIndex: FixedValue=0.1
        BiomassDemand DMDemands
          MultiplyFunction Structural
            PhaseLookup DMDemandFunction
              PhaseLookupValue PodDevelopment: Start=StartPodDevelopment; End=EndPodDevelopment
                MultiplyFunction HIPodDemand
                  VariableReference AboveGroundWt: VariableName=[AboveGround].Wt
                  DivideFunction HarvestIndexIncrease
                    VariableReference PotentialHarvestIndex: VariableName=[Shell].PotentialHarvestIndex.Value()
                    VariableReference FillingDuration: VariableName=[Shell].FillingDuration.Value()
                  VariableReference ThermalTime: VariableName=[Phenology].ThermalTime.Value()
                FillingRateFunction: same as Replacements.Chickpea.Grain.DMDemandFunction.GrainFilling.FillingRateFunction
            Constant StructuralFraction: FixedValue=0.7; Units=g/g
          Constant Metabolic: FixedValue=0
          StorageDMDemandFunction Storage
            SubtractFunction StorageFraction
              Constant One: FixedValue=1
              VariableReference StructuralFraction: VariableName=[Shell].DMDemands.Structural.StructuralFraction.Value()
        AddFunction FillingDuration
          VariableReference EarlyPodDevelopmentDuration: VariableName=[Phenology].EarlyPodDevelopment.Target.Value()
          VariableReference EarlyGrainFillingDuration: VariableName=[Phenology].EarlyGrainFilling.Target.Value()
          VariableReference MidGrainFillingDuration: VariableName=[Phenology].MidGrainFilling.Target.Value()
        BiomassDemand NDemands
          MultiplyFunction Structural
            VariableReference MinNconc: VariableName=[Shell].minimumNconc.Value()
            VariableReference PotentialDMAllocation: VariableName=[Shell].potentialDMAllocation.Structural
          MultiplyFunction Metabolic
            SubtractFunction MetabolicNconc
              VariableReference CritNconc: VariableName=[Shell].criticalNConc.Value()
              VariableReference MinNconc: VariableName=[Shell].minimumNconc.Value()
            VariableReference PotentialDMAllocation: VariableName=[Shell].potentialDMAllocation.Structural
          StorageNDemandFunction Storage
            VariableReference NitrogenDemandSwitch: VariableName=[Shell].nitrogenDemandSwitch.Value()
            VariableReference MaxNconc: VariableName=[Shell].maximumNconc.Value()
      Leaf: MaxCover=1; Albedo=0.2; Gsmax=0.0122; R50=200; MicroClimatePresent=true; KDead=0.3; MaximumMainStemLeafNumber=40
        zero: CurrentExpandingLeaf, StartFractionExpanded, FractionNextleafExpanded, DeadNodesYesterday, GrowthRespiration, FRGR, PotentialEP, WaterDemand, TipsAtEmergence, CohortsAtInitialisation, FractionDied
        LeafCohort InitialLeaf1: Rank=1; Area=224
          zero: NReallocationFactor, DMReallocationFactor, NRetranslocationFactor, DMRetranslocationFactor, ShadeInducedSenRate, SenescedFrac, DeltaPotentialArea, DeltaStressConstrainedArea, DeltaCarbonConstrainedArea, PotentialStructuralDMAllocation, PotentialMetabolicDMAllocation, MetabolicNReallocated, MetabolicWtReallocated, StorageNReallocated, StorageWtReallocated, MetabolicNRetranslocated, StorageNRetrasnlocated, DMRetranslocated, MetabolicNAllocation, StructuralDMAllocation, MetabolicDMAllocation, MaintenanceRespiration
        LeafCohort InitialLeaf2: Rank=2; Area=224
          zero: NReallocationFactor, DMReallocationFactor, NRetranslocationFactor, DMRetranslocationFactor, ShadeInducedSenRate, SenescedFrac, DeltaPotentialArea, DeltaStressConstrainedArea, DeltaCarbonConstrainedArea, PotentialStructuralDMAllocation, PotentialMetabolicDMAllocation, MetabolicNReallocated, MetabolicWtReallocated, StorageNReallocated, StorageWtReallocated, MetabolicNRetranslocated, StorageNRetrasnlocated, DMRetranslocated, MetabolicNAllocation, StructuralDMAllocation, MetabolicDMAllocation, MaintenanceRespiration
        LeafCohort InitialLeaf3: Rank=3; Area=224
          zero: NReallocationFactor, DMReallocationFactor, NRetranslocationFactor, DMRetranslocationFactor, ShadeInducedSenRate, SenescedFrac, DeltaPotentialArea, DeltaStressConstrainedArea, DeltaCarbonConstrainedArea, PotentialStructuralDMAllocation, PotentialMetabolicDMAllocation, MetabolicNReallocated, MetabolicWtReallocated, StorageNReallocated, StorageWtReallocated, MetabolicNRetranslocated, StorageNRetrasnlocated, DMRetranslocated, MetabolicNAllocation, StructuralDMAllocation, MetabolicDMAllocation, MaintenanceRespiration
        LeafCohortParameters: ExpansionStressValue=0
          LinearInterpolationFunction OLDESTMaxArea: XProperty=[Structure].LeafTipsAppeared
            Memo
              Robertson et al (2002) used a maximum leaf size of 300 mm2 for the first 9 leaves and 600 mm2 thereafter. No they didn't! Bell curve ranging from 350 to 1000, peak at leaf 14-17
            XYPairs: X=[1, 12, 16, 19]; Y=[300, 300, 450, 850]
          Constant SenessingLeafRelativeSize: FixedValue=1; Units=0-1
          LinearInterpolationFunction MaxArea: XProperty=[Structure].LeafTipsAppeared
            Memo
              Robertson et al (2002) used a maximum leaf size of 300 mm2 for the first 9 leaves and 600 mm2 thereafter. No they didn't! Bell curve ranging from 350 to 1000, peak at leaf 14-17
            XYPairs: X=[1, 7, 10, 14, 17, 25, 40]; Y=[50, 350, 500, 1000, 1000, 450, 450]
          LinearInterpolationFunction MaxAreaNov18: XProperty=[Structure].LeafTipsAppeared
            Memo
              Robertson et al (2002) used a maximum leaf size of 300 mm2 for the first 9 leaves and 600 mm2 thereafter. No they didn't! Bell curve ranging from 350 to 1000, peak at leaf 14-17
            XYPairs: X=[1, 12, 16, 19, 25]; Y=[300, 300, 450, 850, 450]
          LinearInterpolationFunction MaxAreaOLDvNEWER: XProperty=[Structure].LeafTipsAppeared
            Memo
              Robertson et al (2002) used a maximum leaf size of 300 mm2 for the first 9 leaves and 600 mm2 thereafter.
            XYPairs: X=[1, 5, 10, 21]; Y=[224, 224, 489, 1080]
          PhaseLookup ARCHIVEexperimentalMaxArea
            PhaseLookupValue PreEmergence: Start=Germination; End=Emergence
              Constant Function: FixedValue=0
            PhaseLookupValue Vegetative_to_EndCanopy: Start=Emergence; End=EndCanopyDevelopment
              LinearInterpolationFunction VegArea: XProperty=[Structure].LeafTipsAppeared
                Memo
                  As per Robertson et al (2002) bell curve (Figure 2)
                XYPairs: X=[1, 7, 10, 15, 20, 30]; Y=[224, 300, 400, 800, 1000, 500]
            PhaseLookupValue Flowering: Start=StartFlowering; End=EndFlowering
              Constant Function: FixedValue=500
            PhaseLookupValue ARCHIVEExperimentalGrainfilling: Start=EndFlowering; End=Maturity
              MultiplyFunction MaxLeafSizeDuringGrainfilling
                Memo
                  1000mm2 is the maximum leaf size at end of grainfilling. Leaf size reduces by 0.85^(additionalleafnumber) to approximate bell curve function of Robertson et al 2002
                Constant Function: FixedValue=1176
                ExpressionFunction
                  Expression=0.85^(1+([Structure].LeafTipsAppeared - [Phenology].EndFloweringMSLeafNo))
          MultiplyFunction GrowthDuration
            Constant Multiplier: FixedValue=4
            VariableReference Phyllochron: VariableName=[Structure].Phyllochron.Value()
          MultiplyFunction OLDLagDuration
            Constant Multiplier: FixedValue=17
            VariableReference Phyllochron: VariableName=[Structure].Phyllochron.Value()
          MultiplyFunction LagDuration
            Constant Multiplier: FixedValue=17
            VariableReference Phyllochron: VariableName=[Structure].Phyllochron.Value()
          MultiplyFunction SenescenceDuration
            Constant Multiplier: FixedValue=2
            VariableReference Phyllochron: VariableName=[Structure].Phyllochron.Value()
          Constant DetachmentLagDuration: FixedValue=1000000
          Constant DetachmentDuration: FixedValue=46
          LinearInterpolationFunction SpecificLeafAreaMax: XProperty=[Leaf].LAI
            Memo
              Maximum specific leaf area has been taken from Robertson et al (2002).
            XYPairs: X=[0, 3]; Y=[22000, 15000]
          Constant StructuralFraction: FixedValue=0.7
          LinearInterpolationFunction SpecificLeafAreaMin: XProperty=[Leaf].LAI
            XYPairs: X=[0, 3]; Y=[20000, 14000]
          LinearInterpolationFunction OLDExpansionStress (disabled): XProperty=[Chickpea].Leaf.Fw
            XYPairs: X=[0, 1]; Y=[0, 1]
          MinimumFunction ExpansionStress
            LinearInterpolationFunction WaterStress: XProperty=[Root].WaterTensionFactor
              XYPairs: X=[0, 1]; Y=[0, 1]
            LinearInterpolationFunction TemperatureEffect: XProperty=[Phenology].MeanTemp.Value()
              XYPairs: X=[0, 12, 14]; Y=[0, 1, 1]
          LinearInterpolationFunction CellDivisionStress: XProperty=[Chickpea].Leaf.Fw
            XYPairs: X=[0, 1]; Y=[0, 1]
          Constant MinimumNConc: FixedValue=0.02
          Constant CriticalNConc: FixedValue=0.05
          Constant MaximumNConc: FixedValue=0.08
          Constant NReallocationFactor: FixedValue=0.3
          Constant NRetranslocationFactor: FixedValue=0.1
          Constant DMRetranslocationFactor: FixedValue=0
          LinearInterpolationFunction ShadeInducedSenescenceRate: XProperty=[Leaf].CohortCurrentRankCoverAbove
            XYPairs: X=[0, 0.8, 0.9, 0.99]; Y=[0, 0, 0, 0]
          Constant InitialNConc: FixedValue=0.08
          Constant StorageFraction: FixedValue=0
          Constant DMReallocationFactor: FixedValue=0
          Constant LeafSizeShapeParameter: FixedValue=0.01
          Constant MaintenanceRespirationFunction: FixedValue=0
          Constant DroughtInducedLagAcceleration: FixedValue=1
          Constant DroughtInducedSenAcceleration: FixedValue=1
          Constant OLDCellDivisionStress: FixedValue=1; Units=0-1
          ArrayFunction LagDurationAgeMultiplier: Values=1 1 1
          ArrayFunction SenescenceDurationAgeMultiplier: Values=1 1 1
          ArrayFunction LeafSizeAgeMultiplier: Values=1 1 1 1 1 1 1 1 1 1 1 1
          Constant RemobilisationCost: FixedValue=0
          Constant CarbonConcentration: FixedValue=0.4
        VariableReference ThermalTime: VariableName=[Phenology].ThermalTime.Value()
        LinearInterpolationFunction ExtinctionCoeff: XProperty=[Chickpea].SowingData.RowSpacing
          XYPairs: X=[150, 350, 650, 1000]; Y=[0.85, 0.81, 0.72, 0.52]
          Memo
            Using soybean data from Flenet et al 1996 to establish trend, with data from Tesfaye et al 2006 for absolute values (close to 0.8 at 40cm RS). These high values also agreed with Thomas and Fukai 1995 (their measurements were at noon therefore they need to be increased for absolute light interception?)
        RUEModel Photosynthesis
          Constant RUE: FixedValue=1.25
          WeightedTemperatureFunction FT: MaximumTemperatureWeighting=0.75
            XYPairs: X=[0, 15, 30, 40]; Y=[0, 1, 1, 0]
          LinearInterpolationFunction FVPD: XProperty=[Leaf].Photosynthesis.VPD
            XYPairs: X=[0, 10, 50]; Y=[1, 1, 1]
          LinearInterpolationFunction FN: XProperty=[Leaf].Fn
            XYPairs: X=[0, 1, 1.5]; Y=[0, 1, 1]
          LinearInterpolationFunction FW: XProperty=[Leaf].Fw
            XYPairs: X=[0, 1, 1.5]; Y=[0, 1, 1]
          RUECO2Function FCO2: PhotosyntheticPathway=C3
          Memo
            Ayaz eta 2004 presented a RUE of 1.6 g/MJ PAR during non-limiting temperature conditions for field pea.  Halving this to make it total radiation gives 0.8 g/MJ and adding 20% to account for root and  nodule production and N fixiation costs gives 1.0 g/MJ
          VariableReference RadnInt: VariableName=[Leaf].RadIntTot
        LinearInterpolationFunction FrostFraction: XProperty=[Weather].MinT
          XYPairs: X=[-1, 0]; Y=[0, 0]
        MinimumFunction FRGRFunction
          VariableReference RUE_FT: VariableName=[Leaf].Photosynthesis.FT.Value()
          MinimumFunction Others
            VariableReference RUE_FN: VariableName=[Leaf].Photosynthesis.FN.Value()
            VariableReference RUE_FVPD: VariableName=[Leaf].Photosynthesis.FVPD.Value()
        BiomassRemoval BiomassRemovalDefaults
          OrganBiomassRemovalType Harvest: FractionLiveToRemove=0; FractionDeadToRemove=0; FractionLiveToResidue=0.3; FractionDeadToResidue=0
          OrganBiomassRemovalType Cut: FractionLiveToRemove=0.8; FractionDeadToRemove=0; FractionLiveToResidue=0; FractionDeadToResidue=0
          OrganBiomassRemovalType Prune: FractionLiveToRemove=0; FractionDeadToRemove=0; FractionLiveToResidue=0.6; FractionDeadToResidue=0
          OrganBiomassRemovalType Graze: FractionLiveToRemove=0.6; FractionDeadToRemove=0; FractionLiveToResidue=0.1; FractionDeadToResidue=0
        Constant StructuralFraction: FixedValue=0.7
        Constant DMConversionEfficiency: FixedValue=1
        Constant RemobilisationCost: FixedValue=0
        Constant CarbonConcentration: FixedValue=0.4
      GenericOrgan Stem
        Constant NReallocationFactor: FixedValue=0
        Constant NRetranslocationFactor: FixedValue=0.1
        Constant DMRetranslocationFactor: FixedValue=0.1
        Constant MaximumNConc: FixedValue=0.02
        Constant MinimumNConc: FixedValue=0.007
        PhaseBasedSwitch NitrogenDemandSwitch: Start=Emergence; End=EndGrainFill
        BiomassRemoval BiomassRemovalDefaults: same as Replacements.Chickpea.Shell.BiomassRemovalDefaults
        Constant InitialWtFunction: FixedValue=0; Units=g/m^2
        Constant SenescenceRate: FixedValue=0; Units=/d
        Constant DetachmentRateFunction: FixedValue=0; Units=/d
        Constant MaintenanceRespirationFunction: FixedValue=0; Units=0-1
        Constant DMConversionEfficiency: FixedValue=1; Units=0-1
        Constant DMReallocationFactor: FixedValue=0
        VariableReference CriticalNConc: VariableName=[Stem].MinimumNConc.Value()
        Constant RemobilisationCost: FixedValue=0
        Constant CarbonConcentration: FixedValue=0.4
        BiomassDemand DMDemands
          MultiplyFunction Structural
            PartitionFractionDemandFunction DMDemandFunction
              PhaseLookup PartitionFraction
                PhaseLookupValue Vegetative: Start=Emergence; End=StartFlowering
                  LinearInterpolationFunction OLDStemFraction (disabled): XProperty=[AboveGround].Wt
                    XYPairs: X=[0, 200, 201, 400]; Y=[0.5, 0.5, 0.6, 0.6]
                  Constant StemFraction: FixedValue=0.5; Units=g/g
                PhaseLookupValue Preflowering (disabled): Start=Preflowering; End=StartFlowering
                  LinearInterpolationFunction OLDStemFraction: XProperty=[AboveGround].Wt
                    XYPairs: X=[0, 200, 201, 400]; Y=[0.5, 0.5, 0.6, 0.6]
                  Constant StemFraction: FixedValue=0.3; Units=g/g
                PhaseLookupValue EarlyFlowering: Start=StartFlowering; End=StartPodDevelopment
                  Constant StemFraction: FixedValue=0; Units=g/g
                PhaseLookupValue EarlyPodDevelopment: Start=StartPodDevelopment; End=EndFlowering
                  Constant StemFraction: FixedValue=0.2; Units=g/g
                PhaseLookupValue EarlyGrainFilling: Start=EndFlowering; End=EndCanopyDevelopment
                  Constant StemFraction: FixedValue=0.2; Units=g/g
                PhaseLookupValue MidGrainFilling: Start=EndCanopyDevelopment; End=EndPodDevelopment
                  Constant StemFraction: FixedValue=0.2
                PhaseLookupValue LateGrainFilling: Start=EndPodDevelopment; End=EndGrainFill
                  Constant StemFraction: FixedValue=0.2
            Constant StructuralFraction: FixedValue=1; Units=g/g
          Constant Metabolic: FixedValue=0
          StorageDMDemandFunction Storage
            SubtractFunction StorageFraction
              Constant One: FixedValue=1
              VariableReference StructuralFraction: VariableName=[Stem].DMDemands.Structural.StructuralFraction.Value()
        BiomassDemand NDemands
          MultiplyFunction Structural
            VariableReference MinNconc: VariableName=[Stem].minimumNconc.Value()
            VariableReference PotentialDMAllocation: VariableName=[Stem].potentialDMAllocation.Structural
          MultiplyFunction Metabolic
            SubtractFunction MetabolicNconc
              VariableReference CritNconc: VariableName=[Stem].criticalNConc.Value()
              VariableReference MinNconc: VariableName=[Stem].minimumNconc.Value()
            VariableReference PotentialDMAllocation: VariableName=[Stem].potentialDMAllocation.Structural
          StorageNDemandFunction Storage
            VariableReference NitrogenDemandSwitch: VariableName=[Stem].nitrogenDemandSwitch.Value()
            VariableReference MaxNconc: VariableName=[Stem].maximumNconc.Value()
      Nodule
        Constant FixationMetabolicCost: FixedValue=0
        Constant MaximumNConc: FixedValue=0.02
        Constant MinimumNConc: FixedValue=0.01
        Constant SenescenceRate: FixedValue=0
        Constant NReallocationFactor: FixedValue=0
        PhaseBasedSwitch NitrogenDemandSwitch: Start=Emergence; End=EndGrainFill
        BiomassRemoval BiomassRemovalDefaults
          OrganBiomassRemovalType Harvest: FractionLiveToRemove=0; FractionDeadToRemove=0; FractionLiveToResidue=0; FractionDeadToResidue=0
          OrganBiomassRemovalType Cut: FractionLiveToRemove=0; FractionDeadToRemove=0; FractionLiveToResidue=0; FractionDeadToResidue=0
          OrganBiomassRemovalType Prune: FractionLiveToRemove=0; FractionDeadToRemove=0; FractionLiveToResidue=0; FractionDeadToResidue=0
          OrganBiomassRemovalType Graze: FractionLiveToRemove=0; FractionDeadToRemove=0; FractionLiveToResidue=0; FractionDeadToResidue=0
        Constant InitialWtFunction: FixedValue=0; Units=g/m^2
        Constant DetachmentRateFunction: FixedValue=0; Units=/d
        Constant FixationRate: FixedValue=10000; Units=g/m^2/d
        MultiplyFunction FixationRate2
          VariableReference NoduleWt: VariableName=[Nodule].Live.Wt
          Constant SpecificNitrogenaseActivity: FixedValue=0
          MinimumFunction
            AirTemperatureFunction FT
              XYPairs: X=[0, 20, 30, 40]; Y=[0, 1, 1, 0]
            LinearInterpolationFunction FW: XProperty=[Leaf].Fw
              XYPairs: X=[0, 1, 1.5]; Y=[0, 1, 1]
            LinearInterpolationFunction FWlog: XProperty=[Leaf].Fw
              XYPairs: X=[0, 1, 1.5]; Y=[1, 1, 1]
        Constant MaintenanceRespirationFunction: FixedValue=0; Units=0-1
        Constant DMConversionEfficiency: FixedValue=1; Units=0-1
        Constant NRetranslocationFactor: FixedValue=0
        Constant DMReallocationFactor: FixedValue=0
        Constant DMRetranslocationFactor: FixedValue=0
        VariableReference CriticalNConc: VariableName=[Nodule].MinimumNConc.Value()
        Constant RemobilisationCost: FixedValue=0
        Constant CarbonConcentration: FixedValue=0.4
        BiomassDemand DMDemands
          MultiplyFunction Structural
            PartitionFractionDemandFunction DMDemandFunction
              PhaseLookup PartitionFraction
                PhaseLookupValue Early: Start=Emergence; End=StartFlowering
                  Constant Function: FixedValue=0
                PhaseLookupValue Middle: Start=StartFlowering; End=EndFlowering
                  Constant Function: FixedValue=0
                PhaseLookupValue Late: Start=EndFlowering; End=Maturity
                  Constant Function: FixedValue=0
            Constant StructuralFraction: FixedValue=1; Units=g/g
          Constant Metabolic: FixedValue=0
          StorageDMDemandFunction Storage
            SubtractFunction StorageFraction
              Constant One: FixedValue=1
              VariableReference StructuralFraction: VariableName=[Nodule].DMDemands.Structural.StructuralFraction.Value()
        BiomassDemand NDemands
          MultiplyFunction Structural
            VariableReference MinNconc: VariableName=[Nodule].minimumNconc.Value()
            VariableReference PotentialDMAllocation: VariableName=[Nodule].potentialDMAllocation.Structural
          MultiplyFunction Metabolic
            SubtractFunction MetabolicNconc
              VariableReference CritNconc: VariableName=[Nodule].criticalNConc.Value()
              VariableReference MinNconc: VariableName=[Nodule].minimumNconc.Value()
            VariableReference PotentialDMAllocation: VariableName=[Nodule].potentialDMAllocation.Structural
          StorageNDemandFunction Storage
            VariableReference NitrogenDemandSwitch: VariableName=[Nodule].nitrogenDemandSwitch.Value()
            VariableReference MaxNconc: VariableName=[Nodule].maximumNconc.Value()
      CompositeBiomass AboveGround: DMDOfStructural=0.6
        Propertys=[[Leaf].Live, [Leaf].Dead, [Stem].Live, [Stem].Dead, [Grain].Live, [Grain].Dead, [Shell].Live, [Shell].Dead]
      CompositeBiomass BelowGround: Propertys=[[Root].Live, [Root].Dead, [Nodule].Live, [Nodule].Dead]; DMDOfStructural=0.6
      CompositeBiomass Total: DMDOfStructural=0.6
        Propertys=[[Leaf].Live, [Leaf].Dead, [Stem].Live, [Stem].Dead, [Grain].Live, [Grain].Dead, [Shell].Live, [Shell].Dead, [Root].Live, [Root].Dead, [Nodule].Live, [Nodule].Dead]
      CompositeBiomass TotalLive: DMDOfStructural=0.6
        Propertys=[[Leaf].Live, [Stem].Live, [Grain].Live, [Shell].Live, [Root].Live, [Nodule].Live]
      CompositeBiomass TotalDead: DMDOfStructural=0.6
        Propertys=[[Leaf].Dead, [Stem].Dead, [Grain].Dead, [Shell].Dead, [Root].Dead, [Nodule].Dead]
      CompositeBiomass Pod: Propertys=[[Shell].Live, [Shell].Dead, [Grain].Live, [Grain].Dead]; DMDOfStructural=0.6
      Memo References
        References

        Brown, H.E., Huth, N.I., Holzworth, D.P., Teixeira, E.I., Zyskowski, R.F., Hargreaves, J.N., Moot, D.J., 2014\. Plant modelling framework: software for building and running crop models on the APSIM platform. Environmental Modelling & Software 62 385-398.

        Robertson, M.J., Carberry, P.S., Huth, N.I., Turpin, J.E., Probert, M.E., Poulton, P.L., Bell, M., Wright, G.C., Yeates, S.J., Brinsmead, R.B., 2002\. Simulation of growth and development of diverse legume species in APSIM. Australian Journal of Agricultural Research 53 429-446.

        Singh P, Virmani SM (1996) Modeling growth and yield of chickpea (Cicer arietinum L.). Field Crops Research , 46, 41-59.
      CultivarFolder
        Cultivar Amethyst
          Command:
            [Phenology].Vegetative.Progression.PhotoperiodModifier.CriticalPhotoperiod = 8.5
            [Phenology].Vegetative.Progression.PhotoperiodModifier.OptimumPhotoperiod = 21
            [Phenology].Vegetative.Target.FixedValue = 590
        Cultivar Hashem
          Command:
            [Leaf].LeafCohortParameters.MaxArea.XYPairs.X = 1,  5,  10,  21
            [Leaf].LeafCohortParameters.MaxArea.XYPairs.Y = 224,  224,  489, 1080
            [Phenology].Vegetative.Target.FixedValue = 610
            [Phenology].Vegetative.Progression.PhotoperiodModifier.CriticalPhotoperiod = 10.3
        Cultivar Anwar
          Command:
            [Leaf].LeafCohortParameters.MaxArea.XYPairs.X = 1,  5,  10,  21
            [Leaf].LeafCohortParameters.MaxArea.XYPairs.Y = 224,  224,  489, 1080
            [Phenology].Vegetative.Target.FixedValue = 490
            [Phenology].Vegetative.Progression.PhotoperiodModifier.CriticalPhotoperiod = 11
            [Grain].HIIncrement.Reproductive.HIIncrement.IncrementPerDegreeDay.PotentialHarvestIndex.FixedValue = 0.5
        Cultivar Ayaz
          Command:
            [Leaf].LeafCohortParameters.MaxArea.XYPairs.X = 1,  5,  10,  21
            [Leaf].LeafCohortParameters.MaxArea.XYPairs.Y = 224,  224,  489, 1080
            [Phenology].Vegetative.Target.FixedValue = 550
            [Phenology].Vegetative.Progression.PhotoperiodModifier.CriticalPhotoperiod = 10.5
        Cultivar 99_73C
          Command:
            [Leaf].LeafCohortParameters.MaxArea.XYPairs.X = 1,  5,  10,  21
            [Leaf].LeafCohortParameters.MaxArea.XYPairs.Y = 224,  224,  489, 1080
            [Phenology].Vegetative.Target.FixedValue = 440
            [Phenology].Vegetative.Progression.PhotoperiodModifier.CriticalPhotoperiod = 11
            [Grain].HIIncrement.Reproductive.HIIncrement.IncrementPerDegreeDay.PotentialHarvestIndex.FixedValue = 0.5
        Cultivar 99_66C
          Command:
            [Leaf].LeafCohortParameters.MaxArea.XYPairs.X = 1,  5,  10,  21
            [Leaf].LeafCohortParameters.MaxArea.XYPairs.Y = 224,  224,  489, 1080
            [Phenology].Vegetative.Target.FixedValue = 410
            [Phenology].Vegetative.Progression.PhotoperiodModifier.CriticalPhotoperiod = 11
            [Grain].HIIncrement.Reproductive.HIIncrement.IncrementPerDegreeDay.PotentialHarvestIndex.FixedValue = 0.5
        Cultivar 99_34C
          Command:
            [Leaf].LeafCohortParameters.MaxArea.XYPairs.X = 1,  5,  10,  21
            [Leaf].LeafCohortParameters.MaxArea.XYPairs.Y = 224,  224,  489, 1080
            [Phenology].Vegetative.Target.FixedValue = 420
            [Phenology].Vegetative.Progression.PhotoperiodModifier.CriticalPhotoperiod = 11
            [Grain].HIIncrement.Reproductive.HIIncrement.IncrementPerDegreeDay.PotentialHarvestIndex.FixedValue = 0.5
        Cultivar 98_79C: same as Replacements.Chickpea.CultivarFolder.99_66C
        Cultivar 98_55C: same as Replacements.Chickpea.CultivarFolder.99_66C
        Cultivar 98_16C
          Command:
            [Leaf].LeafCohortParameters.MaxArea.XYPairs.X = 1,  5,  10,  21
            [Leaf].LeafCohortParameters.MaxArea.XYPairs.Y = 224,  224,  489, 1080
            [Phenology].Vegetative.Target.FixedValue = 430
            [Phenology].Vegetative.Progression.PhotoperiodModifier.CriticalPhotoperiod = 10
            [Grain].HIIncrement.Reproductive.HIIncrement.IncrementPerDegreeDay.PotentialHarvestIndex.FixedValue = 0.5
        Cultivar 98_107C: same as Replacements.Chickpea.CultivarFolder.99_66C
        Cultivar 98_106C
          Command:
            [Leaf].LeafCohortParameters.MaxArea.XYPairs.X = 1,  5,  10,  21
            [Leaf].LeafCohortParameters.MaxArea.XYPairs.Y = 224,  224,  489, 1080
            [Phenology].Vegetative.Target.FixedValue = 400
            [Phenology].Vegetative.Progression.PhotoperiodModifier.CriticalPhotoperiod = 11
            [Grain].HIIncrement.Reproductive.HIIncrement.IncrementPerDegreeDay.PotentialHarvestIndex.FixedValue = 0.5
        Cultivar 97_219C
          Command:
            [Leaf].LeafCohortParameters.MaxArea.XYPairs.X = 1,  5,  10,  21
            [Leaf].LeafCohortParameters.MaxArea.XYPairs.Y = 224,  224,  489, 1080
            [Phenology].Vegetative.Target.FixedValue = 430
            [Phenology].Vegetative.Progression.PhotoperiodModifier.CriticalPhotoperiod = 11
            [Grain].HIIncrement.Reproductive.HIIncrement.IncrementPerDegreeDay.PotentialHarvestIndex.FixedValue = 0.5
        Cultivar 97_120C: same as Replacements.Chickpea.CultivarFolder.98_106C
        Cultivar 97_118C
          Command:
            [Leaf].LeafCohortParameters.MaxArea.XYPairs.X = 1,  5,  10,  21
            [Leaf].LeafCohortParameters.MaxArea.XYPairs.Y = 224,  224,  489, 1080
            [Phenology].Vegetative.Target.FixedValue = 420
            [Phenology].Vegetative.Progression.PhotoperiodModifier.CriticalPhotoperiod = 10.5
            [Grain].HIIncrement.Reproductive.HIIncrement.IncrementPerDegreeDay.PotentialHarvestIndex.FixedValue = 0.5
        Cultivar 97_116C
          Command:
            [Leaf].LeafCohortParameters.MaxArea.XYPairs.X = 1,  5,  10,  21
            [Leaf].LeafCohortParameters.MaxArea.XYPairs.Y = 224,  224,  489, 1080
            [Phenology].Vegetative.Target.FixedValue = 405
            [Phenology].Vegetative.Progression.PhotoperiodModifier.CriticalPhotoperiod = 10.5
            [Grain].HIIncrement.Reproductive.HIIncrement.IncrementPerDegreeDay.PotentialHarvestIndex.FixedValue = 0.5
        Cultivar 02_35C
          Command:
            [Leaf].LeafCohortParameters.MaxArea.XYPairs.X = 1,  5,  10,  21
            [Leaf].LeafCohortParameters.MaxArea.XYPairs.Y = 224,  224,  489, 1080
            [Phenology].Vegetative.Target.FixedValue = 505
            [Phenology].Vegetative.Progression.PhotoperiodModifier.CriticalPhotoperiod = 10.5
            [Grain].HIIncrement.Reproductive.HIIncrement.IncrementPerDegreeDay.PotentialHarvestIndex.FixedValue = 0.5
        Cultivar 02_30C: same as Replacements.Chickpea.CultivarFolder.98_106C
        Cultivar 02_23C: same as Replacements.Chickpea.CultivarFolder.98_106C
        Cultivar 02_10C
          Command:
            [Leaf].LeafCohortParameters.MaxArea.XYPairs.X = 1,  5,  10,  21
            [Leaf].LeafCohortParameters.MaxArea.XYPairs.Y = 224,  224,  489, 1080
            [Phenology].Vegetative.Target.FixedValue = 500
            [Phenology].Vegetative.Progression.PhotoperiodModifier.CriticalPhotoperiod = 10.5
            [Grain].HIIncrement.Reproductive.HIIncrement.IncrementPerDegreeDay.PotentialHarvestIndex.FixedValue = 0.5
        Cultivar 02_03C: same as Replacements.Chickpea.CultivarFolder.02_10C
        Cultivar 01_7C
          Command:
            [Leaf].LeafCohortParameters.MaxArea.XYPairs.X = 1,  5,  10,  21
            [Leaf].LeafCohortParameters.MaxArea.XYPairs.Y = 224,  224,  489, 1080
            [Phenology].Vegetative.Target.FixedValue = 485
            [Phenology].Vegetative.Progression.PhotoperiodModifier.CriticalPhotoperiod = 10.5
            [Grain].HIIncrement.Reproductive.HIIncrement.IncrementPerDegreeDay.PotentialHarvestIndex.FixedValue = 0.5
        Cultivar 01_61C: same as Replacements.Chickpea.CultivarFolder.02_10C
        Cultivar 01_36C
          Command:
            [Leaf].LeafCohortParameters.MaxArea.XYPairs.X = 1,  5,  10,  21
            [Leaf].LeafCohortParameters.MaxArea.XYPairs.Y = 224,  224,  489, 1080
            [Phenology].Vegetative.Target.FixedValue = 600
            [Phenology].Vegetative.Progression.PhotoperiodModifier.CriticalPhotoperiod = 10
            [Grain].HIIncrement.Reproductive.HIIncrement.IncrementPerDegreeDay.PotentialHarvestIndex.FixedValue = 0.5
        Cultivar 00_40C: same as Replacements.Chickpea.CultivarFolder.98_16C
        Cultivar 00_21C: same as Replacements.Chickpea.CultivarFolder.02_10C
        Cultivar Ghab4: same as Replacements.Chickpea.CultivarFolder.02_10C
        Cultivar Ghab5: same as Replacements.Chickpea.CultivarFolder.02_10C
        Cultivar Ghab3
          Command:
            [Leaf].LeafCohortParameters.MaxArea.XYPairs.X = 1,  5,  10,  21
            [Leaf].LeafCohortParameters.MaxArea.XYPairs.Y = 224,  224,  489, 1080
            [Phenology].Vegetative.Target.FixedValue = 510
            [Phenology].Vegetative.Progression.PhotoperiodModifier.CriticalPhotoperiod = 10.5
            [Grain].HIIncrement.Reproductive.HIIncrement.IncrementPerDegreeDay.PotentialHarvestIndex.FixedValue = 0.5
  DataStore
    ExcelInput Observed: FileName=Observed.xlsx; SheetNames=[ObservedHarvestData]
    ExcelInput ObservedTimeseries: FileName=Observed.xlsx; SheetNames=[ObservedTimeseriesData]
    PredictedObserved: PredictedTableName=HarvestReport; ObservedTableName=ObservedHarvestData; FieldNameUsedForMatch=Stage
    PredictedObserved PredictedObserved_Daily: PredictedTableName=Report; ObservedTableName=ObservedTimeseriesData; FieldNameUsedForMatch=Clock.Today
  Manager Test
```csharp
using System;
using Models.Core;
using Models.Storage;
using APSIM.Shared.Utilities;
namespace Models
{
    public class Script : Model, ITest
    {
        public void Run()
        {
            DataStore store = Apsim.Find(this, typeof(DataStore)) as DataStore;

            var data = store.GetData("PredictedObserved");
            var predictedGrainWt = DataTableUtilities.GetColumnAsDoubles(data, "Predicted.GrainWt");
            var observedGrainWt = DataTableUtilities.GetColumnAsDoubles(data, "Observed.GrainWt");

            var stats = MathUtilities.CalcRegressionStats("Grain.Wt", predictedGrainWt, observedGrainWt);

            if (stats.R2 < 0.3)
                throw new Exception("Test failed. R2 is below threshold. R2=" + stats.R2);
        }
    }
}
```
  Folder Validation
    Memo Combined Results
      ### Combined Results

      Simulation results for the combined datasets from the various growing regions are shown in the following graphs. The model is able to adequately capture the influence of growing conditions (e.g. soil, climate) and management (e.g. population, irrigation, sowing date).
    Folder SE Queensland
      Experiment Lawes1990
        Memo
          Peter Carberry unpublished data. Possible the first sowing date was incorrectly passed on? Would work well if sown a month later. Creek bank soil. Varies in short distances.

          Note that Brinsmead paper says 1st sowing date was waterlogged, which would explain the delayed response on that experiment.
        Factors
          Factor Sowing: Specifications=[Sowing]
            Operations 1
              1990-05-20  [Chickpea].Sow(population:33.4, cultivar:"Amethyst", depth:50, rowSpacing:350);
              1990-07-29  [Irrigation].Apply(amount:100, depth:0,efficiency:1, willRunoff:false);
              1990-08-28  [Irrigation].Apply(amount:100, depth:0,efficiency:1, willRunoff:false);
              1990-09-27  [Irrigation].Apply(amount:100, depth:0,efficiency:1, willRunoff:false);
            Operations 2
              1990-08-06  [Chickpea].Sow(population:43, cultivar:"Amethyst", depth:50, rowSpacing:350);
              1990-09-17  [Irrigation].Apply(amount:100, depth:0,efficiency:1, willRunoff:false);
              1990-10-07  [Irrigation].Apply(amount:100, depth:0,efficiency:1, willRunoff:false);
              1990-10-27  [Irrigation].Apply(amount:100, depth:0,efficiency:1, willRunoff:false);
              1990-11-16  [Irrigation].Apply(amount:100, depth:0,efficiency:1, willRunoff:false);
              1990-11-26  [Irrigation].Apply(amount:100, depth:0,efficiency:1, willRunoff:false);
        Simulation Lawes1990
          Weather: FileName=cooper.met
          Clock: StartDate=1990-01-01; EndDate=1990-12-31
          Summary summaryfile
          SoilArbitrator Soil Arbitrator
          Zone Field: Area=1; Slope=0
            MicroClimate: a_interception=0; b_interception=1; c_interception=0; d_interception=0; soil_albedo=0.13; SoilHeatFluxFraction=0.4; NightInterceptionFraction=0.5; ReferenceHeight=1
            Irrigation
            Fertiliser
            SurfaceOrganicMatter: InitialResidueName=maize; InitialResidueType=maize; InitialResidueMass=500; InitialStandingFraction=0; InitialCPR=0; InitialCNR=65; FractionFaecesAdded=0.5
            Operations Sowing
            Operations NRate
              1985-11-08  [Fertiliser].Apply(50, Fertiliser.Types.NH4NO3N, 10);
              1985-11-29  [Fertiliser].Apply(30, Fertiliser.Types.NH4NO3N, 10);
            Report: EventNames=[Clock].DoReport
              VariableNames:
                [Clock].Today
                [Soil].SoilWater.SW
                [Soil].SoilWater.Eo
                [Soil].SoilWater.Es
                [Soil].SoilWater.Drainage
                [Soil].SoilWater.Runoff
                [Soil].SoilWater.pond
                sum([Soil].SoilWater.SWmm) as ProfileWater
                [Soil].NO3N
                [MicroClimate].net_radn
                [MicroClimate].peta
                [MicroClimate].petr
                [chickpea].
            Soil: Latitude=0; Longitude=0
              Water
                Thickness  BD    AirDry  LL15   DUL    SAT
                150        1.32  0.1     0.31   0.413  0.453
                150        1.32  0.1     0.31   0.413  0.453
                150        1.38  0.26    0.313  0.454  0.479
                300        1.33  0.32    0.376  0.495  0.498
                300        1.33  0.3     0.356  0.495  0.498
                300        1.42  0.27    0.3    0.418  0.464
                300        1.33  0.24    0.303  0.4    0.457
                300        1.35  0.31    0.31   0.37   0.435
                400        1.4   0.16    0.16   0.29   0.38
                SoilCrop ChickpeaSoil
                  LL=[0.3, 0.3, 0.3, 0.35, 0.35, 0.27, 0.303, 0.31, 0.16]
                  KL=[0.045, 0.045, 0.065, 0.065, 0.065, 0.065, 0.065, 0.065, 0.045]
                  XF=[1, 1, 1, 1, 1, 1, 1, 1, 1]
              SoilWater: SummerDate=1-Nov; SummerU=9; SummerCona=3; WinterDate=1-Apr; WinterU=9; WinterCona=3; DiffusConst=88; DiffusSlope=35.4; Salb=0.13; CN2Bare=50; CNRed=20; CNCov=0.8; max_pond=0; Thickness=[100, 100, 100, 200, 200, 200, 200, 200, 200]; SWCON=[0.5, 0.5, 0.5, 0.5, 0.5, 0.5, 0.5, 0.5, 0.5]; ResidueInterception=0
              SoilNitrogen: fom_types=[default, manure, mucuna, lablab, shemp, stable]; fract_carb=[0.2, 0.3, 0.54, 0.57, 0.45, 0]; fract_cell=[0.7, 0.3, 0.37, 0.37, 0.47, 0.1]; fract_lign=[0.1, 0.4, 0.09, 0.06, 0.08, 0.9]
              SoilOrganicMatter: RootCN=45; RootWt=1000; SoilCN=14.5; EnrACoeff=7.4; EnrBCoeff=0.2; OCUnits=Total
                Thickness  OC    FBiom  FInert
                100        1.2   0.02   0.42
                100        1     0.01   0.5
                100        0.86  0.01   0.58
                200        0.83  0.01   0.55
                200        0.58  0.01   0.86
                200        0.54  0.01   0.9
                200        0.47  0.01   0.95
                200        0.5   0.01   0.95
                200        0.5   0.01   0.95
              Analysis: Thickness=[100, 100, 100, 200, 200, 200, 200, 200, 200]; PH=[6, 6, 6, 6.2, 6.5, 6.7, 6.8, 6.8, 6.8]; PHUnits=Water; BoronUnits=0
              Sample InitialN: NO3Units=ppm; NH4Units=ppm; SWUnits=Volumetric; OCUnits=Total; PHUnits=Water
                Thickness  NO3   NH4
                150        14.4  0.6
                150        6.58  0.1
                300        2.45  0.1
                300        1.08  0.1
                300        0.15  0.1
                300        0.83  0.1
                300        2.3   0.1
              Sample InitialSW: Thickness=[150, 150, 300, 300, 300, 300, 300]; SW=[0.413, 0.456, 0.408, 0.374, 0.327, 0.325, 0.371]; NO3Units=ppm; NH4Units=ppm; SWUnits=Volumetric; OCUnits=Total; PHUnits=Water
              CERESSoilTemperature
            Report HarvestReport: EventNames=[Chickpea].Harvesting
              VariableNames:
                [Clock].Today
                [Chickpea].Phenology.CurrentStageName as Stage
                [Chickpea].Phenology.FloweringDAS.Value() as FloweringDAS
                [Chickpea].Phenology.MaturityDAS.Value() as MaturityDAS
                [Chickpea].Grain.Live.Wt as GrainWt
                [Chickpea].AboveGround.Wt
            Manager Harvesting
```csharp
using System;
using Models.Core;
using System.Collections.Generic;
using System.Text;
using Models.Soils;
using Models.PMF;
using Models;
using System.Xml.Serialization;
using APSIM.Shared.Utilities;

namespace Models
{
    [Serializable] 
    public class Script : Model
    {      
        [Link] Plant Chickpea;          
        [Link] Zone zone;            
                    
        
        [EventSubscribe("Commencing")]
        private void OnSimulationCommencing(object sender, EventArgs e)
        {
        }       
        
        [EventSubscribe("DoManagement")]
        private void OnDoManagement(object sender, EventArgs e)
        {
        if (Chickpea.Phenology.CurrentPhaseName=="ReadyForHarvesting")
           {
           Chickpea.Harvest();
           Chickpea.EndCrop();
           }
        }
        
        [EventSubscribe("DoManagementCalculations")]
        private void OnDoManagementCalculations(object sender, EventArgs e)
        {
            
        }
    }
}
```
            Plant Chickpea: CropType=Chickpea
            Manager AutoIrrigate
              FASW = 0
              WaterDeficit = 0
              AutoIrrigationOn = True
              StartStageName = Emergence
              EndStageName = EndGrainFill
              FASWThreshold = 0.9
              FASWDepth = 1000
```csharp
using System;
using Models.Core;
using System.Collections.Generic;
using System.Text;
using Models.Soils;
using Models.PMF;
using Models;
using System.Xml.Serialization;
using APSIM.Shared.Utilities;

namespace Models
{
    [Serializable] 
    public class Script : Model
    {
        public double FASW { get; set; }
        public double WaterDeficit  { get; set; }
    
        [Link] Plant Chickpea;
        [Link] Zone zone;
        [Link] Irrigation irrigation;
        [Link] Soil soil;
        
        [Description("Auto irrigation on?")]
        public bool AutoIrrigationOn { get; set; }
        
        [Description("Irrigation window start stage")]
        public string StartStageName { get; set; }
        [Description("Irrigation window end stage")]
        public string EndStageName { get; set; }

        [Description("Threshold fraction available water (0-1)")]
        public double FASWThreshold { get; set; }

        [Description("Soil depth (mm) to which fraction available water is calculated")]
        public double FASWDepth { get; set; }

        [EventSubscribe("DoManagement")]
        private void OnDoManagement(object sender, EventArgs e)
        {
            CalculateFASW();
            if (AutoIrrigationOn && Chickpea.Phenology.Between(StartStageName, EndStageName))
            {
                if (FASW < FASWThreshold)
                {
                    double amount = 10;
                    irrigation.Apply(WaterDeficit, depth: 0);
                }
            }
        }
        
        private void CalculateFASW()
        {
            double[] LL15 = MathUtilities.Multiply(soil.LL15, soil.Thickness);
            double[] DUL = MathUtilities.Multiply(soil.DUL, soil.Thickness);
        
            int nlayr = GetLayerIndex();
            double cumdep = MathUtilities.Sum(soil.Thickness, 0, nlayr, 0.0);

            double excess_fr = MathUtilities.Divide((cumdep - FASWDepth), soil.Thickness[nlayr], 0.0);

            // note that results may be strange if swdep < ll15
            double avail_sw = (MathUtilities.Sum(soil.Water, 0, nlayr, 0.0)
                              - excess_fr * soil.Water[nlayr])
                              - (MathUtilities.Sum(LL15, 0, nlayr, 0.0)
                              - excess_fr * LL15[nlayr]);


            double pot_avail_sw = (MathUtilities.Sum(DUL, 0, nlayr, 0.0)
                                  - excess_fr * DUL[nlayr])
                                  - (MathUtilities.Sum(LL15, 0, nlayr, 0.0)
                                  - excess_fr * LL15[nlayr]);

            FASW = MathUtilities.Divide(avail_sw, pot_avail_sw, 0.0);
            WaterDeficit = MathUtilities.Constrain(pot_avail_sw - avail_sw, 0.0, 100000);
        }

        private int GetLayerIndex()
        {
            double[] cumThickness = Soil.ToCumThickness(soil.Thickness);
            for (int i = 1; i < cumThickness.Length; i++)
            {
                if (FASWDepth < cumThickness[i])
                    return i - 1;
            }
            
            return cumThickness.Length - 1;
        }

    }
}
```
            SoluteManager
      Experiment Lawes1991
        Memo
           Creek bank. Highly variable soil.

          Peter Carberry upublished data. Also known as APS2??
        Factors Factors2
          Factor Sowing: Specifications=[Sowing]
            Operations 1
              1991-05-29  [Chickpea].Sow(population:28, cultivar:"Amethyst", depth:50, rowSpacing:500);
              1991-05-29  [Irrigation].Apply(amount:40, depth:0,efficiency:1, willRunoff:false);
              1991-06-20  [Irrigation].Apply(amount:40, depth:0,efficiency:1, willRunoff:false);
              1991-07-10  [Irrigation].Apply(amount:40, depth:0,efficiency:1, willRunoff:false);
              1991-07-30  [Irrigation].Apply(amount:40, depth:0,efficiency:1, willRunoff:false);
              1991-08-19  [Irrigation].Apply(amount:40, depth:0,efficiency:1, willRunoff:false);
              1991-09-08  [Irrigation].Apply(amount:40, depth:0,efficiency:1, willRunoff:false);
              1991-09-28  [Irrigation].Apply(amount:40, depth:0,efficiency:1, willRunoff:false);
              1991-10-18  [Irrigation].Apply(amount:40, depth:0,efficiency:1, willRunoff:false);
              1991-11-07  [Irrigation].Apply(amount:40, depth:0,efficiency:1, willRunoff:false);
            Operations 2
              1991-07-30  [Chickpea].Sow(population:28, cultivar:"Amethyst", depth:20, rowSpacing:500);
              1991-05-29  [Irrigation].Apply(amount:40, depth:0,efficiency:1, willRunoff:false);
              1991-06-20  [Irrigation].Apply(amount:40, depth:0,efficiency:1, willRunoff:false);
              1991-07-10  [Irrigation].Apply(amount:40, depth:0,efficiency:1, willRunoff:false);
              1991-07-30  [Irrigation].Apply(amount:40, depth:0,efficiency:1, willRunoff:false);
              1991-08-19  [Irrigation].Apply(amount:40, depth:0,efficiency:1, willRunoff:false);
              1991-09-08  [Irrigation].Apply(amount:40, depth:0,efficiency:1, willRunoff:false);
              1991-09-28  [Irrigation].Apply(amount:40, depth:0,efficiency:1, willRunoff:false);
              1991-10-18  [Irrigation].Apply(amount:40, depth:0,efficiency:1, willRunoff:false);
              1991-11-07  [Irrigation].Apply(amount:40, depth:0,efficiency:1, willRunoff:false);
              Memo
                Altering sowing depth from 50 to 30 - to hasten emergence and match Leaf App data
        Simulation Lawes1991
          Weather: FileName=cooper.met
          Clock: StartDate=1991-01-01; EndDate=1991-12-31
          Summary summaryfile
          SoilArbitrator Soil Arbitrator
          Zone Field: Area=1; Slope=0
            MicroClimate: a_interception=0; b_interception=1; c_interception=0; d_interception=0; soil_albedo=0.13; SoilHeatFluxFraction=0.4; NightInterceptionFraction=0.5; ReferenceHeight=2
            Irrigation
            Fertiliser
            SurfaceOrganicMatter: InitialResidueName=maize; InitialResidueType=maize; InitialResidueMass=500; InitialStandingFraction=0; InitialCPR=0; InitialCNR=65; FractionFaecesAdded=0.5
            Operations Sowing
            Operations NRate
              1985-11-08  [Fertiliser].Apply(50, Fertiliser.Types.NH4NO3N, 10);
              1985-11-29  [Fertiliser].Apply(30, Fertiliser.Types.NH4NO3N, 10);
            Report: EventNames=[Clock].DoReport
              VariableNames:
                [Clock].Today
                [Soil].SoilWater.SW
                [Soil].SoilWater.Eo
                [Soil].SoilWater.Es
                [Soil].SoilWater.Drainage
                [Soil].SoilWater.Runoff
                [Soil].SoilWater.pond
                sum([Soil].SoilWater.SWmm) as ProfileWater
                [Soil].NO3N
                [MicroClimate].net_radn
                [MicroClimate].peta
                [MicroClimate].petr
                [Chickpea].Leaf.LAI
                [Chickpea].Structure.LeafTipsAppeared
                [Chickpea].Structure.PlantTotalNodeNo
                [Chickpea].Leaf.SenescingCohortNo
                [Chickpea].Structure.TotalStemPopn
                [Chickpea].AboveGround.Wt
                [Chickpea].Leaf.Live.Wt
                [Chickpea].Stem.Live.Wt
            Soil: Latitude=0; Longitude=0
              Water
                Thickness  BD    AirDry  LL15  DUL    SAT
                150        1.38  0.05    0.18  0.384  0.434
                150        1.38  0.19    0.19  0.381  0.431
                300        1.32  0.2     0.2   0.44   0.49
                300        1.46  0.22    0.22  0.424  0.448
                300        1.51  0.19    0.19  0.419  0.43
                300        1.49  0.17    0.17  0.376  0.426
                300        1.47  0.17    0.17  0.377  0.427
                SoilCrop ChickpeaSoil: LL=[0.25, 0.25, 0.23, 0.25, 0.2, 0.2, 0.2]; KL=[0.045, 0.045, 0.045, 0.065, 0.065, 0.065, 0.065]; XF=[1, 1, 1, 1, 1, 0, 0]
              SoilWater: same as Validation.SE Queensland.Lawes1990.Lawes1990.Field.soil.SoilWater
              SoilNitrogen: fom_types=[default, manure, mucuna, lablab, shemp, stable]; fract_carb=[0.2, 0.3, 0.54, 0.57, 0.45, 0]; fract_cell=[0.7, 0.3, 0.37, 0.37, 0.47, 0.1]; fract_lign=[0.1, 0.4, 0.09, 0.06, 0.08, 0.9]
              SoilOrganicMatter: same as Validation.SE Queensland.Lawes1990.Lawes1990.Field.soil.SoilOrganicMatter
              Analysis: same as Validation.SE Queensland.Lawes1990.Lawes1990.Field.soil.Analysis
              Sample InitialN: NO3Units=ppm; NH4Units=ppm; SWUnits=Volumetric; OCUnits=Total; PHUnits=Water
                Thickness  NO3   NH4
                150        14.3  0
                150        5.9   0
                300        1.8   0
                300        0.9   0
                300        1     0
                300        0.2   0
                300        0.1   0
              Sample InitialSW: Thickness=[150, 150, 300, 300, 300, 300, 300]; SW=[0.384, 0.381, 0.44, 0.424, 0.419, 0.376, 0.377]; NO3Units=ppm; NH4Units=ppm; SWUnits=Volumetric; OCUnits=Total; PHUnits=Water
              CERESSoilTemperature
            Report HarvestReport: EventNames=[Chickpea].Harvesting
              VariableNames:
                [Clock].Today
                [Chickpea].Phenology.CurrentStageName as Stage
                [Chickpea].Phenology.FloweringDAS.Value() as FloweringDAS
                [Chickpea].Phenology.MaturityDAS.Value() as MaturityDAS
                [Chickpea].Grain.Live.Wt as GrainWt
            Manager Harvesting: same as Validation.SE Queensland.Lawes1990.Lawes1990.Field.Harvesting
            Plant Chickpea: CropType=Chickpea
            Manager AutoIrrigate: same as Validation.SE Queensland.Lawes1990.Lawes1990.Field.AutoIrrigate
            SoluteManager
      Experiment Lawes1993
        Memo
          R Brinsmead unpublished data. Suspect final biomass data may in fact have been Stover - would look good if added to grain yield.  Modifying kl by linear extrapolation from plant population for different treatments. Still uncertain about where on farm this trial was conducted i.e. what soil type? Source of starting soil water? Looks to just be set to DUL = unlikely. Not sure if I have changed clock date, need to check. Also MJR paper suggests it is irrigated but none included here at the moment, currently oversimulating biomass production.

          No known starting soil data, currently starting at DUL which is obviously false.

          NOTE - may simply need to drop all leaves to model correct harvest biomass - chickpea HI looks really high because leaves are on ground and not sampled. Unsure if this could be more likely in terminal drought stress.
        Factors
          Factor SD: Specifications=[SowingRule]
            Manager 1PP20RS17
              SowDate = 25-May
              CultivarName = Amethyst
              SowingDepth = 50
              RowSpacing = 170
              Population = 20
```csharp
using System;
using Models.Core;
using Models.PMF;
using Models.Soils;
using Models.Utilities;
using APSIM.Shared.Utilities;

namespace Models
{
    [Serializable]
    public class Script : Model
    {
        [Link] Clock Clock;
        [Link] Fertiliser Fertiliser;
        [Link] Summary Summary;
        [Link] Plant Chickpea;
        [Link] Soil Soil;
        Accumulator accumulatedRain;
        
        [Description("Sowing date (d-mmm)")]
        public string SowDate { get; set; }
        [Description("Cultivar to be sown")]
        public string CultivarName { get; set; }
        [Description("Sowing depth (mm)")]
        public double SowingDepth { get; set; }
        [Description("Row spacing (mm)")]
        public double RowSpacing { get; set; }
        [Description("Plant population (/m2)")]
        public double Population { get; set; }
        
        


        [EventSubscribe("DoManagement")]
        private void OnDoManagement(object sender, EventArgs e)
        {
        
            
            if (DateUtilities.WithinDates(SowDate, Clock.Today, SowDate))
            {
                Chickpea.Sow(population: Population, cultivar: CultivarName, depth: SowingDepth, rowSpacing: RowSpacing);  

                SoilCrop soilCrop = Soil.Crop("Chickpea") as SoilCrop;
                double[] kl = soilCrop.KL;
                double modifier = Population / 40.0;
                for (int i = 0; i < kl.Length; i++)
                	kl[i] = kl[i] * modifier;
                soilCrop.KL = kl;    
            }
        
        }
        
    }
}
```
            Manager 1PP20RS35
              SowDate = 25-May
              CultivarName = Amethyst
              SowingDepth = 50
              RowSpacing = 350
              Population = 20
              script: same as in Validation.SE Queensland.Lawes1993.Factors.SD.1PP20RS17
            Manager 1PP20RS70
              SowDate = 25-May
              CultivarName = Amethyst
              SowingDepth = 50
              RowSpacing = 700
              Population = 20
              script: same as in Validation.SE Queensland.Lawes1993.Factors.SD.1PP20RS17
            Manager 1PP45RS17
              SowDate = 25-May
              CultivarName = Amethyst
              SowingDepth = 50
              RowSpacing = 170
              Population = 45
              script: same as in Validation.SE Queensland.Lawes1993.Factors.SD.1PP20RS17
            Manager 1PP90RS35
              SowDate = 25-May
              CultivarName = Amethyst
              SowingDepth = 50
              RowSpacing = 350
              Population = 90
              script: same as in Validation.SE Queensland.Lawes1993.Factors.SD.1PP20RS17
            Manager 1PP90RS70
              SowDate = 25-May
              CultivarName = Amethyst
              SowingDepth = 50
              RowSpacing = 700
              Population = 90
              script: same as in Validation.SE Queensland.Lawes1993.Factors.SD.1PP20RS17
            Manager 2PP20RS17
              SowDate = 21-Jul
              CultivarName = Amethyst
              SowingDepth = 50
              RowSpacing = 170
              Population = 20
              script: same as in Validation.SE Queensland.Lawes1993.Factors.SD.1PP20RS17
            Manager 2PP20RS35
              SowDate = 21-Jul
              CultivarName = Amethyst
              SowingDepth = 50
              RowSpacing = 350
              Population = 20
              script: same as in Validation.SE Queensland.Lawes1993.Factors.SD.1PP20RS17
            Manager 2PP20RS70
              SowDate = 21-Jul
              CultivarName = Amethyst
              SowingDepth = 50
              RowSpacing = 700
              Population = 20
              script: same as in Validation.SE Queensland.Lawes1993.Factors.SD.1PP20RS17
        Simulation Lawes1993
          Weather: FileName=cooper.met
          Clock: StartDate=1993-05-24; EndDate=1993-12-31
          Summary summaryfile
          SoilArbitrator Soil Arbitrator
          Zone Field: Area=1; Slope=0
            MicroClimate: a_interception=0; b_interception=1; c_interception=0; d_interception=0; soil_albedo=0.13; SoilHeatFluxFraction=0.4; NightInterceptionFraction=0.5; ReferenceHeight=2
            Irrigation
            Fertiliser
            SurfaceOrganicMatter: InitialResidueName=maize; InitialResidueType=maize; InitialResidueMass=500; InitialStandingFraction=0; InitialCPR=0; InitialCNR=65; FractionFaecesAdded=0.5
            Operations Sowing
            Operations NRate
              1985-11-08  [Fertiliser].Apply(50, Fertiliser.Types.NH4NO3N, 10);
              1985-11-29  [Fertiliser].Apply(30, Fertiliser.Types.NH4NO3N, 10);
            Report: EventNames=[Clock].DoReport
              VariableNames:
                [Clock].Today
                [Soil].SoilWater.SW
                [Soil].SoilWater.Eo
                [Soil].SoilWater.Es
                [Soil].SoilWater.Drainage
                [Soil].SoilWater.Runoff
                [Soil].SoilWater.pond
                sum([Soil].SoilWater.SWmm) as ProfileWater
                [Soil].NO3N
                [MicroClimate].net_radn
                [MicroClimate].peta
                [MicroClimate].petr
                [Chickpea].Leaf.Fw
                [Chickpea].Leaf.Fn
            Soil: Latitude=0; Longitude=0
              Water
                Thickness  BD    AirDry  LL15  DUL    SAT
                150        1.38  0.05    0.18  0.384  0.434
                150        1.38  0.19    0.19  0.381  0.431
                300        1.32  0.2     0.2   0.44   0.49
                300        1.46  0.22    0.22  0.424  0.448
                300        1.51  0.19    0.19  0.419  0.43
                300        1.49  0.17    0.17  0.376  0.426
                300        1.47  0.17    0.17  0.377  0.427
                SoilCrop ChickpeaSoil: LL=[0.25, 0.25, 0.23, 0.25, 0.2, 0.2, 0.2]; KL=[0.06, 0.06, 0.06, 0.05, 0.04, 0.02, 0.02]; XF=[1, 1, 1, 1, 1, 0, 0]
              SoilWater: same as Validation.SE Queensland.Lawes1990.Lawes1990.Field.soil.SoilWater
              SoilNitrogen: fom_types=[default, manure, mucuna, lablab, shemp, stable]; fract_carb=[0.2, 0.3, 0.54, 0.57, 0.45, 0]; fract_cell=[0.7, 0.3, 0.37, 0.37, 0.47, 0.1]; fract_lign=[0.1, 0.4, 0.09, 0.06, 0.08, 0.9]
              SoilOrganicMatter: same as Validation.SE Queensland.Lawes1990.Lawes1990.Field.soil.SoilOrganicMatter
              Analysis: same as Validation.SE Queensland.Lawes1990.Lawes1990.Field.soil.Analysis
              Sample InitialN: NO3Units=ppm; NH4Units=ppm; SWUnits=Volumetric; OCUnits=Total; PHUnits=Water
                Thickness  NO3   NH4
                150        14.3  0
                150        5.9   0
                300        1.8   0
                300        0.9   0
                300        1     0
                300        0.2   0
                300        0.1   0
              Sample InitialSW: Thickness=[150, 150, 300, 300, 300, 300, 300]; SW=[0.384, 0.381, 0.44, 0.424, 0.419, 0.376, 0.377]; NO3Units=ppm; NH4Units=ppm; SWUnits=Volumetric; OCUnits=Total; PHUnits=Water
              CERESSoilTemperature
            Report HarvestReport: EventNames=[Chickpea].Harvesting
              VariableNames:
                [Clock].Today
                [Chickpea].Phenology.CurrentStageName as Stage
                [Chickpea].Phenology.FloweringDAS.Value() as FloweringDAS
                [Chickpea].Phenology.MaturityDAS.Value() as MaturityDAS
                [Chickpea].Grain.Live.Wt as GrainWt
            Manager Harvesting: same as Validation.SE Queensland.Lawes1990.Lawes1990.Field.Harvesting
            Plant Chickpea: CropType=Chickpea
            Manager SowingRule
              SowDate = 24-Jul
              CultivarName = Amethyst
              SowingDepth = 50
              RowSpacing = 750
              Population = 6
```csharp
using System;
using Models.Core;
using Models.PMF;
using Models.Soils;
using Models.Utilities;
using APSIM.Shared.Utilities;

namespace Models
{
    [Serializable]
    public class Script : Model
    {
        [Link] Clock Clock;
        [Link] Fertiliser Fertiliser;
        [Link] Summary Summary;
        [Link] Plant Chickpea;
        [Link] Soil Soil;
        Accumulator accumulatedRain;
        
        [Description("Sowing date (d-mmm)")]
        public string SowDate { get; set; }
        [Description("Cultivar to be sown")]
        public string CultivarName { get; set; }
        [Description("Sowing depth (mm)")]
        public double SowingDepth { get; set; }
        [Description("Row spacing (mm)")]
        public double RowSpacing { get; set; }
        [Description("Plant population (/m2)")]
        public double Population { get; set; }
        
        


        [EventSubscribe("DoManagement")]
        private void OnDoManagement(object sender, EventArgs e)
        {
        
            
            if (DateUtilities.WithinDates(SowDate, Clock.Today, SowDate))
            {
                Chickpea.Sow(population: Population, cultivar: CultivarName, depth: SowingDepth, rowSpacing: RowSpacing);    
            }
        
        }
        
    }
}
```
            SoluteManager
      Experiment Lawes1995
        Memo
          This version has modified kl values to see what would be necessary to reduce kls and achieve biomass from this experiment. Data from Yash dang suggests little deep water extraction from Chickpea - at odds with this expeirment, that may have had tree roots encroaching on its area.

          Also known as APS27. Was sown adjacent to the APS26 wheat experiment and should theoretically have received the same irrigation. Creek bank. May have a problem with NMM calibration. WUE of APS26 wheat was not right, but their problem was too much biomass for the amount of water. We have opposite problem of model getting away too fast.

          May also need to drop leaves at end in order to correct biomass.
        Factors
          Factor Trt: Specifications=[Sowing]
            Operations Wet
              1995-06-15  [Chickpea].Sow(population:37.3, cultivar:"Amethyst", depth:50, rowSpacing:350);
              1995-06-15  [Soil].SoilWater.SW = 0.329,0.347,0.379,0.318,0.358,0.332,0.292
              1995-07-05  [Irrigation].Apply(amount:26, depth:0,efficiency:0.8, willRunoff:false);
              1995-07-21  [Irrigation].Apply(amount:14, depth:0,efficiency:0.8, willRunoff:false);
              1995-08-01  [Irrigation].Apply(amount:28, depth:0,efficiency:0.8, willRunoff:false);
              1995-08-11  [Irrigation].Apply(amount:30, depth:0,efficiency:0.8, willRunoff:false);
              1995-08-25  [Irrigation].Apply(amount:15, depth:0,efficiency:0.8, willRunoff:false);
              1995-08-31  [Irrigation].Apply(amount:14, depth:0,efficiency:0.8, willRunoff:false);
              1995-09-04  [Irrigation].Apply(amount:15, depth:0,efficiency:0.8, willRunoff:false);
              1995-09-15  [Irrigation].Apply(amount:25, depth:0,efficiency:0.8, willRunoff:false);
              1995-09-22  [Irrigation].Apply(amount:20, depth:0,efficiency:0.8, willRunoff:false);
              1995-10-02  [Irrigation].Apply(amount:11, depth:0,efficiency:0.8, willRunoff:false);
            Operations Dry
              1995-06-14  [Chickpea].Sow(population:39.5, cultivar:"Amethyst", depth:50, rowSpacing:350);
              1995-06-05  [Irrigation].Apply(amount:175, depth:0,efficiency:1, willRunoff:false);
              1995-06-15  [Soil].SoilWater.SW = 0.341,0.346,0.309,0.324,0.304,0.296,0.280
        Simulation Lawes1995
          Weather: FileName=cooper.met
          Clock: StartDate=1995-06-14; EndDate=1995-12-31
          Summary summaryfile
          SoilArbitrator Soil Arbitrator
          Zone Field: Area=1; Slope=0
            MicroClimate: a_interception=0; b_interception=1; c_interception=0; d_interception=0; soil_albedo=0.13; SoilHeatFluxFraction=0.4; NightInterceptionFraction=0.5; ReferenceHeight=1
            Irrigation
            Fertiliser
            SurfaceOrganicMatter: InitialResidueName=maize; InitialResidueType=maize; InitialResidueMass=500; InitialStandingFraction=0; InitialCPR=0; InitialCNR=65; FractionFaecesAdded=0.5
            Operations Sowing
            Report: EventNames=[Clock].DoReport
              VariableNames:
                [Clock].Today
                [Soil].SoilWater.SW
                [Soil].SoilWater.Eo
                [Soil].SoilWater.Es
                [Soil].SoilWater.Drainage
                [Soil].SoilWater.Runoff
                [Soil].SoilWater.pond
                sum([Soil].SoilWater.SWmm) as ProfileWater
                [Soil].NO3N
                [MicroClimate].net_radn
                [MicroClimate].peta
                [MicroClimate].petr
            Soil: Latitude=0; Longitude=0
              Water
                Thickness  BD    AirDry  LL15  DUL    SAT
                150        1.38  0.05    0.18  0.36   0.455
                150        1.38  0.19    0.19  0.373  0.423
                300        1.35  0.2     0.2   0.389  0.439
                300        1.46  0.22    0.22  0.348  0.398
                300        1.42  0.19    0.19  0.365  0.415
                300        1.45  0.17    0.17  0.352  0.402
                300        1.47  0.17    0.17  0.327  0.377
                SoilCrop ChickpeaSoil: LL=[0.25, 0.25, 0.2, 0.23, 0.21, 0.21, 0.22]; KL=[0.045, 0.045, 0.045, 0.03, 0.02, 0.01, 0.01]; XF=[1, 1, 1, 1, 1, 1, 1]
              SoilWater: SummerDate=1-Nov; SummerU=5; SummerCona=3; WinterDate=1-Apr; WinterU=5; WinterCona=3; DiffusConst=40; DiffusSlope=16; Salb=0.13; CN2Bare=86; CNRed=20; CNCov=0.8; max_pond=0; Thickness=[100, 100, 100, 200, 200, 200, 200, 200, 200]; SWCON=[0.5, 0.5, 0.5, 0.5, 0.5, 0.5, 0.5, 0.5, 0.5]; ResidueInterception=0
              SoilNitrogen: fom_types=[default, manure, mucuna, lablab, shemp, stable]; fract_carb=[0.2, 0.3, 0.54, 0.57, 0.45, 0]; fract_cell=[0.7, 0.3, 0.37, 0.37, 0.47, 0.1]; fract_lign=[0.1, 0.4, 0.09, 0.06, 0.08, 0.9]
              SoilOrganicMatter: same as Validation.SE Queensland.Lawes1990.Lawes1990.Field.soil.SoilOrganicMatter
              Analysis: same as Validation.SE Queensland.Lawes1990.Lawes1990.Field.soil.Analysis
              Sample InitialN: NO3Units=ppm; NH4Units=ppm; SWUnits=Volumetric; OCUnits=Total; PHUnits=Water
                Thickness  NO3   NH4
                150        14.3  0
                150        5.9   0
                300        1.8   0
                300        0.9   0
                300        1     0
                300        0.2   0
                300        0.1   0
              Sample InitialSW: Thickness=[150, 150, 300, 300, 300, 300, 300]; SW=[0.384, 0.381, 0.44, 0.424, 0.419, 0.376, 0.377]; NO3Units=ppm; NH4Units=ppm; SWUnits=Volumetric; OCUnits=Total; PHUnits=Water
              CERESSoilTemperature
            Report HarvestReport: EventNames=[Chickpea].Harvesting
              VariableNames:
                [Clock].Today
                [Chickpea].Phenology.CurrentStageName as Stage
                [Chickpea].Phenology.FloweringDAS.Value() as FloweringDAS
                [Chickpea].Phenology.MaturityDAS.Value() as MaturityDAS
                [Chickpea].Grain.Live.Wt as GrainWt
            Manager Harvesting: same as Validation.SE Queensland.Lawes1990.Lawes1990.Field.Harvesting
            Plant Chickpea: CropType=Chickpea
            SoluteManager
      Experiment Hermitage1988 (disabled)
        Factors
          Factor Sowing: Specifications=[Sowing]
            Operations c3p1
              1988-05-26  [Chickpea].Sow(population:67.2, cultivar:"Amethyst", depth:50, rowSpacing:350);
              1988-10-03  [Irrigation].Apply(amount:50, depth:0,efficiency:1, willRunoff:false);
            Operations c3p2
              1988-06-22  [Chickpea].Sow(population:49.9, cultivar:"Amethyst", depth:50, rowSpacing:350);
              1988-10-03  [Irrigation].Apply(amount:50, depth:0,efficiency:1, willRunoff:false);
              1988-10-03  [Irrigation].Apply(amount:50, depth:0,efficiency:1, willRunoff:false);
              1988-10-23  [Irrigation].Apply(amount:50, depth:0,efficiency:1, willRunoff:false);
            Operations c3p3
              1988-07-27  [Chickpea].Sow(population:49.9, cultivar:"Amethyst", depth:50, rowSpacing:350);
              1988-10-15  [Irrigation].Apply(amount:50, depth:0,efficiency:1, willRunoff:false);
              1988-10-23  [Irrigation].Apply(amount:50, depth:0,efficiency:1, willRunoff:false);
            Operations c3p4
              1988-09-04  [Chickpea].Sow(population:48.5, cultivar:"Amethyst", depth:50, rowSpacing:350);
              1988-10-23  [Irrigation].Apply(amount:50, depth:0,efficiency:1, willRunoff:false);
              1988-11-16  [Irrigation].Apply(amount:50, depth:0,efficiency:1, willRunoff:false);
              1988-11-30  [Irrigation].Apply(amount:50, depth:0,efficiency:1, willRunoff:false);
            Operations c3p5
              1988-10-19  [Chickpea].Sow(population:46.6, cultivar:"Amethyst", depth:50, rowSpacing:350);
              1988-10-23  [Irrigation].Apply(amount:50, depth:0,efficiency:1, willRunoff:false);
            Operations c3p6
              1988-12-14  [Chickpea].Sow(population:38.5, cultivar:"Amethyst", depth:50, rowSpacing:350);
              1989-02-22  [Irrigation].Apply(amount:50, depth:0,efficiency:1, willRunoff:false);
        Simulation Hermitage1988
          Weather: FileName=Herm8889.met
          Clock: StartDate=1988-01-01; EndDate=1988-12-31
          Summary summaryfile
          SoilArbitrator Soil Arbitrator
          Zone Field: Area=1; Slope=0
            MicroClimate: a_interception=0; b_interception=1; c_interception=0; d_interception=0; soil_albedo=0.23; SoilHeatFluxFraction=0.4; NightInterceptionFraction=0.5; ReferenceHeight=2
            Irrigation
            Fertiliser
            SurfaceOrganicMatter: InitialResidueName=maize; InitialResidueType=maize; InitialResidueMass=500; InitialStandingFraction=0; InitialCPR=0; InitialCNR=65; FractionFaecesAdded=0.5
            Operations Sowing
            Operations NRate
              1985-11-08  [Fertiliser].Apply(50, Fertiliser.Types.NH4NO3N, 10);
              1985-11-29  [Fertiliser].Apply(30, Fertiliser.Types.NH4NO3N, 10);
            Report: EventNames=[Clock].DoReport
              VariableNames:
                [Clock].Today
                [Soil].SoilWater.SW
                [Soil].SoilWater.Eo
                [Soil].SoilWater.Es
                [Soil].SoilWater.Drainage
                [Soil].SoilWater.Runoff
                [Soil].SoilWater.pond
                sum([Soil].SoilWater.SWmm) as ProfileWater
                [Soil].NO3N
                [MicroClimate].net_radn
                [MicroClimate].peta
                [MicroClimate].petr
            Soil: Latitude=0; Longitude=0
              Water
                Thickness  BD    AirDry  LL15  DUL   SAT
                150        1.03  0.1     0.2   0.38  0.45
                150        1.06  0.2     0.2   0.38  0.45
                300        1.06  0.2     0.2   0.38  0.45
                300        1.08  0.21    0.21  0.38  0.43
                300        1.11  0.23    0.23  0.38  0.43
                300        1.14  0.25    0.25  0.38  0.43
                300        1.14  0.28    0.28  0.35  0.4
                SoilCrop ChickpeaSoil: LL=[0.2, 0.2, 0.2, 0.22, 0.25, 0.26, 0.28]; KL=[0.06, 0.06, 0.06, 0.05, 0.04, 0.02, 0.02]; XF=[1, 1, 1, 1, 1, 0, 0]
              SoilWater: SummerDate=1-Nov; SummerU=9; SummerCona=3; WinterDate=1-Apr; WinterU=9; WinterCona=3; DiffusConst=88; DiffusSlope=35.4; Salb=0.13; CN2Bare=50; CNRed=20; CNCov=0.8; max_pond=0; Thickness=[100, 100, 100, 200, 200, 200, 200, 200, 200]; SWCON=[0.5, 0.5, 0.5, 0.5, 0.5, 0.5, 0.5, 0.5, 0.5]; ResidueInterception=0
              SoilNitrogen: fom_types=[default, manure, mucuna, lablab, shemp, stable]; fract_carb=[0.2, 0.3, 0.54, 0.57, 0.45, 0]; fract_cell=[0.7, 0.3, 0.37, 0.37, 0.47, 0.1]; fract_lign=[0.1, 0.4, 0.09, 0.06, 0.08, 0.9]
              SoilOrganicMatter: RootCN=45; RootWt=1000; SoilCN=14.5; EnrACoeff=7.4; EnrBCoeff=0.2; OCUnits=Total
                Thickness  OC    FBiom  FInert
                100        1.2   0.02   0.42
                100        1     0.01   0.5
                100        0.86  0.01   0.58
                200        0.83  0.01   0.55
                200        0.58  0.01   0.86
                200        0.54  0.01   0.9
                200        0.47  0.01   0.95
                200        0.5   0.01   0.95
                200        0.5   0.01   0.95
              Analysis: Thickness=[100, 100, 100, 200, 200, 200, 200, 200, 200]; PH=[6, 6, 6, 6.2, 6.5, 6.7, 6.8, 6.8, 6.8]; PHUnits=Water; BoronUnits=0
              Sample InitialN: NO3Units=ppm; NH4Units=ppm; SWUnits=Volumetric; OCUnits=Total; PHUnits=Water
                Thickness  NO3   NH4
                150        14.4  4.8
                150        6.58  4.2
                300        2.45  3.9
                300        1.08  3.9
                300        0.15  3.8
                300        0.83  4.1
                300        0.83  4.1
              Sample InitialSW: Thickness=[150, 150, 300, 300, 300, 300, 300]; SW=[0.3, 0.3, 0.3, 0.31, 0.54, 0.37, 0.37]; NO3Units=ppm; NH4Units=ppm; SWUnits=Volumetric; OCUnits=Total; PHUnits=Water
              CERESSoilTemperature
            Report HarvestReport: EventNames=[Chickpea].Harvesting
              VariableNames:
                [Clock].Today
                [Chickpea].Phenology.CurrentStageName as Stage
                [Chickpea].Phenology.FloweringDAS.Value() as FloweringDAS
                [Chickpea].Phenology.MaturityDAS.Value() as MaturityDAS
                [Chickpea].Grain.Live.Wt as GrainWt
            Manager Harvesting
              script: same as in Validation.SE Queensland.Lawes1990.Lawes1990.Field.Harvesting
            Plant Chickpea: CropType=Chickpea
            Manager AutoIrrigate
              FASW = 0
              WaterDeficit = 0
              AutoIrrigationOn = True
              StartStageName = Emergence
              EndStageName = EndGrainFill
              FASWThreshold = 0.9
              FASWDepth = 1000
              script: same as in Validation.SE Queensland.Lawes1990.Lawes1990.Field.AutoIrrigate
            SoluteManager
      Experiment Hermitage1989 (disabled)
        Factors
          Factor Sowing: Specifications=[Sowing]
            Operations c3p1
              1989-02-12  [Chickpea].Sow(population:33.4, cultivar:"Amethyst", depth:50, rowSpacing:350);
            Operations c3p2
              1989-04-23  [Chickpea].Sow(population:33.4, cultivar:"Amethyst", depth:50, rowSpacing:350);
            Operations c3p3
              1989-05-14  [Chickpea].Sow(population:33.4, cultivar:"Amethyst", depth:50, rowSpacing:350);
            Operations c3p4
              1989-06-18  [Chickpea].Sow(population:33.4, cultivar:"Amethyst", depth:50, rowSpacing:350);
            Operations c3p5
              1989-07-13  [Chickpea].Sow(population:33.4, cultivar:"Amethyst", depth:50, rowSpacing:350);
            Operations c3p6
              1989-08-27  [Chickpea].Sow(population:33.4, cultivar:"Amethyst", depth:50, rowSpacing:350);
            Operations c3p7
              1989-10-15  [Chickpea].Sow(population:33.4, cultivar:"Amethyst", depth:50, rowSpacing:350);
            Operations c3p8
              1989-11-12  [Chickpea].Sow(population:33.4, cultivar:"Amethyst", depth:50, rowSpacing:350);
        Simulation Hermitage1989
          Weather: FileName=Herm8889.met
          Clock: StartDate=1989-01-01; EndDate=1989-12-31
          Summary summaryfile
          SoilArbitrator Soil Arbitrator
          Zone Field: Area=1; Slope=0
            MicroClimate: a_interception=0; b_interception=1; c_interception=0; d_interception=0; soil_albedo=0.23; SoilHeatFluxFraction=0.4; NightInterceptionFraction=0.5; ReferenceHeight=2
            Irrigation
            Fertiliser
            SurfaceOrganicMatter: InitialResidueName=maize; InitialResidueType=maize; InitialResidueMass=500; InitialStandingFraction=0; InitialCPR=0; InitialCNR=65; FractionFaecesAdded=0.5
            Operations Sowing
            Operations NRate
              1985-11-08  [Fertiliser].Apply(50, Fertiliser.Types.NH4NO3N, 10);
              1985-11-29  [Fertiliser].Apply(30, Fertiliser.Types.NH4NO3N, 10);
            Report: EventNames=[Clock].DoReport
              VariableNames:
                [Clock].Today
                [Soil].SoilWater.SW
                [Soil].SoilWater.Eo
                [Soil].SoilWater.Es
                [Soil].SoilWater.Drainage
                [Soil].SoilWater.Runoff
                [Soil].SoilWater.pond
                sum([Soil].SoilWater.SWmm) as ProfileWater
                [Soil].NO3N
                [MicroClimate].net_radn
                [MicroClimate].peta
                [MicroClimate].petr
            Soil: Latitude=0; Longitude=0
              Water: same as Validation.SE Queensland.Hermitage1988.Hermitage1988.Field.soil.Water
              SoilWater: same as Validation.SE Queensland.Hermitage1988.Hermitage1988.Field.soil.SoilWater
              SoilNitrogen: fom_types=[default, manure, mucuna, lablab, shemp, stable]; fract_carb=[0.2, 0.3, 0.54, 0.57, 0.45, 0]; fract_cell=[0.7, 0.3, 0.37, 0.37, 0.47, 0.1]; fract_lign=[0.1, 0.4, 0.09, 0.06, 0.08, 0.9]
              SoilOrganicMatter: same as Validation.SE Queensland.Hermitage1988.Hermitage1988.Field.soil.SoilOrganicMatter
              Analysis: same as Validation.SE Queensland.Hermitage1988.Hermitage1988.Field.soil.Analysis
              Sample InitialN: NO3Units=ppm; NH4Units=ppm; SWUnits=Volumetric; OCUnits=Total; PHUnits=Water
                Thickness  NO3   NH4
                150        14.4  4.8
                150        6.58  4.2
                300        2.45  3.9
                300        1.08  3.9
                300        0.15  3.8
                300        0.83  4.1
                300        0.83  4.1
              Sample InitialSW: Thickness=[150, 150, 300, 300, 300, 300, 300]; SW=[0.413, 0.456, 0.408, 0.374, 0.34, 0.37, 0.37]; NO3Units=ppm; NH4Units=ppm; SWUnits=Volumetric; OCUnits=Total; PHUnits=Water
              CERESSoilTemperature
            Report HarvestReport: EventNames=[Chickpea].Harvesting
              VariableNames:
                [Clock].Today
                [Chickpea].Phenology.CurrentStageName as Stage
                [Chickpea].Phenology.FloweringDAS.Value() as FloweringDAS
                [Chickpea].Phenology.MaturityDAS.Value() as MaturityDAS
                [Chickpea].Grain.Live.Wt as GrainWt
            Manager Harvesting: same as Validation.SE Queensland.Hermitage1988.Hermitage1988.Field.Harvesting
            Plant Chickpea: CropType=Chickpea
            Manager AutoIrrigate: same as Validation.SE Queensland.Hermitage1988.Hermitage1988.Field.AutoIrrigate
            SoluteManager
      Experiment Hermitage1990 (disabled)
        Factors
          Factor Sowing: Specifications=[Sowing]
            Operations c3p1
              1990-06-14  [Chickpea].Sow(population:45.4, cultivar:"Amethyst", depth:50, rowSpacing:350);
              1990-09-28  [Irrigation].Apply(amount:40, depth:0,efficiency:1, willRunoff:false);
            Operations c3p2
              1990-08-19  [Chickpea].Sow(population:36.7, cultivar:"Amethyst", depth:50, rowSpacing:350);
              1990-09-28  [Irrigation].Apply(amount:40, depth:0,efficiency:1, willRunoff:false);
        Simulation Hermitage1990
          Weather: FileName=Herm90.met
          Clock: StartDate=1990-04-11; EndDate=1990-12-31
          Summary summaryfile
          SoilArbitrator Soil Arbitrator
          Zone Field: same as Validation.SE Queensland.Hermitage1989.Hermitage1989.Field
      Experiment Hermitage_92 (disabled)
        Factors
          Factor Population: Specifications=[SowingRule].Script.Population=10, 20, 40, 70, 78, 110, 115
          Factor RowSpacing: Specifications=[SowingRule].Script.RowSpacing=170, 350, 700
        Simulation Hermitage_92
          Memo
            These simulations are based on data from two years of field trials done in Lincoln, Canterbury, New Zealand from 1998 to 2000. These trials used three cultivars of Kabuli chickpeas. However the results presented here are the average of cultivars for measurements that had no differences among cultivars tested. The experimental design was a split split plot with irrigation as main plot, sowing dates as sub plots and cultivars as sub sub plots.
            The first season, from 1998 until 1999, had two sowing dates (3rd if November and 7th of December) and eight irrigation treatments. Treatments were nil irrigation, full irrigation from emergence to physiological maturity, full from emergence to flowering, half irrigation from emergence to flowering, full from flowering to podding, half from flowering to podding, full from podding to physiological maturity and half from podding to physiological maturity. In these treatments irrigation was applied weekly and the fully irrigated treatment applied the same amount of water lost through evapotranspiration in the previous week. The half irrigation treatment replaced half of the amount lost in the previous week.
            Results from this season include biomass, grain yield, pods per plant, LAI, soil volumetric water content and flowering, podding and physsiological maturity dates.
            The second season, from 1999 to 2000, had two sowing dates (18th of October and 22nd of November) and four irrigation treatments. These were nil irrigation, full from emergence to physiological maturity, full from flowering to podding and full from podding to physiological maturity. The results from this season do not include LAI measurements.
            More information about the data is available in Anwar, M.R. 2001. Water use of Kabuli chickpea (Cicer arietinum L.) cultivars in Canterbury. (PhD thesis, Lincoln University).
          Weather: FileName=Herm92.met
          Clock: StartDate=1992-07-18; EndDate=1992-12-25
          Summary summaryfile
          SoilArbitrator Soil Arbitrator
          Zone Field: Area=1; Slope=0
            MicroClimate: a_interception=0; b_interception=1; c_interception=0; d_interception=0; soil_albedo=0.23; SoilHeatFluxFraction=0.4; NightInterceptionFraction=0.5; ReferenceHeight=2
            Irrigation
            Fertiliser
            SurfaceOrganicMatter: InitialResidueName=maize; InitialResidueType=maize; InitialResidueMass=500; InitialStandingFraction=0; InitialCPR=0; InitialCNR=65; FractionFaecesAdded=0.5
            Operations Sowing
              1992-07-24  [Chickpea].Sow(population:110, cultivar:"Amethyst", depth:50, rowSpacing:170);
            Operations IrrigationSchedule
            Report: EventNames=[Clock].DoReport
              VariableNames:
                [Clock].Today
                [Soil].SoilWater.SW
                [Soil].SoilWater.Eo
                [Soil].SoilWater.Es
                [Soil].SoilWater.Drainage
                [Soil].SoilWater.Runoff
                [Soil].SoilWater.pond
                sum([Soil].SoilWater.SWmm) as ProfileWater
                [Soil].NO3N
                [MicroClimate].net_radn
                [MicroClimate].peta
                [MicroClimate].petr
                [Chickpea].AboveGround.Wt
                [Chickpea].Leaf.LAI
            Report HarvestReport: EventNames=[Chickpea].Harvesting
              VariableNames:
                [Clock].Today
                [Chickpea].Phenology.CurrentStageName as Stage
                [Chickpea].Phenology.FloweringDAS.Value() as FloweringDAS
                [Chickpea].Phenology.MaturityDAS.Value() as MaturityDAS
                [Chickpea].Grain.Live.Wt as GrainWt
            Manager Harvesting
              script: same as in Validation.SE Queensland.Lawes1990.Lawes1990.Field.Harvesting
            Plant Chickpea: CropType=Chickpea
            Soil: Latitude=0; Longitude=0
              InitialWater Initial water: PercentMethod=1; FractionFull=0.8
              Water: same as Validation.SE Queensland.Hermitage1988.Hermitage1988.Field.soil.Water
              SoilWater: SummerDate=1-Nov; SummerU=6; SummerCona=2; WinterDate=1-Apr; WinterU=6; WinterCona=2; DiffusConst=40; DiffusSlope=16; Salb=0.13; CN2Bare=82; CNRed=20; CNCov=0.8; max_pond=0; Thickness=[150, 150, 300, 300, 300, 300, 300]; SWCON=[0.4, 0.4, 0.4, 0.4, 0.4, 0.4, 0.4]; ResidueInterception=0
              SoilNitrogen: fom_types=[default, manure, mucuna, lablab, shemp, stable]; fract_carb=[0.2, 0.3, 0.54, 0.57, 0.45, 0]; fract_cell=[0.7, 0.3, 0.37, 0.37, 0.47, 0.1]; fract_lign=[0.1, 0.4, 0.09, 0.06, 0.08, 0.9]
              SoilOrganicMatter: RootCN=80; RootWt=500; SoilCN=14.5; EnrACoeff=7.4; EnrBCoeff=0.2; OCUnits=Total
                Thickness  OC    FBiom  FInert
                150        2.2   0.02   0.36
                150        1.6   0.015  0.5
                300        1.35  0.01   0.59
                300        0.95  0.01   0.84
                300        1     0.01   0.8
                300        0.8   0.01   0.99
                300        0.8   0.01   0.99
              Analysis: Thickness=[150, 150, 300, 300, 300, 300, 300]; PH=[8.25, 8.5, 8.75, 9, 9, 9, 9]; PHUnits=Water; BoronUnits=0
              Sample Initial nitrogen: NO3Units=ppm; NH4Units=ppm; SWUnits=Volumetric; OCUnits=Total; PHUnits=Water
                Thickness  NO3   NH4
                150        14.4  4.8
                150        6.58  4.2
                300        2.45  3.9
                300        1.08  3.9
                300        0.15  3.8
                300        0.83  4.1
                300        0.83  4.1
              CERESSoilTemperature
            Manager SowingRule
              SowDate = 24-Jul
              CultivarName = Amethyst
              SowingDepth = 50
              RowSpacing = 750
              Population = 6
              script: same as in Validation.SE Queensland.Lawes1993.Lawes1993.Field.SowingRule
            SoluteManager
      Experiment Bremar_2003_
        Factors
          Factor S: Specifications=[SowingRule]
            Manager 1R350
              SowDate = 15-May
              CultivarName = Amethyst
              SowingDepth = 50
              RowSpacing = 350
              Population = 44
              script: same as in Validation.SE Queensland.Lawes1993.Factors.SD.1PP20RS17
            Manager 1R700
              SowDate = 15-May
              CultivarName = Amethyst
              SowingDepth = 50
              RowSpacing = 700
              Population = 18
              script: same as in Validation.SE Queensland.Lawes1993.Factors.SD.1PP20RS17
            Manager 2R350
              SowDate = 1-Jun
              CultivarName = Amethyst
              SowingDepth = 50
              RowSpacing = 350
              Population = 37
              script: same as in Validation.SE Queensland.Lawes1993.Factors.SD.1PP20RS17
            Manager 2R700
              SowDate = 1-Jun
              CultivarName = Amethyst
              SowingDepth = 50
              RowSpacing = 700
              Population = 18
              script: same as in Validation.SE Queensland.Lawes1993.Factors.SD.1PP20RS17
        Simulation Bremar2003
          Memo
            These simulations are based on data from two years of field trials done in Lincoln, Canterbury, New Zealand from 1998 to 2000. These trials used three cultivars of Kabuli chickpeas. However the results presented here are the average of cultivars for measurements that had no differences among cultivars tested. The experimental design was a split split plot with irrigation as main plot, sowing dates as sub plots and cultivars as sub sub plots.
            The first season, from 1998 until 1999, had two sowing dates (3rd if November and 7th of December) and eight irrigation treatments. Treatments were nil irrigation, full irrigation from emergence to physiological maturity, full from emergence to flowering, half irrigation from emergence to flowering, full from flowering to podding, half from flowering to podding, full from podding to physiological maturity and half from podding to physiological maturity. In these treatments irrigation was applied weekly and the fully irrigated treatment applied the same amount of water lost through evapotranspiration in the previous week. The half irrigation treatment replaced half of the amount lost in the previous week.
            Results from this season include biomass, grain yield, pods per plant, LAI, soil volumetric water content and flowering, podding and physsiological maturity dates.
            The second season, from 1999 to 2000, had two sowing dates (18th of October and 22nd of November) and four irrigation treatments. These were nil irrigation, full from emergence to physiological maturity, full from flowering to podding and full from podding to physiological maturity. The results from this season do not include LAI measurements.
            More information about the data is available in Anwar, M.R. 2001. Water use of Kabuli chickpea (Cicer arietinum L.) cultivars in Canterbury. (PhD thesis, Lincoln University).
          Weather: FileName=bremar2.met
          Clock: StartDate=2003-05-14; EndDate=2003-12-30
          Summary summaryfile
          SoilArbitrator Soil Arbitrator
          Zone Field: Area=1; Slope=0
            MicroClimate: a_interception=0; b_interception=1; c_interception=0; d_interception=0; soil_albedo=0.13; SoilHeatFluxFraction=0.4; NightInterceptionFraction=0.5; ReferenceHeight=2
            Irrigation
            Fertiliser
            SurfaceOrganicMatter: InitialResidueName=wheat; InitialResidueType=wheat; InitialResidueMass=1500; InitialStandingFraction=0; InitialCPR=0; InitialCNR=76; FractionFaecesAdded=0.5
            Operations IrrigationSchedule
            Report: EventNames=[Clock].DoReport
              VariableNames:
                [Clock].Today
                [Soil].SoilWater.SW
                [Soil].SoilWater.Eo
                [Soil].SoilWater.Es
                [Soil].SoilWater.Drainage
                [Soil].SoilWater.Runoff
                [Soil].SoilWater.pond
                sum([Soil].SoilWater.SWmm) as ProfileWater
                [Soil].NO3N
                [MicroClimate].net_radn
                [MicroClimate].peta
                [MicroClimate].petr
                [Chickpea].AboveGround.Wt
                [Chickpea].Leaf.LAI
            Report HarvestReport: EventNames=[Chickpea].Harvesting
              VariableNames:
                [Clock].Today
                [Chickpea].Phenology.CurrentStageName as Stage
                [Chickpea].Phenology.FloweringDAS.Value() as FloweringDAS
                [Chickpea].Phenology.MaturityDAS.Value() as MaturityDAS
                [Chickpea].Grain.Live.Wt as GrainWt
            Manager Harvesting
              script: same as in Validation.SE Queensland.Lawes1990.Lawes1990.Field.Harvesting
            Plant Chickpea: CropType=Chickpea
            Manager SowingRule: same as Validation.SE Queensland.Lawes1993.Lawes1993.Field.SowingRule
            SoluteManager
            Soil Red Chromosol Enarra No216: ASCOrder=Chromosol; ASCSubOrder=Red; SoilType=?; Site=Enarra; NearestTown=Meandarra; Region=Darling Downs and Granite Belt; State=Queensland; Country=Australia; NaturalVegetation=Brigalow scrub; ApsoilNumber=216; Latitude=-27.725; Longitude=149.822; LocationAccuracy=+/- 20m
              DataSource=Undertaken by Jeremy Whish, CSIRO Sustainable Ecosystems, Toowoomba in collaboration with MCA, Goondiwindi as part of GRDC Best Management Practice-Pulses project
              Comments=From a pond and tent done during GRDC Best Management Practice-Pulses project ; BD estimated, oc from soil (Billa Billa No. 036)
              Water
                Thickness  BD     AirDry  LL15  DUL    SAT
                150        1.29   0.1     0.2   0.43   0.483
                150        1.29   0.176   0.22  0.43   0.483
                300        1.327  0.25    0.25  0.419  0.469
                300        1.32   0.25    0.25  0.42   0.472
                300        1.32   0.25    0.25  0.42   0.472
                300        1.4    0.25    0.25  0.39   0.442
                300        1.459  0.25    0.25  0.37   0.42
                SoilCrop ChickpeaSoil: LL=[0.2, 0.22, 0.25, 0.27, 0.36, 0.38, 0.37]; KL=[0.045, 0.045, 0.045, 0.03, 0.025, 0.02, 0.01]; XF=[1, 1, 1, 1, 1, 1, 1]
              SoilWater: SummerDate=1-Nov; SummerU=6; SummerCona=3.5; WinterDate=1-Apr; WinterU=4; WinterCona=2.5; DiffusConst=40; DiffusSlope=16; Salb=0.13; CN2Bare=73; CNRed=20; CNCov=0.8; max_pond=0; Thickness=[150, 150, 300, 300, 300, 300, 300]; SWCON=[0.3, 0.3, 0.3, 0.3, 0.3, 0.3, 0.3]; ResidueInterception=0
              SoilOrganicMatter: RootCN=40; RootWt=1000; SoilCN=12; EnrACoeff=7.4; EnrBCoeff=0.2; OCUnits=Total
                Thickness  OC        FBiom  FInert
                150        0.953846  0.04   0.4
                150        0.953846  0.02   0.5
                300        0.961538  0.02   0.5
                300        0.846154  0.02   0.6
                300        0.546154  0.01   0.6
                300        0.261538  0.01   0.7
                300        0.261538  0.01   0.8
              Analysis: Thickness=[150, 150, 300, 300, 300, 300, 300]; PH=[8.6, 8.8, 8.8, 7.6, 5.1, 4.8, 4.8]; PHUnits=Water; BoronUnits=0
              Sample Initial nitrogen: NO3Units=ppm; NH4Units=ppm; SWUnits=Volumetric; OCUnits=Total; PHUnits=Water
                Thickness  NO3    NH4
                150        9.69   0.3
                150        7.88   0.05
                300        9.29   0.05
                300        17.59  0.05
                300        17.49  0.05
                300        13.16  0.05
                300        10.02  0.05
              Sample Initial water: Thickness=[150, 150, 300, 300, 300, 300, 300]; SW=[0.33, 0.36, 0.36, 0.33, 0.3, 0.28, 0.26]; NO3Units=ppm; NH4Units=ppm; SWUnits=Volumetric; OCUnits=Total; PHUnits=Water
              SoilNitrogen: fom_types=[default, manure, mucuna, lablab, shemp, stable]; fract_carb=[0.2, 0.3, 0.54, 0.57, 0.45, 0]; fract_cell=[0.7, 0.3, 0.37, 0.37, 0.47, 0.1]; fract_lign=[0.1, 0.4, 0.09, 0.06, 0.08, 0.9]
              CERESSoilTemperature
      Experiment Lawes1995original
        Memo
          Also known as APS27. Was sown adjacent to the APS26 wheat experiment and should theoretically have received the same irrigation. Creek bank. May have a problem with NMM calibration. WUE of APS26 wheat was not right, but their problem was too much biomass for the amount of water. We have opposite problem of model getting away too fast.

          May also need to drop leaves at end in order to correct biomass.
        Factors: same as Validation.SE Queensland.Lawes1995.Factors
        Simulation Lawes1995original
          Weather: FileName=cooper.met
          Clock: StartDate=1995-06-14; EndDate=1995-12-31
          Summary summaryfile
          SoilArbitrator Soil Arbitrator
          Zone Field: Area=1; Slope=0
            MicroClimate: a_interception=0; b_interception=1; c_interception=0; d_interception=0; soil_albedo=0.13; SoilHeatFluxFraction=0.4; NightInterceptionFraction=0.5; ReferenceHeight=1
            Irrigation
            Fertiliser
            SurfaceOrganicMatter: InitialResidueName=maize; InitialResidueType=maize; InitialResidueMass=500; InitialStandingFraction=0; InitialCPR=0; InitialCNR=65; FractionFaecesAdded=0.5
            Operations Sowing
            Report: EventNames=[Clock].DoReport
              VariableNames:
                [Clock].Today
                [Soil].SoilWater.SW
                [Soil].SoilWater.Eo
                [Soil].SoilWater.Es
                [Soil].SoilWater.Drainage
                [Soil].SoilWater.Runoff
                [Soil].SoilWater.pond
                sum([Soil].SoilWater.SWmm) as ProfileWater
                [Soil].NO3N
                [MicroClimate].net_radn
                [MicroClimate].peta
                [MicroClimate].petr
            Soil: Latitude=0; Longitude=0
              Water
                Thickness  BD    AirDry  LL15  DUL    SAT
                150        1.38  0.05    0.18  0.36   0.455
                150        1.38  0.19    0.19  0.373  0.423
                300        1.35  0.2     0.2   0.389  0.439
                300        1.46  0.22    0.22  0.348  0.398
                300        1.42  0.19    0.19  0.365  0.415
                300        1.45  0.17    0.17  0.352  0.402
                300        1.47  0.17    0.17  0.327  0.377
                SoilCrop ChickpeaSoil: LL=[0.25, 0.25, 0.2, 0.23, 0.21, 0.21, 0.22]; KL=[0.045, 0.045, 0.05, 0.065, 0.095, 0.065, 0.065]; XF=[1, 1, 1, 1, 1, 1, 1]
              SoilWater: same as Validation.SE Queensland.Lawes1995.Lawes1995.Field.soil.SoilWater
              SoilNitrogen: fom_types=[default, manure, mucuna, lablab, shemp, stable]; fract_carb=[0.2, 0.3, 0.54, 0.57, 0.45, 0]; fract_cell=[0.7, 0.3, 0.37, 0.37, 0.47, 0.1]; fract_lign=[0.1, 0.4, 0.09, 0.06, 0.08, 0.9]
              SoilOrganicMatter: same as Validation.SE Queensland.Lawes1990.Lawes1990.Field.soil.SoilOrganicMatter
              Analysis: same as Validation.SE Queensland.Lawes1990.Lawes1990.Field.soil.Analysis
              Sample InitialN: NO3Units=ppm; NH4Units=ppm; SWUnits=Volumetric; OCUnits=Total; PHUnits=Water
                Thickness  NO3   NH4
                150        14.3  0
                150        5.9   0
                300        1.8   0
                300        0.9   0
                300        1     0
                300        0.2   0
                300        0.1   0
              Sample InitialSW: Thickness=[150, 150, 300, 300, 300, 300, 300]; SW=[0.384, 0.381, 0.44, 0.424, 0.419, 0.376, 0.377]; NO3Units=ppm; NH4Units=ppm; SWUnits=Volumetric; OCUnits=Total; PHUnits=Water
              CERESSoilTemperature
            Report HarvestReport: EventNames=[Chickpea].Harvesting
              VariableNames:
                [Clock].Today
                [Chickpea].Phenology.CurrentStageName as Stage
                [Chickpea].Phenology.FloweringDAS.Value() as FloweringDAS
                [Chickpea].Phenology.MaturityDAS.Value() as MaturityDAS
                [Chickpea].Grain.Live.Wt as GrainWt
            Manager Harvesting: same as Validation.SE Queensland.Lawes1990.Lawes1990.Field.Harvesting
            Plant Chickpea: CropType=Chickpea
            SoluteManager
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