Simulations: Version=2
  Memo TitlePage
    # The APSim Chicory Model
  Replacements
    Plant Chicory: CropType=Chicory
      Memo TitlePage
        # Forage chicory

        _Rogerio Cichota and Russel McAuliffe, AgResearch, New Zealand_

        This model has been built using the Plant Modelling Framework (PMF) of [brown_plant_2014] to simulate a forage chicory crop.

        ##Inclusion in APSIM simulations
        A forage chicory crop can be included in a simulation the same as any other APSIM crop.

         * - The chicory object can be dragged or copied from the Crop folder in the tool box into a Field in your simulation;
         * - To become active, chicory needs to be sown using a manager script with a sowing rule:
        <pre><code class='language-cs'>
         Chicory.Sow(cultivar: Puna, population: 200, depth: 10, rowSpacing: 150);
        </code></pre>
        If a specified cultivar is not available, an error is raised.

        ##Harvest and biomass removal
        Chicory can be Harvested, Cut or Grazed like other crops using a manager script.  The proportions of the biomass of each organ that is removed from the system and/or added to the residue pools may be specified or defaults will be used.  Note that the sum of removed and added to residue fractions should be <= 1.0.  To specify the proportions for removal in a manager script, use a RemovalFractions class as shown below:
        <pre><code class='language-cs'>
        [EventSubscribe("Commencing")]
        private void OnSimulationCommencing(object sender, EventArgs e)
        {
          Remove = new RemovalFractions(Chicory.Organs);
        }
        [EventSubscribe("DoManagement")]
        private void OnDoManagement(object sender, EventArgs e)
        {
          if (Clock.Today.Date == HarvestDate)
          {
            Remove.SetFractionToRemove("Leaf", 0.80);
            Remove.SetFractionToRemove("Stem", 0.50);
            Remove.SetFractionToResidue("leaf",0.05);
            Chicory.Harvest(Remove);
          }
        }
         </code></pre>
        The RemovalFractions class as can be sent with Harvest, Cut or Graze events; default is used if values for any organ is not specified.

        ##Crop termination
        To fully terminate a crop the EndCrop event should be raised:
        <pre><code class='language-cs'>
         Chicory.EndCrop();
        </code></pre>
        Once a crop has been ended the field is open to be used by another APSIM plant model, or another chicory crop.  Note that ending chicory is not necessary before sowing another crop, competition between crops will then take place.
      Phenology: DaysAfterSowing=0
        Memo Description
          As ThermalTime accumulates the crop progresses through the following phases:
        AirTemperatureFunction ThermalTime
          Memo Description
            Progression through each of the phenological stages is driven by thermal time.  As temperature increases from zero to 30 degrees, development acelerates and then slows down again above 30 degress
          XYPairs: X=[5, 25, 35]; Y=[0, 30, 0]
        PhotoperiodFunction Photoperiod: Twilight=-6; DayLength=0
        VernalisationC Vernalisation: StartStage=Emergence; EndStage=Bolting; ResetStage=Ripening
          AirTemperatureFunction VernalisingDays
            Memo Description
              Vernalisation
            XYPairs: X=[0, 4, 6, 12]; Y=[0, 1, 1, 0]
          AirTemperatureFunction DevernalisingDays
            Memo Description
              Devernalisation
            XYPairs: X=[0, 20, 30, 40]; Y=[0, 0, 1, 1]
          Constant DaysToStabilise: Value=5
        GerminatingPhase Germinating: Start=Sowing; End=Germination
        EmergingPhase Emerging: Start=Germination; End=Emergence; ShootLag=75; ShootRate=10
          VariableReference ThermalTime: VariableName=[Phenology].ThermalTime.Value
          Memo Description
            Currently the duration of the Emergence phase is set to zero because the period of zero cover and biomass production following sowing is accounted for in the cover and biomass accumulation functions.  However this phase is included if parameterisations of other crops in the future wish to give this phase a duration.
        GenericPhase Vegetative: Start=Emergence; End=Vernalised
          Memo Description
            During this phase the plant only partitions biomass to leaf and root+taproot organs.
          Constant Target: Value=10; Units=<sup>o</sup>Cd
          VariableReference ThermalTime: VariableName=[Phenology].Vernalisation.TodaysVernalisation
        GenericPhase Inductive: Start=Vernalised; End=Bolting
          Constant Target: Value=10; Units=<sup>o</sup>Cd
          LinearInterpolationFunction ThermalTime: XProperty=[Phenology].Photoperiod.Value
            XYPairs: X=[10, 12, 13.5, 15]; Y=[0, 0, 1, 1]
        GenericPhase StemElongation: Start=Bolting; End=Flowering
          Memo Description
            During this phase the plant is partitioning biomass to root+taproot, leaf, and stem organs.
          Constant Target: Value=1000; Units=<sup>o</sup>Cd
          VariableReference ThermalTime: VariableName=[Phenology].ThermalTime.Value
        GenericPhase Reproductive: Start=Flowering; End=Ripening
          Memo Description
            During this phase the plant is partitioning biomass to root+taproot, stem, leaves and reproductive organs.
          Constant Target: Value=800; Units=<sup>o</sup>Cd
          VariableReference ThermalTime: VariableName=[Phenology].ThermalTime.Value
        GotoPhase: Start=Ripening; End=Ripening; FractionComplete=0; PhaseNameToGoto=Vegetative
      OrganArbitrator Arbitrator: NArbitrationOption=RelativeAllocation; DMArbitrationOption=RelativeAllocation
      PhaseLookup TargetShootRootRatio
        PhaseLookupValue Vegetative: Start=Emergence; End=Vernalised
          Constant TargetSR: Value=1.5
        PhaseLookupValue InductiveElongation: Start=Vernalised; End=Flowering
          AddFunction TargetSR
            VariableReference MinTargetSR: VariableName=[TargetShootRootRatio].Vegetative.TargetSR.Value
            MultiplyFunction PlusTarget
              Constant MaxTargetIncrease: Value=1.5
              LinearInterpolationFunction VernalisationEffect: XProperty=[Phenology].Vernalisation.DaysVernalised
                XYPairs: X=[0, 10, 20, 30, 35, 40]; Y=[0.15, 0.15, 0.3, 0.65, 1, 1]
              LinearInterpolationFunction StageEffect: XProperty=[Phenology].Stage
                XYPairs: X=[4, 4.5, 5, 6]; Y=[0, 0.5, 1, 1]
        PhaseLookupValue Reproductive: Start=Flowering; End=Ripening
          AddFunction TargetSR
            VariableReference MinTargetSR: VariableName=[TargetShootRootRatio].Vegetative.TargetSR.Value
            MultiplyFunction PlusTarget
              SubtractFunction DeltaTarget
                VariableReference MaxTargetSR: VariableName=[TargetShootRootRatio].InductiveElongation.TargetSR.Value
                VariableReference MinTargetSR: VariableName=[TargetShootRootRatio].Vegetative.TargetSR.Value
              LinearInterpolationFunction StageEffect: XProperty=[Phenology].Stage
                XYPairs: X=[6, 6.5, 6.9, 7]; Y=[1, 0.5, 0, 0]
      PhaseLookup AdjustedShootRootRatio
        PhaseLookupValue AllPhases: Start=Emergence; End=Ripening
          MultiplyFunction AdjustedSR
            VariableReference TargetSR: VariableName=[TargetShootRootRatio].Value
            DivideFunction SRfactor
              VariableReference TargetSR: VariableName=[TargetShootRootRatio].Value
              DivideFunction CurrentSR
                VariableReference ShootDM: VariableName=[AboveGround].Wt
                VariableReference RootsDM: VariableName=[BelowGround].Wt
      SimpleLeaf Leaf: CohortsInitialised=false; Albedo=0.18; Gsmax=0.015; R50=150
        zero: TipsAtEmergence, CohortsAtInitialisation, InitialisedCohortNo, AppearedCohortNo, PlantAppearedLeafNo, LAI, Height, FRGR, PotentialEP, KDead, LAIDead
        Memo Description
          Represents all leaves in the plant.
        MultiplyFunction InitialWtFunction
          Constant InitialPlantWt: Value=0.005; Units=g/plant
          VariableReference Population: VariableName=[Plant].Population
        Constant StructuralFraction: Value=1; Units=0-1
        Constant NReallocationFactor: Value=0
        Constant LaiDeadFunction: Value=0; Units=m^2/m^2
        RUEModel Photosynthesis
          Constant RUE: Value=1.2; Units=g/MJ
          RUECO2Function FCO2: PhotosyntheticPathway=C3
          LinearInterpolationFunction FN: XProperty=[Leaf].Fn
            XYPairs: X=[0, 0.4, 0.8, 1.5]; Y=[0, 0.5, 1, 1]
          WeightedTemperatureFunction FT: MaximumTemperatureWeighting=0.75
            XYPairs: X=[4, 18, 26, 35]; Y=[0, 1, 1, 0]
          LinearInterpolationFunction FW: XProperty=[Leaf].Fw
            XYPairs: X=[0, 0.8, 1, 1.5]; Y=[0, 1, 1, 1]
          LinearInterpolationFunction FVPD: XProperty=[Leaf].Photosynthesis.VPD
            XYPairs: X=[0, 10, 50]; Y=[1, 1, 1]
          VariableReference RadnInt: VariableName=[Leaf].RadIntTot
        MultiplyFunction ExtinctionCoefficientFunction
          Constant MaxExtinctionCoefficient: Value=0.75
            Memo Description
              The extinction coefficient is used to calculate a LAI value (needed by MicroClimate) from the canopy cover
          LinearInterpolationFunction PopulationEffect: XProperty=[Chicory].Population
            XYPairs: X=[0, 50, 150, 250]; Y=[0, 0.65, 1, 1]
        PartitionFractionDemandFunction DMDemandFunction
          Memo Description
            DM demand is based on ...
          PhaseLookup PartitionFraction
            PhaseLookupValue VegetativeAndInductive: Start=Emergence; End=Bolting
              DivideFunction LeafFraction
                VariableReference ShootRootRatio: VariableName=[AdjustedShootRootRatio].Value
                AddFunction ShootRootRatioPlusOne
                  VariableReference ShootRootRatio: VariableName=[AdjustedShootRootRatio].Value
                  Constant One: Value=1
            PhaseLookupValue StemElongationAndReproductive: Start=Bolting; End=Ripening
              DivideFunction LeafFraction
                Constant One: Value=1
                AddFunction ShootRootRatioPlusOne
                  VariableReference ShootRootRatio: VariableName=[AdjustedShootRootRatio].Value
                  Constant One: Value=1
        DivideFunction FRGRFunction
          VariableReference Photosynthesis: VariableName=[Leaf].Photosynthesis.Value
          MultiplyFunction PotentialPhotosynthesis
            VariableReference PotentialRUE: VariableName=[Leaf].Photosynthesis.RUE.Value
            MaximumFunction Maximum
              VariableReference RadnInt: VariableName=[Leaf].RadIntTot
              Constant MinRadn: Value=1E-05
        MultiplyFunction LAIFunction
          Constant SpecificLeafArea: Value=0.04; Units=m^2/g
          VariableReference LeafWeight: VariableName=[Leaf].Live.Wt
        LinearInterpolationFunction HeightFunction: XProperty=[Phenology].Stage
          XYPairs: X=[3, 5, 6]; Y=[100, 800, 1200]
        Constant MaximumNConc: Value=0.045; Units=gN/gDM
        Constant MinimumNConc: Value=0.02; Units=gN/gDM
        PhaseBasedSwitch NitrogenDemandSwitch: Start=Emergence; End=Ripening
        MultiplyFunction SenescenceRate
          Constant MaxRate: Value=0.1
          LinearInterpolationFunction DMFactor: XProperty=[Leaf].Live.Wt
            XYPairs: X=[0, 300, 700, 1000]; Y=[0, 0.1, 1, 1]
        MultiplyFunction DetachmentRateFunction
          Constant MaxRate: Value=0.25
          LinearInterpolationFunction DMFactor: XProperty=[Leaf].Dead.Wt
            XYPairs: X=[0, 100, 500, 1000]; Y=[0.1, 0.15, 0.4, 1]
        Biomass Live
        Biomass Dead
        BiomassRemoval BiomassRemovalDefaults
          OrganBiomassRemovalType Harvest: FractionLiveToRemove=0; FractionDeadToRemove=0; FractionLiveToResidue=0; FractionDeadToResidue=0
          OrganBiomassRemovalType Cut: FractionLiveToRemove=0; FractionDeadToRemove=0; FractionLiveToResidue=0; FractionDeadToResidue=0
          OrganBiomassRemovalType Prune: FractionLiveToRemove=0; FractionDeadToRemove=0; FractionLiveToResidue=0; FractionDeadToResidue=0
          OrganBiomassRemovalType Graze: FractionLiveToRemove=0; FractionDeadToRemove=0; FractionLiveToResidue=0; FractionDeadToResidue=0
        Constant MaintenanceRespirationFunction: Value=0; Units=0-1
        Constant DMConversionEfficiency: Value=1; Units=0-1
      GenericOrgan Stem
        Memo Description
          Represents all the stems in the plant.
        Constant MaximumNConc: Value=0.02; Units=gN/gDM
        Constant NReallocationFactor: Value=0
        LinearInterpolationFunction MinimumNConc: XProperty=[Phenology].Stage
          XYPairs: X=[5, 5.5, 6]; Y=[0.01, 0.01, 0.007]
        PhaseBasedSwitch NitrogenDemandSwitch: Start=Emergence; End=Ripening
        PartitionFractionDemandFunction DMDemandFunction
          PhaseLookup PartitionFraction
            PhaseLookupValue StemElongation: Start=Bolting; End=Flowering
              DivideFunction StemFraction
                SubtractFunction ShootRootRatioMinusOne
                  VariableReference ShootRootRatio: VariableName=[AdjustedShootRootRatio].Value
                  Constant One: Value=1
                AddFunction ShootRootRatioPlusOne
                  VariableReference ShootRootRatio: VariableName=[AdjustedShootRootRatio].Value
                  Constant One: Value=1
            PhaseLookupValue Reproductive: Start=Flowering; End=Ripening
              MultiplyFunction StemFraction
                DivideFunction BasePartition: same as Replacements.Chicory.Stem.DMDemandFunction.PartitionFraction.StemElongation.StemFraction
                LinearInterpolationFunction StageEffect: XProperty=[Phenology].Stage
                  XYPairs: X=[6, 6.25, 6.5, 6.75, 7]; Y=[0.5, 0.25, 0, 0, 0]
        MultiplyFunction SenescenceRate
          Constant MaxRate: Value=1
          LinearInterpolationFunction StageFactor: XProperty=[Phenology].Stage
            XYPairs: X=[5, 5.5, 6, 6.5, 7]; Y=[0, 0.05, 0.1, 0.2, 1]
        MultiplyFunction DetachmentRateFunction
          Constant MaxRate: Value=0.25
          LinearInterpolationFunction DMFactor: XProperty=[Stem].Dead.Wt
            XYPairs: X=[0, 100, 500, 1000]; Y=[0.1, 0.15, 0.4, 1]
        Biomass Live
        Biomass Dead
        BiomassRemoval BiomassRemovalDefaults: same as Replacements.Chicory.Leaf.BiomassRemovalDefaults
        Constant InitialWtFunction: Value=0; Units=g/m^2
        Constant StructuralFraction: Value=1; Units=g/g
        Constant MaintenanceRespirationFunction: Value=0; Units=0-1
        Constant DMConversionEfficiency: Value=1; Units=0-1
      GenericOrgan Inflorescence
        Memo Description
          Represents the reporductive parts of the plant (flowers + seed, etc.
        Constant MaximumNConc: Value=0.075; Units=gN/gDM
        Constant MinimumNConc: Value=0.02; Units=gN/gDM
        Constant NReallocationFactor: Value=0
        PartitionFractionDemandFunction DMDemandFunction
          PhaseLookup PartitionFraction
            PhaseLookupValue Reproductive: Start=Flowering; End=Ripening
              MultiplyFunction FlowerFraction
                DivideFunction BasePartition: same as Replacements.Chicory.Stem.DMDemandFunction.PartitionFraction.StemElongation.StemFraction
                LinearInterpolationFunction StageEffect: XProperty=[Phenology].Stage
                  XYPairs: X=[6, 6.25, 6.5, 6.75, 7]; Y=[0.5, 0.75, 1, 1, 1]
        MultiplyFunction SenescenceRate
          Constant MaxRate: Value=1
          LinearInterpolationFunction StageFactor: XProperty=[Phenology].Stage
            XYPairs: X=[6, 6.25, 6.5, 6.75, 7]; Y=[0, 0.05, 0.1, 0.3, 1]
        MultiplyFunction DetachmentRateFunction
          Constant MaxRate: Value=0.25
          LinearInterpolationFunction DMFactor: XProperty=[Inflorescence].Dead.Wt
            XYPairs: X=[0, 100, 500, 1000]; Y=[0.1, 0.15, 0.4, 1]
        Biomass Live
        Biomass Dead
        BiomassRemoval BiomassRemovalDefaults: same as Replacements.Chicory.Leaf.BiomassRemovalDefaults
        Constant InitialWtFunction: Value=0; Units=g/m^2
        Constant StructuralFraction: Value=1; Units=g/g
        Constant MaintenanceRespirationFunction: Value=0; Units=0-1
        Constant DMConversionEfficiency: Value=1; Units=0-1
      Root: GrowthRespiration=0; MaintenanceRespiration=0
        Memo Description
          This represents all the fine roots of the plant
          The root organ demands and is partitioned N and DM and its depth increases through time to provide a water uptake supply
        Constant InitialDM: Value=0.01; Units=g/plant
        Constant MaximumNConc: Value=0.017; Units=gN/gDM
        Constant MinimumNConc: Value=0.015; Units=gN/gDM
        PhaseBasedSwitch NitrogenDemandSwitch: Start=Germination; End=Ripening
        Constant MaxDailyNUptake: Value=12; Units=kgN/ha
        Constant SoilWaterEffect: Value=1
          Memo
            No effect of soil water content on root growth is currently captured in the model.
        Constant MaximumRootDepth: Value=1500; Units=mm
        PhaseLookup RootFrontVelocity
          PhaseLookupValue PreEmergence: Start=Germination; End=Emergence
            Constant Value: Value=1; Units=mm/day
          PhaseLookupValue Vegetative: Start=Emergence; End=Bolting
            Constant Value: Value=3; Units=mm/day
          PhaseLookupValue Reproductive: Start=Bolting; End=Ripening
            Constant Value: Value=2; Units=mm/day
        Constant SpecificRootLength: Value=40; Units=m/g
        MultiplyFunction SenescenceRate
          Constant MaxRate: Value=0.1
          LinearInterpolationFunction DMFactor: XProperty=[Root].Live.Wt
            XYPairs: X=[0, 300, 700, 1000]; Y=[0, 0.1, 1, 1]
        PhaseLookup PartitionFraction
          PhaseLookupValue AllPhases: Start=Emergence; End=Ripening
            MultiplyFunction RootFraction
              DivideFunction PartitionToRoots: same as Replacements.Chicory.Leaf.DMDemandFunction.PartitionFraction.StemElongationAndReproductive.LeafFraction
              LinearInterpolationFunction FineRootsProportion: XProperty=[BelowGround].Wt
                XYPairs: X=[0, 10, 20, 30, 100]; Y=[0.9, 0.75, 0.51, 0.49, 0.4]
        LinearInterpolationFunction KLModifier: XProperty=[Root].RootLengthDensity
          XYPairs: X=[0, 1]; Y=[1, 1]
        LinearInterpolationFunction KNO3: XProperty=[Root].RootLengthDensity
          XYPairs: X=[0, 0.003]; Y=[0.02, 0.02]
        LinearInterpolationFunction KNH4: XProperty=[Root].RootLengthDensity
          XYPairs: X=[0, 0.003]; Y=[0.02, 0.02]
        LinearInterpolationFunction NUptakeSWFactor: XProperty=[Root].RWC
          XYPairs: X=[0, 1]; Y=[0, 1]
        CompositeBiomass Live: Propertys=[[Root].LayerLive]
        CompositeBiomass Dead: Propertys=[[Root].LayerDead]
        Folder BiomassRemovalDefaults
          OrganBiomassRemovalType Harvest: FractionLiveToRemove=0; FractionDeadToRemove=0; FractionLiveToResidue=0; FractionDeadToResidue=0
          OrganBiomassRemovalType Cut: FractionLiveToRemove=0; FractionDeadToRemove=0; FractionLiveToResidue=0; FractionDeadToResidue=0
          OrganBiomassRemovalType Prune: FractionLiveToRemove=0; FractionDeadToRemove=0; FractionLiveToResidue=0; FractionDeadToResidue=0
          OrganBiomassRemovalType Graze: FractionLiveToRemove=0; FractionDeadToRemove=0; FractionLiveToResidue=0; FractionDeadToResidue=0
      GenericOrgan Taproot
        Memo Description
          This represents all the taproots of the plant (as storage organ)
        Constant MaximumNConc: Value=0.015; Units=gN/gDM
        Constant MinimumNConc: Value=0.01; Units=gN/gDM
        PartitionFractionDemandFunction DMDemandFunction
          PhaseLookup PartitionFraction
            PhaseLookupValue AllPhases: Start=Emergence; End=Ripening
              SubtractFunction TaprootFraction
                DivideFunction PartitionToRoots: same as Replacements.Chicory.Leaf.DMDemandFunction.PartitionFraction.StemElongationAndReproductive.LeafFraction
                VariableReference FineRootFraction: VariableName=[Root].PartitionFraction.Value
        Constant StructuralFraction: Value=1
        Constant NReallocationFactor: Value=0
        Constant DMRetranslocationFactor: Value=0
        MultiplyFunction SenescenceRate
          Constant MaxRate: Value=0.1
          LinearInterpolationFunction DMFactor: XProperty=[Taproot].Live.Wt
            XYPairs: X=[0, 500, 750, 1000]; Y=[0, 0.1, 1, 1]
        MultiplyFunction DetachmentRateFunction
          Constant MaxRate: Value=0.25
          LinearInterpolationFunction DMFactor: XProperty=[Taproot].Dead.Wt
            XYPairs: X=[0, 100, 500, 1000]; Y=[0.1, 0.15, 0.4, 1]
        Biomass Live
        Biomass Dead
        BiomassRemoval BiomassRemovalDefaults: same as Replacements.Chicory.Leaf.BiomassRemovalDefaults
        Constant InitialWtFunction: Value=0; Units=g/m^2
        Constant MaintenanceRespirationFunction: Value=0; Units=0-1
        Constant DMConversionEfficiency: Value=1; Units=0-1
      CompositeBiomass AboveGround
        Propertys=[[Leaf].Live, [Leaf].Dead, [Stem].Live, [Stem].Dead, [Inflorescence].Live, [Inflorescence].Dead]
      CompositeBiomass AboveGroundLive: Propertys=[[Leaf].Live, [Stem].Live, [Inflorescence].Live]
      CompositeBiomass BelowGround: Propertys=[[Root].Live, [Root].Dead, [Taproot].Live, [Taproot].Dead]
      CompositeBiomass BelowGroundLive: Propertys=[[Root].Live, [Taproot].Live]
      CompositeBiomass Total
        Propertys=[[Leaf].Live, [Leaf].Dead, [Stem].Live, [Stem].Dead, [Inflorescence].Live, [Inflorescence].Dead, [Root].Live, [Root].Dead, [Taproot].Live, [Taproot].Dead]
      Cultivar Puna
      Cultivar Choice
    Manager Defoliate
      Crop = Chicory
      cutPasture_StartDate = 2050-05-20
      cutPasture_EndDate = 2100-12-31
      defoliateType = Graze
      interval2Cut = 21
      durationOfCut = 1
      removeAmountType = DMToRemove
      herbageAmount = 500
      fracDM2Remove = 1
      fracN2Remove = 1
      urineDepth = 10
      fracN2Dung = 0.4
      fracPopDecline = 0.2
```csharp
// Defoliates on a regular cycle or one-off via a schedule
// currenty defoliates by the amount specified spread evenly over the specified period

using System;
using Models.Core;
using System.Collections.Generic;
using System.Text;
using Models;
using Models.Soils;
using Models.PMF;
using System.Xml.Serialization;
using APSIM.Shared.Utilities;

namespace Models
{
	[Serializable]
	public class Script : Model
	{
		[Link] Zone zone;
		[Link] Clock Clock;
		[Link] Plant Chicory;
		[Link] Fertiliser fertiliser;
		[Link] ISummary summary = null;

		[Description("Choose the crop to harvest:")]
		public ICrop Crop { get; set; }

		[Description("Enter the date to start the rotation (dd/mm/yyyy):")]
		public DateTime cutPasture_StartDate { get; set; }

		[Description("Enter the date to end the rotation (dd/mm/yyyy):")]
		public DateTime cutPasture_EndDate { get; set; }

		[Description("Select type of defoliation:")]
		public defoliationTypes defoliateType { get; set; }

		[Description("Enter the interval between defoliations (days):")]
		public int interval2Cut { get; set; }

		[Description("Enter the number of days to defoliate over (days):")]
		public int durationOfCut { get; set; }

		[Description("Choose what amount is being defined:")]
		public removeAmountTypes removeAmountType { get; set; }

		[Description("Enter the amount to use (kgDM/ha):")]
		public double herbageAmount { get; set; }

		[Description("Enter the fraction of DM that is removed from the field (0-1):")]
		public double fracDM2Remove { get; set; }

		[Description("Enter the fraction of N that is removed from the field (0-1):")]
		public double fracN2Remove { get; set; }

		[Description("Enter the depth down to which urine will applied (mm):")]
		public double urineDepth { get; set; }

		[Description("Enter the proportion of N returned in dung (0-1):")]
		public double fracN2Dung { get; set; }

		[Description("Enter the fraction of population decline due to defoliation (0-1):")]
		public double fracPopDecline { get; set; }

		//fraction of each plant part returned as residue (0-1), wastage
		private double leafResidueFrac = 0.01;
		private double stemResidueFrac = 0.01;
		private double flowerResidueFrac = 0.01;

		//Outputs
		//Pasture DM defoliated today (kg/ha)
		[XmlIgnore] public double DefoliatedDM{ get; set; }
		//N defoliate today
		[XmlIgnore] public double DefoliatedN{ get; set; }
		//Pasture DM harvested today (kg/ha)
		[XmlIgnore] public double HarvestedDM{ get; set; }
		//N harvested today
		[XmlIgnore] public double HarvestedN{ get; set; }
		//DM removed from the paddock
		[XmlIgnore] public double RemovedDM{ get; set; }
		//N removed from the paddock
		[XmlIgnore] public double RemovedN{ get; set; }
		//DM returned to the paddock
		[XmlIgnore] public double ReturnedDM{ get; set; }
		//N returned to the paddock
		[XmlIgnore] public double ReturnedN{ get; set; }
		//N returned as dung (SurfaceOM)
		[XmlIgnore] public double NReturnedInDung{ get; set; }
		//N returned as urine (urea)
		[XmlIgnore] public double NReturnedInUrine{ get; set; }
		//Number of days after last harvest
		[XmlIgnore] public int DaysAfterCut{ get; set; }
		//Total standing DM (Leaf + Stem/Sheath) before cut
		[XmlIgnore] public double PreHarvestDM{ get; set; }
		//Total standing DM (Leaf + Stem/Sheath) after cut
		[XmlIgnore] public double PostHarvestDM{ get; set; }

		//Internal variables
		private RemovalFractions removalFractions;
		//The fraction of urine to be applied in each layer
		private double[] FracLayer;
		// total herbage to remove in g/m2 per day
		private double herbageToRemove;
		// counter
		private int daysCutting = 0;
		// type of defoliation (Cut or Graze)
		private string defoliationType;
		// type of DM amount (ResidualDM or DMToRemove)
		private string amountType;
		// auxiliary
		private bool aCutHasHappened = false;

		// event to add residue / dung to surface OM
		public event BiomassRemovedDelegate BiomassRemoved;

		[EventSubscribe("Commencing")]
		private void OnSimulationCommencing(object sender, EventArgs e)
		{
			removalFractions = new RemovalFractions();
			DaysAfterCut = 0;
			resetVariables();
			if (defoliateType == defoliationTypes.Cut)
				defoliationType = "Cut";
			else
				defoliationType = "Graze";

			if (removeAmountType == removeAmountTypes.ResidualDM)
				amountType = "ResidualDM";
			else
				amountType = "DMToRemove";

			// make sure that rotation start when startDate<simulationStartDay
			if ((Clock.Today > cutPasture_StartDate) && (Clock.Today < cutPasture_EndDate))
				cutPasture_StartDate = Clock.Today;
		}

		[EventSubscribe("DoManagement")]
		private void OnDoManagement(object sender, EventArgs e)
		{
			if (Clock.Today == cutPasture_StartDate)
				DaysAfterCut = interval2Cut;

			if ((Clock.Today >= cutPasture_StartDate) && (Clock.Today <= cutPasture_EndDate))
			{
				// Check whether we should start cutting
				if ((Chicory.IsEmerged) && (DaysAfterCut > 0) && (DaysAfterCut == interval2Cut))
				{
					Defoliate(defoliationType, herbageAmount * 0.1, amountType, durationOfCut);
				}
			}

			// Check whether we need to continue cutting
			if ((daysCutting > 0) && (daysCutting < durationOfCut))
			{
				// reset outputs
				resetVariables();

				removeDM(herbageToRemove, defoliationType);
				returnExcreta();
				daysCutting += 1;
			}

			// reset outputs
			if (daysCutting < 0)
			{
				resetVariables();
				daysCutting = 0;
			}
		}

		[EventSubscribe("DoManagementCalculations")]
		private void OnDoManagementCalculations(object sender, EventArgs e)
		{
			if (daysCutting == durationOfCut)
			{
				PostHarvestDM = (double)zone.Get("Chicory.AboveGround.Wt");
				aCutHasHappened = true;
				daysCutting = -1;
				Chicory.Population = Chicory.Population * (1.0 - fracPopDecline);
			}

			if (aCutHasHappened && (daysCutting == 0))
				DaysAfterCut += 1;
		}

		public enum removeAmountTypes
		{
			/// <summary>Setting DM amount to remove</summary>
			DMToRemove,
			/// <summary>Setting residual DM amount</summary>
			ResidualDM
		}

		public enum defoliationTypes
		{
			/// <summary>Cut</summary>
			Cut,
			/// <summary>Graze</summary>
			Graze
		}

		// resets the values of all outputs
		private void resetVariables()
		{
			//PreHarvestDM = 0.0;
			//PostHarvestDM = 0.0;
			DefoliatedDM = 0.0;
			DefoliatedN = 0.0;
			HarvestedDM = 0.0;
			HarvestedN = 0.0;
			RemovedDM = 0.0;
			RemovedN = 0.0;
			ReturnedDM = 0.0;
			ReturnedN = 0.0;
			NReturnedInDung = 0.0;
			NReturnedInUrine = 0.0;
		}

		// Perform the basic calculations for defoliation
		public void Defoliate(string defoliationType, double amountDM, string amountType, int duration)
		{
			// get the existing plant amount
			PreHarvestDM = (double)zone.Get("Chicory.AboveGround.Wt");

			if ((amountType == "DMToRemove") && (PreHarvestDM >= amountDM / duration))
			{
				summary.WriteMessage(this, "   Defoliating " + (10 * amountDM).ToString("#0.0") + "kg/ha over " + duration + " days");
				herbageToRemove = amountDM / duration;
			}
			else if ((amountType == "ResidualDM") && (PreHarvestDM >= amountDM))
			{
				summary.WriteMessage(this, "   Defoliating down to approximately " + (10 * amountDM).ToString("#0.0") + "kg/ha over " + duration + " days");
				herbageToRemove = (PreHarvestDM - amountDM) / duration;
			}
			else
			{
				summary.WriteMessage(this, "   Defoliation will not happend because there is not enough plant material");
				return;
			}

			durationOfCut = duration;
			// first defoliation
			removeDM(herbageToRemove, defoliationType);
			returnExcreta();
			daysCutting += 1;
			DaysAfterCut = 0;
		}

		private void removeDM(double removeAmount, string removeType)
		{
			// get the existing biomass
			double leafLiveWt = (double)zone.Get("Chicory.Leaf.Live.Wt");
			double stemLiveWt = (double)zone.Get("Chicory.Stem.Live.Wt");
			double flowerLiveWt = (double)zone.Get("Chicory.Inflorescence.Live.Wt");
			double leafDeadWt = (double)zone.Get("Chicory.Leaf.Dead.Wt");
			double stemDeadWt = (double)zone.Get("Chicory.Stem.Dead.Wt");
			double flowerDeadWt = (double)zone.Get("Chicory.Inflorescence.Dead.Wt");
			double leafLiveN = (double)zone.Get("Chicory.Leaf.Live.N");
			double stemLiveN = (double)zone.Get("Chicory.Stem.Live.N");
			double flowerLiveN = (double)zone.Get("Chicory.Inflorescence.Live.N");
			double leafDeadN = (double)zone.Get("Chicory.Leaf.Dead.N");
			double stemDeadN = (double)zone.Get("Chicory.Stem.Dead.N");
			double flowerDeadN = (double)zone.Get("Chicory.Inflorescence.Dead.N");

			double existingWt = leafLiveWt + leafDeadWt + stemLiveWt + stemDeadWt + flowerLiveWt + flowerDeadWt;


			// Can we harvest anything?
			if (existingWt >= removeAmount)
			{
				// get the fraction to remove for each organ (will override the default values)
				// the default is [Chicory].Leaf.BiomassRemovalDefaults.Cut.FractionRemoved, or equivalent
				double leafFracToRemove = removeAmount * (leafLiveWt + leafDeadWt) / existingWt / existingWt;
				double stemFracToRemove = removeAmount * (stemLiveWt + stemDeadWt) / existingWt / existingWt;
				double flowerFracToRemove = removeAmount * (flowerLiveWt + flowerDeadWt) / existingWt / existingWt;

				// get the fraction to residue (wastage - will override the default values)
				// the default is [Chicory].Leaf.BiomassRemovalDefaults.Cut.FractionToResidue, or equivalent
				double leafFracToResidue = leafResidueFrac * leafFracToRemove;
				double stemFracToResidue = stemResidueFrac * stemFracToRemove;
				double flowerFracToResidue = flowerResidueFrac * flowerFracToRemove;

				// correct the values to defoliate (so our removeAmount = remove + residue)
				leafFracToRemove = leafFracToRemove - leafFracToResidue;
				stemFracToRemove = stemFracToRemove - stemFracToResidue;
				flowerFracToRemove = flowerFracToRemove - flowerFracToResidue;

				// get total defoliation (plant loss)
				DefoliatedDM = (leafLiveWt + leafDeadWt) * (leafFracToRemove + leafFracToResidue)
				+ (stemLiveWt + stemDeadWt) * (stemFracToRemove + stemFracToResidue)
				+ (flowerLiveWt + flowerDeadWt) * (flowerFracToRemove + flowerFracToResidue);
				DefoliatedN = (leafLiveN + leafDeadN) * (leafFracToRemove + leafFracToResidue)
				+ (stemLiveN + stemDeadN) * (stemFracToRemove + stemFracToResidue)
				+ (flowerLiveN + flowerDeadN) * (flowerFracToRemove + flowerFracToResidue);

				// get total harvested
				HarvestedDM = (leafLiveWt + leafDeadWt) * leafFracToRemove
				+ (stemLiveWt + stemDeadWt) * stemFracToRemove
				+ (flowerLiveWt + flowerDeadWt) * flowerFracToRemove;
				HarvestedN = (leafLiveN + leafDeadN) * leafFracToRemove
				+ (stemLiveN + stemDeadN) * stemFracToRemove
				+ (flowerLiveN + flowerDeadN) * flowerFracToRemove;

				// get amounts actually removed from field and that to be returned (dung/urine)
				RemovedDM = HarvestedDM * fracDM2Remove;
				RemovedN = HarvestedN * fracN2Remove;
				ReturnedDM = HarvestedDM - RemovedDM;
				ReturnedN = HarvestedN - RemovedN;
				NReturnedInDung = ReturnedN * fracN2Dung;
				NReturnedInUrine = ReturnedN - NReturnedInDung;

				// set removal fractions (these overrides the default removals in the plant)
				removalFractions.SetFractionToRemove("Leaf", leafFracToRemove);
				removalFractions.SetFractionToResidue("Leaf", leafFracToResidue);
				removalFractions.SetFractionToRemove("Stem", stemFracToRemove);
				removalFractions.SetFractionToResidue("Stem", stemFracToResidue);
				removalFractions.SetFractionToRemove("Inflorescence", stemFracToRemove);
				removalFractions.SetFractionToResidue("Inflorescence", flowerFracToResidue);

				removalFractions.SetFractionToRemove("Root", 0.0);
				removalFractions.SetFractionToResidue("Root", 0.0);
				removalFractions.SetFractionToRemove("Taproot", 0.0);
				removalFractions.SetFractionToResidue("Taproot", 0.0);

				// Actually do the biomass removal
				Chicory.RemoveBiomass(removeType, removalFractions);
			}
		}

		// Return dung and urine
		private void returnExcreta()
		{
			if ((ReturnedDM > 0.0) || (NReturnedInDung > 0.0))
			{
				PMF.BiomassRemovedType BiomassDung = new PMF.BiomassRemovedType();
				string[] type = new string[] { "RuminantDung_PastureFed" };
				float[] dltdm = new float[] { (Single)ReturnedDM };
				float[] dltn = new float[] { (Single)NReturnedInDung };
				float[] dltp = new float[] { 0 };
				float[] fraction = new float[] { 1 };     // fraction is always 1.0 here

				BiomassDung.crop_type = "RuminantDung_PastureFed";
				BiomassDung.dm_type = type;
				BiomassDung.dlt_crop_dm = dltdm;
				BiomassDung.dlt_dm_n = dltn;
				BiomassDung.dlt_dm_p = dltp;
				BiomassDung.fraction_to_residue = fraction;
				BiomassRemoved.Invoke(BiomassDung);
			}

			if (NReturnedInUrine > 0.0)
			{
				fertiliser.Apply(NReturnedInUrine * 10, Fertiliser.Types.UreaN, urineDepth);
			}
		}
	}
}
```
    Manager ExtraVariables
```csharp
using System;
using Models.Core;
using System.Collections.Generic;
using System.Text;
using Models.Soils;
using Models.PMF;
using Models;
using System.Xml.Serialization;
using APSIM.Shared.Utilities;

namespace Models
{
	[Serializable] 
	public class Script : Model
	{
		[Link] Clock Clock;
		[Link] Soils.Soil Soil;
		[Link] Models.SurfaceOM.SurfaceOrganicMatter SOM;
		[Link] Weather Met;
		[Link] Fertiliser Fert;
		[Link] Irrigation Irrig;
		[Link] Plant Chicory;
		[Link] Zone zone;
		[Link] ISummary summary;
					
		[XmlIgnore] public bool InitialDay { get; set; }
		
		[XmlIgnore] public double AccumPlantN { get; set; }
		[XmlIgnore] public double AccumMineralisation { get; set; }
		[XmlIgnore] public double AccumDenit { get; set; }
		[XmlIgnore] public double AccumFert { get; set; }
		[XmlIgnore] public double AccumLeach { get; set; }
		[XmlIgnore] public double AccumDetach { get; set; }
		[XmlIgnore] public double DeltaSoilOMN { get; set; }
		[XmlIgnore] public double DeltaSurfaceOMN { get; set; }
		[XmlIgnore] public double DeltaSoilMineralN { get; set; }
		[XmlIgnore] public double SoilNitrogenContent { get; set; }
		
		[XmlIgnore] public double AccumEO { get; set; }
		[XmlIgnore] public double AccumEP { get; set; }
		[XmlIgnore] public double AccumES { get; set; }
		[XmlIgnore] public double AccumDrainage { get; set; }
		[XmlIgnore] public double AccumRunoff { get; set; }
		[XmlIgnore] public double AccumOutflowLat { get; set; }
		[XmlIgnore] public double AccumIrrigation { get; set; }
		[XmlIgnore] public double AccumRainfall { get; set; }
		[XmlIgnore] public double SoilWaterDeficit { get; set; }
	
		[XmlIgnore] public double  InitialSoilOMN { get; set; }
		[XmlIgnore] public double  InitialSurfaceOMN { get; set; }
		[XmlIgnore] public double  InitialMineralN { get; set; }
		
		[XmlIgnore] public double SWC { get; set; }
		[XmlIgnore] public double DUL { get; set; }
		[XmlIgnore] public double OutFlowLat { get; set; }

		[XmlIgnore] public double FomN { get; set; }
		[XmlIgnore] public double BiomN { get; set; }
		[XmlIgnore] public double HumN { get; set; }
		[XmlIgnore] public double OrganicN { get; set; }
		[XmlIgnore] public double NO3N { get; set; }
		[XmlIgnore] public double NH4N { get; set; }
		[XmlIgnore] public double UreaN { get; set; }
		[XmlIgnore] public double MineralN { get; set; }
		[XmlIgnore] public double DltNMinRes { get; set; }
		[XmlIgnore] public double DltNMinTot { get; set; }
		
		[XmlIgnore] public double LeafFraction { get; set; }
		[XmlIgnore] public double StemFraction { get; set; }
		[XmlIgnore] public double InflorescenceFraction { get; set; }
		
		[XmlIgnore] public double ShootRootRatio { get; set; }

		[XmlIgnore] public double Leaf_DMSupply { get; set; }
		[XmlIgnore] public double Stem_DMSupply { get; set; }
		[XmlIgnore] public double Inflorescence_DMSupply { get; set; }
		[XmlIgnore] public double Root_DMSupply { get; set; }
		[XmlIgnore] public double Taproot_DMSupply { get; set; }
		[XmlIgnore] public double Leaf_DMDemand { get; set; }
		[XmlIgnore] public double Stem_DMDemand { get; set; }
		[XmlIgnore] public double Inflorescence_DMDemand { get; set; }
		[XmlIgnore] public double Root_DMDemand { get; set; }
		[XmlIgnore] public double Taproot_DMDemand { get; set; }
		[XmlIgnore] public double Root_NSupply { get; set; }
		
		[XmlIgnore] public double Leaf_NSupplyReallocation { get; set; }
		[XmlIgnore] public double Stem_NSupplyReallocation { get; set; }
		[XmlIgnore] public double Root_NSupplyReallocation { get; set; }
		
		[EventSubscribe("Commencing")]
		private void OnSimulationCommencing(object sender, EventArgs e)
		{
			InitialDay = true;
		}
		
		[EventSubscribe("DoManagement")]
		private void OnDoManagement(object sender, EventArgs e)
		{
			//!!!!!! Nitrogen balance components !!!!!!
			//!!!!!!^^^^^^^^^^^^^^^^^^^^^^^^^^^^^!!!!!!
			FomN = MathUtilities.Sum(Soil.SoilNitrogen.FOMN);
			HumN = MathUtilities.Sum(Soil.SoilNitrogen.HumicN);
			BiomN = MathUtilities.Sum(Soil.SoilNitrogen.MicrobialN);
			OrganicN = FomN + HumN + BiomN;
			NO3N = MathUtilities.Sum(Soil.NO3N);
			NH4N = MathUtilities.Sum(Soil.NH4N);
			UreaN = MathUtilities.Sum(Soil.SoilNitrogen.urea);
			MineralN = NO3N + NH4N + UreaN; 
			DltNMinRes = MathUtilities.Sum(Soil.SoilNitrogen.dlt_n_min_res);
			DltNMinTot = MathUtilities.Sum(Soil.SoilNitrogen.MineralisedN);
			int layers = Soil.Thickness.Length;
			if (InitialDay == true)
			{
				InitialSurfaceOMN = SOM.N;
				InitialSoilOMN = OrganicN;
				InitialMineralN = MineralN;
				InitialDay = false;
			}
			DeltaSurfaceOMN = SOM.N - InitialSurfaceOMN;
			AccumLeach = AccumLeach - Soil.SoilWater.LeachNH4 - Soil.SoilWater.LeachNO3 - Soil.SoilWater.LeachUrea; //Fails
			AccumMineralisation += MathUtilities.Sum(Soil.SoilNitrogen.MineralisedN);
			AccumDenit -= MathUtilities.Sum(Soil.SoilNitrogen.Denitrification);
			AccumPlantN -= (double)zone.Get("Chicory.Root.NUptake");
			DeltaSoilOMN = OrganicN - InitialSoilOMN;
			DeltaSoilMineralN = MineralN - InitialMineralN;
			SoilNitrogenContent = MineralN;
			
			//!!!!!! Water balance components !!!!!!
			//!!!!!!^^^^^^^^^^^^^^^^^^^^^^^^^^!!!!!!

			AccumRainfall += Met.Rain;
			//AccumEP -= (double)zone.Get("[Chicory].Leaf.Transpiration");
			AccumEP -= (double)zone.Get("Chicory.Root.WaterUptake");
			SoilWaterDeficit = (SWC - DUL);
			double OutFlowLat = MathUtilities.Sum(Soil.SoilWater.outflow_lat);
			AccumOutflowLat -= OutFlowLat;
			
			//!!!!!! Stem and leaf fraction !!!!!!
			if ((double)zone.Get("Chicory.AboveGround.Wt") > 0)
			{
				LeafFraction = (double)zone.Get("Chicory.Leaf.Wt") / (double)zone.Get("Chicory.AboveGround.Wt");
				StemFraction = (double)zone.Get("Chicory.Stem.Wt") / (double)zone.Get("Chicory.AboveGround.Wt");
				InflorescenceFraction = (double)zone.Get("Chicory.Inflorescence.Wt") / (double)zone.Get("Chicory.AboveGround.Wt");
			}
			else
			{
				LeafFraction = 0;
				StemFraction = 0;
			}
			
			//!!!!!! Plant DM components !!!!!!
			//!!!!!!^^^^^^^^^^^^^^^^^^^^^^^^^^!!!!!!
			ShootRootRatio = MathUtilities.Divide((double)zone.Get("Chicory.AboveGroundLive.Wt"), (double)zone.Get("Chicory.BelowGroundLive.Wt"), 0.0);
			PMF.Interfaces.BiomassSupplyType Leaf_DMSupplies = (PMF.Interfaces.BiomassSupplyType)zone.Get("Chicory.Leaf.DMSupply");
			PMF.Interfaces.BiomassSupplyType Stem_DMSupplies = (PMF.Interfaces.BiomassSupplyType)zone.Get("Chicory.Stem.DMSupply");
			PMF.Interfaces.BiomassSupplyType Inflorescence_DMSupplies = (PMF.Interfaces.BiomassSupplyType)zone.Get("Chicory.Inflorescence.DMSupply");
			PMF.Interfaces.BiomassSupplyType Root_DMSupplies = (PMF.Interfaces.BiomassSupplyType)zone.Get("Chicory.Root.DMSupply");
			PMF.Interfaces.BiomassSupplyType Taproot_DMSupplies = (PMF.Interfaces.BiomassSupplyType)zone.Get("Chicory.Taproot.DMSupply");
			PMF.Interfaces.BiomassPoolType Leaf_DMDemands = (PMF.Interfaces.BiomassPoolType)zone.Get("Chicory.Leaf.DMDemand");
			PMF.Interfaces.BiomassPoolType Stem_DMDemands = (PMF.Interfaces.BiomassPoolType)zone.Get("Chicory.Stem.DMDemand");
			PMF.Interfaces.BiomassPoolType Inflorescence_DMDemands = (PMF.Interfaces.BiomassPoolType)zone.Get("Chicory.Inflorescence.DMDemand");
			PMF.Interfaces.BiomassPoolType Root_DMDemands = (PMF.Interfaces.BiomassPoolType)zone.Get("Chicory.Root.DMDemand");
			PMF.Interfaces.BiomassPoolType Taproot_DMDemands = (PMF.Interfaces.BiomassPoolType)zone.Get("Chicory.Taproot.DMDemand");

			PMF.Interfaces.BiomassSupplyType Leaf_NSupplies = (PMF.Interfaces.BiomassSupplyType)zone.Get("Chicory.Leaf.NSupply");
			PMF.Interfaces.BiomassSupplyType Stem_NSupplies = (PMF.Interfaces.BiomassSupplyType)zone.Get("Chicory.Stem.NSupply");
			PMF.Interfaces.BiomassSupplyType Root_NSupplies = (PMF.Interfaces.BiomassSupplyType)zone.Get("Chicory.Root.NSupply");
			
			Leaf_DMSupply = Leaf_DMSupplies.Fixation + Leaf_DMSupplies.Uptake + Leaf_DMSupplies.Reallocation + Leaf_DMSupplies.Retranslocation;
			Stem_DMSupply = Stem_DMSupplies.Fixation + Stem_DMSupplies.Uptake + Stem_DMSupplies.Reallocation + Stem_DMSupplies.Retranslocation;
			Inflorescence_DMSupply = Inflorescence_DMSupplies.Fixation + Inflorescence_DMSupplies.Uptake + Inflorescence_DMSupplies.Reallocation + Inflorescence_DMSupplies.Retranslocation;
			Root_DMSupply = Root_DMSupplies.Fixation + Root_DMSupplies.Uptake + Root_DMSupplies.Reallocation + Root_DMSupplies.Retranslocation;
			Taproot_DMSupply = Taproot_DMSupplies.Fixation + Taproot_DMSupplies.Uptake + Taproot_DMSupplies.Reallocation + Taproot_DMSupplies.Retranslocation;
			Leaf_DMDemand = Leaf_DMDemands.Structural + Leaf_DMDemands.NonStructural + Leaf_DMDemands.Metabolic;
			Stem_DMDemand = Stem_DMDemands.Structural + Stem_DMDemands.NonStructural + Stem_DMDemands.Metabolic;
			Inflorescence_DMDemand = Inflorescence_DMDemands.Structural + Inflorescence_DMDemands.NonStructural + Inflorescence_DMDemands.Metabolic;
			Root_DMDemand = Root_DMDemands.Structural + Root_DMDemands.NonStructural + Root_DMDemands.Metabolic;
			Taproot_DMDemand = Taproot_DMDemands.Structural + Taproot_DMDemands.NonStructural + Taproot_DMDemands.Metabolic;
			Root_NSupply = Root_NSupplies.Fixation + Root_NSupplies.Uptake + Root_NSupplies.Reallocation + Root_NSupplies.Retranslocation;

			Leaf_NSupplyReallocation = Leaf_NSupplies.Reallocation;
			Stem_NSupplyReallocation = Stem_NSupplies.Reallocation;
			Root_NSupplyReallocation = Root_NSupplies.Reallocation;
			
			summary.WriteMessage(this, "   Root.Fixation: " + Root_NSupplies.Fixation.ToString());
			summary.WriteMessage(this, "   Root.Uptake: " + Root_NSupplies.Uptake.ToString());
			summary.WriteMessage(this, "   Root.Reallocation: " + Root_NSupplies.Reallocation.ToString());
			summary.WriteMessage(this, "   Root.Retranslocation: " + Root_NSupplies.Retranslocation.ToString());
			summary.WriteMessage(this, "   Stem.Fixation: " + Stem_NSupplies.Fixation.ToString());
			summary.WriteMessage(this, "   Stem.Uptake: " + Stem_NSupplies.Uptake.ToString());
			summary.WriteMessage(this, "   Stem.Reallocation: " + Stem_NSupplies.Reallocation.ToString());
			summary.WriteMessage(this, "   Stem.Retranslocation: " + Stem_NSupplies.Retranslocation.ToString());	
	
			
		}
		
		[EventSubscribe("DoManagementCalculations")]
		private void OnDoManagementCalculations(object sender, EventArgs e)
		{
			FomN = MathUtilities.Sum(Soil.SoilNitrogen.FOMN);
			HumN = MathUtilities.Sum(Soil.SoilNitrogen.HumicN);
			BiomN = MathUtilities.Sum(Soil.SoilNitrogen.MicrobialN);
			AccumFert += Fert.NitrogenApplied;
			AccumIrrigation += Irrig.IrrigationApplied;
			
			
			AccumEO -= Soil.SoilWater.Eo;
			AccumES -= Soil.SoilWater.Es; 
			AccumDrainage -= Soil.SoilWater.Drainage;
			AccumRunoff -= Soil.SoilWater.Runoff;
			SWC = MathUtilities.Sum(Soil.SoilWater.SWmm);
			DUL = MathUtilities.Sum(Soil.SoilWater.DULmm);
		}
	}
}
```
    Report: EventNames=[Clock].DoReport
      VariableNames:
        [Clock].Today as Date
        [ExtraVariables].Script.AccumPlantN
        [ExtraVariables].Script.AccumMineralisation
        [ExtraVariables].Script.AccumDenit
        [ExtraVariables].Script.AccumFert
        [ExtraVariables].Script.AccumLeach
        [ExtraVariables].Script.AccumDetach
        [ExtraVariables].Script.DeltaSoilOMN
        [ExtraVariables].Script.DeltaSurfaceOMN
        [ExtraVariables].Script.DeltaSoilMineralN
        [ExtraVariables].Script.SWC
        [ExtraVariables].Script.DUL
        [ExtraVariables].Script.OutFlowLat
        [ExtraVariables].Script.AccumEO
        [ExtraVariables].Script.AccumEP
        [ExtraVariables].Script.AccumES
        [ExtraVariables].Script.AccumDrainage
        [ExtraVariables].Script.AccumRunoff
        [ExtraVariables].Script.AccumRainfall
        [ExtraVariables].Script.AccumIrrigation
        [ExtraVariables].Script.AccumOutflowLat
        [ExtraVariables].Script.SoilWaterDeficit
        [ExtraVariables].Script.SoilNitrogenContent
        [ExtraVariables].Script.FomN
        [ExtraVariables].Script.HumN
        [ExtraVariables].Script.BiomN
        [ExtraVariables].Script.DltNMinRes
        [ExtraVariables].Script.DltNMinTot
        [ExtraVariables].Script.LeafFraction
        [ExtraVariables].Script.StemFraction
        [ExtraVariables].Script.InflorescenceFraction
        [MicroClimate].net_radn
        [MicroClimate].peta
        [MicroClimate].petr
        [Soil].SoilWater.Drainage
        [Soil].SoilWater.Runoff
        [Soil].SoilWater.Eo
        [Soil].SoilWater.Es
        [Soil].SoilWater.pond
        sum([Soil].SoilWater.SWmm) as ProfileWater
        sum([Soil].SoilNitrogen.urea) as ProfileUreaN
        sum([Soil].SoilNitrogen.NH4) as ProfileNH4N
        sum([Soil].SoilNitrogen.NO3) as ProfileNO3N
        sum([Soil].SoilNitrogen.FOMN) as ProfileFOMN
        sum([Soil].SoilNitrogen.MicrobialN) as ProfileBiomN
        sum([Soil].SoilNitrogen.HumicN) as ProfileHumN
        [SurfaceOrganicMatter].N
        [AutomaticIrrigation].Script.TopSWdeficit
        [AutomaticIrrigation].Script.TopSWC
        [AutomaticIrrigation].Script.AmountToApply
        [AutomaticIrrigation].Script.SeasonAppliedAmount
        [Irrigation].IrrigationApplied
        [AutomaticFertiliser].Script.TopMineralN
        [Fertiliser].NitrogenApplied
        [Defoliate].Script.PreHarvestDM
        [Defoliate].Script.PostHarvestDM
        [Defoliate].Script.DefoliatedDM
        [Defoliate].Script.HarvestedDM
        [Defoliate].Script.RemovedDM
        [Defoliate].Script.DefoliatedN
        [Defoliate].Script.HarvestedN
        [Defoliate].Script.RemovedN
        [Defoliate].Script.NReturnedInDung
        [Defoliate].Script.NReturnedInUrine
        [Chicory].Phenology.ThemalTime.Value
        [Chicory].Population
        [Chicory].Phenology.CurrentPhaseName
        [Chicory].Phenology.Stage
        [Chicory].Root.LengthDensity
        [Chicory].Leaf.ExtinctionCoefficientFunction.Value
        [Chicory].Arbitrator.DMSupply
        [Chicory].Arbitrator.DMDemand
        [Chicory].Arbitrator.DMAllocated
        [Chicory].Arbitrator.DMSinkLimitation
        [Chicory].Arbitrator.DMNutrientLimitation
        [Chicory].Arbitrator.FDM
        [ExtraVariables].Script.Leaf_DMSupply
        [ExtraVariables].Script.Stem_DMSupply
        [ExtraVariables].Script.Inflorescence_DMSupply
        [ExtraVariables].Script.Root_DMSupply
        [ExtraVariables].Script.Taproot_DMSupply
        [ExtraVariables].Script.Leaf_DMDemand
        [ExtraVariables].Script.Stem_DMDemand
        [ExtraVariables].Script.Inflorescence_DMDemand
        [ExtraVariables].Script.Root_DMDemand
        [ExtraVariables].Script.Taproot_DMDemand
        [Chicory].Arbitrator.NSupply
        [Chicory].Arbitrator.NDemand
        [Chicory].Arbitrator.NAllocated
        [Chicory].Arbitrator.FN
        [Chicory].Arbitrator.WSupply
        [Chicory].Arbitrator.WDemand
        [Chicory].Arbitrator.WAllocated
        [Chicory].Arbitrator.FW
        sum([Chicory].Arbitrator.PotentialNO3NUptake) as PotentialPlantAvailableNO3
        sum([Chicory].Arbitrator.PotentialNH4NUptake) as PotentialPlantAvailableNH4
        (sum([Chicory].Arbitrator.PotentialNO3NUptake)+ sum([Chicory].Arbitrator.PotentialNH4NUptake))*10 as PotentialPlantAvailableN
        [Chicory].Root.NSupplyUptake
        [Chicory].Root.NTakenUp
        [Chicory].Root.NSupply
        [Chicory].Root.NUptake
        [ExtraVariables].Script.ShootRootRatio
        [Chicory].TargetShootRootRatio.Value
        [Chicory].AdjustedShootRootRatio.Value
        [Chicory].Total.Wt
        [Chicory].Total.N
        [Chicory].Total.NConc
        [Chicory].AboveGround.Wt
        [Chicory].BelowGround.Wt
        [Chicory].AboveGround.NConc
        [Chicory].BelowGround.NConc
        [Chicory].AboveGroundLive.NConc
        [Chicory].BelowGroundLive.NConc
        [Chicory].Leaf.Wt
        [Chicory].Leaf.Live.Wt
        [Chicory].Leaf.Live.N
        [Chicory].Leaf.Live.NConc
        [Chicory].Leaf.Dead.Wt
        [Chicory].Leaf.Dead.NConc
        [Chicory].Leaf.CoverTotal
        [Chicory].Leaf.CoverGreen
        [Chicory].Leaf.CoverDead
        [Chicory].Leaf.LAITotal
        [Chicory].Leaf.LAI
        [Chicory].Leaf.LAIDead
        [Chicory].Leaf.Height
        [Chicory].Leaf.PotentialBiomass.Value
        [Chicory].Leaf.Transpiration
        [Chicory].Leaf.Fw
        [Chicory].Leaf.Fn
        [Chicory].Stem.Live.Wt
        [Chicory].Stem.Live.N
        [Chicory].Stem.Live.NConc
        [Chicory].Stem.Dead.Wt
        [Chicory].Stem.Dead.NConc
        [Chicory].Inflorescence.Live.Wt
        [Chicory].Inflorescence.Live.N
        [Chicory].Inflorescence.Live.NConc
        [Chicory].Inflorescence.Dead.Wt
        [Chicory].Inflorescence.Dead.NConc
        [Chicory].Taproot.Live.Wt
        [Chicory].Taproot.Live.N
        [Chicory].Taproot.Live.NConc
        [Chicory].Taproot.Dead.Wt
        [Chicory].Taproot.Dead.NConc
        [Chicory].Root.Live.Wt
        [Chicory].Root.Live.N
        [Chicory].Root.Live.NConc
        [Chicory].Root.Dead.Wt
        [Chicory].Root.Dead.NConc
        [Chicory].Root.Depth
        [Chicory].Root.WaterDemand
        [Chicory].Root.WaterUptake
        [Chicory].Leaf.Live.StructuralWt
        [Chicory].Leaf.Live.NonStructuralWt
        [Chicory].Leaf.Live.MetabolicWt
        [Chicory].Leaf.Live.StructuralN
        [Chicory].Leaf.Live.NonStructuralN
        [Chicory].Leaf.Live.MetabolicN
        [Chicory].Leaf.Dead.StructuralWt
        [Chicory].Leaf.Dead.NonStructuralWt
        [Chicory].Leaf.Dead.MetabolicWt
        [Chicory].Leaf.Dead.StructuralN
        [Chicory].Leaf.Dead.NonStructuralN
        [Chicory].Leaf.Dead.MetabolicN
        [Chicory].Stem.Live.StructuralWt
        [Chicory].Stem.Live.NonStructuralWt
        [Chicory].Stem.Live.MetabolicWt
        [Chicory].Stem.Live.StructuralN
        [Chicory].Stem.Live.NonStructuralN
        [Chicory].Inflorescence.Live.StructuralWt
        [Chicory].Inflorescence.Live.NonStructuralWt
        [Chicory].Inflorescence.Live.StructuralN
        [Chicory].Inflorescence.Live.NonStructuralN
        [Chicory].Root.Live.StructuralWt
        [Chicory].Root.Live.NonStructuralWt
        [Chicory].Root.Live.StructuralN
        [Chicory].Root.Live.NonStructuralN
        [Chicory].Taproot.Live.StructuralWt
        [Chicory].Taproot.Live.NonStructuralWt
        [Chicory].Taproot.Live.StructuralN
        [Chicory].Taproot.Live.NonStructuralN
        [Chicory].Leaf.Live.StructuralNConc
        [Chicory].Leaf.Live.NonStructuralNConc
        [Chicory].Root.Live.StructuralNConc
        [Chicory].Root.Live.NonStructuralNConc
        [Chicory].Phenology.Vernalisation.DaysVernalised
        [Chicory].Leaf.DMDemandFunction.PartitionFraction.Value
        [Chicory].Stem.DMDemandFunction.PartitionFraction.Value
        [Chicory].Inflorescence.DMDemandFunction.PartitionFraction.Value
        [Chicory].Root.PartitionFraction.Value
        [Chicory].Taproot.DMDemandFunction.PartitionFraction.Value
  DataStore
    ExcelInput Observed: FileName=Observed.xlsx; SheetNames=[Observed]
    PredictedObserved: PredictedTableName=Report; ObservedTableName=Observed; FieldNameUsedForMatch=Date
  Folder Validation
    Folder New Zealand
      Folder ScottFarm
        Simulation C17a
          Memo
            Unpublished data from an establishment trial at Scott farm, Hamilton, New Zealand, from 2009 to 2010 by Julia Lee. Trial plots were sown with Choice chicory and measured yield and population.
          Weather: FileName=Ruakura.met
          Clock: StartDate=2008-07-01; EndDate=2010-05-30
          Summary
          SoilArbitrator Soil Arbitrator
          Zone Field: Area=1; Slope=0
            Folder Management
              Operations Sowing
                2008-10-23  [Chicory].Sow(population:200, cultivar:"Choice", depth:10, rowSpacing:150);
              Manager ExtraVariables
```csharp
// This will be replaced by the "ExtraVariables" section in "Replacements"

using System;
using Models.Core;

namespace Models
{
	[Serializable] 
	public class Script : Model
	{
	}
}
```
              Operations DefoliationSchedule
                2009-01-22  [Defoliate].Script.Defoliate(defoliationType:"Graze",amountDM: 600, amountType:"ResidualDM", duration: 7)
                2009-02-23  [Defoliate].Script.Defoliate(defoliationType:"Graze",amountDM: 600, amountType:"ResidualDM", duration: 7)
                2009-03-29  [Defoliate].Script.Defoliate(defoliationType:"Graze",amountDM: 600, amountType:"ResidualDM", duration: 7)
                2009-05-08  [Defoliate].Script.Defoliate(defoliationType:"Graze",amountDM: 600, amountType:"ResidualDM", duration: 7)
                2009-09-16  [Defoliate].Script.Defoliate(defoliationType:"Graze",amountDM: 600, amountType:"ResidualDM", duration: 7)
                2009-10-25  [Defoliate].Script.Defoliate(defoliationType:"Graze",amountDM: 600, amountType:"ResidualDM", duration: 7)
                2009-11-28  [Defoliate].Script.Defoliate(defoliationType:"Graze",amountDM: 600, amountType:"ResidualDM", duration: 7)
                2009-12-26  [Defoliate].Script.Defoliate(defoliationType:"Graze",amountDM: 600, amountType:"ResidualDM", duration: 7)
                2010-01-19  [Defoliate].Script.Defoliate(defoliationType:"Graze",amountDM: 600, amountType:"ResidualDM", duration: 7)
                2010-02-14  [Defoliate].Script.Defoliate(defoliationType:"Graze",amountDM: 600, amountType:"ResidualDM", duration: 7)
              Manager Defoliate
                Message =
```csharp
using System;
using Models.Core;
using System.Collections.Generic;
using System.Text;
using Models;
using Models.Soils;
using Models.PMF;
using System.Xml.Serialization;
using APSIM.Shared.Utilities;

namespace Models
{
	[Serializable]
	public class Script : Model
	{
		[Description("This script is set in 'Replacements':")]
		public string Message { get; set; }
	}
}
```
              Manager AutomaticIrrigation
                allowIrrigation = yes
                seasonStart = 01-Oct
                seasonEnd = 30-Jul
                seasonsAllocation = 10000
                triggerDeficit = 75
                targetDeficit = 90
                returndays = 3
                maximumAmount = 30
                depthPAWC = 300
```csharp
using System;
using Models.Core;
using Models.PMF;
using Models.Soils;
using System.Xml.Serialization;
using Models.PMF;
using APSIM.Shared.Utilities;

        
namespace Models
{
	[Serializable] 
	[System.Xml.Serialization.XmlInclude(typeof(Model))]
	public class Script : Model
	{
		//Communication to other modules
		[Link] ISummary summary = null;
		[Link] Irrigation Irrigation;
		[Link] Clock Clock;
		[Link] Soil Soil;
		[Link(IsOptional = true)] Plant existingCrop;
	   
		//User inputs from properties tab
		[Description("Turn irrigation on?")]
		public answerType allowIrrigation { get; set; }
		[Description("Start of irrigation season (dd-MMM)")]
		public string seasonStart { get; set; }
		[Description("End of irrigation season (dd-MMM)")]
		public string seasonEnd { get; set; }
		[Description("Season allocation (mm)")]
		public double seasonsAllocation { get; set; }
		[Description("Deficit to trigger irrigation (% PAWC)")]
		public double triggerDeficit { get; set; }
		[Description("Deficit to stop irrigaton (% PAWC)")]
		public double targetDeficit { get; set; }
		[Description("Minimum days for irrigation to return")]
		public double returndays { get; set; }
		[Description("Maximum irrigation application (mm/day)")]
		public double maximumAmount { get; set; }
		[Description("Depth to calculate PAWC (mm)")]
		public double depthPAWC { get; set; }
	   
		public enum answerType
		{
			/// <summary>a positive answer</summary>
			yes,
			/// <summary>a negative answer</summary>
			no
		}

		//Class members
		[XmlIgnore] public double TopSWdeficit { get; set; }
		[XmlIgnore] public double TopSWC { get; set; }
		[XmlIgnore] public double DaysSinceIrrigation { get; set; }
		[XmlIgnore] public double AmountToApply { get; set; }
		[XmlIgnore] public double SeasonAppliedAmount { get; set; }
		
		private bool IrrigationIsAllowed { get; set; }
		private bool SeasonIsOpen { get; set; }
		private bool CropIsActive { get; set; }
		private bool IrrigatorIsAvailable { get; set; }
		private bool SoilIsDry { get; set; }

		private DateTime StartDate;
		private DateTime EndDate;
		private double TopDUL;
		private double TopLL;
		private int nLayers;
	
		//Calculate static soil variables
		[EventSubscribe("StartOfSimulation")]
		private void OnStartOfSimulation(object sender, EventArgs e)
		{   
			//Set the season dates
			StartDate = DateTime.Parse(seasonStart + "-" + Clock.Today.Year.ToString());
			EndDate = DateTime.Parse(seasonEnd + "-" + Clock.Today.Year.ToString());
			
			//Can we irrigate at all?
			IrrigationIsAllowed = false; 
			if (allowIrrigation == answerType.yes)
				IrrigationIsAllowed = true; 

			//Calculate soil water variables
			double depthFromSurface = 0.0;
			double fracLayer = 0.0;
			nLayers = Soil.SoilWater.Thickness.Length;
			for (int layer = 0; layer < nLayers; layer++)
			{
				fracLayer = Math.Min(1.0, (depthPAWC - depthFromSurface) / Soil.SoilWater.Thickness[layer]);
				TopLL += Soil.SoilWater.LL15mm[layer] * fracLayer;
				TopDUL += Soil.SoilWater.DULmm[layer] * fracLayer;
				depthFromSurface += Soil.SoilWater.Thickness[layer];
				if (depthFromSurface >= depthPAWC)
					layer = nLayers;
			}
		}
	   	  
		//Determine daily requirement for irrigation
		[EventSubscribe("StartOfDay")]
		private void OnStartOfDay(object sender, EventArgs e)
		{
			//Can we irrigate today?		  
			SeasonIsOpen = isBetween(Clock.Today, StartDate, EndDate);

			//Is there a crop in the ground that needs irrigation?
			CropIsActive = false;
			if ((existingCrop != null) && (existingCrop.IsAlive))
				CropIsActive = true;
			//if ((existingCrop.Phenology.Stage >= 3.0) && (existingCrop.Phenology.Stage < 6.0))
	      
			//Is the irrigator available?
			IrrigatorIsAvailable = false;
			DaysSinceIrrigation += 1;
			if (DaysSinceIrrigation >= returndays)
				IrrigatorIsAvailable = true;
	      
			//Is the soil dry enough to require irrigation?
			SoilIsDry = false;
			double depthFromSurface = 0.0;
			double fracLayer = 0.0;
			TopSWC = 0.0;
			for (int layer = 0; layer < nLayers; layer++)
			//for (int layer = 0; depthFromSurface < depthPAWC + Soil.SoilWater.Thickness[layer]; layer++)
			{
				fracLayer = Math.Min(1.0, (depthPAWC - depthFromSurface) / Soil.SoilWater.Thickness[layer]);
				TopSWC += Soil.SoilWater.SWmm[layer] * fracLayer;
				depthFromSurface += Soil.SoilWater.Thickness[layer];
				if (depthFromSurface >= depthPAWC)
					layer = nLayers;
			}
			
			TopSWdeficit = TopSWC - TopDUL;
			if (Math.Max(0.0, -TopSWdeficit) >= (TopDUL - TopLL) * (100 - triggerDeficit) / 100)
				SoilIsDry = true;
	            
			//Are all the conditions ratifying irrigation
			if (IrrigationIsAllowed && SeasonIsOpen && CropIsActive && IrrigatorIsAvailable && SoilIsDry)
			{
				//Lets bloody well irrigate then!!!!
				AmountToApply = TopDUL * targetDeficit / 100 - TopSWC;
				AmountToApply = Math.Max(0.0, Math.Min(AmountToApply, seasonsAllocation - SeasonAppliedAmount));
				Irrigation.Apply(AmountToApply);
				DaysSinceIrrigation = 0;
				SeasonAppliedAmount += AmountToApply;
			}
		}
		
		///Checks whether theDate is between iniDate and endDate (non-year specific)
		private bool isBetween(DateTime theDay, DateTime iniDate, DateTime endDate)
		{
			bool result = false;
			if (iniDate.DayOfYear < endDate.DayOfYear)
			{
				// period is within one year, ex: summer in the northern hemisphere
				if ((theDay.DayOfYear >= iniDate.DayOfYear) && (theDay.DayOfYear <= endDate.DayOfYear))
					result = true;
			}
			else
			{
				// period goes over the end of the year, ex: summer in the southern hemisphere
				if ((theDay.DayOfYear >= iniDate.DayOfYear) || (theDay.DayOfYear <= endDate.DayOfYear))
					result = true;
			}
			
			return result;
		}
	}
}
```
            Soil SoilHorotiu: SoilType=0; Site=Horotiu; State=New Zealand; NaturalVegetation=0; ApsoilNumber=0; Latitude=0; Longitude=0; Area=0; LocationAccuracy=0; DataSource=published soil profile description (as an example)
              InitialWater Initial water: PercentMethod=EvenlyDistributed; FractionFull=0.5
              Water
                Thickness  BD   AirDry  LL15  DUL   SAT
                100        1.1  0.16    0.26  0.42  0.43
                90         1.1  0.16    0.26  0.42  0.43
                60         1.1  0.15    0.2   0.42  0.51
                110        1.1  0.12    0.16  0.37  0.47
                240        1.1  0.12    0.17  0.34  0.43
                110        1.1  0.12    0.16  0.32  0.39
                290        1.1  0.12    0.17  0.32  0.38
                200        1.1  0.12    0.17  0.32  0.38
                300        1.1  0.12    0.17  0.34  0.4
                SoilCrop ChicorySoil: LL=[0.26, 0.26, 0.2, 0.16, 0.17, 0.16, 0.17, 0.17, 0.17]; KL=[0.06, 0.06, 0.06, 0.04, 0.02, 0.01, 0, 0, 0]; XF=[1, 1, 1, 1, 1, 1, 0, 0, 0]
              SoilWater: SummerDate=1-Nov; SummerU=6; SummerCona=3.5; WinterDate=1-apr; WinterU=2; WinterCona=2; DiffusConst=88; DiffusSlope=35; Salb=0.13; CN2Bare=73; CNRed=20; CNCov=0.8; max_pond=0; Thickness=[100, 90, 60, 110, 240, 100, 300, 200, 300]; SWCON=[0.5, 0.5, 0.5, 0.5, 0.8, 0.8, 0.8, 0.9, 0.9]; residueinterception=0
              SoilNitrogen: fom_type=[default, manure, mucuna, lablab, shemp, stable]; fract_carb=[0.2, 0.3, 0.54, 0.57, 0.45, 0]; fract_cell=[0.7, 0.3, 0.37, 0.37, 0.47, 0.1]; fract_lign=[0.1, 0.4, 0.09, 0.06, 0.08, 0.9]; wfpsN2N2O_x=[22, 88]; wfpsN2N2O_y=[0.1, 1]
              SoilOrganicMatter: RootCN=40; RootWt=800; SoilCN=11.3; EnrACoeff=7.4; EnrBCoeff=0.2; OCUnits=Total
                Thickness  OC   FBiom  FInert
                100        8.2  0.08   0.3
                90         8.2  0.06   0.4
                60         5.5  0.04   0.5
                110        3.3  0.02   0.5
                240        1.7  0.02   0.8
                110        1.7  0.01   0.9
                290        1.2  0.01   1
                200        0.7  0      1
                300        0.1  0      1
              Analysis: Thickness=[100, 200, 300, 300, 300, 300, 300]; PH=[5.9, 6, 6, 6, 6, 6, 6]; PHUnits=Water; BoronUnits=HotWater
              Sample Initial nitrogen: NO3Units=ppm; NH4Units=ppm; SWUnits=Volumetric; OCUnits=Total; PHUnits=Water
                Thickness  NO3      NH4
                100        7.61905  0.132451
                200        7.27008  0.132451
                300        3.87147  0.132451
                300        3.84025  0.132451
                300        3.80952  0.132451
                300        3.77929  0.132451
                300        3.6914   0.132451
            SurfaceOrganicMatter surface organic matter: PondActive=no; ReportAdditions=no; ReportRemovals=no; PoolName=maize; type=maize; mass=500; standing_fraction=0; cnr=65; CriticalResidueWeight=2000; OptimumDecompTemp=20; MaxCumulativeEOS=20; CNRatioDecompCoeff=0.277; CNRatioDecompThreshold=25; TotalLeachRain=25; MinRainToLeach=10; CriticalMinimumOrganicC=0.004; DefaultCPRatio=0; DefaultStandingFraction=0; StandingExtinctCoeff=0.5; FractionFaecesAdded=0.5
              Pools:
                {PoolName=maize, ResidueType=maize, Mass=500, CNRatio=65, StandingFraction=0}
              ResidueTypes: LoadFromResource=ResidueTypes
              TillageTypes TillageTypesList
            MicroClimate: a_interception=0; b_interception=1; c_interception=0; d_interception=0; soil_albedo=0.23; air_pressure=1010; soil_emissivity=0.96; sun_angle=15; soil_heat_flux_fraction=0.4; night_interception_fraction=0.5; windspeed_default=3; refheight=2; albedo=0.26; emissivity=0.96; gsmax=0.01; r50=200; RadIntTotal=0
            Plant Chicory: CropType=Chicory
            Irrigation
            Fertiliser
            Report: EventNames=[Clock].DoReport
        Simulation ScottFarmEstablishment
          Memo
            Unpublished data from an establishment trial at Scott farm, Hamilton, New Zealand, in 2010 by Julia Lee. Trial plots were sown with Choice chicory and measured yield and population and sward height.
          Weather: FileName=Ruakura.met
          Clock: StartDate=2009-11-01; EndDate=2010-06-30
          Summary
          SoilArbitrator Soil Arbitrator
          Zone Field: Area=1; Slope=0
            Folder Management
              Operations Sowing
                2009-11-14  [Chicory].Sow(population:200, cultivar:"Choice", depth:10, rowSpacing:150);
              Manager AutomaticIrrigation: same as Validation.New Zealand.ScottFarm.C17a.Field.Management.AutomaticIrrigation
              Manager ExtraVariables
                script: same as in Validation.New Zealand.ScottFarm.C17a.Field.Management.ExtraVariables
            Soil SoilHorotiu: same as Validation.New Zealand.ScottFarm.C17a.Field.SoilHorotiu
            SurfaceOrganicMatter surface organic matter: same as Validation.New Zealand.ScottFarm.C17a.Field.surface organic matter
            MicroClimate: same as Validation.New Zealand.ScottFarm.C17a.Field.MicroClimate
            Plant Chicory: CropType=Chicory
            Irrigation
            Fertiliser
            Report: EventNames=[Clock].DoReport
        Simulation D9a
          Memo
            Unpublished data from an establishment trial at Scott farm, Hamilton, New Zealand, in 2011 by Julia Lee. Trial plots were sown with Choice chicory and measured yield and population.
          Weather: FileName=Ruakura.met
          Clock: StartDate=2010-10-01; EndDate=2011-04-30
          Summary
          SoilArbitrator Soil Arbitrator
          Zone Field: Area=1; Slope=0
            Folder Management
              Operations Sowing
                2010-10-30  [Chicory].Sow(population:200, cultivar:"Choice", depth:10, rowSpacing:150);
              Manager AutomaticIrrigation: same as Validation.New Zealand.ScottFarm.C17a.Field.Management.AutomaticIrrigation
              Operations DefoliationSchedule
                2011-01-18  [Defoliate].Script.Defoliate(defoliationType:"Graze",amountDM: 600, amountType:"ResidualDM", duration: 7)
                2011-03-02  [Defoliate].Script.Defoliate(defoliationType:"Graze",amountDM: 600, amountType:"ResidualDM", duration: 7)
                2011-04-01  [Defoliate].Script.Defoliate(defoliationType:"Graze",amountDM: 600, amountType:"ResidualDM", duration: 7)
              Manager ExtraVariables
                script: same as in Validation.New Zealand.ScottFarm.C17a.Field.Management.ExtraVariables
              Manager Defoliate: same as Validation.New Zealand.ScottFarm.C17a.Field.Management.Defoliate
            Soil SoilHorotiu: same as Validation.New Zealand.ScottFarm.C17a.Field.SoilHorotiu
            SurfaceOrganicMatter surface organic matter: same as Validation.New Zealand.ScottFarm.C17a.Field.surface organic matter
            MicroClimate: same as Validation.New Zealand.ScottFarm.C17a.Field.MicroClimate
            Plant Chicory: CropType=Chicory
            Irrigation
            Fertiliser
            Report: EventNames=[Clock].DoReport
        Experiment FD902
          Memo
            Lee, Julia M.,  Hemmingson, Nivonne R., Minnee, Elena M. K., Clark, Cameron E. F. (2015) Management strategies for chicory (Cichorium intybus) and plantain (Plantago lanceolata): impact on dry matter yield, nutritive characteristics and plant density. Crop and Pasture Science 66, 168–183.

            Observed data from a defoliation trial at Scott farm, Hamilton, New Zealand, 2010 to 2012. Trial plots were sown with Choice chicory and investigated the effect of cut height (i.e. rotation length) and residual height on chicory. Results include yield, botanical composition, plant density, leaf area and light interception.
          Factors
            Factor Defoliation: Specifications=[DefoliationSchedule]
              Operations 15To4
                2010-12-20  [Defoliate].Script.Defoliate(defoliationType:"Cut",amountDM: 250, amountType:"ResidualDM", duration: 1)
                2011-01-13  [Defoliate].Script.Defoliate(defoliationType:"Cut",amountDM: 250, amountType:"ResidualDM", duration: 1)
                2011-01-20  [Defoliate].Script.Defoliate(defoliationType:"Cut",amountDM: 250, amountType:"ResidualDM", duration: 1)
                2011-01-27  [Defoliate].Script.Defoliate(defoliationType:"Cut",amountDM: 250, amountType:"ResidualDM", duration: 1)
                2011-02-10  [Defoliate].Script.Defoliate(defoliationType:"Cut",amountDM: 250, amountType:"ResidualDM", duration: 1)
                2011-02-16  [Defoliate].Script.Defoliate(defoliationType:"Cut",amountDM: 250, amountType:"ResidualDM", duration: 1)
                2011-03-03  [Defoliate].Script.Defoliate(defoliationType:"Cut",amountDM: 250, amountType:"ResidualDM", duration: 1)
                2011-03-17  [Defoliate].Script.Defoliate(defoliationType:"Cut",amountDM: 250, amountType:"ResidualDM", duration: 1)
                2011-03-24  [Defoliate].Script.Defoliate(defoliationType:"Cut",amountDM: 250, amountType:"ResidualDM", duration: 1)
                2011-04-07  [Defoliate].Script.Defoliate(defoliationType:"Cut",amountDM: 250, amountType:"ResidualDM", duration: 1)
                2011-04-21  [Defoliate].Script.Defoliate(defoliationType:"Cut",amountDM: 250, amountType:"ResidualDM", duration: 1)
                2011-05-05  [Defoliate].Script.Defoliate(defoliationType:"Cut",amountDM: 250, amountType:"ResidualDM", duration: 1)
                2011-05-18  [Defoliate].Script.Defoliate(defoliationType:"Cut",amountDM: 250, amountType:"ResidualDM", duration: 1)
                2011-10-06  [Defoliate].Script.Defoliate(defoliationType:"Cut",amountDM: 250, amountType:"ResidualDM", duration: 1)
                2011-10-20  [Defoliate].Script.Defoliate(defoliationType:"Cut",amountDM: 250, amountType:"ResidualDM", duration: 1)
                2011-11-03  [Defoliate].Script.Defoliate(defoliationType:"Cut",amountDM: 250, amountType:"ResidualDM", duration: 1)
                2011-11-17  [Defoliate].Script.Defoliate(defoliationType:"Cut",amountDM: 250, amountType:"ResidualDM", duration: 1)
                2011-12-08  [Defoliate].Script.Defoliate(defoliationType:"Cut",amountDM: 250, amountType:"ResidualDM", duration: 1)
                2011-12-22  [Defoliate].Script.Defoliate(defoliationType:"Cut",amountDM: 250, amountType:"ResidualDM", duration: 1)
                2012-01-12  [Defoliate].Script.Defoliate(defoliationType:"Cut",amountDM: 250, amountType:"ResidualDM", duration: 1)
                2012-01-26  [Defoliate].Script.Defoliate(defoliationType:"Cut",amountDM: 250, amountType:"ResidualDM", duration: 1)
                2012-02-16  [Defoliate].Script.Defoliate(defoliationType:"Cut",amountDM: 250, amountType:"ResidualDM", duration: 1)
                2012-03-09  [Defoliate].Script.Defoliate(defoliationType:"Cut",amountDM: 250, amountType:"ResidualDM", duration: 1)
                2012-03-29  [Defoliate].Script.Defoliate(defoliationType:"Cut",amountDM: 250, amountType:"ResidualDM", duration: 1)
                2012-04-19  [Defoliate].Script.Defoliate(defoliationType:"Cut",amountDM: 250, amountType:"ResidualDM", duration: 1)
                2012-05-17  [Defoliate].Script.Defoliate(defoliationType:"Cut",amountDM: 250, amountType:"ResidualDM", duration: 1)
              Operations 15To7
                2010-12-20  [Defoliate].Script.Defoliate(defoliationType:"Cut",amountDM: 350, amountType:"ResidualDM", duration: 1)
                2011-01-13  [Defoliate].Script.Defoliate(defoliationType:"Cut",amountDM: 350, amountType:"ResidualDM", duration: 1)
                2011-01-20  [Defoliate].Script.Defoliate(defoliationType:"Cut",amountDM: 350, amountType:"ResidualDM", duration: 1)
                2011-01-27  [Defoliate].Script.Defoliate(defoliationType:"Cut",amountDM: 350, amountType:"ResidualDM", duration: 1)
                2011-02-03  [Defoliate].Script.Defoliate(defoliationType:"Cut",amountDM: 350, amountType:"ResidualDM", duration: 1)
                2011-02-10  [Defoliate].Script.Defoliate(defoliationType:"Cut",amountDM: 350, amountType:"ResidualDM", duration: 1)
                2011-02-16  [Defoliate].Script.Defoliate(defoliationType:"Cut",amountDM: 350, amountType:"ResidualDM", duration: 1)
                2011-03-03  [Defoliate].Script.Defoliate(defoliationType:"Cut",amountDM: 350, amountType:"ResidualDM", duration: 1)
                2011-03-17  [Defoliate].Script.Defoliate(defoliationType:"Cut",amountDM: 350, amountType:"ResidualDM", duration: 1)
                2011-03-24  [Defoliate].Script.Defoliate(defoliationType:"Cut",amountDM: 350, amountType:"ResidualDM", duration: 1)
                2011-04-07  [Defoliate].Script.Defoliate(defoliationType:"Cut",amountDM: 350, amountType:"ResidualDM", duration: 1)
                2011-04-21  [Defoliate].Script.Defoliate(defoliationType:"Cut",amountDM: 350, amountType:"ResidualDM", duration: 1)
                2011-05-05  [Defoliate].Script.Defoliate(defoliationType:"Cut",amountDM: 350, amountType:"ResidualDM", duration: 1)
                2011-05-18  [Defoliate].Script.Defoliate(defoliationType:"Cut",amountDM: 350, amountType:"ResidualDM", duration: 1)
                2011-10-06  [Defoliate].Script.Defoliate(defoliationType:"Cut",amountDM: 350, amountType:"ResidualDM", duration: 1)
                2011-10-20  [Defoliate].Script.Defoliate(defoliationType:"Cut",amountDM: 350, amountType:"ResidualDM", duration: 1)
                2011-11-03  [Defoliate].Script.Defoliate(defoliationType:"Cut",amountDM: 350, amountType:"ResidualDM", duration: 1)
                2011-11-17  [Defoliate].Script.Defoliate(defoliationType:"Cut",amountDM: 350, amountType:"ResidualDM", duration: 1)
                2011-12-08  [Defoliate].Script.Defoliate(defoliationType:"Cut",amountDM: 350, amountType:"ResidualDM", duration: 1)
                2011-12-22  [Defoliate].Script.Defoliate(defoliationType:"Cut",amountDM: 350, amountType:"ResidualDM", duration: 1)
                2012-01-12  [Defoliate].Script.Defoliate(defoliationType:"Cut",amountDM: 350, amountType:"ResidualDM", duration: 1)
                2012-01-26  [Defoliate].Script.Defoliate(defoliationType:"Cut",amountDM: 350, amountType:"ResidualDM", duration: 1)
                2012-02-16  [Defoliate].Script.Defoliate(defoliationType:"Cut",amountDM: 350, amountType:"ResidualDM", duration: 1)
                2012-03-09  [Defoliate].Script.Defoliate(defoliationType:"Cut",amountDM: 350, amountType:"ResidualDM", duration: 1)
                2012-03-29  [Defoliate].Script.Defoliate(defoliationType:"Cut",amountDM: 350, amountType:"ResidualDM", duration: 1)
                2012-04-19  [Defoliate].Script.Defoliate(defoliationType:"Cut",amountDM: 350, amountType:"ResidualDM", duration: 1)
                2012-05-17  [Defoliate].Script.Defoliate(defoliationType:"Cut",amountDM: 350, amountType:"ResidualDM", duration: 1)
              Operations 25To4
                2010-12-20  [Defoliate].Script.Defoliate(defoliationType:"Cut",amountDM: 250, amountType:"ResidualDM", duration: 1)
                2011-01-13  [Defoliate].Script.Defoliate(defoliationType:"Cut",amountDM: 250, amountType:"ResidualDM", duration: 1)
                2011-01-27  [Defoliate].Script.Defoliate(defoliationType:"Cut",amountDM: 250, amountType:"ResidualDM", duration: 1)
                2011-02-10  [Defoliate].Script.Defoliate(defoliationType:"Cut",amountDM: 250, amountType:"ResidualDM", duration: 1)
                2011-02-24  [Defoliate].Script.Defoliate(defoliationType:"Cut",amountDM: 250, amountType:"ResidualDM", duration: 1)
                2011-03-10  [Defoliate].Script.Defoliate(defoliationType:"Cut",amountDM: 250, amountType:"ResidualDM", duration: 1)
                2011-03-24  [Defoliate].Script.Defoliate(defoliationType:"Cut",amountDM: 250, amountType:"ResidualDM", duration: 1)
                2011-04-14  [Defoliate].Script.Defoliate(defoliationType:"Cut",amountDM: 250, amountType:"ResidualDM", duration: 1)
                2011-05-18  [Defoliate].Script.Defoliate(defoliationType:"Cut",amountDM: 250, amountType:"ResidualDM", duration: 1)
                2011-10-13  [Defoliate].Script.Defoliate(defoliationType:"Cut",amountDM: 250, amountType:"ResidualDM", duration: 1)
                2011-10-27  [Defoliate].Script.Defoliate(defoliationType:"Cut",amountDM: 250, amountType:"ResidualDM", duration: 1)
                2011-11-10  [Defoliate].Script.Defoliate(defoliationType:"Cut",amountDM: 250, amountType:"ResidualDM", duration: 1)
                2011-12-08  [Defoliate].Script.Defoliate(defoliationType:"Cut",amountDM: 250, amountType:"ResidualDM", duration: 1)
                2012-01-05  [Defoliate].Script.Defoliate(defoliationType:"Cut",amountDM: 250, amountType:"ResidualDM", duration: 1)
                2012-01-26  [Defoliate].Script.Defoliate(defoliationType:"Cut",amountDM: 250, amountType:"ResidualDM", duration: 1)
                2012-02-16  [Defoliate].Script.Defoliate(defoliationType:"Cut",amountDM: 250, amountType:"ResidualDM", duration: 1)
                2012-03-09  [Defoliate].Script.Defoliate(defoliationType:"Cut",amountDM: 250, amountType:"ResidualDM", duration: 1)
                2012-03-29  [Defoliate].Script.Defoliate(defoliationType:"Cut",amountDM: 250, amountType:"ResidualDM", duration: 1)
                2012-05-03  [Defoliate].Script.Defoliate(defoliationType:"Cut",amountDM: 250, amountType:"ResidualDM", duration: 1)
                2012-05-24  [Defoliate].Script.Defoliate(defoliationType:"Cut",amountDM: 250, amountType:"ResidualDM", duration: 1)
              Operations 25To7
                2010-12-20  [Defoliate].Script.Defoliate(defoliationType:"Cut",amountDM: 350, amountType:"ResidualDM", duration: 1)
                2011-01-13  [Defoliate].Script.Defoliate(defoliationType:"Cut",amountDM: 350, amountType:"ResidualDM", duration: 1)
                2011-01-27  [Defoliate].Script.Defoliate(defoliationType:"Cut",amountDM: 350, amountType:"ResidualDM", duration: 1)
                2011-02-10  [Defoliate].Script.Defoliate(defoliationType:"Cut",amountDM: 350, amountType:"ResidualDM", duration: 1)
                2011-02-24  [Defoliate].Script.Defoliate(defoliationType:"Cut",amountDM: 350, amountType:"ResidualDM", duration: 1)
                2011-03-10  [Defoliate].Script.Defoliate(defoliationType:"Cut",amountDM: 350, amountType:"ResidualDM", duration: 1)
                2011-03-24  [Defoliate].Script.Defoliate(defoliationType:"Cut",amountDM: 350, amountType:"ResidualDM", duration: 1)
                2011-04-14  [Defoliate].Script.Defoliate(defoliationType:"Cut",amountDM: 350, amountType:"ResidualDM", duration: 1)
                2011-05-18  [Defoliate].Script.Defoliate(defoliationType:"Cut",amountDM: 350, amountType:"ResidualDM", duration: 1)
                2011-10-13  [Defoliate].Script.Defoliate(defoliationType:"Cut",amountDM: 350, amountType:"ResidualDM", duration: 1)
                2011-10-27  [Defoliate].Script.Defoliate(defoliationType:"Cut",amountDM: 350, amountType:"ResidualDM", duration: 1)
                2011-11-10  [Defoliate].Script.Defoliate(defoliationType:"Cut",amountDM: 350, amountType:"ResidualDM", duration: 1)
                2011-12-08  [Defoliate].Script.Defoliate(defoliationType:"Cut",amountDM: 350, amountType:"ResidualDM", duration: 1)
                2012-01-05  [Defoliate].Script.Defoliate(defoliationType:"Cut",amountDM: 350, amountType:"ResidualDM", duration: 1)
                2012-01-26  [Defoliate].Script.Defoliate(defoliationType:"Cut",amountDM: 350, amountType:"ResidualDM", duration: 1)
                2012-02-16  [Defoliate].Script.Defoliate(defoliationType:"Cut",amountDM: 350, amountType:"ResidualDM", duration: 1)
                2012-03-09  [Defoliate].Script.Defoliate(defoliationType:"Cut",amountDM: 350, amountType:"ResidualDM", duration: 1)
                2012-03-29  [Defoliate].Script.Defoliate(defoliationType:"Cut",amountDM: 350, amountType:"ResidualDM", duration: 1)
                2012-05-03  [Defoliate].Script.Defoliate(defoliationType:"Cut",amountDM: 350, amountType:"ResidualDM", duration: 1)
                2012-05-24  [Defoliate].Script.Defoliate(defoliationType:"Cut",amountDM: 350, amountType:"ResidualDM", duration: 1)
              Operations 35To4
                2010-12-20  [Defoliate].Script.Defoliate(defoliationType:"Cut",amountDM: 250, amountType:"ResidualDM", duration: 1)
                2011-01-13  [Defoliate].Script.Defoliate(defoliationType:"Cut",amountDM: 250, amountType:"ResidualDM", duration: 1)
                2011-02-03  [Defoliate].Script.Defoliate(defoliationType:"Cut",amountDM: 250, amountType:"ResidualDM", duration: 1)
                2011-02-24  [Defoliate].Script.Defoliate(defoliationType:"Cut",amountDM: 250, amountType:"ResidualDM", duration: 1)
                2011-03-17  [Defoliate].Script.Defoliate(defoliationType:"Cut",amountDM: 250, amountType:"ResidualDM", duration: 1)
                2011-04-14  [Defoliate].Script.Defoliate(defoliationType:"Cut",amountDM: 250, amountType:"ResidualDM", duration: 1)
                2011-05-18  [Defoliate].Script.Defoliate(defoliationType:"Cut",amountDM: 250, amountType:"ResidualDM", duration: 1)
                2011-10-20  [Defoliate].Script.Defoliate(defoliationType:"Cut",amountDM: 250, amountType:"ResidualDM", duration: 1)
                2011-11-10  [Defoliate].Script.Defoliate(defoliationType:"Cut",amountDM: 250, amountType:"ResidualDM", duration: 1)
                2011-12-15  [Defoliate].Script.Defoliate(defoliationType:"Cut",amountDM: 250, amountType:"ResidualDM", duration: 1)
                2012-01-19  [Defoliate].Script.Defoliate(defoliationType:"Cut",amountDM: 250, amountType:"ResidualDM", duration: 1)
                2012-02-24  [Defoliate].Script.Defoliate(defoliationType:"Cut",amountDM: 250, amountType:"ResidualDM", duration: 1)
                2012-04-05  [Defoliate].Script.Defoliate(defoliationType:"Cut",amountDM: 250, amountType:"ResidualDM", duration: 1)
                2012-05-24  [Defoliate].Script.Defoliate(defoliationType:"Cut",amountDM: 250, amountType:"ResidualDM", duration: 1)
              Operations 35To7
                2010-12-20  [Defoliate].Script.Defoliate(defoliationType:"Cut",amountDM: 350, amountType:"ResidualDM", duration: 1)
                2011-01-13  [Defoliate].Script.Defoliate(defoliationType:"Cut",amountDM: 350, amountType:"ResidualDM", duration: 1)
                2011-02-03  [Defoliate].Script.Defoliate(defoliationType:"Cut",amountDM: 350, amountType:"ResidualDM", duration: 1)
                2011-02-24  [Defoliate].Script.Defoliate(defoliationType:"Cut",amountDM: 350, amountType:"ResidualDM", duration: 1)
                2011-03-17  [Defoliate].Script.Defoliate(defoliationType:"Cut",amountDM: 350, amountType:"ResidualDM", duration: 1)
                2011-04-14  [Defoliate].Script.Defoliate(defoliationType:"Cut",amountDM: 350, amountType:"ResidualDM", duration: 1)
                2011-05-18  [Defoliate].Script.Defoliate(defoliationType:"Cut",amountDM: 350, amountType:"ResidualDM", duration: 1)
                2011-10-20  [Defoliate].Script.Defoliate(defoliationType:"Cut",amountDM: 350, amountType:"ResidualDM", duration: 1)
                2011-11-10  [Defoliate].Script.Defoliate(defoliationType:"Cut",amountDM: 350, amountType:"ResidualDM", duration: 1)
                2011-12-15  [Defoliate].Script.Defoliate(defoliationType:"Cut",amountDM: 350, amountType:"ResidualDM", duration: 1)
                2012-01-19  [Defoliate].Script.Defoliate(defoliationType:"Cut",amountDM: 350, amountType:"ResidualDM", duration: 1)
                2012-02-24  [Defoliate].Script.Defoliate(defoliationType:"Cut",amountDM: 350, amountType:"ResidualDM", duration: 1)
                2012-04-05  [Defoliate].Script.Defoliate(defoliationType:"Cut",amountDM: 350, amountType:"ResidualDM", duration: 1)
                2012-05-24  [Defoliate].Script.Defoliate(defoliationType:"Cut",amountDM: 350, amountType:"ResidualDM", duration: 1)
              Operations 55To4
                2010-12-20  [Defoliate].Script.Defoliate(defoliationType:"Cut",amountDM: 250, amountType:"ResidualDM", duration: 1)
                2011-01-13  [Defoliate].Script.Defoliate(defoliationType:"Cut",amountDM: 250, amountType:"ResidualDM", duration: 1)
                2011-02-16  [Defoliate].Script.Defoliate(defoliationType:"Cut",amountDM: 250, amountType:"ResidualDM", duration: 1)
                2011-03-31  [Defoliate].Script.Defoliate(defoliationType:"Cut",amountDM: 250, amountType:"ResidualDM", duration: 1)
                2011-05-18  [Defoliate].Script.Defoliate(defoliationType:"Cut",amountDM: 250, amountType:"ResidualDM", duration: 1)
                2011-10-27  [Defoliate].Script.Defoliate(defoliationType:"Cut",amountDM: 250, amountType:"ResidualDM", duration: 1)
                2011-12-15  [Defoliate].Script.Defoliate(defoliationType:"Cut",amountDM: 250, amountType:"ResidualDM", duration: 1)
                2012-01-19  [Defoliate].Script.Defoliate(defoliationType:"Cut",amountDM: 250, amountType:"ResidualDM", duration: 1)
                2012-02-24  [Defoliate].Script.Defoliate(defoliationType:"Cut",amountDM: 250, amountType:"ResidualDM", duration: 1)
                2012-04-12  [Defoliate].Script.Defoliate(defoliationType:"Cut",amountDM: 250, amountType:"ResidualDM", duration: 1)
                2012-05-24  [Defoliate].Script.Defoliate(defoliationType:"Cut",amountDM: 250, amountType:"ResidualDM", duration: 1)
              Operations 55To7
                2010-12-20  [Defoliate].Script.Defoliate(defoliationType:"Cut",amountDM: 350, amountType:"ResidualDM", duration: 1)
                2011-01-13  [Defoliate].Script.Defoliate(defoliationType:"Cut",amountDM: 350, amountType:"ResidualDM", duration: 1)
                2011-02-16  [Defoliate].Script.Defoliate(defoliationType:"Cut",amountDM: 350, amountType:"ResidualDM", duration: 1)
                2011-03-31  [Defoliate].Script.Defoliate(defoliationType:"Cut",amountDM: 350, amountType:"ResidualDM", duration: 1)
                2011-05-18  [Defoliate].Script.Defoliate(defoliationType:"Cut",amountDM: 350, amountType:"ResidualDM", duration: 1)
                2011-10-27  [Defoliate].Script.Defoliate(defoliationType:"Cut",amountDM: 350, amountType:"ResidualDM", duration: 1)
                2011-12-15  [Defoliate].Script.Defoliate(defoliationType:"Cut",amountDM: 350, amountType:"ResidualDM", duration: 1)
                2012-01-19  [Defoliate].Script.Defoliate(defoliationType:"Cut",amountDM: 350, amountType:"ResidualDM", duration: 1)
                2012-02-24  [Defoliate].Script.Defoliate(defoliationType:"Cut",amountDM: 350, amountType:"ResidualDM", duration: 1)
                2012-04-12  [Defoliate].Script.Defoliate(defoliationType:"Cut",amountDM: 350, amountType:"ResidualDM", duration: 1)
                2012-05-24  [Defoliate].Script.Defoliate(defoliationType:"Cut",amountDM: 350, amountType:"ResidualDM", duration: 1)
          Simulation FD902
            Memo
              Scott Farm defoliation experiment. Julia Lee, unpublished.
            Weather: FileName=Ruakura.met
            Clock: StartDate=2010-10-01; EndDate=2012-06-30
            Summary summaryfile
            SoilArbitrator Soil Arbitrator
            Zone Field: Area=1; Slope=0
              Folder Management
                Operations Sowing
                  2010-10-13  [Chicory].Sow(population:200, cultivar:"Puna", depth:10, rowSpacing:150);
                Manager ExtraVariables
                  script: same as in Validation.New Zealand.ScottFarm.C17a.Field.Management.ExtraVariables
                Operations DefoliationSchedule
                Operations FertiliserSchedule
                  2010-10-05  [Fertiliser].Apply(50, Fertiliser.Types.UreaN, 30)
                  2011-09-15  [Fertiliser].Apply(50, Fertiliser.Types.CalciteCA, 600)
                  2011-12-15  [Fertiliser].Apply(50, Fertiliser.Types.UreaN, 39)
                  2012-01-19  [Fertiliser].Apply(50, Fertiliser.Types.UreaN, 39)
                  2012-02-23  [Fertiliser].Apply(50, Fertiliser.Types.UreaN, 39)
                  2012-03-29  [Fertiliser].Apply(50, Fertiliser.Types.UreaN, 39)
                  2012-05-03  [Fertiliser].Apply(50, Fertiliser.Types.UreaN, 39)
                  2012-11-15  [Fertiliser].Apply(50, Fertiliser.Types.UreaN, 28)
                  2012-12-20  [Fertiliser].Apply(50, Fertiliser.Types.UreaN, 28)
                  2013-01-24  [Fertiliser].Apply(50, Fertiliser.Types.UreaN, 28)
                  2013-02-28  [Fertiliser].Apply(50, Fertiliser.Types.UreaN, 28)
                Operations IrrigationSchedule
                  2010-11-30  [Irrigation].Apply(25.4)
                  2010-12-10  [Irrigation].Apply(25.2)
                  2010-12-14  [Irrigation].Apply(9.2)
                  2010-12-15  [Irrigation].Apply(29.8)
                  2011-01-05  [Irrigation].Apply(41.2)
                  2011-02-01  [Irrigation].Apply(55)
                  2011-02-04  [Irrigation].Apply(13.7)
                  2011-02-11  [Irrigation].Apply(36.6)
                  2011-02-23  [Irrigation].Apply(18.3)
                  2011-03-04  [Irrigation].Apply(36.6)
                  2011-03-13  [Irrigation].Apply(4.6)
                  2011-03-17  [Irrigation].Apply(36.6)
                  2011-11-30  [Irrigation].Apply(36.6)
                Manager Defoliate: same as Validation.New Zealand.ScottFarm.C17a.Field.Management.Defoliate
              MicroClimate: a_interception=0; b_interception=1; c_interception=0; d_interception=0; soil_albedo=0.23; air_pressure=1010; soil_emissivity=0.96; sun_angle=15; soil_heat_flux_fraction=0.4; night_interception_fraction=0.5; windspeed_default=3; refheight=2; albedo=0.15; emissivity=0.96; gsmax=0.01; r50=200; RadIntTotal=0
              Irrigation
              Fertiliser
              SurfaceOrganicMatter: PoolName=maize; type=maize; mass=500; standing_fraction=0; cnr=65; CriticalResidueWeight=2000; OptimumDecompTemp=20; MaxCumulativeEOS=20; CNRatioDecompCoeff=0.277; CNRatioDecompThreshold=25; TotalLeachRain=25; MinRainToLeach=10; CriticalMinimumOrganicC=0.004; DefaultCPRatio=0; DefaultStandingFraction=0; StandingExtinctCoeff=0.5; FractionFaecesAdded=0.5
                Pools:
                  {PoolName=maize, ResidueType=maize, Mass=500, CNRatio=65, StandingFraction=0}
                ResidueTypes ResidueTypesList: LoadFromResource=ResidueTypes
              Report: EventNames=[Clock].DoReport
              Plant Chicory: CropType=Chicory
              Soil SoilHorotiu: SoilType=0; Site=Horotiu; State=New Zealand; NaturalVegetation=0; ApsoilNumber=0; Latitude=0; Longitude=0; Area=0; LocationAccuracy=0; DataSource=published soil profile description (as an example)
                InitialWater Initial water: PercentMethod=EvenlyDistributed; FractionFull=0.5
                Water
                  Thickness  BD   AirDry  LL15  DUL   SAT
                  100        1.1  0.16    0.26  0.42  0.43
                  90         1.1  0.16    0.26  0.42  0.43
                  60         1.1  0.15    0.2   0.42  0.51
                  110        1.1  0.12    0.16  0.37  0.47
                  240        1.1  0.12    0.17  0.34  0.43
                  110        1.1  0.12    0.16  0.32  0.39
                  290        1.1  0.12    0.17  0.32  0.38
                  200        1.1  0.12    0.17  0.32  0.38
                  300        1.1  0.12    0.17  0.34  0.4
                  SoilCrop chicorySoil: LL=[0.26, 0.26, 0.2, 0.16, 0.17, 0.16, 0.17, 0.17, 0.17]; KL=[0.06, 0.06, 0.06, 0.04, 0.02, 0.01, 0, 0, 0]; XF=[1, 1, 1, 1, 1, 1, 0, 0, 0]
                SoilWater: same as Validation.New Zealand.ScottFarm.C17a.Field.SoilHorotiu.SoilWater
                SoilNitrogen: fom_type=[default, manure, mucuna, lablab, shemp, stable]; fract_carb=[0.2, 0.3, 0.54, 0.57, 0.45, 0]; fract_cell=[0.7, 0.3, 0.37, 0.37, 0.47, 0.1]; fract_lign=[0.1, 0.4, 0.09, 0.06, 0.08, 0.9]; wfpsN2N2O_x=[22, 88]; wfpsN2N2O_y=[0.1, 1]
                SoilOrganicMatter: same as Validation.New Zealand.ScottFarm.C17a.Field.SoilHorotiu.SoilOrganicMatter
                Analysis: Thickness=[100, 200, 300, 300, 300, 300, 300]; PH=[5.9, 6, 6, 6, 6, 6, 6]; PHUnits=Water; BoronUnits=HotWater
                Sample Initial nitrogen: same as Validation.New Zealand.ScottFarm.C17a.Field.SoilHorotiu.Initial nitrogen
      Experiment Iversen
        Memo
          Observed data from Brown, H. E. (2004). Understanding yield and water use of dryland forage crops in New Zealand. Lincoln, NZ, Lincoln University. PhD: 288.

          This data is adapted from Lincoln University field trials at Iversen fields from 1996 to 2002 investigating herbage production, persistance, nutritive characteristics and utilisation of Puna chicory and other forage species under irrgation and dryland conditions.

          Met data for this location was obtained from NIWA, NZ using the Broadfields met station in Lincoln.

          Soil data was constructed using information obtained from Brown, H.E. (2004) and the SMAP database from Landcare Research Limited.
        Factors
          Factor Irrigation: Specifications=[IrrigationSchedule]
            Operations Full
              1996-10-21  [Irrigation].Apply(40);
              1996-12-04  [Irrigation].Apply(40);
              1997-10-31  [Irrigation].Apply(30);
              1997-12-03  [Irrigation].Apply(50);
              1997-12-17  [Irrigation].Apply(40);
              1998-01-16  [Irrigation].Apply(30);
              1998-01-23  [Irrigation].Apply(26);
              1998-02-19  [Irrigation].Apply(62);
              1998-03-06  [Irrigation].Apply(23);
              1998-03-31  [Irrigation].Apply(31);
              1998-09-12  [Irrigation].Apply(90);
              1998-11-16  [Irrigation].Apply(150);
              1999-01-23  [Irrigation].Apply(127);
              1999-02-27  [Irrigation].Apply(70);
              1999-12-12  [Irrigation].Apply(30);
              2000-01-23  [Irrigation].Apply(50);
              2000-12-29  [Irrigation].Apply(75);
              2001-02-03  [Irrigation].Apply(95);
              2001-03-21  [Irrigation].Apply(65);
              2001-04-27  [Irrigation].Apply(45);
              2001-12-21  [Irrigation].Apply(65);
            Operations Nil
              1998-09-15  [Irrigation].Apply(150);
        Simulation Iversen
          Memo
            Iversen data from Brown, H. E. (2004). Understanding yield and water use of dryland forage crops in New Zealand. Lincoln, NZ, Lincoln University. PhD: 288.
          Weather: FileName=Lincoln-Broadfields.met
          Clock: StartDate=1996-09-20; EndDate=2002-06-30
          Summary summaryfile
          SoilArbitrator Soil Arbitrator
          Zone Field: Area=1; Slope=0
            Folder Management
              Manager ExtraVariables
                script: same as in Validation.New Zealand.ScottFarm.C17a.Field.Management.ExtraVariables
              Manager Defoliate: same as Validation.New Zealand.ScottFarm.C17a.Field.Management.Defoliate
              Operations Sowing
                1996-11-01  [Chicory].Sow(population:115, cultivar:"Puna", depth:10, rowSpacing:150);
              Operations IrrigationSchedule
              Operations DefoliationSchedule
                1997-02-21  [Defoliate].Script.Defoliate(defoliationType: "Graze",amountDM: 600, amountType:ResidualDM, duration: 9)
                1997-06-05  [Defoliate].Script.Defoliate(defoliationType: "Graze",amountDM: 600, amountType:ResidualDM, duration: 5)
                1997-10-06  [Defoliate].Script.Defoliate(defoliationType: "Graze",amountDM: 600, amountType:ResidualDM, duration: 7)
                1997-11-19  [Defoliate].Script.Defoliate(defoliationType: "Graze",amountDM: 600, amountType:ResidualDM, duration: 5)
                1997-12-23  [Defoliate].Script.Defoliate(defoliationType: "Graze",amountDM: 600, amountType:ResidualDM, duration: 7)
                1998-02-03  [Defoliate].Script.Defoliate(defoliationType: "Graze",amountDM: 600, amountType:ResidualDM, duration: 14)
                1998-03-12  [Defoliate].Script.Defoliate(defoliationType: "Graze",amountDM: 600, amountType:ResidualDM, duration: 3)
                1998-05-29  [Defoliate].Script.Defoliate(defoliationType: "Graze",amountDM: 600, amountType:ResidualDM, duration: 7)
                1998-09-29  [Defoliate].Script.Defoliate(defoliationType: "Graze",amountDM: 600, amountType:ResidualDM, duration: 10)
                1998-11-11  [Defoliate].Script.Defoliate(defoliationType: "Graze",amountDM: 600, amountType:ResidualDM, duration: 5)
                1998-12-15  [Defoliate].Script.Defoliate(defoliationType: "Graze",amountDM: 600, amountType:ResidualDM, duration: 7)
                1999-01-11  [Defoliate].Script.Defoliate(defoliationType: "Graze",amountDM: 600, amountType:ResidualDM, duration: 0)
                1999-02-17  [Defoliate].Script.Defoliate(defoliationType: "Graze",amountDM: 600, amountType:ResidualDM, duration: 7)
                1999-04-09  [Defoliate].Script.Defoliate(defoliationType: "Graze",amountDM: 600, amountType:ResidualDM, duration: 13)
                1999-06-24  [Defoliate].Script.Defoliate(defoliationType: "Graze",amountDM: 600, amountType:ResidualDM, duration: 3)
                1999-09-29  [Defoliate].Script.Defoliate(defoliationType: "Graze",amountDM: 600, amountType:ResidualDM, duration: 7)
                1999-11-09  [Defoliate].Script.Defoliate(defoliationType: "Graze",amountDM: 600, amountType:ResidualDM, duration: 8)
                1999-12-20  [Defoliate].Script.Defoliate(defoliationType: "Graze",amountDM: 600, amountType:ResidualDM, duration: 6)
                2000-01-21  [Defoliate].Script.Defoliate(defoliationType: "Graze",amountDM: 600, amountType:ResidualDM, duration: 5)
                2000-03-13  [Defoliate].Script.Defoliate(defoliationType: "Graze",amountDM: 600, amountType:ResidualDM, duration: 5)
                2000-05-25  [Defoliate].Script.Defoliate(defoliationType: "Graze",amountDM: 600, amountType:ResidualDM, duration: 4)
                2000-09-22  [Defoliate].Script.Defoliate(defoliationType: "Graze",amountDM: 600, amountType:ResidualDM, duration: 9)
                2000-11-10  [Defoliate].Script.Defoliate(defoliationType: "Graze",amountDM: 600, amountType:ResidualDM, duration: 6)
                2000-12-19  [Defoliate].Script.Defoliate(defoliationType: "Graze",amountDM: 600, amountType:ResidualDM, duration: 8)
                2001-01-24  [Defoliate].Script.Defoliate(defoliationType: "Graze",amountDM: 600, amountType:ResidualDM, duration: 6)
                2001-03-11  [Defoliate].Script.Defoliate(defoliationType: "Graze",amountDM: 600, amountType:ResidualDM, duration: 6)
                2001-05-02  [Defoliate].Script.Defoliate(defoliationType: "Graze",amountDM: 600, amountType:ResidualDM, duration: 4)
                2001-06-24  [Defoliate].Script.Defoliate(defoliationType: "Graze",amountDM: 600, amountType:ResidualDM, duration: 10)
                2001-10-03  [Defoliate].Script.Defoliate(defoliationType: "Graze",amountDM: 600, amountType:ResidualDM, duration: 7)
                2001-11-21  [Defoliate].Script.Defoliate(defoliationType: "Graze",amountDM: 600, amountType:ResidualDM, duration: 5)
                2001-12-22  [Defoliate].Script.Defoliate(defoliationType: "Graze",amountDM: 600, amountType:ResidualDM, duration: 8)
                2002-02-06  [Defoliate].Script.Defoliate(defoliationType: "Graze",amountDM: 600, amountType:ResidualDM, duration: 9)
                2002-04-03  [Defoliate].Script.Defoliate(defoliationType: "Graze",amountDM: 600, amountType:ResidualDM, duration: 14)
                2002-06-24  [Defoliate].Script.Defoliate(defoliationType: "Graze",amountDM: 600, amountType:ResidualDM, duration: 11)
            MicroClimate: same as Validation.New Zealand.ScottFarm.FD902.FD902.Field.MicroClimate
            Irrigation
            Fertiliser
            SurfaceOrganicMatter: same as Validation.New Zealand.ScottFarm.FD902.FD902.Field.SurfaceOrganicMatter
            Report: EventNames=[Clock].DoReport
            Plant Chicory: CropType=Chicory
            Soil Wakanui-Iverseen: SoilType=Udic Ustochrept (US),  Immature Pallic Soil (NZ); LocalName=Wakanui Silt Loam; Site=Iverseen field; NearestTown=Lincoln; Region=Canterbury; Country=New Zealand; Latitude=0; Longitude=0; Area=0; DataSource=Hamish Brown PhD Thesis
              Comments=The physical properties are averages from Hamish's Thesis, Ks and biochemical data from similar soils (from NZ-NSD), texture is a rough estimate only
              Analysis: Thickness=[150, 150, 400, 200, 150, 450, 150, 350, 300]; PH=[6, 6, 6, 6, 6, 6, 6, 6, 6]; PHUnits=Water; BoronUnits=HotWater
              Water
                Thickness  BD     AirDry  LL15   DUL    SAT
                150        1.327  0.117   0.293  0.4    0.496
                150        1.375  0.221   0.246  0.375  0.481
                400        1.47   0.152   0.152  0.324  0.452
                200        1.442  0.131   0.131  0.363  0.466
                150        1.313  0.134   0.134  0.352  0.513
                450        1.518  0.247   0.247  0.384  0.437
                150        1.643  0.327   0.327  0.363  0.391
                350        1.635  0.3     0.3    0.362  0.394
                300        1.705  0.283   0.283  0.336  0.368
                SoilCrop AgPastureSoil
                  LL=[0.293, 0.246, 0.152, 0.131, 0.134, 0.247, 0.327, 0.3, 0.283]
                  KL=[0.12, 0.12, 0.09, 0.04, 0.01, 0.01, 0, 0, 0]
                  XF=[1, 1, 0.8, 0.7, 0.85, 0.3, 0, 0, 0]
                SoilCrop ChicorySoil
                  LL=[0.293, 0.246, 0.152, 0.131, 0.134, 0.247, 0.327, 0.3, 0.283]
                  KL=[0.12, 0.12, 0.09, 0.04, 0.01, 0.01, 0, 0, 0]
                  XF=[1, 1, 0.8, 0.7, 0.85, 0.3, 0, 0, 0]
                SoilCrop WheatSoil
                  LL=[0.293, 0.246, 0.152, 0.131, 0.134, 0.247, 0.327, 0.3, 0.283]
                  KL=[0.12, 0.12, 0.09, 0.04, 0.01, 0.01, 0, 0, 0]
                  XF=[1, 1, 0.8, 0.7, 0.85, 0.3, 0, 0, 0]
                SoilCrop SlurpSoil
                  LL=[0.293, 0.246, 0.152, 0.131, 0.134, 0.247, 0.327, 0.3, 0.283]
                  KL=[0.12, 0.12, 0.09, 0.04, 0.01, 0.01, 0, 0, 0]
                  XF=[1, 1, 0.8, 0.7, 0.85, 0.3, 0, 0, 0]
              SoilWater: SummerDate=1-Nov; SummerU=6; SummerCona=3.5; WinterDate=1-apr; WinterU=2; WinterCona=2; DiffusConst=88; DiffusSlope=35; Salb=0.13; CN2Bare=73; CNRed=20; CNCov=0.8; max_pond=0; Thickness=[150, 150, 400, 200, 150, 450, 150, 350, 300]; SWCON=[0.5, 0.45, 0.25, 0.25, 0.4, 0.1, 0.15, 0.1, 0.1]; residueinterception=0
              SoilNitrogen: fom_type=[default, manure, mucuna, lablab, shemp, stable]; fract_carb=[0.2, 0.3, 0.54, 0.57, 0.45, 0]; fract_cell=[0.7, 0.3, 0.37, 0.37, 0.47, 0.1]; fract_lign=[0.1, 0.4, 0.09, 0.06, 0.08, 0.9]; wfpsN2N2O_x=[22, 88]; wfpsN2N2O_y=[0.1, 1]
              SoilOrganicMatter: RootCN=40; RootWt=1000; SoilCN=11.3; EnrACoeff=7.4; EnrBCoeff=0.2; OCUnits=Total
                Thickness  OC    FBiom  FInert
                150        4.25  0.105  0.6
                150        3.13  0.25   0.7
                400        0.88  0.02   0.8
                200        0.32  0.01   0.9
                150        0.25  0.008  0.95
                450        0.17  0.005  0.99
                800        0.1   0.005  0.99
              InitialWater Initial water: PercentMethod=FilledFromTop; FractionFull=0.99
              Sample Initial nitrogen: NO3Units=kgha; NH4Units=kgha; SWUnits=Volumetric; OCUnits=Total; PHUnits=Water
                Thickness  NO3  NH4
                150        15   1
                150        15   1
                400        20   1
                300        10   1
                1300       10   1
      Experiment LURF
        Memo
          Observed data from an ongoing (unpublished) Lincoln University Research Farm experiment from Grant Edwards, Lincoln University.

          TODO: Further data and information is to be added to this section as the experiment progresses.
        Factors
          Factor NRate: Specifications=[NRate]
            Operations 0
            Operations 50
              2014-02-01  [Fertiliser].Apply(50, Fertiliser.Types.NH4NO3N, 10);
              2016-03-31  [Defoliate].Script.Defoliate(defoliationType:"Cut",amountDM: 400, amountType:"ResidualDM", duration: 1)
            Operations 100
              2014-02-01  [Fertiliser].Apply(100, Fertiliser.Types.NH4NO3N, 10);
            Operations 200
              2014-02-01  [Fertiliser].Apply(200, Fertiliser.Types.NH4NO3N, 10);
            Operations 350
              2014-02-01  [Fertiliser].Apply(350, Fertiliser.Types.NH4NO3N, 10);
            Operations 500
              2014-02-01  [Fertiliser].Apply(500, Fertiliser.Types.NH4NO3N, 10);
        Simulation LURF
          Memo
            Lincoln University Research Farm experiment

            TODO: check defoilation residual heights
          Weather: FileName=Lincoln-Broadfields.met
          Clock: StartDate=2014-01-01; EndDate=2016-03-04
          Summary summaryfile
          SoilArbitrator Soil Arbitrator
          Zone Field: Area=1; Slope=0
            Folder Management
              Manager AutomaticIrrigation
                allowIrrigation = yes
                seasonStart = 01-Oct
                seasonEnd = 30-Mar
                seasonsAllocation = 10000
                triggerDeficit = 75
                targetDeficit = 90
                returndays = 7
                maximumAmount = 35
                depthPAWC = 300
                script: same as in Validation.New Zealand.ScottFarm.C17a.Field.Management.AutomaticIrrigation
              Operations Sowing
                2014-03-20  [Chicory].Sow(population:200, cultivar:"Puna", depth:10, rowSpacing:150);
              Operations NRate
              Manager Defoliate: same as Validation.New Zealand.ScottFarm.C17a.Field.Management.Defoliate
              Operations DefoliationSchedule
                2014-10-30  [Defoliate].Script.Defoliate(defoliationType:"Cut",amountDM: 400, amountType:"ResidualDM", duration: 1)
                2014-11-25  [Defoliate].Script.Defoliate(defoliationType:"Cut",amountDM: 400, amountType:"ResidualDM", duration: 1)
                2014-12-17  [Defoliate].Script.Defoliate(defoliationType:"Cut",amountDM: 400, amountType:"ResidualDM", duration: 1)
                2015-01-16  [Defoliate].Script.Defoliate(defoliationType:"Cut",amountDM: 400, amountType:"ResidualDM", duration: 1)
                2015-02-11  [Defoliate].Script.Defoliate(defoliationType:"Cut",amountDM: 400, amountType:"ResidualDM", duration: 1)
                2015-03-10  [Defoliate].Script.Defoliate(defoliationType:"Cut",amountDM: 400, amountType:"ResidualDM", duration: 1)
                2015-04-16  [Defoliate].Script.Defoliate(defoliationType:"Cut",amountDM: 400, amountType:"ResidualDM", duration: 1)
                2015-05-20  [Defoliate].Script.Defoliate(defoliationType:"Cut",amountDM: 400, amountType:"ResidualDM", duration: 1)
                2015-09-02  [Defoliate].Script.Defoliate(defoliationType:"Cut",amountDM: 400, amountType:"ResidualDM", duration: 1)
                2015-10-06  [Defoliate].Script.Defoliate(defoliationType:"Cut",amountDM: 400, amountType:"ResidualDM", duration: 1)
                2015-11-06  [Defoliate].Script.Defoliate(defoliationType:"Cut",amountDM: 400, amountType:"ResidualDM", duration: 1)
                2015-12-07  [Defoliate].Script.Defoliate(defoliationType:"Cut",amountDM: 400, amountType:"ResidualDM", duration: 1)
                2016-01-07  [Defoliate].Script.Defoliate(defoliationType:"Cut",amountDM: 400, amountType:"ResidualDM", duration: 1)
                2016-02-04  [Defoliate].Script.Defoliate(defoliationType:"Cut",amountDM: 400, amountType:"ResidualDM", duration: 1)
                2016-03-03  [Defoliate].Script.Defoliate(defoliationType:"Cut",amountDM: 400, amountType:"ResidualDM", duration: 1)
                2016-03-04  [Defoliate].Script.Defoliate(defoliationType:"Cut",amountDM: 400, amountType:"ResidualDM", duration: 1)
              Manager ExtraVariables
                script: same as in Validation.New Zealand.ScottFarm.C17a.Field.Management.ExtraVariables
            MicroClimate: same as Validation.New Zealand.ScottFarm.FD902.FD902.Field.MicroClimate
            Irrigation
            Fertiliser
            SurfaceOrganicMatter: same as Validation.New Zealand.ScottFarm.FD902.FD902.Field.SurfaceOrganicMatter
            Report: EventNames=[Clock].DoReport
            Plant Chicory: CropType=Chicory
            Soil WakanuiIversen: same as Validation.New Zealand.Iversen.Iversen.Field.Wakanui-Iverseen
      Simulation Classic
        Memo
          Observed data used in the APSim classic chicory model for the purpose of comparing results from classic and X.
        Weather: FileName=Ruakura.met
        Clock: StartDate=2008-07-01; EndDate=2010-05-30
        Summary
        SoilArbitrator Soil Arbitrator
        Zone Field: Area=1; Slope=0
          Folder Management
            Manager ExtraVariables
```csharp
using System;
using Models.Core;
using System.Collections.Generic;
using System.Text;
using Models.Soils;
using Models.PMF;
using Models;
using System.Xml.Serialization;
using APSIM.Shared.Utilities;

namespace Models
{
	[Serializable] 
	public class Script : Model
	{
		[Link] Clock Clock;
		[Link] Soils.Soil Soil;
		[Link] Models.SurfaceOM.SurfaceOrganicMatter SOM;
		[Link] Weather Met;
		[Link] Fertiliser Fert;
		[Link] Irrigation Irrig;
		[Link] Plant Chicory;
		[Link] Zone zone;
					
		[XmlIgnore] public bool InitialDay { get; set; }
		
		[XmlIgnore] public double AccumPlantN { get; set; }
		[XmlIgnore] public double AccumMineralisation { get; set; }
		[XmlIgnore] public double AccumDenit { get; set; }
		[XmlIgnore] public double AccumFert { get; set; }
		[XmlIgnore] public double AccumLeach { get; set; }
		[XmlIgnore] public double AccumDetach { get; set; }
		[XmlIgnore] public double DeltaSoilOMN { get; set; }
		[XmlIgnore] public double DeltaSurfaceOMN { get; set; }
		[XmlIgnore] public double DeltaSoilMineralN { get; set; }
		[XmlIgnore] public double SoilNitrogenContent { get; set; }
		
		[XmlIgnore] public double AccumEO { get; set; }
		[XmlIgnore] public double AccumEP { get; set; }
		[XmlIgnore] public double AccumES { get; set; }
		[XmlIgnore] public double AccumDrainage { get; set; }
		[XmlIgnore] public double AccumRunoff { get; set; }
		[XmlIgnore] public double AccumOutflowLat { get; set; }
		[XmlIgnore] public double AccumIrrigation { get; set; }
		[XmlIgnore] public double AccumRainfall { get; set; }
		[XmlIgnore] public double SoilWaterDeficit { get; set; }
	
		[XmlIgnore] public double  InitialSoilOMN { get; set; }
		[XmlIgnore] public double  InitialSurfaceOMN { get; set; }
		[XmlIgnore] public double  InitialMineralN { get; set; }
		
		[XmlIgnore] public double SWC { get; set; }
		[XmlIgnore] public double DUL { get; set; }
		[XmlIgnore] public double OutFlowLat { get; set; }

		[XmlIgnore] public double FomN { get; set; }
		[XmlIgnore] public double BiomN { get; set; }
		[XmlIgnore] public double HumN { get; set; }
		[XmlIgnore] public double OrganicN { get; set; }
		[XmlIgnore] public double NO3N { get; set; }
		[XmlIgnore] public double NH4N { get; set; }
		[XmlIgnore] public double UreaN { get; set; }
		[XmlIgnore] public double MineralN { get; set; }
		[XmlIgnore] public double DltNMinRes { get; set; }
		[XmlIgnore] public double DltNMinTot { get; set; }
		
		[XmlIgnore] public double LeafFraction { get; set; }
		[XmlIgnore] public double StemFraction { get; set; }
		
		[EventSubscribe("Commencing")]
		private void OnSimulationCommencing(object sender, EventArgs e)
		{
			InitialDay = true;
		}
		
		[EventSubscribe("DoManagement")]
		private void OnDoManagement(object sender, EventArgs e)
		{
			//!!!!!! Nitrogen balance components !!!!!!
			//!!!!!!^^^^^^^^^^^^^^^^^^^^^^^^^^^^^!!!!!!
			FomN = MathUtilities.Sum(Soil.SoilNitrogen.FOMN);
			HumN = MathUtilities.Sum(Soil.SoilNitrogen.HumicN);
			BiomN = MathUtilities.Sum(Soil.SoilNitrogen.MicrobialN);
			OrganicN = FomN + HumN + BiomN;
			NO3N = MathUtilities.Sum(Soil.NO3N);
			NH4N = MathUtilities.Sum(Soil.NH4N);
			UreaN = MathUtilities.Sum(Soil.SoilNitrogen.urea);
			MineralN = NO3N + NH4N + UreaN; 
			DltNMinRes = MathUtilities.Sum(Soil.SoilNitrogen.dlt_n_min_res);
			DltNMinTot = MathUtilities.Sum(Soil.SoilNitrogen.MineralisedN);
			int layers = Soil.Thickness.Length;
			if (InitialDay == true)
			{
				InitialSurfaceOMN = SOM.N;
				InitialSoilOMN = OrganicN;
				InitialMineralN = MineralN;
				InitialDay = false;
			}
			DeltaSurfaceOMN = SOM.N - InitialSurfaceOMN;
			AccumLeach = AccumLeach - Soil.SoilWater.LeachNH4 - Soil.SoilWater.LeachNO3 - Soil.SoilWater.LeachUrea; //Fails
			AccumMineralisation += MathUtilities.Sum(Soil.SoilNitrogen.MineralisedN);
			AccumDenit -= MathUtilities.Sum(Soil.SoilNitrogen.Denitrification);
			AccumPlantN -= (double)zone.Get("Chicory.Root.NUptake");
			DeltaSoilOMN = OrganicN - InitialSoilOMN;
			DeltaSoilMineralN = MineralN - InitialMineralN;
			SoilNitrogenContent = MineralN;
			
			//!!!!!! Water balance components !!!!!!
			//!!!!!!^^^^^^^^^^^^^^^^^^^^^^^^^^!!!!!!

			AccumRainfall += Met.Rain;
			//AccumEP -= (double)zone.Get("[Chicory].Stover.Transpiration");
			AccumEP -= (double)zone.Get("Chicory.Root.WaterUptake");
			SoilWaterDeficit = (SWC - DUL);
			double OutFlowLat = MathUtilities.Sum(Soil.SoilWater.outflow_lat);
			AccumOutflowLat -= OutFlowLat;
						
			if ((double)zone.Get("Chicory.AboveGround.Wt") > 0)
			{
				LeafFraction = (double)zone.Get("Chicory.Leaf.Wt") / (double)zone.Get("Chicory.AboveGround.Wt");
				StemFraction = (double)zone.Get("Chicory.Stem.Wt") / (double)zone.Get("Chicory.AboveGround.Wt");
			}
			else
			{
				LeafFraction = 0;
				StemFraction = 0;
			}

		}
		
		[EventSubscribe("DoManagementCalculations")]
		private void OnDoManagementCalculations(object sender, EventArgs e)
		{
			FomN = MathUtilities.Sum(Soil.SoilNitrogen.FOMN);
			HumN = MathUtilities.Sum(Soil.SoilNitrogen.HumicN);
			BiomN = MathUtilities.Sum(Soil.SoilNitrogen.MicrobialN);
			AccumFert += Fert.NitrogenApplied;
			AccumIrrigation += Irrig.IrrigationApplied;
			
			
			AccumEO -= Soil.SoilWater.Eo;
			AccumES -= Soil.SoilWater.Es; 
			AccumDrainage -= Soil.SoilWater.Drainage;
			AccumRunoff -= Soil.SoilWater.Runoff;
			SWC = MathUtilities.Sum(Soil.SoilWater.SWmm);
			DUL = MathUtilities.Sum(Soil.SoilWater.DULmm);
		}
	}
}
```
            Operations DefoliationSchedule
              2009-01-19  [Defoliate].Script.Defoliate(defoliationType:"Cut",amountDM: 400, amountType:"ResidualDM", duration: 1)
              2009-02-23  [Defoliate].Script.Defoliate(defoliationType:"Cut",amountDM: 400, amountType:"ResidualDM", duration: 1)
              2009-04-01  [Defoliate].Script.Defoliate(defoliationType:"Cut",amountDM: 400, amountType:"ResidualDM", duration: 1)
              2009-05-08  [Defoliate].Script.Defoliate(defoliationType:"Cut",amountDM: 400, amountType:"ResidualDM", duration: 1)
              2009-09-14  [Defoliate].Script.Defoliate(defoliationType:"Cut",amountDM: 400, amountType:"ResidualDM", duration: 1)
              2009-10-22  [Defoliate].Script.Defoliate(defoliationType:"Cut",amountDM: 400, amountType:"ResidualDM", duration: 1)
              2009-11-25  [Defoliate].Script.Defoliate(defoliationType:"Cut",amountDM: 400, amountType:"ResidualDM", duration: 1)
              2009-12-21  [Defoliate].Script.Defoliate(defoliationType:"Cut",amountDM: 400, amountType:"ResidualDM", duration: 1)
              2010-01-15  [Defoliate].Script.Defoliate(defoliationType:"Cut",amountDM: 400, amountType:"ResidualDM", duration: 1)
              2010-02-12  [Defoliate].Script.Defoliate(defoliationType:"Cut",amountDM: 400, amountType:"ResidualDM", duration: 1)
              2010-03-22  [Defoliate].Script.Defoliate(defoliationType:"Cut",amountDM: 400, amountType:"ResidualDM", duration: 1)
            Manager FertiliseTopupOnCriticalNO3Level
              fertCriteria = 200
              fertCritical = 100
              fertMinDays = 0
```csharp
// Auto fertilise per Lee model in Apsim classic

using System;
using Models.Core;
using Models.PMF;
using Models.Soils;
using APSIM.Shared.Utilities;
namespace Models
{
	[Serializable]
	public class Script : Model
	{
		[Link] Clock Clock;
		[Link] Fertiliser fertiliser;
		[Link] ISummary summary = null;
		[Link] Soil soil;

		private DateTime lastApplicationDate;

		[Description("Maximum Amount of NO3 required in top 3 layers (kg/ha)")]
		public double fertCriteria { get; set; }

		[Description("Critical Amount of NO3 in top 3 layers (kg/ha)")]
		public double fertCritical { get; set; }

		[Description("Minimum period between applications (days)")]
		public double fertMinDays { get; set; }

		
		[EventSubscribe("DoManagement")]
		private void OnDoManagement(object sender, EventArgs e)
		{						
			double NO3_available = soil.SoilNitrogen.NO3[0] + soil.SoilNitrogen.NO3[1] + soil.SoilNitrogen.NO3[2];
						
			double daysSinceLastApplication = (Clock.Today - lastApplicationDate).TotalDays;
			
			if (daysSinceLastApplication >= fertMinDays)
			{			
				if (NO3_available <= fertCritical)
				{
					double nDeficit = fertCriteria - NO3_available;				
					fertiliser.Apply(nDeficit, Fertiliser.Types.UreaN, 50);	// 50mm per LEE
					lastApplicationDate = Clock.Today;
					//summary.WriteMessage(this, "Applied " + nDeficit + " (was " + NO3_available.ToString() + ")");
					
				}
			}
		}
	}
}
```
            Operations IrrigationSchedule
              2010-04-07  [Irrigation].Apply(13.59)
              2010-03-30  [Irrigation].Apply(14.259)
              2010-03-18  [Irrigation].Apply(14.819)
              2010-03-13  [Irrigation].Apply(13.709)
              2010-03-09  [Irrigation].Apply(17.081)
              2010-03-05  [Irrigation].Apply(13.666)
              2010-03-01  [Irrigation].Apply(15.381)
              2010-02-23  [Irrigation].Apply(13.578)
              2010-02-20  [Irrigation].Apply(14.767)
              2010-02-11  [Irrigation].Apply(16.424)
              2010-02-06  [Irrigation].Apply(15.428)
              2010-01-16  [Irrigation].Apply(15.533)
              2010-01-13  [Irrigation].Apply(13.834)
              2010-01-08  [Irrigation].Apply(16.152)
              2010-01-03  [Irrigation].Apply(13.616)
              2009-12-31  [Irrigation].Apply(14.804)
              2009-12-26  [Irrigation].Apply(14.012)
              2009-12-22  [Irrigation].Apply(13.626)
              2009-12-19  [Irrigation].Apply(16.333)
              2009-12-11  [Irrigation].Apply(16.976)
              2009-11-26  [Irrigation].Apply(14.886)
              2009-11-15  [Irrigation].Apply(14.86)
              2009-11-09  [Irrigation].Apply(14.768)
              2009-04-17  [Irrigation].Apply(15.455)
              2009-04-03  [Irrigation].Apply(15.5)
              2009-03-29  [Irrigation].Apply(14.707)
              2009-03-25  [Irrigation].Apply(15.091)
              2009-03-21  [Irrigation].Apply(15.491)
              2009-03-15  [Irrigation].Apply(13.734)
              2009-02-09  [Irrigation].Apply(15.271)
              2009-02-06  [Irrigation].Apply(14.836)
              2009-02-03  [Irrigation].Apply(15.199)
              2009-01-31  [Irrigation].Apply(15.181)
              2009-01-28  [Irrigation].Apply(15.497)
              2009-01-25  [Irrigation].Apply(15.809)
              2009-01-22  [Irrigation].Apply(14.565)
              2009-01-16  [Irrigation].Apply(15.158)
              2009-01-09  [Irrigation].Apply(14.99)
              2009-01-06  [Irrigation].Apply(14.389)
              2008-12-29  [Irrigation].Apply(15.256)
              2008-12-15  [Irrigation].Apply(15.229)
              2008-12-07  [Irrigation].Apply(16.41)
              2008-11-29  [Irrigation].Apply(14.072)
              2008-11-24  [Irrigation].Apply(14.055)
              2008-11-21  [Irrigation].Apply(13.848)
              2008-11-15  [Irrigation].Apply(14.109)
              2008-07-10  [Irrigation].Apply(15.441)
              2008-07-01  [Irrigation].Apply(27.05)
            Operations Sowing
              2008-10-23  [Chicory].Sow(population:200, cultivar:"Puna", depth:10, rowSpacing:150);
            Manager Defoliate: same as Validation.New Zealand.ScottFarm.C17a.Field.Management.Defoliate
          SurfaceOrganicMatter surface organic matter: same as Validation.New Zealand.ScottFarm.C17a.Field.surface organic matter
          MicroClimate: same as Validation.New Zealand.ScottFarm.C17a.Field.MicroClimate
          Plant Chicory: CropType=Chicory
          Irrigation
          Fertiliser
          Report: EventNames=[Clock].DoReport
          Soil SoilHorotiu: same as Validation.New Zealand.ScottFarm.C17a.Field.SoilHorotiu
    Folder USA
      Experiment AFSRC_01
        Memo
          Data from Belesky, D. P., J. M. Fedders, et al. (1999). "Productivity, botanical composition, and nutritive value of swards including forage chicory." Agronomy Journal 91(3): 450-456

          This data is adapted from a defoliation trial in West Virginia, USA conducted from 1994-1996, investigating productivity and nutritive value of Puna chicory swards (among other species), as a function of clipping frequency (3- and 6-wk intervals). Each treatment was replicated three times on an upland site of Dekalb series soil (loamy-skeletal, mixed, subactive, mesic Typic Dystrochrept). Modest rates of N, P, and K were applied annually. Herbage mass, botanical composition, in vitro organic matter disappearance (IVOMD), and crude protein (CP) were determined.

          Met data for this location was obtained from NOAA. The data set was largely complete except for solar radiation, which was added from an alternative interpolated set for this location, also from NOAA.

          Information to construct the soil data was obtained from USGS.
        Factors
          Factor CutFrequency: Specifications=[Cuttings]
            Operations 3wks
              1994-04-20  [Defoliate].Script.Defoliate(defoliationType:"Cut",amountDM: 35, amountType:"ResidualDM", duration: 1)
              1994-05-12  [Defoliate].Script.Defoliate(defoliationType:"Cut",amountDM: 35, amountType:"ResidualDM", duration: 1)
              1994-06-03  [Defoliate].Script.Defoliate(defoliationType:"Cut",amountDM: 35, amountType:"ResidualDM", duration: 1)
              1994-06-23  [Defoliate].Script.Defoliate(defoliationType:"Cut",amountDM: 35, amountType:"ResidualDM", duration: 1)
              1994-07-15  [Defoliate].Script.Defoliate(defoliationType:"Cut",amountDM: 35, amountType:"ResidualDM", duration: 1)
              1994-08-06  [Defoliate].Script.Defoliate(defoliationType:"Cut",amountDM: 35, amountType:"ResidualDM", duration: 1)
              1994-08-29  [Defoliate].Script.Defoliate(defoliationType:"Cut",amountDM: 35, amountType:"ResidualDM", duration: 1)
              1994-09-23  [Defoliate].Script.Defoliate(defoliationType:"Cut",amountDM: 35, amountType:"ResidualDM", duration: 1)
              1995-04-20  [Defoliate].Script.Defoliate(defoliationType:"Cut",amountDM: 35, amountType:"ResidualDM", duration: 1)
              1995-05-12  [Defoliate].Script.Defoliate(defoliationType:"Cut",amountDM: 35, amountType:"ResidualDM", duration: 1)
              1995-06-03  [Defoliate].Script.Defoliate(defoliationType:"Cut",amountDM: 35, amountType:"ResidualDM", duration: 1)
              1995-06-23  [Defoliate].Script.Defoliate(defoliationType:"Cut",amountDM: 35, amountType:"ResidualDM", duration: 1)
              1995-07-15  [Defoliate].Script.Defoliate(defoliationType:"Cut",amountDM: 35, amountType:"ResidualDM", duration: 1)
              1995-08-06  [Defoliate].Script.Defoliate(defoliationType:"Cut",amountDM: 35, amountType:"ResidualDM", duration: 1)
              1995-08-29  [Defoliate].Script.Defoliate(defoliationType:"Cut",amountDM: 35, amountType:"ResidualDM", duration: 1)
              1995-09-23  [Defoliate].Script.Defoliate(defoliationType:"Cut",amountDM: 35, amountType:"ResidualDM", duration: 1)
              1994-04-22  [Fertiliser].Apply(10, Fertiliser.Types.NH4NO3N, 35)
              1995-04-22  [Fertiliser].Apply(10, Fertiliser.Types.NH4NO3N, 35)
            Operations 6wks
              1994-06-01  [Defoliate].Script.Defoliate(defoliationType:"Cut",amountDM: 40, amountType:"ResidualDM", duration: 1)
              1994-07-06  [Defoliate].Script.Defoliate(defoliationType:"Cut",amountDM: 40, amountType:"ResidualDM", duration: 1)
              1994-08-17  [Defoliate].Script.Defoliate(defoliationType:"Cut",amountDM: 40, amountType:"ResidualDM", duration: 1)
              1994-09-27  [Defoliate].Script.Defoliate(defoliationType:"Cut",amountDM: 40, amountType:"ResidualDM", duration: 1)
              1995-06-01  [Defoliate].Script.Defoliate(defoliationType:"Cut",amountDM: 40, amountType:"ResidualDM", duration: 1)
              1995-07-06  [Defoliate].Script.Defoliate(defoliationType:"Cut",amountDM: 40, amountType:"ResidualDM", duration: 1)
              1995-08-17  [Defoliate].Script.Defoliate(defoliationType:"Cut",amountDM: 40, amountType:"ResidualDM", duration: 1)
              1995-09-27  [Defoliate].Script.Defoliate(defoliationType:"Cut",amountDM: 40, amountType:"ResidualDM", duration: 1)
              1994-06-03  [Fertiliser].Apply(10, Fertiliser.Types.NH4NO3N, 35)
              1995-06-03  [Fertiliser].Apply(10, Fertiliser.Types.NH4NO3N, 35)
        Simulation AFSRC_01
          Clock: StartDate=1993-05-01; EndDate=1995-12-31
          Weather: FileName=%root%\Prototypes\Chicory\Beckley.met
          Summary
          SoilArbitrator Soil Arbitrator
          Zone Field: Area=1; Slope=0
            Folder Management
              Manager ExtraVariables
```csharp
using System;
using Models.Core;
using System.Collections.Generic;
using System.Text;
using Models.Soils;
using Models.PMF;
using Models;
using System.Xml.Serialization;
using APSIM.Shared.Utilities;

namespace Models
{
	[Serializable] 
	public class Script : Model
	{
		[Link] Clock Clock;
		[Link] Soils.Soil Soil;
		[Link] Models.SurfaceOM.SurfaceOrganicMatter SOM;
		[Link] Weather Met;
		[Link] Fertiliser Fert;
		[Link] Irrigation Irrig;
		[Link] Plant Chicory;
		[Link] Zone zone;
					
		[XmlIgnore] public bool InitialDay { get; set; }
		
		[XmlIgnore] public double AccumPlantN { get; set; }
		[XmlIgnore] public double AccumMineralisation { get; set; }
		[XmlIgnore] public double AccumDenit { get; set; }
		[XmlIgnore] public double AccumFert { get; set; }
		[XmlIgnore] public double AccumLeach { get; set; }
		[XmlIgnore] public double AccumDetach { get; set; }
		[XmlIgnore] public double DeltaSoilOMN { get; set; }
		[XmlIgnore] public double DeltaSurfaceOMN { get; set; }
		[XmlIgnore] public double DeltaSoilMineralN { get; set; }
		[XmlIgnore] public double SoilNitrogenContent { get; set; }
		
		[XmlIgnore] public double AccumEO { get; set; }
		[XmlIgnore] public double AccumEP { get; set; }
		[XmlIgnore] public double AccumES { get; set; }
		[XmlIgnore] public double AccumDrainage { get; set; }
		[XmlIgnore] public double AccumRunoff { get; set; }
		[XmlIgnore] public double AccumOutflowLat { get; set; }
		[XmlIgnore] public double AccumIrrigation { get; set; }
		[XmlIgnore] public double AccumRainfall { get; set; }
		[XmlIgnore] public double SoilWaterDeficit { get; set; }
	
		[XmlIgnore] public double  InitialSoilOMN { get; set; }
		[XmlIgnore] public double  InitialSurfaceOMN { get; set; }
		[XmlIgnore] public double  InitialMineralN { get; set; }
		
		[XmlIgnore] public double SWC { get; set; }
		[XmlIgnore] public double DUL { get; set; }
		[XmlIgnore] public double OutFlowLat { get; set; }

		[XmlIgnore] public double FomN { get; set; }
		[XmlIgnore] public double BiomN { get; set; }
		[XmlIgnore] public double HumN { get; set; }
		[XmlIgnore] public double OrganicN { get; set; }
		[XmlIgnore] public double NO3N { get; set; }
		[XmlIgnore] public double NH4N { get; set; }
		[XmlIgnore] public double UreaN { get; set; }
		[XmlIgnore] public double MineralN { get; set; }
		[XmlIgnore] public double DltNMinRes { get; set; }
		[XmlIgnore] public double DltNMinTot { get; set; }
		
		[EventSubscribe("Commencing")]
		private void OnSimulationCommencing(object sender, EventArgs e)
		{
			InitialDay = true;
		}
		
		[EventSubscribe("DoManagement")]
		private void OnDoManagement(object sender, EventArgs e)
		{
			//!!!!!! Nitrogen balance components !!!!!!
			//!!!!!!^^^^^^^^^^^^^^^^^^^^^^^^^^^^^!!!!!!
			FomN = MathUtilities.Sum(Soil.SoilNitrogen.FOMN);
			HumN = MathUtilities.Sum(Soil.SoilNitrogen.HumicN);
			BiomN = MathUtilities.Sum(Soil.SoilNitrogen.MicrobialN);
			OrganicN = FomN + HumN + BiomN;
			NO3N = MathUtilities.Sum(Soil.NO3N);
			NH4N = MathUtilities.Sum(Soil.NH4N);
			UreaN = MathUtilities.Sum(Soil.SoilNitrogen.urea);
			MineralN = NO3N + NH4N + UreaN; 
			DltNMinRes = MathUtilities.Sum(Soil.SoilNitrogen.dlt_n_min_res);
			DltNMinTot = MathUtilities.Sum(Soil.SoilNitrogen.MineralisedN);
			int layers = Soil.Thickness.Length;
			if (InitialDay == true)
			{
				InitialSurfaceOMN = SOM.N;
				InitialSoilOMN = OrganicN;
				InitialMineralN = MineralN;
				InitialDay = false;
			}
			DeltaSurfaceOMN = SOM.N - InitialSurfaceOMN;
			AccumLeach = AccumLeach - Soil.SoilWater.LeachNH4 - Soil.SoilWater.LeachNO3 - Soil.SoilWater.LeachUrea; //Fails
			AccumMineralisation += MathUtilities.Sum(Soil.SoilNitrogen.MineralisedN);
			AccumDenit -= MathUtilities.Sum(Soil.SoilNitrogen.Denitrification);
			AccumPlantN -= (double)zone.Get("Chicory.Root.NUptake");
			DeltaSoilOMN = OrganicN - InitialSoilOMN;
			DeltaSoilMineralN = MineralN - InitialMineralN;
			SoilNitrogenContent = MineralN;
			
			//!!!!!! Water balance components !!!!!!
			//!!!!!!^^^^^^^^^^^^^^^^^^^^^^^^^^!!!!!!

			AccumRainfall += Met.Rain;
			//AccumEP -= (double)zone.Get("[Chicory].Leaf.Transpiration");
			AccumEP -= (double)zone.Get("Chicory.Root.WaterUptake");
			SoilWaterDeficit = (SWC - DUL);
			double OutFlowLat = MathUtilities.Sum(Soil.SoilWater.outflow_lat);
			AccumOutflowLat -= OutFlowLat;
		}
		
		[EventSubscribe("DoManagementCalculations")]
		private void OnDoManagementCalculations(object sender, EventArgs e)
		{
			FomN = MathUtilities.Sum(Soil.SoilNitrogen.FOMN);
			HumN = MathUtilities.Sum(Soil.SoilNitrogen.HumicN);
			BiomN = MathUtilities.Sum(Soil.SoilNitrogen.MicrobialN);
			AccumFert += Fert.NitrogenApplied;
			AccumIrrigation += Irrig.IrrigationApplied;
			
			
			AccumEO -= Soil.SoilWater.Eo;
			AccumES -= Soil.SoilWater.Es; 
			AccumDrainage -= Soil.SoilWater.Drainage;
			AccumRunoff -= Soil.SoilWater.Runoff;
			SWC = MathUtilities.Sum(Soil.SoilWater.SWmm);
			DUL = MathUtilities.Sum(Soil.SoilWater.DULmm);
		}
	}
}
```
              Operations Establishment
                1993-06-05  [Chicory].Sow(population:200, cultivar:"Puna", depth:10, rowSpacing:150);
                1993-07-15  [Fertiliser].Apply(10, Fertiliser.Types.NH4NO3N, 35)
                1993-09-15  [Defoliate].Script.Defoliate(defoliationType:"Cut",amountDM: 50, amountType:"ResidualDM", duration: 1)
              Operations Cuttings
              Manager Defoliate: same as Validation.New Zealand.ScottFarm.C17a.Field.Management.Defoliate
            MicroClimate: same as Validation.New Zealand.ScottFarm.C17a.Field.MicroClimate
            SurfaceOrganicMatter: PondActive=no; ReportAdditions=no; ReportRemovals=no; PoolName=grass; type=grass; mass=500; standing_fraction=0; cnr=40; CriticalResidueWeight=2000; OptimumDecompTemp=20; MaxCumulativeEOS=20; CNRatioDecompCoeff=0.277; CNRatioDecompThreshold=25; TotalLeachRain=25; MinRainToLeach=10; CriticalMinimumOrganicC=0.004; DefaultCPRatio=0; DefaultStandingFraction=0; StandingExtinctCoeff=0.5; FractionFaecesAdded=0.5
              Pools:
                {PoolName=grass, ResidueType=grass, Mass=500, CNRatio=40, StandingFraction=0}
              ResidueTypes: LoadFromResource=ResidueTypes
              TillageTypes TillageTypesList
            Irrigation
            Fertiliser
            Soil Ramsey: SoilType=Typic Hapludult (US); LocalName=Ramsey fine-loam; State=West Virginia; Country=USA; NaturalVegetation=Forest; Latitude=0; Longitude=0; Area=0; DataSource=National Cooperative Soil Survey, US
              Comments=Generic soil description based on data of the same sol type from different locations
              Analysis: PHUnits=Water; BoronUnits=HotWater
                Thickness  Rocks  PH  CEC  ParticleSizeSand  ParticleSizeSilt  ParticleSizeClay
                130        2      6   6    45                40                15
                240        3      6   4    60                30                10
                280        3      6   3    75                20                5
                250        8      6   3    80                15                5
                600        8      6   2    80                10                10
              Water
                Thickness  BD    AirDry  LL15   DUL    SAT    KS
                130        1.21  0.016   0.04   0.249  0.499  4800
                240        1.43  0.05    0.056  0.25   0.43   2400
                280        1.33  0.04    0.04   0.248  0.469  840
                250        1.5   0.045   0.045  0.212  0.354  1200
                600        1.5   0.045   0.045  0.212  0.354  2400
                SoilCrop ChicorySoil: LL=[0.04, 0.056, 0.04, 0.045, 0.045]; KL=[0.1, 0.1, 0.08, 0.06, 0.04]; XF=[1, 1, 1, 1, 1]
              SoilWater: SummerDate=21-Mar; SummerU=6; SummerCona=3.5; WinterDate=23-Sep; WinterU=6; WinterCona=2.5; DiffusConst=88; DiffusSlope=35; Salb=0.13; CN2Bare=73; CNRed=20; CNCov=0.8; max_pond=0; Thickness=[130, 240, 280, 250, 600]; SWCON=[0.6, 0.5, 0.3, 0.5, 0.5]; residueinterception=0
              SoilNitrogen: fom_type=[default, manure, mucuna, lablab, shemp, stable]; fract_carb=[0.2, 0.3, 0.54, 0.57, 0.45, 0]; fract_cell=[0.7, 0.3, 0.37, 0.37, 0.47, 0.1]; fract_lign=[0.1, 0.4, 0.09, 0.06, 0.08, 0.9]; wfpsN2N2O_x=[22, 88]; wfpsN2N2O_y=[0.1, 1]
              SoilOrganicMatter: RootCN=40; RootWt=1000; SoilCN=11; EnrACoeff=7.4; EnrBCoeff=0.2; OCUnits=Total
                Thickness  OC   FBiom  FInert
                130        3.5  0.03   0.4
                240        1    0.02   0.6
                280        0.5  0.01   0.75
                250        0.3  0.01   0.9
                600        0.1  0.01   0.99
              InitialWater Initial water: PercentMethod=EvenlyDistributed; FractionFull=0.95
              Sample Initial nitrogen: NO3Units=kgha; NH4Units=kgha; SWUnits=Volumetric; OCUnits=Total; PHUnits=Water
                Thickness  NO3  NH4
                130        20   2
                240        15   2
                280        10   1
                850        5    0.5
            Plant Chicory: CropType=Chicory
            Report: EventNames=[Clock].DoReport
              VariableNames:
                [Clock].Today as Date
                [ExtraVariables].Script.AccumPlantN
                [ExtraVariables].Script.AccumMineralisation
                [ExtraVariables].Script.AccumDenit
                [ExtraVariables].Script.AccumFert
                [ExtraVariables].Script.AccumLeach
                [ExtraVariables].Script.AccumDetach
                [ExtraVariables].Script.DeltaSoilOMN
                [ExtraVariables].Script.DeltaSurfaceOMN
                [ExtraVariables].Script.DeltaSoilMineralN
                [ExtraVariables].Script.SWC
                [ExtraVariables].Script.DUL
                [ExtraVariables].Script.OutFlowLat
                [ExtraVariables].Script.AccumEO
                [ExtraVariables].Script.AccumEP
                [ExtraVariables].Script.AccumES
                [ExtraVariables].Script.AccumDrainage
                [ExtraVariables].Script.AccumRunoff
                [ExtraVariables].Script.AccumRainfall
                [ExtraVariables].Script.AccumIrrigation
                [ExtraVariables].Script.AccumOutflowLat
                [ExtraVariables].Script.SoilWaterDeficit
                [ExtraVariables].Script.SoilNitrogenContent
                [ExtraVariables].Script.FomN
                [ExtraVariables].Script.HumN
                [ExtraVariables].Script.BiomN
                [ExtraVariables].Script.DltNMinRes
                [ExtraVariables].Script.DltNMinTot
                [MicroClimate].net_radn
                [MicroClimate].peta
                [MicroClimate].petr
                [Soil].SoilWater.Drainage
                [Soil].SoilWater.Runoff
                [Soil].SoilWater.Eo
                [Soil].SoilWater.Es
                [Soil].SoilWater.pond
                sum([Soil].SoilWater.SWmm) as ProfileWater
                sum([Soil].SoilNitrogen.urea) as ProfileUreaN
                sum([Soil].SoilNitrogen.NH4) as ProfileNH4N
                sum([Soil].SoilNitrogen.NO3) as ProfileNO3N
                sum([Soil].SoilNitrogen.FOMN) as ProfileFOMN
                sum([Soil].SoilNitrogen.MicrobialN) as ProfileBiomN
                sum([Soil].SoilNitrogen.HumicN) as ProfileHumN
                [SurfaceOrganicMatter].N
                [AutomaticIrrigation].Script.TopSWdeficit
                [AutomaticIrrigation].Script.TopSWC
                [AutomaticIrrigation].Script.AmountToApply
                [AutomaticIrrigation].Script.SeasonAppliedAmount
                [Irrigation].IrrigationApplied as Irrigation Applied (mm)
                [AutomaticFertiliser].Script.TopMineralN as TopMineralN
                [Fertiliser].NitrogenApplied as Nitrogen Applied
                [Defoliate].Script.PreHarvestDM
                [Defoliate].Script.PostHarvestDM
                [Defoliate].Script.DefoliatedDM as DefoliatedDM
                [Defoliate].Script.HarvestedDM as HarvestedDM
                [Defoliate].Script.RemovedDM
                [Defoliate].Script.DefoliatedN
                [Defoliate].Script.HarvestedN
                [Defoliate].Script.RemovedN
                [Defoliate].Script.NReturnedInDung
                [Defoliate].Script.NReturnedInUrine
                [Chicory].Population as Population
                [Chicory].Phenology.CurrentPhaseName
                [Chicory].Phenology.Stage
                [Chicory].Root.LengthDensity
                [Chicory].Arbitrator.DMSupply
                [Chicory].Arbitrator.DMDemand
                [Chicory].Arbitrator.DMAllocated
                [Chicory].Arbitrator.DMSinkLimitation
                [Chicory].Arbitrator.DMNutrientLimitation
                [Chicory].Arbitrator.FDM
                [Chicory].Arbitrator.NSupply
                [Chicory].Arbitrator.NDemand
                [Chicory].Arbitrator.NAllocated
                [Chicory].Arbitrator.FN
                [Chicory].Arbitrator.WSupply
                [Chicory].Arbitrator.WDemand
                [Chicory].Arbitrator.WAllocated
                [Chicory].Arbitrator.FW
                sum([Chicory].Arbitrator.PotentialNO3NUptake) as PotentialNO3NUptake
                sum([Chicory].Arbitrator.PotentialNH4NUptake) as PotentialNH4NUptake
                (sum([Chicory].Arbitrator.PotentialNO3NUptake)+sum([Chicory].Arbitrator.PotentialNH4NUptake)) as PotentialPlantAvailable
                [ExtraVariables].Script.ShootRootRatio as currentSR
                [Chicory].TargetShootRootRatio.Value
                [Chicory].AdjustedShootRootRatio.Value
                [Chicory].Total.Wt as Total Weight
                [Chicory].Total.N as Total N
                [Chicory].AboveGround.Wt as Above Ground Weight
                [Chicory].BelowGround.Wt as Below Ground Weight
                [Chicory].Leaf.Wt as Leaf Weight
                [Chicory].Leaf.Live.Wt as Leaf Live Weight
                [Chicory].Leaf.Live.N as Leaf Live N
                [Chicory].Leaf.Live.NConc as Leaf Live N Concentration
                [Chicory].Leaf.Dead.Wt as Leaf dead weight
                [Chicory].Leaf.CoverTotal as Leaf Total Cover
                [Chicory].Leaf.CoverDead as Leaf Dead Cover
                [Chicory].Leaf.LAI as LAI Green
                [Chicory].Leaf.LAIDead as LAI Dead
                [Chicory].Leaf.Height as Leaf Height
                [Chicory].Leaf.PotentialBiomass.Value as Leaf Potential Biomass
                [Chicory].Leaf.Transpiration as LeafTranspiration
                [Chicory].Leaf.Fw
                [Chicory].Leaf.Fn
                [Chicory].Stem.Live.Wt as Stem Live Weight
                [Chicory].Stem.Live.N as Stem Live N
                [Chicory].Stem.Live.NConc as Stem Live N Concentration
                [Chicory].Stem.Dead.Wt as Stem dead weight
                [Chicory].Inflorescence.Live.Wt as Inflorescence Live Weight
                [Chicory].Inflorescence.Live.N as Inflorescence Live N
                [Chicory].Inflorescence.Live.NConc as Inflorescence Live N Concentration
                [Chicory].Inflorescence.Dead.Wt as Inflorescence dead weight
                [Chicory].Taproot.Live.Wt as Taproot Live Weight
                [Chicory].Taproot.Live.N as Taproot Live N
                [Chicory].Taproot.Live.NConc as Taproot Live N Concentration
                [Chicory].Taproot.Dead.Wt as Taproot dead weight
                [Chicory].Root.Live.Wt as Fine roots live Weight
                [Chicory].Root.Live.N as Fine roots live N
                [Chicory].Root.Live.NConc as Root Live N Concentration
                [Chicory].Root.Dead.Wt as Fine roots dead weight
                [Chicory].Root.Depth as Root Depth
                [Chicory].Root.WaterDemand as WaterDemand
                [Chicory].Root.WaterUptake as WaterUptake
                [Chicory].Leaf.Live.StructuralWt
                [Chicory].Leaf.Live.NonStructuralWt
                [Chicory].Leaf.Live.StructuralN
                [Chicory].Leaf.Live.NonStructuralN
                [Chicory].Stem.Live.StructuralWt
                [Chicory].Stem.Live.NonStructuralWt
                [Chicory].Stem.Live.StructuralN
                [Chicory].Stem.Live.NonStructuralN
                [Chicory].Inflorescence.Live.StructuralWt
                [Chicory].Inflorescence.Live.NonStructuralWt
                [Chicory].Inflorescence.Live.StructuralN
                [Chicory].Inflorescence.Live.NonStructuralN
                [Chicory].Root.Live.StructuralWt
                [Chicory].Root.Live.NonStructuralWt
                [Chicory].Root.Live.StructuralN
                [Chicory].Root.Live.NonStructuralN
                [Chicory].Taproot.Live.StructuralWt
                [Chicory].Taproot.Live.NonStructuralWt
                [Chicory].Taproot.Live.StructuralN
                [Chicory].Taproot.Live.NonStructuralN
                [Chicory].Leaf.Live.StructuralNConc
                [Chicory].Leaf.Live.NonStructuralNConc
                [Chicory].Root.Live.StructuralNConc
                [Chicory].Root.Live.NonStructuralNConc
                [Chicory].Phenology.Vernalisation.DaysVernalised as DaysVernalised
                [Chicory].Leaf.DMDemandFunction.PartitionFraction.Value as LeafFraction
                [Chicory].Stem.DMDemandFunction.PartitionFraction.Value as StemFraction
                [Chicory].Inflorescence.DMDemandFunction.PartitionFraction.Value as InflorescenceFraction
                [Chicory].Root.PartitionFraction.Value as FineRootFraction
                [Chicory].Taproot.DMDemandFunction.PartitionFraction.Value as TaprootFraction
      Experiment AFSRC_02
        Memo
          Data adapted from Belesky, D. P., K. E. Turner, et al. (2000). "Influence of nitrogen on productivity and nutritive value of forage chicory." Agronomy Journal 92(3): 472-478.

          This was a field experiment for 3 yr on a Ramsey soil (loamy, siliceous, subactive, mesic Lithic Dystrudept) in southern West Virginia to determine if fertilizer N influenced forage chicory nutritive value and NO3-N concentration. Each N rate (0, 80, 160, 240, or 480 kg N ha-1) was replicated three times in a randomized block design. Swards were clipped at 6-wk intervals during the growing season.

          Met data for this location was obtained from NOAA. The data set was largely complete except for solar radiation, which was added from an alternative interpolated set for this location, also from NOAA.

          Information to construct the soil data was obtained from USGS.
        Factors
          Factor NRate: Specifications=[FertiliserSchedule]
            Operations 0N
            Operations 80N
              1994-04-15  [Fertiliser].Apply(10, Fertiliser.Types.NH4NO3N, 80)
              1995-04-15  [Fertiliser].Apply(10, Fertiliser.Types.NH4NO3N, 80)
            Operations 160N
              1994-04-15  [Fertiliser].Apply(10, Fertiliser.Types.NH4NO3N, 160)
              1995-04-15  [Fertiliser].Apply(10, Fertiliser.Types.NH4NO3N, 160)
            Operations 240N
              1994-04-15  [Fertiliser].Apply(10, Fertiliser.Types.NH4NO3N, 240)
              1995-04-15  [Fertiliser].Apply(10, Fertiliser.Types.NH4NO3N, 240)
            Operations 480N
              1994-04-15  [Fertiliser].Apply(10, Fertiliser.Types.NH4NO3N, 480)
              1995-04-15  [Fertiliser].Apply(10, Fertiliser.Types.NH4NO3N, 480)
        Simulation AFSRC_02
          Clock: StartDate=1993-05-01; EndDate=1995-12-31
          Weather: FileName=%root%\Prototypes\Chicory\Beckley.met
          Summary
          SoilArbitrator Soil Arbitrator
          Zone Field: Area=1; Slope=0
            Folder Management
              Manager ExtraVariables: same as Validation.USA.AFSRC_01.AFSRC_01.Field.Management.ExtraVariables
              Operations Establishment
                1993-06-10  [Chicory].Sow(population:200, cultivar:"Puna", depth:10, rowSpacing:150);
                1993-07-20  [Fertiliser].Apply(10, Fertiliser.Types.NH4NO3N, 35)
                1993-09-25  [Defoliate].Script.Defoliate(defoliationType:"Cut",amountDM: 50, amountType:"ResidualDM", duration: 1)
              Operations Cuttings
                1994-07-01  [Defoliate].Script.Defoliate(defoliationType:"Cut",amountDM: 40, amountType:"ResidualDM", duration: 1)
                1994-08-07  [Defoliate].Script.Defoliate(defoliationType:"Cut",amountDM: 40, amountType:"ResidualDM", duration: 1)
                1994-09-24  [Defoliate].Script.Defoliate(defoliationType:"Cut",amountDM: 40, amountType:"ResidualDM", duration: 1)
                1995-05-26  [Defoliate].Script.Defoliate(defoliationType:"Cut",amountDM: 40, amountType:"ResidualDM", duration: 1)
                1995-07-01  [Defoliate].Script.Defoliate(defoliationType:"Cut",amountDM: 40, amountType:"ResidualDM", duration: 1)
                1995-08-07  [Defoliate].Script.Defoliate(defoliationType:"Cut",amountDM: 40, amountType:"ResidualDM", duration: 1)
                1995-09-24  [Defoliate].Script.Defoliate(defoliationType:"Cut",amountDM: 40, amountType:"ResidualDM", duration: 1)
              Operations FertiliserSchedule
              Manager Defoliate: same as Validation.New Zealand.ScottFarm.C17a.Field.Management.Defoliate
            MicroClimate: same as Validation.New Zealand.ScottFarm.C17a.Field.MicroClimate
            SurfaceOrganicMatter: same as Validation.USA.AFSRC_01.AFSRC_01.Field.SurfaceOrganicMatter
            Irrigation
            Fertiliser
            Soil Ramsey: same as Validation.USA.AFSRC_01.AFSRC_01.Field.Ramsey
            Plant Chicory: CropType=Chicory
            Report: same as Validation.USA.AFSRC_01.AFSRC_01.Field.Report
      Experiment AFSRC_03
        Memo
          Data from Clapham, W. M., J. M. Fedders, et al. (2001). "Developmental dynamics of forage chicory." Agronomy Journal 93(2): 443-450.

          Development of uncut Puna chicory was studied in southern West Virginia on previously established plots at the Scott Farm in 1997 and 1998 and on 1-yr-old plantings at the Plumley Farm in 1998 and 1999.
        Factors
          Factor NRate: Specifications=[FertiliserSchedule]
            Operations Fert
              1996-04-15  [Fertiliser].Apply(10, Fertiliser.Types.NH4NO3N, 35)
              1997-04-15  [Fertiliser].Apply(10, Fertiliser.Types.NH4NO3N, 35)
              1998-04-15  [Fertiliser].Apply(10, Fertiliser.Types.NH4NO3N, 35)
        Simulation AFSRC_03
          Clock: StartDate=1995-05-01; EndDate=1998-12-31
          Weather: FileName=%root%\Prototypes\Chicory\Beckley.met
          Summary
          SoilArbitrator Soil Arbitrator
          Zone Field: Area=1; Slope=0
            Folder Management
              Manager ExtraVariables: same as Validation.USA.AFSRC_01.AFSRC_01.Field.Management.ExtraVariables
              Operations Establishment
                1995-06-10  [Chicory].Sow(population:200, cultivar:"Puna", depth:10, rowSpacing:150);
                1995-07-20  [Fertiliser].Apply(10, Fertiliser.Types.NH4NO3N, 35)
                1995-09-25  [Defoliate].Script.Defoliate(defoliationType:"Cut",amountDM: 50, amountType:"ResidualDM", duration: 1)
              Operations Cuttings
                1996-05-26  [Defoliate].Script.Defoliate(defoliationType:"Cut",amountDM: 40, amountType:"ResidualDM", duration: 1)
                1996-07-01  [Defoliate].Script.Defoliate(defoliationType:"Cut",amountDM: 40, amountType:"ResidualDM", duration: 1)
                1996-08-07  [Defoliate].Script.Defoliate(defoliationType:"Cut",amountDM: 40, amountType:"ResidualDM", duration: 1)
                1996-09-24  [Defoliate].Script.Defoliate(defoliationType:"Cut",amountDM: 40, amountType:"ResidualDM", duration: 1)
              Operations FertiliserSchedule
              Manager Defoliate: same as Validation.New Zealand.ScottFarm.C17a.Field.Management.Defoliate
            MicroClimate: same as Validation.New Zealand.ScottFarm.C17a.Field.MicroClimate
            SurfaceOrganicMatter: same as Validation.USA.AFSRC_01.AFSRC_01.Field.SurfaceOrganicMatter
            Irrigation
            Fertiliser
            Soil Ramsey: same as Validation.USA.AFSRC_01.AFSRC_01.Field.Ramsey
            Plant Chicory: CropType=Chicory
            Report: same as Validation.USA.AFSRC_01.AFSRC_01.Field.Report
  Folder Sensibility
    Simulation Base
      Clock: StartDate=2008-07-01; EndDate=2010-06-30
      Weather: FileName=%root%\Prototypes\Chicory\Ruakura.met
      Summary
      SoilArbitrator Soil Arbitrator
      Zone Field: Area=1; Slope=0
        Folder Management
          Manager AutomaticFertiliser
            allowFertiliser = yes
            fertTarget = 100
            fertCritical = 20
            depthN = 500
            fertMinDays = 30
```csharp
using System;
using Models.Core;
using Models.PMF;
using Models.Soils;
using APSIM.Shared.Utilities;
using System.Xml.Serialization;

namespace Models
{
	[Serializable]
	public class Script : Model
	{
		[Link] Clock Clock;
		[Link] Fertiliser fertiliser;
		[Link] ISummary summary = null;
		[Link] Soil Soil;

		//User inputs from properties tab
		[Description("Turn ferliser applications on?")]
		public answerType allowFertiliser { get; set; }

		[Description("Target amount of NO3 in top soil (kgN/ha)")]
		public double fertTarget { get; set; }

		[Description("Minimal amount of NO3 in top soil (kgN/ha)")]
		public double fertCritical { get; set; }
		
		[Description("Depth to calculate available N (mm)")]
		public double depthN { get; set; }

		[Description("Minimum period between applications (days)")]
		public double fertMinDays { get; set; }
	   
		public enum answerType
		{
			/// <summary>a positive answer</summary>
			yes,
			/// <summary>a negative answer</summary>
			no
		}

		[XmlIgnore] public double TopMineralN { get; set; }
		
		private DateTime lastApplicationDate;
		private bool fertiliserIsAllowed;
		private int nLayers;

		[EventSubscribe("StartOfSimulation")]
		private void OnStartOfSimulation(object sender, EventArgs e)
		{
			fertiliserIsAllowed = (allowFertiliser == answerType.yes);
			nLayers = Soil.SoilWater.Thickness.Length;
		}

		[EventSubscribe("DoManagement")]
		private void OnDoManagement(object sender, EventArgs e)
		{
			double daysSinceLastApplication = (Clock.Today - lastApplicationDate).TotalDays;
			double depthFromSurface = 0.0;
			double fracLayer = 0.0;
			TopMineralN = 0.0;
			for (int layer = 0; layer < nLayers; layer++)
			{
				fracLayer = Math.Min(1.0, (depthN - depthFromSurface) / Soil.SoilWater.Thickness[layer]);
				TopMineralN += (Soil.SoilNitrogen.NO3[layer] + Soil.SoilNitrogen.NH4[layer]) * fracLayer;
				depthFromSurface += Soil.SoilWater.Thickness[layer];
				if (depthFromSurface >= depthN)
					layer = nLayers;
			}

			
			if (fertiliserIsAllowed && (daysSinceLastApplication >= fertMinDays))
			{			
				if (TopMineralN < fertCritical)
				{
					double nDeficit = fertTarget - TopMineralN;				
					fertiliser.Apply(nDeficit, Fertiliser.Types.UreaN, 1);
					lastApplicationDate = Clock.Today;
					//summary.WriteMessage(this, "Applied " + nDeficit + " (was " + NO3_available.ToString() + ")");
				}
			}
		}
	}
}
```
          Manager AutomaticIrrigation
            allowIrrigation = yes
            seasonStart = 15-Sep
            seasonEnd = 30-May
            seasonsAllocation = 10000
            triggerDeficit = 90
            targetDeficit = 99
            returndays = 1
            maximumAmount = 30
            depthPAWC = 300
            script: same as in Validation.New Zealand.ScottFarm.C17a.Field.Management.AutomaticIrrigation
          Manager ExtraVariables
```csharp
using System;
using Models.Core;
using System.Collections.Generic;
using System.Text;
using Models.Soils;
using Models.PMF;
using Models;
using System.Xml.Serialization;
using APSIM.Shared.Utilities;

namespace Models
{
	[Serializable] 
	public class Script : Model
	{
		[Link] Clock Clock;
		[Link] Soils.Soil Soil;
		[Link] Models.SurfaceOM.SurfaceOrganicMatter SOM;
		[Link] Weather Met;
		[Link] Fertiliser Fert;
		[Link] Irrigation Irrig;
		[Link] Plant Chicory;
		[Link] Zone zone;
		[Link] ISummary summary;
		
		[XmlIgnore] public bool InitialDay { get; set; }
		
		[XmlIgnore] public double AccumPlantN { get; set; }
		[XmlIgnore] public double AccumMineralisation { get; set; }
		[XmlIgnore] public double AccumDenit { get; set; }
		[XmlIgnore] public double AccumFert { get; set; }
		[XmlIgnore] public double AccumLeach { get; set; }
		[XmlIgnore] public double AccumDetach { get; set; }
		[XmlIgnore] public double DeltaSoilOMN { get; set; }
		[XmlIgnore] public double DeltaSurfaceOMN { get; set; }
		[XmlIgnore] public double DeltaSoilMineralN { get; set; }
		[XmlIgnore] public double SoilNitrogenContent { get; set; }
		
		[XmlIgnore] public double AccumEO { get; set; }
		[XmlIgnore] public double AccumEP { get; set; }
		[XmlIgnore] public double AccumES { get; set; }
		[XmlIgnore] public double AccumDrainage { get; set; }
		[XmlIgnore] public double AccumRunoff { get; set; }
		[XmlIgnore] public double AccumOutflowLat { get; set; }
		[XmlIgnore] public double AccumIrrigation { get; set; }
		[XmlIgnore] public double AccumRainfall { get; set; }
		[XmlIgnore] public double SoilWaterDeficit { get; set; }
	
		[XmlIgnore] public double  InitialSoilOMN { get; set; }
		[XmlIgnore] public double  InitialSurfaceOMN { get; set; }
		[XmlIgnore] public double  InitialMineralN { get; set; }
		
		[XmlIgnore] public double SWC { get; set; }
		[XmlIgnore] public double DUL { get; set; }
		[XmlIgnore] public double OutFlowLat { get; set; }

		[XmlIgnore] public double FomN { get; set; }
		[XmlIgnore] public double BiomN { get; set; }
		[XmlIgnore] public double HumN { get; set; }
		[XmlIgnore] public double OrganicN { get; set; }
		[XmlIgnore] public double NO3N { get; set; }
		[XmlIgnore] public double NH4N { get; set; }
		[XmlIgnore] public double UreaN { get; set; }
		[XmlIgnore] public double MineralN { get; set; }
		[XmlIgnore] public double DltNMinRes { get; set; }
		[XmlIgnore] public double DltNMinTot { get; set; }


		[XmlIgnore] public double ShootRootRatio { get; set; }

		[XmlIgnore] public double Leaf_DMSupply { get; set; }
		[XmlIgnore] public double Stem_DMSupply { get; set; }
		[XmlIgnore] public double Inflorescence_DMSupply { get; set; }
		[XmlIgnore] public double Root_DMSupply { get; set; }
		[XmlIgnore] public double Taproot_DMSupply { get; set; }
		[XmlIgnore] public double Leaf_DMDemand { get; set; }
		[XmlIgnore] public double Stem_DMDemand { get; set; }
		[XmlIgnore] public double Inflorescence_DMDemand { get; set; }
		[XmlIgnore] public double Root_DMDemand { get; set; }
		[XmlIgnore] public double Taproot_DMDemand { get; set; }
		[XmlIgnore] public double Root_NSupply { get; set; }

		[XmlIgnore] public double Leaf_NSupplyReallocation { get; set; }
		[XmlIgnore] public double Stem_NSupplyReallocation { get; set; }
		[XmlIgnore] public double Root_NSupplyReallocation { get; set; }

		[EventSubscribe("Commencing")]
		private void OnSimulationCommencing(object sender, EventArgs e)
		{
			InitialDay = true;
		}
		
		[EventSubscribe("DoManagement")]
		private void OnDoManagement(object sender, EventArgs e)
		{
			//!!!!!! Nitrogen balance components !!!!!!
			//!!!!!!^^^^^^^^^^^^^^^^^^^^^^^^^^^^^!!!!!!
			FomN = MathUtilities.Sum(Soil.SoilNitrogen.FOMN);
			HumN = MathUtilities.Sum(Soil.SoilNitrogen.HumicN);
			BiomN = MathUtilities.Sum(Soil.SoilNitrogen.MicrobialN);
			OrganicN = FomN + HumN + BiomN;
			NO3N = MathUtilities.Sum(Soil.NO3N);
			NH4N = MathUtilities.Sum(Soil.NH4N);
			UreaN = MathUtilities.Sum(Soil.SoilNitrogen.urea);
			MineralN = NO3N + NH4N + UreaN; 
			DltNMinRes = MathUtilities.Sum(Soil.SoilNitrogen.dlt_n_min_res);
			DltNMinTot = MathUtilities.Sum(Soil.SoilNitrogen.MineralisedN);
			int layers = Soil.Thickness.Length;
			if (InitialDay == true)
			{
				InitialSurfaceOMN = SOM.N;
				InitialSoilOMN = OrganicN;
				InitialMineralN = MineralN;
				InitialDay = false;
			}
			DeltaSurfaceOMN = SOM.N - InitialSurfaceOMN;
			AccumLeach = AccumLeach - Soil.SoilWater.LeachNH4 - Soil.SoilWater.LeachNO3 - Soil.SoilWater.LeachUrea; //Fails
			AccumMineralisation += MathUtilities.Sum(Soil.SoilNitrogen.MineralisedN);
			AccumDenit -= MathUtilities.Sum(Soil.SoilNitrogen.Denitrification);
			AccumPlantN -= (double)zone.Get("Chicory.Root.NUptake");
			DeltaSoilOMN = OrganicN - InitialSoilOMN;
			DeltaSoilMineralN = MineralN - InitialMineralN;
			SoilNitrogenContent = MineralN;
			
			//!!!!!! Water balance components !!!!!!
			//!!!!!!^^^^^^^^^^^^^^^^^^^^^^^^^^!!!!!!

			AccumRainfall += Met.Rain;
			//AccumEP -= (double)zone.Get("[Chicory].Leaf.Transpiration");
			AccumEP -= (double)zone.Get("Chicory.Root.WaterUptake");
			SoilWaterDeficit = (SWC - DUL);
			double OutFlowLat = MathUtilities.Sum(Soil.SoilWater.outflow_lat);
			AccumOutflowLat -= OutFlowLat;
			
			
			//!!!!!! Plant DM components !!!!!!
			//!!!!!!^^^^^^^^^^^^^^^^^^^^^^^^^^!!!!!!
			ShootRootRatio = MathUtilities.Divide((double)zone.Get("Chicory.AboveGroundLive.Wt"), (double)zone.Get("Chicory.BelowGroundLive.Wt"), 0.0);
			PMF.Interfaces.BiomassSupplyType Leaf_DMSupplies = (PMF.Interfaces.BiomassSupplyType)zone.Get("Chicory.Leaf.DMSupply");
			PMF.Interfaces.BiomassSupplyType Stem_DMSupplies = (PMF.Interfaces.BiomassSupplyType)zone.Get("Chicory.Stem.DMSupply");
			PMF.Interfaces.BiomassSupplyType Inflorescence_DMSupplies = (PMF.Interfaces.BiomassSupplyType)zone.Get("Chicory.Inflorescence.DMSupply");
			PMF.Interfaces.BiomassSupplyType Root_DMSupplies = (PMF.Interfaces.BiomassSupplyType)zone.Get("Chicory.Root.DMSupply");
			PMF.Interfaces.BiomassSupplyType Taproot_DMSupplies = (PMF.Interfaces.BiomassSupplyType)zone.Get("Chicory.Taproot.DMSupply");
			PMF.Interfaces.BiomassPoolType Leaf_DMDemands = (PMF.Interfaces.BiomassPoolType)zone.Get("Chicory.Leaf.DMDemand");
			PMF.Interfaces.BiomassPoolType Stem_DMDemands = (PMF.Interfaces.BiomassPoolType)zone.Get("Chicory.Stem.DMDemand");
			PMF.Interfaces.BiomassPoolType Inflorescence_DMDemands = (PMF.Interfaces.BiomassPoolType)zone.Get("Chicory.Inflorescence.DMDemand");
			PMF.Interfaces.BiomassPoolType Root_DMDemands = (PMF.Interfaces.BiomassPoolType)zone.Get("Chicory.Root.DMDemand");
			PMF.Interfaces.BiomassPoolType Taproot_DMDemands = (PMF.Interfaces.BiomassPoolType)zone.Get("Chicory.Taproot.DMDemand");

			PMF.Interfaces.BiomassSupplyType Leaf_NSupplies = (PMF.Interfaces.BiomassSupplyType)zone.Get("Chicory.Leaf.NSupply");
			PMF.Interfaces.BiomassSupplyType Stem_NSupplies = (PMF.Interfaces.BiomassSupplyType)zone.Get("Chicory.Stem.NSupply");
			PMF.Interfaces.BiomassSupplyType Root_NSupplies = (PMF.Interfaces.BiomassSupplyType)zone.Get("Chicory.Root.NSupply");
			
			Leaf_DMSupply = Leaf_DMSupplies.Fixation + Leaf_DMSupplies.Uptake + Leaf_DMSupplies.Reallocation + Leaf_DMSupplies.Retranslocation;
			Stem_DMSupply = Stem_DMSupplies.Fixation + Stem_DMSupplies.Uptake + Stem_DMSupplies.Reallocation + Stem_DMSupplies.Retranslocation;
			Inflorescence_DMSupply = Inflorescence_DMSupplies.Fixation + Inflorescence_DMSupplies.Uptake + Inflorescence_DMSupplies.Reallocation + Inflorescence_DMSupplies.Retranslocation;
			Root_DMSupply = Root_DMSupplies.Fixation + Root_DMSupplies.Uptake + Root_DMSupplies.Reallocation + Root_DMSupplies.Retranslocation;
			Taproot_DMSupply = Taproot_DMSupplies.Fixation + Taproot_DMSupplies.Uptake + Taproot_DMSupplies.Reallocation + Taproot_DMSupplies.Retranslocation;
			Leaf_DMDemand = Leaf_DMDemands.Structural + Leaf_DMDemands.NonStructural + Leaf_DMDemands.Metabolic;
			Stem_DMDemand = Stem_DMDemands.Structural + Stem_DMDemands.NonStructural + Stem_DMDemands.Metabolic;
			Inflorescence_DMDemand = Inflorescence_DMDemands.Structural + Inflorescence_DMDemands.NonStructural + Inflorescence_DMDemands.Metabolic;
			Root_DMDemand = Root_DMDemands.Structural + Root_DMDemands.NonStructural + Root_DMDemands.Metabolic;
			Taproot_DMDemand = Taproot_DMDemands.Structural + Taproot_DMDemands.NonStructural + Taproot_DMDemands.Metabolic;
			Root_NSupply = Root_NSupplies.Fixation + Root_NSupplies.Uptake + Root_NSupplies.Reallocation + Root_NSupplies.Retranslocation;

			Leaf_NSupplyReallocation = Leaf_NSupplies.Reallocation;
			Stem_NSupplyReallocation = Stem_NSupplies.Reallocation;
			Root_NSupplyReallocation = Root_NSupplies.Reallocation;
			
			summary.WriteMessage(this, "   Root.Fixation: " + Root_NSupplies.Fixation.ToString());
			summary.WriteMessage(this, "   Root.Uptake: " + Root_NSupplies.Uptake.ToString());
			summary.WriteMessage(this, "   Root.Reallocation: " + Root_NSupplies.Reallocation.ToString());
			summary.WriteMessage(this, "   Root.Retranslocation: " + Root_NSupplies.Retranslocation.ToString());
			summary.WriteMessage(this, "   Stem.Fixation: " + Stem_NSupplies.Fixation.ToString());
			summary.WriteMessage(this, "   Stem.Uptake: " + Stem_NSupplies.Uptake.ToString());
			summary.WriteMessage(this, "   Stem.Reallocation: " + Stem_NSupplies.Reallocation.ToString());
			summary.WriteMessage(this, "   Stem.Retranslocation: " + Stem_NSupplies.Retranslocation.ToString());
		}
		
		[EventSubscribe("DoManagementCalculations")]
		private void OnDoManagementCalculations(object sender, EventArgs e)
		{
			FomN = MathUtilities.Sum(Soil.SoilNitrogen.FOMN);
			HumN = MathUtilities.Sum(Soil.SoilNitrogen.HumicN);
			BiomN = MathUtilities.Sum(Soil.SoilNitrogen.MicrobialN);
			AccumFert += Fert.NitrogenApplied;
			AccumIrrigation += Irrig.IrrigationApplied;
			
			
			AccumEO -= Soil.SoilWater.Eo;
			AccumES -= Soil.SoilWater.Es; 
			AccumDrainage -= Soil.SoilWater.Drainage;
			AccumRunoff -= Soil.SoilWater.Runoff;
			SWC = MathUtilities.Sum(Soil.SoilWater.SWmm);
			DUL = MathUtilities.Sum(Soil.SoilWater.DULmm);
		}
	}
}
```
          Operations Sowing
            2008-10-15  [Chicory].Sow(population:200, cultivar:"Choice", depth:10, rowSpacing:150);
          Manager MyDefoliate
            Crop = Chicory
            cutPasture_StartDate = 2008-05-20
            cutPasture_EndDate = 2100-12-31
            defoliateType = Graze
            interval2Cut = 21
            durationOfCut = 3
            removeAmountType = ResidualDM
            herbageAmount = 500
            fracDM2Remove = 0.7
            fracN2Remove = 0.25
            urineDepth = 10
            fracN2Dung = 0.4
            fracPopDecline = 0.01
```csharp
// Defoliates on a regular cycle or one-off via a schedule
// currenty defoliates by the amount specified spread evenly over the specified period

using System;
using Models.Core;
using System.Collections.Generic;
using System.Text;
using Models;
using Models.Soils;
using Models.PMF;
using System.Xml.Serialization;
using APSIM.Shared.Utilities;

namespace Models
{
	[Serializable]
	public class Script : Model
	{
		[Link] Zone zone;
		[Link] Clock Clock;
		[Link] Plant Chicory;
		[Link] Fertiliser fertiliser;
		[Link] ISummary summary = null;

		[Description("Choose the crop to harvest:")]
		public ICrop Crop { get; set; }

		[Description("Enter the date to start the rotation (dd/mm/yyyy):")]
		public DateTime cutPasture_StartDate { get; set; }

		[Description("Enter the date to end the rotation (dd/mm/yyyy):")]
		public DateTime cutPasture_EndDate { get; set; }

		[Description("Select type of defoliation:")]
		public defoliationTypes defoliateType { get; set; }

		[Description("Enter the interval between defoliations (days):")]
		public int interval2Cut { get; set; }

		[Description("Enter the number of days to defoliate over (days):")]
		public int durationOfCut { get; set; }

		[Description("Choose what amount is being defined:")]
		public removeAmountTypes removeAmountType { get; set; }

		[Description("Enter the amount to use (kgDM/ha):")]
		public double herbageAmount { get; set; }

		[Description("Enter the fraction of DM that is removed from the field (0-1):")]
		public double fracDM2Remove { get; set; }

		[Description("Enter the fraction of N that is removed from the field (0-1):")]
		public double fracN2Remove { get; set; }

		[Description("Enter the depth down to which urine will applied (mm):")]
		public double urineDepth { get; set; }

		[Description("Enter the proportion of N returned in dung (0-1):")]
		public double fracN2Dung { get; set; }

		[Description("Enter the fraction of population decline due to defoliation (0-1):")]
		public double fracPopDecline { get; set; }

		//fraction of each plant part returned as residue (0-1), this is wastage
		private double leafResidueFrac = 0.01;
		private double stemResidueFrac = 0.01;
		private double flowerResidueFrac = 0.01;

		//Outputs
		//Pasture DM defoliated today (kg/ha)
		[XmlIgnore] public double DefoliatedDM{ get; set; }
		//N defoliate today
		[XmlIgnore] public double DefoliatedN{ get; set; }
		//Pasture DM harvested today (kg/ha)
		[XmlIgnore] public double HarvestedDM{ get; set; }
		//N harvested today
		[XmlIgnore] public double HarvestedN{ get; set; }
		//DM removed from the paddock
		[XmlIgnore] public double RemovedDM{ get; set; }
		//N removed from the paddock
		[XmlIgnore] public double RemovedN{ get; set; }
		//DM returned to the paddock
		[XmlIgnore] public double ReturnedDM{ get; set; }
		//N returned to the paddock
		[XmlIgnore] public double ReturnedN{ get; set; }
		//N returned as dung (SurfaceOM)
		[XmlIgnore] public double NReturnedInDung{ get; set; }
		//N returned as urine (urea)
		[XmlIgnore] public double NReturnedInUrine{ get; set; }
		//Number of days after last harvest
		[XmlIgnore] public int DaysAfterCut{ get; set; }
		//Total standing DM (Leaf + Stem/Sheath) before cut
		[XmlIgnore] public double PreHarvestDM{ get; set; }
		//Total standing DM (Leaf + Stem/Sheath) after cut
		[XmlIgnore] public double PostHarvestDM{ get; set; }

		//Internal variables
		private RemovalFractions removalFractions;
		//The fraction of urine to be applied in each layer
		private double[] FracLayer;
		// total herbage to remove in g/m2 per day
		private double herbageToRemove;
		// counter
		private int daysCutting = 0;
		// type of defoliation (Cut or Graze)
		private string defoliationType;
		// type of DM amount (ResidualDM or DMToRemove)
		private string amountType;
		// auxiliary
		private bool aCutHasHappened = false;

		// event to add residue / dung to surface OM
		public event BiomassRemovedDelegate BiomassRemoved;

		[EventSubscribe("Commencing")]
		private void OnSimulationCommencing(object sender, EventArgs e)
		{
			removalFractions = new RemovalFractions();
			DaysAfterCut = 0;
			resetVariables();
			if (defoliateType == defoliationTypes.Cut)
				defoliationType = "Cut";
			else
				defoliationType = "Graze";

			if (removeAmountType == removeAmountTypes.ResidualDM)
				amountType = "ResidualDM";
			else
				amountType = "DMToRemove";

			// make sure that rotation start when startDate<simulationStartDay
			if ((Clock.Today > cutPasture_StartDate) && (Clock.Today < cutPasture_EndDate))
				cutPasture_StartDate = Clock.Today;
		}

		[EventSubscribe("DoManagement")]
		private void OnDoManagement(object sender, EventArgs e)
		{
			if (Clock.Today == cutPasture_StartDate)
				DaysAfterCut = interval2Cut;

			if ((Clock.Today >= cutPasture_StartDate) && (Clock.Today <= cutPasture_EndDate))
			{
				// Check whether we should start cutting
				if ((Chicory.IsEmerged) && (DaysAfterCut > 0) && (DaysAfterCut == interval2Cut))
				{
					Defoliate(defoliationType, herbageAmount * 0.1, amountType, durationOfCut);
				}
			}

			// Check whether we need to continue cutting
			if ((daysCutting > 0) && (daysCutting < durationOfCut))
			{
				// reset outputs
				resetVariables();

				removeDM(herbageToRemove, defoliationType);
				returnExcreta();
				daysCutting += 1;
			}

			// reset outputs
			if (daysCutting < 0)
			{
				resetVariables();
				daysCutting = 0;
			}
		}

		[EventSubscribe("DoManagementCalculations")]
		private void OnDoManagementCalculations(object sender, EventArgs e)
		{
			if (daysCutting == durationOfCut)
			{
				PostHarvestDM = (double)zone.Get("Chicory.AboveGround.Wt");
				aCutHasHappened = true;
				daysCutting = -1;
				Chicory.Population = Chicory.Population * (1.0 - fracPopDecline);
			}

			if (aCutHasHappened && (daysCutting == 0))
				DaysAfterCut += 1;
		}

		public enum removeAmountTypes
		{
			/// <summary>Setting DM amount to remove</summary>
			DMToRemove,
			/// <summary>Setting residual DM amount</summary>
			ResidualDM
		}

		public enum defoliationTypes
		{
			/// <summary>Cut</summary>
			Cut,
			/// <summary>Graze</summary>
			Graze
		}

		// resets the values of all outputs
		private void resetVariables()
		{
			//PreHarvestDM = 0.0;
			//PostHarvestDM = 0.0;
			DefoliatedDM = 0.0;
			DefoliatedN = 0.0;
			HarvestedDM = 0.0;
			HarvestedN = 0.0;
			RemovedDM = 0.0;
			RemovedN = 0.0;
			ReturnedDM = 0.0;
			ReturnedN = 0.0;
			NReturnedInDung = 0.0;
			NReturnedInUrine = 0.0;
		}

		// Perform the basic calculations for defoliation
		public void Defoliate(string defoliationType, double amountDM, string amountType, int duration)
		{
			// get the existing plant amount
			PreHarvestDM = (double)zone.Get("Chicory.AboveGround.Wt");

			if ((amountType == "DMToRemove") && (PreHarvestDM >= amountDM / duration))
			{
				summary.WriteMessage(this, "   Defoliating " + (10 * amountDM).ToString("#0.0") + "kg/ha over " + duration + " days");
				herbageToRemove = amountDM / duration;
			}
			else if ((amountType == "ResidualDM") && (PreHarvestDM >= amountDM))
			{
				summary.WriteMessage(this, "   Defoliating down to approximately " + (10 * amountDM).ToString("#0.0") + "kg/ha over " + duration + " days");
				herbageToRemove = (PreHarvestDM - amountDM) / duration;
			}
			else
			{
				summary.WriteMessage(this, "   Defoliation will not happend because there is not enough plant material");
				return;
			}

			durationOfCut = duration;
			// first defoliation
			removeDM(herbageToRemove, defoliationType);
			returnExcreta();
			daysCutting += 1;
			DaysAfterCut = 0;
		}

		private void removeDM(double removeAmount, string removeType)
		{
			// get the existing biomass
			double leafLiveWt = (double)zone.Get("Chicory.Leaf.Live.Wt");
			double stemLiveWt = (double)zone.Get("Chicory.Stem.Live.Wt");
			double flowerLiveWt = (double)zone.Get("Chicory.Inflorescence.Live.Wt");
			double leafDeadWt = (double)zone.Get("Chicory.Leaf.Dead.Wt");
			double stemDeadWt = (double)zone.Get("Chicory.Stem.Dead.Wt");
			double flowerDeadWt = (double)zone.Get("Chicory.Inflorescence.Dead.Wt");
			double leafLiveN = (double)zone.Get("Chicory.Leaf.Live.N");
			double stemLiveN = (double)zone.Get("Chicory.Stem.Live.N");
			double flowerLiveN = (double)zone.Get("Chicory.Inflorescence.Live.N");
			double leafDeadN = (double)zone.Get("Chicory.Leaf.Dead.N");
			double stemDeadN = (double)zone.Get("Chicory.Stem.Dead.N");
			double flowerDeadN = (double)zone.Get("Chicory.Inflorescence.Dead.N");

			double existingWt = leafLiveWt + leafDeadWt + stemLiveWt + stemDeadWt + flowerLiveWt + flowerDeadWt;


			// Can we harvest anything?
			if (existingWt >= removeAmount)
			{
				// get the fraction to remove for each organ (will override the default values)
				// the default is [Chicory].Leaf.BiomassRemovalDefaults.Cut.FractionLiveToRemove, or equivalent
				double leafFracToRemove = removeAmount / existingWt;
				double stemFracToRemove = leafFracToRemove;
				double flowerFracToRemove = leafFracToRemove;
				//double leafFracToRemove = removeAmount * (leafLiveWt + leafDeadWt) / existingWt / existingWt;

				// get the fraction to residue (wastage - will override the default values)
				// the default is [Chicory].Leaf.BiomassRemovalDefaults.Cut.FractionLiveToResidue, or equivalent
				double leafFracToResidue = leafResidueFrac * leafFracToRemove;
				double stemFracToResidue = stemResidueFrac * stemFracToRemove;
				double flowerFracToResidue = flowerResidueFrac * flowerFracToRemove;

				// correct the values to defoliate (so our removeAmount = remove + residue)
				leafFracToRemove = leafFracToRemove - leafFracToResidue;
				stemFracToRemove = stemFracToRemove - stemFracToResidue;
				flowerFracToRemove = flowerFracToRemove - flowerFracToResidue;

				// get total defoliation (plant loss)
				DefoliatedDM = (leafLiveWt + leafDeadWt) * (leafFracToRemove + leafFracToResidue)
				+ (stemLiveWt + stemDeadWt) * (stemFracToRemove + stemFracToResidue)
				+ (flowerLiveWt + flowerDeadWt) * (flowerFracToRemove + flowerFracToResidue);
				DefoliatedN = (leafLiveN + leafDeadN) * (leafFracToRemove + leafFracToResidue)
				+ (stemLiveN + stemDeadN) * (stemFracToRemove + stemFracToResidue)
				+ (flowerLiveN + flowerDeadN) * (flowerFracToRemove + flowerFracToResidue);

				// get total harvested
				HarvestedDM = (leafLiveWt + leafDeadWt) * leafFracToRemove
				+ (stemLiveWt + stemDeadWt) * stemFracToRemove
				+ (flowerLiveWt + flowerDeadWt) * flowerFracToRemove;
				HarvestedN = (leafLiveN + leafDeadN) * leafFracToRemove
				+ (stemLiveN + stemDeadN) * stemFracToRemove
				+ (flowerLiveN + flowerDeadN) * flowerFracToRemove;

				// get amounts actually removed from field and that to be returned (dung/urine)
				RemovedDM = HarvestedDM * fracDM2Remove;
				RemovedN = HarvestedN * fracN2Remove;
				ReturnedDM = HarvestedDM - RemovedDM;
				ReturnedN = HarvestedN - RemovedN;
				NReturnedInDung = ReturnedN * fracN2Dung;
				NReturnedInUrine = ReturnedN - NReturnedInDung;

				// set removal fractions (these overrides the default removals in the plant)
				removalFractions.SetFractionToRemove("Leaf", leafFracToRemove);
				removalFractions.SetFractionToResidue("Leaf", leafFracToResidue);
				removalFractions.SetFractionToRemove("Stem", stemFracToRemove);
				removalFractions.SetFractionToResidue("Stem", stemFracToResidue);
				removalFractions.SetFractionToRemove("Inflorescence", stemFracToRemove);
				removalFractions.SetFractionToResidue("Inflorescence", flowerFracToResidue);

				removalFractions.SetFractionToRemove("Root", 0.0);
				removalFractions.SetFractionToResidue("Root", 0.0);
				removalFractions.SetFractionToRemove("Taproot", 0.0);
				removalFractions.SetFractionToResidue("Taproot", 0.0);

				// Actually do the biomass removal
				Chicory.RemoveBiomass(removeType, removalFractions);

				leafLiveWt = (double)zone.Get("Chicory.Leaf.Live.Wt");
				stemLiveWt = (double)zone.Get("Chicory.Stem.Live.Wt");
				flowerLiveWt = (double)zone.Get("Chicory.Inflorescence.Live.Wt");
				leafDeadWt = (double)zone.Get("Chicory.Leaf.Dead.Wt");
				stemDeadWt = (double)zone.Get("Chicory.Stem.Dead.Wt");
				flowerDeadWt = (double)zone.Get("Chicory.Inflorescence.Dead.Wt");
				leafLiveN = (double)zone.Get("Chicory.Leaf.Live.N");
				stemLiveN = (double)zone.Get("Chicory.Stem.Live.N");
				flowerLiveN = (double)zone.Get("Chicory.Inflorescence.Live.N");
				leafDeadN = (double)zone.Get("Chicory.Leaf.Dead.N");
				stemDeadN = (double)zone.Get("Chicory.Stem.Dead.N");
				flowerDeadN = (double)zone.Get("Chicory.Inflorescence.Dead.N");

				existingWt = leafLiveWt + leafDeadWt + stemLiveWt + stemDeadWt + flowerLiveWt + flowerDeadWt;
			}
		}

		// Return dung and urine
		private void returnExcreta()
		{
			if ((ReturnedDM > 0.0) || (NReturnedInDung > 0.0))
			{
				PMF.BiomassRemovedType BiomassDung = new PMF.BiomassRemovedType();
				string[] type = new string[] { "RuminantDung_PastureFed" };
				float[] dltdm = new float[] { (Single)ReturnedDM };
				float[] dltn = new float[] { (Single)NReturnedInDung };
				float[] dltp = new float[] { 0 };
				float[] fraction = new float[] { 1 };     // fraction is always 1.0 here

				BiomassDung.crop_type = "RuminantDung_PastureFed";
				BiomassDung.dm_type = type;
				BiomassDung.dlt_crop_dm = dltdm;
				BiomassDung.dlt_dm_n = dltn;
				BiomassDung.dlt_dm_p = dltp;
				BiomassDung.fraction_to_residue = fraction;
				BiomassRemoved.Invoke(BiomassDung);
			}

			if (NReturnedInUrine > 0.0)
			{
				fertiliser.Apply(NReturnedInUrine * 10, Fertiliser.Types.UreaN, urineDepth);
			}
		}
	}
}
```
        MicroClimate: same as Validation.New Zealand.ScottFarm.C17a.Field.MicroClimate
        SurfaceOrganicMatter: same as Validation.USA.AFSRC_01.AFSRC_01.Field.SurfaceOrganicMatter
        Irrigation
        Fertiliser
        Plant Chicory: ResourceName=SCRUM; CropType=SCRUM
        Soil HorotiuSoil: SoilType=Typic Udivitrand (US), Typic Orthic Allophanic Soil (NZ); LocalName=Horotiu silt loam; Site=Ruakura; NearestTown=Hamilton; Region=Waikato; Country=New Zealand; Latitude=0; Longitude=0; Area=0; DataSource=Based primarily on Close et al, 2003
          Analysis: PHUnits=Water; BoronUnits=HotWater
            Thickness  Rocks  PH  CEC   ParticleSizeSand  ParticleSizeSilt  ParticleSizeClay
            200        0      6   23.1  47                33                20
            200        0      6   17.2  65                17                19
            130        2      6   12.4  76                13                11
            140        5      6   10    84                10                7
            380        5      6   7.2   88                8                 5
            230        19     6   3.1   91                6                 3
            220        33     6   1.6   94                5                 1
          Water
            Thickness  BD    AirDry  LL15  DUL   SAT   KS
            200        0.88  0.1     0.22  0.42  0.59  310
            200        0.85  0.18    0.18  0.36  0.62  2500
            130        1.03  0.18    0.18  0.33  0.56  4000
            140        1.11  0.17    0.17  0.31  0.52  5000
            380        1.11  0.08    0.08  0.21  0.52  10000
            230        1.03  0.05    0.05  0.14  0.46  15000
            220        1.03  0.04    0.04  0.12  0.39  20000
            SoilCrop ChicorySoil: LL=[0.22, 0.18, 0.18, 0.17, 0.08, 0.05, 0.04]; KL=[0.1, 0.08, 0.05, 0.02, 0.01, 0.01, 0]; XF=[1, 1, 1, 1, 1, 1, 1]
          SoilWater: SummerDate=21-Sep; SummerU=6; SummerCona=3.5; WinterDate=23-Mar; WinterU=6; WinterCona=2.5; DiffusConst=88; DiffusSlope=35; Salb=0.2; CN2Bare=0.7; CNRed=20; CNCov=0.8; max_pond=0; Thickness=[200, 200, 130, 140, 380, 230, 220]; SWCON=[0.55, 0.6, 0.7, 0.7, 0.75, 0.8, 0.8]; residueinterception=0
          SoilNitrogen: fom_type=[default, manure, mucuna, lablab, shemp, stable]; fract_carb=[0.2, 0.3, 0.54, 0.57, 0.45, 0]; fract_cell=[0.7, 0.3, 0.37, 0.37, 0.47, 0.1]; fract_lign=[0.1, 0.4, 0.09, 0.06, 0.08, 0.9]; wfpsN2N2O_x=[22, 88]; wfpsN2N2O_y=[0.1, 1]
          SoilOrganicMatter: RootCN=40; RootWt=1000; SoilCN=12.5; EnrACoeff=7.4; EnrBCoeff=0.2; OCUnits=Total
            Thickness  OC    FBiom  FInert
            200        8     0.08   0.57
            200        1.88  0.04   0.6
            130        0.93  0.02   0.62
            140        0.43  0.01   0.65
            380        0.13  0.01   0.7
            230        0.1   0.01   0.8
            220        0.07  0.01   0.85
          InitialWater Initial water: PercentMethod=FilledFromTop; FractionFull=1
          Sample Initial nitrogen: NO3Units=ppm; NH4Units=ppm; SWUnits=Volumetric; OCUnits=Total; PHUnits=Water
            Thickness  NO3  NH4
            200        15   0.5
            200        10   0.2
            600        5    0.093
            500        1    0.093
        Report: EventNames=[Clock].DoReport
        Report Report1: EventNames=[Clock].DoReport
          VariableNames:
            [Clock].Today as Date
            [MyDefoliate].Script.PreHarvestDM
            [MyDefoliate].Script.PostHarvestDM
            [MyDefoliate].Script.DefoliatedDM
            [MyDefoliate].Script.HarvestedDM
            [MyDefoliate].Script.RemovedDM
            [MyDefoliate].Script.DefoliatedN
            [MyDefoliate].Script.HarvestedN
            [MyDefoliate].Script.RemovedN
            [MyDefoliate].Script.NReturnedInDung
            [MyDefoliate].Script.NReturnedInUrine
            [Chicory].Arbitrator.NSupply
            [Chicory].Arbitrator.NDemand
            [Chicory].Arbitrator.NAllocated
            sum([Chicory].Arbitrator.PotentialNO3NUptake) as PotentialPlantAvailableNO3
            sum([Chicory].Arbitrator.PotentialNH4NUptake) as PotentialPlantAvailableNH4
            (sum([Chicory].Arbitrator.PotentialNO3NUptake)+ sum([Chicory].Arbitrator.PotentialNH4NUptake)) as PotentialPlantAvailableN
            [Chicory].Root.NSupplyUptake
            [Chicory].Root.NTakenUp
            [ExtraVariables].Script.Root_NSupply
            [Chicory].Root.NUptake
            [ExtraVariables].Script.Root_NSupplyReallocation
            [ExtraVariables].Script.Stem_NSupplyReallocation
            [ExtraVariables].Script.Leaf_NSupplyReallocation
    Simulation Clapham
      Clock: StartDate=1995-05-01; EndDate=1998-12-31
      Weather: FileName=%root%\Prototypes\Chicory\Beckley.met
      Summary
      SoilArbitrator Soil Arbitrator
      Zone Field: Area=1; Slope=0
        Folder Management
          Manager ExtraVariables: same as Validation.USA.AFSRC_01.AFSRC_01.Field.Management.ExtraVariables
          Operations Establishment
            1995-06-10  [Chicory].Sow(population:200, cultivar:"Puna", depth:10, rowSpacing:150);
            1995-07-20  [Fertiliser].Apply(10, Fertiliser.Types.NH4NO3N, 35)
            1995-09-25  [Defoliate].Script.Defoliate(defoliationType:"Cut",amountDM: 50, amountType:"ResidualDM", duration: 1)
          Operations Cuttings: same as Validation.USA.AFSRC_03.AFSRC_03.Field.Management.Cuttings
          Operations FertiliserSchedule
            1996-04-15  [Fertiliser].Apply(10, Fertiliser.Types.NH4NO3N, 35)
            1997-04-15  [Fertiliser].Apply(10, Fertiliser.Types.NH4NO3N, 35)
            1998-04-15  [Fertiliser].Apply(10, Fertiliser.Types.NH4NO3N, 35)
          Manager Defoliate: same as Validation.New Zealand.ScottFarm.C17a.Field.Management.Defoliate
        MicroClimate: same as Validation.New Zealand.ScottFarm.C17a.Field.MicroClimate
        SurfaceOrganicMatter: same as Validation.USA.AFSRC_01.AFSRC_01.Field.SurfaceOrganicMatter
        Irrigation
        Fertiliser
        Soil Ramsey: same as Validation.USA.AFSRC_01.AFSRC_01.Field.Ramsey
        Plant Chicory: ResourceName=SCRUM; CropType=SCRUM
        Report: same as Validation.USA.AFSRC_01.AFSRC_01.Field.Report
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