Simulations: Version=2
  Replacements
    Plant Eucalyptus: CropType=Eucalyptus
      AccumulateFunction Age: StartStageName=Emergence; EndStageName=Old
        Constant day: FixedValue=0.00273973
      Phenology: DaysAfterSowing=0
        StageBasedInterpolation StageCode: Stages=[Emergence, EndJuvenile, Maturity, Old]; Codes=[1, 2, 3, 4]; Proportional=true
        Constant ThermalTime: FixedValue=1
        GerminatingPhase Germinating: Start=Sowing; End=Germination
        EmergingPhase Emerging: Start=Germination; End=Emergence; ShootLag=1; ShootRate=0
          VariableReference ThermalTime: VariableName=[Phenology].ThermalTime.Value()
        GenericPhase Juvenile: Start=Emergence; End=EndJuvenile
          Constant ThermalTime: FixedValue=1
          Constant Target: FixedValue=365
        GenericPhase Mature: Start=EndJuvenile; End=Maturity
          Constant ThermalTime: FixedValue=1
          Constant Target: FixedValue=1825
        GenericPhase Declining: Start=Maturity; End=Old
          Constant ThermalTime: FixedValue=1
          Constant Target: FixedValue=27010
        EndPhase Old: Start=Old; End=Unused
          Constant ThermalTime: FixedValue=1
      OrganArbitrator Arbitrator
        RelativeAllocation NArbitrator
        RelativeAllocation DMArbitrator
      CompositeBiomass AboveGround
        Propertys=[[Branch].Live, [Branch].Dead, [Leaf].Live, [Leaf].Dead, [Stem].Live, [Stem].Dead]
      CompositeBiomass BelowGround: Propertys=[[Root].Live, [Root].Dead]
      CompositeBiomass Wood: Propertys=[[Stem].Live, [Stem].Dead, [Branch].Live, [Branch].Dead]
      CompositeBiomass Total
        Propertys=[[Leaf].Live, [Leaf].Dead, [Stem].Live, [Stem].Dead, [Root].Live, [Root].Dead]
      CompositeBiomass TotalLive: Propertys=[[Leaf].Live, [Stem].Live, [Root].Live]
      DivideFunction IndividualTreeLiveWt
        VariableReference LiveWt: VariableName=[Eucalyptus].TotalLive.Wt
        VariableReference Population: VariableName=[Eucalyptus].Population
      CompositeBiomass TotalDead: Propertys=[[Leaf].Dead, [Stem].Dead, [Root].Dead]
      PerennialLeaf Leaf: CohortsInitialised=false; Albedo=0.18; Gsmax=0.015; R50=150; MicroClimatePresent=true
        zero: MaintenanceRespiration, GrowthRespiration, TipsAtEmergence, CohortsAtInitialisation, InitialisedCohortNo, AppearedCohortNo, PlantAppearedLeafNo, Height, FRGR, PotentialEP
        MultiplyFunction InitialWtFunction
          Constant InitialPlantWt: FixedValue=1; Units=g/plant
          VariableReference Population: VariableName=[Plant].Population
        Constant LaiDeadFunction: FixedValue=0; Units=m^2/m^2
        Constant StructuralFraction: FixedValue=1; Units=0-1
        MinimumFunction FRGRFunction
          AirTemperatureFunction FRGRFunctionTemp
            XYPairs: X=[5, 20, 25, 35]; Y=[0, 1, 1, 0]
        PartitionFractionDemandFunction DMDemandFunction
          LinearInterpolationFunction PartitionFraction: XProperty=[Eucalyptus].IndividualTreeLiveWt.Value()
            XYPairs: X=[0, 1000, 10000]; Y=[0.3, 0.2, 0.1]
        Constant ExtinctionCoefficient: FixedValue=0.57
          Memo
            Value of 0.57 from
            Radiation Interception and Growth of Planted and Coppice Stands of Four Fast-GrowingTropical Trees
            Author(s): Robin A. Harrington and James H. Fownes
            Source: Journal of Applied Ecology, Vol. 32, No. 1 (Feb., 1995), pp. 1-8

            But their data suggests a value of 0.3
        Constant ExtinctionCoefficientDead: same as Replacements.Eucalyptus.Leaf.ExtinctionCoefficient
        LinearInterpolationFunction HeightFunction: XProperty=[Phenology].Stage
          XYPairs: X=[3, 5, 6]; Y=[100, 800, 1200]
        Constant MaximumNConc: FixedValue=0.03
          Memo
            0.043 gN/g from R.B. Thomas 1, D.D. Richter 2, H. Ye 2, P.R. Heine z, and B.R. Strain 1 Nitrogen dynamics and growth of seedlings of an N-fixing tree
            (GKricidia sepium (Jacq.) Walp.) exposed to elevated atmospheric carbon dioxide Oecologia (1991) 88:415-421
        Constant MinimumNConc: FixedValue=0.015
        Constant NReallocationFactor: FixedValue=0
        Constant SenescenceRate: FixedValue=0
        BiomassRemoval BiomassRemovalDefaults
          OrganBiomassRemovalType Harvest: FractionLiveToRemove=0; FractionDeadToRemove=0; FractionLiveToResidue=0.9; FractionDeadToResidue=0.9
          OrganBiomassRemovalType Cut: FractionLiveToRemove=0.8; FractionDeadToRemove=0; FractionLiveToResidue=0; FractionDeadToResidue=0
          OrganBiomassRemovalType Prune: FractionLiveToRemove=0; FractionDeadToRemove=0; FractionLiveToResidue=0.6; FractionDeadToResidue=0
          OrganBiomassRemovalType Graze: FractionLiveToRemove=0.6; FractionDeadToRemove=0; FractionLiveToResidue=0.1; FractionDeadToResidue=0
        Constant DetachmentRateFunction: FixedValue=0
        Constant LeafResidenceTime: FixedValue=365
        Constant DMConversionEfficiency: FixedValue=1
        Constant LeafDetachmentTime: FixedValue=7
        Constant DMRetranslocationFactor: FixedValue=0
        Constant NRetranslocationFactor: FixedValue=0
        RUEModel Photosynthesis
          Constant RUE: FixedValue=1.3
          WeightedTemperatureFunction FT: MaximumTemperatureWeighting=0.75
            XYPairs: X=[5, 20, 25, 35]; Y=[0, 1, 1, 0]
          LinearInterpolationFunction FVPD: XProperty=[Leaf].Photosynthesis.VPD
            XYPairs: X=[0, 10, 50]; Y=[1, 1, 0]
          LinearInterpolationFunction FN: XProperty=[Leaf].Fn
            XYPairs: X=[0, 1, 1.5]; Y=[0, 1, 1]
          LinearInterpolationFunction FW: XProperty=[Leaf].Fw
            XYPairs: X=[0, 1, 1.5]; Y=[0, 1, 1]
          RUECO2Function FCO2: PhotosyntheticPathway=C3
          Memo
            Ayaz eta 2004 presented a RUE of 1.6 g/MJ PAR during non-limiting temperature conditions for field pea.  Halving this to make it total radiation gives 0.8 g/MJ and adding 20% to account for root and  nodule production and N fixiation costs gives 1.0 g/MJ
          VariableReference RadnInt: VariableName=[Leaf].RadIntTot
        Constant LeafKillFraction: FixedValue=0
        Constant MinimumLAI: FixedValue=0.1
        LinearInterpolationFunction SpecificLeafAreaFunction: XProperty=[Eucalyptus].Age.Value()
          XYPairs: X=[0, 1, 2, 3, 6]; Y=[0.016, 0.013, 0.011, 0.01, 0.008]
      Root: GrowthRespiration=0; MaintenanceRespiration=0
        CompositeBiomass Live: Propertys=[[Root].LayerLive]
        CompositeBiomass Dead: Propertys=[[Root].LayerDead]
        PhaseBasedSwitch NitrogenDemandSwitch: Start=Emergence; End=Old
        Constant RootFrontVelocity: FixedValue=10
        Constant SenescenceRate: FixedValue=0.005
        PhaseLookup PartitionFraction
          PhaseLookupValue: Start=Emergence; End=Old
            Constant: FixedValue=0.2
        Constant MaximumNConc: FixedValue=0.0041
        Constant MaxDailyNUptake: FixedValue=6
        Constant MinimumNConc: FixedValue=0.004
        Constant MaximumRootDepth: FixedValue=1000000
        LinearInterpolationFunction KLModifier: XProperty=[Leaf].LAI
          XYPairs: X=[0, 3]; Y=[1, 1]
        LinearInterpolationFunction KNO3: XProperty=[Root].RootLengthDenisty
          XYPairs: X=[0, 0.003]; Y=[0.03, 0.03]
        LinearInterpolationFunction KNH4: XProperty=[Root].RootLengthDenisty
          XYPairs: X=[0, 0.003]; Y=[0, 0]
        LinearInterpolationFunction NUptakeSWFactor: XProperty=[Root].RWC
          XYPairs: X=[0, 1]; Y=[0, 1]
        Constant InitialDM: FixedValue=5; Units=g/plant
        Constant SpecificRootLength: FixedValue=100; Units=m/g
        BiomassRemoval BiomassRemovalDefaults: same as Replacements.Eucalyptus.Leaf.BiomassRemovalDefaults
      GenericOrgan Stem
        Constant NReallocationFactor: FixedValue=0
        Constant NRetranslocationFactor: FixedValue=0.05
        PhaseBasedSwitch NitrogenDemandSwitch: Start=Emergence; End=Old
        Constant DMRetranslocationFactor: FixedValue=0
        PartitionFractionDemandFunction DMDemandFunction
          LinearInterpolationFunction PartitionFraction: XProperty=[Eucalyptus].IndividualTreeLiveWt.Value()
            XYPairs: X=[0, 1000, 10000]; Y=[0.35, 0.41, 0.48]
        Constant SenescenceRate: FixedValue=0; Units=/d
        Constant MaximumNConc: FixedValue=0.0015
        Constant MinimumNConc: FixedValue=0.0014
        Biomass Live
        Biomass Dead
        Constant InitialWtFunction: FixedValue=0; Units=g/m^2
        Constant StructuralFraction: FixedValue=1; Units=g/g
        Constant DetachmentRateFunction: FixedValue=0; Units=/d
        Constant MaintenanceRespirationFunction: FixedValue=0; Units=0-1
        Constant DMConversionEfficiency: FixedValue=1; Units=0-1
        BiomassRemoval BiomassRemovalDefaults
          OrganBiomassRemovalType Harvest: FractionLiveToRemove=0.5; FractionDeadToRemove=0; FractionLiveToResidue=0.1; FractionDeadToResidue=0
          OrganBiomassRemovalType Cut: FractionLiveToRemove=0.8; FractionDeadToRemove=0; FractionLiveToResidue=0; FractionDeadToResidue=0
          OrganBiomassRemovalType Prune: FractionLiveToRemove=0; FractionDeadToRemove=0; FractionLiveToResidue=0.6; FractionDeadToResidue=0
          OrganBiomassRemovalType Graze: FractionLiveToRemove=0.6; FractionDeadToRemove=0; FractionLiveToResidue=0.2; FractionDeadToResidue=0
          OrganBiomassRemovalType Thin: FractionLiveToRemove=0; FractionDeadToRemove=0; FractionLiveToResidue=0.05; FractionDeadToResidue=0
      Cultivar EGrandis
      GenericOrgan Branch
        Constant NReallocationFactor: FixedValue=0
        Constant NRetranslocationFactor: FixedValue=0.05
        PhaseBasedSwitch NitrogenDemandSwitch: Start=Emergence; End=Old
        Constant DMRetranslocationFactor: FixedValue=0
        PartitionFractionDemandFunction DMDemandFunction
          LinearInterpolationFunction PartitionFraction: XProperty=[Eucalyptus].IndividualTreeLiveWt.Value()
            XYPairs: X=[0, 1000, 10000]; Y=[0.147, 0.17, 0.2]
        Constant SenescenceRate: FixedValue=0; Units=/d
        Constant MaximumNConc: FixedValue=0.0015
        Constant MinimumNConc: FixedValue=0.0014
        Biomass Live
        Biomass Dead
        Constant InitialWtFunction: FixedValue=0; Units=g/m^2
        Constant StructuralFraction: FixedValue=1; Units=g/g
        Constant DetachmentRateFunction: FixedValue=0; Units=/d
        Constant MaintenanceRespirationFunction: FixedValue=0; Units=0-1
        Constant DMConversionEfficiency: FixedValue=1; Units=0-1
        BiomassRemoval BiomassRemovalDefaults: same as Replacements.Eucalyptus.Stem.BiomassRemovalDefaults
    Report: EventNames=[Clock].DoReport
      VariableNames:
        [Clock].Today
        Eucalyptus.Phenology.CurrentPhaseName
        Eucalyptus.Phenology.StageCode.Value()
        Eucalyptus.Root.NSupplyUptake
        [Soil].SoilWater.Eo
        [Soil].SoilWater.Es
        [Soil].SoilWater.Drainage
        [Soil].SoilWater.Runoff
        [Soil].SoilWater.pond
        Eucalyptus.AboveGround.Wt
        Eucalyptus.BelowGround.Wt
        Eucalyptus.Total.Wt
        Eucalyptus.Leaf.Dead.Wt
        Eucalyptus.Leaf.Live.Wt
        Eucalyptus.Stem.Dead.Wt
        Eucalyptus.Stem.Live.Wt
        Eucalyptus.Root.Dead.Wt
        Eucalyptus.Root.Live.Wt
        Eucalyptus.AboveGround.N
        Eucalyptus.BelowGround.N
        Eucalyptus.Total.N
        Eucalyptus.TotalLive.N
        Eucalyptus.TotalDead.N
        Eucalyptus.Leaf.Dead.N
        Eucalyptus.Leaf.Live.N
        Eucalyptus.Stem.Dead.N
        Eucalyptus.Stem.Live.N
        Eucalyptus.Branch.Live.Wt
        Eucalyptus.Branch.Live.N
        Eucalyptus.Wood.Wt
        Eucalyptus.Root.Live.N
        Eucalyptus.Root.Dead.N
        Eucalyptus.Leaf.Live.NConc
        Eucalyptus.Leaf.Dead.NConc
        Eucalyptus.Stem.Live.NConc
        Eucalyptus.Root.Live.NConc
        Eucalyptus.Root.WaterSupply
        Eucalyptus.Root.WaterUptake
        Eucalyptus.Leaf.Transpiration
        Eucalyptus.Leaf.WaterDemand
        Eucalyptus.Root.Depth
        Eucalyptus.Leaf.CoverGreen
        Eucalyptus.Leaf.CoverTotal
        Eucalyptus.Leaf.CoverDead
        Eucalyptus.Leaf.LAI
        Eucalyptus.Leaf.LAIDead
        Eucalyptus.Leaf.Fn
        Eucalyptus.Leaf.Fw
        Eucalyptus.Leaf.Photosynthesis.FT.Value()
        Eucalyptus.Leaf.Photosynthesis.FVPD.Value()
        Eucalyptus.Leaf.Photosynthesis.RueAct
        Eucalyptus.Stem.MinimumNConc.Value()
        Eucalyptus.Root.MinimumNConc.Value()
        Eucalyptus.Stem.MaximumNConc.Value()
        Eucalyptus.Root.MaximumNConc.Value()
        Eucalyptus.TotalLive.Wt
        Eucalyptus.Stem.Live.StructuralWt
        Eucalyptus.Stem.Live.NonStructuralWt
        Eucalyptus.Leaf.SpecificArea
        Eucalyptus.TotalDead.Wt
        [Soil].SoilWater.SWmm
        [Soil].NO3N
        Eucalyptus.Arbitrator.N.TotalPlantDemand
        Eucalyptus.Leaf.LAIFunction.SpecificLeafArea.Value()
        Eucalyptus.IndividualTreeLiveWt.Value()
        Eucalyptus.Age.Value()
  DataStore
    Input: FileName=EucalyptusValidationData.txt
    ExcelInput Observed: FileName=EucalyptusValidationData.xlsx; SheetNames=[Observed]
    PredictedObserved: PredictedTableName=Report; ObservedTableName=Observed; FieldNameUsedForMatch=Clock.Today
  Folder Validation
    Folder Gympie
      Experiment Gympie
        Factors
          Factor Irr: Specifications=[IrrigationOperations]
            Operations Zero
            Operations High
              1987-02-08  [Irrigation].Apply(amount: 2.2533);
              1987-02-15  [Irrigation].Apply(amount: 2.2533);
              1987-02-22  [Irrigation].Apply(amount: 2.2533);
              1987-03-01  [Irrigation].Apply(amount: 2.2533);
              1987-03-08  [Irrigation].Apply(amount: 25.5633);
              1987-03-15  [Irrigation].Apply(amount: 25.5633);
              1987-03-22  [Irrigation].Apply(amount: 25.5633);
              1987-03-29  [Irrigation].Apply(amount: 25.5633);
              1987-04-08  [Irrigation].Apply(amount: 21.5229);
              1987-04-15  [Irrigation].Apply(amount: 21.5229);
              1987-04-22  [Irrigation].Apply(amount: 21.5229);
              1987-04-29  [Irrigation].Apply(amount: 21.5229);
              1987-05-08  [Irrigation].Apply(amount: 13.6752);
              1987-05-15  [Irrigation].Apply(amount: 13.6752);
              1987-05-22  [Irrigation].Apply(amount: 13.6752);
              1987-05-29  [Irrigation].Apply(amount: 13.6752);
              1987-06-08  [Irrigation].Apply(amount: 0);
              1987-06-15  [Irrigation].Apply(amount: 0);
              1987-06-22  [Irrigation].Apply(amount: 0);
              1987-06-29  [Irrigation].Apply(amount: 0);
              1987-07-08  [Irrigation].Apply(amount: 17.6379);
              1987-07-15  [Irrigation].Apply(amount: 17.6379);
              1987-07-22  [Irrigation].Apply(amount: 17.6379);
              1987-07-29  [Irrigation].Apply(amount: 17.6379);
              1987-08-08  [Irrigation].Apply(amount: 7.77);
              1987-08-15  [Irrigation].Apply(amount: 7.77);
              1987-08-22  [Irrigation].Apply(amount: 7.77);
              1987-08-29  [Irrigation].Apply(amount: 7.77);
              1987-09-08  [Irrigation].Apply(amount: 16.58895);
              1987-09-15  [Irrigation].Apply(amount: 16.58895);
              1987-09-22  [Irrigation].Apply(amount: 16.58895);
              1987-09-29  [Irrigation].Apply(amount: 16.58895);
              1987-10-08  [Irrigation].Apply(amount: 15.8508);
              1987-10-15  [Irrigation].Apply(amount: 15.8508);
              1987-10-22  [Irrigation].Apply(amount: 15.8508);
              1987-10-29  [Irrigation].Apply(amount: 15.8508);
              1987-11-08  [Irrigation].Apply(amount: 20.47395);
              1987-11-15  [Irrigation].Apply(amount: 20.47395);
              1987-11-22  [Irrigation].Apply(amount: 20.47395);
              1987-11-29  [Irrigation].Apply(amount: 20.47395);
              1987-12-08  [Irrigation].Apply(amount: 19.425);
              1987-12-15  [Irrigation].Apply(amount: 19.425);
              1987-12-22  [Irrigation].Apply(amount: 19.425);
              1987-12-29  [Irrigation].Apply(amount: 19.425);
              1988-01-08  [Irrigation].Apply(amount: 15.6954);
              1988-01-15  [Irrigation].Apply(amount: 15.6954);
              1988-01-22  [Irrigation].Apply(amount: 15.6954);
              1988-01-29  [Irrigation].Apply(amount: 15.6954);
              1988-02-08  [Irrigation].Apply(amount: 39.0054);
              1988-02-15  [Irrigation].Apply(amount: 39.0054);
              1988-02-22  [Irrigation].Apply(amount: 39.0054);
              1988-02-29  [Irrigation].Apply(amount: 39.0054);
              1988-03-08  [Irrigation].Apply(amount: 42.56018);
              1988-03-15  [Irrigation].Apply(amount: 42.56018);
              1988-03-22  [Irrigation].Apply(amount: 42.56018);
              1988-03-29  [Irrigation].Apply(amount: 42.56018);
              1988-04-08  [Irrigation].Apply(amount: 0);
              1988-04-15  [Irrigation].Apply(amount: 0);
              1988-04-22  [Irrigation].Apply(amount: 0);
              1988-04-29  [Irrigation].Apply(amount: 0);
              1988-05-08  [Irrigation].Apply(amount: 0);
              1988-05-15  [Irrigation].Apply(amount: 0);
              1988-05-22  [Irrigation].Apply(amount: 0);
              1988-05-29  [Irrigation].Apply(amount: 0);
              1988-06-08  [Irrigation].Apply(amount: 0);
              1988-06-15  [Irrigation].Apply(amount: 0);
              1988-06-22  [Irrigation].Apply(amount: 0);
              1988-06-29  [Irrigation].Apply(amount: 0);
              1988-07-08  [Irrigation].Apply(amount: 0);
              1988-07-15  [Irrigation].Apply(amount: 0);
              1988-07-22  [Irrigation].Apply(amount: 0);
              1988-07-29  [Irrigation].Apply(amount: 0);
              1988-08-08  [Irrigation].Apply(amount: 7.77);
              1988-08-15  [Irrigation].Apply(amount: 7.77);
              1988-08-22  [Irrigation].Apply(amount: 7.77);
              1988-08-29  [Irrigation].Apply(amount: 7.77);
              1988-09-08  [Irrigation].Apply(amount: 9.965025);
              1988-09-15  [Irrigation].Apply(amount: 9.965025);
              1988-09-22  [Irrigation].Apply(amount: 9.965025);
              1988-09-29  [Irrigation].Apply(amount: 9.965025);
              1988-10-08  [Irrigation].Apply(amount: 40.404);
              1988-10-15  [Irrigation].Apply(amount: 40.404);
              1988-10-22  [Irrigation].Apply(amount: 40.404);
              1988-10-29  [Irrigation].Apply(amount: 40.404);
              1988-11-08  [Irrigation].Apply(amount: 49.55318);
              1988-11-15  [Irrigation].Apply(amount: 49.55318);
              1988-11-22  [Irrigation].Apply(amount: 49.55318);
              1988-11-29  [Irrigation].Apply(amount: 49.55318);
              1988-12-08  [Irrigation].Apply(amount: 12.91763);
              1988-12-15  [Irrigation].Apply(amount: 12.91763);
              1988-12-22  [Irrigation].Apply(amount: 12.91763);
              1988-12-29  [Irrigation].Apply(amount: 12.91763);
              1989-01-08  [Irrigation].Apply(amount: 11.8881);
              1989-01-15  [Irrigation].Apply(amount: 11.8881);
              1989-01-22  [Irrigation].Apply(amount: 11.8881);
              1989-01-29  [Irrigation].Apply(amount: 11.8881);
              1989-02-08  [Irrigation].Apply(amount: 15.9285);
              1989-02-15  [Irrigation].Apply(amount: 15.9285);
              1989-02-22  [Irrigation].Apply(amount: 15.9285);
              1989-03-01  [Irrigation].Apply(amount: 15.9285);
              1989-03-08  [Irrigation].Apply(amount: 23.7762);
              1989-03-15  [Irrigation].Apply(amount: 23.7762);
              1989-03-22  [Irrigation].Apply(amount: 23.7762);
              1989-03-29  [Irrigation].Apply(amount: 23.7762);
              1989-04-08  [Irrigation].Apply(amount: 0);
              1989-04-15  [Irrigation].Apply(amount: 0);
              1989-04-22  [Irrigation].Apply(amount: 0);
              1989-04-29  [Irrigation].Apply(amount: 0);
              1989-05-08  [Irrigation].Apply(amount: 0);
              1989-05-15  [Irrigation].Apply(amount: 0);
              1989-05-22  [Irrigation].Apply(amount: 0);
              1989-05-29  [Irrigation].Apply(amount: 0);
              1989-06-08  [Irrigation].Apply(amount: 0);
              1989-06-15  [Irrigation].Apply(amount: 0);
              1989-06-22  [Irrigation].Apply(amount: 0);
              1989-06-29  [Irrigation].Apply(amount: 0);
              1989-07-08  [Irrigation].Apply(amount: 0.2331);
              1989-07-15  [Irrigation].Apply(amount: 0.2331);
              1989-07-22  [Irrigation].Apply(amount: 0.2331);
              1989-07-29  [Irrigation].Apply(amount: 0.2331);
              1989-08-08  [Irrigation].Apply(amount: 12.91763);
              1989-08-15  [Irrigation].Apply(amount: 12.91763);
              1989-08-22  [Irrigation].Apply(amount: 12.91763);
              1989-08-29  [Irrigation].Apply(amount: 12.91763);
              1989-09-08  [Irrigation].Apply(amount: 51.70935);
              1989-09-15  [Irrigation].Apply(amount: 51.70935);
              1989-09-22  [Irrigation].Apply(amount: 51.70935);
              1989-09-29  [Irrigation].Apply(amount: 51.70935);
              1989-10-08  [Irrigation].Apply(amount: 61.4607);
              1989-10-15  [Irrigation].Apply(amount: 61.4607);
              1989-10-22  [Irrigation].Apply(amount: 61.4607);
              1989-10-29  [Irrigation].Apply(amount: 61.4607);
              1989-11-08  [Irrigation].Apply(amount: 31.21598);
              1989-11-15  [Irrigation].Apply(amount: 31.21598);
              1989-11-22  [Irrigation].Apply(amount: 31.21598);
              1989-11-29  [Irrigation].Apply(amount: 31.21598);
              1989-12-08  [Irrigation].Apply(amount: 13.73348);
              1989-12-15  [Irrigation].Apply(amount: 13.73348);
              1989-12-22  [Irrigation].Apply(amount: 13.73348);
              1989-12-29  [Irrigation].Apply(amount: 13.73348);
              1990-01-08  [Irrigation].Apply(amount: 69.50265);
              1990-01-15  [Irrigation].Apply(amount: 69.50265);
              1990-01-22  [Irrigation].Apply(amount: 69.50265);
              1990-01-29  [Irrigation].Apply(amount: 69.50265);
              1990-02-08  [Irrigation].Apply(amount: 77.19495);
              1990-02-15  [Irrigation].Apply(amount: 77.19495);
              1990-02-22  [Irrigation].Apply(amount: 77.19495);
              1990-03-01  [Irrigation].Apply(amount: 77.19495);
              1990-03-08  [Irrigation].Apply(amount: 30.6915);
              1990-03-15  [Irrigation].Apply(amount: 30.6915);
              1990-03-22  [Irrigation].Apply(amount: 30.6915);
              1990-03-29  [Irrigation].Apply(amount: 30.6915);
              1990-04-08  [Irrigation].Apply(amount: 0);
              1990-04-15  [Irrigation].Apply(amount: 0);
              1990-04-22  [Irrigation].Apply(amount: 0);
              1990-04-29  [Irrigation].Apply(amount: 0);
              1990-05-08  [Irrigation].Apply(amount: 0);
              1990-05-15  [Irrigation].Apply(amount: 0);
              1990-05-22  [Irrigation].Apply(amount: 0);
              1990-05-29  [Irrigation].Apply(amount: 0);
              1990-06-08  [Irrigation].Apply(amount: 0);
              1990-06-15  [Irrigation].Apply(amount: 0);
              1990-06-22  [Irrigation].Apply(amount: 0);
              1990-06-29  [Irrigation].Apply(amount: 0);
              1990-07-08  [Irrigation].Apply(amount: 0);
              1990-07-15  [Irrigation].Apply(amount: 0);
              1990-07-22  [Irrigation].Apply(amount: 0);
              1990-07-29  [Irrigation].Apply(amount: 0);
              1990-08-08  [Irrigation].Apply(amount: 24.82515);
              1990-08-15  [Irrigation].Apply(amount: 24.82515);
              1990-08-22  [Irrigation].Apply(amount: 24.82515);
              1990-08-29  [Irrigation].Apply(amount: 24.82515);
              1990-09-08  [Irrigation].Apply(amount: 59.9844);
              1990-09-15  [Irrigation].Apply(amount: 59.9844);
              1990-09-22  [Irrigation].Apply(amount: 59.9844);
              1990-09-29  [Irrigation].Apply(amount: 59.9844);
              1990-10-08  [Irrigation].Apply(amount: 60.70313);
              1990-10-15  [Irrigation].Apply(amount: 60.70313);
              1990-10-22  [Irrigation].Apply(amount: 60.70313);
              1990-10-29  [Irrigation].Apply(amount: 60.70313);
              1990-11-08  [Irrigation].Apply(amount: 42.22995);
              1990-11-15  [Irrigation].Apply(amount: 42.22995);
              1990-11-22  [Irrigation].Apply(amount: 42.22995);
              1990-11-29  [Irrigation].Apply(amount: 42.22995);
              1990-12-08  [Irrigation].Apply(amount: 61.0722);
              1990-12-15  [Irrigation].Apply(amount: 61.0722);
              1990-12-22  [Irrigation].Apply(amount: 61.0722);
              1990-12-29  [Irrigation].Apply(amount: 61.0722);
              1991-01-08  [Irrigation].Apply(amount: 16.02563);
              1991-01-15  [Irrigation].Apply(amount: 16.02563);
              1991-01-22  [Irrigation].Apply(amount: 16.02563);
              1991-01-29  [Irrigation].Apply(amount: 16.02563);
              1991-02-08  [Irrigation].Apply(amount: 10.29525);
              1991-02-15  [Irrigation].Apply(amount: 10.29525);
              1991-02-22  [Irrigation].Apply(amount: 10.29525);
              1991-03-01  [Irrigation].Apply(amount: 10.29525);
              1991-03-08  [Irrigation].Apply(amount: 23.73735);
              1991-03-15  [Irrigation].Apply(amount: 23.73735);
              1991-03-22  [Irrigation].Apply(amount: 23.73735);
              1991-03-29  [Irrigation].Apply(amount: 23.73735);
              1991-04-08  [Irrigation].Apply(amount: 15.54);
              1991-04-15  [Irrigation].Apply(amount: 15.54);
              1991-04-22  [Irrigation].Apply(amount: 15.54);
              1991-04-29  [Irrigation].Apply(amount: 15.54);
              1991-05-08  [Irrigation].Apply(amount: 15.9285);
              1991-05-15  [Irrigation].Apply(amount: 15.9285);
              1991-05-22  [Irrigation].Apply(amount: 15.9285);
              1991-05-29  [Irrigation].Apply(amount: 15.9285);
              1991-06-08  [Irrigation].Apply(amount: 0);
              1991-06-15  [Irrigation].Apply(amount: 0);
              1991-06-22  [Irrigation].Apply(amount: 0);
              1991-06-29  [Irrigation].Apply(amount: 0);
              1991-07-08  [Irrigation].Apply(amount: 0);
              1991-07-15  [Irrigation].Apply(amount: 0);
              1991-07-22  [Irrigation].Apply(amount: 0);
              1991-07-29  [Irrigation].Apply(amount: 0);
              1991-08-08  [Irrigation].Apply(amount: 16.51125);
              1991-08-15  [Irrigation].Apply(amount: 16.51125);
              1991-08-22  [Irrigation].Apply(amount: 16.51125);
              1991-08-29  [Irrigation].Apply(amount: 16.51125);
              1991-09-08  [Irrigation].Apply(amount: 61.63553);
              1991-09-15  [Irrigation].Apply(amount: 61.63553);
              1991-09-22  [Irrigation].Apply(amount: 61.63553);
              1991-09-29  [Irrigation].Apply(amount: 61.63553);
              1991-10-08  [Irrigation].Apply(amount: 31.7016);
              1991-10-15  [Irrigation].Apply(amount: 31.7016);
              1991-10-22  [Irrigation].Apply(amount: 31.7016);
              1991-10-29  [Irrigation].Apply(amount: 31.7016);
              1991-11-08  [Irrigation].Apply(amount: 29.04038);
              1991-11-15  [Irrigation].Apply(amount: 29.04038);
              1991-11-22  [Irrigation].Apply(amount: 29.04038);
              1991-11-29  [Irrigation].Apply(amount: 29.04038);
              1991-12-08  [Irrigation].Apply(amount: 31.08);
              1991-12-15  [Irrigation].Apply(amount: 31.08);
              1991-12-22  [Irrigation].Apply(amount: 31.08);
              1991-12-29  [Irrigation].Apply(amount: 31.08);
              1992-01-08  [Irrigation].Apply(amount: 46.7754);
              1992-01-15  [Irrigation].Apply(amount: 46.7754);
              1992-01-22  [Irrigation].Apply(amount: 46.7754);
              1992-01-29  [Irrigation].Apply(amount: 46.7754);
              1992-02-08  [Irrigation].Apply(amount: 7.7);
              1992-02-15  [Irrigation].Apply(amount: 7.7);
              1992-02-22  [Irrigation].Apply(amount: 7.7);
              1992-02-29  [Irrigation].Apply(amount: 7.7);
              1992-03-08  [Irrigation].Apply(amount: 0);
              1992-03-15  [Irrigation].Apply(amount: 0);
              1992-03-22  [Irrigation].Apply(amount: 0);
              1992-03-29  [Irrigation].Apply(amount: 0);
              1992-04-08  [Irrigation].Apply(amount: 0);
              1992-04-15  [Irrigation].Apply(amount: 0);
              1992-04-22  [Irrigation].Apply(amount: 0);
              1992-04-29  [Irrigation].Apply(amount: 0);
              1992-05-08  [Irrigation].Apply(amount: 0);
              1992-05-15  [Irrigation].Apply(amount: 0);
              1992-05-22  [Irrigation].Apply(amount: 0);
              1992-05-29  [Irrigation].Apply(amount: 0);
              1992-06-08  [Irrigation].Apply(amount: 0);
              1992-06-15  [Irrigation].Apply(amount: 0);
              1992-06-22  [Irrigation].Apply(amount: 0);
              1992-06-29  [Irrigation].Apply(amount: 0);
              1992-07-08  [Irrigation].Apply(amount: 6.41);
              1992-07-15  [Irrigation].Apply(amount: 6.41);
              1992-07-22  [Irrigation].Apply(amount: 6.41);
              1992-07-29  [Irrigation].Apply(amount: 6.41);
              1992-08-08  [Irrigation].Apply(amount: 34.965);
              1992-08-15  [Irrigation].Apply(amount: 34.965);
              1992-08-22  [Irrigation].Apply(amount: 34.965);
              1992-08-29  [Irrigation].Apply(amount: 34.965);
              1992-09-08  [Irrigation].Apply(amount: 3.885);
              1992-09-15  [Irrigation].Apply(amount: 3.885);
              1992-09-22  [Irrigation].Apply(amount: 3.885);
              1992-09-29  [Irrigation].Apply(amount: 3.885);
              1992-10-08  [Irrigation].Apply(amount: 41.35583);
              1992-10-15  [Irrigation].Apply(amount: 41.35583);
              1992-10-22  [Irrigation].Apply(amount: 41.35583);
              1992-10-29  [Irrigation].Apply(amount: 41.35583);
              1992-11-08  [Irrigation].Apply(amount: 3.69075);
              1992-11-15  [Irrigation].Apply(amount: 3.69075);
              1992-11-22  [Irrigation].Apply(amount: 3.69075);
              1992-11-29  [Irrigation].Apply(amount: 3.69075);
              1992-12-08  [Irrigation].Apply(amount: 0);
              1992-12-15  [Irrigation].Apply(amount: 0);
              1992-12-22  [Irrigation].Apply(amount: 0);
              1992-12-29  [Irrigation].Apply(amount: 0);
              1993-01-08  [Irrigation].Apply(amount: 11.79098);
              1993-01-15  [Irrigation].Apply(amount: 11.79098);
              1993-01-22  [Irrigation].Apply(amount: 11.79098);
              1993-01-29  [Irrigation].Apply(amount: 11.79098);
              1993-02-08  [Irrigation].Apply(amount: 26.37915);
              1993-02-15  [Irrigation].Apply(amount: 26.37915);
              1993-02-22  [Irrigation].Apply(amount: 26.37915);
              1993-03-01  [Irrigation].Apply(amount: 26.37915);
              1993-03-08  [Irrigation].Apply(amount: 9.51825);
              1993-03-15  [Irrigation].Apply(amount: 9.51825);
              1993-03-22  [Irrigation].Apply(amount: 9.51825);
              1993-03-29  [Irrigation].Apply(amount: 9.51825);
              1993-04-08  [Irrigation].Apply(amount: 47.64953);
              1993-04-15  [Irrigation].Apply(amount: 47.64953);
              1993-04-22  [Irrigation].Apply(amount: 47.64953);
              1993-04-29  [Irrigation].Apply(amount: 47.64953);
              1993-05-08  [Irrigation].Apply(amount: 0);
              1993-05-15  [Irrigation].Apply(amount: 0);
              1993-05-22  [Irrigation].Apply(amount: 0);
              1993-05-29  [Irrigation].Apply(amount: 0);
              1993-06-08  [Irrigation].Apply(amount: 20.70705);
              1993-06-15  [Irrigation].Apply(amount: 20.70705);
              1993-06-22  [Irrigation].Apply(amount: 20.70705);
              1993-06-29  [Irrigation].Apply(amount: 20.70705);
              1993-07-08  [Irrigation].Apply(amount: 17.19113);
              1993-07-15  [Irrigation].Apply(amount: 17.19113);
              1993-07-22  [Irrigation].Apply(amount: 17.19113);
              1993-07-29  [Irrigation].Apply(amount: 17.19113);
              1993-08-08  [Irrigation].Apply(amount: 30.56625);
              1993-08-15  [Irrigation].Apply(amount: 30.56625);
              1993-08-22  [Irrigation].Apply(amount: 30.56625);
              1993-08-29  [Irrigation].Apply(amount: 30.56625);
              1993-09-08  [Irrigation].Apply(amount: 7.724925);
              1993-09-15  [Irrigation].Apply(amount: 7.724925);
              1993-09-22  [Irrigation].Apply(amount: 7.724925);
              1993-09-29  [Irrigation].Apply(amount: 7.724925);
              1993-10-08  [Irrigation].Apply(amount: 30.381);
              1993-10-15  [Irrigation].Apply(amount: 30.381);
              1993-10-22  [Irrigation].Apply(amount: 30.381);
              1993-10-29  [Irrigation].Apply(amount: 30.381);
              1993-11-08  [Irrigation].Apply(amount: 0);
              1993-11-15  [Irrigation].Apply(amount: 0);
              1993-11-22  [Irrigation].Apply(amount: 0);
              1993-11-29  [Irrigation].Apply(amount: 0);
              1993-12-08  [Irrigation].Apply(amount: 10.50368);
              1993-12-15  [Irrigation].Apply(amount: 10.50368);
              1993-12-22  [Irrigation].Apply(amount: 10.50368);
              1993-12-29  [Irrigation].Apply(amount: 10.50368);
              1994-01-08  [Irrigation].Apply(amount: 15.38898);
              1994-01-15  [Irrigation].Apply(amount: 15.38898);
              1994-01-22  [Irrigation].Apply(amount: 15.38898);
              1994-01-29  [Irrigation].Apply(amount: 15.38898);
              1994-02-08  [Irrigation].Apply(amount: 0);
              1994-02-15  [Irrigation].Apply(amount: 0);
              1994-02-22  [Irrigation].Apply(amount: 0);
              1994-03-01  [Irrigation].Apply(amount: 0);
              1994-03-08  [Irrigation].Apply(amount: 7.7805);
              1994-03-15  [Irrigation].Apply(amount: 7.7805);
              1994-03-22  [Irrigation].Apply(amount: 7.7805);
              1994-03-29  [Irrigation].Apply(amount: 7.7805);
          Factor N: Specifications=[FertiliserOperations]
            Operations Zero
            Operations High
              1987-02-09  [Fertiliser].Apply(192, Fertiliser.Types.UreaN, 0);
              1987-05-20  [Fertiliser].Apply(192, Fertiliser.Types.UreaN, 0);
              1987-08-28  [Fertiliser].Apply(96, Fertiliser.Types.UreaN, 0);
              1987-12-06  [Fertiliser].Apply(256, Fertiliser.Types.UreaN, 0);
              1988-02-29  [Fertiliser].Apply(256, Fertiliser.Types.UreaN, 0);
              1988-07-18  [Fertiliser].Apply(128, Fertiliser.Types.UreaN, 0);
              1988-10-26  [Fertiliser].Apply(192, Fertiliser.Types.UreaN, 0);
              1989-06-09  [Fertiliser].Apply(128, Fertiliser.Types.UreaN, 0);
              1989-10-27  [Fertiliser].Apply(96, Fertiliser.Types.UreaN, 0);
        Simulation GympieBase
          Weather: FileName=toolara8797.met
          Clock: StartDate=1987-02-04; EndDate=1997-02-04
          Summary
          SoilArbitrator Soil Arbitrator
          Zone Plantation: Area=0; Slope=0
            Soil: Latitude=0; Longitude=0; Area=0
              InitialWater Initial water: PercentMethod=EvenlyDistributed; FractionFull=0.8
              Water
                Thickness  BD    AirDry  LL15  DUL   SAT
                100        1.5   0.01    0.05  0.16  0.29
                300        1.6   0.01    0.05  0.15  0.29
                600        1.68  0.01    0.05  0.14  0.29
                1000       1.75  0.02    0.05  0.13  0.29
                1000       1.7   0.05    0.05  0.12  0.29
                1000       1.7   0.05    0.05  0.12  0.29
                1000       1.7   0.05    0.05  0.12  0.29
                1000       1.7   0.05    0.05  0.12  0.29
                SoilCrop EucalyptusSoil: LL=[0.05, 0.05, 0.05, 0.05, 0.05, 0.05, 0.05, 0.05]; KL=[0.07, 0.07, 0.05, 0.02, 0.02, 0.02, 0.01, 0.01]; XF=[1, 1, 1, 1, 0, 0, 0, 0]
              SoilWater: SummerDate=1-Nov; SummerU=4; SummerCona=3.5; WinterDate=1-Apr; WinterU=4; WinterCona=3.5; DiffusConst=88; DiffusSlope=35.4; Salb=0.13; CN2Bare=65; CNRed=20; CNCov=0.8; slope=0; discharge_width=0; catchment_area=0; max_pond=0; residueinterception=0
                Thickness  SWCON  KLAT
                100        0.9    0
                300        0.9    0
                600        0.9    0
                1000       0.6    0
                1000       0.6    0
                1000       0.6    0
                1000       0.6    0
                1000       0.6    0
              SoilNitrogen: fom_type=[default, manure, mucuna, lablab, shemp, stable]; fract_carb=[0.2, 0.3, 0.54, 0.57, 0.45, 0]; fract_cell=[0.7, 0.3, 0.37, 0.37, 0.47, 0.1]; fract_lign=[0.1, 0.4, 0.09, 0.06, 0.08, 0.9]; wfpsN2N2O_x=[22, 88]; wfpsN2N2O_y=[0.1, 1]
                oc=[1.7497, 0.750393, 0.467366, 0.155278, 0.117402, 0.102465, 0.102459, 0.102464]
              SoilOrganicMatter: RootCN=60; RootWt=1; SoilCN=14.5; EnrACoeff=7.4; EnrBCoeff=0.2; OCUnits=Total
                Thickness  OC    FBiom  FInert
                100        2     0.02   0.5
                300        1     0.02   0.5
                600        0.5   0.01   0.85
                1000       0.2   0.01   0.5
                1000       0.12  0.01   0.9
                1000       0.1   0.01   0.99
                1000       0.1   0.01   0.99
                1000       0.1   0.01   0.99
              Analysis: Thickness=[100, 300, 600, 1000, 1000, 1000, 1000, 1000]; PH=[5.8, 5.7, 5.7, 5.9, 5.7, 5.7, 5.7, 5.7]; PHUnits=Water; BoronUnits=HotWater
              Sample Initial nitrogen: NO3Units=ppm; NH4Units=ppm; SWUnits=Volumetric; OCUnits=Total; PHUnits=Water
                Thickness  NO3   NH4
                100        0.1   0.01
                300        0.1   0.01
                600        0.1   0.01
                1000       0.01  0.01
                1000       0.01  0.01
                1000       0.01  0.01
                1000       0.01  0.01
                1000       0.01  0.01
            Irrigation
            Fertiliser
            SurfaceOrganicMatter: PoolName=Wheat; type=Wheat; mass=2000; standing_fraction=0; cnr=80; CriticalResidueWeight=2000; OptimumDecompTemp=20; MaxCumulativeEOS=20; CNRatioDecompCoeff=0.277; CNRatioDecompThreshold=25; TotalLeachRain=25; MinRainToLeach=10; CriticalMinimumOrganicC=0.004; DefaultCPRatio=0; DefaultStandingFraction=0; StandingExtinctCoeff=0.5; FractionFaecesAdded=0.5
              Pools:
                {PoolName=Wheat, ResidueType=Wheat, Mass=2000, CNRatio=80, StandingFraction=0}
              ResidueTypes: LoadFromResource=ResidueTypes
              TillageTypes
            MicroClimate: a_interception=0; b_interception=1; c_interception=0; d_interception=0; soil_albedo=0.13; air_pressure=1010; soil_emissivity=0.96; sun_angle=15; soil_heat_flux_fraction=0.4; night_interception_fraction=0.5; windspeed_default=3; refheight=2; albedo=0.293662; emissivity=0.96; gsmax=0.01; r50=200; RadIntTotal=0
            Plant Eucalyptus: CropType=Eucalyptus
            Manager TreeSowingRule
              RowSpace = 3
              RowWidth = 3
              CultivarName = EGrandis
              SowingDate = 1987-02-04
```csharp
using System;
using Models.Core;
using Models.PMF;
namespace Models
{
	[Serializable] 
	[System.Xml.Serialization.XmlInclude(typeof(Model))]
	public class Script : Model
	{
		[Link] Plant Plant;
		[Link] Clock Clock;

		[Description("Spacing (m) between plants within rows")]
		public double RowSpace { get; set; }
		[Description("Spacing (m) between rows")]
		public double RowWidth { get; set; }

		[Description("Cultivar")]
		public string CultivarName { get; set; }
		[Description("Sowing Date")]
		public DateTime SowingDate { get; set; }

		[EventSubscribe("DoManagement")]
		private void OnDoManagement(object sender, EventArgs e)
		{
			double PlantPopulation = 1 / (RowWidth * RowSpace);

			if (Clock.Today.Date == SowingDate)
				Plant.Sow(population: PlantPopulation, 
					cultivar: CultivarName, 
					depth: 100, 
					rowSpacing: 150);
			//Plant.Sow(... Contains the following arguements:
			//Population  double  Required  Seeds sowing/m2
			//Cultivar    string  Required  "NameOfCultivar"
			//Depth       double  Optional  Depth (mm) seed sown.   Default is 100mm 
			//MaxCover    double  Optional  Proportion (0-1) of the ground row crop will cover.   Default is 1.0
			//BudNumber   double  Optional  Number of mainstems per seed sown.  Default is 1.0
			//RowSpacing  double  Optional  Spaceing (mm) between drill rows when crop is sown.  Default is 150mm
			//CropClass   string  Optional  Crop class to instantiate when crop is sown.  Default is "Plant"
		}
	}
}
```
            Operations FertiliserOperations: same as Validation.Gympie.Gympie.Factors.N.High
            Operations IrrigationOperations: same as Validation.Gympie.Gympie.Factors.Irr.High
            Report: EventNames=[Clock].DoReport
              VariableNames:
                [Clock].Today
                Eucalyptus.Phenology.CurrentPhaseName
                Eucalyptus.Phenology.StageCode.Value()
                Eucalyptus.Root.NSupplyUptake
                [Soil].SoilWater.Eo
                [Soil].SoilWater.Es
                [Soil].SoilWater.Drainage
                [Soil].SoilWater.Runoff
                [Soil].SoilWater.pond
                Eucalyptus.AboveGround.Wt
                Eucalyptus.BelowGround.Wt
                Eucalyptus.Total.Wt
                Eucalyptus.Leaf.Dead.Wt
                Eucalyptus.Leaf.Live.Wt
                Eucalyptus.Stem.Dead.Wt
                Eucalyptus.Stem.Live.Wt
                Eucalyptus.Root.Dead.Wt
                Eucalyptus.Root.Live.Wt
                Eucalyptus.AboveGround.N
                Eucalyptus.BelowGround.N
                Eucalyptus.Total.N
                Eucalyptus.TotalLive.N
                Eucalyptus.TotalDead.N
                Eucalyptus.Leaf.Dead.N
                Eucalyptus.Leaf.Live.N
                Eucalyptus.Stem.Dead.N
                Eucalyptus.Stem.Live.N
                Eucalyptus.Root.Live.N
                Eucalyptus.Root.Dead.N
                Eucalyptus.Leaf.Live.NConc
                Eucalyptus.Leaf.Dead.NConc
                Eucalyptus.Stem.Live.NConc
                Eucalyptus.Root.Live.NConc
                Eucalyptus.Root.WaterSupply
                Eucalyptus.Root.WaterUptake
                Eucalyptus.Leaf.Transpiration
                Eucalyptus.Leaf.WaterDemand
                Eucalyptus.Root.Depth
                Eucalyptus.Leaf.CoverGreen
                Eucalyptus.Leaf.CoverTotal
                Eucalyptus.Leaf.CoverDead
                Eucalyptus.Leaf.LAI
                Eucalyptus.Leaf.LAIDead
                Eucalyptus.Leaf.Fn
                Eucalyptus.Leaf.Fw
                Eucalyptus.Leaf.Photosynthesis.FT.Value()
                Eucalyptus.Leaf.Photosynthesis.FVPD.Value()
                Eucalyptus.Stem.MinimumNConc.Value()
                Eucalyptus.Root.MinimumNConc.Value()
                Eucalyptus.Stem.MaximumNConc.Value()
                Eucalyptus.Root.MaximumNConc.Value()
                Eucalyptus.TotalLive.Wt
                Eucalyptus.Stem.Live.StructuralWt
                Eucalyptus.Stem.Live.NonStructuralWt
                Eucalyptus.Leaf.SpecificArea
                Eucalyptus.TotalDead.Wt
                [Soil].SoilWater.SWmm
                [Soil].NO3N
                Eucalyptus.Arbitrator.N.TotalPlantDemand
                Eucalyptus.Leaf.LAIFunction.SpecificLeafArea.Value()
                Eucalyptus.IndividualTreeLiveWt.Value()
                Eucalyptus.Age.Value()
          Input: ErrorMessage=Please select a file to use.
    Folder CoffsHarbour
      Simulation CoffsHarbour
        Weather: FileName=coffs.met
        Clock: StartDate=1953-04-01; EndDate=1983-12-31
        Summary
        SoilArbitrator Soil Arbitrator
        Zone Plantation: Area=0; Slope=0
          Soil: Latitude=0; Longitude=0; Area=0
            InitialWater Initial water: PercentMethod=EvenlyDistributed; FractionFull=0.8
            Water
              Thickness  BD    AirDry  LL15  DUL   SAT
              100        1.5   0.01    0.05  0.16  0.29
              300        1.6   0.01    0.05  0.15  0.29
              600        1.68  0.01    0.05  0.14  0.29
              1000       1.75  0.02    0.05  0.13  0.29
              1000       1.7   0.05    0.05  0.12  0.29
              1000       1.7   0.05    0.05  0.12  0.29
              1000       1.7   0.05    0.05  0.12  0.29
              1000       1.7   0.05    0.05  0.12  0.29
              SoilCrop EucalyptusSoil: LL=[0.05, 0.05, 0.05, 0.05, 0.05, 0.05, 0.05, 0.05]; KL=[0.07, 0.07, 0.05, 0.02, 0.02, 0.02, 0.01, 0.01]; XF=[1, 1, 1, 1, 1, 1, 1, 1]
            SoilWater: same as Validation.Gympie.Gympie.GympieBase.Plantation.Soil.SoilWater
            SoilNitrogen: same as Validation.Gympie.Gympie.GympieBase.Plantation.Soil.SoilNitrogen
            SoilOrganicMatter: same as Validation.Gympie.Gympie.GympieBase.Plantation.Soil.SoilOrganicMatter
            Analysis: Thickness=[100, 300, 600, 1000, 1000, 1000, 1000, 1000]; PH=[5.8, 5.7, 5.7, 5.9, 5.7, 5.7, 5.7, 5.7]; PHUnits=Water; BoronUnits=HotWater
            Sample Initial nitrogen: NO3Units=ppm; NH4Units=ppm; SWUnits=Volumetric; OCUnits=Total; PHUnits=Water
              Thickness  NO3   NH4
              100        0.1   0.01
              300        0.1   0.01
              600        0.1   0.01
              1000       0.01  0.01
              1000       0.01  0.01
              1000       0.01  0.01
              1000       0.01  0.01
              1000       0.01  0.01
          Irrigation
          Fertiliser
          SurfaceOrganicMatter: same as Validation.Gympie.Gympie.GympieBase.Plantation.SurfaceOrganicMatter
          MicroClimate: same as Validation.Gympie.Gympie.GympieBase.Plantation.MicroClimate
          Plant Eucalyptus: CropType=Eucalyptus
          Manager TreeSowingRule
            RowSpace = 3
            RowWidth = 3
            CultivarName = EGrandis
            SowingDate = 1953-04-01
            script: same as in Validation.Gympie.Gympie.GympieBase.Plantation.TreeSowingRule
          Report: EventNames=[Clock].DoReport
            VariableNames:
              [Clock].Today
              Eucalyptus.Phenology.CurrentPhaseName
              Eucalyptus.Phenology.StageCode.Value()
              Eucalyptus.Root.NSupplyUptake
              [Soil].SoilWater.Eo
              [Soil].SoilWater.Es
              [Soil].SoilWater.Drainage
              [Soil].SoilWater.Runoff
              [Soil].SoilWater.pond
              Eucalyptus.AboveGround.Wt
              Eucalyptus.BelowGround.Wt
              Eucalyptus.Total.Wt
              Eucalyptus.Leaf.Dead.Wt
              Eucalyptus.Leaf.Live.Wt
              Eucalyptus.Stem.Dead.Wt
              Eucalyptus.Stem.Live.Wt
              Eucalyptus.Root.Dead.Wt
              Eucalyptus.Root.Live.Wt
              Eucalyptus.AboveGround.N
              Eucalyptus.BelowGround.N
              Eucalyptus.Total.N
              Eucalyptus.TotalLive.N
              Eucalyptus.TotalDead.N
              Eucalyptus.Leaf.Dead.N
              Eucalyptus.Leaf.Live.N
              Eucalyptus.Stem.Dead.N
              Eucalyptus.Stem.Live.N
              Eucalyptus.Root.Live.N
              Eucalyptus.Root.Dead.N
              Eucalyptus.Leaf.Live.NConc
              Eucalyptus.Leaf.Dead.NConc
              Eucalyptus.Stem.Live.NConc
              Eucalyptus.Root.Live.NConc
              Eucalyptus.Root.WaterSupply
              Eucalyptus.Root.WaterUptake
              Eucalyptus.Leaf.Transpiration
              Eucalyptus.Leaf.WaterDemand
              Eucalyptus.Root.Depth
              Eucalyptus.Leaf.CoverGreen
              Eucalyptus.Leaf.CoverTotal
              Eucalyptus.Leaf.CoverDead
              Eucalyptus.Leaf.LAI
              Eucalyptus.Leaf.LAIDead
              Eucalyptus.Leaf.Fn
              Eucalyptus.Leaf.Fw
              Eucalyptus.Leaf.Photosynthesis.FT.Value()
              Eucalyptus.Leaf.Photosynthesis.FVPD.Value()
              Eucalyptus.Stem.MinimumNConc.Value()
              Eucalyptus.Root.MinimumNConc.Value()
              Eucalyptus.Stem.MaximumNConc.Value()
              Eucalyptus.Root.MaximumNConc.Value()
              Eucalyptus.TotalLive.Wt
              Eucalyptus.Stem.Live.StructuralWt
              Eucalyptus.Stem.Live.NonStructuralWt
              Eucalyptus.Leaf.SpecificArea
              Eucalyptus.TotalDead.Wt
              [Soil].SoilWater.SWmm
              [Soil].NO3N
              Eucalyptus.Arbitrator.N.TotalPlantDemand
              Eucalyptus.Leaf.LAIFunction.SpecificLeafArea.Value()
              Eucalyptus.IndividualTreeLiveWt.Value()
              Eucalyptus.Age.Value()
              Eucalyptus.Leaf.Photosynthesis.Value()
              Eucalyptus.Arbitrator.N.TotalPlantSupply
              ([SurfaceOrganicMatter].Wt / 10)  as Litter
        Input: ErrorMessage=Please select a file to use.
    Folder Wagga
      Simulation Wagga
        Weather: FileName=wwepp.met
        Clock: StartDate=1991-07-01; EndDate=1996-06-30
        Summary
        SoilArbitrator Soil Arbitrator
        Zone Plantation: Area=0; Slope=0
          Soil: same as Validation.Gympie.Gympie.GympieBase.Plantation.Soil
          Irrigation
          Fertiliser
          SurfaceOrganicMatter: same as Validation.Gympie.Gympie.GympieBase.Plantation.SurfaceOrganicMatter
          MicroClimate: same as Validation.Gympie.Gympie.GympieBase.Plantation.MicroClimate
          Plant Eucalyptus: CropType=Eucalyptus
          Manager TreeSowingRule
            RowSpace = 3
            RowWidth = 3
            CultivarName = EGrandis
            SowingDate = 1991-07-01
            script: same as in Validation.Gympie.Gympie.GympieBase.Plantation.TreeSowingRule
          Operations FertiliserOperations: same as Validation.Gympie.Gympie.Factors.N.High
          Report: same as Validation.Gympie.Gympie.GympieBase.Plantation.Report
          Manager AutoFertigate
            FASW = 0
            WaterDeficit = 0
            AutoIrrigationOn = True
            FASWThreshold = 0.9
            FASWDepth = 1000
```csharp
using System;
using Models.Core;
using System.Collections.Generic;
using System.Text;
using Models.Soils;
using Models.PMF;
using Models;
using System.Xml.Serialization;
using APSIM.Shared.Utilities;

namespace Models
{
	[Serializable] 
	public class Script : Model
	{
		public double FASW { get; set; }
		public double WaterDeficit  { get; set; }
	
		[Link] Plant Chickpea;
		[Link] Zone zone;
		[Link] Irrigation irrigation;
		[Link] Fertiliser fertiliser;
		[Link] Soil soil;
		
		[Description("Auto irrigation on?")]
		public bool AutoIrrigationOn { get; set; }
		
		[Description("Threshold fraction available water (0-1)")]
		public double FASWThreshold { get; set; }

		[Description("Soil depth (mm) to which fraction available water is calculated")]
		public double FASWDepth { get; set; }

		[EventSubscribe("DoManagement")]
		private void OnDoManagement(object sender, EventArgs e)
		{
			CalculateFASW();
			if (AutoIrrigationOn)
			{
				if (FASW < FASWThreshold)
				{
					double amount = 10;
					irrigation.Apply(WaterDeficit, depth: 0);
					fertiliser.Apply(Amount: 10, Type: Fertiliser.Types.NO3N);
				}
			}
		}
		
		private void CalculateFASW()
		{
			double[] LL15 = MathUtilities.Multiply(soil.LL15, soil.Thickness);
			double[] DUL = MathUtilities.Multiply(soil.DUL, soil.Thickness);
		
			int nlayr = GetLayerIndex();
			double cumdep = MathUtilities.Sum(soil.Thickness, 0, nlayr, 0.0);

			double excess_fr = MathUtilities.Divide((cumdep - FASWDepth), soil.Thickness[nlayr], 0.0);

			// note that results may be strange if swdep < ll15
			double avail_sw = (MathUtilities.Sum(soil.Water, 0, nlayr, 0.0)
			                  - excess_fr * soil.Water[nlayr])
			                  - (MathUtilities.Sum(LL15, 0, nlayr, 0.0)
			                  - excess_fr * LL15[nlayr]);


			double pot_avail_sw = (MathUtilities.Sum(DUL, 0, nlayr, 0.0)
			                      - excess_fr * DUL[nlayr])
			                      - (MathUtilities.Sum(LL15, 0, nlayr, 0.0)
			                      - excess_fr * LL15[nlayr]);

			FASW = MathUtilities.Divide(avail_sw, pot_avail_sw, 0.0);
			WaterDeficit = MathUtilities.Constrain(pot_avail_sw - avail_sw, 0.0, 100000);
		}

		private int GetLayerIndex()
		{
			double[] cumThickness = Soil.ToCumThickness(soil.Thickness);
			for (int i = 1; i < cumThickness.Length; i++)
			{
				if (FASWDepth < cumThickness[i])
					return i - 1;
			}
			
			return cumThickness.Length - 1;
		}

	}
}
```
    Simulation GympieBasex: same as Validation.Gympie.Gympie.GympieBase
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