Simulations: Version=2
  Replacements
    Plant Fathen
      OrganArbitrator Arbitrator: NArbitrationOption=RelativeAllocation; DMArbitrationOption=RelativeAllocation
      Phenology: DaysAfterSowing=0
        GerminatingPhase Planted: Start=Sowing; End=Germination
        EmergingPhase Germinating: Start=Germination; End=PreEmerge; ShootLag=1; ShootRate=20
          VariableReference ThermalTime: VariableName=[Phenology].ThermalTime.Value
          Memo
            Turned off the lag and used only the Tt per mm to empirically fit simulations to FRNL data of emergence.
        GenericPhase Emerging: Start=PreEmerge; End=Emerged
          Constant Target: Value=300
          VariableReference ThermalTime: VariableName=[Phenology].ThermalTime.Value
        GenericPhase Emerged: Start=Emerged; End=Expanding
          Constant Target: Value=150
          VariableReference ThermalTime: VariableName=[Phenology].ThermalTime.Value
        GenericPhase Expanding: Start=Expanding; End=Vegetative
          Constant Target: Value=150
          VariableReference ThermalTime: VariableName=[Phenology].ThermalTime.Value
        GenericPhase Vegetative: Start=Vegetative; End=EarlyReproductive
          Constant Target: Value=150
          VariableReference ThermalTime: VariableName=[Phenology].ThermalTime.Value
        GenericPhase EarlyFlowering: Start=Vegetative; End=EarlyReproductive
          Constant Target: Value=2000
          VariableReference ThermalTime: VariableName=[Phenology].ThermalTime.Value
        GenericPhase Flowering: Start=EarlyReproductive; End=Reproductive
          Constant Target: Value=3000
          VariableReference ThermalTime: VariableName=[Phenology].ThermalTime.Value
        EndPhase Maturity: Start=Reproductive; End=Maturity
          Constant Target: Value=15000
          VariableReference ThermalTime: VariableName=[Phenology].ThermalTime.Value
        AirTemperatureFunction ThermalTime
          XYPairs: X=[0, 18, 36]; Y=[0, 18, 0]
      Structure: Initialised=false; Germinated=false; Emerged=false; CohortToInitialise=0; TipToAppear=0
        VariableReference ThermalTime: VariableName=[Phenology].ThermalTime.Value
        PhaseLookupValue MainStemNodeAppearanceRate: Start=Emergence; End=Maturity
          Constant: Value=17
        Constant MainStemFinalNodeNumber: Value=60
        Constant DroughtInducedBranchMortality: Value=0
        Constant BranchMortality: Value=0
        MultiplyFunction BranchingRate
          LinearInterpolationFunction PotentialBranchingRate: XProperty=[Structure].LeafTipsAppeared
            XYPairs: X=[0, 20]; Y=[0, 1]
          LinearInterpolationFunction CoverResponse: XProperty=[Structure].LeafTipsAppeared
            XYPairs: X=[0, 1]; Y=[1, 1]
        LinearInterpolationFunction HeightModel: XProperty=[Structure].LeafTipsAppeared
          XYPairs: X=[0, 12, 60]; Y=[0, 100, 2000]
        LinearInterpolationFunction PlantMortality: XProperty=[Leaf].CoverGreen
          XYPairs: X=[0.98, 1]; Y=[0, 1]
      Leaf: MaxCover=1; R50=200; MicroClimatePresent=true; KDead=0.03; MaximumMainStemLeafNumber=80
        zero: GrowthRespiration, MaintenanceRespiration, CurrentExpandingLeaf, StartFractionExpanded, FractionNextleafExpanded, DeadNodesYesterday, Albedo, Gsmax, FRGR, PotentialEP, DMConversionEfficiency, TipsAtEmergence, CohortsAtInitialisation, FractionDied
        LeafCohort InitialLeaves[1]: DeltaWaterConstrainedArea=0; DeltaCarbonConstrainedArea=0; Rank=1; Area=50; MaintenanceRespiration=0
        CompositeBiomass Live: Propertys=[[Leaf].CohortLive]
        CompositeBiomass Dead: Propertys=[[Leaf].CohortDead]
        CompositeBiomass Total: Propertys=[[Leaf].CohortLive, [Leaf].CohortDead]
        ArrayBiomass CohortArrayLive: Propertys=[[Leaf].Live]; ArraySize=[Leaf].MaxNodeNo
        ArrayBiomass CohortArrayDead: Propertys=[[Leaf].Dead]; ArraySize=[Leaf].MaxNodeNo
        VariableReference ThermalTime: VariableName=[Phenology].ThermalTime.Value
        RUEModel Photosynthesis
          Constant RUE: Value=1.35
          Constant FN: Value=1
          Constant FVPD: Value=1
          WeightedTemperatureFunction FT: MaximumTemperatureWeighting=0.75
            XYPairs ft: X=[0, 18, 26, 45]; Y=[0.1, 1, 1, 0.1]
          LinearInterpolationFunction FW: XProperty=[Leaf].Fw
            XYPairs fw: X=[0, 0.4, 1.5]; Y=[0, 1, 1]
          RUECO2Function FCO2: PhotosyntheticPathway=C3
          VariableReference RadnInt: VariableName=[Leaf].RadIntTot
          VariableReference RUEact: VariableName=[RUEModel].RueAct
        LinearInterpolationFunction FrostFraction: XProperty=[Weather].MinT
          XYPairs frost: X=[-1, 0]; Y=[0, 0]
        MultiplyFunction ExtinctionCoeff
          Constant PotentialExtinctionCoeff: Value=0.6
          LinearInterpolationFunction WaterStress: XProperty=[Fathen].WaterSupplyDemandRatio
            XYPairs stress: X=[0, 1]; Y=[0.5, 1]
        LeafCohortParameters CohortParameters
          Constant SenessingLeafRelativeSize: Value=1; Units=0-1
          LinearInterpolationFunction MaxArea: XProperty=[Structure].LeafTipsAppeared
            XYPairs area
              X=[0, 1, 4, 7, 12, 18, 24, 32, 40, 50]
              Y=[500, 16000, 120000, 190000, 135000, 113000, 60000, 20000, 1200, 400]
            Memo
              Data source ?
          LinearInterpolationFunction GrowthDuration: XProperty=[Structure].LeafTipsAppeared
            XYPairs growth: X=[1, 50]; Y=[240, 240]
            Memo
              A Data source
          LinearInterpolationFunction LagDuration: XProperty=[Structure].LeafTipsAppeared
            XYPairs duration: X=[1, 6, 11, 15, 21, 35, 45, 50]; Y=[100, 200, 300, 300, 300, 200, 100, 80]
          Constant SenescenceDuration: Value=0.0001
          Constant DetachmentLagDuration: Value=1000000
          Constant DetachmentDuration: Value=100000
          Constant StructuralFraction: Value=0.6
          Constant SpecificLeafAreaMin: Value=14000
          Constant SpecificLeafAreaMax: Value=18000
          LinearInterpolationFunction ExpansionStress: XProperty=[Fathen].WaterSupplyDemandRatio
            XYPairs expansion: X=[0.5, 1]; Y=[0, 1]
          Constant MinimumNConc: Value=0.02
          Constant CriticalNConc: Value=0.03
          Constant MaximumNConc: Value=0.06
          Constant NReallocationFactor: Value=0.8
          Constant NRetranslocationFactor: Value=0.01
          Constant DMRetranslocationFactor: Value=0.95
          Constant DMReallocationFactor: Value=0.8
          Constant NonStructuralFraction: Value=0.2
            Constant NonStructuralFraction: Value=0.2
          LinearInterpolationFunction ShadeInducedSenescenceRate: XProperty=[Leaf].CohortCurrentRankCoverAbove
            XYPairs shade: X=[0, 0.5, 0.95, 1]; Y=[0, 0, 0, 0]
          Constant InitialNConc: Value=0.18
        MinimumFunction FRGRFunction
          VariableReference RUE_FT: VariableName=[Leaf].Photosynthesis.FT.Value
          MinimumFunction Others
            VariableReference RUE_FN: VariableName=[Leaf].Photosynthesis.FN.Value
            VariableReference RUE_FVPD: VariableName=[Leaf].Photosynthesis.FVPD.Value
        Constant StructuralFraction: Value=0.6
        Constant DMConversionEfficiencyFunction: Value=1
        BiomassRemoval BiomassRemovalDefaults
          OrganBiomassRemovalType Harvest: FractionLiveToRemove=0.5; FractionDeadToRemove=0; FractionLiveToResidue=0.1; FractionDeadToResidue=0
          OrganBiomassRemovalType Cut: FractionLiveToRemove=0.8; FractionDeadToRemove=0; FractionLiveToResidue=0; FractionDeadToResidue=0
          OrganBiomassRemovalType Prune: FractionLiveToRemove=0; FractionDeadToRemove=0; FractionLiveToResidue=0.6; FractionDeadToResidue=0
          OrganBiomassRemovalType Graze: FractionLiveToRemove=0.6; FractionDeadToRemove=0; FractionLiveToResidue=0.2; FractionDeadToResidue=0
      Root: GrowthRespiration=0; MaintenanceRespiration=0
        Constant KLModifier: Value=1
        Constant SoilWaterEffect: Value=1
        AirTemperatureFunction TemperatureEffect
          XYPairs temperature: X=[0, 26, 35]; Y=[1, 1, 1]
        PhaseLookup RootFrontVelocity
          PhaseLookupValue Emerging: Start=Germination; End=Emergence
            Constant: Value=1
          PhaseLookupValue Emerged: Start=Emergence; End=Maturity
            Constant: Value=10
        Constant MaximumNConc: Value=0.01
        Constant MinimumNConc: Value=0.005
        PhaseBasedSwitch NitrogenDemandSwitch: Start=Emergence; End=Maturity
        LinearInterpolationFunction SenescenceRate: XProperty=[Leaf].FractionDied
          XYPairs senescense: X=[0, 1]; Y=[0, 0.001]
        CompositeBiomass Live: Propertys=[[Root].LayerLive]
        CompositeBiomass Dead: Propertys=[[Root].LayerDead]
        Constant MaxDailyNUptake: Value=7.5
        Constant StructuralFraction: Value=1
        Folder BiomassRemovalDefaults
          OrganBiomassRemovalType Harvest: FractionLiveToRemove=0; FractionDeadToRemove=0; FractionLiveToResidue=0.2; FractionDeadToResidue=0
          OrganBiomassRemovalType Cut: FractionLiveToRemove=0; FractionDeadToRemove=0; FractionLiveToResidue=0.3; FractionDeadToResidue=0
          OrganBiomassRemovalType Prune: FractionLiveToRemove=0; FractionDeadToRemove=0; FractionLiveToResidue=0.1; FractionDeadToResidue=0
          OrganBiomassRemovalType Graze: FractionLiveToRemove=0; FractionDeadToRemove=0; FractionLiveToResidue=0.15; FractionDeadToResidue=0
        LinearInterpolationFunction KNO3: XProperty=[Root].RootLengthDenisty
          XYPairs kno3: X=[0, 0.003]; Y=[0.02, 0.02]
        LinearInterpolationFunction KNH4: XProperty=[Root].RootLengthDenisty
          XYPairs knh4: X=[0, 0.003]; Y=[0, 0]
        LinearInterpolationFunction NUptakeSWFactor: XProperty=[Root].RWC
          XYPairs nuptake: X=[0, 1]; Y=[0, 1]
        Constant InitialDM: Value=5; Units=g/plant
        Constant SpecificRootLength: Value=40; Units=m/g
        PhaseLookup PartitionFraction
          PhaseLookupValue Early: Start=Emergence; End=Vegetative
            Constant: Value=0.3
          PhaseLookupValue Vege: Start=Vegetative; End=EarlyReproductive
            Constant: Value=0.1
          PhaseLookupValue EarlyFlowering: Start=EarlyReproductive; End=Reproductive
            Constant: Value=0
          PhaseLookupValue Repro: Start=Reproductive; End=Maturity
            Constant: Value=0
          PhaseLookupValue PostMaturity: Start=Maturity; End=Unused
            Constant: Value=0
      Cultivar Std
  Simulation FathenTest
    Clock: StartDate=2013-12-19; EndDate=2014-06-01
    Summary summaryfile
    Weather: FileName=C:\apsim_dev\Data\MetFiles\Ruakura13-15.met
    Zone paddock: Area=1; Slope=0
      Soil Horotiu: Latitude=0; Longitude=0; Area=0
        Analysis: PHUnits=Water; BoronUnits=HotWater
          Thickness  PH   CEC
          100        5.7  28.2
          200        5.3  21
          300        5.9  12
          300        6.6  12
          300        6.7  12
          300        6    12
        InitialWater Initial water: PercentMethod=EvenlyDistributed; FractionFull=1
        Water
          Thickness  BD     AirDry  LL15  DUL    SAT
          100        0.865  0.08    0.23  0.056  0.58
          200        0.865  0.069   0.21  0.51   0.61
          300        0.82   0.068   0.28  0.47   0.62
          300        0.82   0.088   0.3   0.48   0.62
          300        0.99   0.12    0.3   0.48   0.62
          300        1.5    0.18    0.3   0.48   0.62
          SoilCrop FodderBeetSoil: LL=[0.13, 0.13, 0.1, 0.08, 0.11, 0.11]; KL=[0.06, 0.06, 0.06, 0.06, 0.06, 0.06]; XF=[1, 1, 1, 1, 1, 1]
          SoilCrop FathenSoil: LL=[0.11, 0.114, 0.16, 0.2, 0.2, 0.2]; KL=[0.07, 0.07, 0.07, 0.04, 0.04, 0.04]; XF=[1, 1, 1, 1, 1, 1]
          SoilCrop PotatoSoil: LL=[0.13, 0.13, 0.27, 0.27, 0.3, 0.3]; KL=[0.1, 0.06, 0.03, 0.01, 0, 0]; XF=[1, 1, 0.1, 0, 0, 0]
        SoilWater: SummerDate=1-Nov; SummerU=9; SummerCona=4.4; WinterDate=1-Apr; WinterU=9; WinterCona=4.4; DiffusConst=88; DiffusSlope=35.4; Salb=0.18; CN2Bare=68; CNRed=20; CNCov=0.8; max_pond=0; Thickness=[100, 200, 300, 300, 300, 300]; SWCON=[0.55, 0.55, 0.55, 0.55, 0.55, 0.55]; residueinterception=0
        SoilNitrogen: fom_type=[default, manure, mucuna, lablab, shemp, stable]; fract_carb=[0.2, 0.3, 0.54, 0.57, 0.45, 0]; fract_cell=[0.7, 0.3, 0.37, 0.37, 0.47, 0.1]; fract_lign=[0.1, 0.4, 0.09, 0.06, 0.08, 0.9]; wfpsN2N2O_x=[22, 88]; wfpsN2N2O_y=[0.1, 1]
        SoilOrganicMatter: RootCN=30; RootWt=3000; SoilCN=11.5; EnrACoeff=7.4; EnrBCoeff=0.2; OCUnits=Total
          Thickness  OC    FBiom  FInert
          100        1.82  0.025  0.3
          200        1.47  0.025  0.4
          300        1.2   0.015  0.75
          300        1.03  0.01   0.9
          300        0.47  0.01   0.96
          300        0.47  0.01   0.96
        Sample: NO3Units=kgha; NH4Units=ppm; SWUnits=Volumetric; OCUnits=Total; PHUnits=Water
          Thickness  NO3  NH4
          100        217  0
          200        30   0
          300        5    0
          300        5    0
          300        0    0
          300        0    0
      Plant Fathen
      MicroClimate: a_interception=0; b_interception=1; c_interception=0; d_interception=0; soil_albedo=0.23; sun_angle=15; soil_heat_flux_fraction=0.4; night_interception_fraction=0.5; refheight=2; albedo=0.26; emissivity=0.96; RadIntTotal=0
      Irrigation
      Fertiliser
      SurfaceOrganicMatter surface organic matter: PoolName=wheat; type=wheat; mass=0; standing_fraction=0; cnr=80; CriticalResidueWeight=2000; OptimumDecompTemp=20; MaxCumulativeEOS=20; CNRatioDecompCoeff=0.277; CNRatioDecompThreshold=25; TotalLeachRain=25; MinRainToLeach=10; CriticalMinimumOrganicC=0.004; DefaultCPRatio=0; DefaultStandingFraction=0; StandingExtinctCoeff=0.5; FractionFaecesAdded=0.5
        Pools:
          {PoolName=wheat, ResidueType=wheat, Mass=0, CNRatio=80, StandingFraction=0}
        ResidueTypes ResidueTypesList: LoadFromResource=ResidueTypes
      Report: EventNames=[Clock].EndOfDay
        VariableNames:
          [Clock].Today
          [Weather].MaxT
          [Weather].MinT
          [Weather].Radn
          [Weather].Rain
          [Fathen].Root.Total.Value
          [Fathen].Stem.Total.Value
          [Fathen].Leaf.Total.Value
          [Fathen].Leaf.LAI.Value
      Folder Manager Folder
        Operations OpperationsSchedule
          2013-12-20  [Fathen].Sow(population:1.078, cultivar:"Std", depth:5, rowSpacing:500);
    SoilArbitrator Soil Arbitrator
  DataStore
