Simulations: Version=2
  Replacements
    Plant FodderBeet: CropType=FodderBeet
      Cultivar Rivage
      Cultivar Brigadier
      OrganArbitrator Arbitrator: NArbitrationOption=RelativeAllocation; DMArbitrationOption=RelativeAllocation
      Phenology: DaysAfterSowing=0
        MultiplyFunction ThermalTime
          PhaseLookup
            PhaseLookupValue SoilTemperature: Start=Sowing; End=Germination
              SoilTemperatureFunction ThermalTime: maxt_soil_surface=20; mint_soil_surface=10
                XYPairs: X=[0, 25, 30, 45]; Y=[0, 25, 25, 0]
              Memo
                Soil temperature may be extended beyond germination (e.g. based on leaf numbers) - need data to back up
            PhaseLookupValue AirTemperature: Start=Germination; End=Maturity
              AirTemperatureFunction ThermalTime
                XYPairs: X=[0, 25, 30, 45]; Y=[0, 25, 25, 0]
          AddFunction DroughtPhenologyAcelleration
            Constant One: Value=1
            MultiplyFunction Stress
              Constant StressResponseCoefficient: Value=2
              LinearInterpolationFunction StressFactor: XProperty=[FodderBeet].WaterSupplyDemandRatio
                XYPairs: X=[0, 1]; Y=[0, 0]
        GerminatingPhase Planted: Start=Sowing; End=Germination
        EmergingPhase Germinating: Start=Germination; End=PreEmerge; ShootLag=1; ShootRate=20
          VariableReference ThermalTime: VariableName=[Phenology].ThermalTime.Value
          Memo
            Turned off the lag and used only the Tt per mm to empirically fit simulations to FRNL data of emergence.
        GenericPhase Emerging: Start=PreEmerge; End=Established
          Constant Target: Value=400
          VariableReference ThermalTime: VariableName=[Phenology].ThermalTime.Value
        GenericPhase Vegetative: Start=Established; End=InitRepro
          Constant Target: Value=2500
          VariableReference ThermalTime: VariableName=[Phenology].ThermalTime.Value
        GenericPhase Reproductive: Start=InitRepro; End=StartBolt
          Constant Target: Value=1000
          VariableReference ThermalTime: VariableName=[Phenology].ThermalTime.Value
        GenericPhase Bolt: Start=StartBolt; End=Bolting
          Constant Target: Value=800
          VariableReference ThermalTime: VariableName=[Phenology].ThermalTime.Value
        EndPhase Maturity: Start=Bolting; End=Maturity
          Constant Target: Value=15000
          VariableReference ThermalTime: VariableName=[Phenology].ThermalTime.Value
        AccumulateFunction AccumulatedThermalTime: StartStageName=PreEmerge; EndStageName=Maturity
          VariableReference: VariableName=[Phenology].ThermalTime.Value
        PhotoperiodFunction Photoperiod: Twilight=-6; DayLength=0
      Structure: Initialised=false; Germinated=false; Emerged=false; CohortToInitialise=0; TipToAppear=0
        VariableReference ThermalTime: VariableName=[Phenology].ThermalTime.Value
        LinearInterpolationFunction HeightModel: XProperty=[Structure].LeafTipsAppeared
          XYPairs: X=[0, 24]; Y=[20, 2500]
        PhaseLookupValue MainStemPrimordiaInitiationRate: Start=PreEmerge; End=Maturity
          DivideFunction NodeInitiationRateFunction
            VariableReference Phyllochron: VariableName=[Structure].MainStemNodeAppearanceRate.Phyllochron.Value
            Constant PrimordiaPerMainstemNode: Value=2
        PhaseLookupValue MainStemNodeAppearanceRate: Start=PreEmerge; End=Maturity
          LinearInterpolationFunction Phyllochron: XProperty=[FodderBeet].Structure.LeafTipsAppeared
            XYPairs: X=[1, 3, 3.1]; Y=[100, 100, 47]
            Memo
              Measured value of 45-53oCd/leaf from Emmanuel's data and FRNL data too.

              Two stage phyllochron (100oCd to 50oCd) is an empirical fix to get first leaves right. May be in fact response to soil temperature at later stages. To check.

              There seems to be a seasonal difference in leaf appearance rates across sowing dates. So we should check thermal-time model.
        Constant MainStemFinalNodeNumber: Value=80
        Constant DroughtInducedBranchMortality: Value=0
        Constant BranchingRate: Value=0
        Constant BranchMortality: Value=0
      Leaf: MaxCover=1; R50=200; KDead=0.03; MaximumMainStemLeafNumber=80
        zero: GrowthRespiration, MaintenanceRespiration, CurrentExpandingLeaf, StartFractionExpanded, FractionNextleafExpanded, DeadNodesYesterday, Albedo, Gsmax, FRGR, PotentialEP, FudgeToGetETDemandRight, DMConversionEfficiency, TipsAtEmergence, CohortsAtInitialisation, FractionDied
        LeafCohort InitialLeaves[1]: DeltaWaterConstrainedArea=0; DeltaCarbonConstrainedArea=0; Rank=1; Area=50; MaintenanceRespiration=0
        CompositeBiomass Live: Propertys=[[Leaf].CohortLive]
        CompositeBiomass Dead: Propertys=[[Leaf].CohortDead]
        CompositeBiomass Total: Propertys=[[Leaf].CohortLive, [Leaf].CohortDead]
        ArrayBiomass CohortArrayLive: Propertys=[[Leaf].Live]; ArraySize=[Leaf].MaxNodeNo
        ArrayBiomass CohortArrayDead: Propertys=[[Leaf].Dead]; ArraySize=[Leaf].MaxNodeNo
        VariableReference ThermalTime: VariableName=[Phenology].ThermalTime.Value
        RUEModel Photosynthesis
          Constant RUE: Value=1.6
          Constant FN: Value=1
          Constant FVPD: Value=1
          WeightedTemperatureFunction FT: MaximumTemperatureWeighting=0.75
            XYPairs: X=[0, 18, 26, 45]; Y=[0.1, 1, 1, 0.1]
          LinearInterpolationFunction FW: XProperty=[Leaf].Fw
            XYPairs: X=[0, 0.4, 1.5]; Y=[0, 1, 1]
          RUECO2Function FCO2: PhotosyntheticPathway=C3
          VariableReference RadnInt: VariableName=[Leaf].RadIntTot
          VariableReference RUEact: VariableName=[RUEModel].RueAct
        LinearInterpolationFunction FrostFraction: XProperty=[Weather].MinT
          XYPairs: X=[-1, 0]; Y=[0, 0]
        MultiplyFunction ExtinctionCoeff
          Constant PotentialExtinctionCoeff: Value=0.75
          LinearInterpolationFunction WaterStress: XProperty=[FodderBeet].WaterSupplyDemandRatio
            XYPairs: X=[0, 1]; Y=[0.5, 1]
        LeafCohortParameters CohortParameters
          LinearInterpolationFunction MaxArea: XProperty=[Structure].LeafTipsAppeared
            XYPairs: X=[1, 6, 11, 15, 21, 35, 45, 50]; Y=[8000, 10000, 40000, 50000, 40000, 20000, 15000, 10000]
            Memo
              Pattern of max leaf area assumed from sugar beet: Milford et al. 1985
              Values from measurments A-Block FRNL experiment 2014-15 Plant & Food
          LinearInterpolationFunction GrowthDuration: XProperty=[Structure].LeafTipsAppeared
            XYPairs: X=[1, 6, 11, 15, 21, 35, 45, 50]; Y=[200, 300, 500, 500, 500, 400, 300, 200]
            Memo
              Assumed shape as maize data (Teixeira et al 2011).
          MultiplyFunction LagDuration
            LinearInterpolationFunction PhotoperiodMultiplier: XProperty=[Phenology].Photoperiod.Value
              XYPairs: X=[1, 10, 13, 24]; Y=[0, 0, 1, 1]
              Memo
                Assumed shape as maize data (Teixeira et al 2011).
            LinearInterpolationFunction LagDurationBase: XProperty=[Structure].LeafTipsAppeared
              XYPairs: X=[1, 6, 11, 15, 21, 35, 45, 50]; Y=[100, 200, 300, 300, 300, 200, 100, 80]
          MultiplyFunction SenescenceDuration
            LinearInterpolationFunction PhotoperiodMultiplier: XProperty=[Phenology].Photoperiod.Value
              XYPairs: X=[1, 10, 13, 24]; Y=[1, 1, 1, 1]
            Constant BaseValue: Value=600; Units=oCd
          Constant DetachmentLagDuration: Value=1000000
          Constant DetachmentDuration: Value=1
          Constant StructuralFraction: Value=0.5
          Constant SpecificLeafAreaMin: Value=14000
          Constant SpecificLeafAreaMax: Value=18000
          LinearInterpolationFunction ExpansionStress: XProperty=[FodderBeet].WaterSupplyDemandRatio
            XYPairs: X=[0.5, 1]; Y=[0, 1]
          Constant MinimumNConc: Value=0.015
          Constant CriticalNConc: Value=0.02
          Constant MaximumNConc: Value=0.035
          Constant NReallocationFactor: Value=0.95
          Constant NRetranslocationFactor: Value=0.01
          Constant DMRetranslocationFactor: Value=0.95
          Constant DMReallocationFactor: Value=0.95
          Constant NonStructuralFraction: Value=0.2
            Constant NonStructuralFraction: Value=0.2
          LinearInterpolationFunction ShadeInducedSenescenceRate: XProperty=[Leaf].CohortCurrentRankCoverAbove
            XYPairs: X=[0, 0.5, 0.95, 1]; Y=[0, 0, 0, 0.1]
          Constant InitialNConc: Value=0
          Constant SenessingLeafRelativeSize: Value=1; Units=0-1
          Constant LeafSizeShapeParameter: Value=0.01
          Constant MaintenanceRespirationFunction: Value=0
        MinimumFunction FRGRFunction
          VariableReference RUE_FT: VariableName=[Leaf].Photosynthesis.FT.Value
          MinimumFunction Others
            VariableReference RUE_FN: VariableName=[Leaf].Photosynthesis.FN.Value
            VariableReference RUE_FVPD: VariableName=[Leaf].Photosynthesis.FVPD.Value
        Folder BiomassRemovalDefaults
          OrganBiomassRemovalType Harvest: FractionLiveToRemove=0; FractionDeadToRemove=0; FractionLiveToResidue=0.3; FractionDeadToResidue=0
          OrganBiomassRemovalType Cut: FractionLiveToRemove=0.8; FractionDeadToRemove=0; FractionLiveToResidue=0; FractionDeadToResidue=0
          OrganBiomassRemovalType Prune: FractionLiveToRemove=0; FractionDeadToRemove=0; FractionLiveToResidue=0.6; FractionDeadToResidue=0
          OrganBiomassRemovalType Graze: FractionLiveToRemove=0.6; FractionDeadToRemove=0; FractionLiveToResidue=0.1; FractionDeadToResidue=0
        Constant StructuralFraction: Value=0.5
      Root: GrowthRespiration=0; MaintenanceRespiration=0
        LinearInterpolationFunction KLModifier: XProperty=[Root].RootLengthDensity
          XYPairs: X=[0, 1]; Y=[1, 1]
        Constant SoilWaterEffect: Value=1
        Constant PartitionFraction: Value=0.05
        AirTemperatureFunction TemperatureEffect
          XYPairs: X=[0, 26, 35]; Y=[1, 1, 1]
        PhaseLookup RootFrontVelocity
          PhaseLookupValue: Start=Germination; End=Maturity
            Constant: Value=10
        Constant MaximumNConc: Value=0.01
        Constant MinimumNConc: Value=0.005
        Constant MaximumRootDepth: Value=1000000
        PhaseBasedSwitch NitrogenDemandSwitch: Start=PreEmerge; End=Maturity
        LinearInterpolationFunction SenescenceRate: XProperty=[Leaf].FractionDied
          XYPairs: X=[0, 1]; Y=[0, 0.001]
        CompositeBiomass Live: Propertys=[[Root].LayerLive]
        CompositeBiomass Dead: Propertys=[[Root].LayerDead]
        Constant MaxDailyNUptake: Value=7.5
        Constant StructuralFraction: Value=0.8
        Folder BiomassRemovalDefaults
          OrganBiomassRemovalType Harvest: FractionLiveToRemove=0; FractionDeadToRemove=0; FractionLiveToResidue=0.2; FractionDeadToResidue=0
          OrganBiomassRemovalType Cut: FractionLiveToRemove=0; FractionDeadToRemove=0; FractionLiveToResidue=0.3; FractionDeadToResidue=0
          OrganBiomassRemovalType Prune: FractionLiveToRemove=0; FractionDeadToRemove=0; FractionLiveToResidue=0.1; FractionDeadToResidue=0
          OrganBiomassRemovalType Graze: FractionLiveToRemove=0; FractionDeadToRemove=0; FractionLiveToResidue=0.15; FractionDeadToResidue=0
        LinearInterpolationFunction KNO3: XProperty=[Root].RootLengthDenisty
          XYPairs: X=[0, 0.003]; Y=[0.02, 0.02]
        LinearInterpolationFunction KNH4: XProperty=[Root].RootLengthDenisty
          XYPairs: X=[0, 0.003]; Y=[0, 0]
        LinearInterpolationFunction NUptakeSWFactor: XProperty=[Root].RWC
          XYPairs: X=[0, 1]; Y=[0, 1]
        Constant InitialDM: Value=5; Units=g/plant
        Constant SpecificRootLength: Value=40; Units=m/g
      GenericOrgan Bulb
        Constant NReallocationFactor: Value=0
        Constant MaximumNConc: Value=0.011
        Constant MinimumNConc: Value=0.01
        PhaseBasedSwitch NitrogenDemandSwitch: Start=Germination; End=Maturity
        Constant NRetranslocationFactor: Value=0.05
        Constant DMRetranslocationFactor: Value=0.05
        Biomass Live
        Biomass Dead
        Constant DMSinkCapacity: Value=1
        PartitionFractionDemandFunction DMDemandFunction
          LinearInterpolationFunction PartitionFraction: XProperty=[Structure].LeafTipsAppeared
            XYPairs: X=[1, 6, 15, 30, 51]; Y=[0.1, 0.35, 0.7, 0.8, 0.8]
            Memo
              Allocation determined by Node number
        BiomassRemoval BiomassRemovalDefaults
          OrganBiomassRemovalType Harvest: FractionLiveToRemove=0.5; FractionDeadToRemove=0; FractionLiveToResidue=0.1; FractionDeadToResidue=0
          OrganBiomassRemovalType Cut: FractionLiveToRemove=0.8; FractionDeadToRemove=0; FractionLiveToResidue=0; FractionDeadToResidue=0
          OrganBiomassRemovalType Prune: FractionLiveToRemove=0; FractionDeadToRemove=0; FractionLiveToResidue=0.6; FractionDeadToResidue=0
          OrganBiomassRemovalType Graze: FractionLiveToRemove=0.6; FractionDeadToRemove=0; FractionLiveToResidue=0.2; FractionDeadToResidue=0
        Constant InitialWtFunction: Value=0; Units=g/m^2
        Constant StructuralFraction: Value=1; Units=g/g
        Constant DetachmentRateFunction: Value=0; Units=/d
        Constant SenescenceRate: Value=0; Units=/d
        Constant MaintenanceRespirationFunction: Value=0; Units=0-1
        Constant DMConversionEfficiency: Value=1; Units=0-1
      GenericOrgan Petiole
        Constant MaximumNConc: Value=0.011
        Constant MinimumNConc: Value=0.01
        PhaseBasedSwitch NitrogenDemandSwitch: Start=Germination; End=Maturity
        Constant NRetranslocationFactor: Value=0.05
        Constant DMRetranslocationFactor: Value=0.05
        Biomass Live
        Biomass Dead
        PartitionFractionDemandFunction DMDemandFunction
          LinearInterpolationFunction PartitionFraction: XProperty=[Structure].LeafTipsAppeared
            XYPairs: X=[1, 6, 15, 30, 51]; Y=[0.1, 0.15, 0.2, 0.15, 0.1]
            Memo
              Allocation determined by Node number
        VariableReference SenescenceRate: VariableName=[Leaf].FractionDied
        Constant DMReallocationFactor: Value=0
        Constant NReallocationFactor: Value=0.95
        BiomassRemoval BiomassRemovalDefaults: same as Replacements.FodderBeet.Bulb.BiomassRemovalDefaults
        Constant InitialWtFunction: Value=0; Units=g/m^2
        Constant StructuralFraction: Value=1; Units=g/g
        Constant DetachmentRateFunction: Value=0; Units=/d
        Constant MaintenanceRespirationFunction: Value=0; Units=0-1
        Constant DMConversionEfficiency: Value=1; Units=0-1
      CompositeBiomass AboveGround
        Propertys=[[Leaf].Live, [Leaf].Dead, [Bulb].Live, [Bulb].Dead, [Petiole].Live, [Petiole].Dead]
      CompositeBiomass BelowGround: Propertys=[[Root].Live, [Root].Dead]
      CompositeBiomass Total
        Propertys=[[Leaf].Live, [Leaf].Dead, [Bulb].Live, [Bulb].Dead, [Petiole].Live, [Petiole].Dead, [Root].Live, [Root].Dead]
      CompositeBiomass TotalLive: Propertys=[[Leaf].Live, [Petiole].Live, [Bulb].Live, [Root].Live]
      CompositeBiomass TotalDead: Propertys=[[Leaf].Dead, [Petiole].Dead, [Bulb].Dead, [Root].Dead]
      LinearInterpolationFunction MortalityRate: XProperty=[Leaf].CoverGreen
        XYPairs: X=[0.98, 1]; Y=[0, 1]
  DataStore
    Input FRNLObserved: ErrorMessage=The specified file does not exist.
      FileName=%root%\Prototypes\FodderBeet\Observations\FRNLObservedData.txt
    Input Lincoln2014_Interc: ErrorMessage=The specified file does not exist.
      FileName=%root%\Prototypes\FodderBeet\Observations\Lincoln2014Observed_Interception.txt
    Input BoltObserved: ErrorMessage=The specified file does not exist.; FileName=Observations\BoltingObserved.txt
  Experiment Lincoln2014
    Factors
      Factor Cv: Specifications=[SowDateCv]
        Operations Riv_Sep
          2014-09-19  [FodderBeet].Sow(population:9, cultivar:"Rivage", depth:10, rowSpacing:500);
        Operations Riv_Oct
          2014-10-17  [FodderBeet].Sow(population:9, cultivar:"Rivage", depth:10, rowSpacing:500);
        Operations Riv_Nov
          2014-11-17  [FodderBeet].Sow(population:9, cultivar:"Rivage", depth:5, rowSpacing:500);
        Operations Riv_Dec
          2014-12-15  [FodderBeet].Sow(population:9, cultivar:"Rivage", depth:10, rowSpacing:500);
        Operations Bri_Sep
          2014-09-20  [FodderBeet].Sow(population:9, cultivar:"Brigadier", depth:10, rowSpacing:500);
        Operations Bri_Oct
          2014-10-19  [FodderBeet].Sow(population:9, cultivar:"Brigadier", depth:10, rowSpacing:500);
        Operations Bri_Nov
          2014-11-18  [FodderBeet].Sow(population:9, cultivar:"Brigadier", depth:5, rowSpacing:500);
        Operations Bri_Dec
          2014-12-16  [FodderBeet].Sow(population:9, cultivar:"Brigadier", depth:10, rowSpacing:500);
      Memo
        2 cultivars (Bri and Riv)
        4 sowing dates

        Moved sowing dates of Rivage a day after just to visuslise differences in graphs
    Simulation Base
      Clock: StartDate=2014-09-01; EndDate=2015-10-28
      Summary summaryfile
      Weather: FileName=%root%\Prototypes\FodderBeet\Weather\lincoln from 2014.met
      Zone paddock: Area=1; Slope=0
        Soil TempletonABlock: Latitude=0; Longitude=0; Area=0
          Analysis: Thickness=[100, 200, 300, 300, 300, 300]; PH=[6.6, 6.2, 5.7, 5.5, 5.5, 5.5]; PHUnits=Water; BoronUnits=HotWater
          InitialWater Initial water: PercentMethod=EvenlyDistributed; FractionFull=1
          Water: KS=[4832, 389, 16, 16, 98]
            Thickness  BD    AirDry  LL15  DUL   SAT
            100        1     0.05    0.1   0.27  0.42
            200        1     0.05    0.1   0.27  0.4
            300        1.59  0.16    0.16  0.29  0.36
            300        1.57  0.17    0.17  0.3   0.37
            300        1.6   0.17    0.17  0.3   0.37
            300        1.6   0.12    0.12  0.3   0.32
            SoilCrop FodderBeetSoil: LL=[0.13, 0.13, 0.1, 0.08, 0.11, 0.11]; KL=[0.06, 0.06, 0.06, 0.06, 0.06, 0.06]; XF=[1, 1, 1, 1, 1, 1]
          SoilWater: SummerDate=1-Nov; SummerU=9; SummerCona=4.4; WinterDate=1-Apr; WinterU=9; WinterCona=4.4; DiffusConst=88; DiffusSlope=35.4; Salb=0.18; CN2Bare=68; CNRed=20; CNCov=0.8; max_pond=0; Thickness=[100, 200, 300, 300, 300, 300]; SWCON=[0.55, 0.55, 0.55, 0.55, 0.55, 0.55]; residueinterception=0
          SoilNitrogen: fom_type=[default, manure, mucuna, lablab, shemp, stable]; fract_carb=[0.2, 0.3, 0.54, 0.57, 0.45, 0]; fract_cell=[0.7, 0.3, 0.37, 0.37, 0.47, 0.1]; fract_lign=[0.1, 0.4, 0.09, 0.06, 0.08, 0.9]; wfpsN2N2O_x=[22, 88]; wfpsN2N2O_y=[0.1, 1]
          SoilOrganicMatter: RootCN=30; RootWt=3000; SoilCN=11.5; EnrACoeff=7.4; EnrBCoeff=0.2; OCUnits=Total
            Thickness  OC    FBiom  FInert
            100        1.82  0.025  0.3
            200        1.47  0.025  0.4
            300        1.2   0.015  0.75
            300        1.03  0.01   0.9
            300        0.47  0.01   0.96
            300        0.47  0.01   0.96
          Sample: NO3Units=kgha; NH4Units=ppm; SWUnits=Volumetric; OCUnits=Total; PHUnits=Water
            Thickness  NO3  NH4
            100        217  0
            200        30   0
            300        5    0
            300        5    0
            300        0    0
            300        0    0
        Plant FodderBeet: CropType=FodderBeet
        MicroClimate: a_interception=0; b_interception=1; c_interception=0; d_interception=0; soil_albedo=0.23; air_pressure=1010; soil_emissivity=0.96; sun_angle=15; soil_heat_flux_fraction=0.4; night_interception_fraction=0.5; windspeed_default=3; refheight=2; albedo=0.26; emissivity=0.96; gsmax=0.01; r50=200; RadIntTotal=0
        Irrigation
        Fertiliser
        Operations SowDateCv
          2014-10-17  [FodderBeet].Sow(population:9, cultivar:"Rivage", depth:10, rowSpacing:500);
        SurfaceOrganicMatter surface organic matter: PoolName=wheat; type=wheat; mass=0; standing_fraction=0; cnr=80; CriticalResidueWeight=2000; OptimumDecompTemp=20; MaxCumulativeEOS=20; CNRatioDecompCoeff=0.277; CNRatioDecompThreshold=25; TotalLeachRain=25; MinRainToLeach=10; CriticalMinimumOrganicC=0.004; DefaultCPRatio=0; DefaultStandingFraction=0; StandingExtinctCoeff=0.5; FractionFaecesAdded=0.5
          Pools:
            {PoolName=wheat, ResidueType=wheat, Mass=0, CNRatio=80, StandingFraction=0}
          ResidueTypes ResidueTypesList: LoadFromResource=ResidueTypes
        Report: EventNames=[Clock].DoReport
          VariableNames:
            [Clock].Today
            [FodderBeet].Leaf.Fw
            [FodderBeet].Leaf.Fn
            [FodderBeet].Phenology.CurrentPhaseName
            [FodderBeet].Phenology.Stage
            [FodderBeet].Phenology.ThermalTime.Value
            [FodderBeet].Phenology.AccumulatedThermalTime.Value
            [FodderBeet].Leaf.Live.Wt
            [FodderBeet].Total.Wt
            [FodderBeet].Petiole.Live.Wt
            [FodderBeet].Bulb.Live.Wt
            [FodderBeet].Leaf.LAI
            [FodderBeet].Structure.LeafTipsAppeared
            [FodderBeet].Leaf.PlantAppearedLeafNo
            [FodderBeet].Leaf.PlantAppearedGreenLeafNo
            [FodderBeet].Leaf.PlantsenescedLeafNo
            [FodderBeet].Leaf.CoverGreen
            [FodderBeet].Leaf.CohortParameters.MaxArea.Value
            [Phenology].Photoperiod.Value
            [FodderBeet].AboveGround.Wt
            [FodderBeet].Leaf.Photosynthesis.RadnInt.Value
            [FodderBeet].Leaf.Photosynthesis.RUEact.Value
        Operations Irrigation_and_Fertiliser
          2014-11-16  [Fertiliser].Apply(50, Fertiliser.Types.UreaN, 0);
          2014-11-28  [Fertiliser].Apply(50, Fertiliser.Types.UreaN, 0);
          2014-12-24  [Fertiliser].Apply(50, Fertiliser.Types.UreaN, 0);
          2015-04-15  [Fertiliser].Apply(50, Fertiliser.Types.UreaN, 0);
          2014-11-14  [Irrigation].Apply(10);
          2014-11-24  [Irrigation].Apply(10);
          2014-12-10  [Irrigation].Apply(10);
          2014-12-24  [Irrigation].Apply(10);
          2015-01-06  [Irrigation].Apply(15);
          2015-01-13  [Irrigation].Apply(25);
          2015-02-04  [Irrigation].Apply(30);
          2015-02-10  [Irrigation].Apply(10);
          2015-02-20  [Irrigation].Apply(30);
          2015-03-02  [Irrigation].Apply(30);
          2015-03-10  [Irrigation].Apply(30);
          2015-04-07  [Irrigation].Apply(35);
          2015-04-15  [Irrigation].Apply(10);
      SoilArbitrator Soil Arbitrator
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