Simulations: Version=54
  Memo TitlePage
    The APSIM Gliricidia Model

    Huth, N.I. and Smethurst, P.J.
  Memo Introduction
    The APSIM gliricidia model  . . . . .
  Replacements
    Plant Gliricidia: CropType=Gliricidia; IsEnding=false; DaysAfterEnding=0
      AccumulateFunction Age: StartStageName=Emergence; EndStageName=Old; FractionRemovedOnCut=0; FractionRemovedOnHarvest=0; FractionRemovedOnGraze=0; FractionRemovedOnPrune=0
        Constant day: FixedValue=0.00273973
      Phenology
        StageBasedInterpolation StageCode: Stages=[Emergence, EndJuvenile, Maturity, Old]; Codes=[1, 2, 3, 4]; Proportional=true
        Constant ThermalTime: FixedValue=1
        GerminatingPhase Germinating: Start=Sowing; End=Germination
        EmergingPhase Emerging: ShootLag=1; ShootRate=0; Start=Germination; End=Emergence; TTForTimeStep=0
          VariableReference ThermalTime: VariableName=[Phenology].ThermalTime.Value()
        GenericPhase Juvenile: Start=Emergence; End=EndJuvenile
          Constant Progression: FixedValue=1
          Constant Target: FixedValue=365
        GenericPhase Mature: Start=EndJuvenile; End=Maturity
          Constant Progression: FixedValue=1
          Constant Target: FixedValue=1825
        GenericPhase Declining: Start=Maturity; End=Old
          Constant Progression: FixedValue=1
          Constant Target: FixedValue=27010
        EndPhase Old: Start=Old; End=Unused
          Constant ThermalTime: FixedValue=1
      OrganArbitrator Arbitrator
        RelativeAllocation NArbitrator
        RelativeAllocation DMArbitrator
      CompositeBiomass AboveGround: Propertys=[[Leaf].Live, [Leaf].Dead, [Stem].Live, [Stem].Dead]; DMDOfStructural=0.6
      CompositeBiomass BelowGround: Propertys=[[Root].Live, [Root].Dead]; DMDOfStructural=0.6
      CompositeBiomass Total: DMDOfStructural=0.6
        Propertys=[[Leaf].Live, [Leaf].Dead, [Stem].Live, [Stem].Dead, [Root].Live, [Root].Dead]
      CompositeBiomass TotalLive: Propertys=[[Leaf].Live, [Stem].Live, [Root].Live]; DMDOfStructural=0.6
      DivideFunction IndividualTreeLiveWt
        VariableReference LiveWt: VariableName=[Gliricidia].TotalLive.Wt
        VariableReference Population: VariableName=[Gliricidia].Population
      CompositeBiomass TotalDead: Propertys=[[Leaf].Dead, [Stem].Dead, [Root].Dead]; DMDOfStructural=0.6
      PerennialLeaf Leaf: CohortsInitialised=false; Albedo=0.18; Gsmax350=0.015; R50=150; MicroClimatePresent=true
        zero: MaintenanceRespiration, GrowthRespiration, ApicalCohortNo, TipsAtEmergence, CohortsAtInitialisation, AppearedCohortNo, PlantAppearedLeafNo, InitialisedCohortNo, Height, FRGR, PotentialEP, WaterDemand
        MultiplyFunction InitialWtFunction
          Constant InitialPlantWt: FixedValue=0; Units=g/plant
          VariableReference Population: VariableName=[Plant].Population
        Constant LaiDeadFunction: FixedValue=0; Units=m^2/m^2
        MultiplyFunction Photosynthesis
          Constant RUE: FixedValue=1.3
            Memo
              Value of 1.06 for above ground growth from
              Radiation Interception and Growth of Planted and Coppice Stands of Four Fast-GrowingTropical Trees
              Author(s): Robin A. Harrington and James H. Fownes
              Source: Journal of Applied Ecology, Vol. 32, No. 1 (Feb., 1995), pp. 1-8
          VariableReference Radiation: VariableName=[Weather].Radn
          LinearInterpolationFunction WaterStressFactor: XProperty=[Leaf].Fw
            XYPairs: X=[0, 1]; Y=[0, 1]
          VariableReference Frgr: VariableName=[Leaf].FRGRFunction.Value()
        MinimumFunction FRGRFunction
          AirTemperatureFunction FRGRFunctionTemp
            XYPairs: X=[0, 10, 32, 42]; Y=[0, 1, 1, 0]
        Constant ExtinctionCoefficient: FixedValue=0.57
          Memo
            Value of 0.57 from
            Radiation Interception and Growth of Planted and Coppice Stands of Four Fast-GrowingTropical Trees
            Author(s): Robin A. Harrington and James H. Fownes
            Source: Journal of Applied Ecology, Vol. 32, No. 1 (Feb., 1995), pp. 1-8

            But their data suggests a value of 0.3
        Constant ExtinctionCoefficientDead: same as Replacements.Gliricidia.Leaf.ExtinctionCoefficient
        LinearInterpolationFunction HeightFunction: XProperty=[Phenology].Stage
          XYPairs: X=[3, 5, 6]; Y=[100, 800, 1200]
        Constant MaximumNConc: FixedValue=0.043
          Memo
            0.043 gN/g from R.B. Thomas 1, D.D. Richter 2, H. Ye 2, P.R. Heine z, and B.R. Strain 1 Nitrogen dynamics and growth of seedlings of an N-fixing tree
            (GKricidia sepium (Jacq.) Walp.) exposed to elevated atmospheric carbon dioxide Oecologia (1991) 88:415-421
        Constant MinimumNConc: FixedValue=0.01
        Constant NReallocationFactor: FixedValue=0
        Constant SenescenceRate: FixedValue=0
        BiomassRemoval BiomassRemovalDefaults
          OrganBiomassRemovalType Harvest: FractionLiveToRemove=0; FractionDeadToRemove=0; FractionLiveToResidue=0.9; FractionDeadToResidue=0.9
          OrganBiomassRemovalType Cut: FractionLiveToRemove=0.8; FractionDeadToRemove=0; FractionLiveToResidue=0; FractionDeadToResidue=0
          OrganBiomassRemovalType Prune: FractionLiveToRemove=0; FractionDeadToRemove=0; FractionLiveToResidue=0.6; FractionDeadToResidue=0
          OrganBiomassRemovalType Graze: FractionLiveToRemove=0.6; FractionDeadToRemove=0; FractionLiveToResidue=0.1; FractionDeadToResidue=0
        Constant LeafResidenceTime: FixedValue=180
        Constant DMConversionEfficiency: FixedValue=1
        Constant LeafDetachmentTime: FixedValue=7
        Constant DMRetranslocationFactor: FixedValue=0
        Constant NRetranslocationFactor: FixedValue=0
        Constant LeafKillFraction: FixedValue=0
        Constant MinimumLAI: FixedValue=0.1
        Constant SpecificLeafAreaFunction: FixedValue=0.01; Units=m^2/g
          Memo
            0.0232 m2/g from R.B. Thomas 1, D.D. Richter 2, H. Ye 2, P.R. Heine z, and B.R. Strain 1 Nitrogen dynamics and growth of seedlings of an N-fixing tree
            (GKricidia sepium (Jacq.) Walp.) exposed to elevated atmospheric carbon dioxide Oecologia (1991) 88:415-421

            Value of 0.0195 for whole leaf or 0.024 for leaf lamina from Leaf area index estimates obtained for clumped canopies
            using hemispherical photography
            P.R. van Gardingen*, G.E. Jackson, S. Hernandez-Daumas, G. Russell, L. Sharp
            Agricultural and Forest Meteorology 94 (1999) 243±257
        Constant CarbonConcentration: FixedValue=0.4
        Constant LeafDevelopmentRate: FixedValue=1
        BiomassDemand DMDemands
          MultiplyFunction Structural
            PartitionFractionDemandFunction DMDemandFunction
              Constant PartitionFraction: FixedValue=0.25
            Constant StructuralFraction: FixedValue=1; Units=0-1
          Constant Metabolic: FixedValue=0
          StorageDMDemandFunction Storage
            SubtractFunction StorageFraction
              Constant One: FixedValue=1
              VariableReference StructuralFraction: VariableName=[Leaf].DMDemands.Structural.StructuralFraction.Value()
        BiomassDemand NDemands
          MultiplyFunction Structural
            VariableReference MinNconc: VariableName=[Leaf].minimumNconc.Value()
            VariableReference PotentialDMAllocation: VariableName=[Leaf].potentialDMAllocation.Structural
          MultiplyFunction Metabolic
            SubtractFunction MetabolicNconc
              VariableReference CritNconc: VariableName=[Leaf].criticalNConc.Value()
              VariableReference MinNconc: VariableName=[Leaf].minimumNconc.Value()
            VariableReference PotentialDMAllocation: VariableName=[Leaf].potentialDMAllocation.Structural
          StorageNDemandFunction Storage
            VariableReference NitrogenDemandSwitch: VariableName=[Leaf].nitrogenDemandSwitch.Value()
            VariableReference MaxNconc: VariableName=[Leaf].maximumNconc.Value()
        Constant StomatalConductanceCO2Modifier: FixedValue=1
        PhaseBasedSwitch NitrogenDemandSwitch: Start=Emergence; End=Old
      Root: GrowthRespiration=0; MaintenanceRespiration=0; RootAngle=45; SWAvailabilityRatio=0
        PhaseBasedSwitch NitrogenDemandSwitch: Start=Emergence; End=Old
        Constant RootFrontVelocity: FixedValue=10
        Constant SenescenceRate: FixedValue=0.005
        Constant MaximumNConc: FixedValue=0.02
          Memo
            0.02 gN/g for seedlings from R.B. Thomas 1, D.D. Richter 2, H. Ye 2, P.R. Heine z, and B.R. Strain 1 Nitrogen dynamics and growth of seedlings of an N-fixing tree
            (GKricidia sepium (Jacq.) Walp.) exposed to elevated atmospheric carbon dioxide Oecologia (1991) 88:415-421
        Constant MaxDailyNUptake: FixedValue=6
        Constant MinimumNConc: FixedValue=0.004
        Constant MaximumRootDepth: FixedValue=1000000
        LinearInterpolationFunction KLModifier: XProperty=[Leaf].LAI
          XYPairs: X=[0, 3]; Y=[1, 1]
        LinearInterpolationFunction KNO3: XProperty=[Root].LengthDensity
          XYPairs: X=[0, 0.003]; Y=[0.03, 0.03]
        LinearInterpolationFunction KNH4: XProperty=[Root].LengthDensity
          XYPairs: X=[0, 0.003]; Y=[0, 0]
        LinearInterpolationFunction NUptakeSWFactor: XProperty=[Root].RWC
          XYPairs: X=[0, 1]; Y=[0, 1]
        Constant InitialDM: FixedValue=5; Units=g/plant
        Constant SpecificRootLength: FixedValue=100; Units=m/g
        BiomassRemoval BiomassRemovalDefaults
          OrganBiomassRemovalType Harvest: FractionLiveToRemove=0; FractionDeadToRemove=0; FractionLiveToResidue=0.1; FractionDeadToResidue=0
          OrganBiomassRemovalType Cut: FractionLiveToRemove=0; FractionDeadToRemove=0; FractionLiveToResidue=0.3; FractionDeadToResidue=0
          OrganBiomassRemovalType Prune: FractionLiveToRemove=0; FractionDeadToRemove=0; FractionLiveToResidue=0.1; FractionDeadToResidue=0
          OrganBiomassRemovalType Graze: FractionLiveToRemove=0; FractionDeadToRemove=0; FractionLiveToResidue=0.15; FractionDeadToResidue=0
          OrganBiomassRemovalType Thin: FractionLiveToRemove=0; FractionDeadToRemove=0; FractionLiveToResidue=0.05; FractionDeadToResidue=0
        Constant DMConversionEfficiency: FixedValue=1
        Constant MaintenanceRespirationFunction: FixedValue=1
        Constant RemobilisationCost: FixedValue=0
        Constant CarbonConcentration: FixedValue=0.4
        BiomassDemand DMDemands
          MultiplyFunction Structural
            PartitionFractionDemandFunction DMDemandFunction
              Constant PartitionFraction: FixedValue=0.3
            Constant StructuralFraction: FixedValue=1
          Constant Metabolic: FixedValue=0
          StorageDMDemandFunction Storage
            SubtractFunction StorageFraction
              Constant One: FixedValue=1
              VariableReference StructuralFraction: VariableName=[Root].DMDemands.Structural.StructuralFraction.Value()
        BiomassDemand NDemands
          MultiplyFunction Structural
            VariableReference MinNconc: VariableName=[Root].minimumNconc.Value()
            VariableReference PotentialDMAllocation: VariableName=[Root].potentialDMAllocation.Structural
          MultiplyFunction Metabolic
            SubtractFunction MetabolicNconc
              VariableReference CritNconc: VariableName=[Root].criticalNConc.Value()
              VariableReference MinNconc: VariableName=[Root].minimumNconc.Value()
            VariableReference PotentialDMAllocation: VariableName=[Root].potentialDMAllocation.Structural
          StorageNDemandFunction Storage
            VariableReference NitrogenDemandSwitch: VariableName=[Root].nitrogenDemandSwitch.Value()
            VariableReference MaxNconc: VariableName=[Root].maximumNconc.Value()
      GenericOrgan Stem
        Constant NReallocationFactor: FixedValue=0
        Constant NRetranslocationFactor: FixedValue=0.05
        Constant DMRetranslocationFactor: FixedValue=0
        Constant SenescenceRate: FixedValue=0; Units=/d
        Constant MaximumNConc: FixedValue=0.03
          Memo
            0.03 gN/g for seedlings from R.B. Thomas 1, D.D. Richter 2, H. Ye 2, P.R. Heine z, and B.R. Strain 1 Nitrogen dynamics and growth of seedlings of an N-fixing tree
            (GKricidia sepium (Jacq.) Walp.) exposed to elevated atmospheric carbon dioxide Oecologia (1991) 88:415-421
        Constant MinimumNConc: FixedValue=0.0014
        Constant InitialWtFunction: FixedValue=0; Units=g/m^2
        Constant DetachmentRateFunction: FixedValue=0; Units=/d
        BiomassRemoval BiomassRemovalDefaults
          OrganBiomassRemovalType Harvest: FractionLiveToRemove=0.9; FractionDeadToRemove=0.9; FractionLiveToResidue=0; FractionDeadToResidue=0
          OrganBiomassRemovalType Cut: FractionLiveToRemove=0.8; FractionDeadToRemove=0; FractionLiveToResidue=0; FractionDeadToResidue=0
          OrganBiomassRemovalType Prune: FractionLiveToRemove=0.9; FractionDeadToRemove=0.9; FractionLiveToResidue=0.1; FractionDeadToResidue=0.1
          OrganBiomassRemovalType Graze: FractionLiveToRemove=0.6; FractionDeadToRemove=0; FractionLiveToResidue=0.2; FractionDeadToResidue=0
          OrganBiomassRemovalType Thin: FractionLiveToRemove=0; FractionDeadToRemove=0; FractionLiveToResidue=0.05; FractionDeadToResidue=0
        Constant MaintenanceRespirationFunction: FixedValue=1; Units=0-1
        Constant DMConversionEfficiency: FixedValue=1; Units=0-1
        Constant DMReallocationFactor: FixedValue=0
        VariableReference CriticalNConc: VariableName=[Stem].MinimumNConc.Value()
        Constant RemobilisationCost: FixedValue=0
        Constant CarbonConcentration: FixedValue=0.4
        BiomassDemand DMDemands
          MultiplyFunction Structural
            AllometricDemandFunction DMDemandFunction: Const=0.0322; Power=1.3743; XProperty=[AboveGround].Wt; YProperty=[Stem].Live.Wt
            Constant StructuralFraction: FixedValue=1; Units=g/g
          Constant Metabolic: FixedValue=0
          StorageDMDemandFunction Storage
            SubtractFunction StorageFraction
              Constant One: FixedValue=1
              VariableReference StructuralFraction: VariableName=[Stem].DMDemands.Structural.StructuralFraction.Value()
        BiomassDemand NDemands
          MultiplyFunction Structural
            VariableReference MinNconc: VariableName=[Stem].minimumNconc.Value()
            VariableReference PotentialDMAllocation: VariableName=[Stem].potentialDMAllocation.Structural
          MultiplyFunction Metabolic
            SubtractFunction MetabolicNconc
              VariableReference CritNconc: VariableName=[Stem].criticalNConc.Value()
              VariableReference MinNconc: VariableName=[Stem].minimumNconc.Value()
            VariableReference PotentialDMAllocation: VariableName=[Stem].potentialDMAllocation.Structural
          StorageNDemandFunction Storage
            VariableReference NitrogenDemandSwitch: VariableName=[Stem].nitrogenDemandSwitch.Value()
            VariableReference MaxNconc: VariableName=[Stem].maximumNconc.Value()
        PhaseBasedSwitch NitrogenDemandSwitch: Start=Emergence; End=Old
      Nodule
        Constant FixationMetabolicCost: FixedValue=0
        Constant MaximumNConc: FixedValue=0.02
        Constant MinimumNConc: FixedValue=0.01
        Constant SenescenceRate: FixedValue=0
        Constant NReallocationFactor: FixedValue=0
        PhaseBasedSwitch NitrogenDemandSwitch: Start=Emergence; End=Maturity
        BiomassRemoval BiomassRemovalDefaults
          OrganBiomassRemovalType Harvest: FractionLiveToRemove=0; FractionDeadToRemove=0; FractionLiveToResidue=0; FractionDeadToResidue=0
          OrganBiomassRemovalType Cut: FractionLiveToRemove=0; FractionDeadToRemove=0; FractionLiveToResidue=0; FractionDeadToResidue=0
          OrganBiomassRemovalType Prune: FractionLiveToRemove=0; FractionDeadToRemove=0; FractionLiveToResidue=0; FractionDeadToResidue=0
          OrganBiomassRemovalType Graze: FractionLiveToRemove=0; FractionDeadToRemove=0; FractionLiveToResidue=0; FractionDeadToResidue=0
        Constant InitialWtFunction: FixedValue=0; Units=g/m^2
        Constant DetachmentRateFunction: FixedValue=0; Units=/d
        Constant FixationRate: FixedValue=10000; Units=g/m^2/d
        Constant MaintenanceRespirationFunction: FixedValue=1; Units=0-1
        Constant DMConversionEfficiency: FixedValue=1; Units=0-1
        Constant NRetranslocationFactor: FixedValue=0
        Constant DMReallocationFactor: FixedValue=0
        Constant DMRetranslocationFactor: FixedValue=0
        VariableReference CriticalNConc: VariableName=[Nodule].MinimumNConc.Value()
        Constant RemobilisationCost: FixedValue=0
        Constant CarbonConcentration: FixedValue=0.4
        BiomassDemand DMDemands
          MultiplyFunction Structural
            PartitionFractionDemandFunction DMDemandFunction
              Constant PartitionFraction: FixedValue=0
            Constant StructuralFraction: FixedValue=1; Units=g/g
          Constant Metabolic: FixedValue=0
          StorageDMDemandFunction Storage
            SubtractFunction StorageFraction
              Constant One: FixedValue=1
              VariableReference StructuralFraction: VariableName=[Nodule].DMDemands.Structural.StructuralFraction.Value()
        BiomassDemand NDemands
          MultiplyFunction Structural
            VariableReference MinNconc: VariableName=[Nodule].minimumNconc.Value()
            VariableReference PotentialDMAllocation: VariableName=[Nodule].potentialDMAllocation.Structural
          MultiplyFunction Metabolic
            SubtractFunction MetabolicNconc
              VariableReference CritNconc: VariableName=[Nodule].criticalNConc.Value()
              VariableReference MinNconc: VariableName=[Nodule].minimumNconc.Value()
            VariableReference PotentialDMAllocation: VariableName=[Nodule].potentialDMAllocation.Structural
          StorageNDemandFunction Storage
            VariableReference NitrogenDemandSwitch: VariableName=[Nodule].nitrogenDemandSwitch.Value()
            VariableReference MaxNconc: VariableName=[Nodule].maximumNconc.Value()
      Cultivar Gliricidia
  DataStore
    ExcelInput Observed: FileName=Observed.xlsx; SheetNames=[Observed, ObservedGliricidia, ObservedSoil]
    PredictedObserved: PredictedTableName=HarvestReport; ObservedTableName=Observed; FieldNameUsedForMatch=Year
    PredictedObserved PredictedObservedSoil: PredictedTableName=DailyReport; ObservedTableName=ObservedSoil; FieldNameUsedForMatch=Clock.Today
    PredictedObserved PredictedObservedGliricidia: PredictedTableName=GliricidiaDailyReport; ObservedTableName=ObservedGliricidia; FieldNameUsedForMatch=Clock.Today
  Folder Validation
    Simulation Hamakuapoko
      Clock: StartDate=1988-05-22; EndDate=1990-05-22
      Summary SummaryFile
      Weather: FileName=Hamakuapoko.met
      SoilArbitrator Soil Arbitrator
      Zone: Area=1; Slope=0
        Soil Hamakuapoko Soil: LocalName=Paia Silty Clay; Region=Maui; State=HI; Country=USA; Latitude=20.894444; Longitude=156.363888; DataSource=NRCS 1976; Comments=NRCS 1976 Soil Survey . . . of Hawaii, p. 110-111
          Site=c. 90 m south of Kaheka Rd, south-east of Sunny Side and Kaheka Rds, Maui
          Water
            Thickness  BD   AirDry  LL15  DUL   SAT
            230        1.4  0.16    0.18  0.35  0.47
            400        1.3  0.17    0.2   0.35  0.5
            350        1    0.18    0.22  0.28  0.55
            500        1    0.21    0.23  0.29  0.59
            270        1    0.23    0.26  0.32  0.59
            130        1    0.23    0.26  0.31  0.59
            SoilCrop MaizeSoil: LL=[0.17, 0.18, 0.19, 0.22, 0.25, 0.25]; KL=[0.08, 0.08, 0.08, 0.08, 0.06, 0.04]; XF=[1, 1, 1, 1, 1, 1]
            SoilCrop GliricidiaSoil: LL=[0.17, 0.18, 0.19, 0.22, 0.24, 0.24]; KL=[0.08, 0.08, 0.08, 0.08, 0.06, 0.04]; XF=[1, 1, 1, 1, 1, 1]
          SoilWater: SummerDate=1-May; SummerU=9; SummerCona=2.5; WinterDate=1-Oct; WinterU=9; WinterCona=2.5; DiffusConst=40; DiffusSlope=16; Salb=0.13; CN2Bare=65; CNRed=20; CNCov=0.8; slope=0.04; max_pond=0; ResidueInterception=0
            Thickness  SWCON  KLAT
            230        0.5    0
            400        0.5    0
            350        0.5    0
            500        0.5    0
            270        0.5    0
            130        0.5    0
          SoilNitrogen: fom_types=[default, manure, mucuna, lablab, shemp, stable]; fract_carb=[0.2, 0.3, 0.54, 0.57, 0.45, 0]; fract_cell=[0.7, 0.3, 0.37, 0.37, 0.47, 0.1]; fract_lign=[0.1, 0.4, 0.09, 0.06, 0.08, 0.9]
            SoilNitrogenNO3 NO3
            SoilNitrogenNH4 NH4
            SoilNitrogenUrea Urea
            SoilNitrogenPlantAvailableNO3 PlantAvailableNO3
            SoilNitrogenPlantAvailableNH4 PlantAvailableNH4
          SoilOrganicMatter: RootCN=40; SoilCN=11; EnrACoeff=7.4; EnrBCoeff=0.2; OCUnits=Total
            Thickness  OC   FBiom  FInert  RootWt
            230        2.4  0.08   0.4     188.085
            400        2.4  0.08   0.4     99.3447
            350        2.4  0.08   0.4     56.8311
            500        1.2  0.04   0.4     25.5903
            270        0.6  0.03   0.4     16.6325
            130        0.3  0.02   0.4     13.5165
          Analysis: Thickness=[230, 400, 350, 500, 270, 130]; PH=[5.2, 5.2, 5.2, 5.2, 5.2, 5.2]; PHUnits=Water; BoronUnits=0
          Sample: NO3Units=ppm; NH4Units=ppm; SWUnits=Volumetric; OCUnits=Total; PHUnits=Water
            Thickness  NO3  NH4  SW
            230        30   20   0.35
            400        15   10   0.35
            350        10   6    0.35
            500        5    3    0.35
            270        2    1    0.35
            130        1    0.5  0.35
          CERESSoilTemperature
        MicroClimate: a_interception=0; b_interception=0; c_interception=0; d_interception=0; soil_albedo=0.23; SoilHeatFluxFraction=0.4; NightInterceptionFraction=0.5; ReferenceHeight=2
        Irrigation
        Report GliricidiaDailyReport: EventNames=[Clock].DoReport
          VariableNames:
            [Clock].Today
            [Zone].Area
            [Soil].SoilWater.Es
            sum([Soil].SoilNitrogen.NO3.kgha) as TotalNO3N
            sum([Soil].SoilNitrogen.NH4.kgha) as TotalNH4N
            sum([Soil].SoilWater.SWmm) as SWTotal
            [Soil].SoilWater.SW[2] as SW30cm
            [Soil].SoilWater.SW[3] as SW50cm
            [Soil].SoilWater.SW[4] as SW70cm
            [Soil].FInert[1] as FInert10cm
            [Soil].SoilNitrogen.OC[1] as SOC10cm
            [Soil].SoilNitrogen.OC[2] as SOC30cm
            [Soil].SoilNitrogen.OC[3] as SOC50cm
            [Soil].SoilNitrogen.OC[4] as SOC70cm
            [Soil].SoilNitrogen.OC[5] as SOC90cm
            [Soil].SoilNitrogen.OC[6] as SOC110cm
            [Soil].SoilNitrogen.NO3.kghappm[1] as NO3ppm10cm
            [Soil].SoilNitrogen.NO3.kghappm[2] as NO3ppm30cm
            [Soil].SoilNitrogen.NO3.kghappm[3] as NO3ppm50cm
            [Soil].SoilNitrogen.NO3.kgha[1] as NO3kgpha10cm
            [Soil].SoilNitrogen.NO3.kgha[2] as NO3kgpha30cm
            [Soil].SoilNitrogen.NO3.kgha[3] as NO3kgpha50cm
            [Soil].SoilNitrogen.dlt_n_min_res[1] as NNM10cm
            [MicroClimate].peta
            [MicroClimate].petr
            [Soil].SoilWater.Eo
            [Soil].FBiom[1] as FBiom10cm
            [Soil].SoilWater.SW[1] as SurfaceSW
            [SurfaceOrganicMatter].Wt
            sum([Soil].SoilNitrogen.FOMN) as FOMN
            sum([Soil].SoilNitrogen.HumicN) as HumicN
            sum([Soil].SoilNitrogen.MicrobialN) as MicrobialN
            [Soil].SoilNitrogen.MicrobialN[1] as MicrobialN1
            [Soil].SoilNitrogen.MicrobialN[2] as MicrobialN2
            [Soil].SoilNitrogen.MicrobialN[3] as MicrobialN3
            [Gliricidia].Leaf.LAI
            [Gliricidia].Leaf.Fn
            [Gliricidia].Leaf.Fw
            [Gliricidia].Leaf.Live.Wt
            [Gliricidia].Leaf.Live.Wt
            [Gliricidia].Stem.Live.Wt
            [Gliricidia].Root.Live.Wt
            [Gliricidia].Root.TotalDMDemand
            [Gliricidia].Stem.DMDemands.Structural.DMDemandFunction.Value
            [Gliricidia].Leaf.DMDemands.Structural.DMDemandFunction.Value
            [Gliricidia].Root.PartitionFraction.Value
            [Gliricidia].AboveGround.Wt
            [Gliricidia].Leaf.CoverGreen
        Fertiliser
        SurfaceOrganicMatter: InitialResidueName=maize_stubble; InitialResidueType=maize; InitialResidueMass=0; InitialStandingFraction=0; InitialCPR=400; InitialCNR=80; FractionFaecesAdded=0.5
        Plant Gliricidia: CropType=Gliricidia; IsEnding=false; DaysAfterEnding=0
        Manager TreeSowingRule
          RowSpace = 1
          RowWidth = 2
          CultivarName = Gliricidia
          SowingDate = 1988-05-22
```csharp
using System;
using Models.Core;
using Models.PMF;
namespace Models
{
    [Serializable] 
    [System.Xml.Serialization.XmlInclude(typeof(Model))]
    public class Script : Model
    {
        [Link] Plant Gliricidia;
        [Link] Clock Clock;

        [Description("Spacing (m) between plants within rows")]
        public double RowSpace { get; set; }
        [Description("Spacing (m) between rows")]
        public double RowWidth { get; set; }

        [Description("Cultivar")]
        public string CultivarName { get; set; }
        [Description("Sowing Date")]
        public DateTime SowingDate { get; set; }

        [EventSubscribe("DoManagement")]
        private void OnDoManagement(object sender, EventArgs e)
        {
            double PlantPopulation = 1 / (RowWidth * RowSpace);

            if (Clock.Today.Date == SowingDate)
                Gliricidia.Sow(population: PlantPopulation, 
                    cultivar: CultivarName, 
                    depth: 100, 
                    rowSpacing: 150);
            //Plant.Sow(... Contains the following arguements:
            //Population  double  Required  Seeds sowing/m2
            //Cultivar    string  Required  "NameOfCultivar"
            //Depth       double  Optional  Depth (mm) seed sown.   Default is 100mm 
            //MaxCover    double  Optional  Proportion (0-1) of the ground row crop will cover.   Default is 1.0
            //BudNumber   double  Optional  Number of mainstems per seed sown.  Default is 1.0
            //RowSpacing  double  Optional  Spaceing (mm) between drill rows when crop is sown.  Default is 150mm
            //CropClass   string  Optional  Crop class to instantiate when crop is sown.  Default is "Plant"
        }
    }
}
```
        Manager Automatic irrigation based on water deficit
          FASW = 0
          WaterDeficit = 0
          AutoIrrigationOn = True
          FASWThreshold = 0.5
          FASWDepth = 600
```csharp
using System;
using Models.Core;
using System.Collections.Generic;
using System.Text;
using Models.Soils;
using Models.PMF;
using Models;
using System.Xml.Serialization;
using APSIM.Shared.Utilities;

namespace Models
{
    [Serializable] 
    public class Script : Model
    {
        public double FASW { get; set; }
        public double WaterDeficit  { get; set; }
    
        [Link] Zone zone;
        [Link] Irrigation irrigation;
        [Link] Soil soil;
        
        [Description("Auto irrigation on?")]
        public bool AutoIrrigationOn { get; set; }

        [Description("Threshold fraction available water (0-1)")]
        public double FASWThreshold { get; set; }

        [Description("Soil depth (mm) to which fraction available water is calculated")]
        public double FASWDepth { get; set; }

        [EventSubscribe("DoManagement")]
        private void OnDoManagement(object sender, EventArgs e)
        {
            CalculateFASW();
            if (AutoIrrigationOn)
            {
                if (FASW < FASWThreshold)
                {
                    double amount = 10;
                    irrigation.Apply(WaterDeficit, depth: 0);
                }
            }
        }
        
        private void CalculateFASW()
        {
            double[] LL15 = MathUtilities.Multiply(soil.LL15, soil.Thickness);
            double[] DUL = MathUtilities.Multiply(soil.DUL, soil.Thickness);
        
            int nlayr = GetLayerIndex();
            double cumdep = MathUtilities.Sum(soil.Thickness, 0, nlayr, 0.0);

            double excess_fr = MathUtilities.Divide((cumdep - FASWDepth), soil.Thickness[nlayr], 0.0);

            // note that results may be strange if swdep < ll15
            double avail_sw = (MathUtilities.Sum(soil.Water, 0, nlayr, 0.0)
                              - excess_fr * soil.Water[nlayr])
                              - (MathUtilities.Sum(LL15, 0, nlayr, 0.0)
                              - excess_fr * LL15[nlayr]);


            double pot_avail_sw = (MathUtilities.Sum(DUL, 0, nlayr, 0.0)
                                  - excess_fr * DUL[nlayr])
                                  - (MathUtilities.Sum(LL15, 0, nlayr, 0.0)
                                  - excess_fr * LL15[nlayr]);

            FASW = MathUtilities.Divide(avail_sw, pot_avail_sw, 0.0);
            WaterDeficit = MathUtilities.Constrain(pot_avail_sw - avail_sw, 0.0, 100000);
        }

        private int GetLayerIndex()
        {
            double[] cumThickness = Soil.ToCumThickness(soil.Thickness);
            for (int i = 1; i < cumThickness.Length; i++)
            {
                if (FASWDepth < cumThickness[i])
                    return i - 1;
            }
            
            return cumThickness.Length - 1;
        }

    }
}
```
    Experiment Guadeloupe
      Memo
        This trial was conducted at Gatton in 1995 using the local variety, Hartog.  It consisted of 4 Nitrogen rates (0,40,80,160) with two irrigation rates (minimal amount for establishment, fully irrigated).  Yields ranged from 1.4 t/ha to 5.4 t/ha.
      Factors
        Factor Harvest: Specifications=[Operations]
          Operations 12Month
          Operations 06Month
            1996-08-13  [Gliricidia].Harvest()
          Operations 02Month
            1996-04-29  [Gliricidia].Harvest()
            1996-06-20  [Gliricidia].Harvest()
            1996-08-13  [Gliricidia].Harvest()
            1996-10-10  [Gliricidia].Harvest()
            1996-12-01  [Gliricidia].Harvest()
      Simulation GuadeloupeBase
        Clock: StartDate=1993-05-01; EndDate=1997-12-31
        Summary SummaryFile
        Weather: FileName=Guadeloupe.met
        SoilArbitrator Soil Arbitrator
        Zone: Area=1; Slope=0
          Soil Guadeloupe Soil: NearestTown=Prise d'Eau; Country=Guadeloupe; Latitude=16.2; Longitude=61.65
            DataSource=Nygren and Cruz 1998 Biomass allocation . . . . Agrof. Sys 41:277-292; Sierra etal 2003 application of STICS Plant Soil 256:333-345
            Water
              Thickness  BD    AirDry  LL15  DUL   SAT
              100        0.92  0.16    0.21  0.39  0.55
              200        1.01  0.17    0.23  0.42  0.58
              200        1.03  0.17    0.26  0.48  0.58
              500        1.09  0.17    0.3   0.51  0.58
              500        1.09  0.17    0.3   0.51  0.58
              500        1.09  0.17    0.3   0.51  0.58
              SoilCrop MaizeSoil: LL=[0.17, 0.18, 0.19, 0.19, 0.19, 0.19]; KL=[0.08, 0.08, 0.08, 0.08, 0.08, 0.08]; XF=[1, 1, 1, 1, 1, 1]
              SoilCrop GliricidiaSoil: LL=[0.17, 0.18, 0.19, 0.19, 0.19, 0.19]; KL=[0.08, 0.08, 0.08, 0.08, 0.08, 0.08]; XF=[1, 1, 1, 1, 1, 1]
            SoilWater: SummerDate=1-May; SummerU=9; SummerCona=2.5; WinterDate=1-Oct; WinterU=9; WinterCona=2.5; DiffusConst=40; DiffusSlope=16; Salb=0.13; CN2Bare=65; CNRed=20; CNCov=0.8; max_pond=0; Thickness=[200, 1800]; SWCON=[0.5, 0.5]; ResidueInterception=0
            SoilNitrogen: same as Validation.Hamakuapoko.Zone.Hamakuapoko Soil.SoilNitrogen
            SoilOrganicMatter: RootCN=40; SoilCN=14.6; EnrACoeff=7.4; EnrBCoeff=0.2; OCUnits=Total
              Thickness  OC    FBiom  FInert  RootWt
              100        3.92  0.08   0.5     170.396
              200        3.5   0.08   0.5     126.232
              200        2.61  0.08   0.5     93.5153
              1500       1     0.08   0.5     9.85644
            Analysis: Thickness=[100, 200, 200, 1500]; PH=[6, 6, 6.1, 4.5]; PHUnits=Water; BoronUnits=0
            Sample: NO3Units=ppm; NH4Units=ppm; SWUnits=Volumetric; OCUnits=Total; PHUnits=Water
              Thickness  NO3  NH4  SW
              100        15   10   0.25
              200        10   6    0.25
              200        5    3    0.25
              1500       1    0.5  0.25
            CERESSoilTemperature
          MicroClimate: a_interception=0; b_interception=0; c_interception=0; d_interception=0; soil_albedo=0.23; SoilHeatFluxFraction=0.4; NightInterceptionFraction=0.5; ReferenceHeight=2
          Report GliricidiaDailyReport: EventNames=[Clock].DoReport
            VariableNames:
              [Clock].Today
              [Zone].Area
              [Soil].SoilWater.Es
              sum([Soil].SoilNitrogen.NO3.kgha) as TotalNO3N
              sum([Soil].SoilNitrogen.NH4.kgha) as TotalNH4N
              sum([Soil].SoilWater.SWmm) as SW200cm
              [Soil].SoilWater.SW[2] as SW30cm
              [Soil].SoilWater.SW[3] as SW50cm
              [Soil].SoilWater.SW[4] as SW70cm
              [Soil].FInert[1] as FInert10cm
              [Soil].SoilNitrogen.OC[1] as SOC10cm
              [Soil].SoilNitrogen.OC[2] as SOC30cm
              [Soil].SoilNitrogen.OC[3] as SOC50cm
              [Soil].SoilNitrogen.OC[4] as SOC70cm
              [Soil].SoilNitrogen.OC[5] as SOC90cm
              [Soil].SoilNitrogen.OC[6] as SOC110cm
              [Soil].SoilNitrogen.NO3.kghappm[1] as NO3ppm10cm
              [Soil].SoilNitrogen.NO3.kghappm[2] as NO3ppm30cm
              [Soil].SoilNitrogen.NO3.kghappm[3] as NO3ppm50cm
              [Soil].SoilNitrogen.NO3.kgha[1] as NO3kgpha10cm
              [Soil].SoilNitrogen.NO3.kgha[2] as NO3kgpha30cm
              [Soil].SoilNitrogen.NO3.kgha[3] as NO3kgpha50cm
              [Soil].SoilNitrogen.dlt_n_min_res[1] as NNM10cm
              [MicroClimate].peta
              [MicroClimate].petr
              [Soil].SoilWater.Eo
              [Soil].FBiom[1] as FBiom10cm
              [Soil].SoilWater.SW[1] as SurfaceSW
              [SurfaceOrganicMatter].Wt
              sum([Soil].SoilNitrogen.FOMN) as FOMN
              sum([Soil].SoilNitrogen.HumicN) as HumicN
              sum([Soil].SoilNitrogen.MicrobialN) as MicrobialN
              [Soil].SoilNitrogen.MicrobialN[1] as MicrobialN1
              [Soil].SoilNitrogen.MicrobialN[2] as MicrobialN2
              [Soil].SoilNitrogen.MicrobialN[3] as MicrobialN3
              [Gliricidia].Leaf.LAI
              [Gliricidia].Leaf.FRGR
              [Gliricidia].Leaf.Live.Wt
              [Gliricidia].Stem.Live.Wt
              [Gliricidia].Root.Live.Wt
              [Gliricidia].Root.TotalDMDemand
              [Gliricidia].Stem.DMDemands.Structural.DMDemandFunction.Value
              [Gliricidia].Leaf.DMDemands.Structural.DMDemandFunction.Value
              [Gliricidia].Root.PartitionFraction.Value
              [Gliricidia].AboveGround.Wt
              [Gliricidia].Leaf.CoverGreen
          Fertiliser
          SurfaceOrganicMatter: InitialResidueName=maize_stubble; InitialResidueType=maize; InitialResidueMass=0; InitialStandingFraction=0; InitialCPR=400; InitialCNR=80; FractionFaecesAdded=0.5
          Plant Gliricidia: CropType=Gliricidia; IsEnding=false; DaysAfterEnding=0
          Manager TreeSowingRule
            RowSpace = 0.7
            RowWidth = 3
            CultivarName = Gliricidia
            SowingDate = 1993-05-01
            script: same as in Validation.Hamakuapoko.Zone.TreeSowingRule
          Operations
          Operations PreExperimentOperations
            1993-09-01  [Gliricidia].Harvest()
            1994-01-01  [Gliricidia].Harvest()
            1994-05-01  [Gliricidia].Harvest()
            1994-09-01  [Gliricidia].Harvest()
            1995-01-01  [Gliricidia].Harvest()
            1995-05-01  [Gliricidia].Harvest()
            1995-09-01  [Gliricidia].Harvest()
            1996-01-01  [Gliricidia].Harvest()
            1996-02-29  [Gliricidia].Harvest()
    Experiment GuadeloupeGodet
      Memo Limitation
        These is currenlty (1/3/2017) no grass model inlcuded. Can we include a tropical grass model, with cuttings removed every 4-6 weeks?
      Factors
        Factor Harvest: Specifications=[Operations]
          Memo Limitation
            These harvests are currenlty (1/3/2017) full, but could reflect better the amounts of foliage and stem left.
          Operations 12Month
          Operations 06Month
            1996-08-13  [Gliricidia].Harvest()
          Operations 02Month: same as Validation.Guadeloupe.Factors.Harvest.02Month
      Simulation GuadeloupeGodetBase
        Clock: StartDate=1993-05-01; EndDate=1997-12-31
        Summary SummaryFile
        Weather: FileName=GuadeloupeGodet.met
        SoilArbitrator Soil Arbitrator
        Zone: Area=1; Slope=0
          Soil GuadeloupeGodet Soil: NearestTown=Godet; Country=Guadeloupe; Latitude=16.33; Longitude=-61.5; Comments=Soil depth ranged from 0.1 to 1.0 m
            DataSource=Nygren et al 2000 Influence of biomass harvesting . . . . Tree Physiol 20:41-48; Cruz 1997 Effecct of shade . . . Plant Soil 188:227-237; Tournebize et al 1996 Modelling evapotranspiration . . . Ag For Meteorol 81:255-272
            Water
              Thickness  BD    AirDry  LL15  DUL   SAT
              100        0.92  0.16    0.21  0.39  0.55
              200        1.01  0.17    0.23  0.42  0.58
              SoilCrop MaizeSoil: LL=[0.17, 0.18]; KL=[0.08, 0.08]; XF=[1, 1]
              SoilCrop GliricidiaSoil: LL=[0.17, 0.18]; KL=[0.08, 0.08]; XF=[1, 1]
            SoilWater: SummerDate=1-May; SummerU=9; SummerCona=2.5; WinterDate=1-Oct; WinterU=9; WinterCona=2.5; DiffusConst=40; DiffusSlope=16; Salb=0.13; CN2Bare=65; CNRed=20; CNCov=0.8; max_pond=0; Thickness=[100, 200]; SWCON=[0.1, 0.5]; ResidueInterception=0
            SoilNitrogen: same as Validation.Hamakuapoko.Zone.Hamakuapoko Soil.SoilNitrogen
            SoilOrganicMatter: RootCN=40; SoilCN=10.6; EnrACoeff=7.4; EnrBCoeff=0.2; OCUnits=Total
              Thickness  OC  FBiom  FInert  RootWt
              100        3   0.08   0.5     352.319
              200        3   0.08   0.5     47.6812
            Analysis: Thickness=[100, 200]; PH=[8.1, 8.1]; PHUnits=Water; BoronUnits=0
            Sample: NO3Units=ppm; NH4Units=ppm; SWUnits=Volumetric; OCUnits=Total; PHUnits=Water
              Thickness  NO3  NH4  SW
              100        15   10   0.25
              200        10   6    0.25
            CERESSoilTemperature
          MicroClimate: a_interception=0; b_interception=0; c_interception=0; d_interception=0; soil_albedo=0.23; SoilHeatFluxFraction=0.4; NightInterceptionFraction=0.5; ReferenceHeight=2
          Report GliricidiaDailyReport: EventNames=[Clock].DoReport
            VariableNames:
              [Clock].Today
              [Zone].Area
              [Soil].SoilWater.Es
              sum([Soil].SoilNitrogen.NO3.kgha) as TotalNO3N
              sum([Soil].SoilNitrogen.NH4.kgha) as TotalNH4N
              sum([Soil].SoilWater.SWmm) as SW200cm
              [Soil].SoilWater.SW[2] as SW30cm
              [Soil].FInert[1] as FInert10cm
              [Soil].SoilNitrogen.OC[1] as SOC10cm
              [Soil].SoilNitrogen.OC[2] as SOC30cm
              [Soil].SoilNitrogen.NO3.kghappm[1] as NO3ppm10cm
              [Soil].SoilNitrogen.NO3.kghappm[2] as NO3ppm30cm
              [Soil].SoilNitrogen.NO3.kgha[1] as NO3kgpha10cm
              [Soil].SoilNitrogen.NO3.kgha[2] as NO3kgpha30cm
              [Soil].SoilNitrogen.dlt_n_min_res[1] as NNM10cm
              [MicroClimate].peta
              [MicroClimate].petr
              [Soil].SoilWater.Eo
              [Soil].FBiom[1] as FBiom10cm
              [Soil].SoilWater.SW[1] as SurfaceSW
              [SurfaceOrganicMatter].Wt
              sum([Soil].SoilNitrogen.FOMN) as FOMN
              sum([Soil].SoilNitrogen.HumicN) as HumicN
              sum([Soil].SoilNitrogen.MicrobialN) as MicrobialN
              [Soil].SoilNitrogen.MicrobialN[1] as MicrobialN1
              [Soil].SoilNitrogen.MicrobialN[2] as MicrobialN2
              [Gliricidia].Leaf.LAI
              [Gliricidia].Leaf.FRGR
              [Gliricidia].Leaf.Live.Wt
              [Gliricidia].Stem.Live.Wt
              [Gliricidia].Root.Live.Wt
              [Gliricidia].Root.TotalDMDemand
              [Gliricidia].Stem.DMDemands.Structural.DMDemandFunction.Value
              [Gliricidia].Leaf.DMDemands.Structural.DMDemandFunction.Value
              [Gliricidia].Root.PartitionFraction.Value
              [Gliricidia].AboveGround.Wt
              [Gliricidia].Leaf.CoverGreen
          Fertiliser
          SurfaceOrganicMatter: InitialResidueName=maize_stubble; InitialResidueType=maize; InitialResidueMass=0; InitialStandingFraction=0; InitialCPR=400; InitialCNR=80; FractionFaecesAdded=0.5
          Plant Gliricidia: CropType=Gliricidia; IsEnding=false; DaysAfterEnding=0
          Manager TreeSowingRule
            RowSpace = 0.4083
            RowWidth = 2
            CultivarName = Gliricidia
            SowingDate = 1993-05-15
            script: same as in Validation.Hamakuapoko.Zone.TreeSowingRule
          Operations
          Operations PreExperimentOperations
            1993-06-22  [Gliricidia].Harvest()
            1993-10-01  [Gliricidia].Harvest()
            1993-12-08  [Gliricidia].Harvest()
            1994-02-15  [Gliricidia].Harvest()
            1994-04-22  [Gliricidia].Harvest()
            1994-06-22  [Gliricidia].Harvest()
            1994-08-29  [Gliricidia].Harvest()
            1994-11-06  [Gliricidia].Harvest()
            1995-01-13  [Gliricidia].Harvest()
            1995-03-20  [Gliricidia].Harvest()
            1995-05-27  [Gliricidia].Harvest()
            1995-08-04  [Gliricidia].Harvest()
            1995-10-11  [Gliricidia].Harvest()
            1995-12-18  [Gliricidia].Harvest()
            1996-02-25  [Gliricidia].Harvest()
            1996-04-01  [Gliricidia].Harvest()
    Experiment Makoka
      Factors
        Factor N: Specifications=[FertiliserRule]
          Manager 0
            Amount = 0
            CropName = maize
            FertDAS = 30
```csharp
using System;
using Models.Core;
using Models.PMF;
namespace Models
{
    [Serializable]
    public class Script : Model
    {
        [Link] Clock Clock;
        [Link] Fertiliser Fertiliser;
        [Link] Summary Summary;
        [Link] Plant Maize;
        
        
        [Description("Amount of fertiliser N to be applied (kg/ha)")]
        public double Amount { get; set; }
        
        [Description("Crop to be fertilised")]
        public string CropName { get; set; }
        
        [Description("Days after sowing:")]
        public int FertDAS { get; set; }
        
        

        [EventSubscribe("DoManagement")]
        private void OnDoManagement(object sender, EventArgs e)
        {
            if (Maize.IsAlive && Maize.Phenology.DaysAfterSowing == FertDAS)
                Fertiliser.Apply(Amount: Amount, Type: Fertiliser.Types.UreaN);
                
                
        }
        
    }
}
```
          Manager 24
            Amount = 24
            CropName = maize
            FertDAS = 30
            script: same as in Validation.Makoka.Factors.N.0
          Manager 48
            Amount = 48
            CropName = maize
            FertDAS = 30
            script: same as in Validation.Makoka.Factors.N.0
        Factor Maize: Specifications=[GliricidiaManagement]
          Operations Sole
          Operations Gliricidia
            1991-12-15  [Gliricidia].Sow(population: 0.74, cultivar: Gliricidia,depth: 100, rowSpacing: 1500);
            0001-01-01  [Gliricidia]. 	PRUNING to 30 cm
            1992-12-15  [Gliricidia].Harvest();
            0001-01-01  ARE HARVESTED GLRICIDIA LEAVES AND TENDER TWIGS RETAINED/INCORPORATED INTO SOIL?
            0001-01-01  I Notice that, in the glircidia model, we have biomassremovaldefaults of harvest, cut, prune and graze. How are these accessed and used?
            1993-09-15  [Gliricidia].Harvest();
            1993-12-15  [Gliricidia].Harvest();
            1994-02-15  [Gliricidia].Harvest();
            1994-09-15  [Gliricidia].Harvest();
            1994-12-15  [Gliricidia].Harvest();
            1995-02-15  [Gliricidia].Harvest();
            1995-09-15  [Gliricidia].Harvest();
            1995-12-15  [Gliricidia].Harvest();
            1996-02-15  [Gliricidia].Harvest();
            1996-09-15  [Gliricidia].Harvest();
            1996-12-15  [Gliricidia].Harvest();
            1997-02-15  [Gliricidia].Harvest();
            1997-10-31  [Gliricidia].Harvest();
            1997-12-31  [Gliricidia].Harvest();
            1998-02-28  [Gliricidia].Harvest();
            1998-08-31  [Gliricidia].Harvest();
            1998-10-31  [Gliricidia].Harvest();
            1998-12-31  [Gliricidia].Harvest();
            1999-02-28  [Gliricidia].Harvest();
            1999-08-31  [Gliricidia].Harvest();
            1999-10-31  [Gliricidia].Harvest();
            1999-12-31  [Gliricidia].Harvest();
            2000-02-28  [Gliricidia].Harvest();
            2000-08-31  [Gliricidia].Harvest();
            2000-10-31  [Gliricidia].Harvest();
            2000-12-31  [Gliricidia].Harvest();
            2001-02-28  [Gliricidia].Harvest();
            2001-08-31  [Gliricidia].Harvest();
            2001-10-31  [Gliricidia].Harvest();
            2001-12-31  [Gliricidia].Harvest();
            2002-02-28  [Gliricidia].Harvest();
            2002-08-31  [Gliricidia].Harvest();
            2002-10-31  [Gliricidia].Harvest();
            2002-12-31  [Gliricidia].Harvest();
            2003-02-28  [Gliricidia].Harvest();
            2003-08-18  [Gliricidia].Harvest();
            2003-11-07  [Gliricidia].Harvest();
            2003-12-16  [Gliricidia].Harvest();
            2004-02-02  [Gliricidia].Harvest();
            2004-08-18  [Gliricidia].Harvest();
            2004-12-21  [Gliricidia].Harvest();
            2005-01-31  [Gliricidia].Harvest();
            2005-10-04  [Gliricidia].Harvest();
            2005-12-05  [Gliricidia].Harvest();
            2006-01-24  [Gliricidia].Harvest();
      Simulation MakokaBase
        Clock: StartDate=1991-12-01; EndDate=2006-12-31
        Summary SummaryFile
        Weather: FileName=Makoka.met
        SoilArbitrator Soil Arbitrator
        Zone: Area=1; Slope=0
          Soil Makoka Soil: SoilType=sand; NearestTown=Makoka; Country=Malawi; Latitude=-15.25; Longitude=37.25
            Water
              Thickness  BD    AirDry  LL15  DUL   SAT
              200        1.42  0.16    0.17  0.38  0.4
              200        1.45  0.17    0.18  0.38  0.41
              200        1.47  0.18    0.19  0.37  0.42
              200        1.31  0.2     0.22  0.36  0.43
              200        1.42  0.23    0.25  0.33  0.44
              200        1.38  0.23    0.25  0.28  0.44
              200        1.32  0.26    0.27  0.29  0.44
              200        1.3   0.27    0.27  0.3   0.44
              200        1.31  0.28    0.29  0.3   0.44
              200        1.31  0.28    0.29  0.29  0.44
              500        1.31  0.16    0.24  0.29  0.44
              500        1.31  0.16    0.24  0.29  0.44
              SoilCrop MaizeSoil
                LL=[0.17, 0.18, 0.19, 0.22, 0.25, 0.25, 0.27, 0.27, 0.29, 0.29, 0.29, 0.29]
                KL=[0.08, 0.08, 0.08, 0.08, 0.06, 0.04, 0.03, 0.02, 0.02, 0.02, 0, 0]
                XF=[1, 1, 1, 1, 1, 1, 1, 1, 1, 1, 0, 0]
              SoilCrop GliricidiaSoil
                LL=[0.17, 0.18, 0.19, 0.22, 0.24, 0.24, 0.24, 0.24, 0.24, 0.24, 0.24, 0.24]
                KL=[0.08, 0.08, 0.08, 0.08, 0.06, 0.04, 0.03, 0.02, 0.02, 0.02, 0.02, 0.02]
                XF=[1, 1, 1, 1, 1, 1, 1, 1, 1, 1, 1, 1]
            SoilWater: SummerDate=1-Nov; SummerU=9; SummerCona=2.5; WinterDate=1-Apr; WinterU=9; WinterCona=2.5; DiffusConst=40; DiffusSlope=16; Salb=0.13; CN2Bare=65; CNRed=20; CNCov=0.8; max_pond=0; Thickness=[200, 1800]; SWCON=[0.6, 0.6]; ResidueInterception=0
            SoilNitrogen: same as Validation.Hamakuapoko.Zone.Hamakuapoko Soil.SoilNitrogen
            SoilOrganicMatter: RootCN=40; SoilCN=14.3; EnrACoeff=7.4; EnrBCoeff=0.2; OCUnits=Total
              Thickness  OC    FBiom  FInert  RootWt
              200        0.88  0.01   0.66    109.105
              200        0.63  0.01   0.66    80.8268
              200        0.4   0.01   0.9     59.8779
              200        0.23  0.01   1       44.3587
              200        0.22  0.01   1       32.8617
              200        0.11  0.01   1       24.3446
              200        0.05  0.01   1       18.0349
              200        0.05  0.01   1       13.3606
              200        0.05  0.01   1       9.89776
              200        0.05  0.01   1       7.33244
            Analysis: Thickness=[200, 200, 200, 200, 200, 200, 200, 200, 200, 200]; PH=[5.9, 5.6, 5.8, 5.9, 6.1, 6.3, 6.2, 6.4, 6.3, 5.9]; PHUnits=Water; BoronUnits=0
            Sample: NO3Units=ppm; NH4Units=ppm; SWUnits=Volumetric; OCUnits=Total; PHUnits=Water
              Thickness  NO3  NH4  SW
              200        3    1    0.25
              200        2    1    0.25
              200        1    0.5  0.25
              200        1    0.1  0.27
              200        1    0.1  0.27
              200        0.5  0.1  0.29
              200        0.1  0.1  0.3
              200        0.1  0.1  0.3
              200        0.1  0.1  0.3
              200        0.1  0.1  0.3
            CERESSoilTemperature
          MicroClimate: a_interception=0; b_interception=0; c_interception=0; d_interception=0; soil_albedo=0.23; SoilHeatFluxFraction=0.4; NightInterceptionFraction=0.5; ReferenceHeight=2
          Report HarvestReport: EventNames=[Maize].Harvesting
            VariableNames:
              [Clock].Today
              [Clock].Today.Year as Year
              [Zone].Area
              [Maize].SowingData.Population
              [Maize].SowingDate.DayOfYear
              [Maize].Phenology.CurrentStageName as Stage
              [Maize].Grain.Wt
              [Maize].Stem.Live.Wt
              [Maize].EarLive.Wt
              [Maize].Leaf.Live.Wt
              [Maize].Root.Live.Wt
              [Maize].Husk.Live.Wt
              [Maize].Rachis.Live.Wt
              [Maize].EarLive.N
              [Maize].Grain.Live.N
              [Maize].Stem.Live.N
              [Maize].Leaf.Live.N
              [Maize].Root.Live.N
              [Maize].Root.Depth
              [Maize].AboveGround.N
              [Maize].AboveGround.Wt
              [Maize].Total.N
              [Maize].Total.Wt
              max of [Maize].Leaf.LAI from [Maize].Sowing to [Maize].Harvesting as LAImax
              [Maize].Grain.NumberFunction.Value
              [Maize].Grain.Size
              [Maize].Population
              [Maize].Phenology.FloweringDAS.Value as FloweringDAS
              sum([Soil].SoilNitrogen.FOMC) as FOMC
              sum([Soil].SoilNitrogen.HumicC) as HumicC
              sum([Soil].SoilNitrogen.MicrobialC) as MicrobialC
          Report DailyReport: EventNames=[Clock].DoReport
            VariableNames:
              [Clock].Today
              [Clock].Today.DayOfYear
              [Zone].Area
              [Soil].SoilWater.Es
              ([Soil].SoilNitrogen.NO3.kgha[1]+[Soil].SoilNitrogen.NH4.kgha[1]) as SurfaceMineralN
              ([Soil].SoilNitrogen.NO3.kgha[3]+[Soil].SoilNitrogen.NH4.kgha[3]+[Soil].SoilNitrogen.NO3.kgha[4]+[Soil].SoilNitrogen.NH4.kgha[4]+[Soil].SoilNitrogen.NO3.kgha[5]+[Soil].SoilNitrogen.NH4.kgha[5]) as SubsurfaceMineralN
              sum([Soil].SoilNitrogen.NO3.kgha) as TotalNO3N
              sum([Soil].SoilNitrogen.NH4.kgha) as TotalNH4N
              sum([Soil].SoilWater.SWmm[1:10]) as SW200cm
              [Soil].SoilWater.SW[2] as SW30cm
              [Soil].SoilWater.SW[3] as SW50cm
              [Soil].SoilWater.SW[4] as SW70cm
              [Soil].FInert[1] as FInert10cm
              [Soil].SoilNitrogen.OC[1] as SOC10cm
              [Soil].SoilNitrogen.OC[2] as SOC30cm
              [Soil].SoilNitrogen.OC[3] as SOC50cm
              [Soil].SoilNitrogen.OC[4] as SOC70cm
              [Soil].SoilNitrogen.OC[5] as SOC90cm
              [Soil].SoilNitrogen.OC[6] as SOC110cm
              [Soil].SoilNitrogen.OC[7] as SOC130cm
              [Soil].SoilNitrogen.OC[8] as SOC150cm
              [Soil].SoilNitrogen.NO3.kghappm[1] as NO3ppm10cm
              [Soil].SoilNitrogen.NO3.kghappm[2] as NO3ppm30cm
              [Soil].SoilNitrogen.NO3.kghappm[3] as NO3ppm50cm
              [Soil].SoilNitrogen.NO3.kgha[1] as NO3kgpha10cm
              [Soil].SoilNitrogen.NO3.kgha[2] as NO3kgpha30cm
              [Soil].SoilNitrogen.NO3.kgha[3] as NO3kgpha50cm
              [Soil].SoilNitrogen.dlt_n_min_res[1] as NNM10cm
              [MicroClimate].peta
              [MicroClimate].petr
              [Soil].SoilWater.Eo
              [Soil].FBiom[1] as FBiom10cm
              [Soil].SoilWater.SW[1] as SurfaceSW
              [Maize].Leaf.Fw
              [Maize].Leaf.Photosynthesis.FVPD.Value
              [Maize].Leaf.Photosynthesis.FT.Value
              [Maize].Leaf.Fn
              [Maize].Root.Depth
              [Maize].Grain.Live.Wt as GrainWt
              [SurfaceOrganicMatter].Wt
              sum([Soil].SoilNitrogen.FOMN) as FOMN
              sum([Soil].SoilNitrogen.HumicN) as HumicN
              sum([Soil].SoilNitrogen.MicrobialN) as MicrobialN
              [Soil].SoilNitrogen.MicrobialN[1] as MicrobialN1
              [Soil].SoilNitrogen.MicrobialN[2] as MicrobialN2
              [Soil].SoilNitrogen.MicrobialN[3] as MicrobialN3
              [Maize].Phenology.DaysAfterSowing
              [Maize].Phenology.Photoperiod.Value
              [Maize].Phenology.Photosensitive.Target.Value
              [Maize].Phenology.LeafAppearance.FractionComplete
              [Maize].Structure.FinalLeafNumber.Value
              [Maize].Leaf.ExpandedCohortNo
              [Soil].SoilWater.LeachNO3
              [Soil].SoilWater.FlowNO3
          Report GliricidiaDailyReport: EventNames=[Clock].DoReport
            VariableNames:
              [Clock].Today as Date
              [Zone].Area
              [Soil].SoilWater.Es
              sum([Soil].SoilNitrogen.NO3.kgha) as TotalNO3N
              sum([Soil].SoilNitrogen.NH4.kgha) as TotalNH4N
              sum([Soil].SoilWater.SWmm[1:10]) as SW200cm
              [Soil].SoilWater.SW[2] as SW30cm
              [Soil].SoilWater.SW[3] as SW50cm
              [Soil].SoilWater.SW[4] as SW70cm
              [Soil].FInert[1] as FInert10cm
              [Soil].SoilNitrogen.OC[1] as SOC10cm
              [Soil].SoilNitrogen.OC[2] as SOC30cm
              [Soil].SoilNitrogen.OC[3] as SOC50cm
              [Soil].SoilNitrogen.OC[4] as SOC70cm
              [Soil].SoilNitrogen.OC[5] as SOC90cm
              [Soil].SoilNitrogen.OC[6] as SOC110cm
              [Soil].SoilNitrogen.OC[7] as SOC130cm
              [Soil].SoilNitrogen.OC[8] as SOC150cm
              [Soil].SoilNitrogen.NO3.kghappm[1] as NO3ppm10cm
              [Soil].SoilNitrogen.NO3.kghappm[2] as NO3ppm30cm
              [Soil].SoilNitrogen.NO3.kghappm[3] as NO3ppm50cm
              [Soil].SoilNitrogen.NO3.kgha[1] as NO3kgpha10cm
              [Soil].SoilNitrogen.NO3.kgha[2] as NO3kgpha30cm
              [Soil].SoilNitrogen.NO3.kgha[3] as NO3kgpha50cm
              [Soil].SoilNitrogen.dlt_n_min_res[1] as NNM10cm
              [MicroClimate].peta
              [MicroClimate].petr
              [Soil].SoilWater.Eo
              [Soil].FBiom[1] as FBiom10cm
              [Soil].SoilWater.SW[1] as SurfaceSW
              [SurfaceOrganicMatter].Wt
              sum([Soil].SoilNitrogen.FOMN) as FOMN
              sum([Soil].SoilNitrogen.HumicN) as HumicN
              sum([Soil].SoilNitrogen.MicrobialN) as MicrobialN
              [Soil].SoilNitrogen.MicrobialN[1] as MicrobialN1
              [Soil].SoilNitrogen.MicrobialN[2] as MicrobialN2
              [Soil].SoilNitrogen.MicrobialN[3] as MicrobialN3
              [Gliricidia].Leaf.Fw
              [Gliricidia].Leaf.Fn
              [Gliricidia].Leaf.LAI
              [Gliricidia].Leaf.Live.Wt
              [Gliricidia].Stem.Live.Wt
              [Gliricidia].Root.Live.Wt
              [Gliricidia].Root.TotalDMDemand
              [Gliricidia].Stem.DMDemands.Structural.DMDemandFunction.Value
              [Gliricidia].Leaf.DMDemands.Structural.DMDemandFunction.Value
              [Gliricidia].Root.PartitionFraction.Value
              [TreePruningRule].Script.AnnualFoliageHarvest
          Fertiliser
          SurfaceOrganicMatter: InitialResidueName=maize_stubble; InitialResidueType=maize; InitialResidueMass=0; InitialStandingFraction=0; InitialCPR=400; InitialCNR=80; FractionFaecesAdded=0.5
          Manager SowingRule
            StartDate = 12-Dec
            EndDate = 30-Dec
            MinESW = 30
            MinRain = 30
            RainDays = 10
            CultivarName = NSCM_41
            SowingDepth = 30
            RowSpacing = 750
            Population = 4.44
```csharp
using System;
using Models.Core;
using Models.PMF;
using Models.Soils;
using Models.Utilities;
using APSIM.Shared.Utilities;

namespace Models
{
    [Serializable]
    public class Script : Model
    {
        [Link] Clock Clock;
        [Link] Fertiliser Fertiliser;
        [Link] Summary Summary;
        [Link] Plant Maize;
        [Link] Soil Soil;
        Accumulator accumulatedRain;
        
        [Description("Start of sowing window (d-mmm)")]
        public string StartDate { get; set; }
        [Description("End of sowing window (d-mmm)")]
        public string EndDate { get; set; }
        [Description("Minimum extractable soil water for sowing (mm)")]
        public double MinESW { get; set; }
        [Description("Accumulated rainfall required for sowing (mm)")]
        public double MinRain { get; set; }
        [Description("Duration of rainfall accumulation (d)")]
        public int RainDays { get; set; }
        [Description("Cultivar to be sown")]
        public string CultivarName { get; set; }
        [Description("Sowing depth (mm)")]
        public double SowingDepth { get; set; }
        [Description("Row spacing (mm)")]
        public double RowSpacing { get; set; }
        [Description("Plant population (/m2)")]
        public double Population { get; set; }
        
        
        [EventSubscribe("Commencing")]
        private void OnSimulationCommencing(object sender, EventArgs e)
        {
            accumulatedRain = new Accumulator(this, "[Weather].Rain", RainDays);
        }
        

        [EventSubscribe("DoManagement")]
        private void OnDoManagement(object sender, EventArgs e)
        {
            accumulatedRain.Update();
            
            if (DateUtilities.WithinDates(StartDate, Clock.Today, EndDate) &&
                Maize.IsAlive != true &&
                MathUtilities.Sum(Soil.SoilWater.ESW) > MinESW &&
                accumulatedRain.Sum > MinRain)
            {
                Maize.Sow(population: Population, cultivar: CultivarName, depth: SowingDepth, rowSpacing: RowSpacing);    
            }
        
        }
        
    }
}
```
          Plant Maize: CropType=Maize; IsEnding=false; DaysAfterEnding=0
          Manager FertiliserRule: same as Validation.Makoka.Factors.N.0
          Manager Harvesting
```csharp
using System;
using Models.Core;
using System.Collections.Generic;
using System.Text;
using Models.Soils;
using Models.PMF;
using Models;
using System.Xml.Serialization;
using APSIM.Shared.Utilities;

namespace Models
{
    [Serializable] 
    public class Script : Model
    {
        [Link] Plant Maize;
        [Link] Zone zone;
                    
        
        [EventSubscribe("Commencing")]
        private void OnSimulationCommencing(object sender, EventArgs e)
        {
        }
        
        [EventSubscribe("DoManagement")]
        private void OnDoManagement(object sender, EventArgs e)
        {
            if (Maize.Phenology.CurrentPhaseName == "ReadyForHarvesting")
            {
                Maize.Harvest();
                Maize.EndCrop();
            }
        }
        
        [EventSubscribe("DoManagementCalculations")]
        private void OnDoManagementCalculations(object sender, EventArgs e)
        {
            
        }
    }
}
```
          Plant Gliricidia: CropType=Gliricidia; IsEnding=false; DaysAfterEnding=0
          Operations
            1999-12-12  [Maize].Sow(population: 1, cultivar: "NSCM_41", depth: 30, rowSpacing: 750);
            2000-01-12  [Fertiliser].Apply(Amount: 0, Type: Fertiliser.Types.NO3N)
          Operations GliricidiaManagement
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