Simulations: Version=103
  Memo TitlePage
    # The APSIM Grapevine Model

    _ZHU, J., Parker, A.K., Brown, H.E._

    Plant and Food Research, New Zealand

    Correspondance: junqi.zhu@plantandfood.co.nz

    ##Introduction
    Grapevine is one of the most economically important fruit crops worldwide (Alston and Sambucci, 2019), and its use in wine production has played an important cultural role in many parts of the world. Grapevines are now cultivated in more than 90 countries for wine, distilled liquors, juice, table grapes, and raisin production (Fereres and FAO OIV, 2016). Because of its global economic importance, the climate diversity of the producing regions, and a large amount of studies (from genomics to production practices), grapevine has emerged as a model perennial fruit crop species.

    ##Objective
    The model presented here was built to simulate the phenology,light interception, carbon allocation and storage, and yield formation of grapevine (Vitis vinifera) as a model perennial crop.

    ##Model construction

    The APSIM Grapevine model was developed using the Plant Modelling Framework (PMF) of [brown_plant_2014]. This new framework provides a library of plant organ and process submodels that can be coupled, at runtime, to construct a model in much the same way that models can be coupled to construct a simulation. This means that dynamic composition of lower level process and organ classes (e.g. photosynthesis, leaf) into larger constructions (e.g. maize, wheat, sorghum) can be achieved by the model developer without additional coding.

    A series of development was taken to adapt the source code to simulate the perennial woody plants. The current model including the following features:

    • A row strip configuration to represent the vineyard setup.

    • An adopted strip light interception model to capture the canopy heterogeneous and to calculate the light interception by grapevine and inter-row cover crops

    • A new carbon allocation method to allocate the carbohydrate simultaneously based on sink strength as well as sink priority. The new method capture the dynamics in carbon storage in perennial organ as well.

    • An adapted phenology model which starts from endodormancy of the bud instead of emergence and reset to endodormancy by a management method (pruning) in winter to capture the perennial behaviour

    • Using bud number per vine as input in the “sowing” method (model initialization) and calculating the number of primary shoots per vine based on fraction of budburst as a function of bud number

    • An adopted strip water competition method to calculate water competition between grapevine and inter-row cover crops

    The carbon assimilation and carbon allocation needs some further fine calibrations. so the effects of carbon stress has not been added to the yield formation processes, e.g. bunch number and berry number determination. Bunch number, berry number and potential berry fresh weight were determined by weather conditions at critical periods around flowerings of the previous and current season, see details at Zhu et al., 2020 OENO one. Berry dry mass accumulation following the source-sink carbon allocation rules. For getting a reliable estimation of yield and phenology, simulations should start one season before the season in question.
  Replacements
    Plant Grapevine: CropType=Grapevine; IsAlive=false; IsEnding=false; DaysAfterEnding=0
      Cultivar SauvignonBlanc
      Cultivar Chardonnay
        Command:
          [Phenology].EndoDormancy.Target.BaseTarget.FixedValue = 70.35
          [Phenology].EndoDormancy.Progression.Response.X = -4.89,-4.88, 11.03,16.9,16.91
          [Phenology].EndoDormancy.Progression.Response.Y = 0,1,1,1,0
          [Phenology].Budding.Target.FixedValue = 806.78
          [Phenology].Budding.Progression.Response.X = 0,2.03,12.03,22.03
          [Phenology].ThermalTime.Response.MinTemp = 2.11
          [Phenology].ThermalTime.Response.OptTemp = 30.72
          [Phenology].ThermalTime.Response.MaxTemp = 38.71
          [Phenology].Flowering.Target.FixedValue = 14.23
      Cultivar Merlot
        Command:
          [Phenology].EndoDormancy.Target.BaseTarget.FixedValue = 70
          [Phenology].EndoDormancy.Progression.Response.X = 1.07,1.08, 11.03,12.07,12.08
          [Phenology].EndoDormancy.Progression.Response.Y = 0,1,1,1,0
          [Phenology].Budding.Target.FixedValue = 548.4
          [Phenology].Budding.Progression.Response.X = 0,1.21,11.21,21.21
          [Phenology].ThermalTime.Response.MinTemp = 9.97
          [Phenology].ThermalTime.Response.OptTemp = 22.84
          [Phenology].ThermalTime.Response.MaxTemp = 35.02
          [Phenology].Flowering.Target.FixedValue = 28.6
      Cultivar PinotNoir
        Command:
          [Phenology].EndoDormancy.Target.BaseTarget.FixedValue = 50.79
          [Phenology].EndoDormancy.Progression.Response.X = -3.65,-3.64, 11.03,14.74,14.75
          [Phenology].EndoDormancy.Progression.Response.Y = 0,1,1,1,0
          [Phenology].Budding.Target.FixedValue = 609.5
          [Phenology].Budding.Progression.Response.X = 0,4.8,14.8,24.8
          [Phenology].ThermalTime.Response.MinTemp = 1.57
          [Phenology].ThermalTime.Response.OptTemp = 29.6
          [Phenology].ThermalTime.Response.MaxTemp = 39.3
          [Phenology].Flowering.Target.FixedValue = 19.36
      Cultivar PinotGris: same as Replacements.Grapevine.Chardonnay
      Phenology
        Memo
          The phenology model starts from endodormancy instead of emergence in annual crops.

          It assume the Endodormancy starts when a critical photoperiod (~13.1h) is reached. The following developments was regulated by temperature. Ecodormancy is induced when the chilling requirement is satisfied, and then followed by a period with forcing temperatures till bud burst (Chuine et al., 2003).

          The phenology model go through phases of Endodormancy,Ecodormancy,BudBurst,Flowering,FruitSet,Veraison, LeafFall. After one cycle, bud goes to dormancy at 314 days after winter solstice by the pruning method.
        HourlyInterpolation ThermalTime: agregationMethod=0
          WangEngelTempFunction Response: MinTemp=1.85; OptTemp=29.15; MaxTemp=39.86; RefTemp=25; MaximumTemperatureWeighting=0.5
          HourlySinPpAdjusted InterpolationMethod
        GenericPhase EndoDormancy: Start=Endodormancy; End=Ecodormancy
          SubtractFunction Target
            Constant BaseTarget: FixedValue=69.3; Units=hours
            VariableReference AccChillBefPrune: VariableName=[Phenology].AccChillBefPrune
          HourlyInterpolation Progression: agregationMethod=0
            XYPairs Response: X=[-4.91, -4.9, 11.03, 14.3, 14.4]; Y=[0, 1, 1, 1, 0]
            HourlySinPpAdjusted InterpolationMethod
        GenericPhase Budding: Start=Ecodormancy; End=BudBurst
          Constant Target: FixedValue=755.2; Units=thermaltime
          HourlyInterpolation Progression: agregationMethod=0
            XYPairs Response: X=[0, 2.12, 12.12, 22.12]; Y=[0, 0, 10, 20]
            HourlySinPpAdjusted InterpolationMethod
        GenericPhase Flowering: Start=BudBurst; End=Flowering
          Constant Target: FixedValue=25.27
          VariableReference Progression: VariableName=[Phenology].ThermalTime
        GenericPhase FruitSet: Start=Flowering; End=FruitSet
          Memo
            Fruit set (or the proportion of flowers that are retained as berries) represents a change-over from the static condition of the fully developed flower to the rapidly growing condition of the young fruit (Coombe, 1962).

            In practice the criteria to define this stage is a bit blur. In current, we set the duration from 50% flowering to fruit set is 10 thermal days based on our field experience and the method for determining berry number by meteorology factors. Fruit set phase is used as the time when the berry number is determined in this model.
          Constant Target: FixedValue=10
          VariableReference Progression: VariableName=[Phenology].ThermalTime
        GenericPhase BerryDevelopment: Start=FruitSet; End=Veraison
          MultiplyFunction Target
            Constant Base: FixedValue=30
            LinearInterpolationFunction LAIAdjustment
              XYPairs: X=[0, 1, 2, 3, 4, 5]; Y=[1, 1, 1, 1, 1, 1]
              VariableReference XValue: VariableName=[Grapevine].Leaf.LAI
          VariableReference Progression: VariableName=[Phenology].ThermalTime
        LeafDeathPhase: Start=Veraison; End=LeafFall
          VariableReference ThermalTime: VariableName=[Phenology].ThermalTime
        GotoPhase: Start=LeafFall; End=Unused; PhaseNameToGoto=EndoDormancy
        OnEventFunction BudBurstDOY: SetEvent=BudBurst; ReSetEvent=Endodormancy
          Memo
            A function is used to provide flowering date as days after sowing(DAS).
          Constant PreEventValue: FixedValue=0
          VariableReference PostEventValue: VariableName=[Weather].DaysSinceWinterSolstice
        OnEventFunction FloweringDOY: SetEvent=Flowering
          Memo
            A function is used to provide flowering date as days after sowing(DAS).
          Constant PreEventValue: FixedValue=176
          VariableReference PostEventValue: VariableName=[Weather].DaysSinceWinterSolstice
        OnEventFunction VeraisonDOY: SetEvent=Veraison; ReSetEvent=Ecodormancy
          Memo
            A function is used to provide flowering date as days after sowing(DAS).
          Constant PreEventValue: FixedValue=0
          VariableReference PostEventValue: VariableName=[Weather].DaysSinceWinterSolstice
        OnEventFunction CurrentSeason: SetEvent=BudBurst; ReSetEvent=Endodormancy
          Memo
            A function is used to capture the year of the current season as in the south hemisphere the growing season extends to the second year.
          Constant PreEventValue: FixedValue=0
          VariableReference PostEventValue: VariableName=[Clock].Today.Year
        AccumulateFunction AccChillBefPrune: StartStageName=Veraison; EndStageName=LeafFall; ResetStageName=Flowering; FractionRemovedOnCut=0; FractionRemovedOnHarvest=0; FractionRemovedOnGraze=0; FractionRemovedOnPrune=0
          LessThanFunction
            VariableReference DAWS: VariableName=[Weather].DaysSinceWinterSolstice
            Constant PruningTime: FixedValue=315
            LessThanFunction
              Constant autumn: FixedValue=200; Units=make sure the photoperiod is decreasing
              VariableReference DAWS: VariableName=[Weather].DaysSinceWinterSolstice
              LessThanFunction
                PhotoperiodFunction: Twilight=0; DayLength=0
                Constant CriticalPhotoPeriod: FixedValue=13.14
                VariableReference ChillingUnit: VariableName=[Phenology].EndoDormancy.Progression
                Constant Zero: FixedValue=0
              Constant Zero: FixedValue=0
            Constant Zero: FixedValue=0
        Age
      Structure: CohortInitialisationStage=Ecodormancy; LeafInitialisationStage=BudBurst
        WangEngelTempFunction ThermalTime: MinTemp=4; OptTemp=28; MaxTemp=40; RefTemp=25; MaximumTemperatureWeighting=0.5
        PhaseLookupValue MainStemPrimordiaInitiationRate: Start=BudBurst; End=Veraison
          Constant: FixedValue=1.8; Units=thermal day
        PhaseLookupValue Phyllochron: Start=BudBurst; End=Veraison
          MultiplyFunction
            Constant: FixedValue=1.8
            LinearInterpolationFunction
              XYPairs: X=[1, 5, 10, 24]; Y=[0.9, 0.9, 1, 1]
              VariableReference XValue: VariableName=[Leaf].AppearedCohortNo
        Constant FinalLeafNumber: FixedValue=25; Units=number
        MultiplyFunction BranchingRate
          LinearInterpolationFunction Potential_Branching_Rate
            XYPairs: X=[0, 7, 8, 13, 14, 34]; Y=[0.1, 0.1, 0.1, 0.1, 0.1, 0.1]
            VariableReference XValue: VariableName=[Structure].LeafTipsAppeared
          LinearInterpolationFunction
            XYPairs: X=[0, 0.4, 0.55, 0.8, 1]; Y=[1, 0.5, 0.2, 0, 0]
            VariableReference XValue: VariableName=[Leaf].CoverGreen
        Constant BranchMortality: FixedValue=0
        Constant DroughtInducedBranchMortality: FixedValue=0
        Constant StemSenescenceAge: FixedValue=0
        BudNumberFunction BudNumber: SetStage=BudBurst
          MultiplyFunction FractionOfBudBurst
            SigmoidFunction BudNumberEffect
              VariableReference XValue: VariableName=[Structure].PrimaryBudNo
              Constant Ymax: FixedValue=1.4
              Constant Xo: FixedValue=100
              Constant b: FixedValue=-54.8977
            LinearInterpolationFunction CordonDiameterEffect
              XYPairs: X=[0, 12, 15]; Y=[0.1, 1, 1]
              VariableReference XValue: VariableName=[Grapevine].Cordon.CordonDiameter
        LinearInterpolationFunction HeightModel
          XYPairs: X=[0, 90, 230, 315, 316, 366]; Y=[1200, 1200, 2300, 2300, 1200, 1200]
          VariableReference XValue: VariableName=[Weather].DaysSinceWinterSolstice
      Leaf: CurrentExpandingLeaf=34; StartFractionExpanded=0.83819; FractionNextleafExpanded=0.926641; MaxCover=1; Albedo=0.25; Gsmax350=0.01; R50=200; KDead=0.03; MaximumMainStemLeafNumber=30
        zero: DeadNodesYesterday, GrowthRespiration, LAI, Depth, Width, FRGR, PotentialEP, WaterDemand, TipsAtEmergence, CohortsAtInitialisation, FractionDied
        VariableReference ThermalTime: VariableName=[Structure].ThermalTime
        LeafCohort InitialLeaf1: Rank=1; Area=1000
          zero: NReallocationFactor, DMReallocationFactor, NRetranslocationFactor, DMRetranslocationFactor, ShadeInducedSenRate, SenescedFrac, DeltaPotentialArea, DeltaStressConstrainedArea, DeltaCarbonConstrainedArea, PotentialStructuralDMAllocation, PotentialMetabolicDMAllocation, MetabolicNReallocated, MetabolicWtReallocated, StorageNReallocated, StorageWtReallocated, MetabolicNRetranslocated, StorageNRetrasnlocated, DMRetranslocated, MetabolicNAllocation, StructuralDMAllocation, MetabolicDMAllocation, MaintenanceRespiration
        LeafCohort InitialLeaf2: Rank=2
          zero: NReallocationFactor, DMReallocationFactor, NRetranslocationFactor, DMRetranslocationFactor, ShadeInducedSenRate, SenescedFrac, DeltaPotentialArea, DeltaStressConstrainedArea, DeltaCarbonConstrainedArea, PotentialStructuralDMAllocation, PotentialMetabolicDMAllocation, MetabolicNReallocated, MetabolicWtReallocated, StorageNReallocated, StorageWtReallocated, MetabolicNRetranslocated, StorageNRetrasnlocated, DMRetranslocated, MetabolicNAllocation, StructuralDMAllocation, MetabolicDMAllocation, Area, MaintenanceRespiration
        LeafCohort InitialLeaf3: Rank=3
          zero: NReallocationFactor, DMReallocationFactor, NRetranslocationFactor, DMRetranslocationFactor, ShadeInducedSenRate, SenescedFrac, DeltaPotentialArea, DeltaStressConstrainedArea, DeltaCarbonConstrainedArea, PotentialStructuralDMAllocation, PotentialMetabolicDMAllocation, MetabolicNReallocated, MetabolicWtReallocated, StorageNReallocated, StorageWtReallocated, MetabolicNRetranslocated, StorageNRetrasnlocated, DMRetranslocated, MetabolicNAllocation, StructuralDMAllocation, MetabolicDMAllocation, Area, MaintenanceRespiration
        LeafCohortParameters CohortParameters: ExpansionStressValue=0
          MultiplyFunction MaxArea
            LinearInterpolationFunction MaxArea
              XYPairs: X=[0, 0.2, 1]; Y=[10000, 16000, 16000]
              VariableReference XValue: VariableName=[Structure].RelativeNodeApperance
            Constant: FixedValue=0.5
          LinearInterpolationFunction GrowthDuration
            XYPairs: X=[0, 0.3, 0.5, 1, 1.1]; Y=[16, 14.5, 14, 14, 14]
            VariableReference XValue: VariableName=[Structure].RelativeNodeApperance
          LinearInterpolationFunction LagDuration
            XYPairs: X=[0, 0.15, 0.3, 0.4, 0.73, 1, 1.1]; Y=[60, 80, 150, 150, 150, 150, 150]
            VariableReference XValue: VariableName=[Structure].RelativeNodeApperance
          LinearInterpolationFunction SenescenceDuration
            XYPairs: X=[0, 0.2, 1]; Y=[60, 70, 80]
            VariableReference XValue: VariableName=[Structure].RelativeNodeApperance
          Constant DetachmentLagDuration: FixedValue=10; Units=thermalDay
          Constant DetachmentDuration: FixedValue=200; Units=degreeDay
          LinearInterpolationFunction SpecificLeafAreaMax
            XYPairs: X=[0, 1]; Y=[25000, 25000]
            VariableReference XValue: VariableName=[Structure].RelativeNodeApperance
          Constant SpecificLeafAreaMin: FixedValue=10000; Units=mm2/g
          Constant StructuralFraction: FixedValue=0.8; Units=percentage
          Constant MaximumNConc: FixedValue=0.001; Units=g/g
          Constant MinimumNConc: FixedValue=0.0001; Units=g/g
          Constant InitialNConc: FixedValue=0.04; Units=g/g
          Constant NReallocationFactor: FixedValue=0; Units=percentage
          Constant NRetranslocationFactor: FixedValue=0; Units=percentage
          Constant CriticalNConc: FixedValue=0.03; Units=g/g
          Constant DMRetranslocationFactor: FixedValue=1; Units=percentage
          LinearInterpolationFunction ShadeInducedSenescenceRate
            XYPairs: X=[0, 0.5, 0.8, 1]; Y=[0, 0, 0, 0]
            VariableReference XValue: VariableName=[Leaf].CohortCurrentRankCoverAbove
          Constant StorageFraction: FixedValue=0.2; Units=percentage
          Constant SenessingLeafRelativeSize: FixedValue=1; Units=0-1
          Constant DMReallocationFactor: FixedValue=1; Units=percentage
          Constant LeafSizeShapeParameter: FixedValue=0.01
            Units=parameter controls the logistic growth of the leaf in growth stage
          Constant MaintenanceRespirationFunction: FixedValue=0; Units=g/g
          Constant DroughtInducedLagAcceleration: FixedValue=1
          Constant DroughtInducedSenAcceleration: FixedValue=1
          Constant CellDivisionStress: FixedValue=1; Units=0-1
          ArrayFunction LagDurationAgeMultiplier: Values=1 1 1
          ArrayFunction SenescenceDurationAgeMultiplier: Values=1 1 1
          ArrayFunction LeafSizeAgeMultiplier: Values=1 1 1 1 1 1 1 1 1 1 1 1
          Constant RemobilisationCost: FixedValue=0
          Constant CarbonConcentration: FixedValue=0.4
          Constant ExpansionStress: FixedValue=1
        RUEModel Photosynthesis
          PhaseLookup RUE
            PhaseLookupValue Juvenile: Start=BudBurst; End=Flowering
              Constant: FixedValue=1.3; Units=g/MJ
            PhaseLookupValue Vegetative: Start=Flowering; End=Veraison
              Constant: FixedValue=1.5; Units=g/MJ
            PhaseLookupValue Reproductive: Start=Veraison; End=LeafFall
              Constant: FixedValue=1.5; Units=g/MJ
          RUECO2Function FCO2: PhotosyntheticPathway=C3
          LinearInterpolationFunction FN
            XYPairs: X=[0, 1, 1.5]; Y=[1, 1, 1]
            VariableReference XValue: VariableName=[Leaf].Fn
          WeightedTemperatureFunction FT: MaximumTemperatureWeighting=0.75
            XYPairs: X=[5, 20, 30, 45]; Y=[0, 1, 1, 0]
          LinearInterpolationFunction FVPD
            XYPairs: X=[0, 10, 50]; Y=[1, 1, 1]
            VariableReference XValue: VariableName=[Leaf].Photosynthesis.VPD
          VariableReference RadnInt: VariableName=[Leaf].RadIntTot
          Constant FW: FixedValue=1
        MinimumFunction FRGRFunction
          VariableReference RUE_FT: VariableName=[Leaf].Photosynthesis.FT
          MinimumFunction Others
            VariableReference RUE_FN: VariableName=[Leaf].Photosynthesis.FN
            VariableReference RUE_FVPD: VariableName=[Leaf].Photosynthesis.FVPD
        MultiplyFunction ExtinctionCoeff
          Constant: FixedValue=0.6
        CompositeBiomass Total: Propertys=[[Leaf].Live, [Leaf].Dead]; DMDOfStructural=0.6
        BiomassRemoval BiomassRemovalDefaults
          OrganBiomassRemovalType Harvest: FractionLiveToRemove=0; FractionDeadToRemove=0; FractionLiveToResidue=0; FractionDeadToResidue=0
          OrganBiomassRemovalType Cut: FractionLiveToRemove=0; FractionDeadToRemove=0; FractionLiveToResidue=0; FractionDeadToResidue=0
          OrganBiomassRemovalType Prune: FractionLiveToRemove=0; FractionDeadToRemove=0; FractionLiveToResidue=0; FractionDeadToResidue=0
          OrganBiomassRemovalType Graze: FractionLiveToRemove=0; FractionDeadToRemove=0; FractionLiveToResidue=0; FractionDeadToResidue=0
        Constant DMConversionEfficiency: FixedValue=0.83
        Constant RemobilisationCost: FixedValue=0
        Constant CarbonConcentration: FixedValue=0.4
        Constant StructuralFraction: FixedValue=0.8; Units=g/g
        Constant StomatalConductanceCO2Modifier: FixedValue=1
        BiomassDemand DMDemandPriorityFactors
          Constant Structural: FixedValue=2.24
          Constant Metabolic: FixedValue=1.07
          Constant Storage: FixedValue=0.01
        Constant FrostFraction: FixedValue=0
        MultiplyFunction WidthFunction
          LinearInterpolationFunction AgeFactor
            XYPairs: X=[0, 5, 10, 20]; Y=[0.4, 1, 1, 1]
            VariableReference XValue: VariableName=[Phenology].Age.Years
          LinearInterpolationFunction SeasonalWidthPattern
            XYPairs: X=[0, 90, 230, 320, 361]; Y=[100, 200, 600, 600, 100]
            VariableReference XValue: VariableName=[Weather].DaysSinceWinterSolstice
        LinearInterpolationFunction DepthFunction
          XYPairs: X=[0, 90, 230, 313, 314, 366]; Y=[1, 1, 1100, 1100, 1, 1]
          VariableReference XValue: VariableName=[Weather].DaysSinceWinterSolstice
      GenericOrgan Shoot: IsAboveGround=true
        Constant NReallocationFactor: FixedValue=1; Units=percentage
        Constant NRetranslocationFactor: FixedValue=0.1; Units=percentage
        PhaseBasedSwitch NitrogenDemandSwitch: Start=BudBurst; End=LeafFall
        Constant DMRetranslocationFactor: FixedValue=0; Units=percentage
        Constant MinimumNConc: FixedValue=0; Units=g/g
        Constant MaximumNConc: FixedValue=0.0001
        BiomassRemoval BiomassRemovalDefaults: same as Replacements.Grapevine.Leaf.BiomassRemovalDefaults
        Constant DetachmentRateFunction: FixedValue=0; Units=1/d
        Constant SenescenceRate: FixedValue=0; Units=/d
        Constant MaintenanceRespirationFunction: FixedValue=0; Units=0-1
        Constant DMConversionEfficiency: FixedValue=0.83; Units=0-1
        Constant DMReallocationFactor: FixedValue=0
        VariableReference CriticalNConc: VariableName=[Shoot].MinimumNConc
        Constant RemobilisationCost: FixedValue=0
        Constant CarbonConcentration: FixedValue=0.4
        BiomassDemand DMDemands
          DeltaFunction Structural
            MultiplyFunction Integral
              VariableReference ShootPopulation: VariableName=[Structure].MainStemPopn
              BetaGrowthFunction: tm=43; te=79.2
                Constant Ymax: FixedValue=18; Units=g
                VariableReference XValue: VariableName=[Shoot].ThermalTimeAfterBudBurst
          Constant Metabolic: FixedValue=0
          MaximumFunction Storage
            MultiplyFunction Storage
              SubtractFunction
                MultiplyFunction StructuralWt
                  VariableReference StructuralWt: VariableName=[Grapevine].Shoot.Live.StructuralWt
                  Constant MaxConcentration: FixedValue=0.26; Units=gStorageDM/gStructureDM
                VariableReference StorageWt: VariableName=[Grapevine].Shoot.Live.StorageWt
              PhaseLookup DailySynthesis
                PhaseLookupValue Juvenile: Start=BudBurst; End=Veraison
                  Constant: FixedValue=0.02; Units=gc/gDM
                PhaseLookupValue Reproductive: Start=Veraison; End=LeafFall
                  Constant: FixedValue=0.04; Units=gc/gDM
            Constant Zero: FixedValue=0
        BiomassDemand NDemands
          MultiplyFunction Structural
            VariableReference MinNconc: VariableName=[Shoot].minimumNconc
            VariableReference PotentialDMAllocation: VariableName=[Shoot].potentialDMAllocation.Structural
          MultiplyFunction Metabolic
            SubtractFunction MetabolicNconc
              VariableReference CritNconc: VariableName=[Shoot].criticalNConc
              VariableReference MinNconc: VariableName=[Shoot].minimumNconc
            VariableReference PotentialDMAllocation: VariableName=[Shoot].potentialDMAllocation.Structural
          StorageNDemandFunction Storage
            VariableReference NitrogenDemandSwitch: VariableName=[Shoot].nitrogenDemandSwitch
            VariableReference MaxNconc: VariableName=[Shoot].maximumNconc
        RetranslocateNonStructural RetranslocateNitrogen
        BiomassDemand DMDemandPriorityFactors
          Constant Structural: FixedValue=1
          Constant Metabolic: FixedValue=0.001
          PhaseLookup Storage
            PhaseLookupValue Juvenile: Start=BudBurst; End=Veraison
              Constant: FixedValue=0.2; Units=gc/gDM
            PhaseLookupValue Reproductive: Start=Veraison; End=LeafFall
              Constant: FixedValue=0.4; Units=gc/gDM
        AccumulateFunction ThermalTimeAfterBudBurst: StartStageName=BudBurst; EndStageName=LeafFall; ResetStageName=Ecodormancy; FractionRemovedOnCut=0; FractionRemovedOnHarvest=0; FractionRemovedOnGraze=0; FractionRemovedOnPrune=0
          VariableReference ThermalTime: VariableName=[Phenology].ThermalTime
        BiomassDemand InitialWt
          Constant Structural: FixedValue=0; Units=g/m^2
          Constant Metabolic: FixedValue=0
          Constant Storage: FixedValue=0
      GenericOrgan Cordon: IsAboveGround=true
        Constant DMReallocationFactor: FixedValue=0.2
        Constant NReallocationFactor: FixedValue=1; Units=percentage
        Constant NRetranslocationFactor: FixedValue=0.1; Units=percentage
        PhaseBasedSwitch NitrogenDemandSwitch: Start=BudBurst; End=LeafFall
        Constant DMRetranslocationFactor: FixedValue=0; Units=percentage
        Constant MinimumNConc: FixedValue=0; Units=g/g
        Constant MaximumNConc: FixedValue=0.0001
        BiomassRemoval BiomassRemovalDefaults: same as Replacements.Grapevine.Leaf.BiomassRemovalDefaults
        Constant DetachmentRateFunction: FixedValue=0; Units=/d
        Constant SenescenceRate: FixedValue=0; Units=/d
        Constant MaintenanceRespirationFunction: FixedValue=0; Units=0-1
        Constant DMConversionEfficiency: FixedValue=0.83; Units=0-1
        VariableReference CriticalNConc: VariableName=[Cordon].MinimumNConc
        Constant RemobilisationCost: FixedValue=0
        Constant CarbonConcentration: FixedValue=0.4
        Constant CordonDiameter: FixedValue=10
        Constant CordonNumber: FixedValue=4
        BiomassDemand NDemands
          MultiplyFunction Structural
            VariableReference MinNconc: VariableName=[Cordon].minimumNconc
            VariableReference PotentialDMAllocation: VariableName=[Cordon].potentialDMAllocation.Structural
          MultiplyFunction Metabolic
            SubtractFunction MetabolicNconc
              VariableReference CritNconc: VariableName=[Cordon].criticalNConc
              VariableReference MinNconc: VariableName=[Cordon].minimumNconc
            VariableReference PotentialDMAllocation: VariableName=[Cordon].potentialDMAllocation.Structural
          StorageNDemandFunction Storage
            VariableReference NitrogenDemandSwitch: VariableName=[Cordon].nitrogenDemandSwitch
            VariableReference MaxNconc: VariableName=[Cordon].maximumNconc
        RetranslocateNonStructural RetranslocateNitrogen
        BiomassDemand DMDemandPriorityFactors
          Constant Structural: FixedValue=0.47
          Constant Metabolic: FixedValue=0.001
          PhaseLookup Storage: same as Replacements.Grapevine.Shoot.DMDemandPriorityFactors.Storage
        BiomassDemand DMDemands
          Constant Metabolic: FixedValue=0
          MaximumFunction Storage
            MultiplyFunction Storage
              SubtractFunction
                MultiplyFunction StructuralWt
                  VariableReference StructuralWt: VariableName=[Grapevine].Cordon.Live.StructuralWt
                  Constant MaxConcentration: FixedValue=0.26; Units=gStorageDM/gStructureDM
                VariableReference StorageWt: VariableName=[Grapevine].Cordon.Live.StorageWt
              PhaseLookup DailySynthesis
                PhaseLookupValue Juvenile: Start=BudBurst; End=Veraison
                  Constant: FixedValue=0.02; Units=gc/gDM
                PhaseLookupValue Reproductive: Start=Veraison; End=LeafFall
                  Constant: FixedValue=0.03; Units=gc/gDM
            Constant Zero: FixedValue=0
          MultiplyFunction Structural
            VariableReference wt: VariableName=[Cordon].Live.Wt
            Constant growthRate: FixedValue=0.0001
        BiomassDemand InitialWt
          Constant Structural: FixedValue=77.5; Units=g/m^2
          Constant Metabolic: FixedValue=0
          Constant Storage: FixedValue=19
      GenericOrgan Trunk: IsAboveGround=true
        BiomassDemand InitialWt
          Constant Structural: FixedValue=280; Units=g/m^2
          Constant Metabolic: FixedValue=0
          Constant Storage: FixedValue=200
        BiomassDemand DMDemands
          MultiplyFunction Structural
            VariableReference wt: VariableName=[Trunk].Live.Wt
            Constant growthRate: FixedValue=0.0001
            LinearInterpolationFunction AgeFactor
              XYPairs: X=[1, 5, 20, 30]; Y=[1, 1, 0.01, 0]
              VariableReference XValue: VariableName=[Phenology].Age.Years
          MaximumFunction Storage
            MultiplyFunction Storage
              SubtractFunction
                MultiplyFunction StructuralWt
                  VariableReference StructuralWt: VariableName=[Grapevine].Trunk.Live.StructuralWt
                  Constant MaxConcentration: FixedValue=0.26; Units=gStorageDM/gStructureDM
                VariableReference StorageWt: VariableName=[Grapevine].Trunk.Live.StorageWt
              PhaseLookup DailySynthesis: same as Replacements.Grapevine.Shoot.DMDemands.Storage.Storage.DailySynthesis
            Constant Zero: FixedValue=0
          Constant Metabolic: FixedValue=0
        BiomassDemand DMDemandPriorityFactors
          Constant Structural: FixedValue=0.4
          Constant Metabolic: FixedValue=0
          PhaseLookup Storage: same as Replacements.Grapevine.Shoot.DMDemandPriorityFactors.Storage
        Constant DMRetranslocationFactor: FixedValue=0.15
        Constant DMConversionEfficiency: FixedValue=0.83; Units=0-1
        Constant NReallocationFactor: FixedValue=1
        Constant NRetranslocationFactor: FixedValue=0.1
        PhaseBasedSwitch NitrogenDemandSwitch: Start=BudBurst; End=LeafFall
        Constant MinimumNConc: FixedValue=0
        Constant MaximumNConc: FixedValue=0.0001
        BiomassRemoval BiomassRemovalDefaults: same as Replacements.Grapevine.Leaf.BiomassRemovalDefaults
        Constant DetachmentRateFunction: FixedValue=0; Units=/d
        Constant SenescenceRate: FixedValue=3e-05; Units=/d
        Constant MaintenanceRespirationFunction: FixedValue=0; Units=0-1
        Constant DMReallocationFactor: FixedValue=1
        VariableReference CriticalNConc: VariableName=[Trunk].MinimumNConc
        Constant RemobilisationCost: FixedValue=0
        Constant CarbonConcentration: FixedValue=0.4
        BiomassDemand NDemands
          MultiplyFunction Structural
            VariableReference MinNconc: VariableName=[Trunk].minimumNconc
            VariableReference PotentialDMAllocation: VariableName=[Trunk].potentialDMAllocation.Structural
          MultiplyFunction Metabolic
            SubtractFunction MetabolicNconc
              VariableReference CritNconc: VariableName=[Trunk].criticalNConc
              VariableReference MinNconc: VariableName=[Trunk].minimumNconc
            VariableReference PotentialDMAllocation: VariableName=[Trunk].potentialDMAllocation.Structural
          StorageNDemandFunction Storage
            VariableReference NitrogenDemandSwitch: VariableName=[Trunk].nitrogenDemandSwitch
            VariableReference MaxNconc: VariableName=[Trunk].maximumNconc
        RetranslocateNonStructural RetranslocateNitrogen
      GenericOrgan Fibrousroot: IsAboveGround=false
        Memo Description
          Note this represents the taproots of all the plant in the population. The taproot are primarily considered as storage organs, its researves can be made available to boost plant growth in spring and/or following a defoliation.

          The Fibrousroot is separated from the mian root class because the current root class can not handle the biomass retranslocation while a generic organ can. The biomass of the taproot is expressed as gram per square meter, while the initial dry mass for the root class is expressed at per plant level.

          Taproots in grapevine are perennial. It can grow in diamention and biomass. Its structural growth rate was assumed to be the same as the trunk in this model. Its storage biomass typicall decrease in spring and refill after veraison.
        BiomassDemand InitialWt
          Constant Structural: FixedValue=450; Units=g/m^2
          Constant Metabolic: FixedValue=0
          Constant Storage: FixedValue=300
        BiomassDemand DMDemands
          MultiplyFunction Structural
            VariableReference wt: VariableName=[Fibrousroot].Live.Wt
            Constant growthRate: FixedValue=0.0001
            LinearInterpolationFunction AgeFactor
              XYPairs: X=[1, 5, 20, 30]; Y=[1, 1, 0.01, 0]
              VariableReference XValue: VariableName=[Phenology].Age.Years
          Constant Metabolic: FixedValue=0
          MaximumFunction Storage
            MultiplyFunction Storage
              SubtractFunction
                MultiplyFunction StructuralWt
                  VariableReference StructuralWt: VariableName=[Grapevine].Fibrousroot.Live.StructuralWt
                  Constant MaxConcentration: FixedValue=0.26; Units=gStorageDM/gStructureDM
                VariableReference StorageWt: VariableName=[Fibrousroot].Live.StorageWt
              PhaseLookup DailySynthesis: same as Replacements.Grapevine.Shoot.DMDemands.Storage.Storage.DailySynthesis
            Constant Zero: FixedValue=0
        BiomassDemand DMDemandPriorityFactors: same as Replacements.Grapevine.Trunk.DMDemandPriorityFactors
        Constant SenescenceRate: FixedValue=0; Units=/d
        Constant DMRetranslocationFactor: FixedValue=0.1
        Constant DMConversionEfficiency: FixedValue=0.83; Units=0-1
        Constant DMReallocationFactor: FixedValue=1
        Constant NReallocationFactor: FixedValue=1
        Constant NRetranslocationFactor: FixedValue=0
        PhaseBasedSwitch NitrogenDemandSwitch: Start=BudBurst; End=LeafFall
        Constant MinimumNConc: FixedValue=0
        Constant MaximumNConc: FixedValue=0.0001
        BiomassRemoval BiomassRemovalDefaults: same as Replacements.Grapevine.Leaf.BiomassRemovalDefaults
        Constant DetachmentRateFunction: FixedValue=0; Units=/d
        Constant MaintenanceRespirationFunction: FixedValue=0; Units=0-1
        VariableReference CriticalNConc: VariableName=[Trunk].MinimumNConc
        Constant RemobilisationCost: FixedValue=0
        Constant CarbonConcentration: FixedValue=0.4
        BiomassDemand NDemands: same as Replacements.Grapevine.Trunk.NDemands
        RetranslocateNonStructural RetranslocateNitrogen
      Root: GrowthRespiration=0; MaintenanceRespiration=0
        Memo Description
          Note that this organs is parameterised to represents all the fine roots of the plant.  The root organ is reponsible for uptake but can also supply both N and DM from its non-structural biomass.  The taproot organ is used for simulating biomass storage and remobilisation because the current root class can not handle the biomass retranslocation.

          Fine roots represent about 20% to 30% of the total biomass and is assumed to u[take all the water and nutrient in current model.
        BiomassDemand InitialWt
          Constant Structural: FixedValue=800; Units=g/plant
          Constant Metabolic: FixedValue=0
          Constant Storage: FixedValue=0
        BiomassDemand DMDemands
          MultiplyFunction Structural
            VariableReference wt: VariableName=[Root].Live.StructuralWt
            Constant GrowthRate: FixedValue=0.003; Units=gDMgDM-1d-1
            DivideFunction WtFactor
              Constant TargetWt: FixedValue=500
              VariableReference wt: VariableName=[Root].Live.StructuralWt
          Constant Metabolic: FixedValue=0
          Constant Storage: FixedValue=0
        BiomassDemand DMDemandPriorityFactors
          Constant Structural: FixedValue=1
          Constant Metabolic: FixedValue=0
          Constant Storage: FixedValue=0
        Constant SenescenceRate: FixedValue=0.001
        Constant DMConversionEfficiency: FixedValue=0.9
        RootShapeCylindre RootShape
        Constant MaintenanceRespirationFunction: FixedValue=0.002
        Constant DMRetranslocationFactor: FixedValue=0
        Constant DMReallocationFactor: FixedValue=0
        PhaseBasedSwitch NitrogenDemandSwitch: Start=BudBurst; End=LeafFall
        Constant MinimumNConc: FixedValue=0; Units=g/g
        Constant MaximumNConc: FixedValue=0.0001; Units=g/g
        Constant MaximumRootDepth: FixedValue=1000000; Units=mm
        BiomassRemoval BiomassRemovalDefaults: same as Replacements.Grapevine.Leaf.BiomassRemovalDefaults
        Constant RemobilisationCost: FixedValue=0
        LinearInterpolationFunction NUptakeSWFactor
          XYPairs: X=[0, 1]; Y=[0, 1]
          VariableReference XValue: VariableName=[Root].RWC
        Constant SpecificRootLength: FixedValue=40; Units=m/g
        Constant RootFrontVelocity: FixedValue=10; Units=mm/d
        Constant KNO3: FixedValue=0.02
        Constant KNH4: FixedValue=0.003
        Constant MaxDailyNUptake: FixedValue=6
        Constant CarbonConcentration: FixedValue=0.4
        BiomassDemand NDemands
          MultiplyFunction Structural
            VariableReference MinNconc: VariableName=[Root].minimumNconc
            VariableReference PotentialDMAllocation: VariableName=[Root].potentialDMAllocation.Structural
          MultiplyFunction Metabolic
            SubtractFunction MetabolicNconc
              VariableReference CritNconc: VariableName=[Root].criticalNConc
              VariableReference MinNconc: VariableName=[Root].minimumNconc
            VariableReference PotentialDMAllocation: VariableName=[Root].potentialDMAllocation.Structural
          StorageNDemandFunction Storage
            VariableReference NitrogenDemandSwitch: VariableName=[Root].nitrogenDemandSwitch
            VariableReference MaxNconc: VariableName=[Root].maximumNconc
        VariableReference CriticalNConc: VariableName=[Root].MinimumNConc
        LinearInterpolationFunction KLModifier
          XYPairs
            X=[0, 300, 600, 900, 1200, 1500, 1800, 2100, 2400, 2700, 3000]
            Y=[1, 1, 1, 1, 1, 1, 1, 1, 1, 1, 1]
          Memo Description
            This is important in SLURP as it is set for each species to represent their differences in rooting patterns between crop species
          VariableReference XValue: VariableName=[Root].LayerMidPointDepth
      ReproductiveOrgan Berry: GrowthRespiration=0; MaintenanceRespiration=0; RipeStage=Ripe
        Biomass Live: DMDOfStructural=0.6
        Biomass Dead: DMDOfStructural=0.6
        Memo
          The final yield was calculated by bunches per shoot, shoots per vine, berries per bunch,and berry fresh or dry weight.

          The effects of carbon status on yield compoent has not been included as it requires further calibration. Bunch number, berry number and potential berry fresh weight were determined by weather conditions at critical periods around flowerings of the previous and current season, see details at Zhu et al., 2020 OENO one. Berry dry mass accumulation following the source-sink carbon allocation rules. Brix was calculated based on the ratio of berry dry weight to fresh weight. Total titratable acid was simulated based on thermaltime accumulation after veraison follwoing a negative exponetial curve.

          A long-term phenology and yield monitoring trial using both two-cane and four-cane trained vertically shoot positioned (VSP) Sauvignon blanc vines was established in four vineyards in Marlborough, New Zealand in 2004, and was used for calibrating the berry module. Phenology, bunch number, berry mass, yield and meteorology records were collated. A multivariable mixed linear model was used to assess the relationship between various yield components and weather conditions. The critical periods for each yield component and weather factor were optimised based on the maximum likelihood returned from the mixed linear model. The optimised critical periods of temperature for all yield components occurred mainly before 50 % flowering either in the previous season (during inflorescence initiation) and the current season, indicating the importance of the pre-flowering period on yield formation. Out of all weather factors, maximum daily temperature had the largest effect on bunch number and overall yield and strongly influenced berry number and bunch mass. Rainfall near flowering time had a negative effect on berry mass and bunch mass, but post-flowering rainfall had a strong positive effect.
        Folder MetFactors
          Memo MetFactors
            The final yield was calculated by vines per hectare, shoots per vine, bunches per shoot, flower number per bunch, berries per bunch,and mean berry weight. The effects of temperature and carbon status were or will be considered on bunches per shoot, flower number per bunch, berries per bunch,and mean berry weight.
          DivideFunction BUN_TmaxIni
            AccumulateByNumericPhase TmaxIni: StartStageName=3.6; EndStageName=5.9; ResetStageName=BudBurst; FractionRemovedOnCut=0; FractionRemovedOnHarvest=0; FractionRemovedOnGraze=0; FractionRemovedOnPrune=0
              VariableReference Tmax: VariableName=[Weather].MaxT
            AccumulateByNumericPhase Time: StartStageName=3.6; EndStageName=5.9; ResetStageName=BudBurst; FractionRemovedOnCut=0; FractionRemovedOnHarvest=0; FractionRemovedOnGraze=0; FractionRemovedOnPrune=0
              Constant Days: FixedValue=1; Units=days/day
          DivideFunction BEN_TmeanFlow
            AccumulateByNumericPhase TmeanFlow: StartStageName=3.7; EndStageName=4.05; ResetStageName=BudBurst; FractionRemovedOnCut=0; FractionRemovedOnHarvest=0; FractionRemovedOnGraze=0; FractionRemovedOnPrune=0
              VariableReference Tmean: VariableName=[Weather].MeanT
            AccumulateByNumericPhase Time: StartStageName=3.7; EndStageName=4.05; ResetStageName=BudBurst; FractionRemovedOnCut=0; FractionRemovedOnHarvest=0; FractionRemovedOnGraze=0; FractionRemovedOnPrune=0
              Constant Days: FixedValue=1; Units=days/day
          DivideFunction BUN_RadIni
            AccumulateByNumericPhase RadIni: StartStageName=3.7; EndStageName=5.9; ResetStageName=BudBurst; FractionRemovedOnCut=0; FractionRemovedOnHarvest=0; FractionRemovedOnGraze=0; FractionRemovedOnPrune=0
              VariableReference Rad: VariableName=[Weather].Radn
            AccumulateByNumericPhase Time: StartStageName=3.7; EndStageName=5.9; ResetStageName=BudBurst; FractionRemovedOnCut=0; FractionRemovedOnHarvest=0; FractionRemovedOnGraze=0; FractionRemovedOnPrune=0
              Constant Days: FixedValue=1; Units=days/day
          DivideFunction BEN_RainTotFlow
            AccumulateByNumericPhase RainTotFlow: StartStageName=3.5875; EndStageName=4.296; ResetStageName=BudBurst; FractionRemovedOnCut=0; FractionRemovedOnHarvest=0; FractionRemovedOnGraze=0; FractionRemovedOnPrune=0
              VariableReference RainTot: VariableName=[Weather].Rain
            Constant: FixedValue=1
          DivideFunction BEN_TmaxIni
            AccumulateByNumericPhase TmaxIni: StartStageName=3.6; EndStageName=5.8; ResetStageName=BudBurst; FractionRemovedOnCut=0; FractionRemovedOnHarvest=0; FractionRemovedOnGraze=0; FractionRemovedOnPrune=0
              VariableReference Tmax: VariableName=[Weather].MaxT
            AccumulateByNumericPhase Time: StartStageName=3.6; EndStageName=5.8; ResetStageName=BudBurst; FractionRemovedOnCut=0; FractionRemovedOnHarvest=0; FractionRemovedOnGraze=0; FractionRemovedOnPrune=0
              Constant Days: FixedValue=1; Units=days/day
          DivideFunction BM_TmeanFlow
            AccumulateByNumericPhase TmeanFlow: StartStageName=3.6; EndStageName=4.2; ResetStageName=BudBurst; FractionRemovedOnCut=0; FractionRemovedOnHarvest=0; FractionRemovedOnGraze=0; FractionRemovedOnPrune=0
              VariableReference Tmean: VariableName=[Weather].MeanT
            AccumulateByNumericPhase Time: StartStageName=3.6; EndStageName=4.2; ResetStageName=BudBurst; FractionRemovedOnCut=0; FractionRemovedOnHarvest=0; FractionRemovedOnGraze=0; FractionRemovedOnPrune=0
              Constant Days: FixedValue=1; Units=days/day
          DivideFunction BM_RainTotFlow
            AccumulateByNumericPhase RainTotFlow: StartStageName=3.5; EndStageName=4.3; ResetStageName=BudBurst; FractionRemovedOnCut=0; FractionRemovedOnHarvest=0; FractionRemovedOnGraze=0; FractionRemovedOnPrune=0
              VariableReference RainTot: VariableName=[Weather].Rain
            Constant: FixedValue=1
          DivideFunction BM_RadFlow
            AccumulateByNumericPhase RadFlow: StartStageName=3.5; EndStageName=5.05; ResetStageName=BudBurst; FractionRemovedOnCut=0; FractionRemovedOnHarvest=0; FractionRemovedOnGraze=0; FractionRemovedOnPrune=0
              VariableReference Rad: VariableName=[Weather].Radn
            AccumulateByNumericPhase Time: StartStageName=3.5; EndStageName=5.05; ResetStageName=BudBurst; FractionRemovedOnCut=0; FractionRemovedOnHarvest=0; FractionRemovedOnGraze=0; FractionRemovedOnPrune=0
              Constant Days: FixedValue=1; Units=days/day
          DivideFunction BM_RainTotVer
            AccumulateByNumericPhase RainTotVer: StartStageName=5.38; EndStageName=5.67; ResetStageName=BudBurst; FractionRemovedOnCut=0; FractionRemovedOnHarvest=0; FractionRemovedOnGraze=0; FractionRemovedOnPrune=0
              VariableReference RainTot: VariableName=[Weather].Rain
            Constant: FixedValue=1
          OnEventFunction BUN_TmaxIni1: SetEvent=Ecodormancy
            Constant PreEventValue: FixedValue=21
            VariableReference PostEventValue: VariableName=[Berry].MetFactors.BUN_TmaxIni
          OnEventFunction BUN_RadIni1: SetEvent=Ecodormancy
            Constant PreEventValue: FixedValue=21
            VariableReference PostEventValue: VariableName=[Berry].MetFactors.BUN_RadIni
          OnEventFunction BEN_TmaxIni1: SetEvent=Veraison; ReSetEvent=Flowering
            Constant PreEventValue: FixedValue=21
            VariableReference PostEventValue: VariableName=[Berry].MetFactors.BEN_TmaxIni
        Folder YieldComponent
          OnEventFunction BunchesPerShoot: SetEvent=BudBurst; ReSetEvent=Ecodormancy
            Memo
              here we use a trigger function for bunches per shoot as the value of mean bunch initiation temperature in the previous season

              Numbers were guessed based on Eltom 2013 Fig. 7.7. y=0.0981*Ta + 0.35

               Bunches per shoot is affected by the temperature and CHO during initiation, it is further affected by the CHO during bud burst. The later decided whether the potential initiated inflorescence can grow out successfully or been realized.

              For simiplicity, right now, the CHO effect during bud burst is expressed as a function of number of buds retained.
            Constant PreEventValue: FixedValue=1.7
            MaximumFunction PostEventValue
              Memo
                Try to ignor the first year, which give TmaxIni 0
              AddFunction MetFun
                Constant: FixedValue=-0.8
                LessThanFunction TmaxIni
                  VariableReference XValue: VariableName=[Berry].MetFactors.BUN_TmaxIni1
                  Constant: FixedValue=10
                  Constant PreValue: FixedValue=1.6
                  LinearInterpolationFunction TmaxIni
                    XYPairs: X=[0, 1, 10, 20, 30]; Y=[0, 0.08024, 0.8024, 1.6048, 2.5]
                    VariableReference XValue: VariableName=[Berry].MetFactors.BUN_TmaxIni1
                LessThanFunction RadIni
                  VariableReference XValue: VariableName=[Berry].MetFactors.BUN_RadIni1
                  Constant: FixedValue=10
                  Constant PreValue: FixedValue=0.65
                  LinearInterpolationFunction RadIni
                    XYPairs: X=[0, 1, 10, 20, 30]; Y=[0, 0.03093, 0.3093, 0.6186, 0.93]
                    VariableReference XValue: VariableName=[Berry].MetFactors.BUN_RadIni1
              Constant zero: FixedValue=0
          OnEventFunction BunchesPerVine: SetEvent=Flowering; ReSetEvent=BudBurst
            Memo
              Trigger the calculation after the determination of bunches per shoot
            Constant PreEventValue: FixedValue=50
            MaximumFunction PostEventValue
              Constant zero: FixedValue=10
              MultiplyFunction NumberFunction
                VariableReference BunchesPerShoot: VariableName=[Berry].YieldComponent.BunchesPerShoot
                DivideFunction ShootsNum
                  VariableReference StemPopulation: VariableName=[Grapevine].Structure.MainStemPopn
                  VariableReference Population: VariableName=[Grapevine].Population
          OnEventFunction BerryNum: SetEvent=FruitSet; ReSetEvent=BudBurst
            Memo
              here we use a trigger function for bunches per shoot as the value of mean flowering temperature Y0 is updating itself during the growing season, which would cause inconvience if we directly correlates the bunches per shoot and mean flowering temperature Y0.

              Numbers were guessed based on Eltom 2013 Fig. 7.7. y=0.0981*Ta + 0.35

               Bunches per shoot is affected by the temperature and CHO during initiation, it is further affected by the CHO during bud burst. The later decided whether the potential initiated inflorescence can grow out successfully or been realized.

              For simiplicity, right now, the CHO effect during bud burst is expressed as a function of number of buds retained.
            Constant PreEventValue: FixedValue=65
            MinimumFunction PostEventValue
              MaximumFunction BerryNumFun
                AddFunction MetFun
                  Constant: FixedValue=-40
                  LinearInterpolationFunction TmeanFlow
                    VariableReference XValue: VariableName=[Berry].MetFactors.BEN_TmeanFlow
                    XYPairs: X=[0, 0.01, 10, 20, 25, 30, 40]; Y=[0, 0, 31.8, 63.6, 79.5, 95.4, 95.4]
                  LinearInterpolationFunction RainTotFlow
                    VariableReference XValue: VariableName=[Berry].MetFactors.BEN_RainTotFlow
                    XYPairs: X=[0, 0.01, 10, 20, 30, 60, 100, 120, 150, 200]; Y=[0, 0, -8.3, -16.6, -24.75, -49.8, -83, -99.6, -123, -140]
                  LinearInterpolationFunction TmaxIni
                    XYPairs: X=[0, 0.01, 10, 20, 25, 30, 40]; Y=[0, 0, 23.3, 46.6, 58.25, 69.9, 70]
                    LessThanFunction XValue
                      VariableReference XValue: VariableName=[Berry].MetFactors.BEN_TmaxIni1
                      Constant: FixedValue=10
                      Constant GuessValue: FixedValue=20
                      VariableReference TmaxIni1: VariableName=[Berry].MetFactors.BEN_TmaxIni1
                  MinimumFunction TmeanRainTot
                    MultiplyFunction
                      Constant: FixedValue=0.04812
                      VariableReference Tmean: VariableName=[Berry].MetFactors.BEN_TmeanFlow
                      VariableReference RainTot: VariableName=[Berry].MetFactors.BEN_RainTotFlow
                    Constant: FixedValue=150
                Constant zero: FixedValue=0
              Constant UpperLimit: FixedValue=150
          OnEventFunction BerryMass: SetEvent=Veraison; ReSetEvent=Flowering
            Memo: same as Replacements.Grapevine.Berry.YieldComponent.BerryNum.Memo
            Constant PreEventValue: FixedValue=2.1
            MinimumFunction PostEventValue
              MaximumFunction BerryMassFun
                AddFunction MetFun
                  Constant: FixedValue=1
                  LinearInterpolationFunction TmeanFlow
                    XYPairs: X=[0, 1, 10, 20]; Y=[0, 0.05, 0.5, 1]
                    VariableReference XValue: VariableName=[Berry].MetFactors.BM_TmeanFlow
                  LinearInterpolationFunction RadFlow
                    VariableReference XValue: VariableName=[Berry].MetFactors.BM_RadFlow
                    XYPairs: X=[0, 1, 10]; Y=[0, 0.018, 0.18]
                  LinearInterpolationFunction RainTotFlow
                    XYPairs: X=[0, 1, 10]; Y=[0, -0.0013165, -0.013165]
                    VariableReference XValue: VariableName=[Berry].MetFactors.BM_RainTotFlow
                  LinearInterpolationFunction RainTotVer
                    VariableReference XValue: VariableName=[Berry].MetFactors.BM_RainTotVer
                    XYPairs: X=[0, 1, 10]; Y=[0, 0.0018, 0.018]
                Constant LowerLimit: FixedValue=1.7
              Constant UpperLimit: FixedValue=3
        MultiplyFunction NumberFunction
          VariableReference StemPopulation: VariableName=[Grapevine].Structure.MainStemPopn
          VariableReference BunchesPerShoot: VariableName=[Berry].YieldComponent.BunchesPerShoot
          VariableReference BerriesPerBunch: VariableName=[Berry].YieldComponent.BerryNum
        MultiplyFunction SingleBerryFW
          BetaGrowthFunction: tm=38.37; te=67.44
            VariableReference Ymax: VariableName=[Berry].YieldComponent.BerryMass
            VariableReference XValue: VariableName=[Berry].ThermalTimeAfterFlowering
        MultiplyFunction TotalBerryFW
          VariableReference BerryNumber: VariableName=[Berry].NumberFunction
          BetaGrowthFunction: tm=38.37; te=67.44
            VariableReference Ymax: VariableName=[Berry].YieldComponent.BerryMass
            VariableReference XValue: VariableName=[Berry].ThermalTimeAfterFlowering
        MultiplyFunction SingleBerryDW
          BetaGrowthFunction: tm=53.4; te=79.8
            Constant Ymax: FixedValue=0.5529; Units=g
            VariableReference XValue: VariableName=[Berry].ThermalTimeAfterFlowering
        SubtractFunction WaterContent
          Constant: FixedValue=1
          PhaseLookupValue AfterFlowering: Start=Flowering; End=LeafFall
            MinimumFunction
              DivideFunction
                VariableReference BerryDW: VariableName=[Berry].Live.Wt
                VariableReference TotalBerryFW: VariableName=[Berry].TotalBerryFW
              Constant: FixedValue=0.88
        DivideFunction YieldPerVine
          VariableReference TotalBerryFW: VariableName=[Berry].TotalBerryFW
          VariableReference Population: VariableName=[Grapevine].Population
          Constant: FixedValue=1000
        PhaseLookup Brix
          PhaseLookupValue BeforeVeraison: Start=Flowering; End=Veraison
            Constant: FixedValue=5
          PhaseLookupValue AfterVeraison: Start=Veraison; End=LeafFall
            LessThanFunction
              VariableReference DAWS: VariableName=[Weather].DaysSinceWinterSolstice
              Constant: FixedValue=308
              DivideFunction
                MaximumFunction
                  SubtractFunction
                    Constant: FixedValue=0.944
                    VariableReference WaterContent: VariableName=[Berry].WaterContent
                  Constant zero: FixedValue=0
                Constant: FixedValue=0.0082
              Constant Zero: FixedValue=0
        PhaseLookup TitratableAcid
          PhaseLookupValue BeforeVeraison: Start=Flowering; End=Veraison
            Constant: FixedValue=0
          PhaseLookupValue AfterVeraison: Start=Veraison; End=LeafFall
            ExponentialFunction TitratableAcid: A=7.866; B=30.345; C=-0.0923
              VariableReference XValue: VariableName=[Berry].ThermalTimeAfterVeraison
        MultiplyFunction DMDemandFunction
          LessThanFunction
            VariableReference DAWS: VariableName=[Weather].DaysSinceWinterSolstice
            Constant HarvestTime: FixedValue=290
            PhaseLookupValue AfterFruitSet: Start=Flowering; End=LeafFall
              MaximumFunction
                DeltaFunction
                  MultiplyFunction Integral
                    VariableReference BerryNumber: VariableName=[Berry].NumberFunction
                    BetaGrowthFunction: tm=53.4; te=79.8
                      Constant Ymax: FixedValue=0.5529; Units=g
                      VariableReference XValue: VariableName=[Berry].ThermalTimeAfterFlowering
                Constant: FixedValue=0; Units=g
            Constant Zero: FixedValue=0
          Constant: FixedValue=1; Units=g
        AccumulateFunction ThermalTimeAfterVeraison: StartStageName=Veraison; EndStageName=LeafFall; ResetStageName=Ecodormancy; FractionRemovedOnCut=0; FractionRemovedOnHarvest=0; FractionRemovedOnGraze=0; FractionRemovedOnPrune=0
          VariableReference ThermalTime: VariableName=[Phenology].ThermalTime
        AccumulateFunction ThermalTimeAfterFlowering: StartStageName=Flowering; EndStageName=LeafFall; ResetStageName=Ecodormancy; FractionRemovedOnCut=0; FractionRemovedOnHarvest=0; FractionRemovedOnGraze=0; FractionRemovedOnPrune=0
          VariableReference ThermalTime: VariableName=[Phenology].ThermalTime
        LinearInterpolationFunction ReadyForHarvest
          XYPairs: X=[0, 200, 201]; Y=[0, 0, 1]
          VariableReference XValue: VariableName=[Berry].ThermalTimeAfterVeraison
        Constant MaxNConcDailyGrowth: FixedValue=0.01; Units=g/g
        Constant NFillingRate: FixedValue=0
        Constant MinimumNConc: FixedValue=0
        Constant MaximumNConc: FixedValue=0.0001
        BiomassRemoval BiomassRemovalDefaults
          OrganBiomassRemovalType Harvest: FractionLiveToRemove=0; FractionDeadToRemove=0; FractionLiveToResidue=0; FractionDeadToResidue=0
          OrganBiomassRemovalType Cut: FractionLiveToRemove=0; FractionDeadToRemove=0; FractionLiveToResidue=0; FractionDeadToResidue=0
          OrganBiomassRemovalType Prune: FractionLiveToRemove=0; FractionDeadToRemove=0; FractionLiveToResidue=0; FractionDeadToResidue=0
          OrganBiomassRemovalType Graze: FractionLiveToRemove=0; FractionDeadToRemove=0; FractionLiveToResidue=0; FractionDeadToResidue=0
          OrganBiomassRemovalType Thin: FractionLiveToRemove=0; FractionDeadToRemove=0; FractionLiveToResidue=0; FractionDeadToResidue=0
        Constant MaximumPotentialGrainSize: FixedValue=2.5; Units=g fresh or dry
        Constant DMConversionEfficiency: FixedValue=1
        Constant RemobilisationCost: FixedValue=0
        Constant CarbonConcentration: FixedValue=0.4
        BiomassDemand DMDemandPriorityFactors
          Constant Structural: FixedValue=1.1
          Constant Metabolic: FixedValue=0.001
          Constant Storage: FixedValue=0.001
      OrganArbitrator Arbitrator
        BiomassTypeArbitrator DMArbitration
          Folder PotentialPartitioningMethods
            ReallocationMethod
            AllocateFixationMethod
            RetranslocationMethod
            SendPotentialDMAllocationsMethod
          Folder AllocationMethods
            NutrientConstrainedAllocationMethod
            DryMatterAllocationsMethod
          QPrioritythenRelativeAllocation ArbitrationMethod
        BiomassTypeArbitrator NArbitration
          Folder PotentialPartitioningMethods
            ReallocationMethod
          Folder ActualPartitioningMethods
            AllocateFixationMethod
            RetranslocationMethod
          Folder AllocationMethods
            NitrogenAllocationsMethod
          RelativeAllocation ArbitrationMethod
          AllocateUptakesMethod
        WaterUptakeMethod
        NitrogenUptakeMethod
  DataStore
    ExcelInput PhenoObs: FileNames=[Observations\Observed.xlsx]; SheetNames=[Observed]
    PredictedObserved: PredictedTableName=Report; ObservedTableName=Observed; FieldNameUsedForMatch=Zone; FieldName2UsedForMatch=Clock.Today; FieldName3UsedForMatch=CurrentSeason; AllColumns=false
      Tests: POName=PredictedObserved
        AcceptedStats:
          Name            n     Slope      Intercept  SEslope    SEintercept  R2         RMSE      NSE        ME         MAE        RSR
          BerryMass       47    0.498705   1.29291    0.140453   0.287119     0.218851   0.304353  -4.38478   0.270254   0.273544   2.29569
          BerryNum        46    0.326969   44.1227    0.172749   10.9368      0.0752897  15.2196   -0.803752  2.20099    12.4745    1.32836
          BudBurstDOY     52    0.363747   69.8711    0.292194   31.0835      0.0300629  11.5841   -3.86018   2.26923    9          2.18328
          BunchesPerVine  47    0.223697   49.3808    0.0459706  2.9971       0.344776   7.30888   0.29425    -0.778388  5.55235    0.831104
          f.rad.int       1319  0.592548   0.149686   0.021119   0.00898466   0.374117   0.126271  0.238098   -0.013327  0.0910711  0.872539
          FloweringDOY    52    0.59547    70.0874    0.166426   28.9438      0.203846   6.83599   -0.550296  -0.230769  5.57692    1.23308
          psw             578   0.694401   102.257    0.020363   4.48738      0.668753   52.6501   0.315113   37.7803    44.4182    0.826863
          transpiration   965   0.0900816  0.733349   0.0153528  0.0304933    0.0345158  1.28969   -0.904386  -0.861343  1.00372    1.37928
          VeraisonDOY     52    0.69358    72.749     0.121745   28.9877      0.393614   6.94622   0.164497   -0.173077  5.36538    0.905227
        AcceptedStatsName=Name n Slope Intercept SEslope SEintercept R2 RMSE NSE ME MAE RSR
  Folder BaseSim
    Simulation BaseSim
      Zone Vineyard: Area=1; Slope=0; AspectAngle=0; Altitude=50
        Memo
          Double Guyôt-trained vines, pruned each year to retain 24 nodes were monitored. Vines were trained using vertical shoot positioning (VSP), with an exposed leaf area height of 1.2 m, and trimmed to maintain a compact canopy. Vines were planted 1.8 m apart within the row, and 2.4 m apart between rows. Average flowering date was determined by monitoring all the inflorescences on one cane on a vine in each plot on a regular basis throughout flowering. Likewise, regular berry samples (at least weekly) were taken from before the date of véraison until harvest at a soluble solids concentration value of 21.5 oBrix.
        Soil: SoilType=Sedementary; LocalName=Lincoln; Latitude=0; Longitude=0
          Physical
            Thickness  BD   AirDry  LL15  DUL   SAT
            100        1.2  0.08    0.16  0.33  0.5
            200        1.2  0.16    0.16  0.33  0.5
            300        1.2  0.15    0.15  0.31  0.44
            300        1.2  0.13    0.13  0.27  0.46
            300        1.2  0.15    0.15  0.3   0.44
            300        1.2  0.15    0.15  0.3   0.44
            SoilCrop GrapevineSoil: LL=[0.13, 0.16, 0.15, 0.15, 0.15, 0.15]; KL=[0.1, 0.06, 0.04, 0.01, 0.0051, 0.002]; XF=[1, 1, 1, 1, 0.5, 0.2]
          WaterBalance SoilWater: SummerDate=1-Nov; SummerU=9; SummerCona=4.4; WinterDate=1-Apr; WinterU=9; WinterCona=4.4; DiffusConst=88; DiffusSlope=35.4; Salb=0.18; CN2Bare=0; CNRed=-9e-05; CNCov=0; Slope=0; DischargeWidth=0; CatchmentArea=0
            Thickness  SWCON  KLAT
            100        0.55   0
            200        0.55   0
            300        0.55   0
            300        0.55   0
            300        0.55   0
            300        0.55   0
          SoilNitrogen: fom_types=[default, manure, mucuna, lablab, shemp, stable]; fract_carb=[0.2, 0.3, 0.54, 0.57, 0.45, 0]; fract_cell=[0.7, 0.3, 0.37, 0.37, 0.47, 0.1]; fract_lign=[0.1, 0.4, 0.09, 0.06, 0.08, 0.9]; NPartitionApproach=0
            SoilNitrogenNO3 NO3
            SoilNitrogenNH4 NH4
            SoilNitrogenUrea Urea
            SoilNitrogenPlantAvailableNO3 PlantAvailableNO3
            SoilNitrogenPlantAvailableNH4 PlantAvailableNH4
          Organic: FOMCNRatio=30
            Thickness  Carbon  SoilCNRatio  FBiom  FInert  FOM
            100        3.5     11.5         0.025  0.3     1243.93
            200        2.5     11.5         0.025  0.4     833.832
            300        1.2     11.5         0.015  0.75    457.617
            300        1.03    11.5         0.01   0.9     251.145
            300        0.47    11.5         0.01   0.96    137.831
            300        0.47    11.5         0.01   0.96    75.6435
          Chemical
            Thickness  NO3N      NH4N       PH
            100        33.3333   0.0833333  6.6
            200        12.5      0.0416667  6.2
            300        3.88889   0.0277778  5.7
            300        3.88889   0.0277778  5.5
            300        0.383333  0.0277778  5.5
            300        0.383333  0.0277778  5.5
          InitialWater Initial water: PercentMethod=0; FractionFull=1
          Sample: Thickness=[100, 200, 300, 300, 300, 300]; SWUnits=Volumetric; OCUnits=Total; PHUnits=Water
          CERESSoilTemperature
        SurfaceOrganicMatter: InitialResidueName=Grapevine; InitialResidueType=Grapevine; InitialResidueMass=2000; InitialStandingFraction=0; InitialCPR=0; InitialCNR=80
        MicroClimate: a_interception=0; b_interception=1; c_interception=0; d_interception=0; soil_albedo=0.23; SoilHeatFluxFraction=0.4; MinimumHeightDiffForNewLayer=0; NightInterceptionFraction=0.5; ReferenceHeight=2
        Irrigation
        Fertiliser
        Plant Grapevine
        Operations Sowing
          2004-01-01  [Grapevine].Sow(population: 0.231481, cultivar: "SauvignonBlanc", depth: 800, rowSpacing: 2400, budNumber:24);
        Report: EventNames=[Clock].DoReport
          VariableNames:
            [Clock].Today
            [Clock].Today.Year
            [Clock].Today.DayOfYear
            [Weather].DaysSinceWinterSolstice as DAWS
            [Grapevine].Phenology.CurrentSeason as CurrentSeason
            [Grapevine].Phenology.Stage
            [Grapevine].Phenology.AccumulatedEmergedTT
            [Grapevine].Phenology.BudBurstDOY as BudBurstDOY
            [Grapevine].Phenology.FloweringDOY as FloweringDOY
            [Grapevine].Phenology.VeraisonDOY as VeraisonDOY
            [Grapevine].Phenology.CurrentStageName as CurrentStageName
            [Grapevine].Phenology.AccChillBefPrune
            [Grapevine].Structure.PrimaryBudNo
            [Grapevine].Structure.MainStemPopn
            [Grapevine].Structure.LeafTipsAppeared
            [Grapevine].Leaf.LAI
            [Grapevine].Leaf.InitialisedCohortNo
            [Grapevine].Leaf.DeadCohortNo
            [Grapevine].Leaf.AppearedCohortNo
            [Grapevine].Leaf.CohortSize
            [Grapevine].Leaf.Fn
            [Grapevine].Leaf.Fw
            [Grapevine].Leaf.Live.Wt
            [Grapevine].Shoot.Live.Wt
            [Grapevine].Cordon.Live.Wt
            [Grapevine].Cordon.Live.StructuralWt
            [Grapevine].Trunk.Live.Wt
            [Grapevine].Root.Live.Wt
            [Grapevine].Arbitrator.FDM
            [Grapevine].Arbitrator.DM.TotalFixationSupply
            [Berry].Live.Wt
            [Berry].SingleBerryDW
            [Berry].SingleBerryFW
            [Berry].TotalBerryFW
            [Berry].NumberFunction
            [Berry].ThermalTimeAfterFlowering
            [Berry].WaterContent
            [Berry].Brix
            [Berry].TitratableAcid
            [Berry].MetFactors.BUN_TmaxIni1 as BUN_TmaxIni
            [Berry].MetFactors.BUN_RadIni1 as BUN_RadIni
            [Berry].MetFactors.BEN_RainTotFlow as BEN_RainTotFlow
            [Berry].MetFactors.BEN_TmaxIni1 as BEN_TmaxIni1
            [Berry].MetFactors.BEN_TmeanFlow as BEN_TmeanFlow
            [Berry].MetFactors.BM_RadFlow as BM_RadFlow
            [Berry].MetFactors.BM_RainTotFlow as BM_RainTotFlow
            [Berry].MetFactors.BM_RainTotVer as BM_RainTotVer
            [Berry].MetFactors.BM_TmeanFlow as BM_TmeanFlow
            [Berry].YieldComponent.BunchesPerVine as bunch.no.vine
            [Berry].YieldComponent.BerryNum as BerryNum
            [Berry].YieldComponent.BerryMass as berry.fw.mean
        Manager Fertilizer
          FertilizeDAWS = 100
          Amount = 50
```csharp
using APSIM.Shared.Utilities;
using System.Xml.Serialization;
using Models;
using Models.PMF;
using Models.Soils;
using System.Text;
using System.Collections.Generic;
using Models.Core;
using System;

namespace Models
{
    [Serializable] 
    public class Script : Model
    {
       [Link] Clock Clock;
       [Link] Fertiliser Fertiliser;
       [Link] Summary Summary;
       [Link] Weather weather;

        [Description("Fertilize_DAWS")]
         public int FertilizeDAWS { get; set; }
        [Description("Amount of fertiliser to be applied")]
        public double Amount { get; set; }

       [EventSubscribe("DoManagement")]
        private void OnDoManagement(object sender, EventArgs e)
        {
          if (weather.DaysSinceWinterSolstice == FertilizeDAWS)
           Fertiliser.Apply(Amount: Amount, Type: Fertiliser.Types.NO3N);
        }
       
    }
}
```
        Manager HarvestNPruning
          LeafPluckingDAWS = 205
          HarvestDAWS = 290
          PruningDAWS = 314
          FrostDate1 = 10/03/2002 00:00:00
          FrostDate2 = 11/18/2002 00:00:00
```csharp
using System.Xml.Serialization;
using Models.PMF.Interfaces;
using Models.PMF;
using Models.Core;
using System.Collections.Generic;
using System;

namespace Models
{
    [Serializable] 
    [System.Xml.Serialization.XmlInclude(typeof(Model))]
    public class Script : Model
    {
        [Link] Plant Grapevine;
        [Link] Clock Clock;
        [Link] Zone zone;
        [Link] Weather weather;
       
        [Description("SummerPruning_DAWS")]         
        public int LeafPluckingDAWS { get; set; }  //day

        [Description("Harvest_DAWS")]
        public int HarvestDAWS { get; set; }

        [Description("Pruning_DAWS")]         
        public int PruningDAWS { get; set; }  //day

        [Description("Frost Date 1")]
        public DateTime FrostDate1 { get; set; }
        [Description("Frost Date 2")]
        public DateTime FrostDate2 { get; set; }


        [XmlIgnore] private RemovalFractions Remove_1 { get; set; }
        [XmlIgnore] private RemovalFractions Remove_2 { get; set; }
        [XmlIgnore] private RemovalFractions Remove_3 { get; set; }
        [XmlIgnore] private RemovalFractions Remove_4 { get; set; }
        [XmlIgnore] private RemovalFractions Remove_5 { get; set; }
        [EventSubscribe("StartOfSimulation")]
        private void OnSimulationCommencing(object sender, EventArgs e)
        {
            Remove_1 = new RemovalFractions();
            Remove_2 = new RemovalFractions();
            Remove_3 = new RemovalFractions();
            Remove_4 = new RemovalFractions();
            Remove_5 = new RemovalFractions();
        }
        
        [EventSubscribe("DoManagement")]
        private void OnDoManagement(object sender, EventArgs e)
        {
    	     //Set up  array of remove fractions to send with Cut method.  Each member in the array corresponds to an organ in the same order they are set up in.
    	     //PruneDate = DateTime.Parse(PruneDateString);
    	     if (weather.DaysSinceWinterSolstice == LeafPluckingDAWS && Grapevine.Phenology.Stage >= 3)
    	     {
    	            
    	        //int LeafTipsAppeared = (int)Grapevine.Structure.LeafTipsAppeared;
    	        //int NodesToRemove = (int)Math.Max(LeafTipsAppeared - TargetLeafRank, 1); 
    	        double FractionToRemove = 0.3; //1- TargetLeafRank/LeafTipsAppeared;
			
    	        Remove_1.SetFractionToRemove("Leaf", 0, "live");
    	        Remove_1.SetFractionToRemove("Shoot", 0);
    	        Remove_1.SetFractionToRemove("Cordon", 0);
    	        Remove_1.SetFractionToRemove("Trunk", 0);
    	        Remove_1.SetFractionToRemove("Root", 0);
    	        Remove_1.SetFractionToRemove("Fibrousroot", 0);
    	        Remove_1.SetFractionToRemove("Berry", 0);
			
    	        Remove_1.SetFractionToResidue("Leaf", FractionToRemove, "live");
    	        Remove_1.SetFractionToResidue("Shoot", FractionToRemove);
    	        Remove_1.SetFractionToResidue("Cordon", 0);
    	        Remove_1.SetFractionToResidue("Trunk", 0);
    	        Remove_1.SetFractionToResidue("Root", 0);
    	        Remove_1.SetFractionToRemove("Fibrousroot", 0);
    	        Remove_1.SetFractionToResidue("Berry", 0);
			
    	       // Remove_1.NodesToRemove = NodesToRemove;
    	        Grapevine.RemoveBiomass("LeafPluck", Remove_1);
		
    	     }

           if (weather.DaysSinceWinterSolstice == HarvestDAWS && Grapevine.Phenology.Stage >= 3)
           {
           	
               Remove_2.SetFractionToRemove("Leaf", 0, "live");
               Remove_2.SetFractionToRemove("Shoot",  0);
               Remove_2.SetFractionToRemove("Cordon", 0);
               Remove_2.SetFractionToRemove("Trunk",  0);
               Remove_2.SetFractionToRemove("Root",   0);
               Remove_2.SetFractionToRemove("Fibrousroot", 0);
               Remove_2.SetFractionToRemove("Berry",  1);
		 
               Remove_2.SetFractionToResidue("Leaf",   0.2, "live");
               Remove_2.SetFractionToResidue("Shoot",  0);
               Remove_2.SetFractionToResidue("Cordon", 0);
               Remove_2.SetFractionToResidue("Trunk",  0);
               Remove_2.SetFractionToResidue("Root",   0);
               Remove_2.SetFractionToRemove("Fibrousroot", 0);
               Remove_2.SetFractionToResidue("Berry",  0);
		 
               Grapevine.RemoveBiomass("LeafPluck", Remove_2);
           }
                                   
            if (weather.DaysSinceWinterSolstice == PruningDAWS&& Grapevine.Phenology.Stage >= 3)
            {
                Remove_3.SetPhenologyStage = 1;

                Remove_3.SetFractionToRemove("Leaf",   0, "live");
                Remove_3.SetFractionToRemove("Shoot",  0);
                Remove_3.SetFractionToRemove("Cordon", 0);
                Remove_3.SetFractionToRemove("Trunk",  0);
                Remove_3.SetFractionToRemove("Root",   0);
                Remove_3.SetFractionToRemove("Berry",  0);

                Remove_3.SetFractionToResidue("Leaf",   1, "live");
                Remove_3.SetFractionToResidue("Shoot",  1);
                Remove_3.SetFractionToResidue("Cordon", 1);
                Remove_3.SetFractionToResidue("Trunk",  0);
                Remove_3.SetFractionToResidue("Root",   0);
                Remove_3.SetFractionToRemove("Fibrousroot", 0);
                Remove_3.SetFractionToResidue("Berry",  1);

                Grapevine.RemoveBiomass("Prune", Remove_3);

                double cordonBiomass = 96.9; //g/m2 reset the cordon biomass to the original value 
	            double cordonNSC = cordonBiomass * 0.18;

	            zone.Set("[Grapevine].Cordon.Live.StorageWt", cordonNSC); 	           
	            zone.Set("[Grapevine].Cordon.Live.StructuralWt", cordonBiomass - cordonNSC); 

	            //zone.Set("[Grapevine].Trunk.Live.StructuralWt", 280); 	
	           // zone.Set("[Grapevine].Trunk.Live.StorageWt", 70); 	

	           // zone.Set("[Grapevine].Root.Live.StructuralWt", 1531); 	
	           // zone.Set("[Grapevine].Root.Live.StorageWt",  349); 	

            }
           if (Clock.Today.Date == FrostDate1)      
           {
              Remove_4.SetFractionToRemove("Leaf", 0, "live");
              Remove_4.SetFractionToRemove("Shoot",  0);
              Remove_4.SetFractionToRemove("Cordon", 0);
              Remove_4.SetFractionToRemove("Trunk",  0);
              Remove_4.SetFractionToRemove("Root",   0);
              Remove_4.SetFractionToRemove("Fibrousroot", 0);
              Remove_4.SetFractionToRemove("Berry",  0);
		   //
              Remove_4.SetFractionToResidue("Leaf",   0.2, "live");
              Remove_4.SetFractionToResidue("Shoot",  0);
              Remove_4.SetFractionToResidue("Cordon", 0);
              Remove_4.SetFractionToResidue("Trunk",  0);
              Remove_4.SetFractionToResidue("Root",   0);
              Remove_4.SetFractionToRemove("Fibrousroot", 0);
              Remove_4.SetFractionToResidue("Berry",  0);
		   //
              Grapevine.RemoveBiomass("LeafPluck", Remove_4);
              zone.Set("[Grapevine].Structure.FinalLeafNumber.FixedValue", 28); 
		   //
           }  

           if (Clock.Today.Date == FrostDate2)      
           {
              Remove_5.SetFractionToRemove("Leaf", 0, "live");
              Remove_5.SetFractionToRemove("Shoot",  0);
              Remove_5.SetFractionToRemove("Cordon", 0);
              Remove_5.SetFractionToRemove("Trunk",  0);
              Remove_5.SetFractionToRemove("Root",   0);
              Remove_5.SetFractionToRemove("Fibrousroot", 0);
              Remove_5.SetFractionToRemove("Berry",  0);
		   //
              Remove_5.SetFractionToResidue("Leaf",   0.2, "live");
              Remove_5.SetFractionToResidue("Shoot",  0);
              Remove_5.SetFractionToResidue("Cordon", 0);
              Remove_5.SetFractionToResidue("Trunk",  0);
              Remove_5.SetFractionToResidue("Root",   0);
              Remove_5.SetFractionToRemove("Fibrousroot", 0);
              Remove_5.SetFractionToResidue("Berry",  0);
		   //
              Grapevine.RemoveBiomass("LeafPluck", Remove_5);
		   //
           }  

        }
    }
}
```
      Weather: FileName=Site1004_RPC.met
      Clock: Start=2004-01-01; End=2014-10-31
      Summary
      SoilArbitrator Soil Arbitrator
  Folder Validation
    Folder Sauvignonblanc
      Experiment Marlborough_2Cane
        Factors
          Factor Climate
            Specification=[Weather].FileName = Site1001_BRA.met,Site1002_OYB.met,Site1003_SEA.met,Site1004_RPC.met
        Simulation VineFacts1
          Weather: FileName=Site1003_SEA.met
          Clock: Start=2003-02-25; End=2020-05-01
          Summary
          SoilArbitrator Soil Arbitrator
          MicroClimate: a_interception=0; b_interception=1; c_interception=0; d_interception=0; soil_albedo=0.23; SoilHeatFluxFraction=0.4; MinimumHeightDiffForNewLayer=0; NightInterceptionFraction=0.5; ReferenceHeight=2
          RectangularZone Row: Length=100; Width=0.9; Slope=0; AspectAngle=0; Altitude=50
            Report: EventNames=[Clock].DoReport
              VariableNames:
                [Clock].Today
                [Clock].Today.Year
                [Clock].Today.DayOfYear
                [Weather].DaysSinceWinterSolstice   as DAWS
                [PlantVariables].Script.Height 		as height
                [PlantVariables].Script.LAI         as lai
                [PlantVariables].Script.FRadInt     as f.rad.int
                [PlantVariables].Script.ET          as transpiration
                [PlantVariables].Script.ES          as Es
                [PlantVariables].Script.PET         as PET
                [PlantVariables].Script.RootDepth   as rootDepth
                [Soil].OutputLayers.SW
                sum([Soil].OutputLayers.SWmm)       as psw
                [Weather].Rain
                [Irrigation].IrrigationApplied
                [Soil].SoilWater.Drainage
                [Grapevine].Phenology.CurrentSeason as CurrentSeason
                [Grapevine].Phenology.Stage
                [Grapevine].Phenology.AccumulatedEmergedTT
                [Grapevine].Phenology.BudBurstDOY      as BudBurstDAWS
                [Grapevine].Phenology.FloweringDOY     as FloweringDAWS
                [Grapevine].Phenology.VeraisonDOY      as VeraisonDAWS
                [Grapevine].Phenology.CurrentStageName as CurrentStageName
                [Grapevine].Phenology.AccChillBefPrune
                [Grapevine].Structure.PrimaryBudNo
                [Grapevine].Structure.MainStemPopn
                [Grapevine].Structure.LeafTipsAppeared
                [Grapevine].Structure.TotalLeavesPerShoot as leaf.no.shoot
                [Grapevine].Leaf.InitialisedCohortNo
                [Grapevine].Leaf.DeadCohortNo
                [Grapevine].Leaf.AppearedCohortNo
                [Grapevine].Leaf.CohortSize
                [Grapevine].Leaf.LAI as LAI
                [Grapevine].Leaf.LAI/[Grapevine].Population             as leaf.area.vine
                [Grapevine].Leaf.LAI/[Grapevine].Structure.MainStemPopn as leaf.area.shoot
                [Grapevine].Leaf.LAIMainStem/[Grapevine].Structure.MainStemPopn as leaf.area.shoot.main
                [Grapevine].Leaf.LAIBranch/[Grapevine].Structure.MainStemPopn as leaf.area.shoot.lateral
                [Grapevine].Leaf.Fn
                [Grapevine].Leaf.Fw
                [Grapevine].Leaf.Live.Wt
                [Grapevine].Leaf.Live.Wt/[Grapevine].Structure.MainStemPopn as leaf.dw.shoot
                [Grapevine].Shoot.Live.Wt
                [Grapevine].Shoot.Live.Wt/[Grapevine].Structure.MainStemPopn as shoot.dw
                [Grapevine].Shoot.Live.StructuralWt
                [Grapevine].Shoot.Live.StorageWt
                [Grapevine].Cordon.Live.Wt
                [Grapevine].Cordon.Live.StructuralWt
                [Grapevine].Cordon.Live.StorageWt
                [Grapevine].Trunk.Live.Wt
                [Grapevine].Trunk.Live.StructuralWt
                [Grapevine].Trunk.Live.StorageWt
                [Grapevine].Trunk.Live.StorageWt/[Grapevine].Trunk.Live.Wt as total.NSC.concentration.trunk
                [Grapevine].Root.Live.Wt
                [Grapevine].Fibrousroot.Live.Wt
                [Grapevine].Fibrousroot.Live.StructuralWt
                [Grapevine].Fibrousroot.Live.StorageWt
                [Grapevine].Fibrousroot.Live.StorageWt/[Grapevine].Fibrousroot.Live.Wt as total.NSC.concentration.root
                [Grapevine].Arbitrator.FDM
                [Grapevine].Arbitrator.DM.TotalFixationSupply
                [Grapevine].Berry.Live.Wt
                [Grapevine].Berry.SingleBerryDW
                [Grapevine].Berry.SingleBerryFW     as berry.fw.mean
                [Grapevine].Berry.TotalBerryFW
                [Grapevine].Berry.NumberFunction
                [Grapevine].Berry.ThermalTimeAfterFlowering
                [Grapevine].Berry.WaterContent
                [Grapevine].Berry.Brix 				as brix
                [Grapevine].Berry.TitratableAcid 	as ta
                [Grapevine].Berry.MetFactors.BUN_TmaxIni1    as BUN_TmaxIni
                [Grapevine].Berry.MetFactors.BUN_RadIni1     as BUN_RadIni
                [Grapevine].Berry.MetFactors.BEN_RainTotFlow as BEN_RainTotFlow
                [Grapevine].Berry.MetFactors.BEN_TmaxIni1    as BEN_TmaxIni1
                [Grapevine].Berry.MetFactors.BEN_TmeanFlow   as BEN_TmeanFlow
                [Grapevine].Berry.MetFactors.BM_RadFlow      as BM_RadFlow
                [Grapevine].Berry.MetFactors.BM_RainTotFlow  as BM_RainTotFlow
                [Grapevine].Berry.MetFactors.BM_RainTotVer   as BM_RainTotVer
                [Grapevine].Berry.MetFactors.BM_TmeanFlow    as BM_TmeanFlow
                [Grapevine].Berry.YieldComponent.BunchesPerShoot as bunch.no.shoot
                [Grapevine].Berry.YieldComponent.BunchesPerVine  as bunch.no.vine
                [Grapevine].Berry.YieldComponent.BerryNum    as BerryNum
                [Grapevine].Berry.YieldComponent.BerryMass   as berry.fw.est
                [Grapevine].Berry.YieldPerVine               as yield.per.vine
            Memo: same as BaseSim.BaseSim.Vineyard.Memo
            Plant Grapevine
            Manager TreeInitialisation
              CultivarName = SauvignonBlanc
              SowingDate = 02/25/2003 00:00:00
              VineDistance = 1.8
              BudNumber = 24
              CordonNumber = 2
              CordonDiameter = 10
              CordonLength = 1
              TrunkDiameter = 40
              TrunkHeight = 0.9
              RootDM = 2000
              RootNSC = 0.3
              TrunkNSC = 0.3
              CordonNSC = 0.3
              StartAge = 10
```csharp
using Models.Zones;
using Models.Soils;
using APSIM.Shared.Utilities;
using Models.PMF;
using Models.Core;
using System;
        
namespace Models
{
    [Serializable] 
    [System.Xml.Serialization.XmlInclude(typeof(Model))]
    public class Script : Model
    {
        [Link] Plant Grapevine;
        [Link] Clock Clock;
        [Link] Soil Soil;
        [Link] Zone zone;

        [Display(Type = DisplayType.CultivarName)]
        [Description("Plant Type")]
        public string CultivarName { get; set; }

        [Description("Initialisation Date")]
        public DateTime SowingDate { get; set; }

        [Description("Vine distance(m)")]
        public double VineDistance { get; set; }
        //number of buds lay down in cane and spur. there is a function inside to calculate the number of buds per vine based on bud burst and from cane head
        [Description("Bud number(#)")]
        public double BudNumber { get; set; }
        //cordon or spur biomass
        [Description("Cordon number(#)")]
        public double CordonNumber { get; set; }
      
        [Description("Cordon diameter(mm)")]
        public double CordonDiameter { get; set; }

        [Description("Cordon length(m)")]
        public double CordonLength { get; set; }
        //trunk information
        [Description("Trunk diameter(mm)")]
        public double TrunkDiameter { get; set; }

        [Description("Trunk height(m)")]
        public double TrunkHeight { get; set; }
        //root dry matter
        [Description("Fibrous Root dry matter(g/vine)")]
        public double RootDM { get; set; }

        //total nonstructural fraction in dry matter 
        [Description("Fibrous root nonstructural carbon fraction")]
        public double RootNSC { get; set; }

        [Description("Trunk nonstructural carbon fraction")]
        public double TrunkNSC { get; set; }

        [Description("Cordon nonstructural carbon fraction")]
        public double CordonNSC { get; set; }

        [Description("Age of trees (in Years) at start of simulation)")]
        public int StartAge {get;set;}

        private RectangularZone RowZone {get; set;}

        [EventSubscribe("DoManagement")]
        private void OnDoManagement(object sender, EventArgs e)
        {
            if (Clock.Today.Date == SowingDate)
            {
                RowZone = Apsim.Find(this.Parent.Parent.Parent,"Row") as RectangularZone;
                double pop = 1/RowZone.Width/VineDistance;  
                //sowing method
                Grapevine.Sow(cultivar: CultivarName,population: pop, 
                depth: 2000, rowSpacing: RowZone.Width, budNumber:BudNumber);

                //cordon biomass
	            //calculate the biomass by length 1 meter time number of cordons time wood density (0.5 g/mm2/m) * pop to covert the biomass into g/m2
	            double cordonBiomass = 3.1415926*(CordonDiameter/2)*(CordonDiameter/2)*CordonLength*CordonNumber*0.5 * pop; 
	            double cordonNSC = cordonBiomass * CordonNSC;

	            zone.Set("[Grapevine].Cordon.Live.StorageWt", cordonNSC); 	           
	            zone.Set("[Grapevine].Cordon.Live.StructuralWt", cordonBiomass - cordonNSC); 	           

                //trunk biomass
                double trunkBiomass = 3.1415926*(TrunkDiameter/2)*(TrunkDiameter/2)*TrunkHeight*0.5 * pop; 
                double trunkNSC = trunkBiomass * TrunkNSC;
               
                zone.Set("[Grapevine].Trunk.Live.StorageWt", trunkNSC); 
                zone.Set("[Grapevine].Trunk.Live.StructuralWt", trunkBiomass - trunkNSC);              
	            

                //Root biomass is  per plant
                double rootBiomass = RootDM * pop;
                double rootNSC = RootDM * pop * RootNSC; 
                 zone.Set("[Grapevine].Fibrousroot.Live.StorageWt",    rootNSC ); //rootNSC*pop
                 zone.Set("[Grapevine].Fibrousroot.Live.StructuralWt", rootBiomass - rootNSC); 
               
            }
        }
    }
}
```
            Irrigation
            Fertiliser
            SurfaceOrganicMatter: InitialResidueName=wheat_stubble; InitialResidueType=wheat; InitialResidueMass=500; InitialStandingFraction=0; InitialCPR=0; InitialCNR=100
            Soil: Latitude=0; Longitude=0
              LayerStructure: Thickness=[200, 200, 200, 200, 200, 200, 400, 400, 400, 600]
              Chemical
                Thickness  NO3N     NH4N  PH
                100        160.741  0     6.6
                200        11.1111  0     6.2
                300        1.21212  0     5.7
                300        1.19048  0     5.5
                300        0        0     5.5
                300        0        0     5.5
              InitialWater Initial water: PercentMethod=1; FractionFull=1; RelativeTo=LL15
              Physical
                Thickness  BD    AirDry  LL15  DUL   SAT
                200        1.35  0.1     0.2   0.35  0.45
                250        1.35  0.1     0.2   0.35  0.45
                300        1.4   0.15    0.15  0.35  0.4
                150        1.4   0.13    0.13  0.33  0.35
                150        1.4   0.1     0.1   0.28  0.35
                1950       1.59  0.06    0.06  0.1   0.3
                SoilCrop GrapevineSoil: LL=[0.2, 0.2, 0.15, 0.13, 0.1, 0.06]; KL=[0.25, 0.1, 0.08, 0.05, 0.05, 0.01]; XF=[1, 1, 1, 1, 1, 1]
                SoilCrop SlurpSoil: LL=[0.2, 0.2, 0.15, 0.13, 0.1, 0.06]; KL=[0.11, 0.11, 0.11, 0.11, 0.11, 0.11]; XF=[1, 1, 1, 1, 1, 1]
              WaterBalance SoilWater: SummerDate=1-Nov; SummerU=4; SummerCona=1; WinterDate=1-Apr; WinterU=4; WinterCona=1; DiffusConst=88; DiffusSlope=35.4; Salb=0.18; CN2Bare=68; CNRed=20; CNCov=0.8; Slope=0; DischargeWidth=0; CatchmentArea=0
                Thickness  SWCON  KLAT
                150        0.55   0
                150        0.55   0
                100        0.55   0
                200        0.55   0
                200        0.55   0
                200        0.55   0
                200        0.55   0
                200        0.55   0
                200        0.55   0
                200        0.55   0
                200        0.55   0
                200        0.55   0
                400        0.55   0
              SoilNitrogen: same as BaseSim.BaseSim.Vineyard.Soil.SoilNitrogen
              Organic: FOMCNRatio=30
                Thickness  Carbon  SoilCNRatio  FBiom  FInert  FOM
                100        1.82    11.5         0.025  0.3     1243.93
                200        1.47    11.5         0.025  0.4     833.832
                300        1.2     11.5         0.015  0.75    457.617
                300        1.03    11.5         0.01   0.9     251.145
                300        0.47    11.5         0.01   0.96    137.831
                300        0.47    11.5         0.01   0.96    75.6435
              Sample Initial nitrogen: Thickness=[100, 200, 300, 300, 300, 300]; SWUnits=Volumetric; OCUnits=Total; PHUnits=Water
              CERESSoilTemperature
              OutputLayers: Thickness=[150, 150, 150, 150, 150, 150, 150]
            Manager SetupTreeRootZones
              UseExtraZone = True
```csharp
using Models.Functions;
using APSIM.Shared.Utilities;
using System.Xml.Serialization;
using Models;
using Models.PMF;
using System.Text;
using System.Collections.Generic;
using Models.Core;
using System;

namespace Models
{
    [Serializable] 
    public class Script : Model
    {
        [Link] Plant Grapevine;
        [Link] Clock Clock;
        [Link] Zone zone;

        [Description("Use extra root zone")]
        public bool UseExtraZone { get; set; }

        
        [EventSubscribe("StartOfSimulation")]
        private void OnSimulationCommencing(object sender, EventArgs e)
        {
            if (UseExtraZone)
            {
            Grapevine.Root.ZoneNamesToGrowRootsIn.Add("Alley");
            Grapevine.Root.ZoneRootDepths.Add(2600);
BiomassDemand InitialDM = new BiomassDemand();
Constant InitStruct = new Constant();
InitStruct.FixedValue = 10;
InitialDM.Structural = InitStruct;
Constant InitMetab = new Constant();
InitMetab.FixedValue = 0;
InitialDM.Metabolic = InitMetab;
Constant InitStor = new Constant();
InitStor.FixedValue = 0;
InitialDM.Storage = InitStor;
            Grapevine.Root.ZoneInitialDM.Add(InitialDM);

            }
        }
    }
}
```
            Operations VineIrrigation
            Operations WinterRainfall
              2002-05-28  [Irrigation].Apply(200);
            Manager PlantVariables
              FRadInt = 0
              ET = 0
              ES = 0
              PET = 0
              LAI = 0
              Height = 0
              RootDepth = 0
              PlantWidth = 0
```csharp
using Models.Zones;
using APSIM.Shared.Utilities;
using Models.Soils;
using System.Collections.Generic;
using Models.PMF;
using Models.Core;
using System;

namespace Models
{
    [Serializable]
    public class Script : Model
    {
        [Link] Weather weather = null;
        private RectangularZone AlleyZone {get; set; }
        private RectangularZone RowZone {get; set;}
        private RectangularZone ThisZone {get; set;}
        private double AreaWidth {get; set;}

        public double FRadInt {get; set;}
        public double ET {get; set;}
        public double ES {get; set;}
        public double PET {get; set;}
        public double LAI {get; set;}
        public double Height {get; set;}
        public double RootDepth {get; set;}
        public double PlantWidth {get; set;}

        [EventSubscribe("StartOfSimulation")]
        private void DoStartOfSimulation(object sender, EventArgs e)
        {
               
               ThisZone = this.Parent.Parent as RectangularZone;
               RowZone = Apsim.Find(this.Parent.Parent.Parent,"Row") as RectangularZone;
               AlleyZone = (RectangularZone)Apsim.Find(this.Parent.Parent.Parent,"Alley") as RectangularZone;
               AreaWidth = AlleyZone.Width + RowZone.Width;
               PlantWidth = 0;
        }
        
        [EventSubscribe("DoReportCalculations")]
        private void OnDoReportCalculations(object sender, EventArgs e)
        {
            if (ThisZone.Name == "Row")
                {
                FRadInt = ((double)RowZone.Get("Grapevine.Leaf.RadIntTot") * RowZone.Width)/(weather.Radn * AreaWidth);
                ET = (double)RowZone.Get("Grapevine.Leaf.Transpiration") * RowZone.Width/AreaWidth;
                LAI = (double)RowZone.Get("Grapevine.Leaf.LAI");
                //LAIPerVine =  LAI*RowZone.Width*1.8;
                //TreeInitialisation.Script.VineDistance;
                //(double)RowZone.Get("Grapevine.Leaf.LAI");
                Height = (double)RowZone.Get("Grapevine.Leaf.Height");
                RootDepth = (double)RowZone.Get("Grapevine.Root.Depth");
                PlantWidth = (double)RowZone.Get("Grapevine.Leaf.Width");
                }
            else
                {
                FRadInt = ((double)AlleyZone.Get("Slurp.Leaf.RadIntTot") * ThisZone.Width)/ (weather.Radn * AreaWidth);
                ET = (double)AlleyZone.Get("Slurp.Leaf.Transpiration") * ThisZone.Width/AreaWidth;
                LAI = (double)AlleyZone.Get("Slurp.Leaf.LAI");
                Height = (double)AlleyZone.Get("Slurp.Leaf.Height");
                RootDepth = (double)AlleyZone.Get("Slurp.Root.Depth");
                }

            ES = (double)ThisZone.Get("Soil.SoilWater.Es") * ThisZone.Width/AreaWidth;
            double PETWidth = Math.Min(Math.Max(PlantWidth,ThisZone.Width),AreaWidth);
            PET = (double)ThisZone.Get("Soil.SoilWater.Eo") * PETWidth/AreaWidth;
        }
    }
}
```
            Manager DripIrrigator
              FertilizeDAWS = 100
              Amount = 20
              totalIrrigation = 0
```csharp
using APSIM.Shared.Utilities;
using System.Xml.Serialization;
using Models;
using Models.PMF;
using Models.Soils;
using System.Text;
using System.Collections.Generic;
using Models.Core;
using System;

namespace Models
{
    [Serializable] 
    public class Script : Model
    {
       [Link] Irrigation irrigation;
       [Link] Clock Clock;
       [Link] Fertiliser Fertiliser;
       [Link] Summary Summary;
       [Link] Weather weather;

        [Description("Fertilize_DAWS")]
         public int FertilizeDAWS { get; set; }
        [Description("Amount of fertiliser to be applied")]
        public double Amount { get; set; }

       [EventSubscribe("DoManagement")]
        private void OnDoManagement(object sender, EventArgs e)
        {
          if (weather.DaysSinceWinterSolstice == FertilizeDAWS)
           Fertiliser.Apply(Amount: Amount, Type: Fertiliser.Types.NO3N);
        }


       public void applyDripIrri(double amount)
        {
            double layerAmount = amount/4;
            irrigation.Apply(layerAmount, 0);
            irrigation.Apply(layerAmount*2, 220);
            irrigation.Apply(layerAmount, 420);

        }
        public double totalIrrigation {get; set;}
        [EventSubscribe("Irrigated")]
        private void OnIrrigated(object sender, 
        IrrigationApplicationType irrigData)
        {
            totalIrrigation += irrigData.Amount;
         }
    }
}
```
            Manager HarvestNPruning: same as BaseSim.BaseSim.Vineyard.HarvestNPruning
          RectangularZone Alley: Length=100; Width=1.5; Slope=0; AspectAngle=0; Altitude=50
            Report: EventNames=[Clock].DoReport
              VariableNames:
                [Clock].Today
                [Clock].Today.Year
                [Clock].Today.DayOfYear
                [Weather].DaysSinceWinterSolstice as DAWS
            SurfaceOrganicMatter: InitialResidueName=wheat_stubble; InitialResidueType=wheat; InitialResidueMass=500; InitialStandingFraction=0; InitialCPR=0; InitialCNR=100
            Plant Slurp
            Fertiliser
            Irrigation
            Manager PastureInitialisation
              CultivarName = StaticCrop
              InitialRootDepth = 2000
              SowingDate = 02/25/2003 00:00:00
              RootDepth = 2000
              RFV = 10
              KLReductionFactor = -0.001
              KLReductionDepth = 150
              YKLModifiers =
              XDepth =
              MaxG = 0.004
              R50 = 150
```csharp
using Models.Soils;
using APSIM.Shared.Utilities;
using Models.PMF;
using Models.Core;
using System;
        
namespace Models
{
    [Serializable] 
    [System.Xml.Serialization.XmlInclude(typeof(Model))]
    public class Script : Model
    {
        [Link] Plant Slurp;
        [Link] Clock Clock;
        [Link] Soil Soil;
        [Link] Zone zone;

        [Display(Type = DisplayType.CultivarName)]
        [Description("Plant Type")]
        public string CultivarName { get; set; }
        [Description("Initial Root Depth")]
        public double InitialRootDepth { get; set; }
        [Description("Initialisation Date")]
        public DateTime SowingDate { get; set; }
        [Description("Maximum Root Depth")]
        public double RootDepth { get; set; }
        [Description("Roof Front Velocity")]
        public double RFV { get; set; }
        [Description("Factor to change Kl modifier with Depth")]
        public double KLReductionFactor { get; set; }
        [Description("Depth that KL starts to decline")]
        public double KLReductionDepth { get; set; }
        
        public double[] YKLModifiers { get; set; }
        public double[] XDepth { get; set; }
        private double Depth { get; set; }
        
        [Description("Maximum Stomatal Conductance")]
        public double MaxG { get; set; }
        [Description("Stomatal Radn response")]
        public double R50 { get; set; }
        
        [EventSubscribe("DoManagement")]
        private void OnDoManagement(object sender, EventArgs e)
        {
            if (Clock.Today.Date == SowingDate)
            {
                Slurp.Sow(cultivar: CultivarName, population: 1, depth: InitialRootDepth, rowSpacing: 150);
                
                YKLModifiers = new double[Soil.Thickness.Length];
                XDepth = new double[Soil.Thickness.Length];
                Depth = 0;
                for (int layer = 0; layer < Soil.Thickness.Length; layer++)
                {
                    Depth += Soil.Thickness[layer] / 2;  //Add half of the thickness of the current layer so depth is the mid depth of that layer
                    if (Depth <= KLReductionDepth)
                    {
                        YKLModifiers[layer] = 1;
                        XDepth[layer] = Depth;
                    }
                    else
                    {
                        double KLMod = 1 * Math.Exp(-KLReductionFactor * (Depth - KLReductionDepth));
                        YKLModifiers[layer] = KLMod;
                        XDepth[layer] = Depth;
                    }
                    Depth += Soil.Thickness[layer] / 2;  //Add the other half of the current layer so depth is the top of the next layer
                }
                object KLMods = YKLModifiers;
                zone.Set("Slurp.Root.KLModifier.XYPairs.Y", KLMods);
                object Depths = XDepth;
                zone.Set("Slurp.Root.KLModifier.XYPairs.X", Depths);
                object RD = RootDepth;
                zone.Set("Slurp.Root.MaximumRootDepth.FixedValue", RD);
                object RV = RFV;
                zone.Set("Slurp.Root.RootFrontVelocity.Potential.FixedValue", RV);
                object GMaxValue = MaxG;
                zone.Set("Slurp.Leaf.Gsmax350", GMaxValue); 
                object R50Value = R50; 
                zone.Set("Slurp.Leaf.R50", R50Value); 
                
            }
        }
    }
}
```
            Manager SetPastureVariables
              Ext_coef = 0.6
              MaximumHeight = 300
              MinimumHeight = 100
              Cover = 0
              LAI = 0
```csharp
using System.Data;
using APSIM.Shared.Utilities;
using System.Xml.Serialization;
using Models;
using Models.PMF;
using System.Text;
using System.Collections.Generic;
using Models.Core;
using System;

namespace Models
{
    [Serializable] 
    //[System.Xml.Serialization.XmlInclude(typeof(Model))]
    public class Script : Model
    {
        [Link] Plant Slurp;
        [Link] Clock Clock;
        [Link] Zone zone;
        [Link] Weather weather;

        
        [Description("Extinction coefficient")]
        public  double Ext_coef { get; set; }
        [Description("Maximum height of leaves")]
        public double MaximumHeight { get; set; }
        [Description("Minimum height of leaves")]
        public double MinimumHeight { get; set; }
        
        public double Cover {get; private set;}
        public double LAI { get; private set; }
                
        [EventSubscribe("StartOfSimulation")]
        private void OnStartOfSimulation(object sender, EventArgs e)
        {
            Cover = 0.5;
        }
        
        [EventSubscribe("StartOfDay")]
        private void OnStartOfDay(object sender, EventArgs e)
        {
            Cover += weather.MeanT * 0.001;

            if (Cover >= 1.0)
            {
                Cover = 0.5;        
            }

              LAI = Math.Log(1 - Cover) / -Ext_coef;

            object LAIResetValue = LAI;
            zone.Set("Slurp.Leaf.Area.FixedValue", LAIResetValue);  
            object HeightResetValue = MinimumHeight + Cover * (MaximumHeight-MinimumHeight);
            zone.Set("Slurp.Leaf.Tallness.FixedValue", HeightResetValue);  
        }
    }
}
```
            Manager SetupPastureRootZones
              UseExtraZone = True
```csharp
using Models.Functions;
using APSIM.Shared.Utilities;
using System.Xml.Serialization;
using Models;
using Models.PMF;
using System.Text;
using System.Collections.Generic;
using Models.Core;
using System;

namespace Models
{
    [Serializable] 
    public class Script : Model
    {
        [Link] Plant Slurp;
        [Link] Clock Clock;
        [Link] Zone zone;

        [Description("Use extra root zone")]
        public bool UseExtraZone { get; set; }

        
        [EventSubscribe("StartOfSimulation")]
        private void OnSimulationCommencing(object sender, EventArgs e)
        {
            if (UseExtraZone)
            {
            Slurp.Root.ZoneNamesToGrowRootsIn.Add("Row");
            Slurp.Root.ZoneRootDepths.Add(600);
BiomassDemand InitialDM = new BiomassDemand();
Constant InitStruct = new Constant();
InitStruct.FixedValue = 10;
InitialDM.Structural = InitStruct;
Constant InitMetab = new Constant();
InitMetab.FixedValue = 0;
InitialDM.Metabolic = InitMetab;
Constant InitStor = new Constant();
InitStor.FixedValue = 0;
InitialDM.Storage = InitStor;
            Slurp.Root.ZoneInitialDM.Add(InitialDM);

            }
        }
    }
}
```
            Soil: Latitude=0; Longitude=0
              LayerStructure: Thickness=[200, 200, 200, 200, 200, 200, 400, 400, 400, 600]
              Chemical
                Thickness  NO3N     NH4N  PH
                100        160.741  0     6.6
                200        11.1111  0     6.2
                300        1.21212  0     5.7
                300        1.19048  0     5.5
                300        0        0     5.5
                300        0        0     5.5
              InitialWater Initial water: PercentMethod=1; FractionFull=1.00166; RelativeTo=LL15
              WaterBalance SoilWater: same as Validation.Sauvignonblanc.Marlborough_2Cane.VineFacts1.Row.Soil.SoilWater
              SoilNitrogen: same as BaseSim.BaseSim.Vineyard.Soil.SoilNitrogen
              Organic: same as Validation.Sauvignonblanc.Marlborough_2Cane.VineFacts1.Row.Soil.Organic
              Sample Initial nitrogen: Thickness=[100, 200, 300, 300, 300, 300]; SWUnits=Volumetric; OCUnits=Total; PHUnits=Water
              CERESSoilTemperature
              OutputLayers: Thickness=[150, 150, 150, 150, 150, 150, 150]
              Physical: same as Validation.Sauvignonblanc.Marlborough_2Cane.VineFacts1.Row.Soil.Physical
            Operations WinterRainfall
              2002-05-28  [Irrigation].Apply(200);
            Manager PlantVariables
```csharp
using Models.Core;
using System;

namespace Models
{
    [Serializable]
    public class Script : Model
    {
        
    }
}
```
      Experiment Marlborough_4Cane
        Factors
          Factor Climate
            Specification=[Weather].FileName = Site1001_BRA.met,Site1002_OYB.met,Site1003_SEA.met,Site1004_RPC.met
        Simulation VineFacts2
          Weather: FileName=Site1004_RPC.met
          Clock: Start=2003-02-25; End=2020-05-01
          Summary
          SoilArbitrator Soil Arbitrator
          MicroClimate: a_interception=0; b_interception=1; c_interception=0; d_interception=0; soil_albedo=0.23; SoilHeatFluxFraction=0.4; MinimumHeightDiffForNewLayer=0; NightInterceptionFraction=0.5; ReferenceHeight=2
          RectangularZone Row: Length=100; Width=0.9; Slope=0; AspectAngle=0; Altitude=50
            Memo: same as BaseSim.BaseSim.Vineyard.Memo
            Report: EventNames=[Clock].DoReport
              VariableNames:
                [Clock].Today
                [Clock].Today.Year
                [Clock].Today.DayOfYear
                [Weather].DaysSinceWinterSolstice as DAWS
                [PlantVariables].Script.Height as height
                [PlantVariables].Script.LAI as lai
                [PlantVariables].Script.LAIPerVine as LAIPerVine
                [PlantVariables].Script.FRadInt as f.rad.int
                [PlantVariables].Script.ET as transpiration
                [PlantVariables].Script.ES as Es
                [PlantVariables].Script.PET as PET
                [PlantVariables].Script.RootDepth as rootDepth
                [Soil].OutputLayers.SW
                sum([Soil].OutputLayers.SWmm) as psw
                [Weather].Rain
                [Irrigation].IrrigationApplied
                [Soil].SoilWater.Drainage
                [Row].Grapevine.Structure.TotalLeavesPerShoot
                [Row].Grapevine.Leaf.LAIMainStem/[Grapevine].Structure.MainStemPopn as LAIMeanMainStem
                [Row].Grapevine.Leaf.LAIBranch/[Grapevine].Structure.MainStemPopn as LAIMeanLateral
                [Grapevine].Phenology.CurrentSeason as CurrentSeason
                [Grapevine].Phenology.Stage
                [Grapevine].Phenology.AccumulatedEmergedTT
                [Grapevine].Phenology.BudBurstDOY as BudBurstDAWS
                [Grapevine].Phenology.FloweringDOY as FloweringDAWS
                [Grapevine].Phenology.VeraisonDOY as VeraisonDAWS
                [Grapevine].Phenology.CurrentStageName as CurrentStageName
                [Grapevine].Phenology.AccChillBefPrune
                [Grapevine].Structure.PrimaryBudNo
                [Grapevine].Structure.MainStemPopn
                [Grapevine].Structure.LeafTipsAppeared
                [Grapevine].Leaf.LAI
                [Grapevine].Leaf.InitialisedCohortNo
                [Grapevine].Leaf.DeadCohortNo
                [Grapevine].Leaf.AppearedCohortNo
                [Grapevine].Leaf.CohortSize
                [Grapevine].Leaf.Fn
                [Grapevine].Leaf.Fw
                [Grapevine].Leaf.Live.Wt
                [Grapevine].Leaf.Live.Wt/[Grapevine].Structure.MainStemPopn as LeafWtPerShoot
                [Grapevine].Shoot.Live.Wt/[Grapevine].Structure.MainStemPopn as ShootWtPerShoot
                [Grapevine].Cordon.Live.Wt
                [Grapevine].Cordon.Live.StructuralWt
                [Grapevine].Cordon.Live.StorageWt
                [Grapevine].Trunk.Live.Wt
                [Grapevine].Trunk.Live.StructuralWt
                [Grapevine].Trunk.Live.StorageWt
                [Grapevine].Trunk.Live.StorageWt/[Grapevine].Trunk.Live.Wt as total.NSC.concentration.trunk
                [Grapevine].Root.Live.Wt
                [Grapevine].Fibrousroot.Live.Wt
                [Grapevine].Fibrousroot.Live.StructuralWt
                [Grapevine].Fibrousroot.Live.StorageWt
                [Grapevine].Fibrousroot.Live.StorageWt/[Grapevine].Fibrousroot.Live.Wt as total.NSC.concentration.root
                [Grapevine].Arbitrator.FDM
                [Grapevine].Arbitrator.DM.TotalFixationSupply
                [Grapevine].Berry.Live.Wt
                [Grapevine].Berry.SingleBerryDW
                [Grapevine].Berry.SingleBerryFW
                [Grapevine].Berry.TotalBerryFW
                [Grapevine].Berry.NumberFunction
                [Grapevine].Berry.ThermalTimeAfterFlowering
                [Grapevine].Berry.WaterContent
                [Grapevine].Berry.Brix as brix
                [Grapevine].Berry.TitratableAcid as ta
                [Grapevine].Berry.MetFactors.BUN_TmaxIni1 as BUN_TmaxIni
                [Grapevine].Berry.MetFactors.BUN_RadIni1 as BUN_RadIni
                [Grapevine].Berry.MetFactors.BEN_RainTotFlow as BEN_RainTotFlow
                [Grapevine].Berry.MetFactors.BEN_TmaxIni1 as BEN_TmaxIni1
                [Grapevine].Berry.MetFactors.BEN_TmeanFlow as BEN_TmeanFlow
                [Grapevine].Berry.MetFactors.BM_RadFlow as BM_RadFlow
                [Grapevine].Berry.MetFactors.BM_RainTotFlow as BM_RainTotFlow
                [Grapevine].Berry.MetFactors.BM_RainTotVer as BM_RainTotVer
                [Grapevine].Berry.MetFactors.BM_TmeanFlow as BM_TmeanFlow
                [Grapevine].Berry.YieldComponent.BunchesPerShoot as bunch.no.shoot
                [Grapevine].Berry.YieldComponent.BunchesPerVine as bunch.no.vine
                [Grapevine].Berry.YieldComponent.BerryNum as BerryNum
                [Grapevine].Berry.YieldComponent.BerryMass as berry.fw.mean
                [Grapevine].Berry.YieldPerVine as yield.per.vine
            Plant Grapevine
            Manager TreeInitialisation
              CultivarName = SauvignonBlanc
              SowingDate = 02/25/2003 00:00:00
              VineDistance = 1.8
              BudNumber = 44
              CordonNumber = 4
              CordonDiameter = 10
              CordonLength = 1
              TrunkDiameter = 40
              TrunkHeight = 0.9
              RootDM = 2000
              RootNSC = 0.3
              TrunkNSC = 0.3
              CordonNSC = 0.3
              StartAge = 10
              script: same as in Validation.Sauvignonblanc.Marlborough_2Cane.VineFacts1.Row.TreeInitialisation
            Irrigation
            Fertiliser
            SurfaceOrganicMatter: InitialResidueName=wheat_stubble; InitialResidueType=wheat; InitialResidueMass=500; InitialStandingFraction=0; InitialCPR=0; InitialCNR=100
            Soil: same as Validation.Sauvignonblanc.Marlborough_2Cane.VineFacts1.Row.Soil
            Manager SetupTreeRootZones: same as Validation.Sauvignonblanc.Marlborough_2Cane.VineFacts1.Row.SetupTreeRootZones
            Operations VineIrrigation
            Operations WinterRainfall
              2002-05-28  [Irrigation].Apply(200);
            Manager PlantVariables
              FRadInt = 0
              ET = 0
              ES = 0
              PET = 0
              LAI = 0
              LAIPerVine = 0
              Height = 0
              RootDepth = 0
              PlantWidth = 0
```csharp
using Models.Zones;
using APSIM.Shared.Utilities;
using Models.Soils;
using System.Collections.Generic;
using Models.PMF;
using Models.Core;
using System;

namespace Models
{
    [Serializable]
    public class Script : Model
    {
        [Link] Weather weather = null;
        private RectangularZone AlleyZone {get; set; }
        private RectangularZone RowZone {get; set;}
        private RectangularZone ThisZone {get; set;}
        private double AreaWidth {get; set;}

        public double FRadInt {get; set;}
        public double ET {get; set;}
        public double ES {get; set;}
        public double PET {get; set;}
        public double LAI {get; set;}
        public double LAIPerVine {get; set;}
        public double Height {get; set;}
        public double RootDepth {get; set;}
        public double PlantWidth {get; set;}

        [EventSubscribe("StartOfSimulation")]
        private void DoStartOfSimulation(object sender, EventArgs e)
        {
               
               ThisZone = this.Parent.Parent as RectangularZone;
               RowZone = Apsim.Find(this.Parent.Parent.Parent,"Row") as RectangularZone;
               AlleyZone = (RectangularZone)Apsim.Find(this.Parent.Parent.Parent,"Alley") as RectangularZone;
               AreaWidth = AlleyZone.Width + RowZone.Width;
               PlantWidth = 0;
        }
        
        [EventSubscribe("DoReportCalculations")]
        private void OnDoReportCalculations(object sender, EventArgs e)
        {
            if (ThisZone.Name == "Row")
                {
                FRadInt = ((double)RowZone.Get("Grapevine.Leaf.RadIntTot") * RowZone.Width)/(weather.Radn * AreaWidth);
                ET = (double)RowZone.Get("Grapevine.Leaf.Transpiration") * RowZone.Width/AreaWidth;
                LAI = (double)RowZone.Get("Grapevine.Leaf.LAI");
                LAIPerVine =  LAI*RowZone.Width*1.8;
                //TreeInitialisation.Script.VineDistance;
                //(double)RowZone.Get("Grapevine.Leaf.LAI");
                Height = (double)RowZone.Get("Grapevine.Leaf.Height");
                RootDepth = (double)RowZone.Get("Grapevine.Root.Depth");
                PlantWidth = (double)RowZone.Get("Grapevine.Leaf.Width");
                }
            else
                {
                FRadInt = ((double)AlleyZone.Get("Slurp.Leaf.RadIntTot") * ThisZone.Width)/ (weather.Radn * AreaWidth);
                ET = (double)AlleyZone.Get("Slurp.Leaf.Transpiration") * ThisZone.Width/AreaWidth;
                LAI = (double)AlleyZone.Get("Slurp.Leaf.LAI");
                Height = (double)AlleyZone.Get("Slurp.Leaf.Height");
                RootDepth = (double)AlleyZone.Get("Slurp.Root.Depth");
                }

            ES = (double)ThisZone.Get("Soil.SoilWater.Es") * ThisZone.Width/AreaWidth;
            double PETWidth = Math.Min(Math.Max(PlantWidth,ThisZone.Width),AreaWidth);
            PET = (double)ThisZone.Get("Soil.SoilWater.Eo") * PETWidth/AreaWidth;
        }
    }
}
```
            Manager DripIrrigator: same as Validation.Sauvignonblanc.Marlborough_2Cane.VineFacts1.Row.DripIrrigator
            Manager HarvestNPruning: same as BaseSim.BaseSim.Vineyard.HarvestNPruning
          RectangularZone Alley: Length=100; Width=1.5; Slope=0; AspectAngle=0; Altitude=50
            Report: EventNames=[Row].Grapevine.Pruning
              VariableNames:
                [Clock].Today
                [Clock].Today.Year
                [Clock].Today.DayOfYear
                [Weather].DaysSinceWinterSolstice as DAWS
            SurfaceOrganicMatter: InitialResidueName=wheat_stubble; InitialResidueType=wheat; InitialResidueMass=500; InitialStandingFraction=0; InitialCPR=0; InitialCNR=100
            Plant Slurp
            Fertiliser
            Irrigation
            Manager PastureInitialisation
              CultivarName = StaticCrop
              InitialRootDepth = 2000
              SowingDate = 01/01/2003 00:00:00
              RootDepth = 2000
              RFV = 10
              KLReductionFactor = -0.001
              KLReductionDepth = 150
              YKLModifiers =
              XDepth =
              MaxG = 0.004
              R50 = 150
              script: same as in Validation.Sauvignonblanc.Marlborough_2Cane.VineFacts1.Alley.PastureInitialisation
            Manager SetPastureVariables: same as Validation.Sauvignonblanc.Marlborough_2Cane.VineFacts1.Alley.SetPastureVariables
            Manager SetupPastureRootZones: same as Validation.Sauvignonblanc.Marlborough_2Cane.VineFacts1.Alley.SetupPastureRootZones
            Soil: same as Validation.Sauvignonblanc.Marlborough_2Cane.VineFacts1.Alley.Soil
            Operations WinterRainfall
              2002-05-28  [Irrigation].Apply(200);
            Manager PlantVariables
              script: same as in Validation.Sauvignonblanc.Marlborough_2Cane.VineFacts1.Alley.PlantVariables
      Experiment RetainedNodeNum
        Factors
          Factor Node: Specification=[TreeInitialisation].Script.BudNumber = 24, 36, 48, 60, 72
        Simulation RetainedNodNum
          Clock: Start=2006-02-25; End=2012-05-02
          Summary SummaryFile
          Weather: FileName=Site1003_SEA.met
          MicroClimate: a_interception=0; b_interception=1; c_interception=0; d_interception=0; soil_albedo=0.3; SoilHeatFluxFraction=0.4; MinimumHeightDiffForNewLayer=0; NightInterceptionFraction=0.5; ReferenceHeight=2
          SoilArbitrator Soil Arbitrator
          RectangularZone Row: Length=100; Width=0.9; Slope=0; AspectAngle=0; Altitude=50
            Report: same as Validation.Sauvignonblanc.Marlborough_4Cane.VineFacts2.Row.Report
            Memo: same as BaseSim.BaseSim.Vineyard.Memo
            Plant Grapevine
            Manager TreeInitialisation
              CultivarName = SauvignonBlanc
              SowingDate = 02/25/2006 00:00:00
              VineDistance = 1.8
              BudNumber = 48
              CordonNumber = 4
              CordonDiameter = 10
              CordonLength = 1
              TrunkDiameter = 40
              TrunkHeight = 0.9
              RootDM = 2000
              RootNSC = 0.2
              TrunkNSC = 0.2
              CordonNSC = 0.18
              StartAge = 10
              script: same as in Validation.Sauvignonblanc.Marlborough_2Cane.VineFacts1.Row.TreeInitialisation
            Irrigation
            Fertiliser
            SurfaceOrganicMatter: InitialResidueName=wheat_stubble; InitialResidueType=wheat; InitialResidueMass=10000; InitialStandingFraction=0; InitialCPR=0; InitialCNR=20
            Manager SetupTreeRootZones: same as Validation.Sauvignonblanc.Marlborough_2Cane.VineFacts1.Row.SetupTreeRootZones
            Operations VineIrrigation
            Operations WinterRainfall
              2006-08-26  [Irrigation].Apply(45);
            Manager PlantVariables: same as Validation.Sauvignonblanc.Marlborough_4Cane.VineFacts2.Row.PlantVariables
            Manager HarvestNPruning
              LeafPluckingDAWS = 205
              HarvestDAWS = 290
              PruningDAWS = 314
              FrostDate1 = 10/03/2002 00:00:00
              FrostDate2 = 11/18/2002 00:00:00
```csharp
using System.Xml.Serialization;
using Models.PMF.Interfaces;
using Models.PMF;
using Models.Core;
using System.Collections.Generic;
using System;

namespace Models
{
    [Serializable] 
    [System.Xml.Serialization.XmlInclude(typeof(Model))]
    public class Script : Model
    {
        [Link] Plant Grapevine;
        [Link] Clock Clock;
        [Link] Zone zone;
        [Link] Weather weather;
       
        [Description("SummerPruning_DAWS")]         
        public int LeafPluckingDAWS { get; set; }  //day

        [Description("Harvest_DAWS")]
        public int HarvestDAWS { get; set; }

        [Description("Pruning_DAWS")]         
        public int PruningDAWS { get; set; }  //day

        [Description("Frost Date 1")]
        public DateTime FrostDate1 { get; set; }
        [Description("Frost Date 2")]
        public DateTime FrostDate2 { get; set; }


        [XmlIgnore] private RemovalFractions Remove_1 { get; set; }
        [XmlIgnore] private RemovalFractions Remove_2 { get; set; }
        [XmlIgnore] private RemovalFractions Remove_3 { get; set; }
        [XmlIgnore] private RemovalFractions Remove_4 { get; set; }
        [XmlIgnore] private RemovalFractions Remove_5 { get; set; }
        [EventSubscribe("StartOfSimulation")]
        private void OnSimulationCommencing(object sender, EventArgs e)
        {
            Remove_1 = new RemovalFractions();
            Remove_2 = new RemovalFractions();
            Remove_3 = new RemovalFractions();
            Remove_4 = new RemovalFractions();
            Remove_5 = new RemovalFractions();
        }
        
        [EventSubscribe("DoManagement")]
        private void OnDoManagement(object sender, EventArgs e)
        {
    	     //Set up  array of remove fractions to send with Cut method.  Each member in the array corresponds to an organ in the same order they are set up in.
    	     //PruneDate = DateTime.Parse(PruneDateString);
    	     if (weather.DaysSinceWinterSolstice == LeafPluckingDAWS && Grapevine.Phenology.Stage >= 3)
    	     {
    	        //int TargetLeafRank = 20;    
    	        //int LeafTipsAppeared = 25;//(int)Grapevine.Structure.LeafTipsAppeared;

    	        //int NodesToRemove = (int)Math.Max(LeafTipsAppeared - TargetLeafRank, 1); 
    	        double FractionToRemove = 0.2;//1- TargetLeafRank/LeafTipsAppeared;
			
    	        Remove_1.SetFractionToRemove("Leaf", 0, "live");
    	        Remove_1.SetFractionToRemove("Shoot", 0);
    	        Remove_1.SetFractionToRemove("Cordon", 0);
    	        Remove_1.SetFractionToRemove("Trunk", 0);
    	        Remove_1.SetFractionToRemove("Root", 0);
    	        Remove_1.SetFractionToRemove("Fibrousroot", 0);
    	        Remove_1.SetFractionToRemove("Berry", 0);
			
    	        Remove_1.SetFractionToResidue("Leaf", FractionToRemove, "live");
    	        Remove_1.SetFractionToResidue("Shoot", FractionToRemove);
    	        Remove_1.SetFractionToResidue("Cordon", 0);
    	        Remove_1.SetFractionToResidue("Trunk", 0);
    	        Remove_1.SetFractionToResidue("Root", 0);
    	        Remove_1.SetFractionToRemove("Fibrousroot", 0);
    	        Remove_1.SetFractionToResidue("Berry", 0);
			
    	       // Remove_1.NodesToRemove = NodesToRemove;
    	        Grapevine.RemoveBiomass("LeafPluck", Remove_1);
		
    	     }

           if (weather.DaysSinceWinterSolstice == HarvestDAWS && Grapevine.Phenology.Stage >= 3)
           {
           	
               Remove_2.SetFractionToRemove("Leaf", 0, "live");
               Remove_2.SetFractionToRemove("Shoot",  0);
               Remove_2.SetFractionToRemove("Cordon", 0);
               Remove_2.SetFractionToRemove("Trunk",  0);
               Remove_2.SetFractionToRemove("Root",   0);
               Remove_2.SetFractionToRemove("Fibrousroot", 0);
               Remove_2.SetFractionToRemove("Berry",  1);
		 
               Remove_2.SetFractionToResidue("Leaf",   0.1, "live");
               Remove_2.SetFractionToResidue("Shoot",  0);
               Remove_2.SetFractionToResidue("Cordon", 0);
               Remove_2.SetFractionToResidue("Trunk",  0);
               Remove_2.SetFractionToResidue("Root",   0);
               Remove_2.SetFractionToRemove("Fibrousroot", 0);
               Remove_2.SetFractionToResidue("Berry",  0);
		 
               Grapevine.RemoveBiomass("LeafPluck", Remove_2);
           }
                                   
            if (weather.DaysSinceWinterSolstice == PruningDAWS&& Grapevine.Phenology.Stage >= 3)
            {
                Remove_3.SetPhenologyStage = 1;

                Remove_3.SetFractionToRemove("Leaf",   0, "live");
                Remove_3.SetFractionToRemove("Shoot",  0);
                Remove_3.SetFractionToRemove("Cordon", 0);
                Remove_3.SetFractionToRemove("Trunk",  0);
                Remove_3.SetFractionToRemove("Root",   0);
                Remove_3.SetFractionToRemove("Berry",  0);

                Remove_3.SetFractionToResidue("Leaf",   1, "live");
                Remove_3.SetFractionToResidue("Shoot",  1);
                Remove_3.SetFractionToResidue("Cordon", 1);
                Remove_3.SetFractionToResidue("Trunk",  0);
                Remove_3.SetFractionToResidue("Root",   0);
                Remove_3.SetFractionToRemove("Fibrousroot", 0);
                Remove_3.SetFractionToResidue("Berry",  1);

                Grapevine.RemoveBiomass("Prune", Remove_3);

                double cordonBiomass = 96.9; //g/m2 reset the cordon biomass to the original value 
	            double cordonNSC = cordonBiomass * 0.18;

	            zone.Set("[Grapevine].Cordon.Live.StorageWt", cordonNSC); 	           
	            zone.Set("[Grapevine].Cordon.Live.StructuralWt", cordonBiomass - cordonNSC); 

	            //zone.Set("[Grapevine].Trunk.Live.StructuralWt", 280); 	
	           // zone.Set("[Grapevine].Trunk.Live.StorageWt", 70); 	

	           // zone.Set("[Grapevine].Root.Live.StructuralWt", 1531); 	
	           // zone.Set("[Grapevine].Root.Live.StorageWt",  349); 	

            }
           if (Clock.Today.Date == FrostDate1)      
           {
              Remove_4.SetFractionToRemove("Leaf", 0, "live");
              Remove_4.SetFractionToRemove("Shoot",  0);
              Remove_4.SetFractionToRemove("Cordon", 0);
              Remove_4.SetFractionToRemove("Trunk",  0);
              Remove_4.SetFractionToRemove("Root",   0);
              Remove_4.SetFractionToRemove("Fibrousroot", 0);
              Remove_4.SetFractionToRemove("Berry",  0);
		   //
              Remove_4.SetFractionToResidue("Leaf",   0.2, "live");
              Remove_4.SetFractionToResidue("Shoot",  0);
              Remove_4.SetFractionToResidue("Cordon", 0);
              Remove_4.SetFractionToResidue("Trunk",  0);
              Remove_4.SetFractionToResidue("Root",   0);
              Remove_4.SetFractionToRemove("Fibrousroot", 0);
              Remove_4.SetFractionToResidue("Berry",  0);
		   //
              Grapevine.RemoveBiomass("LeafPluck", Remove_4);
              zone.Set("[Grapevine].Structure.FinalLeafNumber.FixedValue", 28); 
		   //
           }  

           if (Clock.Today.Date == FrostDate2)      
           {
              Remove_5.SetFractionToRemove("Leaf", 0, "live");
              Remove_5.SetFractionToRemove("Shoot",  0);
              Remove_5.SetFractionToRemove("Cordon", 0);
              Remove_5.SetFractionToRemove("Trunk",  0);
              Remove_5.SetFractionToRemove("Root",   0);
              Remove_5.SetFractionToRemove("Fibrousroot", 0);
              Remove_5.SetFractionToRemove("Berry",  0);
		   //
              Remove_5.SetFractionToResidue("Leaf",   0.2, "live");
              Remove_5.SetFractionToResidue("Shoot",  0);
              Remove_5.SetFractionToResidue("Cordon", 0);
              Remove_5.SetFractionToResidue("Trunk",  0);
              Remove_5.SetFractionToResidue("Root",   0);
              Remove_5.SetFractionToRemove("Fibrousroot", 0);
              Remove_5.SetFractionToResidue("Berry",  0);
		   //
              Grapevine.RemoveBiomass("LeafPluck", Remove_5);
		   //
           }  

        }
    }
}
```
            Manager DripIrrigator
              FertilizeDAWS = 100
              Amount = 400
              totalIrrigation = 0
              script: same as in Validation.Sauvignonblanc.Marlborough_2Cane.VineFacts1.Row.DripIrrigator
            Soil: Latitude=0; Longitude=0
              LayerStructure: Thickness=[200, 200, 200, 200, 200, 200, 400, 400, 400, 600]
              Chemical
                Thickness  NO3N     NH4N  PH
                100        217      0     6.6
                200        15       0     6.2
                300        1.66667  0     5.7
                300        1.66667  0     5.5
                300        0        0     5.5
                300        0        0     5.5
              WaterBalance SoilWater: SummerDate=1-Nov; SummerU=9; SummerCona=4.4; WinterDate=1-Apr; WinterU=9; WinterCona=4.4; DiffusConst=88; DiffusSlope=35.4; Salb=0.18; CN2Bare=68; CNRed=20; CNCov=0.8; Slope=0; DischargeWidth=0; CatchmentArea=0
                Thickness  SWCON  KLAT
                150        0.55   0
                150        0.55   0
                100        0.55   0
                200        0.55   0
                200        0.55   0
                200        0.55   0
                200        0.55   0
                200        0.55   0
                200        0.55   0
                200        0.55   0
                200        0.55   0
                200        0.55   0
                400        0.55   0
              Physical
                Thickness  BD  AirDry  LL15  DUL   SAT
                300        1   0.3     0.3   0.5   0.6
                300        1   0.32    0.32  0.5   0.6
                300        1   0.18    0.18  0.35  0.5
                300        1   0.05    0.05  0.1   0.3
                1950       1   0.05    0.05  0.1   0.3
                SoilCrop GrapevineSoil: LL=[0.3, 0.32, 0.18, 0.05, 0.05]; KL=[0.1, 0.01, 0.05, 0.005, 0]; XF=[1, 1, 1, 1, 1]
                SoilCrop SlurpSoil: LL=[0.3, 0.32, 0.18, 0.05, 0.05]; KL=[0.11, 0.11, 0.11, 0.11, 0.11]; XF=[1, 1, 1, 1, 1]
              SoilNitrogen: same as BaseSim.BaseSim.Vineyard.Soil.SoilNitrogen
              Organic: FOMCNRatio=30
                Thickness  Carbon  SoilCNRatio  FBiom  FInert  FOM
                100        5       11.5         0.025  0.3     1243.93
                200        4       11.5         0.025  0.4     833.832
                300        2       11.5         0.015  0.75    457.617
                300        1.03    11.5         0.01   0.9     251.145
                300        0.47    11.5         0.01   0.96    137.831
                300        0.47    11.5         0.01   0.96    75.6435
              Sample Initial nitrogen: SWUnits=Volumetric; OCUnits=Total; PHUnits=Water
                Thickness  NO3N  NH4N
                100        1000  50
                200        500   40
                300        300   30
                300        200   20
                300        100   10
                300        0     0
              CERESSoilTemperature
              OutputLayers: Thickness=[300, 300, 300]
              InitialWater: PercentMethod=0; FractionFull=1
          RectangularZone Alley: Length=100; Width=1.5; Slope=0; AspectAngle=0; Altitude=50
            Report: EventNames=[Clock].DoReport
              VariableNames:
                [Clock].Today
                [Clock].Today.Year
                [Clock].Today.DayOfYear
                [Weather].DaysSinceWinterSolstice as DAWS
                [PlantVariables].Script.Height as height
                [PlantVariables].Script.LAI as lai
                [PlantVariables].Script.FRadInt as f.rad.int
                [PlantVariables].Script.ET as transpiration
                [PlantVariables].Script.ES as Es
                [PlantVariables].Script.PET as PET
                [PlantVariables].Script.RootDepth as rootDepth
                [Soil].OutputLayers.SW
                sum([Soil].OutputLayers.SWmm) as psw
                [Weather].Rain
                [Irrigation].IrrigationApplied
                [Soil].SoilWater.Drainage
            SurfaceOrganicMatter: InitialResidueName=wheat_stubble; InitialResidueType=wheat; InitialResidueMass=500; InitialStandingFraction=0; InitialCPR=0; InitialCNR=100
            Plant Slurp
            Fertiliser
            Irrigation
            Manager PastureInitialisation
              CultivarName = StaticCrop
              InitialRootDepth = 2000
              SowingDate = 02/25/2006 00:00:00
              RootDepth = 2000
              RFV = 10
              KLReductionFactor = -0.001
              KLReductionDepth = 150
              YKLModifiers =
              XDepth =
              MaxG = 0.004
              R50 = 150
              script: same as in Validation.Sauvignonblanc.Marlborough_2Cane.VineFacts1.Alley.PastureInitialisation
            Manager SetPastureVariables: same as Validation.Sauvignonblanc.Marlborough_2Cane.VineFacts1.Alley.SetPastureVariables
            Manager SetupPastureRootZones: same as Validation.Sauvignonblanc.Marlborough_2Cane.VineFacts1.Alley.SetupPastureRootZones
            Operations WinterRainfall
              2006-08-26  [Irrigation].Apply(45);
            Manager PlantVariables
              FRadInt = 0
              ET = 0
              ES = 0
              PET = 0
              LAI = 0
              Height = 0
              RootDepth = 0
              PlantWidth = 0
```csharp
using Models.Zones;
using APSIM.Shared.Utilities;
using Models.Soils;
using System.Collections.Generic;
using Models.PMF;
using Models.Core;
using System;

namespace Models
{
    [Serializable]
    public class Script : Model
    {
        [Link] Weather weather = null;
        private RectangularZone AlleyZone {get; set; }
        private RectangularZone RowZone {get; set;}
        private RectangularZone ThisZone {get; set;}
        private double AreaWidth {get; set;}

        public double FRadInt {get; set;}
        public double ET {get; set;}
        public double ES {get; set;}
        public double PET {get; set;}
        public double LAI {get; set;}
        public double Height {get; set;}
        public double RootDepth {get; set;}
        public double PlantWidth {get; set;}

        [EventSubscribe("StartOfSimulation")]
        private void DoStartOfSimulation(object sender, EventArgs e)
        {
               
               ThisZone = this.Parent.Parent as RectangularZone;
               RowZone = Apsim.Find(this.Parent.Parent.Parent,"Row") as RectangularZone;
               AlleyZone = (RectangularZone)Apsim.Find(this.Parent.Parent.Parent,"Alley") as RectangularZone;
               AreaWidth = AlleyZone.Width + RowZone.Width;
               PlantWidth = 0;
        }
        
        [EventSubscribe("DoReportCalculations")]
        private void OnDoReportCalculations(object sender, EventArgs e)
        {
            if (ThisZone.Name == "Row")
                {
                FRadInt = ((double)RowZone.Get("Grapevine.Leaf.RadIntTot") * RowZone.Width)/(weather.Radn * AreaWidth);
                ET = (double)RowZone.Get("Grapevine.Leaf.Transpiration") * RowZone.Width/AreaWidth;
                LAI = (double)RowZone.Get("Grapevine.Leaf.LAI");
                Height = (double)RowZone.Get("Grapevine.Leaf.Height");
                RootDepth = (double)RowZone.Get("Grapevine.Root.Depth");
                PlantWidth = (double)RowZone.Get("Grapevine.Leaf.Width");
                }
            else
                {
                FRadInt = ((double)AlleyZone.Get("Slurp.Leaf.RadIntTot") * ThisZone.Width)/ (weather.Radn * AreaWidth);
                ET = (double)AlleyZone.Get("Slurp.Leaf.Transpiration") * ThisZone.Width/AreaWidth;
                LAI = (double)AlleyZone.Get("Slurp.Leaf.LAI");
                Height = (double)AlleyZone.Get("Slurp.Leaf.Height");
                RootDepth = (double)AlleyZone.Get("Slurp.Root.Depth");
                }

            ES = (double)ThisZone.Get("Soil.SoilWater.Es") * ThisZone.Width/AreaWidth;
            double PETWidth = Math.Min(Math.Max(PlantWidth,ThisZone.Width),AreaWidth);
            PET = (double)ThisZone.Get("Soil.SoilWater.Eo") * PETWidth/AreaWidth;
        }
    }
}
```
            Soil: Latitude=0; Longitude=0
              LayerStructure: Thickness=[200, 200, 200, 200, 200, 200, 400, 400, 400, 600]
              Chemical
                Thickness  NO3N     NH4N  PH
                100        217      0     6.6
                200        15       0     6.2
                300        1.66667  0     5.7
                300        1.66667  0     5.5
                300        0        0     5.5
                300        0        0     5.5
              WaterBalance SoilWater: same as Validation.Sauvignonblanc.RetainedNodeNum.RetainedNodNum.Row.Soil.SoilWater
              SoilNitrogen: same as BaseSim.BaseSim.Vineyard.Soil.SoilNitrogen
              Organic: same as Validation.Sauvignonblanc.Marlborough_2Cane.VineFacts1.Row.Soil.Organic
              Sample Initial nitrogen: Thickness=[100, 200, 300, 300, 300, 300]; SWUnits=Volumetric; OCUnits=Total; PHUnits=Water
              CERESSoilTemperature
              OutputLayers: Thickness=[300, 300, 300]
              InitialWater: PercentMethod=1; FractionFull=0.79
              Physical: same as Validation.Sauvignonblanc.RetainedNodeNum.RetainedNodNum.Row.Soil.Physical
      Experiment Grape_Squire_1
        DisabledSimNames=[Grape_Squire_1Irri70, Grape_Squire_1Irri80, Grape_SquireIrri20, Grape_SquireIrri40, Grape_SquireIrri70, Grape_SquireIrri80]
        Factors
          Factor Irri: Specification=[VineIrrigation]
            Operations 100
              2002-02-14  [DripIrrigator].Script.applyDripIrri(10.6);
              2002-02-17  [DripIrrigator].Script.applyDripIrri(10.6);
              2002-02-19  [DripIrrigator].Script.applyDripIrri(10.6);
              2002-02-21  [DripIrrigator].Script.applyDripIrri(10.6);
              2002-02-25  [DripIrrigator].Script.applyDripIrri(10.6);
              2002-02-26  [DripIrrigator].Script.applyDripIrri(10.6);
              2002-03-03  [DripIrrigator].Script.applyDripIrri(10.6);
              2002-03-05  [DripIrrigator].Script.applyDripIrri(10.6);
              2002-03-07  [DripIrrigator].Script.applyDripIrri(10.6);
              2002-03-10  [DripIrrigator].Script.applyDripIrri(10.6);
              2002-03-12  [DripIrrigator].Script.applyDripIrri(10.6);
              2002-03-14  [DripIrrigator].Script.applyDripIrri(10.6);
              2002-03-19  [DripIrrigator].Script.applyDripIrri(10.6);
              2002-03-21  [DripIrrigator].Script.applyDripIrri(10.6);
              2002-03-24  [DripIrrigator].Script.applyDripIrri(10.6);
              2002-03-26  [DripIrrigator].Script.applyDripIrri(10.6);
              2002-04-01  [DripIrrigator].Script.applyDripIrri(10.6);
              2002-04-07  [DripIrrigator].Script.applyDripIrri(10.6);
              2002-04-10  [DripIrrigator].Script.applyDripIrri(10.6);
              2002-04-18  [DripIrrigator].Script.applyDripIrri(10.6);
              2002-04-21  [DripIrrigator].Script.applyDripIrri(10.6);
              2002-10-05  [DripIrrigator].Script.applyDripIrri(7.3);
              2002-10-08  [DripIrrigator].Script.applyDripIrri(7.3);
              2002-10-10  [DripIrrigator].Script.applyDripIrri(7.3);
              2002-10-12  [DripIrrigator].Script.applyDripIrri(7.3);
              2002-10-18  [DripIrrigator].Script.applyDripIrri(7.3);
              2002-10-23  [DripIrrigator].Script.applyDripIrri(7.3);
              2002-10-26  [DripIrrigator].Script.applyDripIrri(7.3);
              2002-10-28  [DripIrrigator].Script.applyDripIrri(7.3);
              2002-11-05  [DripIrrigator].Script.applyDripIrri(7.3);
              2002-11-08  [DripIrrigator].Script.applyDripIrri(7.3);
              2002-11-11  [DripIrrigator].Script.applyDripIrri(7.3);
              2002-11-18  [DripIrrigator].Script.applyDripIrri(7.3);
              2002-11-20  [DripIrrigator].Script.applyDripIrri(7.3);
              2002-11-23  [DripIrrigator].Script.applyDripIrri(7.3);
              2002-11-25  [DripIrrigator].Script.applyDripIrri(7.3);
              2002-11-29  [DripIrrigator].Script.applyDripIrri(7.3);
              2002-12-04  [DripIrrigator].Script.applyDripIrri(7.3);
              2002-12-09  [DripIrrigator].Script.applyDripIrri(7.3);
              2002-12-11  [DripIrrigator].Script.applyDripIrri(7.3);
              2002-12-19  [DripIrrigator].Script.applyDripIrri(7.3);
              2002-12-27  [DripIrrigator].Script.applyDripIrri(7.3);
              2002-12-31  [DripIrrigator].Script.applyDripIrri(7.3);
              2003-01-03  [DripIrrigator].Script.applyDripIrri(7.3);
              2003-01-08  [DripIrrigator].Script.applyDripIrri(7.3);
              2003-01-09  [DripIrrigator].Script.applyDripIrri(7.3);
              2003-01-11  [DripIrrigator].Script.applyDripIrri(7.3);
              2003-01-15  [DripIrrigator].Script.applyDripIrri(7.3);
              2003-01-18  [DripIrrigator].Script.applyDripIrri(7.3);
              2003-01-23  [DripIrrigator].Script.applyDripIrri(7.3);
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              2003-12-03  [DripIrrigator].Script.applyDripIrri(5.2);
              2003-12-07  [DripIrrigator].Script.applyDripIrri(7);
              2004-02-05  [DripIrrigator].Script.applyDripIrri(3.5);
              2005-02-26  [DripIrrigator].Script.applyDripIrri(6.9);
            Operations 60
              2002-02-14  [DripIrrigator].Script.applyDripIrri(6.3);
              2002-02-17  [DripIrrigator].Script.applyDripIrri(6.3);
              2002-02-19  [DripIrrigator].Script.applyDripIrri(6.3);
              2002-02-21  [DripIrrigator].Script.applyDripIrri(6.3);
              2002-02-25  [DripIrrigator].Script.applyDripIrri(6.3);
              2002-02-26  [DripIrrigator].Script.applyDripIrri(6.3);
              2002-03-03  [DripIrrigator].Script.applyDripIrri(6.3);
              2002-03-05  [DripIrrigator].Script.applyDripIrri(6.3);
              2002-03-07  [DripIrrigator].Script.applyDripIrri(6.3);
              2002-03-10  [DripIrrigator].Script.applyDripIrri(6.3);
              2002-03-12  [DripIrrigator].Script.applyDripIrri(6.3);
              2002-03-14  [DripIrrigator].Script.applyDripIrri(6.3);
              2002-03-19  [DripIrrigator].Script.applyDripIrri(6.3);
              2002-03-21  [DripIrrigator].Script.applyDripIrri(6.3);
              2002-03-24  [DripIrrigator].Script.applyDripIrri(6.3);
              2002-03-26  [DripIrrigator].Script.applyDripIrri(6.3);
              2002-04-01  [DripIrrigator].Script.applyDripIrri(6.3);
              2002-04-07  [DripIrrigator].Script.applyDripIrri(6.3);
              2002-04-10  [DripIrrigator].Script.applyDripIrri(6.3);
              2002-04-18  [DripIrrigator].Script.applyDripIrri(6.3);
              2002-04-21  [DripIrrigator].Script.applyDripIrri(6.3);
              2002-10-05  [DripIrrigator].Script.applyDripIrri(4.4);
              2002-10-08  [DripIrrigator].Script.applyDripIrri(4.4);
              2002-10-10  [DripIrrigator].Script.applyDripIrri(4.4);
              2002-10-12  [DripIrrigator].Script.applyDripIrri(4.4);
              2002-10-18  [DripIrrigator].Script.applyDripIrri(4.4);
              2002-10-23  [DripIrrigator].Script.applyDripIrri(4.4);
              2002-10-26  [DripIrrigator].Script.applyDripIrri(4.4);
              2002-10-28  [DripIrrigator].Script.applyDripIrri(4.4);
              2002-11-05  [DripIrrigator].Script.applyDripIrri(4.4);
              2002-11-08  [DripIrrigator].Script.applyDripIrri(4.4);
              2002-11-11  [DripIrrigator].Script.applyDripIrri(4.4);
              2002-11-18  [DripIrrigator].Script.applyDripIrri(4.4);
              2002-11-20  [DripIrrigator].Script.applyDripIrri(4.4);
              2002-11-23  [DripIrrigator].Script.applyDripIrri(4.4);
              2002-11-25  [DripIrrigator].Script.applyDripIrri(4.4);
              2002-11-29  [DripIrrigator].Script.applyDripIrri(4.4);
              2002-12-04  [DripIrrigator].Script.applyDripIrri(4.4);
              2002-12-09  [DripIrrigator].Script.applyDripIrri(4.4);
              2002-12-11  [DripIrrigator].Script.applyDripIrri(4.4);
              2002-12-19  [DripIrrigator].Script.applyDripIrri(4.4);
              2002-12-27  [DripIrrigator].Script.applyDripIrri(4.4);
              2002-12-31  [DripIrrigator].Script.applyDripIrri(4.4);
              2003-01-03  [DripIrrigator].Script.applyDripIrri(4.4);
              2003-01-08  [DripIrrigator].Script.applyDripIrri(4.4);
              2003-01-09  [DripIrrigator].Script.applyDripIrri(4.4);
              2003-01-11  [DripIrrigator].Script.applyDripIrri(4.4);
              2003-01-15  [DripIrrigator].Script.applyDripIrri(4.4);
              2003-01-18  [DripIrrigator].Script.applyDripIrri(4.4);
              2003-01-23  [DripIrrigator].Script.applyDripIrri(4.4);
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              2003-12-03  [DripIrrigator].Script.applyDripIrri(3.1);
              2003-12-07  [DripIrrigator].Script.applyDripIrri(4.2);
              2004-02-05  [DripIrrigator].Script.applyDripIrri(2.1);
              2005-02-26  [DripIrrigator].Script.applyDripIrri(4.1);
        Simulation Squire_1
          Clock: Start=2000-02-25; End=2003-05-02
          Summary SummaryFile
          Weather: FileName=Site1004_RPC.met
          MicroClimate: a_interception=0; b_interception=1; c_interception=0; d_interception=0; soil_albedo=0.3; SoilHeatFluxFraction=0.4; MinimumHeightDiffForNewLayer=0; NightInterceptionFraction=0.5; ReferenceHeight=2
          SoilArbitrator Soil Arbitrator
          RectangularZone Row: Length=100; Width=0.9; Slope=0; AspectAngle=0; Altitude=50
            Manager TreeInitialisation
              CultivarName = SauvignonBlanc
              SowingDate = 02/25/2000 00:00:00
              VineDistance = 1.8
              BudNumber = 44
              CordonNumber = 4
              CordonDiameter = 10
              CordonLength = 1
              TrunkDiameter = 40
              TrunkHeight = 0.9
              RootDM = 2000
              RootNSC = 0.3
              TrunkNSC = 0.3
              CordonNSC = 0.3
              StartAge = 10
              script: same as in Validation.Sauvignonblanc.Marlborough_2Cane.VineFacts1.Row.TreeInitialisation
            Report: same as Validation.Sauvignonblanc.Marlborough_4Cane.VineFacts2.Row.Report
            Memo: same as BaseSim.BaseSim.Vineyard.Memo
            Plant Grapevine
            Irrigation
            Fertiliser
            SurfaceOrganicMatter: InitialResidueName=wheat_stubble; InitialResidueType=wheat; InitialResidueMass=500; InitialStandingFraction=0; InitialCPR=0; InitialCNR=100
            Soil: same as Validation.Sauvignonblanc.Marlborough_2Cane.VineFacts1.Row.Soil
            Manager SetupTreeRootZones
              UseExtraZone = True
```csharp
using Models.Functions;
using APSIM.Shared.Utilities;
using System.Xml.Serialization;
using Models;
using Models.PMF;
using System.Text;
using System.Collections.Generic;
using Models.Core;
using System;

namespace Models
{
    [Serializable] 
    public class Script : Model
    {
        [Link] Plant Grapevine;
        [Link] Clock Clock;
        [Link] Zone zone;

        [Description("Use extra root zone")]
        public bool UseExtraZone { get; set; }

        
        [EventSubscribe("StartOfSimulation")]
        private void OnSimulationCommencing(object sender, EventArgs e)
        {
            if (UseExtraZone)
            {
            Grapevine.Root.ZoneNamesToGrowRootsIn.Add("Alley");
            Grapevine.Root.ZoneRootDepths.Add(2600);
BiomassDemand InitialDM = new BiomassDemand();
Constant InitStruct = new Constant();
InitStruct.FixedValue = 500;
InitialDM.Structural = InitStruct;
Constant InitMetab = new Constant();
InitMetab.FixedValue = 0;
InitialDM.Metabolic = InitMetab;
Constant InitStor = new Constant();
InitStor.FixedValue = 100;
InitialDM.Storage = InitStor;
            Grapevine.Root.ZoneInitialDM.Add(InitialDM);

            }
        }
    }
}
```
            Operations VineIrrigation
            Operations WinterRainfall
              2002-05-28  [Irrigation].Apply(200);
            Manager PlantVariables: same as Validation.Sauvignonblanc.Marlborough_4Cane.VineFacts2.Row.PlantVariables
            Manager DripIrrigator: same as Validation.Sauvignonblanc.Marlborough_2Cane.VineFacts1.Row.DripIrrigator
            Manager HarvestNPruning: same as BaseSim.BaseSim.Vineyard.HarvestNPruning
          RectangularZone Alley: Length=100; Width=1.5; Slope=0; AspectAngle=0; Altitude=50
            Report: same as Validation.Sauvignonblanc.RetainedNodeNum.RetainedNodNum.Alley.Report
            SurfaceOrganicMatter: InitialResidueName=wheat_stubble; InitialResidueType=wheat; InitialResidueMass=500; InitialStandingFraction=0; InitialCPR=0; InitialCNR=100
            Plant Slurp
            Fertiliser
            Irrigation
            Manager PastureInitialisation
              CultivarName = StaticCrop
              InitialRootDepth = 2000
              SowingDate = 02/25/2000 00:00:00
              RootDepth = 2000
              RFV = 10
              KLReductionFactor = -0.001
              KLReductionDepth = 150
              YKLModifiers =
              XDepth =
              MaxG = 0.004
              R50 = 150
              script: same as in Validation.Sauvignonblanc.Marlborough_2Cane.VineFacts1.Alley.PastureInitialisation
            Manager SetPastureVariables: same as Validation.Sauvignonblanc.Marlborough_2Cane.VineFacts1.Alley.SetPastureVariables
            Manager SetupPastureRootZones: same as Validation.Sauvignonblanc.Marlborough_2Cane.VineFacts1.Alley.SetupPastureRootZones
            Soil: same as Validation.Sauvignonblanc.Marlborough_2Cane.VineFacts1.Alley.Soil
            Operations WinterRainfall
              2002-05-28  [Irrigation].Apply(200);
            Manager PlantVariables: same as Validation.Sauvignonblanc.RetainedNodeNum.RetainedNodNum.Alley.PlantVariables
      Experiment Grape_Squire_2
        DisabledSimNames=[Grape_Squire_1Irri70, Grape_Squire_1Irri80, Grape_SquireIrri20, Grape_SquireIrri40, Grape_SquireIrri70, Grape_SquireIrri80]
        Factors
          Factor Irri: Specification=[VineIrrigation]
            Operations 20
              2002-02-14  [DripIrrigator].Script.applyDripIrri(2.1);
              2002-02-17  [DripIrrigator].Script.applyDripIrri(2.1);
              2002-02-19  [DripIrrigator].Script.applyDripIrri(2.1);
              2002-02-21  [DripIrrigator].Script.applyDripIrri(2.1);
              2002-02-25  [DripIrrigator].Script.applyDripIrri(2.1);
              2002-02-26  [DripIrrigator].Script.applyDripIrri(2.1);
              2002-03-03  [DripIrrigator].Script.applyDripIrri(2.1);
              2002-03-05  [DripIrrigator].Script.applyDripIrri(2.1);
              2002-03-07  [DripIrrigator].Script.applyDripIrri(2.1);
              2002-03-10  [DripIrrigator].Script.applyDripIrri(2.1);
              2002-03-12  [DripIrrigator].Script.applyDripIrri(2.1);
              2002-03-14  [DripIrrigator].Script.applyDripIrri(2.1);
              2002-03-19  [DripIrrigator].Script.applyDripIrri(2.1);
              2002-03-21  [DripIrrigator].Script.applyDripIrri(2.1);
              2002-03-24  [DripIrrigator].Script.applyDripIrri(2.1);
              2002-03-26  [DripIrrigator].Script.applyDripIrri(2.1);
              2002-04-01  [DripIrrigator].Script.applyDripIrri(2.1);
              2002-04-07  [DripIrrigator].Script.applyDripIrri(2.1);
              2002-04-10  [DripIrrigator].Script.applyDripIrri(2.1);
              2002-04-18  [DripIrrigator].Script.applyDripIrri(2.1);
              2002-04-21  [DripIrrigator].Script.applyDripIrri(2.1);
              2002-10-05  [DripIrrigator].Script.applyDripIrri(1.5);
              2002-10-08  [DripIrrigator].Script.applyDripIrri(1.5);
              2002-10-10  [DripIrrigator].Script.applyDripIrri(1.5);
              2002-10-12  [DripIrrigator].Script.applyDripIrri(1.5);
              2002-10-18  [DripIrrigator].Script.applyDripIrri(1.5);
              2002-10-23  [DripIrrigator].Script.applyDripIrri(1.5);
              2002-10-26  [DripIrrigator].Script.applyDripIrri(1.5);
              2002-10-28  [DripIrrigator].Script.applyDripIrri(1.5);
              2002-11-05  [DripIrrigator].Script.applyDripIrri(1.5);
              2002-11-08  [DripIrrigator].Script.applyDripIrri(1.5);
              2002-11-11  [DripIrrigator].Script.applyDripIrri(1.5);
              2002-11-18  [DripIrrigator].Script.applyDripIrri(1.5);
              2002-11-20  [DripIrrigator].Script.applyDripIrri(1.5);
              2002-11-23  [DripIrrigator].Script.applyDripIrri(1.5);
              2002-11-25  [DripIrrigator].Script.applyDripIrri(1.5);
              2002-11-29  [DripIrrigator].Script.applyDripIrri(1.5);
              2002-12-04  [DripIrrigator].Script.applyDripIrri(1.5);
              2002-12-09  [DripIrrigator].Script.applyDripIrri(1.5);
              2002-12-11  [DripIrrigator].Script.applyDripIrri(1.5);
              2002-12-19  [DripIrrigator].Script.applyDripIrri(1.5);
              2002-12-27  [DripIrrigator].Script.applyDripIrri(1.5);
              2002-12-31  [DripIrrigator].Script.applyDripIrri(1.5);
              2003-01-03  [DripIrrigator].Script.applyDripIrri(1.5);
              2003-01-08  [DripIrrigator].Script.applyDripIrri(1.5);
              2003-01-09  [DripIrrigator].Script.applyDripIrri(1.5);
              2003-01-11  [DripIrrigator].Script.applyDripIrri(1.5);
              2003-01-15  [DripIrrigator].Script.applyDripIrri(1.5);
              2003-01-18  [DripIrrigator].Script.applyDripIrri(1.5);
              2003-01-23  [DripIrrigator].Script.applyDripIrri(1.5);
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              2003-12-03  [DripIrrigator].Script.applyDripIrri(1);
              2003-12-07  [DripIrrigator].Script.applyDripIrri(1.4);
              2004-02-05  [DripIrrigator].Script.applyDripIrri(0.7);
              2004-12-18  [DripIrrigator].Script.applyDripIrri(1.6);
            Operations 100
              2002-02-14  [DripIrrigator].Script.applyDripIrri(6.3);
              2002-02-17  [DripIrrigator].Script.applyDripIrri(6.3);
              2002-02-19  [DripIrrigator].Script.applyDripIrri(6.3);
              2002-02-21  [DripIrrigator].Script.applyDripIrri(6.3);
              2002-02-25  [DripIrrigator].Script.applyDripIrri(6.3);
              2002-02-26  [DripIrrigator].Script.applyDripIrri(6.3);
              2002-03-03  [DripIrrigator].Script.applyDripIrri(6.3);
              2002-03-05  [DripIrrigator].Script.applyDripIrri(6.3);
              2002-03-07  [DripIrrigator].Script.applyDripIrri(6.3);
              2002-03-10  [DripIrrigator].Script.applyDripIrri(6.3);
              2002-03-12  [DripIrrigator].Script.applyDripIrri(6.3);
              2002-03-14  [DripIrrigator].Script.applyDripIrri(6.3);
              2002-03-19  [DripIrrigator].Script.applyDripIrri(6.3);
              2002-03-21  [DripIrrigator].Script.applyDripIrri(6.3);
              2002-03-24  [DripIrrigator].Script.applyDripIrri(6.3);
              2002-03-26  [DripIrrigator].Script.applyDripIrri(6.3);
              2002-04-01  [DripIrrigator].Script.applyDripIrri(6.3);
              2002-04-07  [DripIrrigator].Script.applyDripIrri(6.3);
              2002-04-10  [DripIrrigator].Script.applyDripIrri(6.3);
              2002-04-18  [DripIrrigator].Script.applyDripIrri(6.3);
              2002-04-21  [DripIrrigator].Script.applyDripIrri(6.3);
              2002-10-05  [DripIrrigator].Script.applyDripIrri(4.4);
              2002-10-08  [DripIrrigator].Script.applyDripIrri(4.4);
              2002-10-10  [DripIrrigator].Script.applyDripIrri(4.4);
              2002-10-12  [DripIrrigator].Script.applyDripIrri(4.4);
              2002-10-18  [DripIrrigator].Script.applyDripIrri(4.4);
              2002-10-23  [DripIrrigator].Script.applyDripIrri(4.4);
              2002-10-26  [DripIrrigator].Script.applyDripIrri(4.4);
              2002-10-28  [DripIrrigator].Script.applyDripIrri(4.4);
              2002-11-05  [DripIrrigator].Script.applyDripIrri(4.4);
              2002-11-08  [DripIrrigator].Script.applyDripIrri(4.4);
              2002-11-11  [DripIrrigator].Script.applyDripIrri(4.4);
              2002-11-18  [DripIrrigator].Script.applyDripIrri(4.4);
              2002-11-20  [DripIrrigator].Script.applyDripIrri(4.4);
              2002-11-23  [DripIrrigator].Script.applyDripIrri(4.4);
              2002-11-25  [DripIrrigator].Script.applyDripIrri(4.4);
              2002-11-29  [DripIrrigator].Script.applyDripIrri(4.4);
              2002-12-04  [DripIrrigator].Script.applyDripIrri(4.4);
              2002-12-09  [DripIrrigator].Script.applyDripIrri(4.4);
              2002-12-11  [DripIrrigator].Script.applyDripIrri(4.4);
              2002-12-19  [DripIrrigator].Script.applyDripIrri(4.4);
              2002-12-27  [DripIrrigator].Script.applyDripIrri(4.4);
              2002-12-31  [DripIrrigator].Script.applyDripIrri(4.4);
              2003-01-03  [DripIrrigator].Script.applyDripIrri(4.4);
              2003-01-08  [DripIrrigator].Script.applyDripIrri(4.4);
              2003-01-09  [DripIrrigator].Script.applyDripIrri(4.4);
              2003-01-11  [DripIrrigator].Script.applyDripIrri(4.4);
              2003-01-15  [DripIrrigator].Script.applyDripIrri(4.4);
              2003-01-18  [DripIrrigator].Script.applyDripIrri(4.4);
              2003-01-23  [DripIrrigator].Script.applyDripIrri(4.4);
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              2003-12-03  [DripIrrigator].Script.applyDripIrri(3.1);
              2003-12-07  [DripIrrigator].Script.applyDripIrri(4.2);
              2004-02-05  [DripIrrigator].Script.applyDripIrri(2.1);
              2005-02-26  [DripIrrigator].Script.applyDripIrri(4.1);
            Operations 60
              2002-02-14  [DripIrrigator].Script.applyDripIrri(6.3);
              2002-02-17  [DripIrrigator].Script.applyDripIrri(6.3);
              2002-02-19  [DripIrrigator].Script.applyDripIrri(6.3);
              2002-02-21  [DripIrrigator].Script.applyDripIrri(6.3);
              2002-02-25  [DripIrrigator].Script.applyDripIrri(6.3);
              2002-02-26  [DripIrrigator].Script.applyDripIrri(6.3);
              2002-03-03  [DripIrrigator].Script.applyDripIrri(6.3);
              2002-03-05  [DripIrrigator].Script.applyDripIrri(6.3);
              2002-03-07  [DripIrrigator].Script.applyDripIrri(6.3);
              2002-03-10  [DripIrrigator].Script.applyDripIrri(6.3);
              2002-03-12  [DripIrrigator].Script.applyDripIrri(6.3);
              2002-03-14  [DripIrrigator].Script.applyDripIrri(6.3);
              2002-03-19  [DripIrrigator].Script.applyDripIrri(6.3);
              2002-03-21  [DripIrrigator].Script.applyDripIrri(6.3);
              2002-03-24  [DripIrrigator].Script.applyDripIrri(6.3);
              2002-03-26  [DripIrrigator].Script.applyDripIrri(6.3);
              2002-04-01  [DripIrrigator].Script.applyDripIrri(6.3);
              2002-04-07  [DripIrrigator].Script.applyDripIrri(6.3);
              2002-04-10  [DripIrrigator].Script.applyDripIrri(6.3);
              2002-04-18  [DripIrrigator].Script.applyDripIrri(6.3);
              2002-04-21  [DripIrrigator].Script.applyDripIrri(6.3);
              2002-10-05  [DripIrrigator].Script.applyDripIrri(4.4);
              2002-10-08  [DripIrrigator].Script.applyDripIrri(4.4);
              2002-10-10  [DripIrrigator].Script.applyDripIrri(4.4);
              2002-10-12  [DripIrrigator].Script.applyDripIrri(4.4);
              2002-10-18  [DripIrrigator].Script.applyDripIrri(4.4);
              2002-10-23  [DripIrrigator].Script.applyDripIrri(4.4);
              2002-10-26  [DripIrrigator].Script.applyDripIrri(4.4);
              2002-10-28  [DripIrrigator].Script.applyDripIrri(4.4);
              2002-11-05  [DripIrrigator].Script.applyDripIrri(4.4);
              2002-11-08  [DripIrrigator].Script.applyDripIrri(4.4);
              2002-11-11  [DripIrrigator].Script.applyDripIrri(4.4);
              2002-11-18  [DripIrrigator].Script.applyDripIrri(4.4);
              2002-11-20  [DripIrrigator].Script.applyDripIrri(4.4);
              2002-11-23  [DripIrrigator].Script.applyDripIrri(4.4);
              2002-11-25  [DripIrrigator].Script.applyDripIrri(4.4);
              2002-11-29  [DripIrrigator].Script.applyDripIrri(4.4);
              2002-12-04  [DripIrrigator].Script.applyDripIrri(4.4);
              2002-12-09  [DripIrrigator].Script.applyDripIrri(4.4);
              2002-12-11  [DripIrrigator].Script.applyDripIrri(4.4);
              2002-12-19  [DripIrrigator].Script.applyDripIrri(4.4);
              2002-12-27  [DripIrrigator].Script.applyDripIrri(4.4);
              2002-12-31  [DripIrrigator].Script.applyDripIrri(4.4);
              2003-01-03  [DripIrrigator].Script.applyDripIrri(4.4);
              2003-01-08  [DripIrrigator].Script.applyDripIrri(4.4);
              2003-01-09  [DripIrrigator].Script.applyDripIrri(4.4);
              2003-01-11  [DripIrrigator].Script.applyDripIrri(4.4);
              2003-01-15  [DripIrrigator].Script.applyDripIrri(4.4);
              2003-01-18  [DripIrrigator].Script.applyDripIrri(4.4);
              2003-01-23  [DripIrrigator].Script.applyDripIrri(4.4);
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              2003-12-03  [DripIrrigator].Script.applyDripIrri(3.1);
              2003-12-07  [DripIrrigator].Script.applyDripIrri(4.2);
              2004-02-05  [DripIrrigator].Script.applyDripIrri(2.1);
              2005-02-26  [DripIrrigator].Script.applyDripIrri(4.1);
              2004-12-18  [DripIrrigator].Script.applyDripIrri(4.8);
        Simulation Squire_2
          Clock: Start=2002-02-25; End=2006-07-01
          Summary SummaryFile
          Weather: FileName=Site1004_RPC.met
          MicroClimate: a_interception=0; b_interception=1; c_interception=0; d_interception=0; soil_albedo=0.3; SoilHeatFluxFraction=0.4; MinimumHeightDiffForNewLayer=0; NightInterceptionFraction=0.5; ReferenceHeight=2
          SoilArbitrator Soil Arbitrator
          RectangularZone Row: Length=100; Width=0.9; Slope=0; AspectAngle=0; Altitude=50
            Report: EventNames=[Clock].DoReport
              VariableNames:
                [Clock].Today
                [Clock].Today.Year
                [Clock].Today.DayOfYear
                [Weather].DaysSinceWinterSolstice as DAWS
                [PlantVariables].Script.Height as height
                [PlantVariables].Script.LAI as lai
                [PlantVariables].Script.LAIPerVine as LAIPerVine
                [PlantVariables].Script.FRadInt as f.rad.int
                [PlantVariables].Script.ET as transpiration
                [PlantVariables].Script.ES as Es
                [PlantVariables].Script.PET as PET
                [PlantVariables].Script.RootDepth as rootDepth
                [Soil].OutputLayers.SW
                sum([Soil].OutputLayers.SWmm) as psw
                [Weather].Rain
                [Irrigation].IrrigationApplied
                [Soil].SoilWater.Drainage
                [Row].Grapevine.Structure.TotalLeavesPerShoot
                [Row].Grapevine.Leaf.LAIMainStem/[Grapevine].Structure.MainStemPopn as LAIMeanMainStem
                [Row].Grapevine.Leaf.LAIBranch/[Grapevine].Structure.MainStemPopn as LAIMeanLateral
                [Grapevine].Phenology.CurrentSeason as CurrentSeason
                [Grapevine].Phenology.Stage
                [Grapevine].Phenology.AccumulatedEmergedTT
                [Grapevine].Phenology.BudBurstDOY as BudBurstDAWS
                [Grapevine].Phenology.FloweringDOY as FloweringDAWS
                [Grapevine].Phenology.VeraisonDOY as VeraisonDAWS
                [Grapevine].Phenology.CurrentStageName as CurrentStageName
                [Grapevine].Phenology.AccChillBefPrune
                [Grapevine].Structure.PrimaryBudNo
                [Grapevine].Structure.MainStemPopn
                [Grapevine].Structure.LeafTipsAppeared
                [Grapevine].Leaf.LAI
                [Grapevine].Leaf.InitialisedCohortNo
                [Grapevine].Leaf.DeadCohortNo
                [Grapevine].Leaf.AppearedCohortNo
                [Grapevine].Leaf.CohortSize
                [Grapevine].Leaf.Fn
                [Grapevine].Leaf.Fw
                [Grapevine].Leaf.Live.Wt
                [Grapevine].Shoot.Live.Wt
                [Grapevine].Cordon.Live.Wt
                [Grapevine].Cordon.Live.StructuralWt
                [Grapevine].Trunk.Live.Wt
                [Grapevine].Root.Live.Wt
                [Grapevine].Arbitrator.FDM
                [Grapevine].Arbitrator.DM.TotalFixationSupply
                [Berry].Live.Wt
                [Berry].SingleBerryDW
                [Berry].SingleBerryFW
                [Berry].TotalBerryFW
                [Berry].NumberFunction
                [Berry].ThermalTimeAfterFlowering
                [Berry].WaterContent
                [Berry].Brix
                [Berry].MetFactors.BUN_TmaxIni1 as BUN_TmaxIni
                [Berry].MetFactors.BUN_RadIni1 as BUN_RadIni
                [Berry].MetFactors.BEN_RainTotFlow as BEN_RainTotFlow
                [Berry].MetFactors.BEN_TmaxIni1 as BEN_TmaxIni1
                [Berry].MetFactors.BEN_TmeanFlow as BEN_TmeanFlow
                [Berry].MetFactors.BM_RadFlow as BM_RadFlow
                [Berry].MetFactors.BM_RainTotFlow as BM_RainTotFlow
                [Berry].MetFactors.BM_RainTotVer as BM_RainTotVer
                [Berry].MetFactors.BM_TmeanFlow as BM_TmeanFlow
                [Berry].YieldComponent.BunchesPerVine as bunch.no.vine
                [Berry].YieldComponent.BerryNum as BerryNum
                [Berry].YieldComponent.BerryMass as berry.fw.mean
            Memo: same as BaseSim.BaseSim.Vineyard.Memo
            Plant Grapevine
            Irrigation
            Fertiliser
            SurfaceOrganicMatter: InitialResidueName=wheat_stubble; InitialResidueType=wheat; InitialResidueMass=500; InitialStandingFraction=0; InitialCPR=0; InitialCNR=100
            Manager SetupTreeRootZones: same as Validation.Sauvignonblanc.Marlborough_2Cane.VineFacts1.Row.SetupTreeRootZones
            Operations VineIrrigation
            Operations WinterRainfall
              2002-05-28  [Irrigation].Apply(200);
            Soil: Latitude=0; Longitude=0
              LayerStructure: Thickness=[200, 200, 200, 200, 200, 200, 400, 400, 400, 600]
              Chemical
                Thickness  NO3N     NH4N  PH
                100        160.741  0     6.6
                200        10.8108  0     6.2
                300        1.19048  0     5.7
                300        1.19048  0     5.5
                300        0        0     5.5
                300        0        0     5.5
              Physical
                Thickness  BD    AirDry  LL15  DUL   SAT
                150        1.35  0.06    0.12  0.28  0.36
                750        1.4   0.1     0.1   0.28  0.36
                150        1.4   0.005   0.05  0.28  0.35
                150        1.4   0.05    0.05  0.28  0.35
                1950       1.5   0.06    0.06  0.15  0.3
                SoilCrop GrapevineSoil: LL=[0.12, 0.1, 0.05, 0.05, 0.06]; KL=[0.1, 0.04, 0.03, 0.03, 0.02]; XF=[1, 1, 1, 1, 1]
                SoilCrop SlurpSoil: LL=[0.12, 0.1, 0.05, 0.05, 0.06]; KL=[0.1, 0.04, 0.01, 0, 0]; XF=[1, 1, 1, 1, 1]
              WaterBalance SoilWater: same as Validation.Sauvignonblanc.Marlborough_2Cane.VineFacts1.Row.Soil.SoilWater
              SoilNitrogen: same as BaseSim.BaseSim.Vineyard.Soil.SoilNitrogen
              Organic: same as Validation.Sauvignonblanc.Marlborough_2Cane.VineFacts1.Row.Soil.Organic
              Sample Initial nitrogen: Thickness=[100, 200, 300, 300, 300, 300]; SWUnits=Volumetric; OCUnits=Total; PHUnits=Water
              CERESSoilTemperature
              OutputLayers: Thickness=[150, 150, 150, 150, 150, 150, 150]
              InitialWater: PercentMethod=0; FractionFull=0.8
            Manager PlantVariables: same as Validation.Sauvignonblanc.Marlborough_4Cane.VineFacts2.Row.PlantVariables
            Manager DripIrrigator
              totalIrrigation = 0
```csharp
using APSIM.Shared.Utilities;
using System.Xml.Serialization;
using Models;
using Models.PMF;
using Models.Soils;
using System.Text;
using System.Collections.Generic;
using Models.Core;
using System;

namespace Models
{
    [Serializable] 
    public class Script : Model
    {
       [Link] Irrigation irrigation;
        public void applyDripIrri(double amount)
        {
            double layerAmount = amount/4;
            irrigation.Apply(layerAmount, 0);
            irrigation.Apply(layerAmount*2, 220);
            irrigation.Apply(layerAmount, 420);

        }
        public double totalIrrigation {get; set;}
        [EventSubscribe("Irrigated")]
        private void OnIrrigated(object sender, 
        IrrigationApplicationType irrigData)
        {
            totalIrrigation += irrigData.Amount;
         }
    }
}
```
            Manager HarvestNPruning: same as BaseSim.BaseSim.Vineyard.HarvestNPruning
            Manager TreeInitialisation
              CultivarName = SauvignonBlanc
              SowingDate = 02/25/2002 00:00:00
              VineDistance = 1.8
              BudNumber = 44
              CordonNumber = 4
              CordonDiameter = 10
              CordonLength = 1
              TrunkDiameter = 40
              TrunkHeight = 0.9
              RootDM = 2000
              RootNSC = 0.3
              TrunkNSC = 0.3
              CordonNSC = 0.3
              StartAge = 10
              script: same as in Validation.Sauvignonblanc.Marlborough_2Cane.VineFacts1.Row.TreeInitialisation
          RectangularZone Alley: Length=100; Width=1.5; Slope=0; AspectAngle=0; Altitude=50
            Report: same as Validation.Sauvignonblanc.RetainedNodeNum.RetainedNodNum.Alley.Report
            SurfaceOrganicMatter: InitialResidueName=wheat_stubble; InitialResidueType=wheat; InitialResidueMass=500; InitialStandingFraction=0; InitialCPR=0; InitialCNR=100
            Plant Slurp
            Fertiliser
            Irrigation
            Manager PastureInitialisation
              CultivarName = StaticCrop
              InitialRootDepth = 2000
              SowingDate = 02/25/2002 00:00:00
              RootDepth = 2000
              RFV = 10
              KLReductionFactor = -0.001
              KLReductionDepth = 150
              YKLModifiers =
              XDepth =
              MaxG = 0.004
              R50 = 150
              script: same as in Validation.Sauvignonblanc.Marlborough_2Cane.VineFacts1.Alley.PastureInitialisation
            Manager SetPastureVariables: same as Validation.Sauvignonblanc.Marlborough_2Cane.VineFacts1.Alley.SetPastureVariables
            Manager SetupPastureRootZones: same as Validation.Sauvignonblanc.Marlborough_2Cane.VineFacts1.Alley.SetupPastureRootZones
            Operations WinterRainfall
              2002-05-28  [Irrigation].Apply(200);
            Soil: Latitude=0; Longitude=0
              LayerStructure: Thickness=[200, 200, 200, 200, 200, 200, 400, 400, 400, 600]
              Chemical
                Thickness  NO3N     NH4N  PH
                100        160.741  0     6.6
                200        10.8108  0     6.2
                300        1.19048  0     5.7
                300        1.19048  0     5.5
                300        0        0     5.5
                300        0        0     5.5
              WaterBalance SoilWater: same as Validation.Sauvignonblanc.Marlborough_2Cane.VineFacts1.Row.Soil.SoilWater
              SoilNitrogen: same as BaseSim.BaseSim.Vineyard.Soil.SoilNitrogen
              Organic: same as Validation.Sauvignonblanc.Marlborough_2Cane.VineFacts1.Row.Soil.Organic
              Sample Initial nitrogen: Thickness=[100, 200, 300, 300, 300, 300]; SWUnits=Volumetric; OCUnits=Total; PHUnits=Water
              CERESSoilTemperature
              OutputLayers: Thickness=[150, 150, 150, 150, 150, 150, 150]
              InitialWater: PercentMethod=0; FractionFull=0.8
              Physical
                Thickness  BD    AirDry  LL15  DUL   SAT
                150        1.35  0.06    0.12  0.28  0.36
                750        1.4   0.1     0.1   0.28  0.36
                150        1.4   0.005   0.05  0.28  0.35
                150        1.4   0.05    0.05  0.28  0.35
                1950       1.5   0.06    0.06  0.15  0.3
                SoilCrop GrapevineSoil: LL=[0.12, 0.1, 0.05, 0.05, 0.06]; KL=[0.12, 0.05, 0.03, 0.03, 0.02]; XF=[1, 1, 1, 1, 1]
                SoilCrop SlurpSoil: LL=[0.12, 0.1, 0.05, 0.05, 0.06]; KL=[0.11, 0.11, 0.11, 0.11, 0.11]; XF=[1, 1, 1, 1, 1]
            Manager PlantVariables: same as Validation.Sauvignonblanc.RetainedNodeNum.RetainedNodNum.Alley.PlantVariables
      Experiment Nautilus
        DisabledSimNames=[Grape_Squire_1Irri70, Grape_Squire_1Irri80, Grape_SquireIrri20, Grape_SquireIrri40, Grape_SquireIrri70, Grape_SquireIrri80]
        Factors
          Factor Irri: Specification=[VineIrrigation]
            Operations 100
              2004-11-25  [DripIrrigator].Script.applyDripIrri(0.3);
              2004-12-02  [DripIrrigator].Script.applyDripIrri(32.3);
              2004-12-09  [DripIrrigator].Script.applyDripIrri(32.1);
              2004-12-23  [DripIrrigator].Script.applyDripIrri(10.6);
              2004-12-30  [DripIrrigator].Script.applyDripIrri(29.5);
              2005-01-06  [DripIrrigator].Script.applyDripIrri(9.4);
              2005-01-27  [DripIrrigator].Script.applyDripIrri(11.4);
              2005-02-03  [DripIrrigator].Script.applyDripIrri(12);
              2005-02-10  [DripIrrigator].Script.applyDripIrri(20.1);
              2005-02-17  [DripIrrigator].Script.applyDripIrri(32.1);
              2005-02-24  [DripIrrigator].Script.applyDripIrri(16);
              2005-03-03  [DripIrrigator].Script.applyDripIrri(24.1);
              2005-03-10  [DripIrrigator].Script.applyDripIrri(24.1);
              2005-03-17  [DripIrrigator].Script.applyDripIrri(23.9);
              2005-03-24  [DripIrrigator].Script.applyDripIrri(23.9);
              2005-03-31  [DripIrrigator].Script.applyDripIrri(15.9);
              2005-04-28  [DripIrrigator].Script.applyDripIrri(15.9);
              2005-11-03  [DripIrrigator].Script.applyDripIrri(0.8);
              2005-11-10  [DripIrrigator].Script.applyDripIrri(15.9);
              2005-11-17  [DripIrrigator].Script.applyDripIrri(15.9);
              2005-11-24  [DripIrrigator].Script.applyDripIrri(23.9);
              2005-12-01  [DripIrrigator].Script.applyDripIrri(23.6);
              2005-12-08  [DripIrrigator].Script.applyDripIrri(23.6);
              2005-12-15  [DripIrrigator].Script.applyDripIrri(15.9);
              2005-12-22  [DripIrrigator].Script.applyDripIrri(15.9);
              2005-12-29  [DripIrrigator].Script.applyDripIrri(35.5);
              2006-01-05  [DripIrrigator].Script.applyDripIrri(31.3);
              2006-01-12  [DripIrrigator].Script.applyDripIrri(32.4);
              2006-01-19  [DripIrrigator].Script.applyDripIrri(48.8);
              2006-01-26  [DripIrrigator].Script.applyDripIrri(8);
              2006-02-09  [DripIrrigator].Script.applyDripIrri(16);
              2006-02-16  [DripIrrigator].Script.applyDripIrri(16);
              2006-02-23  [DripIrrigator].Script.applyDripIrri(16);
              2006-03-02  [DripIrrigator].Script.applyDripIrri(24.1);
              2006-03-09  [DripIrrigator].Script.applyDripIrri(24.1);
              2006-03-16  [DripIrrigator].Script.applyDripIrri(24.1);
            Operations 50
              2004-11-25  [DripIrrigator].Script.applyDripIrri(0.5);
              2004-12-02  [DripIrrigator].Script.applyDripIrri(39.4);
              2004-12-09  [DripIrrigator].Script.applyDripIrri(21.5);
              2004-12-23  [DripIrrigator].Script.applyDripIrri(9.4);
              2004-12-30  [DripIrrigator].Script.applyDripIrri(20.4);
              2005-02-10  [DripIrrigator].Script.applyDripIrri(8.2);
              2005-02-17  [DripIrrigator].Script.applyDripIrri(16.2);
              2005-02-24  [DripIrrigator].Script.applyDripIrri(8);
              2005-03-03  [DripIrrigator].Script.applyDripIrri(8.2);
              2005-03-10  [DripIrrigator].Script.applyDripIrri(8.2);
              2005-03-17  [DripIrrigator].Script.applyDripIrri(8);
              2005-03-24  [DripIrrigator].Script.applyDripIrri(8.2);
              2005-11-03  [DripIrrigator].Script.applyDripIrri(0.9);
              2005-11-17  [DripIrrigator].Script.applyDripIrri(16.2);
              2005-11-24  [DripIrrigator].Script.applyDripIrri(24.2);
              2005-12-01  [DripIrrigator].Script.applyDripIrri(24.1);
              2005-12-08  [DripIrrigator].Script.applyDripIrri(23.9);
              2005-12-15  [DripIrrigator].Script.applyDripIrri(16);
              2005-12-22  [DripIrrigator].Script.applyDripIrri(15.9);
              2005-12-29  [DripIrrigator].Script.applyDripIrri(8.2);
              2006-01-05  [DripIrrigator].Script.applyDripIrri(9.3);
              2006-01-12  [DripIrrigator].Script.applyDripIrri(24.4);
              2006-01-19  [DripIrrigator].Script.applyDripIrri(9.9);
              2006-01-26  [DripIrrigator].Script.applyDripIrri(8);
              2006-02-09  [DripIrrigator].Script.applyDripIrri(8);
              2006-02-16  [DripIrrigator].Script.applyDripIrri(8);
              2006-02-23  [DripIrrigator].Script.applyDripIrri(8);
              2006-03-02  [DripIrrigator].Script.applyDripIrri(11.7);
              2006-03-09  [DripIrrigator].Script.applyDripIrri(12.3);
              2006-03-16  [DripIrrigator].Script.applyDripIrri(11.7);
            Operations 40
              2004-11-25  [DripIrrigator].Script.applyDripIrri(0.3);
              2004-12-02  [DripIrrigator].Script.applyDripIrri(15.1);
              2004-12-23  [DripIrrigator].Script.applyDripIrri(9.7);
              2005-02-17  [DripIrrigator].Script.applyDripIrri(15.7);
              2005-03-03  [DripIrrigator].Script.applyDripIrri(8);
              2005-03-10  [DripIrrigator].Script.applyDripIrri(7.9);
              2005-03-17  [DripIrrigator].Script.applyDripIrri(8);
              2005-03-24  [DripIrrigator].Script.applyDripIrri(8);
              2005-11-03  [DripIrrigator].Script.applyDripIrri(0.8);
              2005-11-24  [DripIrrigator].Script.applyDripIrri(23.6);
              2005-12-08  [DripIrrigator].Script.applyDripIrri(23.8);
              2005-12-15  [DripIrrigator].Script.applyDripIrri(15.7);
              2005-12-22  [DripIrrigator].Script.applyDripIrri(8);
              2005-12-29  [DripIrrigator].Script.applyDripIrri(15.7);
              2006-01-05  [DripIrrigator].Script.applyDripIrri(7.4);
              2006-01-12  [DripIrrigator].Script.applyDripIrri(16.5);
              2006-01-19  [DripIrrigator].Script.applyDripIrri(8);
              2006-01-26  [DripIrrigator].Script.applyDripIrri(8);
              2006-03-02  [DripIrrigator].Script.applyDripIrri(8);
              2006-03-09  [DripIrrigator].Script.applyDripIrri(8);
              2006-03-16  [DripIrrigator].Script.applyDripIrri(8);
            Operations 30
              2004-11-25  [DripIrrigator].Script.applyDripIrri(0.3);
              2004-12-23  [DripIrrigator].Script.applyDripIrri(10.2);
              2004-12-30  [DripIrrigator].Script.applyDripIrri(20.1);
              2005-02-24  [DripIrrigator].Script.applyDripIrri(8);
              2005-03-10  [DripIrrigator].Script.applyDripIrri(8.2);
              2005-03-24  [DripIrrigator].Script.applyDripIrri(8.2);
              2005-11-03  [DripIrrigator].Script.applyDripIrri(0.8);
              2005-11-24  [DripIrrigator].Script.applyDripIrri(22.1);
              2005-12-08  [DripIrrigator].Script.applyDripIrri(16);
              2005-12-29  [DripIrrigator].Script.applyDripIrri(12.7);
              2006-01-05  [DripIrrigator].Script.applyDripIrri(1.4);
              2006-01-12  [DripIrrigator].Script.applyDripIrri(16.8);
              2006-01-19  [DripIrrigator].Script.applyDripIrri(0.6);
              2006-03-02  [DripIrrigator].Script.applyDripIrri(8);
              2006-03-09  [DripIrrigator].Script.applyDripIrri(8);
              2006-03-16  [DripIrrigator].Script.applyDripIrri(8);
        Simulation Nautilus
          Clock: Start=2002-02-25; End=2007-07-01
          Summary SummaryFile
          Weather: FileName=Site1004_RPC.met
          MicroClimate: a_interception=0; b_interception=1; c_interception=0; d_interception=0; soil_albedo=0.3; SoilHeatFluxFraction=0.4; MinimumHeightDiffForNewLayer=0; NightInterceptionFraction=0.5; ReferenceHeight=2
          SoilArbitrator Soil Arbitrator
          RectangularZone Row: Length=100; Width=0.9; Slope=0; AspectAngle=0; Altitude=50
            Report: EventNames=[Clock].DoReport
              VariableNames:
                [Clock].Today
                [Clock].Today.Year
                [Clock].Today.DayOfYear
                [Weather].DaysSinceWinterSolstice as DAWS
                [PlantVariables].Script.Height as height
                [PlantVariables].Script.LAI as lai
                [PlantVariables].Script.LAIPerVine as LAIPerVine
                [PlantVariables].Script.FRadInt as f.rad.int
                [PlantVariables].Script.ET as transpiration
                [PlantVariables].Script.ES as Es
                [PlantVariables].Script.PET as PET
                [PlantVariables].Script.RootDepth as rootDepth
                [Soil].OutputLayers.SW
                sum([Soil].OutputLayers.SWmm) as psw
                [Weather].Rain
                [Irrigation].IrrigationApplied
                [Soil].SoilWater.Drainage
                [Row].Grapevine.Structure.TotalLeavesPerShoot
                [Row].Grapevine.Leaf.LAIMainStem/[Grapevine].Structure.MainStemPopn as LAIMeanMainStem
                [Row].Grapevine.Leaf.LAIBranch/[Grapevine].Structure.MainStemPopn as LAIMeanLateral
                [Grapevine].Phenology.CurrentSeason as CurrentSeason
                [Grapevine].Phenology.Stage
                [Grapevine].Phenology.AccumulatedEmergedTT
                [Grapevine].Phenology.BudBurstDOY as BudBurstDAWS
                [Grapevine].Phenology.FloweringDOY as FloweringDAWS
                [Grapevine].Phenology.VeraisonDOY as VeraisonDAWS
                [Grapevine].Phenology.CurrentStageName as CurrentStageName
                [Grapevine].Phenology.AccChillBefPrune
                [Grapevine].Structure.PrimaryBudNo
                [Grapevine].Structure.MainStemPopn
                [Grapevine].Structure.LeafTipsAppeared
                [Grapevine].Leaf.LAI
                [Grapevine].Leaf.InitialisedCohortNo
                [Grapevine].Leaf.DeadCohortNo
                [Grapevine].Leaf.AppearedCohortNo
                [Grapevine].Leaf.CohortSize
                [Grapevine].Leaf.Fn
                [Grapevine].Leaf.Fw
                [Grapevine].Leaf.Live.Wt/[Grapevine].Structure.MainStemPopn as LeafWtPerShoot
                [Grapevine].Shoot.Live.Wt/[Grapevine].Structure.MainStemPopn as ShootWtPerShoot
                [Grapevine].Cordon.Live.Wt
                [Grapevine].Cordon.Live.StructuralWt
                [Grapevine].Cordon.Live.StorageWt
                [Grapevine].Trunk.Live.Wt
                [Grapevine].Trunk.Live.StructuralWt
                [Grapevine].Trunk.Live.StorageWt
                [Grapevine].Root.Live.Wt
                [Grapevine].Root.Live.StructuralWt
                [Grapevine].Root.Live.StorageWt
                [Grapevine].Arbitrator.FDM
                [Grapevine].Arbitrator.DM.TotalFixationSupply
                [Grapevine].Berry.Live.Wt
                [Grapevine].Berry.SingleBerryDW
                [Grapevine].Berry.SingleBerryFW
                [Grapevine].Berry.TotalBerryFW
                [Grapevine].Berry.NumberFunction
                [Grapevine].Berry.ThermalTimeAfterFlowering
                [Grapevine].Berry.WaterContent
                [Grapevine].Berry.Brix
                [Grapevine].Berry.MetFactors.BUN_TmaxIni1 as BUN_TmaxIni
                [Grapevine].Berry.MetFactors.BUN_RadIni1 as BUN_RadIni
                [Grapevine].Berry.MetFactors.BEN_RainTotFlow as BEN_RainTotFlow
                [Grapevine].Berry.MetFactors.BEN_TmaxIni1 as BEN_TmaxIni1
                [Grapevine].Berry.MetFactors.BEN_TmeanFlow as BEN_TmeanFlow
                [Grapevine].Berry.MetFactors.BM_RadFlow as BM_RadFlow
                [Grapevine].Berry.MetFactors.BM_RainTotFlow as BM_RainTotFlow
                [Grapevine].Berry.MetFactors.BM_RainTotVer as BM_RainTotVer
                [Grapevine].Berry.MetFactors.BM_TmeanFlow as BM_TmeanFlow
                [Grapevine].Berry.YieldComponent.BunchesPerVine as bunch.no.vine
                [Grapevine].Berry.YieldComponent.BerryNum as BerryNum
                [Grapevine].Berry.YieldComponent.BerryMass as berry.fw.mean
            Memo: same as BaseSim.BaseSim.Vineyard.Memo
            Plant Grapevine
            Irrigation
            Fertiliser
            SurfaceOrganicMatter: InitialResidueName=wheat_stubble; InitialResidueType=wheat; InitialResidueMass=500; InitialStandingFraction=0; InitialCPR=0; InitialCNR=100
            Soil: Latitude=0; Longitude=0
              LayerStructure: Thickness=[200, 200, 200, 200, 200, 200, 400, 400, 400, 600]
              Chemical
                Thickness  NO3N     NH4N  PH
                100        160.741  0     6.6
                200        11.1111  0     6.2
                300        1.21212  0     5.7
                300        1.19048  0     5.5
                300        0        0     5.5
                300        0        0     5.5
              InitialWater Initial water: PercentMethod=1; FractionFull=1; RelativeTo=LL15
              Physical
                Thickness  BD    AirDry  LL15  DUL   SAT
                200        1.35  0.1     0.12  0.3   0.32
                300        1.35  0.1     0.12  0.27  0.32
                300        1.4   0.1     0.12  0.16  0.2
                200        1.4   0.1     0.11  0.14  0.2
                200        1.4   0.08    0.08  0.12  0.2
                1800       1.59  0.06    0.08  0.12  0.2
                SoilCrop GrapevineSoil: LL=[0.12, 0.12, 0.12, 0.11, 0.08, 0.08]; KL=[0.25, 0.1, 0.08, 0.05, 0.05, 0.01]; XF=[1, 1, 1, 1, 1, 1]
                SoilCrop SlurpSoil: LL=[0.12, 0.12, 0.12, 0.11, 0.08, 0.08]; KL=[0.11, 0.11, 0.11, 0.11, 0.11, 0.11]; XF=[1, 1, 1, 1, 1, 1]
              WaterBalance SoilWater: same as Validation.Sauvignonblanc.Marlborough_2Cane.VineFacts1.Row.Soil.SoilWater
              SoilNitrogen: same as BaseSim.BaseSim.Vineyard.Soil.SoilNitrogen
              Organic: same as Validation.Sauvignonblanc.Marlborough_2Cane.VineFacts1.Row.Soil.Organic
              Sample Initial nitrogen: Thickness=[100, 200, 300, 300, 300, 300]; SWUnits=Volumetric; OCUnits=Total; PHUnits=Water
              CERESSoilTemperature
              OutputLayers: Thickness=[200, 100, 100, 100, 100, 200, 200, 200]
            Manager SetupTreeRootZones: same as Validation.Sauvignonblanc.Marlborough_2Cane.VineFacts1.Row.SetupTreeRootZones
            Operations VineIrrigation
            Operations WinterRainfall
              2002-05-28  [Irrigation].Apply(200);
            Manager PlantVariables: same as Validation.Sauvignonblanc.Marlborough_4Cane.VineFacts2.Row.PlantVariables
            Manager DripIrrigator: same as Validation.Sauvignonblanc.Marlborough_2Cane.VineFacts1.Row.DripIrrigator
            Manager HarvestNPruning: same as BaseSim.BaseSim.Vineyard.HarvestNPruning
            Manager TreeInitialisation: same as Validation.Sauvignonblanc.Grape_Squire_2.Squire_2.Row.TreeInitialisation
          RectangularZone Alley: Length=100; Width=1.8; Slope=0; AspectAngle=0; Altitude=50
            Report: same as Validation.Sauvignonblanc.RetainedNodeNum.RetainedNodNum.Alley.Report
            SurfaceOrganicMatter: InitialResidueName=wheat_stubble; InitialResidueType=wheat; InitialResidueMass=500; InitialStandingFraction=0; InitialCPR=0; InitialCNR=100
            Plant Slurp
            Fertiliser
            Irrigation
            Manager PastureInitialisation: same as Validation.Sauvignonblanc.Grape_Squire_2.Squire_2.Alley.PastureInitialisation
            Manager SetPastureVariables: same as Validation.Sauvignonblanc.Marlborough_2Cane.VineFacts1.Alley.SetPastureVariables
            Manager SetupPastureRootZones: same as Validation.Sauvignonblanc.Marlborough_2Cane.VineFacts1.Alley.SetupPastureRootZones
            Operations WinterRainfall
              2002-05-28  [Irrigation].Apply(200);
            Manager PlantVariables: same as Validation.Sauvignonblanc.RetainedNodeNum.RetainedNodNum.Alley.PlantVariables
            Soil: same as Validation.Sauvignonblanc.Nautilus.Nautilus.Row.Soil
      Simulation Seaview_2Cane
        Clock: Start=2006-02-25; End=2007-07-01
        Summary SummaryFile
        Weather: FileName=Site1003_SEA.met
        MicroClimate: a_interception=0; b_interception=1; c_interception=0; d_interception=0; soil_albedo=0.3; SoilHeatFluxFraction=0.4; MinimumHeightDiffForNewLayer=0; NightInterceptionFraction=0.5; ReferenceHeight=2
        SoilArbitrator Soil Arbitrator
        RectangularZone Row: Length=100; Width=0.9; Slope=0; AspectAngle=0; Altitude=50
          Report: same as Validation.Sauvignonblanc.Nautilus.Nautilus.Row.Report
          Memo: same as BaseSim.BaseSim.Vineyard.Memo
          Plant Grapevine
          Irrigation
          Fertiliser
          SurfaceOrganicMatter: InitialResidueName=wheat_stubble; InitialResidueType=wheat; InitialResidueMass=500; InitialStandingFraction=0; InitialCPR=0; InitialCNR=100
          Manager SetupTreeRootZones: same as Validation.Sauvignonblanc.Marlborough_2Cane.VineFacts1.Row.SetupTreeRootZones
          Operations VineIrrigation
          Operations WinterRainfall
            2006-08-26  [Irrigation].Apply(45);
          Manager PlantVariables: same as Validation.Sauvignonblanc.Marlborough_4Cane.VineFacts2.Row.PlantVariables
          Manager DripIrrigator: same as Validation.Sauvignonblanc.Marlborough_2Cane.VineFacts1.Row.DripIrrigator
          Soil: Latitude=0; Longitude=0
            LayerStructure: Thickness=[200, 200, 200, 200, 200, 200, 400, 400, 400, 600]
            Chemical
              Thickness  NO3N     NH4N  PH
              100        217      0     6.6
              200        15       0     6.2
              300        1.66667  0     5.7
              300        1.66667  0     5.5
              300        0        0     5.5
              300        0        0     5.5
            Physical: same as Validation.Sauvignonblanc.RetainedNodeNum.RetainedNodNum.Row.Soil.Physical
            WaterBalance SoilWater: same as Validation.Sauvignonblanc.RetainedNodeNum.RetainedNodNum.Row.Soil.SoilWater
            SoilNitrogen: same as BaseSim.BaseSim.Vineyard.Soil.SoilNitrogen
            Organic: same as Validation.Sauvignonblanc.Marlborough_2Cane.VineFacts1.Row.Soil.Organic
            Sample Initial nitrogen: Thickness=[100, 200, 300, 300, 300, 300]; SWUnits=Volumetric; OCUnits=Total; PHUnits=Water
            CERESSoilTemperature
            OutputLayers: Thickness=[300, 300, 300]
            InitialWater: PercentMethod=0; FractionFull=1
          Manager HarvestNPruning: same as BaseSim.BaseSim.Vineyard.HarvestNPruning
          Manager TreeInitialisation
            CultivarName = SauvignonBlanc
            SowingDate = 02/25/2006 00:00:00
            VineDistance = 1.8
            BudNumber = 24
            CordonNumber = 2
            CordonDiameter = 10
            CordonLength = 1
            TrunkDiameter = 40
            TrunkHeight = 0.9
            RootDM = 2000
            RootNSC = 0.3
            TrunkNSC = 0.3
            CordonNSC = 0.3
            StartAge = 10
            script: same as in Validation.Sauvignonblanc.Marlborough_2Cane.VineFacts1.Row.TreeInitialisation
        RectangularZone Alley: same as Validation.Sauvignonblanc.RetainedNodeNum.RetainedNodNum.Alley
      Simulation Seaview_4Cane
        Clock: Start=2006-02-25; End=2007-07-01
        Summary SummaryFile
        Weather: FileName=Site1003_SEA.met
        MicroClimate: a_interception=0; b_interception=1; c_interception=0; d_interception=0; soil_albedo=0.3; SoilHeatFluxFraction=0.4; MinimumHeightDiffForNewLayer=0; NightInterceptionFraction=0.5; ReferenceHeight=2
        SoilArbitrator Soil Arbitrator
        RectangularZone Row: Length=100; Width=0.9; Slope=0; AspectAngle=0; Altitude=50
          Report: same as Validation.Sauvignonblanc.Nautilus.Nautilus.Row.Report
          Memo: same as BaseSim.BaseSim.Vineyard.Memo
          Plant Grapevine
          Irrigation
          Fertiliser
          SurfaceOrganicMatter: InitialResidueName=wheat_stubble; InitialResidueType=wheat; InitialResidueMass=500; InitialStandingFraction=0; InitialCPR=0; InitialCNR=100
          Manager SetupTreeRootZones: same as Validation.Sauvignonblanc.Marlborough_2Cane.VineFacts1.Row.SetupTreeRootZones
          Operations VineIrrigation
          Operations WinterRainfall
            2006-08-26  [Irrigation].Apply(45);
          Manager PlantVariables: same as Validation.Sauvignonblanc.Marlborough_4Cane.VineFacts2.Row.PlantVariables
          Manager DripIrrigator: same as Validation.Sauvignonblanc.Marlborough_2Cane.VineFacts1.Row.DripIrrigator
          Soil: same as Validation.Sauvignonblanc.Seaview_2Cane.Row.Soil
          Manager HarvestNPruning: same as BaseSim.BaseSim.Vineyard.HarvestNPruning
          Manager TreeInitialisation
            CultivarName = SauvignonBlanc
            SowingDate = 02/25/2006 00:00:00
            VineDistance = 1.8
            BudNumber = 44
            CordonNumber = 4
            CordonDiameter = 10
            CordonLength = 1
            TrunkDiameter = 40
            TrunkHeight = 0.9
            RootDM = 2000
            RootNSC = 0.3
            TrunkNSC = 0.3
            CordonNSC = 0.3
            StartAge = 10
            script: same as in Validation.Sauvignonblanc.Marlborough_2Cane.VineFacts1.Row.TreeInitialisation
        RectangularZone Alley: same as Validation.Sauvignonblanc.RetainedNodeNum.RetainedNodNum.Alley
      Simulation Seaview_4Cane08
        Clock: Start=2007-02-25; End=2008-07-01
        Summary SummaryFile
        Weather: FileName=Site1003_SEA.met
        MicroClimate: a_interception=0; b_interception=1; c_interception=0; d_interception=0; soil_albedo=0.3; SoilHeatFluxFraction=0.4; MinimumHeightDiffForNewLayer=0; NightInterceptionFraction=0.5; ReferenceHeight=2
        SoilArbitrator Soil Arbitrator
        RectangularZone Row: Length=100; Width=0.9; Slope=0; AspectAngle=0; Altitude=50
          Report: same as Validation.Sauvignonblanc.Nautilus.Nautilus.Row.Report
          Memo: same as BaseSim.BaseSim.Vineyard.Memo
          Plant Grapevine
          Irrigation
          Fertiliser
          SurfaceOrganicMatter: InitialResidueName=wheat_stubble; InitialResidueType=wheat; InitialResidueMass=500; InitialStandingFraction=0; InitialCPR=0; InitialCNR=100
          Manager SetupTreeRootZones: same as Validation.Sauvignonblanc.Marlborough_2Cane.VineFacts1.Row.SetupTreeRootZones
          Operations VineIrrigation
          Operations WinterRainfall
            2006-08-26  [Irrigation].Apply(45);
          Manager PlantVariables: same as Validation.Sauvignonblanc.Marlborough_4Cane.VineFacts2.Row.PlantVariables
          Manager DripIrrigator: same as Validation.Sauvignonblanc.Marlborough_2Cane.VineFacts1.Row.DripIrrigator
          Soil: Latitude=0; Longitude=0
            LayerStructure: Thickness=[200, 200, 200, 200, 200, 200, 400, 400, 400, 600]
            Chemical
              Thickness  NO3N     NH4N  PH
              100        160.741  0     6.6
              200        11.1111  0     6.2
              300        1.19048  0     5.7
              300        1.19048  0     5.5
              300        0        0     5.5
              300        0        0     5.5
            Physical
              Thickness  BD    AirDry  LL15  DUL   SAT
              300        1.35  0.06    0.12  0.3   0.4
              300        1.4   0.1     0.12  0.3   0.4
              300        1.4   0.005   0.16  0.3   0.4
              300        1.4   0.05    0.05  0.28  0.35
              1950       1.5   0.06    0.06  0.15  0.3
              SoilCrop GrapevineSoil: LL=[0.12, 0.12, 0.16, 0.05, 0.06]; KL=[0.12, 0.04, 0.03, 0.03, 0.02]; XF=[1, 1, 1, 1, 1]
              SoilCrop SlurpSoil: LL=[0.12, 0.12, 0.16, 0.05, 0.06]; KL=[0.11, 0.11, 0.11, 0.11, 0.11]; XF=[1, 1, 1, 1, 1]
            WaterBalance SoilWater: same as Validation.Sauvignonblanc.Marlborough_2Cane.VineFacts1.Row.Soil.SoilWater
            SoilNitrogen: same as BaseSim.BaseSim.Vineyard.Soil.SoilNitrogen
            Organic: same as Validation.Sauvignonblanc.Marlborough_2Cane.VineFacts1.Row.Soil.Organic
            Sample Initial nitrogen: Thickness=[100, 200, 300, 300, 300, 300]; SWUnits=Volumetric; OCUnits=Total; PHUnits=Water
            CERESSoilTemperature
            OutputLayers: Thickness=[300, 300, 300]
            InitialWater: PercentMethod=1; FractionFull=1
          Manager HarvestNPruning: same as BaseSim.BaseSim.Vineyard.HarvestNPruning
          Manager TreeInitialisation
            CultivarName = SauvignonBlanc
            SowingDate = 02/25/2007 00:00:00
            VineDistance = 1.8
            BudNumber = 44
            CordonNumber = 4
            CordonDiameter = 10
            CordonLength = 1
            TrunkDiameter = 40
            TrunkHeight = 0.9
            RootDM = 2000
            RootNSC = 0.3
            TrunkNSC = 0.3
            CordonNSC = 0.3
            StartAge = 10
            script: same as in Validation.Sauvignonblanc.Marlborough_2Cane.VineFacts1.Row.TreeInitialisation
        RectangularZone Alley: Length=100; Width=1.5; Slope=0; AspectAngle=0; Altitude=50
          Report: same as Validation.Sauvignonblanc.RetainedNodeNum.RetainedNodNum.Alley.Report
          SurfaceOrganicMatter: InitialResidueName=wheat_stubble; InitialResidueType=wheat; InitialResidueMass=500; InitialStandingFraction=0; InitialCPR=0; InitialCNR=100
          Plant Slurp
          Fertiliser
          Irrigation
          Manager PastureInitialisation
            CultivarName = StaticCrop
            InitialRootDepth = 2000
            SowingDate = 02/25/2007 00:00:00
            RootDepth = 2000
            RFV = 10
            KLReductionFactor = -0.001
            KLReductionDepth = 150
            YKLModifiers =
            XDepth =
            MaxG = 0.004
            R50 = 150
            script: same as in Validation.Sauvignonblanc.Marlborough_2Cane.VineFacts1.Alley.PastureInitialisation
          Manager SetPastureVariables: same as Validation.Sauvignonblanc.Marlborough_2Cane.VineFacts1.Alley.SetPastureVariables
          Manager SetupPastureRootZones: same as Validation.Sauvignonblanc.Marlborough_2Cane.VineFacts1.Alley.SetupPastureRootZones
          Operations WinterRainfall
            2006-08-26  [Irrigation].Apply(45);
          Manager PlantVariables: same as Validation.Sauvignonblanc.RetainedNodeNum.RetainedNodNum.Alley.PlantVariables
          Soil: Latitude=0; Longitude=0
            LayerStructure: Thickness=[200, 200, 200, 200, 200, 200, 400, 400, 400, 600]
            Chemical
              Thickness  NO3N     NH4N  PH
              100        160.741  0     6.6
              200        11.1111  0     6.2
              300        1.19048  0     5.7
              300        1.19048  0     5.5
              300        0        0     5.5
              300        0        0     5.5
            WaterBalance SoilWater: same as Validation.Sauvignonblanc.Marlborough_2Cane.VineFacts1.Row.Soil.SoilWater
            SoilNitrogen: same as BaseSim.BaseSim.Vineyard.Soil.SoilNitrogen
            Organic: same as Validation.Sauvignonblanc.Marlborough_2Cane.VineFacts1.Row.Soil.Organic
            Sample Initial nitrogen: Thickness=[100, 200, 300, 300, 300, 300]; SWUnits=Volumetric; OCUnits=Total; PHUnits=Water
            CERESSoilTemperature
            OutputLayers: Thickness=[300, 300, 300]
            InitialWater: PercentMethod=1; FractionFull=1
            Physical: same as Validation.Sauvignonblanc.Seaview_4Cane08.Row.Soil.Physical
      Experiment OtherRegions
        Factors
          Factor Climate
            Specification=[Weather].FileName = Longlands.met, WAP.met, TOH.met, Dashwood.met, WRV.met
        Simulation OtherRegions
          Weather: FileName=WRV.met
          Clock: Start=2014-02-25; End=2020-05-01
          Summary
          SoilArbitrator Soil Arbitrator
          MicroClimate: a_interception=0; b_interception=1; c_interception=0; d_interception=0; soil_albedo=0.23; SoilHeatFluxFraction=0.4; MinimumHeightDiffForNewLayer=0; NightInterceptionFraction=0.5; ReferenceHeight=2
          RectangularZone Row: Length=100; Width=0.9; Slope=0; AspectAngle=0; Altitude=50
            Report: same as Validation.Sauvignonblanc.Marlborough_4Cane.VineFacts2.Row.Report
            Memo: same as BaseSim.BaseSim.Vineyard.Memo
            Plant Grapevine
            Manager TreeInitialisation
              CultivarName = SauvignonBlanc
              SowingDate = 02/25/2014 00:00:00
              VineDistance = 1.8
              BudNumber = 24
              CordonNumber = 2
              CordonDiameter = 10
              CordonLength = 1
              TrunkDiameter = 40
              TrunkHeight = 0.9
              RootDM = 2000
              RootNSC = 0.3
              TrunkNSC = 0.3
              CordonNSC = 0.3
              StartAge = 10
              script: same as in Validation.Sauvignonblanc.Marlborough_2Cane.VineFacts1.Row.TreeInitialisation
            Irrigation
            Fertiliser
            SurfaceOrganicMatter: InitialResidueName=wheat_stubble; InitialResidueType=wheat; InitialResidueMass=500; InitialStandingFraction=0; InitialCPR=0; InitialCNR=100
            Soil: same as Validation.Sauvignonblanc.Marlborough_2Cane.VineFacts1.Row.Soil
            Manager SetupTreeRootZones: same as Validation.Sauvignonblanc.Marlborough_2Cane.VineFacts1.Row.SetupTreeRootZones
            Operations VineIrrigation
            Operations WinterRainfall
              2002-05-28  [Irrigation].Apply(200);
            Manager PlantVariables: same as Validation.Sauvignonblanc.Marlborough_4Cane.VineFacts2.Row.PlantVariables
            Manager DripIrrigator: same as Validation.Sauvignonblanc.Marlborough_2Cane.VineFacts1.Row.DripIrrigator
            Manager HarvestNPruning: same as BaseSim.BaseSim.Vineyard.HarvestNPruning
          RectangularZone Alley: Length=100; Width=1.5; Slope=0; AspectAngle=0; Altitude=50
            Report: EventNames=[Clock].DoReport
              VariableNames:
                [Clock].Today
                [Clock].Today.Year
                [Clock].Today.DayOfYear
                [Weather].DaysSinceWinterSolstice as DAWS
            Manager PastureInitialisation
              CultivarName = StaticCrop
              InitialRootDepth = 2000
              SowingDate = 02/25/2014 00:00:00
              RootDepth = 2000
              RFV = 10
              KLReductionFactor = -0.001
              KLReductionDepth = 150
              YKLModifiers =
              XDepth =
              MaxG = 0.004
              R50 = 150
              script: same as in Validation.Sauvignonblanc.Marlborough_2Cane.VineFacts1.Alley.PastureInitialisation
            SurfaceOrganicMatter: InitialResidueName=wheat_stubble; InitialResidueType=wheat; InitialResidueMass=500; InitialStandingFraction=0; InitialCPR=0; InitialCNR=100
            Plant Slurp
            Fertiliser
            Irrigation
            Manager SetPastureVariables: same as Validation.Sauvignonblanc.Marlborough_2Cane.VineFacts1.Alley.SetPastureVariables
            Manager SetupPastureRootZones: same as Validation.Sauvignonblanc.Marlborough_2Cane.VineFacts1.Alley.SetupPastureRootZones
            Soil: same as Validation.Sauvignonblanc.Marlborough_2Cane.VineFacts1.Alley.Soil
            Operations WinterRainfall
              2002-05-28  [Irrigation].Apply(200);
            Manager PlantVariables
              script: same as in Validation.Sauvignonblanc.Marlborough_2Cane.VineFacts1.Alley.PlantVariables
    Folder Chardonnay
      Experiment Chardonnay
        Factors
          Factor Climate
            Specification=[Weather].FileName = Dashwood.met, Crownthorpe.met, LawnRoad.met, Hexton.met, Site1002_OYB.met, Matawhero.met
        Simulation Chardonnay
          Weather: FileName=Site1001_BRA.met
          Clock: Start=2014-02-25; End=2020-05-01
          Summary
          SoilArbitrator Soil Arbitrator
          MicroClimate: a_interception=0; b_interception=1; c_interception=0; d_interception=0; soil_albedo=0.23; SoilHeatFluxFraction=0.4; MinimumHeightDiffForNewLayer=0; NightInterceptionFraction=0.5; ReferenceHeight=2
          RectangularZone Row: Length=100; Width=0.9; Slope=0; AspectAngle=0; Altitude=50
            Memo: same as BaseSim.BaseSim.Vineyard.Memo
            Report: same as Validation.Sauvignonblanc.Marlborough_4Cane.VineFacts2.Row.Report
            Plant Grapevine
            Manager TreeInitialisation
              CultivarName = Chardonnay
              SowingDate = 02/25/2014 00:00:00
              VineDistance = 1.8
              BudNumber = 44
              CordonNumber = 4
              CordonDiameter = 10
              CordonLength = 1
              TrunkDiameter = 40
              TrunkHeight = 0.9
              RootDM = 2000
              RootNSC = 0.3
              TrunkNSC = 0.3
              CordonNSC = 0.3
              StartAge = 10
              script: same as in Validation.Sauvignonblanc.Marlborough_2Cane.VineFacts1.Row.TreeInitialisation
            Irrigation
            Fertiliser
            SurfaceOrganicMatter: InitialResidueName=wheat_stubble; InitialResidueType=wheat; InitialResidueMass=500; InitialStandingFraction=0; InitialCPR=0; InitialCNR=100
            Soil: same as Validation.Sauvignonblanc.Marlborough_2Cane.VineFacts1.Row.Soil
            Manager SetupTreeRootZones: same as Validation.Sauvignonblanc.Marlborough_2Cane.VineFacts1.Row.SetupTreeRootZones
            Operations VineIrrigation
            Operations WinterRainfall
              2002-05-28  [Irrigation].Apply(200);
            Manager PlantVariables: same as Validation.Sauvignonblanc.Marlborough_4Cane.VineFacts2.Row.PlantVariables
            Manager DripIrrigator: same as Validation.Sauvignonblanc.Marlborough_2Cane.VineFacts1.Row.DripIrrigator
            Manager HarvestNPruning: same as BaseSim.BaseSim.Vineyard.HarvestNPruning
          RectangularZone Alley: Length=100; Width=1.5; Slope=0; AspectAngle=0; Altitude=50
            Report: EventNames=[Row].Grapevine.Pruning
              VariableNames:
                [Clock].Today
                [Clock].Today.Year
                [Clock].Today.DayOfYear
                [Weather].DaysSinceWinterSolstice as DAWS
            SurfaceOrganicMatter: InitialResidueName=wheat_stubble; InitialResidueType=wheat; InitialResidueMass=500; InitialStandingFraction=0; InitialCPR=0; InitialCNR=100
            Plant Slurp
            Fertiliser
            Irrigation
            Manager PastureInitialisation: same as Validation.Sauvignonblanc.OtherRegions.OtherRegions.Alley.PastureInitialisation
            Manager SetPastureVariables: same as Validation.Sauvignonblanc.Marlborough_2Cane.VineFacts1.Alley.SetPastureVariables
            Manager SetupPastureRootZones: same as Validation.Sauvignonblanc.Marlborough_2Cane.VineFacts1.Alley.SetupPastureRootZones
            Soil: same as Validation.Sauvignonblanc.Marlborough_2Cane.VineFacts1.Alley.Soil
            Operations WinterRainfall
              2002-05-28  [Irrigation].Apply(200);
            Manager PlantVariables
              script: same as in Validation.Sauvignonblanc.Marlborough_2Cane.VineFacts1.Alley.PlantVariables
    Folder Merlot
      Experiment Merlot
        Factors
          Factor Climate: Specification=[Weather].FileName = Longlands.met, Twyford.met
        Simulation Merlot
          Weather: FileName=LongLands.met
          Clock: Start=2014-02-25; End=2020-05-01
          Summary
          SoilArbitrator Soil Arbitrator
          MicroClimate: a_interception=0; b_interception=1; c_interception=0; d_interception=0; soil_albedo=0.23; SoilHeatFluxFraction=0.4; MinimumHeightDiffForNewLayer=0; NightInterceptionFraction=0.5; ReferenceHeight=2
          RectangularZone Row: Length=100; Width=0.9; Slope=0; AspectAngle=0; Altitude=50
            Memo: same as BaseSim.BaseSim.Vineyard.Memo
            Report: same as Validation.Sauvignonblanc.Marlborough_4Cane.VineFacts2.Row.Report
            Plant Grapevine
            Manager TreeInitialisation
              CultivarName = Merlot
              SowingDate = 02/25/2014 00:00:00
              VineDistance = 1.8
              BudNumber = 44
              CordonNumber = 4
              CordonDiameter = 10
              CordonLength = 1
              TrunkDiameter = 40
              TrunkHeight = 0.9
              RootDM = 2000
              RootNSC = 0.3
              TrunkNSC = 0.3
              CordonNSC = 0.3
              StartAge = 10
              script: same as in Validation.Sauvignonblanc.Marlborough_2Cane.VineFacts1.Row.TreeInitialisation
            Irrigation
            Fertiliser
            SurfaceOrganicMatter: InitialResidueName=wheat_stubble; InitialResidueType=wheat; InitialResidueMass=500; InitialStandingFraction=0; InitialCPR=0; InitialCNR=100
            Soil: same as Validation.Sauvignonblanc.Marlborough_2Cane.VineFacts1.Row.Soil
            Manager SetupTreeRootZones: same as Validation.Sauvignonblanc.Marlborough_2Cane.VineFacts1.Row.SetupTreeRootZones
            Operations VineIrrigation
            Operations WinterRainfall
              2002-05-28  [Irrigation].Apply(200);
            Manager PlantVariables: same as Validation.Sauvignonblanc.Marlborough_4Cane.VineFacts2.Row.PlantVariables
            Manager DripIrrigator: same as Validation.Sauvignonblanc.Marlborough_2Cane.VineFacts1.Row.DripIrrigator
            Manager HarvestNPruning: same as BaseSim.BaseSim.Vineyard.HarvestNPruning
          RectangularZone Alley: same as Validation.Chardonnay.Chardonnay.Chardonnay.Alley
    Folder PinotNoir
      Experiment PinotNoir
        Factors
          Factor Climate
            Specification=[Weather].FileName = Site1001_BRA.met, Site1003_SEA.met, WAP.met, McArthur.met, Bannockburn.met, Gibbston.met, Pisa.met
        Simulation PinotNoir
          Weather: FileName=Pisa.met
          Clock: Start=2014-02-25; End=2020-05-01
          Summary
          SoilArbitrator Soil Arbitrator
          MicroClimate: a_interception=0; b_interception=1; c_interception=0; d_interception=0; soil_albedo=0.23; SoilHeatFluxFraction=0.4; MinimumHeightDiffForNewLayer=0; NightInterceptionFraction=0.5; ReferenceHeight=2
          RectangularZone Row: Length=100; Width=0.9; Slope=0; AspectAngle=0; Altitude=50
            Memo: same as BaseSim.BaseSim.Vineyard.Memo
            Report: same as Validation.Sauvignonblanc.Marlborough_4Cane.VineFacts2.Row.Report
            Plant Grapevine
            Manager TreeInitialisation
              CultivarName = PinotNoir
              SowingDate = 02/25/2014 00:00:00
              VineDistance = 1.8
              BudNumber = 44
              CordonNumber = 4
              CordonDiameter = 10
              CordonLength = 1
              TrunkDiameter = 40
              TrunkHeight = 0.9
              RootDM = 2000
              RootNSC = 0.3
              TrunkNSC = 0.3
              CordonNSC = 0.3
              StartAge = 10
              script: same as in Validation.Sauvignonblanc.Marlborough_2Cane.VineFacts1.Row.TreeInitialisation
            Irrigation
            Fertiliser
            SurfaceOrganicMatter: InitialResidueName=wheat_stubble; InitialResidueType=wheat; InitialResidueMass=500; InitialStandingFraction=0; InitialCPR=0; InitialCNR=100
            Soil: same as Validation.Sauvignonblanc.Marlborough_2Cane.VineFacts1.Row.Soil
            Manager SetupTreeRootZones: same as Validation.Sauvignonblanc.Marlborough_2Cane.VineFacts1.Row.SetupTreeRootZones
            Operations VineIrrigation
            Operations WinterRainfall
              2002-05-28  [Irrigation].Apply(200);
            Manager PlantVariables: same as Validation.Sauvignonblanc.Marlborough_4Cane.VineFacts2.Row.PlantVariables
            Manager DripIrrigator: same as Validation.Sauvignonblanc.Marlborough_2Cane.VineFacts1.Row.DripIrrigator
            Manager HarvestNPruning: same as BaseSim.BaseSim.Vineyard.HarvestNPruning
          RectangularZone Alley: Length=100; Width=1.5; Slope=0; AspectAngle=0; Altitude=50
            Report: EventNames=[Row].Grapevine.Pruning
              VariableNames:
                [Clock].Today
                [Clock].Today.Year
                [Clock].Today.DayOfYear
                [Weather].DaysSinceWinterSolstice as DAWS
            SurfaceOrganicMatter: InitialResidueName=wheat_stubble; InitialResidueType=wheat; InitialResidueMass=500; InitialStandingFraction=0; InitialCPR=0; InitialCNR=100
            Plant Slurp
            Fertiliser
            Irrigation
            Manager PastureInitialisation
              CultivarName = StaticCrop
              InitialRootDepth = 2000
              SowingDate = 01/01/2014 00:00:00
              RootDepth = 2000
              RFV = 10
              KLReductionFactor = -0.001
              KLReductionDepth = 150
              YKLModifiers =
              XDepth =
              MaxG = 0.004
              R50 = 150
              script: same as in Validation.Sauvignonblanc.Marlborough_2Cane.VineFacts1.Alley.PastureInitialisation
            Manager SetPastureVariables: same as Validation.Sauvignonblanc.Marlborough_2Cane.VineFacts1.Alley.SetPastureVariables
            Manager SetupPastureRootZones: same as Validation.Sauvignonblanc.Marlborough_2Cane.VineFacts1.Alley.SetupPastureRootZones
            Soil: same as Validation.Sauvignonblanc.Marlborough_2Cane.VineFacts1.Alley.Soil
            Operations WinterRainfall
              2002-05-28  [Irrigation].Apply(200);
            Manager PlantVariables
              script: same as in Validation.Sauvignonblanc.Marlborough_2Cane.VineFacts1.Alley.PlantVariables
    Folder PinotGris
      Experiment PinotGris
        Factors
          Factor Climate
            Specification=[Weather].FileName = Crownthorpe.met, Site1003_SEA.met, Site1004_RPC.met
        Simulation PinotGris
          Weather: FileName=LongLands.met
          Clock: Start=2014-02-25; End=2020-05-01
          Summary
          SoilArbitrator Soil Arbitrator
          MicroClimate: a_interception=0; b_interception=1; c_interception=0; d_interception=0; soil_albedo=0.23; SoilHeatFluxFraction=0.4; MinimumHeightDiffForNewLayer=0; NightInterceptionFraction=0.5; ReferenceHeight=2
          RectangularZone Row: Length=100; Width=0.9; Slope=0; AspectAngle=0; Altitude=50
            Memo: same as BaseSim.BaseSim.Vineyard.Memo
            Report: same as Validation.Sauvignonblanc.Marlborough_4Cane.VineFacts2.Row.Report
            Plant Grapevine
            Manager TreeInitialisation
              CultivarName = PinotGris
              SowingDate = 02/25/2014 00:00:00
              VineDistance = 1.8
              BudNumber = 44
              CordonNumber = 4
              CordonDiameter = 10
              CordonLength = 1
              TrunkDiameter = 40
              TrunkHeight = 0.9
              RootDM = 2000
              RootNSC = 0.3
              TrunkNSC = 0.3
              CordonNSC = 0.3
              StartAge = 10
              script: same as in Validation.Sauvignonblanc.Marlborough_2Cane.VineFacts1.Row.TreeInitialisation
            Irrigation
            Fertiliser
            SurfaceOrganicMatter: InitialResidueName=wheat_stubble; InitialResidueType=wheat; InitialResidueMass=500; InitialStandingFraction=0; InitialCPR=0; InitialCNR=100
            Soil: same as Validation.Sauvignonblanc.Marlborough_2Cane.VineFacts1.Row.Soil
            Manager SetupTreeRootZones: same as Validation.Sauvignonblanc.Marlborough_2Cane.VineFacts1.Row.SetupTreeRootZones
            Operations VineIrrigation
            Operations WinterRainfall
              2002-05-28  [Irrigation].Apply(200);
            Manager PlantVariables: same as Validation.Sauvignonblanc.Marlborough_4Cane.VineFacts2.Row.PlantVariables
            Manager DripIrrigator: same as Validation.Sauvignonblanc.Marlborough_2Cane.VineFacts1.Row.DripIrrigator
            Manager HarvestNPruning: same as BaseSim.BaseSim.Vineyard.HarvestNPruning
          RectangularZone Alley: same as Validation.Chardonnay.Chardonnay.Chardonnay.Alley
  Folder Optimization
    Experiment ParameterOptimize
      Factors
        Permutation
          Factor Climate: Specification=[Weather].FileName = Site1001_BRA.met
      Simulation OptimizationBase
        Weather: FileName=Site1004_RPC.met
        Clock: Start=2004-01-01; End=2005-07-01
        Summary
        SoilArbitrator Soil Arbitrator
        Zone Vineyard: Area=1; Slope=0; AspectAngle=0; Altitude=50
          Soil: SoilType=Sedementary; LocalName=Lincoln; Latitude=0; Longitude=0
            Physical
              Thickness  BD   AirDry  LL15  DUL   SAT
              100        1.2  0.08    0.16  0.33  0.5
              200        1.2  0.16    0.16  0.33  0.5
              300        1.2  0.15    0.15  0.31  0.44
              300        1.2  0.13    0.13  0.27  0.46
              300        1.2  0.15    0.15  0.3   0.44
              300        1.2  0.15    0.15  0.3   0.44
              SoilCrop GrapevineSoil: LL=[0.16, 0.16, 0.15, 0.13, 0.15, 0.15]; KL=[0.1, 0.06, 0.04, 0.01, 0.0051, 0.002]; XF=[1, 1, 1, 1, 0.5, 0.2]
            WaterBalance SoilWater: same as BaseSim.BaseSim.Vineyard.Soil.SoilWater
            SoilNitrogen: same as BaseSim.BaseSim.Vineyard.Soil.SoilNitrogen
            Organic: same as BaseSim.BaseSim.Vineyard.Soil.Organic
            Chemical: same as BaseSim.BaseSim.Vineyard.Soil.Chemical
            InitialWater Initial water: PercentMethod=0; FractionFull=1
            Sample: Thickness=[100, 200, 300, 300, 300, 300]; SWUnits=Volumetric; OCUnits=Total; PHUnits=Water
            CERESSoilTemperature
          Memo: same as BaseSim.BaseSim.Vineyard.Memo
          SurfaceOrganicMatter: InitialResidueName=Grapevine; InitialResidueType=Grapevine; InitialResidueMass=2000; InitialStandingFraction=0; InitialCPR=0; InitialCNR=80
          MicroClimate: a_interception=0; b_interception=1; c_interception=0; d_interception=0; soil_albedo=0.23; SoilHeatFluxFraction=0.4; MinimumHeightDiffForNewLayer=0; NightInterceptionFraction=0.5; ReferenceHeight=2
          Irrigation
          Fertiliser
          Plant Grapevine
          Report: EventNames=[Clock].DoReport
          Folder Management
            Operations Sowing
              2004-01-01  [Grapevine].Sow(population: 0.231481, cultivar: "SauvignonBlanc", depth: 80, rowSpacing: 2400, budNumber:24);
            Manager ExtraVariables
              CordonDiameter = 10
```csharp
using APSIM.Shared.Utilities;
using System.Xml.Serialization;
using Models;
using Models.PMF;
using Models.Core;
using System;

namespace Models
{
    [Serializable] 
    public class Script : Model
    {
        [Link] Clock Clock;
        [Link] Plant Grapevine;
        [Link] Zone zone;

        [Description("CordonDiameter_mm")]         
        public double CordonDiameter { get; set; }  //mm
        

        [EventSubscribe("PlantSowing")]
        private void OnPlantSowing(object sender, EventArgs e)
        {
            zone.Set("Grapevine.Cordon.CordonDiameter.FixedValue", CordonDiameter);      
        }

     }
}
```
            Manager Pruning
              PruneDateString = 1-May
```csharp
using System.Xml.Serialization;
using Models.PMF.Interfaces;
using Models.PMF;
using Models.Core;
using System.Collections.Generic;
using System;

namespace Models
{
    [Serializable] 
    [System.Xml.Serialization.XmlInclude(typeof(Model))]
    public class Script : Model
    {
        [Link] Plant Grapevine;
        [Link] Clock Clock;

        [Description("Prune Date")]
        public string PruneDateString { get; set; }
        [XmlIgnore] private DateTime PruneDate { get; set; }
        [XmlIgnore] private RemovalFractions Remove { get; set; }
        
        [EventSubscribe("StartOfSimulation")]
        private void OnSimulationCommencing(object sender, EventArgs e)
        {
            Remove = new RemovalFractions();
        }
        
        [EventSubscribe("DoManagement")]
        private void OnDoManagement(object sender, EventArgs e)
        {
            //Set up  array of remove fractions to send with Cut method.  Each member in the array corresponds to an organ in the same order they are set up in.
            PruneDate = DateTime.Parse(PruneDateString);
                        
            if (PruneDate.Month == Clock.Today.Month && PruneDate.Day == Clock.Today.Day)
            {
                Remove.SetPhenologyStage = 1;
                Grapevine.RemoveBiomass("Prune", Remove);
            }
        }
    }
}
```
        Manager ParameterTest
```csharp
using System.Xml.Serialization;
using Models.PMF.Interfaces;
using Models.PMF;
using Models.Core;
using System.Collections.Generic;
using System;

namespace Models
{
    [Serializable] 
    [System.Xml.Serialization.XmlInclude(typeof(Model))]
    public class Script : Model
    {
        [Link] Zone zone;
        [Link] Summary Summary;

       // [Description("endotarget")]
       // public double endotarget {get; set;}

        //[Description("budding")]
        //public double budding {get; set;}

        //[Description("FlowerTarget")]
        //public double FlowerTarget {get; set;}

        //[Description("VeraTarget")]
        //public double VeraTarget {get; set;}
      //  [Description("chill_a")]
       // public double chill_a  {get; set;}

       // [Description("chill_c")]
       // public double chill_c  {get; set;}
    
        //Description("EndoTarget")]
        //public double EndoTarget  {get; set;}
        //[Description("FloweringTarget")]
        //public double FloweringTarget  {get; set;}

                
        [EventSubscribe("PlantSowing")]
        private void OnPlantSowing(object sender, EventArgs e)
        {
           // zone.Set("Grapevine.Phenology.EndoDormancy.Target.BaseTarget.FixedValue", endotarget);
           // zone.Set("Grapevine.Phenology.Budding.Target.FixedValue", budding);

            //zone.Set("Grapevine.Phenology.Flowering.Target.FixedValue", FlowerTarget);
            //zone.Set("Grapevine.Phenology.BerryDevelopment.Target.Base.FixedValue", VeraTarget);

            //zone.Set("Grapevine.Phenology.Budding.Target.ChillingTadjustment.A", chill_a);
            //zone.Set("Grapevine.Phenology.Budding.Target.ChillingTadjustment.C", chill_c);
            //zone.Set("Grapevine.Phenology.EndoDormancy.Target.FixedValue", EndoTarget);
            //zone.Set("Grapevine.Phenology.Flowering.Target.FixedValue", FloweringTarget);                      
        }
    }
}
```
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