Simulations
  Replacements
    Plant MCSP: CropType=MCSP
      OrganArbitrator: NArbitrationOption=RelativeAllocation; DMArbitrationOption=RelativeAllocation
      Phenology: Emerged=false
        AirTemperatureFunction ThermalTime
          XYPairs: X=[0, 30, 40]; Y=[0, 30, 0]
        GerminatingPhase Germinating: Start=Sowing; End=Germination
        EmergingPhase Emerging: Start=Germination; End=Emergence; ShootLag=0; ShootRate=0
          VariableReference ThermalTime: VariableName=[Phenology].ThermalTime.Value
        GenericPhase CanopyExpanding: Start=Emergence; End=StartReproductive
          Constant Target: Value=1000
          VariableReference ThermalTime: VariableName=[Phenology].ThermalTime.Value
        GenericPhase YieldIncreasing: Start=StartReproductive; End=StartSenescence
          Constant Target: Value=600
          VariableReference ThermalTime: VariableName=[Phenology].ThermalTime.Value
        GenericPhase Senescing: Start=StartSenescence; End=EndReproductive
          Constant Target: Value=600
          VariableReference ThermalTime: VariableName=[Phenology].ThermalTime.Value
        GenericPhase Maturing: Start=EndReproductive; End=Maturity
          Constant Target: Value=600
          VariableReference ThermalTime: VariableName=[Phenology].ThermalTime.Value
        EndPhase ReadyForHarvest: Start=Maturity; End=Unused
          VariableReference ThermalTime: VariableName=[Phenology].ThermalTime.Value
        AccumulateFunction AccumulatedThermalTime: StartStageName=Emergence; EndStageName=Maturity
          VariableReference ThermalTime: VariableName=[Phenology].ThermalTime.Value
        AccumulateFunction AccumulatedEmergingThermalTime: StartStageName=Germination; EndStageName=Emergence
          VariableReference ThermalTime: VariableName=[Phenology].ThermalTime.Value
      Root: InitialDM=0.2; SpecificRootLength=40000; KNO3_yProperty=[0.02, 0.02]; KNO3_xRootLength=[0, 0.003]; KNH4_yProperty=[0, 0]; KNH4_xRootLength=[0, 0.003]; NuptakeSupply=0
        CompositeBiomass Live: Propertys=[[Root].LayerLive]
        CompositeBiomass Dead: Propertys=[[Root].LayerDead]
        LinearInterpolationFunction KLModifier: XProperty=[Leaf].LAI
          XYPairs: X=[0, 200, 1500]; Y=[1, 1, 0]
        Constant SoilWaterEffect: Value=1
        Constant MaxDailyNUptake: Value=12
        Constant SenescenceRate: Value=0
        PhaseLookup PartitionFraction
          PhaseLookupValue: Start=Germination; End=Maturity
            VariableReference PartitionFraction: VariableName=[RootProportion].Value
        Constant MaximumNConc: Value=0.009
        Constant MinimumNConc: Value=0.009
        PhaseBasedSwitch NitrogenDemandSwitch: Start=Germination; End=Maturity
        Constant TemperatureEffect: Value=1
        Constant MaximumRootDepth: Value=1500
        MultiplyFunction RootFrontVelocity
          LessThanFunction RootFrontVelocity
            VariableReference: VariableName=[Phenology].AccumulatedThermalTime.Value
            Constant Criteria: Value=2010
            Constant IfTrue: Value=10
            Constant IfFalse: Value=0
          VariableReference ThermalTime: VariableName=[Phenology].ThermalTime.Value
      SimpleLeaf Leaf
        zero: BiomassYesterday, LAI, Height, FRGR, PotentialEP, K, KDead, DeltaBiomass, LAIDead, WaterAllocation
        XYPairs FT: X=[5, 20, 25, 40]; Y=[1, 1, 1, 1, 1]
        XYPairs FVPD: X=[0, 10, 50]; Y=[0, 0, 0]
        Biomass Live
        Biomass Dead
        Constant NConc: Value=0.008
        PhaseLookup NitrogenDemandSwitch
          PhaseLookupValue PreErmergence: Start=Sowing; End=Emergence
            Constant Function: Value=0
          PhaseLookupValue Expanding: Start=Emergence; End=StartSenescence
            Constant Function: Value=1
          PhaseLookupValue Senescence: Start=StartSenescence; End=EndReproductive
            Constant: Value=0
          PhaseLookupValue Mature: Start=EndReproductive; End=Maturity
            Constant: Value=0
        DeltaFunction PotentialBiomass
          SigmoidFunction2 Integral
            VariableReference Ymax1: VariableName=[Ymax].Value
            VariableReference XValue: VariableName=[Phenology].AccumulatedThermalTime.Value
        PartitionFractionDemandFunction DMDemandFunction
          PhaseLookup PartitionFraction
            PhaseLookupValue PreErmergence: Start=Sowing; End=Emergence
              Constant Function: Value=0
            PhaseLookupValue Expanding: Start=Emergence; End=StartReproductive
              SubtractFunction DMPartitionCoefficient
                Constant: Value=1
                VariableReference RootFraction: VariableName=[RootProportion].Value
            PhaseLookupValue YieldIncreasing: Start=StartReproductive; End=StartSenescence
              DivideFunction
                SubtractFunction Stover
                  MultiplyFunction StoverAtMaturity
                    VariableReference TotalBiomassAtMaturity: VariableName=[Ymax].Value
                    SubtractFunction AboveGroundProportion
                      Constant: Value=1
                      VariableReference RootFraction: VariableName=[RootProportion].Value
                    SubtractFunction StoverProportion
                      Constant: Value=1
                      VariableReference HI: VariableName=[HarvestIndex].Value
                  MultiplyFunction StoverAtStartReproductive
                    VariableReference BiomassAtStartReproductive: VariableName=[TotalBiomassAtStartReproductive].Value
                    SubtractFunction AboveGroundProportion
                      Constant: Value=1
                      VariableReference RootFraction: VariableName=[RootProportion].Value
                SubtractFunction TotalBiomass
                  VariableReference BiomassAtStartSenescence: VariableName=[TotalBiomassAtStartSenescence].Value
                  VariableReference BiomassAtStartReproductive: VariableName=[TotalBiomassAtStartReproductive].Value
            PhaseLookupValue Maturing: Start=StartSenescence; End=Maturity
              Constant Function: Value=0
        PhaseLookup CoverFunction
          PhaseLookupValue PreErmergence: Start=Sowing; End=Emergence
            Constant Function: Value=0
          PhaseLookupValue Expanding: Start=Emergence; End=StartSenescence
            SigmoidFunction2 SigCoverFunction
              Constant Ymax: Value=0.97
              VariableReference XValue: VariableName=[Phenology].AccumulatedThermalTime.Value
          PhaseLookupValue Senescence: Start=StartSenescence; End=Maturity
            MultiplyFunction TotalCoverLoss
              OnEventFunction MaxCoverFunction: SetEvent=StartSenescence; ReSetEvent=never
                Constant PreEventValue: Value=0
                VariableReference PostEventValue: VariableName=[Leaf].CoverFunction.Expanding.SigCoverFunction.Ymax.Value
              SubtractFunction LossOfCover
                Constant: Value=0.999
                MultiplyFunction PCLoss
                  DivideFunction SenescenceRate
                    Constant Inverse: Value=1
                    VariableReference Duration: VariableName=[Phenology].Senescing.Target.Value
                  SubtractFunction TTSenesce
                    VariableReference XValue: VariableName=[Phenology].AccumulatedThermalTime.Value
                    OnEventFunction TTToSenescence: SetEvent=StartSenescence; ReSetEvent=Maturity
                      VariableReference XValue: VariableName=[Phenology].AccumulatedThermalTime.Value
                      Constant PreEventValue: Value=3000
                      Constant PostEventValue: Value=0
          PhaseLookupValue Mature: Start=Maturity; End=Unused
            Constant: Value=0
        Constant FRGRFunction: Value=1
        Constant HeightFunction: Value=150
        Constant ExtinctionCoefficientFunction: Value=0.5
      GenericAboveGroundOrgan Product
        Biomass Live
        Biomass Dead
        Constant MaximumNConc: Value=0.012
        Constant MinimumNConc: Value=0.008
        PartitionFractionDemandFunction DMDemandFunction
          PhaseLookup PartitionFraction
            PhaseLookupValue PreErmergence: Start=Sowing; End=Emergence
              Constant Function: Value=0
            PhaseLookupValue Expanding: Start=Emergence; End=StartReproductive
              Constant Function: Value=0
            PhaseLookupValue YieldIncreasing: Start=StartReproductive; End=StartSenescence
              SubtractFunction ProductProportion
                Constant: Value=1
                VariableReference RootFraction: VariableName=[RootProportion].Value
                VariableReference StoverFraction
                  VariableName=[Leaf].DMDemandFunction.PartitionFraction.YieldIncreasing.Value
            PhaseLookupValue Maturing: Start=StartSenescence; End=Maturity
              SubtractFunction DMPartitionCoefficient
                Constant: Value=1
                VariableReference RootFraction: VariableName=[RootProportion].Value
        SubtractFunction WaterContent
          Constant One: Value=1
          VariableReference DMcontent: VariableName=[ProductDMProportion].Value
      Nodule
        Biomass Live
        Biomass Dead
        Constant FixationSwitch: Value=0
        Constant MaximumNConc: Value=0
        Constant MinimumNConc: Value=0
        Constant DMDemandFunction: Value=0
        Constant FT: Value=1
        Constant FW: Value=1
        Constant FWlog: Value=0.01
        Constant FixationMetabolicCost: Value=0
        Constant SpecificNitrogenaseActivity: Value=0
      Summariser
        CompositeBiomass Total
          Propertys=[[Leaf].Live, [Leaf].Dead, [Product].Live, [Product].Dead, [Root].Live, [Root].Dead]
      Constant ExpectedYield: Value=800
      LinearInterpolationFunction HarvestIndex: XProperty=[ExpectedYield].Value
        XYPairs: X=[0, 696, 1392]; Y=[0.14, 0.46, 0.78]
      Constant RootProportion: Value=0.1
      Constant ProductDMProportion: Value=0.87
      MultiplyFunction DryYield
        VariableReference FreshYld: VariableName=[ExpectedYield].Value
        VariableReference DMPercent: VariableName=[ProductDMProportion].Value
      SigmoidFunction2 TotalBiomassAtStartReproductive
        VariableReference Ymax1: VariableName=[Ymax].Value
        VariableReference XValue: VariableName=[Phenology].CanopyExpanding.Target.Value
      SigmoidFunction2 TotalBiomassAtStartSenescence
        AddFunction XValue
          VariableReference CanopyExpandingTT: VariableName=[Phenology].CanopyExpanding.Target.Value
          VariableReference YieldIncreasingTT: VariableName=[Phenology].YieldIncreasing.Target.Value
        VariableReference Ymax1: VariableName=[Ymax].Value
      DivideFunction Ymax
        VariableReference DryYield1: VariableName=[DryYield].Value
        LessThanFunction
          VariableReference: VariableName=[HarvestIndex].Value
          Constant Criteria: Value=0.011
          Constant IfTrue: Value=1
          VariableReference IfFalse: VariableName=[HarvestIndex].Value
        SubtractFunction AboveGroundDM
          Constant Function: Value=1
          VariableReference RootFraction: VariableName=[RootProportion].Value
      Cultivar Dash
      Cultivar Barley_Spring: Alias=Barley_Spring
        Command:
          [Root].MaximumRootDepth.Value = 1000
          [Root].RootFrontVelocity.RootFrontVelocity.Criteria.Value = 2010
          [Root].RootFrontVelocity.RootFrontVelocity.IfTrue.Value = 0.5
          [Leaf].CoverFunction.Expanding.SigCoverFunction.Xo = 540
          [Leaf].CoverFunction.Expanding.SigCoverFunction.b = 120
          [Leaf].CoverFunction.Expanding.SigCoverFunction.Ymax.Value = 0.97
          [Leaf].PotentialBiomass.Integral.Xo = 1080
          [Leaf].PotentialBiomass.Integral.b = 216
          [TotalBiomassAtStartReproductive].Xo = 1080
          [TotalBiomassAtStartReproductive].b = 216
          [TotalBiomassAtStartSenescence].Xo = 1080
          [TotalBiomassAtStartSenescence].b = 216
          [ExpectedYield].Value = 800
          [RootProportion].Value = 0.1
          [HarvestIndex].XYPairs.X = 0,1150
          [HarvestIndex].XYPairs.Y = 0.14,0.6
          [ProductDMProportion].Value = 0.87
          [Phenology].CanopyExpanding.Target.Value = 1021
          [Phenology].YieldIncreasing.Target.Value= 479
          [Phenology].Senescing.Target.Value = 300
          [Phenology].Maturing.Target.Value = 300
          [leaf].NConc.Value = 0.005
          [Product].MinimumNConc.Value = 0.005
          [Product].MaximumNConc.Value = 0.012
          [Root].MinimumNConc.Value = 0.009
          [Root].MaximumNConc.Value = 0.009
  DataStore
  Tests TestsBinary
    Test:
      SimulationName  TableName  Type       ColumnNames                        Parameters
      MCSPTestBase    Report     Tolerance  ExtraVariables.Script.AccumPlantN  1,1
      MCSPTestBase    Report     Tolerance  ExtraVariables.Script.AccumEP      1,1
      MCSPTestBase    Report     Tolerance  MCSP.Summariser.Total.Wt           1,1
  Simulation MCSPTestBase: Area=0; Slope=0
    Weather: FileName=%root%\Tests\WeatherFiles\lincoln.met
    Clock: StartDate=1998-10-14; EndDate=1999-07-01
    Summary
    SoilArbitrator Soil Arbitrator
    Zone Field: Area=0; Slope=0
      Soil: Latitude=0; Longitude=0
        Analysis: Thickness=[100, 200, 300, 300, 300, 300]; PH=[6.6, 6.2, 5.7, 5.5, 5.5, 5.5]; PHUnits=Water; BoronUnits=HotWater
        InitialWater Initial water: PercentMethod=EvenlyDistributed; FractionFull=1
        Water
          Thickness  BD   AirDry  LL15  DUL   SAT
          100        1.2  0.08    0.13  0.33  0.5
          200        1.2  0.13    0.13  0.33  0.5
          300        1.2  0.1     0.1   0.31  0.44
          300        1.2  0.06    0.06  0.15  0.46
          300        1.2  0.04    0.04  0.1   0.44
          300        1.2  0.02    0.02  0.06  0.44
          SoilCrop MCSPSoil: LL=[0.13, 0.13, 0.1, 0.08, 0.11, 0.11]; KL=[0.08, 0.08, 0.08, 0.08, 0.08, 0.08]; XF=[1, 1, 1, 1, 1, 1]
          SoilCrop PotatoSoil: LL=[0.13, 0.13, 0.27, 0.27, 0.3, 0.3]; KL=[0.1, 0.06, 0.03, 0.01, 0, 0]; XF=[1, 1, 0.1, 0, 0, 0]
        SoilWater: residueinterception=0; SummerDate=1-Nov; SummerU=9; SummerCona=4.4; WinterDate=1-Apr; WinterU=9; WinterCona=4.4; DiffusConst=88; DiffusSlope=35.4; Salb=0.18; CN2Bare=68; CNRed=20; CNCov=0.8; slope=0; discharge_width=0; catchment_area=0; max_pond=0
          Thickness  SWCON  KLAT
          100        0.55   0
          200        0.55   0
          300        0.55   0
          300        0.55   0
          300        0.55   0
          300        0.55   0
        SoilNitrogen: fom_type=[default, manure, mucuna, lablab, shemp, stable]; fract_carb=[0.2, 0.3, 0.54, 0.57, 0.45, 0]; fract_cell=[0.7, 0.3, 0.37, 0.37, 0.47, 0.1]; fract_lign=[0.1, 0.4, 0.09, 0.06, 0.08, 0.9]; wfpsN2N2O_x=[22, 88]; wfpsN2N2O_y=[0.1, 1]; oc=[1.83566, 1.46334, 1.19884, 1.0301, 0.470338, 0.470138]
        SoilOrganicMatter: RootCN=30; RootWt=3000; SoilCN=11.5; EnrACoeff=7.4; EnrBCoeff=0.2; OCUnits=Total
          Thickness  OC    FBiom  FInert
          100        1.82  0.025  0.3
          200        1.47  0.025  0.4
          300        1.2   0.015  0.75
          300        1.03  0.01   0.9
          300        0.47  0.01   0.96
          300        0.47  0.01   0.96
        Sample Initial nitrogen: NO3Units=kgha; NH4Units=ppm; SWUnits=Volumetric; OCUnits=Total; PHUnits=Water
          Thickness  NO3  NH4
          100        270  0
          200        30   0
          300        5    0
          300        5    0
          300        0    0
          300        0    0
      MicroClimate: air_pressure=1010; soil_emissivity=0.96; sun_angle=15; soil_heat_flux_fraction=0.4; night_interception_fraction=0.5; windspeed_default=3; refheight=2; albedo=0.26; emissivity=0.96; gsmax=0.01; r50=200; a_interception=0; b_interception=1; c_interception=0; d_interception=0; soil_albedo=0.23
      Irrigation
      Fertiliser
      Manager MCSPSowingRule
        CultivarName = Wheat_Winter
        InitialRootDepth = 10
        SowingDate = 1998-10-14
```csharp
        using System;
        using Models.Core;
        using Models.PMF;
        namespace Models
        {
           [Serializable] 
           [System.Xml.Serialization.XmlInclude(typeof(Model))]
            public class Script : Model
            {      
               [Link] Plant MCSP;
               [Link] Clock Clock;

               [Description("Cultivar")]
               public string CultivarName { get; set; }
               [Description("Initial Root Depth")]
               public double InitialRootDepth { get; set; }
			   [Description("Sowing Date")]
               public DateTime SowingDate { get; set; }

               
               [EventSubscribe("DoManagement")]
               private void OnDoManagement(object sender, EventArgs e)
               {
				if (Clock.Today.Date == SowingDate)
                    MCSP.Sow(cultivar:CultivarName, population:1, depth:InitialRootDepth, rowSpacing:150);
                //PMFCrop.Sow(... Contains the following arguements:
                //Population  double  Optional  Seeds sowing/m2.  Default is zero
                //Cultivar    string  Required  "NameOfCultivar"
                //Depth       double  Optional  Depth (mm) seed sown.   Default is 100mm 
                //MaxCover    double  Optional  Proportion (0-1) of the ground row crop will cover.   Default is 1.0
                //BudNumber   double  Optional  Number of mainstems per seed sown.  Default is 1.0
                //RowSpacing  double  Optional  Spaceing (mm) between drill rows when crop is sown.  Default is 150mm
                //CropClass   string  Optional  Crop class to instantiate when crop is sown.  Default is "Plant"
			   }
            }
        }
```
      Manager ExtraVariables
```csharp
using System;
using Models.Core;
using System.Collections.Generic;
using System.Text;
using Models.Soils;
using Models.PMF;
using Models;
using System.Xml.Serialization;
using APSIM.Shared.Utilities;

namespace Models
{
	[Serializable] 
	public class Script : Model
	{      
		[Link] Clock Clock;
		[Link] Soils.Soil Soil;
		[Link] Models.SurfaceOM.SurfaceOrganicMatter SOM;
		[Link] Weather Met;   
		[Link] Fertiliser Fert;
		[Link] Irrigation Irrig;  
		[Link] Plant MCSP;
        [Link] Zone zone;
					
		[XmlIgnore] public bool InitialDay { get; set; }
		
		[XmlIgnore] public double AccumPlantN { get; set; }
		[XmlIgnore] public double AccumMineralisation { get; set; }
		[XmlIgnore] public double AccumDenit { get; set; }
		[XmlIgnore] public double AccumFert { get; set; }
		[XmlIgnore] public double AccumLeach { get; set; }
		[XmlIgnore] public double AccumDetach { get; set; }
		[XmlIgnore] public double DeltaSoilOMN { get; set; }
		[XmlIgnore] public double DeltaSurfaceOMN { get; set; }
		[XmlIgnore] public double DeltaSoilMineralN { get; set; }
		[XmlIgnore] public double SoilNitrogenContent { get; set; }
		
		[XmlIgnore] public double AccumEO { get; set; }
		[XmlIgnore] public double AccumEP { get; set; }
		[XmlIgnore] public double AccumES { get; set; }
		[XmlIgnore] public double AccumDrainage { get; set; }
		[XmlIgnore] public double AccumRunoff { get; set; }
		[XmlIgnore] public double AccumOutflowLat { get; set; }
		[XmlIgnore] public double AccumIrrigation { get; set; }
		[XmlIgnore] public double AccumRainfall { get; set; }
		[XmlIgnore] public double SoilWaterDeficit { get; set; }
	
		[XmlIgnore] public double  InitialSoilOMN { get; set; }
		[XmlIgnore] public double  InitialSurfaceOMN { get; set; }
		[XmlIgnore] public double  InitialMineralN { get; set; }
		
		[XmlIgnore] public double SWC { get; set; }
		[XmlIgnore] public double DUL { get; set; }
		[XmlIgnore] public double OutFlowLat { get; set; }

		[XmlIgnore] public double FomN { get; set; }
		[XmlIgnore] public double BiomN { get; set; }
		[XmlIgnore] public double HumN { get; set; }
		[XmlIgnore] public double OrganicN { get; set; }
		[XmlIgnore] public double NO3N { get; set; }
		[XmlIgnore] public double NH4N { get; set; }
		[XmlIgnore] public double UreaN { get; set; }
		[XmlIgnore] public double MineralN { get; set; }
		[XmlIgnore] public double DltNMinRes { get; set; }
		[XmlIgnore] public double DltNMinTot { get; set; }
		
        [EventSubscribe("Commencing")]
        private void OnSimulationCommencing(object sender, EventArgs e)
        {
			InitialDay = true;
		}	   
		
		[EventSubscribe("DoManagement")]
		private void OnDoManagement(object sender, EventArgs e)
		{
			//!!!!!! Nitrogen balance components !!!!!!
			//!!!!!!^^^^^^^^^^^^^^^^^^^^^^^^^^^^^!!!!!!
           	FomN = MathUtilities.Sum(Soil.SoilNitrogen.FOMN);
			HumN = MathUtilities.Sum(Soil.SoilNitrogen.HumicN);
		    BiomN = MathUtilities.Sum(Soil.SoilNitrogen.MicrobialN);
			OrganicN = FomN + HumN + BiomN;
			NO3N = MathUtilities.Sum(Soil.NO3N);
			NH4N = MathUtilities.Sum(Soil.NH4N);
			UreaN = MathUtilities.Sum(Soil.SoilNitrogen.urea);
			MineralN = NO3N + NH4N + UreaN; 
			DltNMinRes = MathUtilities.Sum(Soil.SoilNitrogen.dlt_n_min_res);
			DltNMinTot = MathUtilities.Sum(Soil.SoilNitrogen.MineralisedN);
            int layers = Soil.Thickness.Length;
			if (InitialDay == true)
			{
				InitialSurfaceOMN = SOM.N;
				InitialSoilOMN = OrganicN;
				InitialMineralN = MineralN;
				InitialDay = false;
			}
			DeltaSurfaceOMN = SOM.N - InitialSurfaceOMN;
			AccumLeach = AccumLeach - Soil.SoilWater.LeachNH4 - Soil.SoilWater.LeachNO3 - Soil.SoilWater.LeachUrea; //Fails
            AccumMineralisation += MathUtilities.Sum(Soil.SoilNitrogen.MineralisedN);
            AccumDenit -= MathUtilities.Sum(Soil.SoilNitrogen.Denitrification);
			AccumPlantN -= (double)zone.Get("MCSP.Root.NUptake");
			DeltaSoilOMN = OrganicN - InitialSoilOMN;
			DeltaSoilMineralN = MineralN - InitialMineralN;
			SoilNitrogenContent = MineralN;
			
			//!!!!!! Water balance components !!!!!!
			//!!!!!!^^^^^^^^^^^^^^^^^^^^^^^^^^!!!!!!

			AccumRainfall += Met.Rain;
			//AccumEP -= (double)zone.Get("[MCSP].Leaf.Transpiration");
            AccumEP -= (double)zone.Get("MCSP.Root.WaterUptake");
			SoilWaterDeficit =  (SWC - DUL);
			double OutFlowLat = MathUtilities.Sum(Soil.SoilWater.outflow_lat);
			AccumOutflowLat -= OutFlowLat;
		}
		
		[EventSubscribe("DoManagementCalculations")]
		private void OnDoManagementCalculations(object sender, EventArgs e)
		{
			FomN = MathUtilities.Sum(Soil.SoilNitrogen.FOMN);
			HumN = MathUtilities.Sum(Soil.SoilNitrogen.HumicN);
		    BiomN = MathUtilities.Sum(Soil.SoilNitrogen.MicrobialN);
			AccumFert += Fert.NitrogenApplied;
			AccumIrrigation += Irrig.IrrigationApplied;
			
			
			AccumEO -= Soil.SoilWater.Eo;
			AccumES -= Soil.SoilWater.Es; 
			AccumDrainage -= Soil.SoilWater.Drainage;
			AccumRunoff -= Soil.SoilWater.Runoff;
			SWC = MathUtilities.Sum(Soil.SoilWater.SWmm);
			DUL = MathUtilities.Sum(Soil.SoilWater.DULmm);
		}
	}
}
```
      SurfaceOrganicMatter surface organic matter: PondActive=no; ReportAdditions=no; ReportRemovals=no; PoolName=wheat; type=wheat; mass=2000; standing_fraction=0; cnr=80; CriticalResidueWeight=2000; OptimumDecompTemp=20; MaxCumulativeEOS=20; CNRatioDecompCoeff=0.277; CNRatioDecompThreshold=25; TotalLeachRain=25; MinRainToLeach=10; CriticalMinimumOrganicC=0.004; DefaultCPRatio=0; DefaultStandingFraction=0; StandingExtinctCoeff=0.5; FractionFaecesAdded=0.5
        Pools:
          {PoolName=wheat, ResidueType=wheat, Mass=2000, CNRatio=80, StandingFraction=0}
        ResidueTypes: LoadFromResource=ResidueTypes
        TillageTypes TillageTypesList
      Operations
        1998-10-15  [Fertiliser].Apply(50, Fertiliser.Types.UreaN, 10);
        1998-10-02  [Irrigation].Apply(40);
        1998-10-26  [Irrigation].Apply(70);
        1998-12-15  [Irrigation].Apply(70);
        1998-12-29  [Irrigation].Apply(10);
        1998-12-30  [Irrigation].Apply(55);
        1999-01-07  [Irrigation].Apply(50);
        1999-01-21  [Irrigation].Apply(40);
        1999-02-10  [Irrigation].Apply(28);
        1999-02-19  [Irrigation].Apply(15);
        1999-03-09  [Irrigation].Apply(25);
        1998-12-29  [Fertiliser].Apply(0, Fertiliser.Types.UreaN, 10);
      Report: EventNames=[Clock].DoReport
        VariableNames:
          [Clock].Today
          [ExtraVariables].Script.AccumPlantN
          [ExtraVariables].Script.AccumMineralisation
          [ExtraVariables].Script.AccumDenit
          [ExtraVariables].Script.AccumFert
          [ExtraVariables].Script.AccumLeach
          [ExtraVariables].Script.AccumDetach
          [ExtraVariables].Script.DeltaSoilOMN
          [ExtraVariables].Script.DeltaSurfaceOMN
          [ExtraVariables].Script.DeltaSoilMineralN
          [ExtraVariables].Script.SWC
          [ExtraVariables].Script.DUL
          [ExtraVariables].Script.OutFlowLat
          [ExtraVariables].Script.AccumEO
          [ExtraVariables].Script.AccumEP
          [ExtraVariables].Script.AccumES
          [ExtraVariables].Script.AccumDrainage
          [ExtraVariables].Script.AccumRunoff
          [ExtraVariables].Script.AccumRainfall
          [ExtraVariables].Script.AccumIrrigation
          [ExtraVariables].Script.AccumOutflowLat
          [ExtraVariables].Script.SoilWaterDeficit
          [ExtraVariables].Script.SoilNitrogenContent
          [ExtraVariables].Script.FomN
          [ExtraVariables].Script.HumN
          [ExtraVariables].Script.BiomN
          [ExtraVariables].Script.DltNMinRes
          [ExtraVariables].Script.DltNMinTot
          [MicroClimate].net_radn
          [MicroClimate].peta
          [MicroClimate].petr
          [Soil].SoilWater.Drainage
          [Soil].SoilWater.Runoff
          [Soil].SoilWater.Eo
          [Soil].SoilWater.Es
          [Soil].SoilWater.pond
          [Soil].SoilWater.SWmm
          [Soil].NO3N
          [MCSP].Leaf.Live.Wt
          [MCSP].Root.Live.Wt
          [MCSP].Product.Live.Wt
          [MCSP].Leaf.Live.N
          [MCSP].Root.Live.N
          [MCSP].Product.Live.N
          [MCSP].Leaf.Live.NConc
          [MCSP].Root.Live.NConc
          [MCSP].Product.Live.NConc
          [MCSP].Root.WaterSupply
          [MCSP].Root.WaterUptake
          [MCSP].Leaf.Transpiration
          [MCSP].Leaf.WaterDemand
          [MCSP].Root.Depth
          [MCSP].Leaf.CoverTotal
          [MCSP].Leaf.CoverDead
          [MCSP].Leaf.LAI
          [MCSP].Leaf.Height
          [MCSP].Leaf.PotentialBiomass.Value
          [MCSP].Product.LiveFWt
          [MCSP].Arbitrator.NDemand
          [MCSP].Arbitrator.NSupply
          [MCSP].Leaf.Fw
          [MCSP].Leaf.Fn
          [MCSP].Summariser.Total.Wt
          [MCSP].ExpectedYield.Value
          [MCSP].DryYield.Value
          [MCSP].TotalBiomassAtStartReproductive.Value
          [MCSP].TotalBiomassAtStartSenescence.Value
          [MCSP].Ymax.Value
          [MCSP].Summariser.Total.N
          [MCSP].Arbitrator.DMSupply
          [MCSP].Arbitrator.DMDemand
          [MCSP].Phenology.AccumulatedThermalTime.Value
          [MCSP].Arbitrator.DMSinkLimitation
          [MCSP].Arbitrator.DMNutrientLimitation
          [MCSP].Phenology.ThermalTime.Value
          [MCSP].Phenology.CurrentPhaseName
          [MCSP].Phenology.Stage
      Plant MCSP: CropType=MCSP
        SigmoidFunction2 TotalBiomassAtStartReproductive
          VariableReference XValue: VariableName=[Phenology].CanopyExpanding.Target.Value
          VariableReference Ymax: VariableName=[Ymax].Value
          VariableReference Xo: VariableName=[XoBiomass].Value
          VariableReference b: VariableName=[bBiomass].Value
        SigmoidFunction2 TotalBiomassAtStartSenescence
          AddFunction XValue
            VariableReference CanopyExpandingTT: VariableName=[Phenology].CanopyExpanding.Target.Value
            VariableReference YieldIncreasingTT: VariableName=[Phenology].YieldIncreasing.Target.Value
          VariableReference Ymax: VariableName=[Ymax].Value
          VariableReference Xo: VariableName=[XoBiomass].Value
          VariableReference b: VariableName=[bBiomass].Value
        SigmoidFunction2 TotalBiomassAtMaturity
          AddFunction XValue
            VariableReference CanopyExpandingTT: VariableName=[Phenology].CanopyExpanding.Target.Value
            VariableReference YieldIncreasingTT: VariableName=[Phenology].YieldIncreasing.Target.Value
            VariableReference SenescingTT: VariableName=[Phenology].Senescing.Target.Value
          VariableReference Ymax: VariableName=[Ymax].Value
          VariableReference Xo: VariableName=[XoBiomass].Value
          VariableReference b: VariableName=[bBiomass].Value
        Constant XoBiomass: Value=800
        Constant bBiomass: Value=800
        Constant ExpectedYield: Value=800
        LinearInterpolationFunction HarvestIndex: XProperty=[ExpectedYield].Value
          XYPairs: X=[0, 800, 1392]; Y=[0.14, 0.46, 0.78]
        Constant RootProportion: Value=0.1
        Constant ProductDMProportion: Value=0.87
        MultiplyFunction DryYield
          VariableReference FreshYld: VariableName=[ExpectedYield].Value
          VariableReference DMPercent: VariableName=[ProductDMProportion].Value
        DivideFunction Ymax
          VariableReference DryYield: VariableName=[DryYield].Value
          SubtractFunction AboveGroundDMProportion
            Constant One: Value=1
            VariableReference RootFraction: VariableName=[RootProportion].Value
          VariableReference HarvestIndex: VariableName=[HarvestIndex].Value
        OrganArbitrator Arbitrator: NArbitrationOption=RelativeAllocation; DMArbitrationOption=RelativeAllocation
        Phenology: Emerged=false
          AirTemperatureFunction ThermalTime
            XYPairs: X=[0, 30, 40]; Y=[0, 30, 0]
          GerminatingPhase Germinating: Start=Sowing; End=Germination
          EmergingPhase Emerging: Start=Germination; End=Emergence; ShootLag=0; ShootRate=0
            VariableReference ThermalTime: VariableName=[Phenology].ThermalTime.Value
          GenericPhase CanopyExpanding: Start=Emergence; End=StartReproductive
            Constant Target: Value=1000
            VariableReference ThermalTime: VariableName=[Phenology].ThermalTime.Value
          GenericPhase YieldIncreasing: Start=StartReproductive; End=StartSenescence
            Constant Target: Value=600
            VariableReference ThermalTime: VariableName=[Phenology].ThermalTime.Value
          GenericPhase Senescing: Start=StartSenescence; End=EndReproductive
            Constant Target: Value=600
            VariableReference ThermalTime: VariableName=[Phenology].ThermalTime.Value
          GenericPhase Mature: Start=EndReproductive; End=Maturity
            Constant Target: Value=600
            VariableReference ThermalTime: VariableName=[Phenology].ThermalTime.Value
          EndPhase ReadyForHarvest: Start=Maturity; End=Unused
            VariableReference ThermalTime: VariableName=[Phenology].ThermalTime.Value
          AccumulateFunction AccumulatedThermalTime: StartStageName=Emergence; EndStageName=Maturity
            VariableReference ThermalTime: VariableName=[Phenology].ThermalTime.Value
        Root: InitialDM=0.2; SpecificRootLength=40000; KNO3_yProperty=[0.02, 0.02]; KNO3_xRootLength=[0, 0.003]; KNH4_yProperty=[0, 0]; KNH4_xRootLength=[0, 0.003]; NuptakeSupply=0
          CompositeBiomass Live: Propertys=[[Root].LayerLive]
          CompositeBiomass Dead: Propertys=[[Root].LayerDead]
          LinearInterpolationFunction KLModifier: XProperty=[Root].LayerMidPointDepth
            XYPairs: X=[0, 200, 1500]; Y=[1, 1, 0]
          Constant SoilWaterEffect: Value=1
          Constant MaxDailyNUptake: Value=12
          Constant SenescenceRate: Value=0
          Constant MaximumNConc: Value=0.009
          Constant MinimumNConc: Value=0.009
          PhaseBasedSwitch NitrogenDemandSwitch: Start=Germination; End=Maturity
          Constant TemperatureEffect: Value=1
          Constant MaximumRootDepth: Value=1500
          MultiplyFunction RootFrontVelocity
            LessThanFunction RootFrontVelocity
              VariableReference TestVariable: VariableName=[Phenology].AccumulatedThermalTime.Value
              Constant LessThan: Value=2010
              Constant IfTrue: Value=10
              Constant IfFalse: Value=0
            VariableReference ThermalTime: VariableName=[Phenology].ThermalTime.Value
          PhaseLookupValue PartitionFraction: Start=Emergence; End=EndReproductive
            VariableReference RootProportion: VariableName=[RootProportion].Value
        SimpleLeaf Leaf
          zero: BiomassYesterday, LAI, Height, FRGR, PotentialEP, K, KDead, DeltaBiomass, LAIDead, WaterAllocation
          XYPairs FT: X=[5, 20, 25, 40]; Y=[1, 1, 1, 1, 1]
          XYPairs FVPD: X=[0, 10, 50]; Y=[0, 0, 0]
          Biomass Live
          Biomass Dead
          Constant NConc: Value=0.008
          PartitionFractionDemandFunction DMDemandFunction
            PhaseLookup PartitionFraction
              PhaseLookupValue Expanding: Start=Emergence; End=StartReproductive
                SubtractFunction DMPartitionCoefficient
                  Constant One: Value=1
                  VariableReference RootFraction: VariableName=[RootProportion].Value
              PhaseLookupValue YieldIncreasing: Start=StartReproductive; End=StartSenescence
                DivideFunction DMPartitionCoefficient
                  SubtractFunction Stover
                    MultiplyFunction StoverAtMaturity
                      VariableReference TotalBiomassAtMaturity: VariableName=[TotalBiomassAtMaturity].Value
                      SubtractFunction AboveGroundProportion
                        Constant One: Value=1
                        VariableReference RootFraction: VariableName=[RootProportion].Value
                      SubtractFunction StoverProportion
                        Constant One: Value=1
                        VariableReference HI: VariableName=[HarvestIndex].Value
                    MultiplyFunction StoverAtStartReproductive: same as Replacements.MCSP.Leaf.DMDemandFunction.PartitionFraction.YieldIncreasing.DivideFunction.Stover.StoverAtStartReproductive
                  SubtractFunction TotalBiomass
                    VariableReference BiomassAtStartSenescence: VariableName=[TotalBiomassAtStartSenescence].Value
                    VariableReference BiomassAtStartReproductive: VariableName=[TotalBiomassAtStartReproductive].Value
          PhaseLookup CoverFunction
            PhaseLookupValue Expanding: Start=Emergence; End=StartSenescence
              SigmoidFunction2 SigCoverFunction
                Constant Ymax: Value=0.97
                VariableReference XValue: VariableName=[Phenology].AccumulatedThermalTime.Value
                Constant Xo: Value=540
                Constant b: Value=120
            PhaseLookupValue Senescence: Start=StartSenescence; End=Maturity
              MultiplyFunction DecreasingCover
                HoldFunction MaxCover: WhenToHold=StartSenescence
                  VariableReference ValueToHold: VariableName=[Leaf].CoverGreen
                SubtractFunction ProportionLost
                  Constant: Value=1
                  DivideFunction ProportionRemaining
                    SubtractFunction TTSenesce
                      VariableReference AccumulatedThermalTime: VariableName=[Phenology].AccumulatedThermalTime.Value
                      AddFunction ThermalTimeAtStartSenescence
                        VariableReference CanopyExpandingTT: VariableName=[Phenology].CanopyExpanding.Target.Value
                        VariableReference YieldIncreasingTT: VariableName=[Phenology].YieldIncreasing.Target.Value
                    VariableReference SenescentPhaseDuration: VariableName=[Phenology].Senescing.Target.Value
          Constant FRGRFunction: Value=1
          Constant HeightFunction: Value=150
          Constant ExtinctionCoefficientFunction: Value=0.5
          DeltaFunction PotentialBiomass: StartStageName=Emergence
            SigmoidFunction2 Integral
              VariableReference Ymax: VariableName=[Ymax].Value
              VariableReference XValue: VariableName=[Phenology].AccumulatedThermalTime.Value
              VariableReference Xo: VariableName=[XoBiomass].Value
              VariableReference b: VariableName=[bBiomass].Value
          PhaseLookupValue NitrogenDemandSwitch: Start=Emergence; End=StartSenescence
            Constant Function: Value=1
        GenericAboveGroundOrgan Product
          Biomass Live
          Biomass Dead
          Constant MaximumNConc: Value=0.012
          Constant MinimumNConc: Value=0.008
          PartitionFractionDemandFunction DMDemandFunction
            PhaseLookup PartitionFraction
              PhaseLookupValue YieldIncreasing: same as Replacements.MCSP.Product.DMDemandFunction.PartitionFraction.YieldIncreasing
              PhaseLookupValue Senescing: Start=StartSenescence; End=EndReproductive
                SubtractFunction StoverFraction
                  Constant One: Value=1
                  VariableReference RootFraction: VariableName=[RootProportion].Value
          SubtractFunction WaterContent
            Constant One: Value=1
            VariableReference DMcontent: VariableName=[ProductDMProportion].Value
        Nodule: same as Replacements.MCSP.Nodule
        Summariser
          CompositeBiomass Total
            Propertys=[[Leaf].Live, [Leaf].Dead, [Product].Live, [Product].Dead, [Root].Live, [Root].Dead]
        Cultivar Dash
        Cultivar Barley_Spring: Alias=Barley_Spring
          Command:
            [Root].MaximumRootDepth.Value = 1000
            [Root].RootFrontVelocity.RootFrontVelocity.LessThan.Value = 2010
            [Root].RootFrontVelocity.RootFrontVelocity.IfTrue.Value = 0.5
            [Root].KLModifier.XYPairs.X = 0, 200, 500, 1000, 1500
            [Root].KLModifier.XYPairs.Y = 1, 1, 0.8, 0.3, 0.1
            [Leaf].CoverFunction.Expanding.SigCoverFunction.Xo.Value = 540
            [Leaf].CoverFunction.Expanding.SigCoverFunction.b.Value = 120
            [Leaf].CoverFunction.Expanding.SigCoverFunction.Ymax.Value = 0.97
            [XoBiomass].Value = 1080
            [bBiomass].Value = 218
            [ExpectedYield].Value = 800
            [RootProportion].Value = 0.1
            [HarvestIndex].XYPairs.X = 0,1150
            [HarvestIndex].XYPairs.Y = 0.14,0.6
            [ProductDMProportion].Value = 0.87
            [Phenology].CanopyExpanding.Target.Value = 1000
            [Phenology].YieldIncreasing.Target.Value= 500
            [Phenology].Senescing.Target.Value = 300
            [Phenology].Mature.Target.Value = 300
            [leaf].NConc.Value = 0.005
            [Product].MinimumNConc.Value = 0.005
            [Product].MaximumNConc.Value = 0.012
            [Root].MinimumNConc.Value = 0.009
            [Root].MaximumNConc.Value = 0.009
        Cultivar Wheat_Winter: Alias=Barley_Spring
          Command:
            [Root].MaximumRootDepth.Value = 1500
            [Root].RootFrontVelocity.RootFrontVelocity.LessThan.Value = 3000
            [Root].RootFrontVelocity.RootFrontVelocity.IfTrue.Value = 0.5
            [Root].KLModifier.XYPairs.X = 0, 200, 500, 1000, 1500
            [Root].KLModifier.XYPairs.Y = 1, 1, 0.9, 0.6, 0.3
            [Leaf].CoverFunction.Expanding.SigCoverFunction.Xo.Value = 540
            [Leaf].CoverFunction.Expanding.SigCoverFunction.b.Value = 120
            [Leaf].CoverFunction.Expanding.SigCoverFunction.Ymax.Value = 0.97
            [XoBiomass].Value = 1830
            [bBiomass].Value = 399
            [ExpectedYield].Value = 1450
            [RootProportion].Value = 0.1
            [HarvestIndex].XYPairs.X = 0,1733
            [HarvestIndex].XYPairs.Y = 0.08,0.6
            [ProductDMProportion].Value = 0.87
            [Phenology].CanopyExpanding.Target.Value = 1830
            [Phenology].YieldIncreasing.Target.Value= 615
            [Phenology].Senescing.Target.Value = 600
            [Phenology].Mature.Target.Value = 300
            [leaf].NConc.Value = 0.005
            [Product].MinimumNConc.Value = 0.005
            [Product].MaximumNConc.Value = 0.012
            [Root].MinimumNConc.Value = 0.009
            [Root].MaximumNConc.Value = 0.009
  Experiment
    Factors
      Factor SpringBarley
        Specifications:
          [MCSPSowingRule].Script.CultivarName = Barley_Spring
          [MCSPSowingRule].Script.InitialRootDepth = 10
      Factor WinterWheat
        Specifications:
          [MCSPSowingRule].Script.CultivarName = Wheat_Winter
          [MCSPSowingRule].Script.InitialRootDepth = 10
    Simulation CropCompBase: Area=0; Slope=0
      Weather: FileName=%root%\Tests\WeatherFiles\lincoln.met
      Clock: StartDate=1998-10-14; EndDate=1999-07-01
      Summary
      SoilArbitrator Soil Arbitrator
      Zone Field: Area=0; Slope=0
        Soil: same as MCSPTestBase.Field.Soil
        MicroClimate: same as MCSPTestBase.Field.MicroClimate
        Irrigation
        Fertiliser
        Manager MCSPSowingRule
          CultivarName = Barley_Spring
          InitialRootDepth = 10
          SowingDate = 1998-10-14
          script: same as in MCSPTestBase.Field.MCSPSowingRule
        Manager ExtraVariables: same as MCSPTestBase.Field.ExtraVariables
        SurfaceOrganicMatter surface organic matter: same as MCSPTestBase.Field.surface organic matter
        Operations: same as MCSPTestBase.Field.operations
        Report: same as MCSPTestBase.Field.Report
        Plant MCSP: CropType=MCSP
          SigmoidFunction2 TotalBiomassAtStartReproductive: same as MCSPTestBase.Field.MCSP.TotalBiomassAtStartReproductive
          SigmoidFunction2 TotalBiomassAtStartSenescence: same as MCSPTestBase.Field.MCSP.TotalBiomassAtStartSenescence
          SigmoidFunction2 TotalBiomassAtMaturity: same as MCSPTestBase.Field.MCSP.TotalBiomassAtMaturity
          Constant XoBiomass: Value=800
          Constant bBiomass: Value=800
          Constant ExpectedYield: Value=800
          LinearInterpolationFunction HarvestIndex: same as MCSPTestBase.Field.MCSP.HarvestIndex
          Constant RootProportion: Value=0.1
          Constant ProductDMProportion: Value=0.87
          MultiplyFunction DryYield
            VariableReference FreshYld: VariableName=[ExpectedYield].Value
            VariableReference DMPercent: VariableName=[ProductDMProportion].Value
          DivideFunction Ymax: same as MCSPTestBase.Field.MCSP.Ymax
          OrganArbitrator Arbitrator: NArbitrationOption=RelativeAllocation; DMArbitrationOption=RelativeAllocation
          Phenology: same as MCSPTestBase.Field.MCSP.Phenology
          Root: same as MCSPTestBase.Field.MCSP.Root
          SimpleLeaf Leaf: same as MCSPTestBase.Field.MCSP.Leaf
          GenericAboveGroundOrgan Product: same as MCSPTestBase.Field.MCSP.Product
          Nodule: same as Replacements.MCSP.Nodule
          Summariser
            CompositeBiomass Total
              Propertys=[[Leaf].Live, [Leaf].Dead, [Product].Live, [Product].Dead, [Root].Live, [Root].Dead]
          Cultivar Dash
          Cultivar Barley_Spring: same as MCSPTestBase.Field.MCSP.Barley_Spring
          Cultivar Wheat_Winter: Alias=Barley_Spring
            Command:
              [Root].MaximumRootDepth.Value = 1500
              [Root].RootFrontVelocity.RootFrontVelocity.LessThan.Value = 3000
              [Root].RootFrontVelocity.RootFrontVelocity.IfTrue.Value = 0.5
              [Root].KLModifier.XYPairs.X = 0, 200, 500, 1000, 1500
              [Root].KLModifier.XYPairs.Y = 1, 1, 0.9, 0.6, 0.3
              [Leaf].CoverFunction.Expanding.SigCoverFunction.Xo.Value = 540
              [Leaf].CoverFunction.Expanding.SigCoverFunction.b.Value = 120
              [Leaf].CoverFunction.Expanding.SigCoverFunction.Ymax.Value = 0.97
              [XoBiomass].Value = 2000
              [bBiomass].Value = 399
              [ExpectedYield].Value = 1450
              [RootProportion].Value = 0.1
              [HarvestIndex].XYPairs.X = 0,1733
              [HarvestIndex].XYPairs.Y = 0.08,0.6
              [ProductDMProportion].Value = 0.87
              [Phenology].CanopyExpanding.Target.Value = 1700
              [Phenology].YieldIncreasing.Target.Value= 615
              [Phenology].Senescing.Target.Value = 600
              [Phenology].Mature.Target.Value = 300
              [leaf].NConc.Value = 0.005
              [Product].MinimumNConc.Value = 0.005
              [Product].MaximumNConc.Value = 0.012
              [Root].MinimumNConc.Value = 0.009
              [Root].MaximumNConc.Value = 0.009
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