Simulations: Version=2
  DataStore
    ExcelInput Observed: FileName=Observed.xlsx; SheetNames=[SoilWater, Residues]
    PredictedObserved: PredictedTableName=Report; ObservedTableName=SoilWater; FieldNameUsedForMatch=Clock.Today
      Tests: POName=PredictedObserved
        AcceptedStats:
          Name                    n    Slope     Intercept  SEslope     SEintercept  R2        RMSE       NSE       ME           MAE        RSR
          ProfileWater            672  0.650046  63.2052    0.0142768   2.22427      0.755754  16.8437    0.619132  9.52667      13.9507    0.616686
          Soil.SoilWater.SW(1)    672  2.32129   -0.379227  0.0707375   0.0185054    0.616454  0.0951006  -5.02986  -0.0373788   0.0566361  2.45375
          Soil.SoilWater.SW(2)    672  0.544037  0.141247   0.0171646   0.00431015   0.599904  0.0420634  0.233855  0.0288675    0.0351062  0.874645
          Soil.SoilWater.SW(3)    672  0.42176   0.151748   0.0115728   0.00310226   0.664692  0.0376785  0.575859  0.000395651  0.024439   0.650777
          Soil.SoilWater.SWmm(1)  672  0.116064  -3.79227   0.00353688  0.185054     0.616454  50.0073    -40.6818  -49.5313     49.5313    6.45134
          Soil.SoilWater.SWmm(2)  672  0.516835  26.8369    0.0163063   0.818929     0.599904  6.86608    0.489659  3.02016      4.89263    0.71385
          Soil.SoilWater.SWmm(3)  672  0.42176   30.3496    0.0115728   0.620453     0.664692  7.5357     0.575859  0.0791302    4.8878     0.650777
        AcceptedStatsName=Name n Slope Intercept SEslope SEintercept R2 RMSE NSE ME MAE RSR
  Simulation NewSoil
    Clock: StartDate=1999-01-01; EndDate=2000-12-31
    Weather: FileName=lincoln.met
    Summary SummaryFile
    Zone Field: Area=1; Slope=0
      Report: EventNames=[Clock].DoReport
        VariableNames:
          [Clock].Today
          [IWeather].MaxT
          [IWeather].MinT
          [IWeather].Rain
          [IWeather].Radn
          [IWeather].Wind
          [IWeather].DayLength
          [IWeather].VP
          [IWeather].CO2
          [IWeather].RainfallHours
          sum([Soil].SoilWater.SWmm) as ProfileWater
          [Soil].SoilWater.SWmm
          [Soil].SoilWater.SW
          [Soil].MultiPoreWater.Water
          [Soil].MultiPoreWater.Drainage
          [Soil].MultiPoreWater.Infiltration
          [Soil].MultiPoreWater.pond
          [Irrigation].IrrigationApplied
          [Soil].MultiPoreWater.Eos
          [Soil].MultiPoreWater.Es
      Fertiliser
      Soil: ASCOrder=Vertosol; ASCSubOrder=Black; SoilType=Clay; Site=Norwin; NearestTown=Norwin; Region=Darling Downs and Granite Belt; State=Queensland; Country=Australia; NaturalVegetation=Qld. Bluegrass, possible Qld. Blue gum; ApsoilNumber=900; Latitude=-27.581836; Longitude=151.320206; Area=0; LocationAccuracy=+/- 20m
        DataSource=CSIRO Sustainable Ecosystems, Toowoomba; Characteriesd as part of the GRDC funded project"Doing it better, doing it smarter, managing soil water in Australian agriculture' 2011
        Comments=OC, CLL for all crops estimated-based on Bongeen Mywybilla Soil No1
        Water
          Thickness  BD       AirDry   LL15  DUL   SAT   KS
          10         1.01056  0.13025  0.15  0.37  0.57  10
          290        1.07146  0.13     0.15  0.37  0.57  10
          300        1.09394  0.17     0.17  0.33  0.48  20
          300        1.15861  0.17     0.17  0.33  0.48  20
          300        1.17301  0.17     0.17  0.33  0.48  20
          300        1.16287  0.17     0.17  0.33  0.48  20
          300        1.1875   0.17     0.17  0.33  0.48  20
          SoilCrop WheatSoil: LL=[0.261, 0.248, 0.28, 0.306, 0.36, 0.392, 0.446]; KL=[0.06, 0.06, 0.06, 0.04, 0.04, 0.02, 0.01]; XF=[1, 1, 1, 1, 1, 1, 1]
        MultiPoreWater: Salb=0.15; SubProfileConductance=100; WaterTableDepth=3; CalculateInfiltration=true; CalculateDrainage=true; ReportDetail=false; IncludeSorption=true; CalculateEvaporation=true; CalculateDiffusion=true; DiffusivityMultiplier=0; TotalCover=0; ResidueWater=0; Hour=0; ReportLayer=0; TimeStep=0
          Thickness  CFlow  XFlow  PsiBub
          10         8E-12  3.9    -15
          290        8E-12  3.9    -15
          300        7E-12  3.7    -15
          300        7E-12  3.7    -15
          300        7E-12  3.7    -15
          300        7E-12  3.7    -15
          300        7E-12  3.7    -15
        SoilNitrogen: fom_type=[default, manure, mucuna, lablab, shemp, stable]; fract_carb=[0.2, 0.3, 0.54, 0.57, 0.45, 0]; fract_cell=[0.7, 0.3, 0.37, 0.37, 0.47, 0.1]; fract_lign=[0.1, 0.4, 0.09, 0.06, 0.08, 0.9]; wfpsN2N2O_x=[22, 88]; wfpsN2N2O_y=[0.1, 1]
        SoilOrganicMatter: RootCN=40; RootWt=1000; SoilCN=12; EnrACoeff=7.4; EnrBCoeff=0.2; OCUnits=Total
          Thickness  OC    FBiom  FInert
          150        1.2   0.04   0.4
          150        0.96  0.02   0.6
          300        0.6   0.02   0.8
          300        0.3   0.02   1
          300        0.18  0.01   1
          300        0.12  0.01   1
          300        0.12  0.01   1
        Analysis: Thickness=[150, 150, 300, 300, 300, 300, 300]; PH=[8, 8, 8, 8, 8, 8, 8]; PHUnits=Water; BoronUnits=HotWater
        Sample InitialN: NO3Units=ppm; NH4Units=ppm; SWUnits=Volumetric; OCUnits=Total; PHUnits=Water
          Thickness  NO3  NH4
          150        10   0.1
          150        10   0.1
          300        10   0.1
          300        10   0.1
          300        10   0.1
          300        1    0.1
          300        1    0.1
        Sample InitialWater: Thickness=[10, 290, 300, 300, 300, 300, 300]; SW=[0.5, 0.49, 0.48, 0.47, 0.46, 0.45, 0.44]; NO3Units=ppm; NH4Units=ppm; SWUnits=Volumetric; OCUnits=Total; PHUnits=Water
        Evapotranspiration
        MRSpline
      SurfaceOrganicMatter: PoolName=wheat_stubble; type=wheat; mass=0; standing_fraction=0; cnr=100; CriticalResidueWeight=2000; OptimumDecompTemp=20; MaxCumulativeEOS=20; CNRatioDecompCoeff=0.277; CNRatioDecompThreshold=25; TotalLeachRain=25; MinRainToLeach=10; CriticalMinimumOrganicC=0.004; DefaultCPRatio=0; DefaultStandingFraction=0; StandingExtinctCoeff=0.5; FractionFaecesAdded=0.5
        Pools:
          {PoolName=wheat_stubble, ResidueType=wheat, Mass=0, CNRatio=100, StandingFraction=0}
        ResidueTypes: LoadFromResource=ResidueTypes
      MicroClimate: a_interception=0; b_interception=1; c_interception=0; d_interception=0; soil_albedo=0.3; air_pressure=1010; soil_emissivity=0.96; sun_angle=15; soil_heat_flux_fraction=0.4; night_interception_fraction=0.5; windspeed_default=3; refheight=2; albedo=0.15; emissivity=0.96; gsmax=0.01; r50=200; RadIntTotal=0
      Irrigation
      Manager Irrigate on a fixed date
        IrrigateDate = 1-feb
        Amount = 50
        Depth = 0
        Efficiency = 1
        WillRunoff = False
        Duration = 0.5
```csharp
using System;
using Models.Core;
using Models.PMF;
using APSIM.Shared.Utilities;
namespace Models
{
	[Serializable]
	public class Script : Model
	{
		[Link] Clock Clock;
		[Link] Irrigation Irrigation;
		
		[Description("Date to irrigate")]
		public string IrrigateDate { get; set; }
		
		[Description("Amount of irrigation to be applied (mm)")]
		public double Amount { get; set; }
		
		[Description("Depth of irrigation (mm)")]
		public double Depth { get; set; }
		
		[Description("Efficiency of irrigation (0-1)")]
		public double Efficiency { get; set; }
		
		[Description("Will the irrigation runoff?")]
		public bool WillRunoff { get; set; }
		
		[Description("How may hours did it take to apply irrigation?")]
		public double Duration { get; set; }
		
		
		[EventSubscribe("DoManagement")]
		private void OnDoManagement(object sender, EventArgs e)
		{
			if (DateUtilities.WithinDates(IrrigateDate, Clock.Today, IrrigateDate))
			{
				Irrigation.Apply(amount: Amount, depth: Depth, efficiency: Efficiency, willRunoff: WillRunoff, duration: Duration);
			}
		}
	}
}
```
  Experiment Infiltration
    Factors
      Factor ItitialWater
        Factor Sat: Specifications=[InitialWater]
          Sample InitialWater: Thickness=[150, 150, 300, 300, 300, 300, 300]; SW=[0.6, 0.59, 0.58, 0.57, 0.56, 0.55, 0.54]; NO3Units=ppm; NH4Units=ppm; SWUnits=Volumetric; OCUnits=Total; PHUnits=Water
        Factor Mid: Specifications=[InitialWater]
          Sample Mid: Thickness=[150, 150, 300, 300, 300, 300, 300]; SW=[0.4, 0.39, 0.38, 0.37, 0.36, 0.35, 0.34]; NO3Units=ppm; NH4Units=ppm; SWUnits=Volumetric; OCUnits=Total; PHUnits=Water
        Factor LL: Specifications=[InitialWater]
          Sample InitialWater: Thickness=[150, 150, 300, 300, 300, 300, 300]; SW=[0.25, 0.25, 0.25, 0.25, 0.25, 0.25, 0.25]; NO3Units=ppm; NH4Units=ppm; SWUnits=Volumetric; OCUnits=Total; PHUnits=Water
      Factor MacroPores
        Factor Many: Specifications=[Water]
          Water
            Thickness  BD       AirDry  LL15  DUL   SAT   KS
            150        1.01056  0.25    0.25  0.4   0.6   100
            150        1.07146  0.25    0.25  0.39  0.59  100
            300        1.09394  0.25    0.25  0.38  0.58  20
            300        1.15861  0.25    0.25  0.37  0.57  20
            300        1.17301  0.25    0.25  0.36  0.56  20
            300        1.16287  0.25    0.25  0.35  0.55  20
            300        1.1875   0.25    0.25  0.34  0.54  20
        Factor Few: Specifications=[Water]
          Water
            Thickness  BD       AirDry  LL15  DUL   SAT   KS
            150        1.01056  0.25    0.25  0.5   0.6   1
            150        1.07146  0.25    0.25  0.49  0.59  1
            300        1.09394  0.25    0.25  0.48  0.58  1
            300        1.15861  0.25    0.25  0.47  0.57  1
            300        1.17301  0.25    0.25  0.46  0.56  1
            300        1.16287  0.25    0.25  0.45  0.55  1
            300        1.1875   0.25    0.25  0.44  0.54  1
        Factor None: Specifications=[Water]
          Water
            Thickness  BD       AirDry  LL15  DUL   SAT   KS
            150        1.01056  0.25    0.25  0.6   0.6   100
            150        1.07146  0.25    0.25  0.59  0.59  100
            300        1.09394  0.25    0.25  0.58  0.58  0
            300        1.15861  0.25    0.25  0.57  0.57  0
            300        1.17301  0.25    0.25  0.56  0.56  0
            300        1.16287  0.25    0.25  0.55  0.55  0
            300        1.1875   0.25    0.25  0.54  0.54  0
    Simulation BaseSoil
      Clock: StartDate=1999-01-01; EndDate=1999-12-31
      Weather: FileName=lincoln.met
      Summary SummaryFile
      Zone Field: Area=1; Slope=0
        Report: EventNames=[Clock].DoReport
          VariableNames:
            [Clock].Today
            [IWeather].MaxT
            [IWeather].MinT
            [IWeather].Rain
            [IWeather].Radn
            [IWeather].Wind
            [IWeather].DayLength
            [IWeather].VP
            [IWeather].CO2
            [IWeather].RainfallHours
            sum([Soil].SoilWater.SWmm) as ProfileWater
            [Soil].SoilWater.SWmm
            [Soil].SoilWater.SW
            [Soil].MultiPoreWater.Water
            [Soil].MultiPoreWater.Drainage
            [Soil].MultiPoreWater.Infiltration
            [Soil].MultiPoreWater.pond
            [Irrigation].IrrigationApplied
            [Soil].MultiPoreWater.DeltaPond + [Soil].MultiPoreWater.Infiltration + [Soil].MultiPoreWater.Drainage as Check
        Fertiliser
        Soil: ASCOrder=Vertosol; ASCSubOrder=Black; SoilType=Clay; Site=Norwin; NearestTown=Norwin; Region=Darling Downs and Granite Belt; State=Queensland; Country=Australia; NaturalVegetation=Qld. Bluegrass, possible Qld. Blue gum; ApsoilNumber=900; Latitude=-27.581836; Longitude=151.320206; Area=0; LocationAccuracy=+/- 20m
          DataSource=CSIRO Sustainable Ecosystems, Toowoomba; Characteriesd as part of the GRDC funded project"Doing it better, doing it smarter, managing soil water in Australian agriculture' 2011
          Comments=OC, CLL for all crops estimated-based on Bongeen Mywybilla Soil No1
          Water
            Thickness  BD       AirDry    LL15  DUL   SAT   KS
            150        1.01056  0.13025   0.25  0.5   0.6   10
            150        1.07146  0.198689  0.25  0.49  0.59  10
            300        1.09394  0.25      0.25  0.48  0.58  20
            300        1.15861  0.25      0.25  0.47  0.57  1
            300        1.17301  0.25      0.25  0.46  0.56  20
            300        1.16287  0.25      0.25  0.45  0.55  20
            300        1.1875   0.25      0.25  0.44  0.54  20
          MultiPoreWater: Salb=0.15; SubProfileConductance=100; WaterTableDepth=3; CalculateInfiltration=true; CalculateDrainage=true; ReportDetail=false; IncludeSorption=true; CalculateEvaporation=true; CalculateDiffusion=true; DiffusivityMultiplier=0; TotalCover=0; ResidueWater=0; Hour=0; ReportLayer=0; TimeStep=0
            Thickness  CFlow  XFlow  PsiBub
            150        9E-12  3.7    -15
            150        8E-12  3.7    -15
            300        7E-12  3.7    -15
            300        6E-12  3.7    -15
            300        5E-12  3.7    -15
            300        4E-12  3.7    -15
            300        3E-12  3.7    -15
          SoilNitrogen: fom_type=[default, manure, mucuna, lablab, shemp, stable]; fract_carb=[0.2, 0.3, 0.54, 0.57, 0.45, 0]; fract_cell=[0.7, 0.3, 0.37, 0.37, 0.47, 0.1]; fract_lign=[0.1, 0.4, 0.09, 0.06, 0.08, 0.9]; wfpsN2N2O_x=[22, 88]; wfpsN2N2O_y=[0.1, 1]
          SoilOrganicMatter: same as NewSoil.Field.Soil.SoilOrganicMatter
          Analysis: Thickness=[150, 150, 300, 300, 300, 300, 300]; PH=[8, 8, 8, 8, 8, 8, 8]; PHUnits=Water; BoronUnits=HotWater
          Sample InitialN: NO3Units=ppm; NH4Units=ppm; SWUnits=Volumetric; OCUnits=Total; PHUnits=Water
            Thickness  NO3  NH4
            150        10   0.1
            150        10   0.1
            300        10   0.1
            300        10   0.1
            300        10   0.1
            300        1    0.1
            300        1    0.1
          Sample InitialWater: Thickness=[150, 150, 300, 300, 300, 300, 300]; SW=[0.6, 0.59, 0.58, 0.57, 0.56, 0.55, 0.54]; NO3Units=ppm; NH4Units=ppm; SWUnits=Volumetric; OCUnits=Total; PHUnits=Water
          Evapotranspiration
          MRSpline
        SurfaceOrganicMatter: same as NewSoil.Field.SurfaceOrganicMatter
        MicroClimate: same as NewSoil.Field.MicroClimate
        Irrigation
        Manager Irrigate on a fixed date
          IrrigateDate = 1-feb
          Amount = 50
          Depth = 0
          Efficiency = 1
          WillRunoff = False
          Duration = 2
          script: same as in NewSoil.Field.Irrigate on a fixed date
  Experiment Irrigation
    Factors
      Factor IrrigDuration
        Specifications=[Irrigate on a fixed date].Script.Duration = 0.1,0.3,0.7,1,2,6
    Simulation BaseIrrigation
      Clock: StartDate=1999-01-01; EndDate=1999-03-31
      Weather: FileName=lincoln.met
      Summary SummaryFile
      Zone Field: Area=1; Slope=0
        Report: same as Infiltration.BaseSoil.Field.Report
        Fertiliser
        Soil: ASCOrder=Vertosol; ASCSubOrder=Black; SoilType=Clay; Site=Norwin; NearestTown=Norwin; Region=Darling Downs and Granite Belt; State=Queensland; Country=Australia; NaturalVegetation=Qld. Bluegrass, possible Qld. Blue gum; ApsoilNumber=900; Latitude=-27.581836; Longitude=151.320206; Area=0; LocationAccuracy=+/- 20m
          DataSource=CSIRO Sustainable Ecosystems, Toowoomba; Characteriesd as part of the GRDC funded project"Doing it better, doing it smarter, managing soil water in Australian agriculture' 2011
          Comments=OC, CLL for all crops estimated-based on Bongeen Mywybilla Soil No1
          Water
            Thickness  BD       AirDry    LL15  DUL   SAT   KS
            150        1.01056  0.13025   0.25  0.45  0.6   10
            150        1.07146  0.198689  0.25  0.44  0.59  10
            300        1.09394  0.25      0.25  0.43  0.58  20
            300        1.15861  0.25      0.25  0.42  0.57  1
            300        1.17301  0.25      0.25  0.41  0.56  20
            300        1.16287  0.25      0.25  0.4   0.55  20
            300        1.1875   0.25      0.25  0.39  0.54  20
          MultiPoreWater: Salb=0.15; SubProfileConductance=100; WaterTableDepth=3; CalculateInfiltration=true; CalculateDrainage=true; ReportDetail=false; IncludeSorption=true; CalculateEvaporation=true; CalculateDiffusion=true; DiffusivityMultiplier=0; TotalCover=0; ResidueWater=0; Hour=0; ReportLayer=0; TimeStep=0
            Thickness  CFlow  XFlow  PsiBub
            150        6E-12  3.5    -50
            150        6E-12  3.5    -50
            300        6E-12  3.5    -50
            300        6E-12  3.5    -50
            300        6E-12  3.5    -50
            300        6E-12  3.5    -50
            300        6E-12  3.5    -50
          SoilNitrogen: fom_type=[default, manure, mucuna, lablab, shemp, stable]; fract_carb=[0.2, 0.3, 0.54, 0.57, 0.45, 0]; fract_cell=[0.7, 0.3, 0.37, 0.37, 0.47, 0.1]; fract_lign=[0.1, 0.4, 0.09, 0.06, 0.08, 0.9]; wfpsN2N2O_x=[22, 88]; wfpsN2N2O_y=[0.1, 1]
          SoilOrganicMatter: same as NewSoil.Field.Soil.SoilOrganicMatter
          Analysis: Thickness=[150, 150, 300, 300, 300, 300, 300]; PH=[8, 8, 8, 8, 8, 8, 8]; PHUnits=Water; BoronUnits=HotWater
          Sample InitialN: NO3Units=ppm; NH4Units=ppm; SWUnits=Volumetric; OCUnits=Total; PHUnits=Water
            Thickness  NO3  NH4
            150        10   0.1
            150        10   0.1
            300        10   0.1
            300        10   0.1
            300        10   0.1
            300        1    0.1
            300        1    0.1
          Sample InitialWater: Thickness=[150, 150, 300, 300, 300, 300, 300]; SW=[0.25, 0.25, 0.25, 0.25, 0.25, 0.25, 0.25]; NO3Units=ppm; NH4Units=ppm; SWUnits=Volumetric; OCUnits=Total; PHUnits=Water
          Evapotranspiration
          MRSpline
        SurfaceOrganicMatter: same as NewSoil.Field.SurfaceOrganicMatter
        MicroClimate: same as NewSoil.Field.MicroClimate
        Irrigation
        Manager Irrigate on a fixed date
          IrrigateDate = 1-feb
          Amount = 10
          Depth = 0
          Efficiency = 1
          WillRunoff = False
          Duration = 0.5
          script: same as in NewSoil.Field.Irrigate on a fixed date
  Experiment Residues
    Factors
      Factor Cover: Specifications=[SurfaceOrganicMatter]
        SurfaceOrganicMatter StandingStubble: PoolName=Barley; type=Barley; mass=2026; standing_fraction=1; cnr=80; CriticalResidueWeight=2000; OptimumDecompTemp=20; MaxCumulativeEOS=20; CNRatioDecompCoeff=0.277; CNRatioDecompThreshold=25; TotalLeachRain=25; MinRainToLeach=10; CriticalMinimumOrganicC=0.004; DefaultCPRatio=0; DefaultStandingFraction=0; StandingExtinctCoeff=0.5; FractionFaecesAdded=0.5
          Pools:
            {PoolName=Barley, ResidueType=Barley, Mass=2026, CNRatio=80, StandingFraction=1}
          ResidueTypes: LoadFromResource=ResidueTypes
        SurfaceOrganicMatter HarvesterWindrow: PoolName=Barley; type=Barley; mass=8300; standing_fraction=0; cnr=80; CriticalResidueWeight=2000; OptimumDecompTemp=20; MaxCumulativeEOS=20; CNRatioDecompCoeff=0.277; CNRatioDecompThreshold=25; TotalLeachRain=25; MinRainToLeach=10; CriticalMinimumOrganicC=0.004; DefaultCPRatio=0; DefaultStandingFraction=0; StandingExtinctCoeff=0.5; FractionFaecesAdded=0.5
          Pools:
            {PoolName=Barley, ResidueType=Barley, Mass=8300, CNRatio=80, StandingFraction=0}
          ResidueTypes: LoadFromResource=ResidueTypes
        SurfaceOrganicMatter MownStubble: PoolName=Barley; type=Barley; mass=400; standing_fraction=1; cnr=80; CriticalResidueWeight=2000; OptimumDecompTemp=20; MaxCumulativeEOS=20; CNRatioDecompCoeff=0.277; CNRatioDecompThreshold=25; TotalLeachRain=25; MinRainToLeach=10; CriticalMinimumOrganicC=0.004; DefaultCPRatio=0; DefaultStandingFraction=0; StandingExtinctCoeff=0.5; FractionFaecesAdded=0.5
          Pools:
            {PoolName=Barley, ResidueType=Barley, Mass=400, CNRatio=80, StandingFraction=1}
          ResidueTypes: LoadFromResource=ResidueTypes
        SurfaceOrganicMatter BareSoil: PoolName=Barley; type=Barley; mass=0; standing_fraction=1; cnr=80; CriticalResidueWeight=2000; OptimumDecompTemp=20; MaxCumulativeEOS=20; CNRatioDecompCoeff=0.277; CNRatioDecompThreshold=25; TotalLeachRain=25; MinRainToLeach=10; CriticalMinimumOrganicC=0.004; DefaultCPRatio=0; DefaultStandingFraction=0; StandingExtinctCoeff=0.5; FractionFaecesAdded=0.5
          Pools:
            {PoolName=Barley, ResidueType=Barley, Mass=0, CNRatio=80, StandingFraction=1}
          ResidueTypes: LoadFromResource=ResidueTypes
    Simulation Base
      Weather: FileName=lincoln.met
      Clock: StartDate=2010-02-25; EndDate=2010-10-01
      Summary
      Zone Field: Area=0; Slope=0
        Soil: ASCOrder=Vertosol; ASCSubOrder=Black; SoilType=Clay; Site=Norwin; NearestTown=Norwin; Region=Darling Downs and Granite Belt; State=Queensland; Country=Australia; NaturalVegetation=Qld. Bluegrass, possible Qld. Blue gum; ApsoilNumber=900; Latitude=-27.581836; Longitude=151.320206; Area=0; LocationAccuracy=+/- 20m
          DataSource=CSIRO Sustainable Ecosystems, Toowoomba; Characteriesd as part of the GRDC funded project"Doing it better, doing it smarter, managing soil water in Australian agriculture' 2011
          Comments=OC, CLL for all crops estimated-based on Bongeen Mywybilla Soil No1
          Water
            Thickness  BD    AirDry  LL15  DUL   SAT   KS
            10         1.3   0.06    0.08  0.27  0.4   999
            190        1.3   0.06    0.08  0.27  0.4   999
            200        1.3   0.12    0.12  0.25  0.38  300
            200        1.3   0.11    0.11  0.27  0.4   100
            200        1.52  0.07    0.07  0.2   0.31  90
            200        1.52  0.07    0.07  0.2   0.31  90
            200        1.52  0.17    0.17  0.3   0.36  90
            200        1.65  0.16    0.16  0.29  0.35  90
          MultiPoreWater: Salb=0.15; SubProfileConductance=100; WaterTableDepth=3; CalculateInfiltration=true; CalculateDrainage=true; ReportDetail=false; IncludeSorption=true; CalculateEvaporation=true; CalculateDiffusion=true; DiffusivityMultiplier=10; TotalCover=0; ResidueWater=0; Hour=0; ReportLayer=0; TimeStep=0
            Thickness  CFlow  XFlow  PsiBub
            10         8E-12  3.9    -15
            190        7E-12  3.8    -15
            200        7E-12  3.6    -15
            200        7E-12  3.6    -15
            200        7E-12  3.6    -15
            200        7E-12  3.6    -15
            200        7E-12  3.6    -15
            200        7E-12  3.6    -15
          SoilNitrogen: fom_type=[default, manure, mucuna, lablab, shemp, stable]; fract_carb=[0.2, 0.3, 0.54, 0.57, 0.45, 0]; fract_cell=[0.7, 0.3, 0.37, 0.37, 0.47, 0.1]; fract_lign=[0.1, 0.4, 0.09, 0.06, 0.08, 0.9]; wfpsN2N2O_x=[22, 88]; wfpsN2N2O_y=[0.1, 1]
          Evapotranspiration
          SoilOrganicMatter: RootCN=40; RootWt=1000; SoilCN=11; EnrACoeff=7.4; EnrBCoeff=0.2; OCUnits=Total
            Thickness  OC    FBiom  FInert
            200        2.63  0.03   0.4
            200        1.25  0.02   0.7
            200        0.32  0.01   0.8
            200        0.21  0.01   0.9
            200        0.2   0.01   1
            200        0.2   0.01   1
            200        0.2   0.01   1
          Analysis: Thickness=[200, 200, 200, 200, 200, 200, 200]; PH=[6, 6, 6, 6, 6, 6, 6]; PHUnits=Water; BoronUnits=HotWater
          Sample InitialConditions: NO3Units=kgha; NH4Units=kgha; SWUnits=Volumetric; OCUnits=Total; PHUnits=Water
            Thickness  NO3   NH4   SW
            10         5.6   0.26  0.253
            190        110   0.26  0.253
            200        77    0.3   0.175
            200        57.8  0.3   0.15
            200        33.8  0.3   0.1
            200        33.8  0.3   0.13
            200        0     0.3   0.25
            200        0     0.3   0.29
          MRSpline
        Irrigation
        Fertiliser
        SurfaceOrganicMatter: same as Residues.Factors.Cover.StandingStubble
        MicroClimate: a_interception=0; b_interception=1; c_interception=0; d_interception=0; soil_albedo=0.3; air_pressure=1010; soil_emissivity=0.96; sun_angle=15; soil_heat_flux_fraction=0.4; night_interception_fraction=0.5; windspeed_default=3; refheight=2; albedo=0.293662; emissivity=0.96; gsmax=0.01; r50=200; RadIntTotal=0
        Report
          VariableNames:
            [Clock].Today
            [SurfaceOrganicMatter].Cover
            [SurfaceOrganicMatter].Wt
            [Soil].SoilWater.SWmm
            [Weather].Rain
            [Soil].Thickness
            [Soil].SoilWater.Es
            [Irrigation].IrrigationApplied
            [Soil].SoilWater.SW
            [Soil].SoilWater.Runoff
            [Soil].SoilWater.Infiltration
            [Soil].SoilWater.Drainage
            [Soil].SoilWater.LL15
            [Soil].SoilWater.DUL
            [Soil].SoilWater.LL15mm
            [Soil].SoilWater.DULmm
            sum([Soil].SoilWater.SWmm[1:4]) as ProfileWater
            sum([Soil].SoilWater.SWmm[1:2]) as Water1
            sum([Soil].SoilWater.SWmm) as TotalProfileWater
            sum([Soil].SoilWater.SWmm[1:2])/200 as WC1
            [ExtraVariables].Script.SWDep60
            [ExtraVariables].Script.FomN
            [ExtraVariables].Script.HumN
            [ExtraVariables].Script.BiomN
            [ExtraVariables].Script.DltNMinRes
            [ExtraVariables].Script.DltNMinTot
            [ExtraVariables].Script.AccumPlantN
            [ExtraVariables].Script.AccumMineralisation
            [ExtraVariables].Script.AccumDenit
            [ExtraVariables].Script.AccumFert
            [ExtraVariables].Script.AccumLeach
            [ExtraVariables].Script.AccumDetach
            [ExtraVariables].Script.DeltaSoilOMN
            [ExtraVariables].Script.DeltaSurfaceOMN
            [ExtraVariables].Script.DeltaSoilMineralN
            [ExtraVariables].Script.AccumEO
            [ExtraVariables].Script.AccumEP
            [ExtraVariables].Script.AccumES
            [ExtraVariables].Script.AccumDrainage
            [ExtraVariables].Script.AccumRunoff
            [ExtraVariables].Script.AccumRainfall
            [ExtraVariables].Script.AccumIrrigation
            [ExtraVariables].Script.AccumOutflowLat
            [ExtraVariables].Script.SoilWaterDeficit
            [Soil].SoilNitrogen.Denitrification
            [ExtraVariables].Script.MineralN
            [Soil].NO3N
            [Soil].NH4N
            [Soil].SoilNitrogen.urea
            [Soil].Water.DUL
          EventNames:
            [Clock].DoReport
        Operations
          2010-03-05  [Irrigation].Apply(26.6);
          2010-03-08  [Irrigation].Apply(30.4);
          2010-03-09  [Irrigation].Apply(100);
          2010-03-12  [Irrigation].Apply(10);
        Manager ExtraVariables
```csharp
using System;
using Models.Core;
using System.Collections.Generic;
using System.Text;
using Models.Soils;
using Models;
using System.Xml.Serialization;
using APSIM.Shared.Utilities;

namespace Models
{
	[Serializable] 
	public class Script : Model
	{
		[Link] Clock Clock;
		[Link] Soils.Soil Soil;
		[Link] Models.SurfaceOM.SurfaceOrganicMatter SOM;
		[Link] Weather Met;
		[Link] Fertiliser Fert;
		[Link] Irrigation Irrig;
					
		[XmlIgnore] public bool InitialDay { get; set; }
		
		[XmlIgnore] public double AccumPlantN { get; set; }
		[XmlIgnore] public double AccumMineralisation { get; set; }
		[XmlIgnore] public double AccumDenit { get; set; }
		[XmlIgnore] public double AccumFert { get; set; }
		[XmlIgnore] public double AccumLeach { get; set; }
		[XmlIgnore] public double AccumDetach { get; set; }
		[XmlIgnore] public double DeltaSoilOMN { get; set; }
		[XmlIgnore] public double DeltaSurfaceOMN { get; set; }
		[XmlIgnore] public double DeltaSoilMineralN { get; set; }
		[XmlIgnore] public double SoilNitrogenContent { get; set; }
		
		[XmlIgnore] public double AccumEO { get; set; }
		[XmlIgnore] public double AccumEP { get; set; }
		[XmlIgnore] public double AccumES { get; set; }
		[XmlIgnore] public double AccumDrainage { get; set; }
		[XmlIgnore] public double AccumRunoff { get; set; }
		[XmlIgnore] public double AccumOutflowLat { get; set; }
		[XmlIgnore] public double AccumIrrigation { get; set; }
		[XmlIgnore] public double AccumRainfall { get; set; }
		[XmlIgnore] public double SoilWaterDeficit { get; set; }
		
		[XmlIgnore] public double AccumTtemerg { get; set; }
		
		[XmlIgnore] public double  InitialSoilOMN { get; set; }
		[XmlIgnore] public double  InitialSurfaceOMN { get; set; }
		[XmlIgnore] public double  InitialMineralN { get; set; }
		
		[XmlIgnore] public double SWC { get; set; }
		[XmlIgnore] public double DUL { get; set; }
		[XmlIgnore] public double OutFlowLat { get; set; }
		[XmlIgnore] public double SWDep60 { get; set; }
		[XmlIgnore] public double Flux1 { get; set; }
		[XmlIgnore] public double Flux3 { get; set; }
		
		[XmlIgnore] public double FomN { get; set; }
		[XmlIgnore] public double BiomN { get; set; }
		[XmlIgnore] public double HumN { get; set; }
		[XmlIgnore] public double OrganicN { get; set; }
		[XmlIgnore] public double NO3N { get; set; }
		[XmlIgnore] public double NH4N { get; set; }
		[XmlIgnore] public double UreaN { get; set; }
		[XmlIgnore] public double MineralN { get; set; }
		[XmlIgnore] public double DltNMinRes { get; set; }
		[XmlIgnore] public double DltNMinTot { get; set; }
		
		[EventSubscribe("Commencing")]
		private void OnSimulationCommencing(object sender, EventArgs e)
		{
			InitialDay = true;
		}
		
		[EventSubscribe("DoManagement")]
		private void OnDoManagement(object sender, EventArgs e)
		{
			//!!!!!! Nitrogen balance components !!!!!!
			//!!!!!!^^^^^^^^^^^^^^^^^^^^^^^^^^^^^!!!!!!
			FomN = MathUtilities.Sum(Soil.SoilNitrogen.FOMN);
			HumN = MathUtilities.Sum(Soil.SoilNitrogen.HumicN);
			BiomN = MathUtilities.Sum(Soil.SoilNitrogen.MicrobialN);
			OrganicN = FomN + HumN + BiomN;
			NO3N = MathUtilities.Sum(Soil.NO3N);
			NH4N = MathUtilities.Sum(Soil.NH4N);
			UreaN = MathUtilities.Sum(Soil.SoilNitrogen.urea);
			MineralN = NO3N + NH4N + UreaN; 
			DltNMinRes = MathUtilities.Sum(Soil.SoilNitrogen.dlt_n_min_res);
			DltNMinTot = MathUtilities.Sum(Soil.SoilNitrogen.MineralisedN);
			int layers = Soil.Thickness.Length;
			if (InitialDay == true)
			{
				InitialSurfaceOMN = SOM.N;
				InitialSoilOMN = OrganicN;
				InitialMineralN = MineralN;
				InitialDay = false;
			}
			AccumFert += Fert.NitrogenApplied;
			DeltaSurfaceOMN = SOM.N - InitialSurfaceOMN;
			AccumLeach = AccumLeach - Soil.SoilWater.LeachNH4 - Soil.SoilWater.LeachNO3 - Soil.SoilWater.LeachUrea; //Fails
			AccumMineralisation += MathUtilities.Sum(Soil.SoilNitrogen.MineralisedN);
			AccumDenit -= MathUtilities.Sum(Soil.SoilNitrogen.Denitrification);
			DeltaSoilOMN = OrganicN - InitialSoilOMN;
			DeltaSoilMineralN = MineralN - InitialMineralN;
			SoilNitrogenContent = MineralN;
			
			//!!!!!! Water balance components !!!!!!
			//!!!!!!^^^^^^^^^^^^^^^^^^^^^^^^^^!!!!!!

			AccumIrrigation += Irrig.IrrigationApplied; 
			AccumRainfall += Met.Rain;
			SWDep60 = 0;
			SWC = MathUtilities.Sum(Soil.SoilWater.SWmm);
			DUL = MathUtilities.Sum(Soil.SoilWater.DULmm);
			SoilWaterDeficit = (SWC - DUL);
			double OutFlowLat = MathUtilities.Sum(Soil.SoilWater.outflow_lat);
			AccumOutflowLat -= OutFlowLat;
			SWDep60 = Soil.SoilWater.SWmm[0] + Soil.SoilWater.SWmm[1] + Soil.SoilWater.SWmm[2];
		}
		
		[EventSubscribe("DoManagementCalculations")]
		private void OnDoManagementCalculations(object sender, EventArgs e)
		{
			int layers = Soil.Thickness.Length;			
			AccumEO -= Soil.SoilWater.Eo;
			AccumES -= Soil.SoilWater.Es; 
			AccumDrainage -= Soil.SoilWater.Drainage;
			AccumRunoff -= Soil.SoilWater.Runoff;
		}
	}
}
```
        Report Params: EventNames=[Clock].StartOfSimulation
          VariableNames:
            [Clock].Today
            [Soil].SoilWater.HydraulicConductivityIn
            [Soil].SoilWater.PsiUpper
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