Simulations: Version=57
  Memo TitlePage
    # Evaluation of simulations of multi-species pasture

    _Rogerio Cichota, Plant and Food Research, New Zealand_

    ##Preamble
    Pastoral systems in New Zealand and around the world rely on a few managed plant species. Generally the swards comprise a grass species and may contain companion plants, as well as weeds. Thus pastures are typically composed of multiple species that compete but may also complement each other.  A very common managed sward is the grass-legume mix, with ryegrass-white clover being the prototypical mixture for subtropical and temperate grasslands.  Such combination of species is very successful due to synegies between the two species, with complementary growth patterns and the N fixation capability of white-clover.  However, the traditional ryegrass-white clover mixture can be succeptible to drought, has a very seasonal growth pattern, and typically has high N content in the green biomass which can lead to high levels of urinary N excreted by animals, a major source of N losses from pastoral grazing systems.
    The limitations of the traditional binary mixed pasture have led to increased interest in the use of alternative forage species, such as forbs, and on increasing the number of species in the sward. The importance of plant species diversity for enhancing ecosystem function has been debated by ecologists for some time (refs). The benefits include increased total biomass production, greater yield stability, improved soil quality and protection, improved water and nutrient use, among others.  However, the addition of alternative species can change the pasture’s seasonal growth pattern and the pattern will change with time as some species tend to become dominant and others are less persistant.
    Quantifying the performance of these alternative species when used in mixed swards and under different management is still an issue that needs further study .  Considering the limitation in scope and environmental conditions that can covered by experimentation, modelling must be an integral part of studying alternative and diverse pastures.

    **Objective:** Assemble and test a few combination of forage plant species in multi-species swards.  This will include comparison against experimental data and sensitivity analyses using simulatiopn that include species with current available forage models.

    ## Generic background
  Replacements
    Manager ExtraVariables
```csharp
using Models.Interfaces;
using System;
using Models.Core;
using System.Collections.Generic;
using System.Text;
using Models.Soils;
using Models.PMF;
using Models;
using System.Xml.Serialization;
using APSIM.Shared.Utilities;
using Models.Interfaces;

namespace Models
{
    [Serializable] 
    public class Script : Model
    {
        [Link] private Clock Clock;
        [Link] private Zone zone;
        [Link] private Weather Met;
        [Link] private Fertiliser Fert;
        [Link] private Irrigation Irrig;
        [Link] private Plant WhiteClover;
        [Link] private ISummary summary;
        [Link] Models.Surface.SurfaceOrganicMatter SOM;
        [Link] Soils.Soil Soil;
        [ScopedLinkByName] private ISolute Urea;
        [ScopedLinkByName] private ISolute NO3;
        [ScopedLinkByName] private ISolute NH4;
        [ScopedLinkByName] private SoilNitrogen SoilNitrogen;
                    
        [XmlIgnore] public bool InitialDay { get; set; }
        [XmlIgnore] public double  InitialSoilOMN { get; set; }
        [XmlIgnore] public double  InitialSurfaceOMN { get; set; }
        [XmlIgnore] public double  InitialMineralN { get; set; }
        [XmlIgnore] public double AccumHarvestedWt { get; set; }
        [XmlIgnore] public double AccumHarvestedN { get; set; }
        [XmlIgnore] public double HerbageNConc { get; set; }

        private DateTime YearStartDate;
        private double yesterdayNconc;

        [EventSubscribe("Commencing")]
        private void OnSimulationCommencing(object sender, EventArgs e)
        {
            InitialDay = true;
        }
        
        [EventSubscribe("StartOfDay")]
        private void OnStartOfDay(object sender, EventArgs e)
        {
            double allDM = (double)zone.Get("Chicory.Leaf.Wt")+(double)zone.Get("Chicory.Stem.Wt")+(double)zone.Get("Chicory.Inflorescence.Wt")
            +(double)zone.Get("Plantain.Leaf.Wt")+(double)zone.Get("Plantain.Stem.Wt")+(double)zone.Get("Plantain.Inflorescence.Wt")
            +(double)zone.Get("WhiteClover.Leaf.Wt")+(double)zone.Get("WhiteClover.Petiole.Wt")+(double)zone.Get("WhiteClover.Inflorescence.Wt")
            +(double)zone.Get("Ryegrass.StandingHerbageWt")+(double)zone.Get("AgLucerne.StandingHerbageWt");
            double allN = (double)zone.Get("Chicory.Leaf.N")+(double)zone.Get("Chicory.Stem.N")+(double)zone.Get("Chicory.Inflorescence.N")
            +(double)zone.Get("Plantain.Leaf.N")+(double)zone.Get("Plantain.Stem.N")+(double)zone.Get("Plantain.Inflorescence.N")
            +(double)zone.Get("WhiteClover.Leaf.N")+(double)zone.Get("WhiteClover.Petiole.N")+(double)zone.Get("WhiteClover.Inflorescence.N")
            +(double)zone.Get("Ryegrass.StandingHerbageN")+(double)zone.Get("AgLucerne.StandingHerbageN");
            yesterdayNconc =  MathUtilities.Divide(allN, allDM, 0.0);
        }

        [EventSubscribe("DoManagement")]
        private void OnDoManagement(object sender, EventArgs e)
        {
            if (InitialDay == true)
            {
                InitialSurfaceOMN = SOM.N;
                InitialSoilOMN = MathUtilities.Sum(SoilNitrogen.FOMN)+MathUtilities.Sum(SoilNitrogen.MicrobialN)+MathUtilities.Sum(SoilNitrogen.HumicN);
                InitialMineralN = MathUtilities.Sum(Urea.kgha)+MathUtilities.Sum(NH4.kgha)+MathUtilities.Sum(NO3.kgha);
                InitialDay = false;

                // check whether we're in the north or south hemisphere
                if (Met.Latitude >= 0.0)
                    YearStartDate = DateTime.Parse("01/01/2000");
                else
                    YearStartDate = DateTime.Parse("01/07/2000");
            }

            HerbageNConc = yesterdayNconc;
        }
        
        [EventSubscribe("DoManagementCalculations")]
        private void OnDoManagementCalculations(object sender, EventArgs e)
        {
            //!!!!!! Plant Harvest !!!!!!
            if (Clock.Today.DayOfYear == YearStartDate.DayOfYear)
            {
                AccumHarvestedWt = (double)zone.Get("[Defoliate].Script.DefoliatedDM");
                AccumHarvestedN = (double)zone.Get("[Defoliate].Script.DefoliatedN");
            }
            else
            {
                AccumHarvestedWt += (double)zone.Get("[Defoliate].Script.DefoliatedDM");
                AccumHarvestedN += (double)zone.Get("[Defoliate].Script.DefoliatedN");
            }
        }
    }
}
```
    Report: EventNames=[Clock].DoReport
      VariableNames:
        [Clock].Today as Date
        [Clock].Today.DayOfYear as DayOfYear
        [Weather].Radn as SolarRadiation
        [MicroClimate].NetRadiation
        ([Chicory].Leaf.RadIntTot+[Plantain].Leaf.RadIntTot+[WhiteClover].Leaf.RadIntTot+[Ryegrass].InterceptedRadn+[AgLucerne].InterceptedRadn) as InterceptedRadiation
        [Weather].MeanT
        [Weather].Rain as Rainfall
        [Irrigation].IrrigationApplied as IrrigationApplied
        [MicroClimate].PrecipitationInterception as PrecipitationInterception
        [MicroClimate].PetTotal
        [Soil].SoilWater.Eo as Eo
        [Soil].SoilWater.Es as Evaporation
        ([Chicory].Leaf.Transpiration+[Plantain].Leaf.Transpiration+[WhiteClover].Leaf.Transpiration+sum([Ryegrass].WaterUptake)+sum([AgLucerne].WaterUptake)) as Transpiration
        [Soil].SoilWater.pond as PondedWater
        [Soil].SoilWater.Drainage as Drainage
        [Soil].SoilWater.Runoff as Runoff
        sum([Soil].SoilWater.LateralOutflow) as LateralFlow
        sum([Soil].SoilWater.SWmm) as TotalSWC
        sum([Soil].DULmm) as TotalDUL
        sum([Soil].LL15mm) as TotalLL15
        [Soil].SoilWater.SW[1] as SWCTopLayer
        [Soil].DUL[1] as DULTopLayer
        [Fertiliser].NitrogenApplied as FertiliserN
        sum([Soil].SoilNitrogen.Denitrification) as DenitrifiedN
        ([Soil].SoilWater.LeachNH4 + [Soil].SoilWater.LeachNO3) as LeachedN
        (([Chicory].Root.NTakenUp+[Plantain].Root.NTakenUp+[WhiteClover].Root.NTakenUp)*10+[Ryegrass].SoilUptakeN+[AgLucerne].SoilUptakeN) as UptakeN
        sum([Soil].SoilNitrogen.MineralisedN) as MineralisedSoilN
        sum([Soil].SoilNitrogen.dlt_n_min_res) as MineralisedSurfOMN
        ([Chicory].Leaf.Detached.N+[Chicory].Stem.Detached.N+[Chicory].Inflorescence.Detached.N+[Plantain].Leaf.Detached.N+[Plantain].Stem.Detached.N+[Plantain].Inflorescence.Detached.N+[WhiteClover].Leaf.Detached.N+[WhiteClover].Petiole.Detached.N+[WhiteClover].Stolon.Detached.N+[WhiteClover].Inflorescence.Detached.N+[Ryegrass].LitterDepositionN*0.1+[AgLucerne].LitterDepositionN*0.1) as DetachedAGN
        ([Chicory].Taproot.Detached.N+[Chicory].Root.Detached.N+[Plantain].Taproot.Detached.N+[Plantain].Root.Detached.N+[WhiteClover].Taproot.Detached.N+[WhiteClover].Root.Detached.N+[Ryegrass].RootDetachedN*0.1+[AgLucerne].RootDetachedN*0.1) as DetachedBGN
        (10*([Chicory].Leaf.Detached.N+[Chicory].Stem.Detached.N+[Chicory].Inflorescence.Detached.N+[Plantain].Leaf.Detached.N+[Plantain].Stem.Detached.N+[Plantain].Inflorescence.Detached.N+[WhiteClover].Leaf.Detached.N+[WhiteClover].Petiole.Detached.N+[WhiteClover].Stolon.Detached.N+[WhiteClover].Inflorescence.Detached.N+[Chicory].Taproot.Detached.N+[Chicory].Root.Detached.N+[Plantain].Taproot.Detached.N+[Plantain].Root.Detached.N+[WhiteClover].Taproot.Detached.N+[WhiteClover].Root.Detached.N)+[Ryegrass].LitterDepositionN+[Ryegrass].RootDetachedN+[AgLucerne].LitterDepositionN+[AgLucerne].RootDetachedN) as DetachedTotalN
        (10*[WhiteClover].Nodule.NFixed + [AgLucerne].FixedN) as FixedN
        (sum([Soil].SoilNitrogen.Urea.kgha) + sum([Soil].SoilNitrogen.NH4.kgha) + sum([Soil].SoilNitrogen.NO3.kgha)) as SoilNContent
        sum([Soil].SoilNitrogen.Urea.kgha) as SoilUrea
        sum([Soil].SoilNitrogen.NH4.kgha) as SoilNH4
        sum([Soil].SoilNitrogen.NO3.kgha) as SoilNO3
        (sum([Soil].SoilNitrogen.NH4.kgha[1:4])+sum([Soil].SoilNitrogen.NO3.kgha[1:4])) as TopSoilN
        [SurfaceOrganicMatter].N as TotalSurfOMN
        sum([Soil].SoilNitrogen.FOMN) as TotalFOMN
        sum([Soil].SoilNitrogen.HumicN) as TotalHumicN
        sum([Soil].SoilNitrogen.MicrobialN as TotalMicrobialN
        [Defoliate].Script.RotationHarvestedDM as RotationHarvestedWt
        [Defoliate].Script.PreHarvestDM
        [Defoliate].Script.PostHarvestDM
        [Defoliate].Script.DefoliatedN as NTakenOff
        [Defoliate].Script.HarvestedN
        (10*[Defoliate].Script.RemovedN) as Defoliate.Script.RemovedN
        [Defoliate].Script.DefoliatedDM as HarvestedWt
        [Defoliate].Script.RemovedNConc
        [ExtraVariables].Script.AccumHarvestedWt as CumulativeHarvestedWt
        [ExtraVariables].Script.AccumHarvestedN as CumulativeNTakenOff
        ([Chicory].Total.Wt+[Plantain].Total.Wt+[WhiteClover].Total.Wt+[Ryegrass].TotalWt*0.1+[AgLucerne].TotalWt*0.1) as TotalPlantWt
        ([Chicory].AboveGroundLive.Wt+[Plantain].AboveGroundLive.Wt+[WhiteClover].AboveGroundLive.Wt+[Ryegrass].AboveGroundLiveWt*0.1+[AgLucerne].AboveGroundLiveWt*0.1+[Chicory].BelowGround.Wt+[Plantain].BelowGround.Wt+[WhiteClover].BelowGround.Wt+[Ryegrass].BelowGroundWt*0.1+[AgLucerne].BelowGroundWt*0.1) as TotalPlantLiveWt
        ([Chicory].AboveGround.Wt+[Plantain].AboveGround.Wt+[WhiteClover].AboveGround.Wt+[Ryegrass].AboveGroundWt*0.1+[AgLucerne].AboveGroundWt*0.1) as AboveGroundWt
        ([Chicory].BelowGround.Wt+[Plantain].BelowGround.Wt+[WhiteClover].BelowGround.Wt+[Ryegrass].BelowGroundWt*0.1+[AgLucerne].BelowGroundWt*0.1) as BelowGroundWt
        ([Chicory].Total.N+[Plantain].Total.N+[WhiteClover].Total.N+[Ryegrass].TotalN*0.1+[AgLucerne].TotalN*0.1) as TotalPlantN
        ([Chicory].AboveGround.N+[Plantain].AboveGround.N+[WhiteClover].AboveGround.N+[Ryegrass].AboveGroundN*0.1+[AgLucerne].AboveGroundN*0.1) as AboveGroundN
        ([Chicory].BelowGround.N+[Plantain].BelowGround.N+[WhiteClover].BelowGround.N+[Ryegrass].BelowGroundN*0.1+[AgLucerne].BelowGroundN*0.1) as BelowGroundN
        (([Chicory].AboveGround.N+[Plantain].AboveGround.N+[WhiteClover].AboveGround.N+[Ryegrass].AboveGroundN*0.1+[AgLucerne].AboveGroundN*0.1)/([Chicory].AboveGround.Wt+[Plantain].AboveGround.Wt+[WhiteClover].AboveGround.Wt+[Ryegrass].AboveGroundWt*0.1+[AgLucerne].AboveGroundWt*0.1+0.000001)) as AboveGroundNConc
        (([Chicory].BelowGround.N+[Plantain].BelowGround.N+[WhiteClover].BelowGround.N+[Ryegrass].BelowGroundN*0.1+[AgLucerne].BelowGroundN*0.1)/([Chicory].BelowGround.Wt+[Plantain].BelowGround.Wt+[WhiteClover].BelowGround.Wt+[Ryegrass].BelowGroundWt*0.1+[AgLucerne].BelowGroundWt*0.1+0.000001)) as BelowGroundNConc
        ([Chicory].AboveGroundLive.Wt+[Plantain].AboveGroundLive.Wt+[WhiteClover].AboveGroundLive.Wt+[Ryegrass].AboveGroundLiveWt*0.1+[AgLucerne].AboveGroundLiveWt*0.1) as AboveGroundLiveWt
        ([Chicory].AboveGroundLive.N+[Plantain].AboveGroundLive.N+[WhiteClover].AboveGroundLive.N+[Ryegrass].AboveGroundLiveN*0.1+[AgLucerne].AboveGroundLiveN*0.1) as AboveGroundDeadWt
        ([Chicory].BelowGround.Wt+[Plantain].BelowGround.Wt+[WhiteClover].BelowGround.Wt+[Ryegrass].BelowGroundWt*0.1+[AgLucerne].BelowGroundWt*0.1) as BelowGroundLiveWt
        (([Chicory].AboveGroundLive.N+[Plantain].AboveGroundLive.N+[WhiteClover].AboveGroundLive.N+[Ryegrass].AboveGroundLiveN*0.1+[AgLucerne].AboveGroundLiveN*0.1)/([Chicory].AboveGroundLive.Wt+[Plantain].AboveGroundLive.Wt+[WhiteClover].AboveGroundLive.Wt+[Ryegrass].AboveGroundLiveWt*0.1+[AgLucerne].AboveGroundLiveWt*0.1+0.000001)) as AboveGroundLiveNc
        [ExtraVariables].Script.HerbageNConc as HerbageNConc
        [Chicory].Total.Wt
        ([Chicory].AboveGroundLive.Wt+[Chicory].BelowGroundLive.Wt) as Chicory.TotalLive.Wt
        [Chicory].AboveGround.Wt
        [Chicory].BelowGround.Wt
        [Chicory].AboveGroundLive.Wt
        ([Chicory].AboveGround.Wt-[Chicory].AboveGroundLive.Wt) as Chicory.AboveGroundDead.Wt
        [Chicory].BelowGroundLive.Wt
        [Chicory].Total.N
        [Chicory].AboveGround.N
        [Chicory].BelowGround.N
        [Chicory].AboveGround.NConc
        [Chicory].BelowGround.NConc
        [Chicory].AboveGroundLive.NConc
        (([Chicory].Leaf.N+[Chicory].Stem.N+[Chicory].Inflorescence.N)/(([Chicory].Leaf.Wt+[Chicory].Stem.Wt+[Chicory].Inflorescence.Wt+0.000001)) as ChicoryHerbageNConc
        [Plantain].Total.Wt
        ([Plantain].AboveGroundLive.Wt+[Plantain].BelowGroundLive.Wt) as Plantain.TotalLive.Wt
        [Plantain].AboveGround.Wt
        [Plantain].BelowGround.Wt
        [Plantain].AboveGroundLive.Wt
        ([Plantain].AboveGround.Wt-[Plantain].AboveGroundLive.Wt) as Plantain.AboveGroundDead.Wt
        [Plantain].BelowGroundLive.Wt
        [Plantain].Total.N
        [Plantain].AboveGround.N
        [Plantain].BelowGround.N
        [Plantain].AboveGround.NConc
        [Plantain].BelowGround.NConc
        [Plantain].AboveGroundLive.NConc
        (([Plantain].Leaf.N+[Plantain].Stem.N+[Plantain].Inflorescence.N)/(([Plantain].Leaf.Wt+[Plantain].Stem.Wt+[Plantain].Inflorescence.Wt+0.000001)) as PlantainHerbageNConc
        ([Ryegrass].TotalWt*0.1) as Ryegrass.Total.Wt
        ([Ryegrass].AboveGroundLiveWt*0.1+[Ryegrass].BelowGroundWt*0.1) as Ryegrass.TotalLive.Wt
        ([Ryegrass].AboveGroundWt*0.1) as Ryegrass.AboveGround.Wt
        ([Ryegrass].BelowGroundWt*0.1) as Ryegrass.BelowGround.Wt
        ([Ryegrass].AboveGroundLiveWt*0.1) as Ryegrass.AboveGroundLive.Wt
        ([Ryegrass].AboveGroundDeadWt*0.1) as Ryegrass.AboveGroundDead.Wt
        ([Ryegrass].BelowGroundWt*0.1) as Ryegrass.BelowGroundLive.Wt
        ([Ryegrass].TotalN*0.1) as Ryegrass.Total.N
        ([Ryegrass].AboveGroundN*0.1) as Ryegrass.AboveGround.N
        ([Ryegrass].BelowGroundN*0.1) as Ryegrass.BelowGround.N
        [Ryegrass].AboveGroundNConc as Ryegrass.AboveGround.NConc
        ([Ryegrass].BelowGroundN/([Ryegrass].BelowGroundWt+0.000001)) as Ryegrass.BelowGround.NConc
        ([Ryegrass].AboveGroundLiveN/([Ryegrass].AboveGroundLiveWt+0.000001)) as Ryegrass.AboveGroundLive.NConc
        [Ryegrass].StandingHerbageNConc as RyegrassHerbageNConc
        ([AgLucerne].TotalWt*0.1) as Lucerne.Total.Wt
        ([AgLucerne].AboveGroundLiveWt*0.1+[AgLucerne].BelowGroundWt*0.1) as Lucerne.TotalLive.Wt
        ([AgLucerne].AboveGroundWt*0.1) as Lucerne.AboveGround.Wt
        ([AgLucerne].BelowGroundWt*0.1) as Lucerne.BelowGround.Wt
        ([AgLucerne].AboveGroundLiveWt*0.1) as Lucerne.AboveGroundLive.Wt
        ([AgLucerne].AboveGroundDeadWt*0.1) as Lucerne.AboveGroundDead.Wt
        ([AgLucerne].BelowGroundWt*0.1) as Lucerne.BelowGroundLive.Wt
        ([AgLucerne].TotalN*0.1) as Lucerne.Total.N
        ([AgLucerne].AboveGroundN*0.1) as Lucerne.AboveGround.N
        ([AgLucerne].BelowGroundN*0.1) as Lucerne.BelowGround.N
        [AgLucerne].AboveGroundNConc as Lucerne.AboveGround.NConc
        ([AgLucerne].BelowGroundN/([AgLucerne].BelowGroundWt+0.000001)) as Lucerne.BelowGround.NConc
        ([AgLucerne].AboveGroundLiveN/([AgLucerne].AboveGroundLiveWt+0.000001)) as Lucerne.AboveGroundLive.NConc
        [AgLucerne].StandingHerbageNConc as LucerneHerbage.NConc
        [WhiteClover].Total.Wt
        [WhiteClover].TotalLive.Wt
        [WhiteClover].AboveGround.Wt
        [WhiteClover].BelowGround.Wt
        [WhiteClover].AboveGroundLive.Wt
        [WhiteClover].AboveGroundDead.Wt
        [WhiteClover].BelowGroundLive.Wt
        [WhiteClover].Total.N
        [WhiteClover].AboveGround.N
        [WhiteClover].BelowGround.N
        [WhiteClover].AboveGround.NConc
        [WhiteClover].BelowGround.NConc
        [WhiteClover].AboveGroundLive.NConc
        (([WhiteClover].Leaf.N+[WhiteClover].Petiole.N+[WhiteClover].Inflorescence.N)/(([WhiteClover].Leaf.Wt+[WhiteClover].Petiole.Wt+[WhiteClover].Inflorescence.Wt+0.000001)) as WhiteCloverHerbageNConc
        ([Chicory].AboveGround.Wt/([Chicory].AboveGround.Wt+[Plantain].AboveGround.Wt+[WhiteClover].AboveGround.Wt+[Ryegrass].AboveGroundWt*0.1+[AgLucerne].AboveGroundWt*0.1+0.000001)) as Chicory.BiomassFraction
        ([Plantain].AboveGround.Wt/([Chicory].AboveGround.Wt+[Plantain].AboveGround.Wt+[WhiteClover].AboveGround.Wt+[Ryegrass].AboveGroundWt*0.1+[AgLucerne].AboveGroundWt*0.1+0.000001)) as Plantain.BiomassFraction
        ([WhiteClover].AboveGround.Wt/([Chicory].AboveGround.Wt+[Plantain].AboveGround.Wt+[WhiteClover].AboveGround.Wt+[Ryegrass].AboveGroundWt*0.1+[AgLucerne].AboveGroundWt*0.1+0.000001)) as WhiteClover.BiomassFraction
        ([Ryegrass].AboveGroundWt*0.1/([Chicory].AboveGround.Wt+[Plantain].AboveGround.Wt+[WhiteClover].AboveGround.Wt+[Ryegrass].AboveGroundWt*0.1+[AgLucerne].AboveGroundWt*0.1+0.000001)) as Ryegrass.BiomassFraction
        ([AgLucerne].AboveGroundWt*0.1/([Chicory].AboveGround.Wt+[Plantain].AboveGround.Wt+[WhiteClover].AboveGround.Wt+[Ryegrass].AboveGroundWt*0.1+[AgLucerne].AboveGroundWt*0.1+0.000001)) as Lucerne.BiomassFraction
        ([Chicory].AboveGround.N/([Chicory].AboveGround.N+[Plantain].AboveGround.N+[WhiteClover].AboveGround.N+[Ryegrass].AboveGroundN*0.1+[AgLucerne].AboveGroundN*0.1+0.000001)) as Chicory.NitrogenFraction
        ([Plantain].AboveGround.N/([Chicory].AboveGround.N+[Plantain].AboveGround.N+[WhiteClover].AboveGround.N+[Ryegrass].AboveGroundN*0.1+[AgLucerne].AboveGroundN*0.1+0.000001)) as Plantain.NitrogenFraction
        ([WhiteClover].AboveGround.N/([Chicory].AboveGround.N+[Plantain].AboveGround.N+[WhiteClover].AboveGround.N+[Ryegrass].AboveGroundN*0.1+[AgLucerne].AboveGroundN*0.1+0.000001)) as WhiteClover.NitrogenFraction
        ([Ryegrass].AboveGroundN*0.1/([Chicory].AboveGround.N+[Plantain].AboveGround.N+[WhiteClover].AboveGround.N+[Ryegrass].AboveGroundN*0.1+[AgLucerne].AboveGroundN*0.1+0.000001)) as Ryegrass.NitrogenFraction
        ([AgLucerne].AboveGroundN*0.1/([Chicory].AboveGround.N+[Plantain].AboveGround.N+[WhiteClover].AboveGround.N+[Ryegrass].AboveGroundN*0.1+[AgLucerne].AboveGroundN*0.1+0.000001)) as Lucerne.NitrogenFraction
        ([Chicory].Leaf.CoverTotal+[Plantain].Leaf.CoverTotal+[WhiteClover].Leaf.CoverTotal+[Ryegrass].CoverTotal+[AgLucerne].CoverTotal) as CoverTotal
        ([Chicory].Leaf.CoverDead+[Plantain].Leaf.CoverDead+[WhiteClover].Leaf.CoverDead+[Ryegrass].CoverDead+[AgLucerne].CoverDead) as CoverDead
        [MicroClimate].CanopyCover
        ([Chicory].Leaf.LAI+[Plantain].Leaf.LAI+[WhiteClover].Leaf.LAI+[Ryegrass].LAIGreen+[AgLucerne].LAIGreen) as LAIgreen
        ([Chicory].Leaf.LAIDead+[Plantain].Leaf.LAIDead+[WhiteClover].Leaf.LAIDead+[Ryegrass].LAIDead+[AgLucerne].LAIDead) as LAIdead
        (([Chicory].Leaf.Height+[Plantain].Leaf.Height+[WhiteClover].Leaf.Height+[Ryegrass].Height+[AgLucerne].Height)/5) as AverageShootHeight
        (([Chicory].Root.Depth+[Plantain].Root.Depth+[WhiteClover].Root.Depth+[Ryegrass].RootDepth+[AgLucerne].RootDepth)/5) as AverageRootDepth
        ([Chicory].Root.LengthDensity+[Plantain].Root.LengthDensity+[WhiteClover].Root.LengthDensity+[Ryegrass].RootLengthDensity+[AgLucerne].RootLengthDensity) as Total.RootLengthDensity
        [Chicory].Leaf.CoverTotal
        [Plantain].Leaf.CoverTotal
        [Ryegrass].CoverTotal
        [AgLucerne].CoverTotal as Lucerne.CoverTotal
        [WhiteClover].Leaf.CoverTotal
        [Chicory].Population
        [Plantain].Population
        (0*[Ryegrass].TotalWt) as Ryegrass.Population
        (0*[AgLucerne].TotalWt) as Lucerne.Population
        [WhiteClover].Population
        [Chicory].Leaf.Height
        [Plantain].Leaf.Height
        [WhiteClover].Leaf.Height
        [Ryegrass].Height
        [AgLucerne].Height as Lucerne.Height
        [Chicory].Root.Depth
        [Plantain].Root.Depth
        [WhiteClover].Root.Depth
        [Ryegrass].RootDepth
        [AgLucerne].RootDepth as Lucerne.RootDepth
        [Chicory].Root.LengthDensity
        [Plantain].Root.LengthDensity
        [WhiteClover].Root.LengthDensity
        [Ryegrass].RootLengthDensity
        [AgLucerne].RootLengthDensity as Lucerne.RootLengthDensity
        [Chicory].Leaf.LAI
        [Plantain].Leaf.LAI
        [WhiteClover].Leaf.LAI
        [Ryegrass].LAI
        [AgLucerne].LAI as Lucerne.LAI
        [Chicory].Leaf.RadIntTot
        [Plantain].Leaf.RadIntTot
        [WhiteClover].Leaf.RadIntTot
        [Ryegrass].InterceptedRadn as Ryegrass.RadnIntTot
        [AgLucerne].InterceptedRadn as Lucerne.RadIntTot
        [Chicory].Phenology.Stage
        [Plantain].Phenology.Stage
        [WhiteClover].Phenology.Stage
        [Ryegrass].Stage as Ryegrass.Phenology.Stage
        [AgLucerne].Stage as Lucerne.Phenology.Stage
        [Chicory].ShootRootRatio
        ([Chicory].AboveGroundLive.Wt/([Chicory].AboveGroundLive.Wt+[Chicory].BelowGround.Wt+0.000001)) as Chicory.CurrentAboveGroundFraction
        [Plantain].ShootRootRatio.Value()
        ([Plantain].AboveGroundLive.Wt/([Plantain].AboveGroundLive.Wt+[Plantain].BelowGround.Wt+0.000001)) as Plantain.CurrentAboveGroundFraction
        [WhiteClover].ShootRootRatio.Value()
        ([WhiteClover].AboveGroundLive.Wt/([WhiteClover].TotalLive.Wt+0.000001)) as WhiteClover.CurrentAboveGroundFraction
        ([Ryegrass].AboveGroundLiveWt/([Ryegrass].BelowGroundWt+0.000001)) as Ryegrass.ShootRootRatio
        ([Ryegrass].AboveGroundLiveWt/([Ryegrass].AboveGroundLiveWt+[Ryegrass].BelowGroundWt+0.000001)) as Ryegrass.CurrentAboveGroundFraction
        ([AgLucerne].AboveGroundLiveWt/([AgLucerne].BelowGroundWt+0.000001)) as Lucerne.ShootRootRatio
        ([AgLucerne].AboveGroundLiveWt/([AgLucerne].AboveGroundLiveWt+[AgLucerne].BelowGroundWt+0.000001)) as Lucerne.CurrentAboveGroundFraction
        ([Chicory].Arbitrator.N.TotalPlantDemand+[Plantain].Arbitrator.N.TotalPlantDemand+[WhiteClover].Arbitrator.N.TotalPlantDemand+([Ryegrass].DemandAtLuxuryN+[AgLucerne].DemandAtLuxuryN)*0.1) as TotalPlantNDemand
        ([Chicory].Arbitrator.N.TotalPlantSupply+[Plantain].Arbitrator.N.TotalPlantSupply+[WhiteClover].Arbitrator.N.TotalPlantSupply+([Ryegrass].RemobilisableSenescedN+[Ryegrass].RemobilisableLuxuryN+[Ryegrass].SoilAvailableN+[AgLucerne].RemobilisableSenescedN+[AgLucerne].RemobilisableLuxuryN+[AgLucerne].SoilAvailableN)*0.1) as TotalPlantNSupply
        ([Chicory].Arbitrator.N.Allocated+[Plantain].Arbitrator.N.Allocated+[WhiteClover].Arbitrator.N.Allocated+([Ryegrass].RemobilisedSenescedN+[Ryegrass].RemobilisedLuxuryN+[Ryegrass].SoilUptakeN+[AgLucerne].RemobilisedSenescedN+[AgLucerne].RemobilisedLuxuryN+[AgLucerne].SoilUptakeN)*0.1) as TotalPlantNAllocated
        ([Chicory].Arbitrator.WDemand+[Plantain].Arbitrator.WDemand+[WhiteClover].Arbitrator.WDemand+[Ryegrass].WaterDemand+[AgLucerne].WaterDemand) as TotalPlantWDemand
        ([Chicory].Arbitrator.WSupply+[Plantain].Arbitrator.WSupply+[WhiteClover].Arbitrator.WSupply+sum([Ryegrass].WaterAvailable)+sum([AgLucerne].WaterAvailable)) as TotalPlantWSupply
        ([Chicory].Arbitrator.WAllocated+[Plantain].Arbitrator.WAllocated+[WhiteClover].Arbitrator.WAllocated+sum([Ryegrass].WaterUptake)+sum([AgLucerne].WaterUptake)) as TotalPlantWAllocated
        [Chicory].Arbitrator.DM.TotalFixationSupply
        [Chicory].Arbitrator.DM.TotalPlantDemand
        [Chicory].Arbitrator.DM.Allocated
        [Chicory].Arbitrator.N.TotalPlantSupply
        [Chicory].Arbitrator.N.TotalPlantDemand
        [Chicory].Arbitrator.N.Allocated
        [Chicory].Arbitrator.WSupply
        [Chicory].Arbitrator.WDemand
        [Chicory].Arbitrator.WAllocated
        [Plantain].Arbitrator.DM.TotalFixationSupply
        [Plantain].Arbitrator.DM.TotalPlantDemand
        [Plantain].Arbitrator.DM.Allocated
        [Plantain].Arbitrator.N.TotalPlantSupply
        [Plantain].Arbitrator.N.TotalPlantDemand
        [Plantain].Arbitrator.N.Allocated
        [Plantain].Arbitrator.WSupply
        [Plantain].Arbitrator.WDemand
        [Plantain].Arbitrator.WAllocated
        [Ryegrass].GrossPotentialGrowthWt as Ryegrass.Arbitrator.DM.TotalPlantDemand
        [Ryegrass].NetGrowthWt*0.1 as Ryegrass.Arbitrator.Arbitrator.DM.Allocated
        [Ryegrass].DemandAtLuxuryN*0.1 as Ryegrass.Arbitrator.N.TotalPlantDemand
        [Ryegrass].DemandAtOptimumN
        ([Ryegrass].RemobilisableSenescedN+[Ryegrass].RemobilisableLuxuryN+[Ryegrass].SoilAvailableN)*0.1 as Ryegrass.Arbitrator.N.TotalPlantSupply
        ([Ryegrass].RemobilisedSenescedN+[Ryegrass].RemobilisedLuxuryN+[Ryegrass].SoilUptakeN)*0.1 as Ryegrass.Arbitrator.N.Allocated
        [Ryegrass].SoilAvailableN
        [Ryegrass].SoilDemandN
        sum([Ryegrass].WaterAvailable) as Ryegrass.Arbitrator.WSupply
        [Ryegrass].WaterDemand as Ryegrass.Arbitrator.WDemand
        sum([Ryegrass].WaterUptake) as Ryegrass.Arbitrator.WAllocated
        [AgLucerne].GrossPotentialGrowthWt as Lucerne.Arbitrator.DM.TotalPlantDemand
        [AgLucerne].NetGrowthWt*0.1 as Lucerne.Arbitrator.DM.Allocated
        [AgLucerne].DemandAtLuxuryN*0.1 as Lucerne.Arbitrator.N.TotalPlantDemand
        [AgLucerne].DemandAtOptimumN
        ([AgLucerne].RemobilisableSenescedN+[AgLucerne].RemobilisableLuxuryN+[AgLucerne].SoilAvailableN)*0.1 as Lucerne.Arbitrator.N.TotalPlantSupply
        ([AgLucerne].RemobilisedSenescedN+[AgLucerne].RemobilisedLuxuryN+[AgLucerne].SoilUptakeN)*0.1 as Lucerne.Arbitrator.N.Allocated
        [AgLucerne].SoilAvailableN
        [AgLucerne].SoilDemandN
        sum([AgLucerne].WaterAvailable) as Lucerne.Arbitrator.WSupply
        [AgLucerne].WaterDemand as Lucerne.Arbitrator.WDemand
        sum([AgLucerne].WaterUptake) as Lucerne.Arbitrator.WAllocated
        [AgLucerne].FixedN as Lucerne.Nodule.NFixed
        [WhiteClover].Arbitrator.DM.TotalFixationSupply
        [WhiteClover].Arbitrator.DM.TotalPlantDemand
        [WhiteClover].Arbitrator.DM.Allocated
        [WhiteClover].Arbitrator.N.TotalPlantSupply
        [WhiteClover].Arbitrator.N.TotalPlantDemand
        [WhiteClover].Arbitrator.N.Allocated
        [WhiteClover].Arbitrator.WSupply
        [WhiteClover].Arbitrator.WDemand
        [WhiteClover].Arbitrator.WAllocated
        [WhiteClover].Nodule.NFixed*10 as WhiteClover.Nodule.NFixed
        [Chicory].Leaf.Fw
        [Chicory].Leaf.Fn
        [Chicory].Leaf.FNmetabolic
        [Chicory].Leaf.Photosynthesis.FCO2
        [Chicory].Leaf.Photosynthesis.FN
        [Chicory].Leaf.Photosynthesis.FT
        [Chicory].Leaf.Photosynthesis.FW
        [Chicory].Leaf.Photosynthesis.FVPD
        [Chicory].Leaf.FRGR
        [Plantain].Leaf.Fw
        [Plantain].Leaf.Fn
        [Plantain].Leaf.FNmetabolic
        [Plantain].Leaf.Photosynthesis.FCO2
        [Plantain].Leaf.Photosynthesis.FN
        [Plantain].Leaf.Photosynthesis.FT
        [Plantain].Leaf.Photosynthesis.FW
        [Plantain].Leaf.Photosynthesis.FVPD
        [Plantain].Leaf.FRGR
        [Ryegrass].GlfNSupply
        [Ryegrass].GlfWaterSupply
        [Ryegrass].GlfWaterLogging
        [Ryegrass].GlfNContent
        [Ryegrass].GlfCO2
        [Ryegrass].GlfTemperature
        [Ryegrass].GlfColdDamage
        [Ryegrass].GlfHeatDamage
        [AgLucerne].GlfNSupply
        [AgLucerne].GlfWaterSupply
        [AgLucerne].GlfWaterLogging
        [AgLucerne].GlfNContent
        [AgLucerne].GlfCO2
        [AgLucerne].GlfTemperature
        [AgLucerne].GlfColdDamage
        [AgLucerne].GlfHeatDamage
        [WhiteClover].Leaf.Fw
        [WhiteClover].Leaf.Fn
        [WhiteClover].Leaf.FNmetabolic
        [WhiteClover].Leaf.Photosynthesis.FCO2
        [WhiteClover].Leaf.Photosynthesis.FN
        [WhiteClover].Leaf.Photosynthesis.FT
        [WhiteClover].Leaf.Photosynthesis.FW
        [WhiteClover].Leaf.Photosynthesis.FVPD
        [WhiteClover].Leaf.FRGR
  DataStore
    ExcelInput Observed: FileName=Observed.xlsx; SheetNames=[Observed]
    ExcelInput ObservedMeans: FileName=Observed.xlsx; SheetNames=[ObservedMeans]
    PredictedObserved: PredictedTableName=Report; ObservedTableName=Observed; FieldNameUsedForMatch=Date
    PredictedObserved PredictedObservedMeans: PredictedTableName=Report; ObservedTableName=ObservedMeans; FieldNameUsedForMatch=Date
  Folder Evaluation
    Memo Note
      Evaluating the performance of Apsim to simulate multi-species pastures against experiments conducted in New Zealand and Denmark.
    Folder New Zealand
      Experiment FRNLRuakura
        DisabledSimNames=[FRNLRuakuraNRate50, FRNLRuakuraNRate100, FRNLRuakuraNRate200, FRNLRuakuraNRate350]
        Memo
          ###FRNL Ruakura###

          This simulation setup was based on field trials performed at DairyNZ's Scott Farm, in Ruakura, New Zealand, between 2014 and 2016.  The experiment was part of the FRNL (Forages for Reduced Nitrogen Leaching) program and the data is basically unpublished (references will be added when they come about).  Here only plots with mixed pasture species are used.  The species included were ryegrass, white clover, lucerne, chicory, and plantain (weeds also occured, but are not included in the simulation - the fraction of biomass was fairly small).
          The experiment consisted of six fertiliser treatments (nominally at N rates of 0, 50, 100, 200, 350 and 500 kg/ha/yr) in three replicates; actual amounts varied as fertiliser applications followed pasture harvests.  Measurements comprised yield, for each species, and quality indicators (here N content is used), for whole sward.
          Observed data supplied by Grant Edwards, Lincoln University.

          The soil at the experimental site was a Horotiu silt loam (an Orthic Allophanic soil; USDA: Typic Udivitrand), the parameters required were inferred using data from the New Zealand National Soils Database (Landcare Research).
          Weather data was obtained from nearby Ruakura weather station (NIWA).
          Simulation of Lucerne is done using the AgPasture model as the PMF version is istill under development.
        Factors
          Factor NRate: Specification=[NRate]
            Operations 0
            Operations 50
              2014-12-22  [Fertiliser].Apply(Amount: 5, Type: Fertiliser.Types.UreaN, Depth: 10)
              2015-01-19  [Fertiliser].Apply(Amount: 5, Type: Fertiliser.Types.UreaN, Depth: 10)
              2015-03-03  [Fertiliser].Apply(Amount: 5, Type: Fertiliser.Types.UreaN, Depth: 10)
              2015-04-21  [Fertiliser].Apply(Amount: 5, Type: Fertiliser.Types.UreaN, Depth: 10)
              2015-06-10  [Fertiliser].Apply(Amount: 5, Type: Fertiliser.Types.UreaN, Depth: 10)
              2015-09-09  [Fertiliser].Apply(Amount: 5, Type: Fertiliser.Types.UreaN, Depth: 10)
              2015-10-19  [Fertiliser].Apply(Amount: 5, Type: Fertiliser.Types.UreaN, Depth: 10)
              2015-11-19  [Fertiliser].Apply(Amount: 5, Type: Fertiliser.Types.UreaN, Depth: 10)
              2015-12-22  [Fertiliser].Apply(Amount: 5, Type: Fertiliser.Types.UreaN, Depth: 10)
              2016-02-03  [Fertiliser].Apply(Amount: 5, Type: Fertiliser.Types.UreaN, Depth: 10)
              2016-05-06  [Fertiliser].Apply(Amount: 5, Type: Fertiliser.Types.UreaN, Depth: 10)
              2016-07-12  [Fertiliser].Apply(Amount: 5, Type: Fertiliser.Types.UreaN, Depth: 10)
              2016-09-14  [Fertiliser].Apply(Amount: 5, Type: Fertiliser.Types.UreaN, Depth: 10)
            Operations 100
              2014-12-22  [Fertiliser].Apply(Amount: 10, Type: Fertiliser.Types.UreaN, Depth: 10)
              2015-01-19  [Fertiliser].Apply(Amount: 10, Type: Fertiliser.Types.UreaN, Depth: 10)
              2015-03-03  [Fertiliser].Apply(Amount: 10, Type: Fertiliser.Types.UreaN, Depth: 10)
              2015-04-21  [Fertiliser].Apply(Amount: 10, Type: Fertiliser.Types.UreaN, Depth: 10)
              2015-06-10  [Fertiliser].Apply(Amount: 10, Type: Fertiliser.Types.UreaN, Depth: 10)
              2015-09-09  [Fertiliser].Apply(Amount: 10, Type: Fertiliser.Types.UreaN, Depth: 10)
              2015-10-19  [Fertiliser].Apply(Amount: 10, Type: Fertiliser.Types.UreaN, Depth: 10)
              2015-11-19  [Fertiliser].Apply(Amount: 10, Type: Fertiliser.Types.UreaN, Depth: 10)
              2015-12-22  [Fertiliser].Apply(Amount: 10, Type: Fertiliser.Types.UreaN, Depth: 10)
              2016-02-03  [Fertiliser].Apply(Amount: 10, Type: Fertiliser.Types.UreaN, Depth: 10)
              2016-05-06  [Fertiliser].Apply(Amount: 10, Type: Fertiliser.Types.UreaN, Depth: 10)
              2016-07-12  [Fertiliser].Apply(Amount: 10, Type: Fertiliser.Types.UreaN, Depth: 10)
              2016-09-14  [Fertiliser].Apply(Amount: 10, Type: Fertiliser.Types.UreaN, Depth: 10)
            Operations 200
              2014-12-22  [Fertiliser].Apply(Amount: 20, Type: Fertiliser.Types.UreaN, Depth: 10)
              2015-01-19  [Fertiliser].Apply(Amount: 20, Type: Fertiliser.Types.UreaN, Depth: 10)
              2015-03-03  [Fertiliser].Apply(Amount: 20, Type: Fertiliser.Types.UreaN, Depth: 10)
              2015-04-21  [Fertiliser].Apply(Amount: 20, Type: Fertiliser.Types.UreaN, Depth: 10)
              2015-06-10  [Fertiliser].Apply(Amount: 20, Type: Fertiliser.Types.UreaN, Depth: 10)
              2015-09-09  [Fertiliser].Apply(Amount: 20, Type: Fertiliser.Types.UreaN, Depth: 10)
              2015-10-19  [Fertiliser].Apply(Amount: 20, Type: Fertiliser.Types.UreaN, Depth: 10)
              2015-11-19  [Fertiliser].Apply(Amount: 20, Type: Fertiliser.Types.UreaN, Depth: 10)
              2015-12-22  [Fertiliser].Apply(Amount: 20, Type: Fertiliser.Types.UreaN, Depth: 10)
              2016-02-03  [Fertiliser].Apply(Amount: 20, Type: Fertiliser.Types.UreaN, Depth: 10)
              2016-05-06  [Fertiliser].Apply(Amount: 20, Type: Fertiliser.Types.UreaN, Depth: 10)
              2016-07-12  [Fertiliser].Apply(Amount: 20, Type: Fertiliser.Types.UreaN, Depth: 10)
              2016-09-14  [Fertiliser].Apply(Amount: 20, Type: Fertiliser.Types.UreaN, Depth: 10)
            Operations 350
              2014-12-22  [Fertiliser].Apply(Amount: 35, Type: Fertiliser.Types.UreaN, Depth: 10)
              2015-01-19  [Fertiliser].Apply(Amount: 35, Type: Fertiliser.Types.UreaN, Depth: 10)
              2015-03-03  [Fertiliser].Apply(Amount: 35, Type: Fertiliser.Types.UreaN, Depth: 10)
              2015-04-21  [Fertiliser].Apply(Amount: 35, Type: Fertiliser.Types.UreaN, Depth: 10)
              2015-06-10  [Fertiliser].Apply(Amount: 35, Type: Fertiliser.Types.UreaN, Depth: 10)
              2015-09-09  [Fertiliser].Apply(Amount: 35, Type: Fertiliser.Types.UreaN, Depth: 10)
              2015-10-19  [Fertiliser].Apply(Amount: 35, Type: Fertiliser.Types.UreaN, Depth: 10)
              2015-11-19  [Fertiliser].Apply(Amount: 35, Type: Fertiliser.Types.UreaN, Depth: 10)
              2015-12-22  [Fertiliser].Apply(Amount: 35, Type: Fertiliser.Types.UreaN, Depth: 10)
              2016-02-03  [Fertiliser].Apply(Amount: 35, Type: Fertiliser.Types.UreaN, Depth: 10)
              2016-05-06  [Fertiliser].Apply(Amount: 35, Type: Fertiliser.Types.UreaN, Depth: 10)
              2016-07-12  [Fertiliser].Apply(Amount: 35, Type: Fertiliser.Types.UreaN, Depth: 10)
              2016-09-14  [Fertiliser].Apply(Amount: 35, Type: Fertiliser.Types.UreaN, Depth: 10)
            Operations 500
              2014-12-22  [Fertiliser].Apply(Amount: 50, Type: Fertiliser.Types.UreaN, Depth: 10)
              2015-01-19  [Fertiliser].Apply(Amount: 50, Type: Fertiliser.Types.UreaN, Depth: 10)
              2015-03-03  [Fertiliser].Apply(Amount: 50, Type: Fertiliser.Types.UreaN, Depth: 10)
              2015-04-21  [Fertiliser].Apply(Amount: 50, Type: Fertiliser.Types.UreaN, Depth: 10)
              2015-06-10  [Fertiliser].Apply(Amount: 50, Type: Fertiliser.Types.UreaN, Depth: 10)
              2015-09-09  [Fertiliser].Apply(Amount: 50, Type: Fertiliser.Types.UreaN, Depth: 10)
              2015-10-19  [Fertiliser].Apply(Amount: 50, Type: Fertiliser.Types.UreaN, Depth: 10)
              2015-11-19  [Fertiliser].Apply(Amount: 50, Type: Fertiliser.Types.UreaN, Depth: 10)
              2015-12-22  [Fertiliser].Apply(Amount: 50, Type: Fertiliser.Types.UreaN, Depth: 10)
              2016-02-03  [Fertiliser].Apply(Amount: 50, Type: Fertiliser.Types.UreaN, Depth: 10)
              2016-05-06  [Fertiliser].Apply(Amount: 50, Type: Fertiliser.Types.UreaN, Depth: 10)
              2016-07-12  [Fertiliser].Apply(Amount: 50, Type: Fertiliser.Types.UreaN, Depth: 10)
              2016-09-14  [Fertiliser].Apply(Amount: 50, Type: Fertiliser.Types.UreaN, Depth: 10)
        Simulation FRNLRuakura
          Clock: StartDate=2014-09-01; EndDate=2016-12-31
          Weather: FileName=Ruakura.met
          Summary summaryfile
          SoilArbitrator Soil Arbitrator
          Zone Field: Area=1; Slope=0
            Folder Management
              Operations Sowing
                2014-10-24  [Chicory].Sow(population: 100, cultivar: "Choice", depth: 10, rowSpacing: 150)
                2014-10-24  [Plantain].Sow(population: 100, cultivar: "Tonic", depth: 10, rowSpacing: 150)
                2014-10-24  [WhiteClover].Sow(population: 100, cultivar: "Kopu", depth: 5, rowSpacing: 150)
                2014-09-01  [Ryegrass].EndCrop()
                2014-11-15  [Ryegrass].Sow(population: 0, cultivar: "R", depth: 0, rowSpacing: 0)
                2014-09-01  [AgLucerne].EndCrop()
                2014-11-05  [AgLucerne].Sow(population: 0, cultivar: "R", depth: 0, rowSpacing: 0)
              Operations NRate
              Operations BaseFertiliser
                2014-10-13  [Fertiliser].Apply(Amount: 26.4, Type: Fertiliser.Types.UreaN, Depth: 10)
                2014-12-23  [Fertiliser].Apply(Amount: 3.9, Type: Fertiliser.Types.UreaN, Depth: 10)
              Manager Defoliate
                cutPasture_StartDate = 2050-05-20
                cutPasture_EndDate = 2100-12-31
                defoliateType = Graze
                interval2Cut = 21
                durationOfCut = 1
                removeAmountType = DMToRemove
                herbageAmount = 60
                fracDM2Remove = 1
                fracN2Remove = 1
                urineDepth = 10
                fracN2Dung = 0.4
                fracPopDecline = 0
```csharp
// Defoliates on a regular cycle or one-off via a schedule
// currently defoliates by the amount specified spread evenly over the specified period

using System;
using Models.Core;
using System.Collections.Generic;
using System.Text;
using Models;
using Models.Soils;
using Models.PMF;
using System.Xml.Serialization;
using APSIM.Shared.Utilities;

namespace Models
{
    [Serializable]
    public class Script : Model
    {
        [Link] Zone zone;
        [Link] Clock Clock;
        [ScopedLinkByName] Plant Chicory;
        [ScopedLinkByName] Plant Plantain;
        [ScopedLinkByName] Plant WhiteClover;
        [Link] Fertiliser fertiliser;
        [Link] ISummary mySummary = null;

        List<Plant> PMFSpecies = new List<Plant>();
        List<AgPasture.PastureSpecies> AgPSpecies = new List<AgPasture.PastureSpecies>();

        [Description("Enter the date to start the rotation (dd/mm/yyyy):")]
        public DateTime cutPasture_StartDate { get; set; }

        [Description("Enter the date to end the rotation (dd/mm/yyyy):")]
        public DateTime cutPasture_EndDate { get; set; }

        [Description("Select type of defoliation:")]
        public defoliationTypes defoliateType { get; set; }

        [Description("Enter the interval between defoliations (days):")]
        public int interval2Cut { get; set; }

        [Description("Enter the number of days to defoliate over (days):")]
        public int durationOfCut { get; set; }

        [Description("Choose what amount is being defined:")]
        public removeAmountTypes removeAmountType { get; set; }

        [Description("Enter the amount to use (gDM/m2):")]
        public double herbageAmount { get; set; }

        [Description("Enter the fraction of DM that is removed from the field (0-1):")]
        public double fracDM2Remove { get; set; }

        [Description("Enter the fraction of N that is removed from the field (0-1):")]
        public double fracN2Remove { get; set; }

        [Description("Enter the depth down to which urine will applied (mm):")]
        public double urineDepth { get; set; }

        [Description("Enter the proportion of N returned in dung (0-1):")]
        public double fracN2Dung { get; set; }

        [Description("Enter the fraction of population decline due to defoliation (0-1):")]
        public double fracPopDecline { get; set; }

        //fraction of each plant part returned as residue (0-1), wastage
        private double leafResidueFrac = 0.01;
        private double stemResidueFrac = 0.01;
        private double flowerResidueFrac = 0.01;
        private double petioleResidueFrac = 0.01;
        private double stolonResidueFrac = 0.01;
        private double stolonRemoveFrac = 0.10;
        private double minLeafAmount = 5.0;

        //Outputs
        //Pasture DM defoliated today (kg/ha)
        [XmlIgnore] public double DefoliatedDM{ get; set; }
        //N defoliate today
        [XmlIgnore] public double DefoliatedN{ get; set; }
        //Pasture DM harvested today (kg/ha)
        [XmlIgnore] public double HarvestedDM{ get; set; }
        //N harvested today
        [XmlIgnore] public double HarvestedN{ get; set; }
        //DM removed from the paddock
        [XmlIgnore] public double RemovedDM{ get; set; }
        //N removed from the paddock
        [XmlIgnore] public double RemovedN{ get; set; }
        //DM returned to the paddock
        [XmlIgnore] public double ReturnedDM{ get; set; }
        //N returned to the paddock
        [XmlIgnore] public double ReturnedN{ get; set; }
        //N returned as dung (SurfaceOM)
        [XmlIgnore] public double NReturnedInDung{ get; set; }
        //N returned as urine (urea)
        [XmlIgnore] public double NReturnedInUrine{ get; set; }
        //Number of days after last harvest
        [XmlIgnore] public int DaysAfterCut{ get; set; }
        //Total standing DM (Leaf + Stem/Sheath) before cut
        [XmlIgnore] public double PreHarvestDM{ get; set; }
        //Total standing DM (Leaf + Stem/Sheath) after cut
        [XmlIgnore] public double PostHarvestDM{ get; set; }

        //Pasture DM harvested this rotation (kg/ha)
        [XmlIgnore] public double RotationHarvestedDM{ get; set; }
        //Pasture DM to be harvested this rotation (kg/ha)
        [XmlIgnore] public double RotationHarvestingDM{ get; set; }

        //Internal variables
        private RemovalFractions removalFractions;
        //The fraction of urine to be applied in each layer
        private double[] FracLayer;
        // total herbage to remove in g/m2 per day
        private double herbageToRemove;
        // counter
        private int daysCutting = 0;
        // type of defoliation (Cut or Graze)
        private string defoliationType;
        // type of DM amount (ResidualDM or DMToRemove)
        private string amountType;
        // auxiliary
        private bool aCutHasHappened = false;
        private bool isStillCutting = false;
        private double cumAmountHarvested;

        // event to add residue / dung to surface OM
        public event BiomassRemovedDelegate BiomassRemoved;

        [EventSubscribe("Commencing")]
        private void OnSimulationCommencing(object sender, EventArgs e)
        {
            // make sure that rotation start when startDate<simulationStartDay
            if ((Clock.Today > cutPasture_StartDate) && (Clock.Today < cutPasture_EndDate))
                cutPasture_StartDate = Clock.Today;

            // check few parameters
            if (interval2Cut < 1)
                throw new Exception(" the interval between defoliations must be at least one day");

            // initialise some variables
            removalFractions = new RemovalFractions();
            DaysAfterCut = 0;
            resetVariables();

            // set up the strings for 'types'
            if (defoliateType == defoliationTypes.Cut)
                defoliationType = "Cut";
            else
                defoliationType = "Graze";

            if (removeAmountType == removeAmountTypes.ResidualDM)
                amountType = "ResidualDM";
            else
                amountType = "DMToRemove";

            // set up the links for the crops
            foreach (Plant species in Apsim.Children(zone, typeof(Plant)))
                PMFSpecies.Add(species);
            foreach (AgPasture.PastureSpecies species in Apsim.Children(zone, typeof(AgPasture.PastureSpecies)))
                AgPSpecies.Add(species);
        }

        [EventSubscribe("DoManagement")]
        private void OnDoManagement(object sender, EventArgs e)
        {
            // check whether we should start defoliating
            if ((Clock.Today.Date >= cutPasture_StartDate.Date) && (Clock.Today.Date <= cutPasture_EndDate.Date))
            {
                if (Clock.Today.Date == cutPasture_StartDate.Date)
                    DaysAfterCut = interval2Cut;

                if ((DaysAfterCut > 0) && (DaysAfterCut == interval2Cut))
                {
                    Defoliate(defoliationType, herbageAmount, amountType, durationOfCut);
                }
            }

            // Check whether we need to continue defoliating
            if (isStillCutting)
            {
                // reset outputs
                resetVariables();

                // remove biomass and add excreta
                removeDM(herbageToRemove, defoliationType);
                returnExcreta();
                cumAmountHarvested += HarvestedDM;
                daysCutting += 1;
            }

            // reset outputs, occurs when a given defoliation ends
            if (daysCutting < 0)
            {
                resetVariables();
                daysCutting = 0;
            }
        }

        [EventSubscribe("DoManagementCalculations")]
        private void OnDoManagementCalculations(object sender, EventArgs e)
        {
            // calculations when a given defoliation has ended
            if (daysCutting == durationOfCut)
            {
                PostHarvestDM = 0.0;
                foreach (Plant species in PMFSpecies)
                   PostHarvestDM += (double)zone.Get(species.Name+".AboveGround.Wt");
                foreach (AgPasture.PastureSpecies species in AgPSpecies)
                    PostHarvestDM += species.StandingHerbageWt*0.1;

                RotationHarvestedDM = cumAmountHarvested;
                aCutHasHappened = true;
                isStillCutting = false;
                daysCutting = -1;
                //PMF.Population *= 1.0 - fracPopDecline;
            }

            if (aCutHasHappened && (daysCutting == 0))
                DaysAfterCut += 1;
        }

        // resets the values of all outputs
        private void resetVariables()
        {
            DefoliatedDM = 0.0;
            DefoliatedN = 0.0;
            HarvestedDM = 0.0;
            HarvestedN = 0.0;
            RemovedDM = 0.0;
            RemovedN = 0.0;
            ReturnedDM = 0.0;
            ReturnedN = 0.0;
            NReturnedInDung = 0.0;
            NReturnedInUrine = 0.0;
            RotationHarvestedDM = 0.0;
            RotationHarvestingDM = 0.0;
        }

        // Perform the basic calculations for defoliation
        public void Defoliate(string defoliationType, double amountDM, string amountType, int duration)
        {
            // get the existing plant amount
            PreHarvestDM = 0.0;
            foreach (Plant species in PMFSpecies)
               PreHarvestDM += (double)zone.Get(species.Name+".AboveGround.Wt");
            foreach (AgPasture.PastureSpecies species in AgPSpecies)
               PreHarvestDM += species.StandingHerbageWt*0.1;
            
                mySummary.WriteMessage(this, "   amountDM " + amountDM.ToString("#0.0") + " g/m2 over " + duration + " days");
                mySummary.WriteMessage(this, "   PreHarvestDM " + amountDM.ToString("#0.0") + " g/m2");

            // check duration
            if (duration <= 0)
                throw new Exception("Duration of graze/cut rotation is zero or negative");
            
            // check amount to remove
            if ((amountType == "DMToRemove") && (PreHarvestDM > 0.0))
            {
                mySummary.WriteMessage(this, "   Defoliating " + amountDM.ToString("#0.0") + " g/m2 over " + duration + " days");
                herbageToRemove = amountDM / duration;
            }
            else if ((amountType == "ResidualDM") && (PreHarvestDM > amountDM))
            {
                mySummary.WriteMessage(this, "   Defoliating down to approximately " + amountDM.ToString("#0.0") + " g/m2 over " + duration + " days");
                herbageToRemove = (PreHarvestDM - amountDM) / duration;
            }
            else
            {
                herbageToRemove = 0.0;
                mySummary.WriteMessage(this, "   Defoliation will not happend because there is not enough plant material");
                return;
            }

            RotationHarvestingDM = herbageToRemove * duration;
            durationOfCut = duration;
            // first defoliation
            removeDM(herbageToRemove, defoliationType);
            returnExcreta();
            cumAmountHarvested = HarvestedDM;
            isStillCutting = true;
            daysCutting = 1;
            DaysAfterCut = 0;
        }

        private double leafLiveWt;
        private double stemLiveWt;
        private double petioleLiveWt;
        private double stolonLiveWt;
        private double flowerLiveWt;
        private double leafDeadWt;
        private double stemDeadWt;
        private double petioleDeadWt;
        private double stolonDeadWt;
        private double flowerDeadWt;
        private double leafLiveN;
        private double stemLiveN;
        private double petioleLiveN;
        private double stolonLiveN;
        private double flowerLiveN;
        private double leafDeadN;
        private double stemDeadN;
        private double petioleDeadN;
        private double stolonDeadN;
        private double flowerDeadN;

        private void removeDM(double removeAmount, string removeType)
        {
            // get the existing biomass
		    leafLiveWt = 0.0;
            stemLiveWt = 0.0;
            petioleLiveWt = 0.0;
            stolonLiveWt = 0.0;
            flowerLiveWt = 0.0;
            leafDeadWt = 0.0;
            stemDeadWt = 0.0;
            petioleDeadWt = 0.0;
            stolonDeadWt = 0.0;
            flowerDeadWt = 0.0;
            leafLiveN = 0.0;
            stemLiveN = 0.0;
            petioleLiveN = 0.0;
            stolonLiveN = 0.0;
            flowerLiveN = 0.0;
            leafDeadN = 0.0;
            stemDeadN = 0.0;
            petioleDeadN = 0.0;
            stolonDeadN = 0.0;
            flowerDeadN = 0.0;
            foreach (Plant species in PMFSpecies)
            {
               leafLiveWt += (double)zone.Get(species.Name+".Leaf.Live.Wt");
               leafLiveN += (double)zone.Get(species.Name+".Leaf.Live.N");
               leafDeadWt += (double)zone.Get(species.Name+".Leaf.Dead.Wt");
               leafDeadN += (double)zone.Get(species.Name+".Leaf.Dead.N");
               flowerLiveWt += (double)zone.Get(species.Name+".Inflorescence.Live.Wt");
               flowerLiveN += (double)zone.Get(species.Name+".Inflorescence.Live.N");
               flowerDeadWt += (double)zone.Get(species.Name+".Inflorescence.Dead.Wt");
               flowerDeadN += (double)zone.Get(species.Name+".Inflorescence.Dead.N");
               if ((species.Name=="Chicory") || (species.Name=="Plantain"))
               {
                   stemLiveWt += (double)zone.Get(species.Name+".Stem.Live.Wt");
                   stemLiveN += (double)zone.Get(species.Name+".Stem.Live.N");
                   stemDeadWt += (double)zone.Get(species.Name+".Stem.Dead.Wt");
                   stemDeadN += (double)zone.Get(species.Name+".Stem.Dead.N");
               }
               else if(species.Name=="WhiteClover")
               {
                   petioleLiveWt += (double)zone.Get(species.Name+".Petiole.Live.Wt");
                   petioleLiveN += (double)zone.Get(species.Name+".Petiole.Live.N");
                   petioleDeadWt += (double)zone.Get(species.Name+".Petiole.Dead.Wt");
                   petioleDeadN += (double)zone.Get(species.Name+".Petiole.Dead.N");
                   stolonLiveWt += (double)zone.Get(species.Name+".Stolon.Live.Wt")*stolonRemoveFrac;
                   stolonLiveN += (double)zone.Get(species.Name+".Stolon.Live.N")*stolonRemoveFrac;
                   stolonDeadWt += (double)zone.Get(species.Name+".Stolon.Dead.Wt")*stolonRemoveFrac;
                   stolonDeadN += (double)zone.Get(species.Name+".Stolon.Dead.N")*stolonRemoveFrac;
               }
            }

            double existingWt = leafLiveWt + leafDeadWt + stemLiveWt + stemDeadWt + flowerLiveWt + flowerDeadWt;
            existingWt += petioleLiveWt + petioleDeadWt + stolonLiveWt + stolonDeadWt;
            double existingN = leafLiveN + leafDeadN + stemLiveN + stemDeadN + flowerLiveN + flowerDeadN;
            existingN += petioleLiveN + petioleDeadN + stolonLiveN + stolonDeadN;

            // get existing biomass from AgPasture species
            foreach (AgPasture.PastureSpecies species in AgPSpecies)
            {
                existingWt += species.HarvestableWt*0.1;
                existingN += species.StandingHerbageN*0.1;
            }

            // Can we harvest anything?
            double removingWt = Math.Min(existingWt, removeAmount);
            if (removingWt > 0.0)
            {
                // get the fractions to remove for each organ (will override the default values)
                double fracToRemove = removingWt / existingWt;
                double leafFracToRemove = 0.0;
                if ((leafLiveWt + leafDeadWt) > 0.0)
                {
                    if (leafLiveWt < minLeafAmount)
                    {
                        // leafWt cannot go below a minimum
                        leafFracToRemove = (removingWt + leafLiveWt - minLeafAmount) / existingWt;
                    }
                    else
                        leafFracToRemove = fracToRemove;
                }

                double stemFracToRemove = ((stemLiveWt + stemDeadWt) > 0.0) ? fracToRemove : 0.0;
                double petioleFracToRemove = ((petioleLiveWt + petioleDeadWt) > 0.0) ? fracToRemove : 0.0;
                double stolonFracToRemove = ((stolonLiveWt + stolonDeadWt) > 0.0) ? fracToRemove : 0.0;
                double flowerFracToRemove = ((flowerLiveWt + flowerDeadWt) > 0.0) ? fracToRemove : 0.0;

                // get the fractions to residue (i.e. wastage - will override the default values)
                // the default is [Chicory].Leaf.BiomassRemovalDefaults.Cut.FractionToResidue, or equivalent
                double leafFracToResidue = leafResidueFrac * leafFracToRemove;
                double stemFracToResidue = stemResidueFrac * stemFracToRemove;
                double petioleFracToResidue = petioleResidueFrac * petioleFracToRemove;
                double stolonFracToResidue = stolonResidueFrac * stolonFracToRemove;
                double flowerFracToResidue = flowerResidueFrac * flowerFracToRemove;

                // correct the values to defoliate (so our removing = remove + residue)
                leafFracToRemove -= leafFracToResidue;
                stemFracToRemove -= stemFracToResidue;
                petioleFracToRemove -= petioleFracToResidue;
                stolonFracToRemove -= stolonFracToResidue;
                flowerFracToRemove -= flowerFracToResidue;

                // set removal fractions (these overrides the default removals in the plant)
                removalFractions.SetFractionToRemove("Leaf", leafFracToRemove, "Live");
                removalFractions.SetFractionToResidue("Leaf", leafFracToResidue, "Live");
                removalFractions.SetFractionToRemove("Leaf", leafFracToRemove, "Dead");
                removalFractions.SetFractionToResidue("Leaf", leafFracToResidue, "Dead");
                removalFractions.SetFractionToRemove("Stem", stemFracToRemove, "Live");
                removalFractions.SetFractionToResidue("Stem", stemFracToResidue, "Live");
                removalFractions.SetFractionToRemove("Stem", stemFracToRemove, "Dead");
                removalFractions.SetFractionToResidue("Stem", stemFracToResidue, "Dead");
                removalFractions.SetFractionToRemove("Petiole", petioleFracToRemove, "Live");
                removalFractions.SetFractionToResidue("Petiole", petioleFracToResidue, "Live");
                removalFractions.SetFractionToRemove("Petiole", petioleFracToRemove, "Dead");
                removalFractions.SetFractionToResidue("Petiole", petioleFracToResidue, "Dead");
                removalFractions.SetFractionToRemove("Stolon", stolonFracToRemove, "Live");
                removalFractions.SetFractionToResidue("Stolon", stolonFracToResidue, "Live");
                removalFractions.SetFractionToRemove("Stolon", stolonFracToRemove, "Dead");
                removalFractions.SetFractionToResidue("Stolon", stolonFracToResidue, "Dead");
                removalFractions.SetFractionToRemove("Inflorescence", flowerFracToRemove, "Live");
                removalFractions.SetFractionToResidue("Inflorescence", flowerFracToResidue, "Live");
                removalFractions.SetFractionToRemove("Inflorescence", flowerFracToRemove, "Dead");
                removalFractions.SetFractionToResidue("Inflorescence", flowerFracToResidue, "Dead");

                removalFractions.SetFractionToRemove("Root", 0.0);
                removalFractions.SetFractionToResidue("Root", 0.0);
                removalFractions.SetFractionToRemove("Taproot", 0.0);
                removalFractions.SetFractionToResidue("Taproot", 0.0);
                removalFractions.SetFractionToRemove("Nodule", 0.0);
                removalFractions.SetFractionToResidue("Nodule", 0.0);

                // Actually do the biomass removal
                Chicory.RemoveBiomass(removeType, removalFractions);
                Plantain.RemoveBiomass(removeType, removalFractions);
                WhiteClover.RemoveBiomass(removeType, removalFractions);
                foreach (AgPasture.PastureSpecies species in AgPSpecies)
                {
                    double amountToRemove = species.StandingHerbageWt*fracToRemove;
                    species.Graze(amount: amountToRemove, type: "SetRemoveAmount");
                }

                // get the plant amount remaining in the field
                double remainingWt = 0.0;
                double remainingN = 0.0;
                foreach (Plant species in PMFSpecies)
                {
                   remainingWt += (double)zone.Get(species.Name+".AboveGround.Wt");
                   remainingN += (double)zone.Get(species.Name+".AboveGround.N");
                }
                foreach (AgPasture.PastureSpecies species in AgPSpecies)
                {
                    remainingWt += species.HarvestableWt*0.1;
                    remainingN += species.StandingHerbageN*0.1;
                }

                // get total defoliation (total plant stuff lost)
                DefoliatedDM = existingWt - remainingWt;
                DefoliatedN = existingN - remainingN;

                // get total harvested (plant stuff removed from plants)
                HarvestedDM = 0.0;
                HarvestedN = 0.0;
                foreach (Plant species in PMFSpecies)
                {
                   HarvestedDM += (double)zone.Get(species.Name+".Leaf.Removed.Wt") + (double)zone.Get(species.Name+".Inflorescence.Removed.Wt");
                   HarvestedN += (double)zone.Get(species.Name+".Leaf.Removed.N") + (double)zone.Get(species.Name+".Inflorescence.Removed.N");
                   if ((species.Name=="Chicory") || (species.Name=="Plantain"))
                   {
                       HarvestedDM += (double)zone.Get(species.Name+".Stem.Removed.Wt");
                       HarvestedN += (double)zone.Get(species.Name+".Stem.Removed.N");
                   }
                   else if(species.Name=="WhiteClover")
                   {
                       HarvestedDM += (double)zone.Get(species.Name+".Petiole.Removed.Wt")+(double)zone.Get(species.Name+".Stolon.Removed.Wt");
                       HarvestedN += (double)zone.Get(species.Name+".Petiole.Removed.N")+(double)zone.Get(species.Name+".Stolon.Removed.N");
                   }
                }
                foreach (AgPasture.PastureSpecies species in AgPSpecies)
                {
                    HarvestedDM += species.HarvestedWt*0.1;
                    HarvestedN += species.HarvestedN*0.1;
                }

                // get amounts actually removed from field and that to be returned (residue or dung/urine)
                RemovedDM = HarvestedDM * fracDM2Remove;
                RemovedN = HarvestedN * fracN2Remove;
                ReturnedDM = HarvestedDM - RemovedDM;
                ReturnedN = HarvestedN - RemovedN;
                NReturnedInDung = ReturnedN * fracN2Dung;
                NReturnedInUrine = ReturnedN - NReturnedInDung;
            }
            else
            {
                mySummary.WriteMessage(this, "   No biomass was removed because there was none available.");
            }
        }

        // Return dung and urine
        private void returnExcreta()
        {
            if ((ReturnedDM > 0.0) || (NReturnedInDung > 0.0))
            {
                PMF.BiomassRemovedType BiomassDung = new PMF.BiomassRemovedType();
                string[] type = new string[] { "RuminantDung_PastureFed" };
                float[] dltdm = new float[] { (Single)ReturnedDM };
                float[] dltn = new float[] { (Single)NReturnedInDung };
                float[] dltp = new float[] { 0 };
                float[] fraction = new float[] { 1 };     // fraction is always 1.0 here

                BiomassDung.crop_type = "RuminantDung_PastureFed";
                BiomassDung.dm_type = type;
                BiomassDung.dlt_crop_dm = dltdm;
                BiomassDung.dlt_dm_n = dltn;
                BiomassDung.dlt_dm_p = dltp;
                BiomassDung.fraction_to_residue = fraction;
                BiomassRemoved.Invoke(BiomassDung);
            }

            if (NReturnedInUrine > 0.0)
            {
                fertiliser.Apply(NReturnedInUrine * 10, Fertiliser.Types.UreaN, urineDepth);
            }
        }

        public enum removeAmountTypes
        {
            /// <summary>Setting DM amount to remove</summary>
            DMToRemove,
            /// <summary>Setting residual DM amount</summary>
            ResidualDM
        }

        public enum defoliationTypes
        {
            /// <summary>Cut</summary>
            Cut,
            /// <summary>Graze</summary>
            Graze
        }
    }
}
```
              Operations DefoliationSchedule
                2014-12-15  [Defoliate].Script.Defoliate(defoliationType: "Cut", amountDM: 100, amountType: "ResidualDM", duration: 1)
                2015-01-20  [Defoliate].Script.Defoliate(defoliationType: "Cut", amountDM: 100, amountType: "ResidualDM", duration: 1)
                2015-03-18  [Defoliate].Script.Defoliate(defoliationType: "Cut", amountDM: 100, amountType: "ResidualDM", duration: 1)
                2015-04-20  [Defoliate].Script.Defoliate(defoliationType: "Cut", amountDM: 100, amountType: "ResidualDM", duration: 1)
                2015-06-08  [Defoliate].Script.Defoliate(defoliationType: "Cut", amountDM: 100, amountType: "ResidualDM", duration: 1)
                2015-09-07  [Defoliate].Script.Defoliate(defoliationType: "Cut", amountDM: 100, amountType: "ResidualDM", duration: 1)
                2015-10-14  [Defoliate].Script.Defoliate(defoliationType: "Cut", amountDM: 100, amountType: "ResidualDM", duration: 1)
                2015-11-17  [Defoliate].Script.Defoliate(defoliationType: "Cut", amountDM: 100, amountType: "ResidualDM", duration: 1)
                2015-12-21  [Defoliate].Script.Defoliate(defoliationType: "Cut", amountDM: 100, amountType: "ResidualDM", duration: 1)
                2016-01-21  [Defoliate].Script.Defoliate(defoliationType: "Cut", amountDM: 100, amountType: "ResidualDM", duration: 1)
                2016-03-08  [Defoliate].Script.Defoliate(defoliationType: "Cut", amountDM: 100, amountType: "ResidualDM", duration: 1)
                2016-05-25  [Defoliate].Script.Defoliate(defoliationType: "Cut", amountDM: 100, amountType: "ResidualDM", duration: 1)
                2016-08-18  [Defoliate].Script.Defoliate(defoliationType: "Cut", amountDM: 100, amountType: "ResidualDM", duration: 1)
                2016-09-21  [Defoliate].Script.Defoliate(defoliationType: "Cut", amountDM: 100, amountType: "ResidualDM", duration: 1)
                2016-10-26  [Defoliate].Script.Defoliate(defoliationType: "Cut", amountDM: 100, amountType: "ResidualDM", duration: 1)
                2016-11-30  [Defoliate].Script.Defoliate(defoliationType: "Cut", amountDM: 100, amountType: "ResidualDM", duration: 1)
                2016-12-10  [Defoliate].Script.Defoliate(defoliationType: "Cut", amountDM: 100, amountType: "ResidualDM", duration: 1)
              Manager ExtraVariables
```csharp
// This will be replaced by the "ExtraVariables" section in "Replacements"

using System;
using Models.Core;

namespace Models
{
    [Serializable] 
    public class Script : Model
    {
    }
}
```
              Manager SettingUpParams
                setParamStartDate = 2019-12-01
                setParamHeight = 100
```csharp
// Set some plant parameters, for tests and development
// Following suggestions by Val Snow: Plant competition seem to be better done if heights are all the same (maybe due to some issue/feature of MicroClimate)

using System;
using Models.Core;
using System.Collections.Generic;
using System.Text;
using Models;
using Models.Soils;
using Models.PMF;
using System.Xml.Serialization;
using APSIM.Shared.Utilities;

namespace Models
{
	[Serializable]
	public class Script : Model
	{
		[Link] Clock Clock;
		[Link] Zone myZone;


		//User inputs from properties tab
		[Separator("Setting up some parameters of plants")]
		[Description(" Enter the date to set plant parameters (dd/mm/yyyy):")]
		public DateTime setParamStartDate { get; set; }
		[Description(" Enter the height to set all plants to (mm):")]
		public double setParamHeight { get; set; }


		//Internal variables
		private RemovalFractions removalFractions;

		[EventSubscribe("Commencing")]
		private void OnSimulationCommencing(object sender, EventArgs e)
		{
			// make sure that manager will work when startDate<simulationStartDay
			if (Clock.Today > setParamStartDate)
				setParamStartDate = Clock.Today;
		}

		[EventSubscribe("StartOfDay")]
		private void OnStartOfDay(object sender, EventArgs e)
		{
			// make sure that rotation start when startDate<simulationStartDay
			if (Clock.Today == setParamStartDate)
			{
			    double[] xVals = new double[] {0, 10};
			    double[] yVals = new double[] {setParamHeight, setParamHeight};
				myZone.Set("Chicory.Leaf.HeightFunction.XYPairs.X", xVals);
				myZone.Set("Chicory.Leaf.HeightFunction.XYPairs.Y", yVals);
				myZone.Set("Plantain.Leaf.HeightFunction.XYPairs.X", xVals);
				myZone.Set("Plantain.Leaf.HeightFunction.XYPairs.Y", yVals);
				myZone.Set("WhiteClover.Leaf.HeightFunction.XYPairs.X", xVals);
				myZone.Set("WhiteClover.Leaf.HeightFunction.XYPairs.Y", yVals);
				myZone.Set("Ryegrass.PlantHeightMaximum", setParamHeight);
				myZone.Set("Ryegrass.PlantHeightMinimum", setParamHeight);
				myZone.Set("AgLucerne.PlantHeightMaximum", setParamHeight);
				myZone.Set("AgLucerne.PlantHeightMinimum", setParamHeight);
			}
		}
	}
}
```
            MicroClimate: a_interception=0; b_interception=1; c_interception=0; d_interception=0; soil_albedo=0.23; SoilHeatFluxFraction=0.4; NightInterceptionFraction=0.5; ReferenceHeight=2
            Irrigation
            Fertiliser
            SurfaceOrganicMatter: InitialResidueName=grass; InitialResidueType=grass; InitialResidueMass=500; InitialStandingFraction=0; InitialCPR=0; InitialCNR=40; FractionFaecesAdded=0.5
            Soil: SoilType=Typic Udivitrand (US), Typic Orthic Allophanic Soil (NZ); LocalName=Horotiu Silt Loam; Site=Ruakura; NearestTown=Hamilton; Region=Waikato; Country=New Zealand; Latitude=0; Longitude=0
              DataSource=Based primarily on data from Close et al (2003), complemented with NZ NSD.
              Analysis: PHUnits=Water; BoronUnits=0
                Thickness  Rocks  PH  CEC   ParticleSizeSand  ParticleSizeSilt  ParticleSizeClay
                200        0      6   23.1  47                33                20
                200        0      6   17.2  64.5              17                18.5
                130        2      6   12.4  76                13                11
                140        5      6   10    84                9.5               6.5
                380        5      6   7.2   86.3              8.6               5.1
                230        19     6   3.1   88.6              7.6               3.8
                220        33     6   1.6   91.2              6.4               2.4
              Water
                Thickness  BD     AirDry  LL15   DUL    SAT    KS
                200        0.88   0.07    0.22   0.421  0.587  507.8
                200        0.85   0.21    0.219  0.327  0.623  4445.1
                130        1.009  0.177   0.177  0.314  0.572  7262
                140        1.055  0.139   0.139  0.291  0.536  11928
                380        1.055  0.125   0.125  0.182  0.504  25031
                230        0.839  0.102   0.102  0.123  0.439  28410.4
                220        0.695  0.083   0.083  0.101  0.363  42658.3
                SoilCrop ChicorySoil: LL=[0.22, 0.219, 0.177, 0.139, 0.125, 0.102, 0.083]; KL=[0.07, 0.058, 0.037, 0.025, 0.01, 0.004, 0.002]; XF=[1, 1, 1, 1, 1, 1, 1]
                SoilCrop PlantainSoil: LL=[0.22, 0.219, 0.177, 0.139, 0.125, 0.102, 0.083]; KL=[0.08, 0.07, 0.05, 0.03, 0.01, 0.003, 0]; XF=[1, 1, 1, 1, 1, 1, 1]
                SoilCrop RyegrassSoil: LL=[0.22, 0.219, 0.177, 0.139, 0.125, 0.102, 0.083]; KL=[0.1, 0.085, 0.055, 0.02, 0.005, 0, 0]; XF=[1, 1, 1, 1, 1, 1, 1]
                SoilCrop WhiteCloverSoil: LL=[0.22, 0.219, 0.177, 0.139, 0.125, 0.102, 0.083]; KL=[0.09, 0.08, 0.04, 0.01, 0.001, 0, 0]; XF=[1, 1, 1, 1, 1, 1, 1]
                SoilCrop LucerneSoil: LL=[0.22, 0.219, 0.177, 0.139, 0.125, 0.102, 0.083]; KL=[0.06, 0.05, 0.035, 0.025, 0.015, 0.01, 0.01]; XF=[1, 1, 1, 1, 1, 1, 1]
                SoilCrop AgLucerneSoil: LL=[0.22, 0.219, 0.177, 0.139, 0.125, 0.102, 0.083]; KL=[0.06, 0.05, 0.035, 0.025, 0.015, 0.01, 0.01]; XF=[1, 1, 1, 1, 1, 1, 1]
              SoilWater: SummerDate=1-Oct; SummerU=9; SummerCona=4; WinterDate=1-Apr; WinterU=6; WinterCona=3; DiffusConst=88; DiffusSlope=35; Salb=0.15; CN2Bare=70; CNRed=20; CNCov=0.8; slope=0; discharge_width=0; catchment_area=0; max_pond=0; Thickness=[200, 200, 130, 140, 380, 230, 220]; SWCON=[0.48, 0.59, 0.61, 0.6, 0.63, 0.7, 0.71]; ResidueInterception=0
              SoilNitrogen: fom_types=[default, manure, mucuna, lablab, shemp, stable]; fract_carb=[0.2, 0.3, 0.54, 0.57, 0.45, 0]; fract_cell=[0.7, 0.3, 0.37, 0.37, 0.47, 0.1]; fract_lign=[0.1, 0.4, 0.09, 0.06, 0.08, 0.9]
                SoilNitrogenNO3 NO3
                SoilNitrogenNH4 NH4
                SoilNitrogenUrea Urea
                SoilNitrogenPlantAvailableNO3 PlantAvailableNO3
                SoilNitrogenPlantAvailableNH4 PlantAvailableNH4
              SoilOrganicMatter: RootCN=40; EnrACoeff=7.4; EnrBCoeff=0.2; OCUnits=Total
                Thickness  OC    SoilCN  FBiom  FInert  RootWt
                200        8     12.5    0.075  0.7     338.974
                200        1.88  12.5    0.013  0.79    227.221
                130        0.93  12.5    0.009  0.9     175.199
                140        0.43  12.5    0.008  0.94    132.413
                380        0.13  12.5    0.007  0.96    61.9249
                230        0.1   12.5    0.005  0.99    39.0922
                220        0.07  12.5    0.005  0.995   25.1768
              CERESSoilTemperature
              InitialWater Initial water: PercentMethod=1; FractionFull=0.9
              Sample Initial nitrogen: NO3Units=kg/ha; NH4Units=kg/ha; SWUnits=Volumetric; OCUnits=Total; PHUnits=Water
                Thickness  NO3  NH4
                200        15   0.88
                200        7    0.34
                600        5    0.609708
                500        3.2  0.48267
            Plant Chicory: CropType=Chicory; IsEnding=false; DaysAfterEnding=0
            Plant Plantain: CropType=Plantain; IsEnding=false; DaysAfterEnding=0
            PastureSpecies Ryegrass: MaximumNUptake=10; Albedo=0.26; Gsmax=0.011; R50=200; InitialShootDM=500; InitialRootDM=250; InitialRootDepth=750; ReferencePhotosyntheticRate=1; LightExtinctionCoefficient=0.5; GrowthTminimum=1; GrowthToptimum=20; GrowthTEffectExponent=1.7; HeatOnsetTemperature=28; HeatFullTemperature=35; HeatRecoverySumDD=30; HeatRecoveryTReference=25; ColdOnsetTemperature=1; ColdFullTemperature=-5; ColdRecoverySumDD=25; MaintenanceRespirationCoefficient=0.03; GrowthRespirationCoefficient=0.25; RespirationTReference=20; RespirationExponent=1.5; NThresholdsForLeaves=[0.04, 0.012, 0.05]; NThresholdsForStems=[0.02, 0.006, 0.025]; NThresholdsForStolons=[0, 0, 0]; NThresholdsForRoots=[0.02, 0.006, 0.025]; DegreesDayForGermination=125; TargetShootRootRatio=4; MaxRootAllocation=0.25; ShootRootGlfFactor=0.5; ReproSeasonReferenceLatitude=41; ReproSeasonTimingCoeff=0.14; ReproSeasonMaxAllocationIncrease=0.5; ReproSeasonAllocationCoeff=0.1; FractionLeafMaximum=0.7; FractionLeafMinimum=0.7; FractionLeafDMThreshold=500; FractionLeafDMFactor=2000; FractionLeafExponent=3; SpecificLeafArea=25; SpecificRootLength=100; ShootMaxEffectOnLAI=1000; MaxStemEffectOnLAI=1; LiveLeavesPerTiller=3; TissueTurnoverRateShoot=0.05; TissueTurnoverRateRoot=0.02; DetachmentRateShoot=0.08; TurnoverTemperatureMin=2; TurnoverTemperatureRef=20; TurnoverTemperatureExponent=1; TurnoverDroughtEffectMax=1; TurnoverDroughtThreshold=0.5; TurnoverDefoliationCoefficient=0.5; TurnoverDefoliationRootEffect=0.1; FractionNLuxuryRemobilisable=[0.1, 0.1, 0.1]; SoilSaturationEffectMax=0.1; MinimumWaterFreePorosity=-1; SoilSaturationRecoveryFactor=0.25; NDillutionCoefficient=0.25; GlfGeneric=1; GlfSoilFertility=1; PlantHeightMinimum=25; PlantHeightMaximum=600; PlantHeightMassForMax=10000; PlantHeightExponent=2.8; RootDepthMinimum=50; RootDepthMaximum=750; RootElongationRate=12.5; RootDistributionDepthParam=90; RootDistributionExponent=3.2; DigestibilitiesCellWall=[0.6, 0.6, 0.6, 0.2]; MinimumGreenWt=10; PreferenceForGreenOverDead=1; PreferenceForLeafOverStems=1
              zero: SpeciesFamily, PhotosyntheticPathway, UseHeatStressFactor, UseColdStressFactor, ColdRecoveryTReference, UseReproSeasonFactor, FractionToStolon, StolonEffectOnLAI, MinimumNFixation, MaximumNFixation, FractionStolonStanding, WaterAvailableMethod, NitrogenAvailableMethod
              PastureAboveGroundOrgan Leaves
                GenericTissue LeafCohort1
                GenericTissue LeafCohort2
                GenericTissue LeafCohort3
                GenericTissue Dead
              PastureAboveGroundOrgan Stems
                GenericTissue LeafCohort1
                GenericTissue LeafCohort2
                GenericTissue LeafCohort3
                GenericTissue Dead
              PastureAboveGroundOrgan Stolons
                GenericTissue LeafCohort1
                GenericTissue LeafCohort2
                GenericTissue LeafCohort3
                GenericTissue Dead
            PastureSpecies AgLucerne: MaximumNUptake=10; Albedo=0.26; Gsmax=0.011; R50=200; SpeciesFamily=1; PhotosyntheticPathway=0; InitialShootDM=500; InitialRootDM=250; InitialRootDepth=750; ReferencePhotosyntheticRate=1; LightExtinctionCoefficient=0.8; GrowthTminimum=2; GrowthToptimum=25; GrowthTEffectExponent=1.5; UseHeatStressFactor=0; HeatOnsetTemperature=30; HeatFullTemperature=36; HeatRecoverySumDD=25; HeatRecoveryTReference=25; UseColdStressFactor=0; ColdOnsetTemperature=5; ColdFullTemperature=1; ColdRecoverySumDD=30; ColdRecoveryTReference=0; MaintenanceRespirationCoefficient=0.03; GrowthRespirationCoefficient=0.25; RespirationTReference=20; RespirationExponent=1.5; NThresholdsForLeaves=[0.045, 0.02, 0.055]; NThresholdsForStems=[0.0225, 0.01, 0.0275]; NThresholdsForStolons=[0.0225, 0.01, 0.0275]; NThresholdsForRoots=[0.0225, 0.01, 0.0275]; DegreesDayForGermination=125; TargetShootRootRatio=4; MaxRootAllocation=0.25; ShootRootGlfFactor=0.5; UseReproSeasonFactor=0; ReproSeasonReferenceLatitude=41; ReproSeasonTimingCoeff=0.14; ReproSeasonMaxAllocationIncrease=0.5; ReproSeasonAllocationCoeff=0.1; FractionLeafMaximum=0.56; FractionLeafMinimum=0.28; FractionLeafDMThreshold=500; FractionLeafDMFactor=2000; FractionLeafExponent=3; FractionToStolon=0.1; SpecificLeafArea=25; SpecificRootLength=50; StolonEffectOnLAI=0.25; ShootMaxEffectOnLAI=1000; MaxStemEffectOnLAI=0.5; LiveLeavesPerTiller=3; TissueTurnoverRateShoot=0.03; TissueTurnoverRateRoot=0.02; DetachmentRateShoot=0.05; TurnoverTemperatureMin=2; TurnoverTemperatureRef=20; TurnoverTemperatureExponent=1; TurnoverDroughtEffectMax=1; TurnoverDroughtThreshold=0.5; TurnoverDefoliationCoefficient=0.5; TurnoverDefoliationRootEffect=0.2; FractionNLuxuryRemobilisable=[0.1, 0.1, 0.1]; MinimumNFixation=0.4; MaximumNFixation=0.6; SoilSaturationEffectMax=0.2; MinimumWaterFreePorosity=-1; SoilSaturationRecoveryFactor=0.5; NDillutionCoefficient=0.5; GlfGeneric=1; GlfSoilFertility=1; PlantHeightMinimum=25; PlantHeightMaximum=800; PlantHeightMassForMax=10000; PlantHeightExponent=2.6; RootDepthMinimum=70; RootDepthMaximum=1500; RootElongationRate=25; RootDistributionDepthParam=90; RootDistributionExponent=3.7; DigestibilitiesCellWall=[0.7, 0.7, 0.7, 0.2]; MinimumGreenWt=15; FractionStolonStanding=0; PreferenceForGreenOverDead=1; PreferenceForLeafOverStems=1; WaterAvailableMethod=0; NitrogenAvailableMethod=0
              PastureAboveGroundOrgan Leaves
                GenericTissue LeafCohort1
                GenericTissue LeafCohort2
                GenericTissue LeafCohort3
                GenericTissue Dead
              PastureAboveGroundOrgan Stems
                GenericTissue LeafCohort1
                GenericTissue LeafCohort2
                GenericTissue LeafCohort3
                GenericTissue Dead
              PastureAboveGroundOrgan Stolons
                GenericTissue LeafCohort1
                GenericTissue LeafCohort2
                GenericTissue LeafCohort3
                GenericTissue Dead
            Plant WhiteClover: CropType=WhiteClover; IsEnding=false; DaysAfterEnding=0
            Report: EventNames=[Clock].DoReport
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