Simulations: Version=73
  DataStore
    ExcelInput Observed: FileName=Observed.xlsx; SheetNames=[ObservedWarraBlock1]
    PredictedObserved: PredictedTableName=Report; ObservedTableName=ObservedWarraBlock1; FieldNameUsedForMatch=Zone; FieldName2UsedForMatch=Clock.Today
      Tests: POName=PredictedObserved
        AcceptedStats:
          {Name=SW90cm, n=96, Slope=0.799144, Intercept=57.0369, SEslope=0.0486235, SEintercept=12.3554, R2=0.741843, RMSE=25.5948, NSE=0.716703, ME=6.92093, MAE=20.2468, RSR=0.529477}
        AcceptedStatsName=Name n Slope Intercept SEslope SEintercept R2 RMSE NSE ME MAE RSR
  Replacements
  Simulation MultiRootZone
    Memo
      This is a simple test that plants SLURP, changes its leaf area index and potential biomass production on one occasion and presents some graphs of Plant, N and Water balance components to show things are working.
    Clock: Start=1998-10-14; End=1999-02-01
    ControlledEnvironment: MaxT=25; MinT=10; Rain=0; Radn=20; PanEvap=0; VP=0; Wind=3; CO2=350; AirPressure=1010; Latitude=0; DayLength=12
    Summary
    SoilArbitrator Soil Arbitrator
    Zone Zone1: Area=1; Slope=0; AspectAngle=0; Altitude=50
      Soil: Latitude=0; Longitude=0
        Chemical
          Thickness  NO3N     NH4N  PH
          100        14.1667  0     6.6
          200        12.5     0     6.2
          300        1.38889  0     5.7
          300        1.38889  0     5.5
          300        0        0     5.5
          300        0        0     5.5
        InitialWater Initial water: PercentMethod=1; FractionFull=1
        Physical
          Thickness  BD   AirDry  LL15  DUL   SAT
          100        1.2  0.08    0.13  0.33  0.5
          200        1.2  0.13    0.13  0.33  0.5
          300        1.2  0.1     0.1   0.31  0.44
          300        1.2  0.06    0.06  0.15  0.46
          300        1.2  0.04    0.04  0.1   0.44
          300        1.2  0.02    0.02  0.06  0.44
          SoilCrop SlurpSoil: LL=[0.13, 0.13, 0.1, 0.08, 0.11, 0.11]; KL=[0.06, 0.06, 0.06, 0.06, 0.06, 0.06]; XF=[1, 1, 1, 1, 1, 1]
          SoilCrop PotatoSoil: LL=[0.13, 0.13, 0.27, 0.27, 0.3, 0.3]; KL=[0.1, 0.06, 0.03, 0.01, 0, 0]; XF=[1, 1, 0.1, 0, 0, 0]
        SoilWater: SummerDate=1-Nov; WinterDate=1-Apr; Salb=0.18; CN2Bare=68; CNRed=20; CNCov=0.8
          zero: SummerU, SummerCona, WinterU, WinterCona, DiffusConst, DiffusSlope, slope, discharge_width, catchment_area, max_pond, PrecipitationInterception
          Thickness  SWCON  KLAT
          100        0.55   0
          200        0.55   0
          300        0.55   0
          300        0.55   0
          300        0.55   0
          300        0.55   0
        SoilNitrogen: fom_types=[default, manure, mucuna, lablab, shemp, stable]; fract_carb=[0.2, 0.3, 0.54, 0.57, 0.45, 0]; fract_cell=[0.7, 0.3, 0.37, 0.37, 0.47, 0.1]; fract_lign=[0.1, 0.4, 0.09, 0.06, 0.08, 0.9]
          SoilNitrogenNO3 NO3
          SoilNitrogenNH4 NH4
          SoilNitrogenUrea Urea
          SoilNitrogenPlantAvailableNO3 PlantAvailableNO3
          SoilNitrogenPlantAvailableNH4 PlantAvailableNH4
        Organic: FOMCNRatio=30
          Thickness  Carbon  SoilCNRatio  FBiom  FInert  FOM
          100        1.82    11.5         0      1       0
          200        1.47    11.5         0      1       0
          300        1.2     11.5         0      1       0
          300        1.03    11.5         0      1       0
          300        0.47    11.5         0      1       0
          300        0.47    11.5         0      1       0
        Sample Initial nitrogen: Thickness=[100, 200, 300, 300, 300, 300]; SWUnits=Volumetric; OCUnits=Total; PHUnits=Water
        CERESSoilTemperature
      Plant Slurp: CropType=Slurp; IsEnding=false; DaysAfterEnding=0
      MicroClimate: a_interception=0; b_interception=1; c_interception=0; d_interception=0; soil_albedo=0.23; SoilHeatFluxFraction=0.4; NightInterceptionFraction=0.5; ReferenceHeight=2
      Irrigation
      Fertiliser
      Manager SlurpSowingRule
        CultivarName = StaticCrop
        InitialRootDepth = 200
        SowingDate = 1998-10-14
```csharp
using System;
using Models.Core;
using Models.PMF;
using APSIM.Shared.Utilities;
        
namespace Models
{
    [Serializable] 
    [System.Xml.Serialization.XmlInclude(typeof(Model))]
    public class Script : Model
    {
        [Link] Plant Slurp;
        [Link] Clock Clock;

        [Description("Cultivar")]
        public string CultivarName { get; set; }
        [Description("Initial Root Depth")]
        public double InitialRootDepth { get; set; }
        [Description("Sowing Date")]
        public DateTime SowingDate { get; set; }

               
        [EventSubscribe("DoManagement")]
        private void OnDoManagement(object sender, EventArgs e)
        {
            if (Clock.Today.Date == SowingDate)
                Slurp.Sow(cultivar: CultivarName, population: 1, depth: InitialRootDepth, rowSpacing: 150);
            //Potato.Sow(... Contains the following arguements:
            //Population  double  Optional  Seeds sowing/m2.  Default is zero
            //Cultivar    string  Required  "NameOfCultivar"
            //Depth       double  Optional  Depth (mm) seed sown.   Default is 100mm 
            //MaxCover    double  Optional  Proportion (0-1) of the ground row crop will cover.   Default is 1.0
            //BudNumber   double  Optional  Number of mainstems per seed sown.  Default is 1.0
            //RowSpacing  double  Optional  Spaceing (mm) between drill rows when crop is sown.  Default is 150mm
            //CropClass   string  Optional  Crop class to instantiate when crop is sown.  Default is "Plant"
        }
    }
}
```
      Manager ExtraVariables
```csharp
using Models.Interfaces;
using System;
using Models.Core;
using System.Collections.Generic;
using System.Text;
using Models.Soils;
using Models.PMF;
using Models;
using System.Xml.Serialization;
using APSIM.Shared.Utilities;
using Models.Interfaces;
using Models.Interfaces;

namespace Models
{
    [Serializable] 
    public class Script : Model
    {
        [Link] private Clock Clock;
        [Link] private IWeather Met;
        [Link] private Fertiliser Fert;
        [Link] private Irrigation Irrig;
        [Link] private Plant Slurp;
        [Link] private Zone zone;
        [Link(ByName = true)]
        private ISolute Urea;
        [Link(ByName = true)]
        private ISolute NO3;
        [Link(ByName = true)]
        private ISolute NH4;
        [Link(ByName = true)]
        private SoilNitrogen SoilNitrogen;
        [Link] Soils.Soil Soil;
        [Link] Models.Surface.SurfaceOrganicMatter SOM;
                    
        [XmlIgnore] public bool InitialDay { get; set; }
        
        [XmlIgnore] public double AccumPlantN { get; set; }
        [XmlIgnore] public double AccumMineralisation { get; set; }
        [XmlIgnore] public double AccumDenit { get; set; }
        [XmlIgnore] public double AccumFert { get; set; }
        [XmlIgnore] public double AccumLeach { get; set; }
        [XmlIgnore] public double AccumDetach { get; set; }
        [XmlIgnore] public double DeltaSoilOMN { get; set; }
        [XmlIgnore] public double DeltaSurfaceOMN { get; set; }
        [XmlIgnore] public double DeltaSoilMineralN { get; set; }
        [XmlIgnore] public double SoilNitrogenContent { get; set; }
        
        [XmlIgnore] public double AccumEO { get; set; }
        [XmlIgnore] public double AccumEP { get; set; }
        [XmlIgnore] public double AccumES { get; set; }
        [XmlIgnore] public double AccumDrainage { get; set; }
        [XmlIgnore] public double AccumRunoff { get; set; }
        [XmlIgnore] public double AccumOutflowLat { get; set; }
        [XmlIgnore] public double AccumIrrigation { get; set; }
        [XmlIgnore] public double AccumRainfall { get; set; }
        [XmlIgnore] public double SoilWaterDeficit { get; set; }
    
        [XmlIgnore] public double  InitialSoilOMN { get; set; }
        [XmlIgnore] public double  InitialSurfaceOMN { get; set; }
        [XmlIgnore] public double  InitialMineralN { get; set; }
        
        [XmlIgnore] public double SWC { get; set; }
        [XmlIgnore] public double DUL { get; set; }
        [XmlIgnore] public double OutFlowLat { get; set; }

        [XmlIgnore] public double FomN { get; set; }
        [XmlIgnore] public double BiomN { get; set; }
        [XmlIgnore] public double HumN { get; set; }
        [XmlIgnore] public double OrganicN { get; set; }
        [XmlIgnore] public double NO3N { get; set; }
        [XmlIgnore] public double NH4N { get; set; }
        [XmlIgnore] public double UreaN { get; set; }
        [XmlIgnore] public double MineralN { get; set; }
        [XmlIgnore] public double DltNMinRes { get; set; }
        [XmlIgnore] public double DltNMinTot { get; set; }
        
        [EventSubscribe("Commencing")]
        private void OnSimulationCommencing(object sender, EventArgs e)
        {
            InitialDay = true;
        }
        
        [EventSubscribe("DoManagement")]
        private void OnDoManagement(object sender, EventArgs e)
        {
            //!!!!!! Nitrogen balance components !!!!!!
            //!!!!!!^^^^^^^^^^^^^^^^^^^^^^^^^^^^^!!!!!!
            FomN = MathUtilities.Sum(SoilNitrogen.FOMN);
            HumN = MathUtilities.Sum(SoilNitrogen.HumicN);
            BiomN = MathUtilities.Sum(SoilNitrogen.MicrobialN);
            OrganicN = FomN + HumN + BiomN;
            NO3N = MathUtilities.Sum(NO3.kgha);
            NH4N = MathUtilities.Sum(NH4.kgha);
            UreaN = MathUtilities.Sum(Urea.kgha);
            MineralN = NO3N + NH4N + UreaN; 
            DltNMinRes = MathUtilities.Sum(SoilNitrogen.dlt_n_min_res);
            DltNMinTot = MathUtilities.Sum(SoilNitrogen.MineralisedN);
            int layers = Soil.Thickness.Length;
            if (InitialDay == true)
            {
                InitialSurfaceOMN = SOM.N;
                InitialSoilOMN = OrganicN;
                InitialMineralN = MineralN;
                InitialDay = false;
            }
            AccumFert += Fert.NitrogenApplied;
            DeltaSurfaceOMN = SOM.N - InitialSurfaceOMN;
            AccumLeach = AccumLeach - Soil.SoilWater.LeachNH4 - Soil.SoilWater.LeachNO3 - Soil.SoilWater.LeachUrea; //Fails
            AccumMineralisation += MathUtilities.Sum(SoilNitrogen.MineralisedN);
            AccumDenit -= MathUtilities.Sum(SoilNitrogen.Denitrification);
            AccumPlantN -= (double)zone.Get("Slurp.Root.NUptake");
            DeltaSoilOMN = OrganicN - InitialSoilOMN;
            DeltaSoilMineralN = MineralN - InitialMineralN;
            SoilNitrogenContent = MineralN;
            
            //!!!!!! Water balance components !!!!!!
            //!!!!!!^^^^^^^^^^^^^^^^^^^^^^^^^^!!!!!!

            AccumIrrigation += Irrig.IrrigationApplied;
            AccumRainfall += Met.Rain;
            //AccumEP -= (double)zone.Get("[Slurp].Leaf.Transpiration");
            AccumEP -= (double)zone.Get("Slurp.Root.WaterUptake");
            SoilWaterDeficit = (SWC - DUL);
            double OutFlowLat = MathUtilities.Sum(Soil.SoilWater.LateralOutflow);
            AccumOutflowLat -= OutFlowLat;
        }
        
        [EventSubscribe("DoManagementCalculations")]
        private void OnDoManagementCalculations(object sender, EventArgs e)
        {
            FomN = MathUtilities.Sum(SoilNitrogen.FOMN);
            HumN = MathUtilities.Sum(SoilNitrogen.HumicN);
            BiomN = MathUtilities.Sum(SoilNitrogen.MicrobialN);
            
            
            AccumEO -= Soil.SoilWater.Eo;
            AccumES -= Soil.SoilWater.Es; 
            AccumDrainage -= Soil.SoilWater.Drainage;
            AccumRunoff -= Soil.SoilWater.Runoff;
            SWC = MathUtilities.Sum(Soil.SoilWater.SWmm);
            DUL = MathUtilities.Sum(Soil.DULmm);
        }
    }
}
```
      SurfaceOrganicMatter surface organic matter: InitialResidueName=wheat; InitialResidueType=wheat; InitialResidueMass=0; InitialStandingFraction=0; InitialCPR=0; InitialCNR=80; FractionFaecesAdded=0.5
      Operations
        1999-03-09  [Irrigation].Apply(0);
        1998-12-29  [Fertiliser].Apply(0, Fertiliser.Types.UreaN, 10);
      Report: EventNames=[Clock].DoReport
        VariableNames:
          [Clock].Today
          [ExtraVariables].Script.AccumPlantN
          [ExtraVariables].Script.AccumMineralisation
          [ExtraVariables].Script.AccumDenit
          [ExtraVariables].Script.AccumFert
          [ExtraVariables].Script.AccumLeach
          [ExtraVariables].Script.AccumDetach
          [ExtraVariables].Script.DeltaSoilOMN
          [ExtraVariables].Script.DeltaSurfaceOMN
          [ExtraVariables].Script.DeltaSoilMineralN
          [Slurp].Root.NSupply
          [Soil].SoilWater.Eo
          [Soil].SoilWater.Es
          [ExtraVariables].Script.SWC
          [ExtraVariables].Script.DUL
          [Soil].SoilWater.Drainage
          [Soil].SoilWater.Runoff
          [ExtraVariables].Script.OutFlowLat
          [Soil].SoilWater.pond
          [ExtraVariables].Script.AccumEO
          [ExtraVariables].Script.AccumEP
          [ExtraVariables].Script.AccumES
          [ExtraVariables].Script.AccumDrainage
          [ExtraVariables].Script.AccumRunoff
          [ExtraVariables].Script.AccumRainfall
          [ExtraVariables].Script.AccumIrrigation
          [ExtraVariables].Script.AccumOutflowLat
          [ExtraVariables].Script.SoilWaterDeficit
          [Slurp].Leaf.Live.Wt
          [Slurp].Root.Live.Wt
          [Slurp].Leaf.Live.N
          [Slurp].Root.Live.N
          [Slurp].Leaf.Live.NConc
          [Slurp].Root.Live.NConc
          [Slurp].Root.WaterSupply
          [Slurp].Root.WaterUptake
          [Slurp].Leaf.Transpiration
          [Slurp].Leaf.WaterDemand
          [Slurp].Root.Depth
          [Slurp].Root.Zones[1].Depth
          [Slurp].Root.Zones[2].Depth
          [Slurp].Root.Zones[3].Depth
          [Slurp].Leaf.CoverTotal
          [Slurp].Leaf.CoverDead
          [Slurp].Leaf.LAI
          [Slurp].Leaf.Height
          [Slurp].Leaf.PotentialBiomass
          [Soil].SoilWater.SWmm
          [Soil].SoilNitrogen.NO3.kgha
          [ExtraVariables].Script.SoilNitrogenContent
          [Slurp].Arbitrator.N.TotalPlantDemand
          [MicroClimate].net_radn
          [MicroClimate].peta
          [MicroClimate].petr
          [ExtraVariables].Script.FomN
          [ExtraVariables].Script.HumN
          [ExtraVariables].Script.BiomN
          [ExtraVariables].Script.DltNMinRes
          [ExtraVariables].Script.DltNMinTot
          [Slurp].Leaf.Fw
          [Slurp].Leaf.Fn
          [Weather].Rain
      Manager ResetProduction
        OverRidePath = Slurp.Leaf.Photosynthesis.FixedValue
        OverRideInterger = 2
        ChangeDate = 1998-11-14
```csharp
using System;
using Models.Core;
using System.Collections.Generic;
using System.Text;
using Models.PMF;
using Models;
using System.Xml.Serialization;
using APSIM.Shared.Utilities;

namespace Models
{
    [Serializable] 
    public class Script : Model
    {
        [Link] Plant Plant;
        [Link] Clock Clock;
        [Link] Zone zone;
        
        [Description("Path for coefficient to be Overwritten")]
        public string OverRidePath { get; set; }
        [Description("Value for new coefficient Interger")]
        public int OverRideInterger { get; set; }
        [Description("Sowing Date")]
        public DateTime ChangeDate { get; set; }
        
        [EventSubscribe("DoManagement")]
        private void OnDoManagement(object sender, EventArgs e)
        {
            if (Clock.Today.Date == ChangeDate)
            {
                object ResetValue = OverRideInterger;
                zone.Set(OverRidePath, ResetValue);
            }
        }
    }
}
```
      Manager ResetLAI
        OverRidePath = Slurp.Leaf.Area.FixedValue
        OverRideInterger = 3
        ChangeDate = 1999-01-01
        script: same as in MultiRootZone.Zone1.ResetProduction
      Manager SetupRootZones
```csharp
using System;
using Models.Core;
using System.Collections.Generic;
using System.Text;
using Models.PMF;
using Models;
using System.Xml.Serialization;
using APSIM.Shared.Utilities;

namespace Models
{
    [Serializable] 
    public class Script : Model
    {
        [Link] Plant Slurp;
        [Link] Clock Clock;
        [Link] Zone zone;
        
        [EventSubscribe("Commencing")]
        private void OnSimulationCommencing(object sender, EventArgs e)
        {
            Slurp.Root.ZoneNamesToGrowRootsIn.Add("Zone2");
            Slurp.Root.ZoneNamesToGrowRootsIn.Add("Zone3");
            Slurp.Root.ZoneRootDepths.Add(100);
            Slurp.Root.ZoneRootDepths.Add(50);
            Slurp.Root.ZoneInitialDM.Add(2000);
            Slurp.Root.ZoneInitialDM.Add(1000);
        }
    }
}
```
    Zone Zone2: Area=1; Slope=0; AspectAngle=0; Altitude=50
      Soil: same as MultiRootZone.Zone1.Soil
      SurfaceOrganicMatter surface organic matter: InitialResidueName=wheat; InitialResidueType=wheat; InitialResidueMass=0; InitialStandingFraction=0; InitialCPR=0; InitialCNR=80; FractionFaecesAdded=0.5
      Report: EventNames=[Clock].DoReport
        VariableNames:
          [Clock].Today
          [ExtraVariables].Script.AccumPlantN
          [ExtraVariables].Script.AccumMineralisation
          [ExtraVariables].Script.AccumDenit
          [ExtraVariables].Script.AccumFert
          [ExtraVariables].Script.AccumLeach
          [ExtraVariables].Script.AccumDetach
          [ExtraVariables].Script.DeltaSoilOMN
          [ExtraVariables].Script.DeltaSurfaceOMN
          [ExtraVariables].Script.DeltaSoilMineralN
          [Slurp].Root.NSupply
          [Soil].SoilWater.Eo
          [Soil].SoilWater.Es
          [ExtraVariables].Script.SWC
          [ExtraVariables].Script.DUL
          [Soil].SoilWater.Drainage
          [Soil].SoilWater.Runoff
          [ExtraVariables].Script.OutFlowLat
          [Soil].SoilWater.pond
          [ExtraVariables].Script.AccumEO
          [ExtraVariables].Script.AccumEP
          [ExtraVariables].Script.AccumES
          [ExtraVariables].Script.AccumDrainage
          [ExtraVariables].Script.AccumRunoff
          [ExtraVariables].Script.AccumRainfall
          [ExtraVariables].Script.AccumIrrigation
          [ExtraVariables].Script.AccumOutflowLat
          [ExtraVariables].Script.SoilWaterDeficit
          [Slurp].Leaf.Live.Wt
          [Slurp].Root.Live.Wt
          [Slurp].Leaf.Live.N
          [Slurp].Root.Live.N
          [Slurp].Leaf.Live.NConc
          [Slurp].Root.Live.NConc
          [Slurp].Root.WaterSupply
          [Slurp].Root.WaterUptake
          [Slurp].Leaf.Transpiration
          [Slurp].Leaf.WaterDemand
          [Slurp].Root.Depth
          [Slurp].Leaf.CoverTotal
          [Slurp].Leaf.CoverDead
          [Slurp].Leaf.LAI
          [Slurp].Leaf.Height
          [Slurp].Leaf.PotentialBiomass
          [Soil].SoilWater.SWmm
          [Soil].SoilNitrogen.NO3.kgha
          [ExtraVariables].Script.SoilNitrogenContent
          [Slurp].Arbitrator.N.TotalPlantDemand
          [MicroClimate].net_radn
          [MicroClimate].peta
          [MicroClimate].petr
          [ExtraVariables].Script.FomN
          [ExtraVariables].Script.HumN
          [ExtraVariables].Script.BiomN
          [ExtraVariables].Script.DltNMinRes
          [ExtraVariables].Script.DltNMinTot
          [Slurp].Leaf.Fw
          [Slurp].Leaf.Fn
          [Weather].Rain
      Fertiliser
      Irrigation
    Zone Zone3: same as MultiRootZone.Zone2
    MicroClimate: a_interception=0; b_interception=1; c_interception=0; d_interception=0; soil_albedo=0.23; SoilHeatFluxFraction=0.4; NightInterceptionFraction=0.5; ReferenceHeight=2
  Folder IdenticalZones
    Simulation OneZone
      Memo
        This is a simple test that plants SLURP, changes its leaf area index and potential biomass production on one occasion and presents some graphs of Plant, N and Water balance components to show things are working.
      Clock: Start=1998-10-14; End=1999-02-01
      ControlledEnvironment: MaxT=25; MinT=10; Rain=0; Radn=20; PanEvap=0; VP=0; Wind=3; CO2=350; AirPressure=1010; Latitude=0; DayLength=12
      Summary
      SoilArbitrator Soil Arbitrator
      Zone Zone1: Area=1; Slope=0; AspectAngle=0; Altitude=50
        Soil: same as MultiRootZone.Zone1.Soil
        Plant Slurp: CropType=Slurp; IsEnding=false; DaysAfterEnding=0
        MicroClimate: a_interception=0; b_interception=1; c_interception=0; d_interception=0; soil_albedo=0.23; SoilHeatFluxFraction=0.4; NightInterceptionFraction=0.5; ReferenceHeight=2
        Irrigation
        Fertiliser
        Manager SlurpSowingRule: same as MultiRootZone.Zone1.SlurpSowingRule
        Manager ExtraVariables: same as MultiRootZone.Zone1.ExtraVariables
        SurfaceOrganicMatter surface organic matter: InitialResidueName=wheat; InitialResidueType=wheat; InitialResidueMass=0; InitialStandingFraction=0; InitialCPR=0; InitialCNR=80; FractionFaecesAdded=0.5
        Operations
          1999-03-09  [Irrigation].Apply(0);
          1998-12-29  [Fertiliser].Apply(0, Fertiliser.Types.UreaN, 10);
        Report: EventNames=[Clock].DoReport
          VariableNames:
            [Clock].Today
            [ExtraVariables].Script.AccumPlantN
            [ExtraVariables].Script.AccumMineralisation
            [ExtraVariables].Script.AccumDenit
            [ExtraVariables].Script.AccumFert
            [ExtraVariables].Script.AccumLeach
            [ExtraVariables].Script.AccumDetach
            [ExtraVariables].Script.DeltaSoilOMN
            [ExtraVariables].Script.DeltaSurfaceOMN
            [ExtraVariables].Script.DeltaSoilMineralN
            [Slurp].Root.NSupply
            [Soil].SoilWater.Eo
            [Soil].SoilWater.Es
            [ExtraVariables].Script.SWC
            [ExtraVariables].Script.DUL
            [Soil].SoilWater.Drainage
            [Soil].SoilWater.Runoff
            [ExtraVariables].Script.OutFlowLat
            [Soil].SoilWater.pond
            [ExtraVariables].Script.AccumEO
            [ExtraVariables].Script.AccumEP
            [ExtraVariables].Script.AccumES
            [ExtraVariables].Script.AccumDrainage
            [ExtraVariables].Script.AccumRunoff
            [ExtraVariables].Script.AccumRainfall
            [ExtraVariables].Script.AccumIrrigation
            [ExtraVariables].Script.AccumOutflowLat
            [ExtraVariables].Script.SoilWaterDeficit
            [Slurp].Leaf.Live.Wt
            [Slurp].Root.Live.Wt
            [Slurp].Leaf.Live.N
            [Slurp].Root.Live.N
            [Slurp].Leaf.Live.NConc
            [Slurp].Root.Live.NConc
            [Slurp].Root.WaterSupply
            [Slurp].Root.WaterUptake
            [Slurp].Leaf.Transpiration
            [Slurp].Leaf.WaterDemand
            [Slurp].Root.Depth
            [Slurp].Root.Zones[1].Depth
            [Slurp].Root.Zones[1].LayerLive[1].Wt
            [Slurp].Root.Zones[1].LayerLive[2].Wt
            [Slurp].Root.Zones[1].LayerLive[3].Wt
            [Slurp].Root.Zones[1].LayerLive[4].Wt
            [Slurp].Leaf.CoverTotal
            [Slurp].Leaf.CoverDead
            [Slurp].Leaf.LAI
            [Slurp].Leaf.Height
            [Slurp].Leaf.PotentialBiomass
            [Slurp].Leaf.Transpiration
            [Slurp].Leaf.PotentialEP
            [Soil].SoilWater.SWmm
            [Soil].SoilNitrogen.NO3.kgha
            [ExtraVariables].Script.SoilNitrogenContent
            [Slurp].Arbitrator.N.TotalPlantDemand
            [MicroClimate].net_radn
            [MicroClimate].peta
            [MicroClimate].petr
            [ExtraVariables].Script.FomN
            [ExtraVariables].Script.HumN
            [ExtraVariables].Script.BiomN
            [ExtraVariables].Script.DltNMinRes
            [ExtraVariables].Script.DltNMinTot
            [Slurp].Leaf.Fw
            [Slurp].Leaf.Fn
            [Weather].Rain
        Manager ResetProduction: same as MultiRootZone.Zone1.ResetProduction
        Manager ResetLAI
          OverRidePath = Slurp.Leaf.Area.FixedValue
          OverRideValue = 0.5
          ChangeDate = 1999-01-01
```csharp
using System;
using Models.Core;
using System.Collections.Generic;
using System.Text;
using Models.PMF;
using Models;
using System.Xml.Serialization;
using APSIM.Shared.Utilities;

namespace Models
{
    [Serializable] 
    public class Script : Model
    {
        [Link] Plant Plant;
        [Link] Clock Clock;
        [Link] Zone zone;
        
        [Description("Path for coefficient to be Overwritten")]
        public string OverRidePath { get; set; }
        [Description("Value for new coefficient")]
        public double OverRideValue { get; set; }
        [Description("Sowing Date")]
        public DateTime ChangeDate { get; set; }
        
        [EventSubscribe("DoManagement")]
        private void OnDoManagement(object sender, EventArgs e)
        {
            if (Clock.Today.Date == ChangeDate)
            {
                object ResetValue = OverRideValue;
                zone.Set(OverRidePath, ResetValue);
            }
        }
    }
}
```
        Manager SetupRootZones
```csharp
using System;
using Models.Core;
using System.Collections.Generic;
using System.Text;
using Models.PMF;
using Models;
using System.Xml.Serialization;
using APSIM.Shared.Utilities;

namespace Models
{
    [Serializable] 
    public class Script : Model
    {
        [Link] Plant Slurp;
        [Link] Clock Clock;
        [Link] Zone zone;
        
        [EventSubscribe("Commencing")]
        private void OnSimulationCommencing(object sender, EventArgs e)
        {
            //Slurp.Root.ZoneNamesToGrowRootsIn.Add("Zone2");
            //Slurp.Root.ZoneNamesToGrowRootsIn.Add("Zone3");
            //Slurp.Root.ZoneRootDepths.Add(100);
            //Slurp.Root.ZoneRootDepths.Add(50);
            //Slurp.Root.ZoneInitialDM.Add(2000);
            //Slurp.Root.ZoneInitialDM.Add(1000);
        }
    }
}
```
      MicroClimate: a_interception=0; b_interception=1; c_interception=0; d_interception=0; soil_albedo=0.23; SoilHeatFluxFraction=0.4; NightInterceptionFraction=0.5; ReferenceHeight=2
    Simulation TwoZones
      Memo
        This is a simple test that plants SLURP, changes its leaf area index and potential biomass production on one occasion and presents some graphs of Plant, N and Water balance components to show things are working.
      Clock: Start=1998-10-14; End=1999-02-01
      ControlledEnvironment: MaxT=25; MinT=10; Rain=0; Radn=20; PanEvap=0; VP=0; Wind=3; CO2=350; AirPressure=1010; Latitude=0; DayLength=12
      Summary
      SoilArbitrator Soil Arbitrator
      Zone Zone1: Area=1; Slope=0; AspectAngle=0; Altitude=50
        Soil: same as MultiRootZone.Zone1.Soil
        Plant Slurp: CropType=Slurp; IsEnding=false; DaysAfterEnding=0
        MicroClimate: a_interception=0; b_interception=1; c_interception=0; d_interception=0; soil_albedo=0.23; SoilHeatFluxFraction=0.4; NightInterceptionFraction=0.5; ReferenceHeight=2
        Irrigation
        Fertiliser
        Manager SlurpSowingRule: same as MultiRootZone.Zone1.SlurpSowingRule
        Manager ExtraVariables: same as MultiRootZone.Zone1.ExtraVariables
        SurfaceOrganicMatter surface organic matter: InitialResidueName=wheat; InitialResidueType=wheat; InitialResidueMass=0; InitialStandingFraction=0; InitialCPR=0; InitialCNR=80; FractionFaecesAdded=0.5
        Operations
          1999-03-09  [Irrigation].Apply(0);
          1998-12-29  [Fertiliser].Apply(0, Fertiliser.Types.UreaN, 10);
        Report: EventNames=[Clock].DoReport
          VariableNames:
            [Clock].Today
            [ExtraVariables].Script.AccumPlantN
            [ExtraVariables].Script.AccumMineralisation
            [ExtraVariables].Script.AccumDenit
            [ExtraVariables].Script.AccumFert
            [ExtraVariables].Script.AccumLeach
            [ExtraVariables].Script.AccumDetach
            [ExtraVariables].Script.DeltaSoilOMN
            [ExtraVariables].Script.DeltaSurfaceOMN
            [ExtraVariables].Script.DeltaSoilMineralN
            [Slurp].Root.NSupply
            [Soil].SoilWater.Eo
            [Soil].SoilWater.Es
            [ExtraVariables].Script.SWC
            [ExtraVariables].Script.DUL
            [Soil].SoilWater.Drainage
            [Soil].SoilWater.Runoff
            [ExtraVariables].Script.OutFlowLat
            [Soil].SoilWater.pond
            [ExtraVariables].Script.AccumEO
            [ExtraVariables].Script.AccumEP
            [ExtraVariables].Script.AccumES
            [ExtraVariables].Script.AccumDrainage
            [ExtraVariables].Script.AccumRunoff
            [ExtraVariables].Script.AccumRainfall
            [ExtraVariables].Script.AccumIrrigation
            [ExtraVariables].Script.AccumOutflowLat
            [ExtraVariables].Script.SoilWaterDeficit
            [Slurp].Leaf.Live.Wt
            [Slurp].Root.Live.Wt
            [Slurp].Leaf.Live.N
            [Slurp].Root.Live.N
            [Slurp].Leaf.Live.NConc
            [Slurp].Root.Live.NConc
            [Slurp].Root.WaterSupply
            [Slurp].Root.WaterUptake
            [Slurp].Leaf.Transpiration
            [Slurp].Leaf.WaterDemand
            [Slurp].Root.Depth
            [Slurp].Root.Zones[1].Depth
            [Slurp].Root.Zones[2].Depth
            [Slurp].Root.Zones[1].LayerLive[1].Wt
            [Slurp].Root.Zones[1].LayerLive[2].Wt
            [Slurp].Root.Zones[1].LayerLive[3].Wt
            [Slurp].Root.Zones[1].LayerLive[4].Wt
            [Slurp].Root.Zones[2].LayerLive[1].Wt
            [Slurp].Root.Zones[2].LayerLive[2].Wt
            [Slurp].Root.Zones[2].LayerLive[3].Wt
            [Slurp].Root.Zones[2].LayerLive[4].Wt
            [Slurp].Leaf.CoverTotal
            [Slurp].Leaf.CoverDead
            [Slurp].Leaf.LAI
            [Slurp].Leaf.Height
            [Slurp].Leaf.PotentialBiomass
            [Soil].SoilWater.SWmm
            [Soil].SoilNitrogen.NO3.kgha
            [ExtraVariables].Script.SoilNitrogenContent
            [Slurp].Arbitrator.N.TotalPlantDemand
            [MicroClimate].net_radn
            [MicroClimate].peta
            [MicroClimate].petr
            [ExtraVariables].Script.FomN
            [ExtraVariables].Script.HumN
            [ExtraVariables].Script.BiomN
            [ExtraVariables].Script.DltNMinRes
            [ExtraVariables].Script.DltNMinTot
            [Slurp].Leaf.Fw
            [Slurp].Leaf.Fn
            [Weather].Rain
        Manager ResetProduction: same as MultiRootZone.Zone1.ResetProduction
        Manager ResetLAI: same as IdenticalZones.OneZone.Zone1.ResetLAI
        Manager SetupRootZones
```csharp
using System;
using Models.Core;
using System.Collections.Generic;
using System.Text;
using Models.PMF;
using Models;
using System.Xml.Serialization;
using APSIM.Shared.Utilities;

namespace Models
{
    [Serializable] 
    public class Script : Model
    {
        [Link] Plant Slurp;
        [Link] Clock Clock;
        [Link] Zone zone;
        
        [EventSubscribe("Commencing")]
        private void OnSimulationCommencing(object sender, EventArgs e)
        {
            Slurp.Root.ZoneNamesToGrowRootsIn.Add("Zone2");
            //Slurp.Root.ZoneNamesToGrowRootsIn.Add("Zone3");
            Slurp.Root.ZoneRootDepths.Add(200);
            //Slurp.Root.ZoneRootDepths.Add(50);
            Slurp.Root.ZoneInitialDM.Add(50);
            //Slurp.Root.ZoneInitialDM.Add(1000);
        }
    }
}
```
      Zone Zone2: same as MultiRootZone.Zone2
      MicroClimate: a_interception=0; b_interception=1; c_interception=0; d_interception=0; soil_albedo=0.23; SoilHeatFluxFraction=0.4; NightInterceptionFraction=0.5; ReferenceHeight=2
  Folder Agroforestry
    Simulation Warra
      Memo
        This is a simple test that plants SLURP, changes its leaf area index and potential biomass production on one occasion and presents some graphs of Plant, N and Water balance components to show things are working.
      Clock: Start=2004-03-22; End=2005-10-04
      Weather: FileName=%root%\Tests\Validation\Agroforestry\warra.met
      Summary
      SoilArbitrator Soil Arbitrator
      Manager SowingRule
        SowDate = 26/06/2004
        CultivarName = h45
        SowingDepth = 30
        RowSpacing = 250
        Population = 120
        Amount = 60
        CropName = wheat
```csharp
using System;
using System.Collections.Generic;
using Models.Core;
using Models.Agroforestry;
using Models.PMF;
using Models.Soils;
using Models.Utilities;
using Models.Zones;
using APSIM.Shared.Utilities;

namespace Models
{
    [Serializable]
    public class Script : Model
    {
        [Link] Clock Clock;
        [Link] Summary Summary;
        
        [Description("Sowing date (d-mmm-yyyy)")]
        public string SowDate { get; set; }
        [Description("Cultivar to be sown")]
        public string CultivarName { get; set; }
        [Description("Sowing depth (mm)")]
        public double SowingDepth { get; set; }
        [Description("Row spacing (mm)")]
        public double RowSpacing { get; set; }
        [Description("Plant population (/m2)")]
        public double Population { get; set; }
        [Description("Amount of fertiliser to be applied (kg/ha)")]
        public double Amount { get; set; }
        [Description("Crop to be fertilised")]
        public string CropName { get; set; }
        
        private List<IModel> Zones;
        private Plant Wheat;
        private Soil Soil;
        
        [EventSubscribe("Commencing")]
        private void OnSimulationCommencing(object sender, EventArgs e)
        {
            Zones = Apsim.FindAll(this, typeof(RectangularZone));
        }
        
        [EventSubscribe("DoManagement")]
        private void OnDoManagement(object sender, EventArgs e)
        {        
            if (DateUtilities.DMYtoDate(SowDate) == Clock.Today)
            {
            
                foreach (Zone z in Zones)
                {
                    Wheat = Apsim.Find(z, typeof(Plant)) as Plant;    
                    Soil = Apsim.Find(z, typeof(Soil)) as Soil;
                            
                    if (Wheat != null && !Wheat.IsAlive)
                    {
                        Wheat.Sow(population: Population, cultivar: CultivarName, depth: SowingDepth, rowSpacing: RowSpacing);
                        Fertiliser Fertiliser = Apsim.Find(Wheat.Parent, typeof(Fertiliser)) as Fertiliser;
                        Fertiliser.Apply(Amount: Amount, Type: Fertiliser.Types.NO3N);
                    }
                    //else
                    //    throw new ApsimXException(null, "Cannot sow wheat on that date");

                    if (Wheat != null && Wheat.IsReadyForHarvesting)
                    {
                           Wheat.Harvest();
                           Wheat.EndCrop();    
                    }
        
                }
            }
        }
    }
}
```
      Manager Calculations
        AverageSoilWater = 0
```csharp
using System;
using Models.Core;
using System.Collections.Generic;
using System.Text;
using Models.PMF;
using Models;
using System.Xml.Serialization;
using APSIM.Shared.Utilities;
using Models.Soils;
using Models.Zones;

namespace Models
{
    [Serializable] 
    public class Script : Model
    {
        [Link] Plant Slurp;
        [Link] Clock Clock;
        private List<IModel> Zones;
        private Soil Soil;
        public double AverageSoilWater { get; set; }
        
        [EventSubscribe("Commencing")]
        private void OnSimulationCommencing(object sender, EventArgs e)
        {
            Zones = Apsim.FindAll(this, typeof(RectangularZone));
            AverageSoilWater = 0;
        }
        
        [EventSubscribe("EndOfDay")]
        private void OnEndOfDay(object sender, EventArgs e)
        {
            double TotalArea = 0;
            double TotalWater = 0;
            foreach (Zone z in Zones)
            {
                Soil = Apsim.Find(z, typeof(Soil)) as Soil;
                TotalArea += z.Area;
                for (int i = 0; i <= 4; i++)
                    TotalWater += Soil.Water[i] * z.Area;                    
            }
            AverageSoilWater = TotalWater / TotalArea;
        }
    }
}
```
      RectangularZone TreeRow: Length=100; Width=5; Slope=0; AspectAngle=0; Altitude=50
        MicroClimate: a_interception=0.2; b_interception=1; c_interception=0; d_interception=0; soil_albedo=0.23; SoilHeatFluxFraction=0.4; NightInterceptionFraction=0.5; ReferenceHeight=2
        Report: EventNames=[Clock].DoReport
          VariableNames:
            [Clock].Today
            [Slurp].Root.NSupply
            [Soil].SoilWater.Eo
            [Soil].SoilWater.Es
            [Soil].SoilWater.Drainage
            [Soil].SoilWater.Runoff
            [Soil].SoilWater.pond
            sum([Soil].SoilWater.SWmm[1:5]) as SW90cm
            [Slurp].Leaf.Live.Wt
            [Slurp].Root.Live.Wt
            [Slurp].Leaf.Live.N
            [Slurp].Root.Live.N
            [Slurp].Leaf.Live.NConc
            [Slurp].Root.Live.NConc
            [Slurp].Root.WaterSupply
            [Slurp].Root.WaterUptake
            [Slurp].Leaf.Transpiration
            [Slurp].Leaf.WaterDemand
            [Slurp].Root.Depth
            [Slurp].Root.Zones[1].Depth
            [Slurp].Root.Zones[2].Depth
            [Slurp].Root.Zones[3].Depth
            [Slurp].Root.Zones[4].Depth
            [Slurp].Root.Zones[5].Depth
            [Slurp].Root.Zones[1].LayerLive[1].Wt
            [Slurp].Root.Zones[1].LayerLive[2].Wt
            [Slurp].Root.Zones[1].LayerLive[3].Wt
            [Slurp].Root.Zones[1].LayerLive[4].Wt
            [Slurp].Root.Zones[2].LayerLive[1].Wt
            [Slurp].Root.Zones[2].LayerLive[2].Wt
            [Slurp].Root.Zones[2].LayerLive[3].Wt
            [Slurp].Root.Zones[2].LayerLive[4].Wt
            [Slurp].Leaf.CoverTotal
            [Slurp].Leaf.CoverDead
            [Slurp].Leaf.LAI
            [Slurp].Leaf.Height
            [Slurp].Leaf.PotentialBiomass
            [Slurp].Leaf.FRGRFunction
            [Soil].SoilWater.SWmm
            sum([Soil].SoilWater.SWmm) as TotalSoilWater
            [Soil].SoilNitrogen.NO3.kgha
            [Slurp].Arbitrator.N.TotalPlantDemand
            [Slurp].Leaf.Fw
            [Slurp].Leaf.Fn
            [Weather].Rain
            [Calculations].Script.AverageSoilWater
            [SurfaceOrganicMatter].Cover
        Fertiliser
        Manager SlurpSowingRule
          CultivarName = StaticCrop
          InitialRootDepth = 1500
          SowingDate = 2004-03-22
          script: same as in MultiRootZone.Zone1.SlurpSowingRule
        SurfaceOrganicMatter: InitialResidueName=wheat_stubble; InitialResidueType=wheat; InitialResidueMass=500; InitialStandingFraction=0; InitialCPR=0; InitialCNR=100; FractionFaecesAdded=0.5
        Plant Slurp: CropType=Slurp; IsEnding=false; DaysAfterEnding=0
        Soil: ASCOrder=Vertosol; ASCSubOrder=Grey; SoilType=Clay; Site=Warra; NearestTown=Warra, Q, 4411; Region=Darling Downs and Granite Belt; State=Queensland; Country=Australia; NaturalVegetation=Brigalow scrub; ApsoilNumber=19; Latitude=-26.897; Longitude=150.909; LocationAccuracy=+/- 20m; DataSource=0; Comments=CSIRO Sustainable Ecosystems, Toowoomba
          Physical
            Thickness  BD    AirDry  LL15  DUL   SAT   KS
            50         1.39  0.06    0.18  0.4   0.45  20
            100        1.39  0.1     0.18  0.4   0.45  20
            150        1.35  0.17    0.18  0.41  0.46  20
            300        1.35  0.17    0.18  0.41  0.46  20
            300        1.43  0.17    0.18  0.38  0.43  20
            300        1.44  0.17    0.18  0.38  0.43  20
            300        1.45  0.17    0.18  0.37  0.42  20
            SoilCrop SlurpSoil: LL=[0.18, 0.18, 0.18, 0.18, 0.18, 0.18, 0.18]; KL=[0.06, 0.05, 0.05, 0.05, 0.05, 0.05, 0.05]; XF=[1, 1, 1, 1, 1, 1, 1]
            SoilCrop WheatSoil: LL=[0.18, 0.18, 0.19, 0.19, 0.2, 0.23, 0.25]; KL=[0.06, 0.06, 0.06, 0.06, 0.06, 0.06, 0.06]; XF=[1, 1, 1, 1, 1, 1, 1]
          SoilWater: SummerDate=1-Nov; SummerU=5; SummerCona=5; WinterDate=1-Apr; WinterU=5; WinterCona=5; DiffusConst=40; DiffusSlope=16; Salb=0.12; CN2Bare=73; CNRed=20; CNCov=0.8; max_pond=0; Thickness=[150, 150, 300, 300, 300, 300]; SWCON=[0.3, 0.3, 0.3, 0.3, 0.3, 0.3]; PrecipitationInterception=0
          SoilNitrogen: same as MultiRootZone.Zone1.Soil.SoilNitrogen
          Organic: FOMCNRatio=40
            Thickness  Carbon  SoilCNRatio  FBiom  FInert  FOM
            150        0.915   12           0.04   0.4     390.598
            150        0.777   12           0.02   0.6     289.362
            300        0.346   12           0.02   0.8     158.805
            300        0.231   12           0.02   1       87.1541
            300        0.154   12           0.01   1       47.8312
            300        0.123   12           0.01   1       26.2503
          Chemical
            Thickness  NO3N  NH4N  PH
            150        1     0.1   8
            150        1     0.1   8
            300        1     0.1   8
            300        1     0.1   8
            300        1     0.1   8
            300        1     0.1   8
          Sample InitialN: Thickness=[150, 150, 300, 300, 300, 300]; SWUnits=Volumetric; OCUnits=Total; PHUnits=Water
          Fertiliser
          Sample: Thickness=[50, 100, 150, 300, 300, 300, 300]; SW=[0.2, 0.3, 0.29, 0.28, 0.26, 0.26, 0.29]; SWUnits=Volumetric; OCUnits=Total; PHUnits=Water
          CERESSoilTemperature
        Manager SetupRootZones
```csharp
using System;
using Models.Core;
using System.Collections.Generic;
using System.Text;
using Models.PMF;
using Models;
using System.Xml.Serialization;
using APSIM.Shared.Utilities;

namespace Models
{
    [Serializable] 
    public class Script : Model
    {
        [Link] Plant Slurp;
        [Link] Clock Clock;
        [Link] Zone zone;
        
        [EventSubscribe("Commencing")]
        private void OnSimulationCommencing(object sender, EventArgs e)
        {
            
            Slurp.Root.ZoneNamesToGrowRootsIn.Add("5m");
            Slurp.Root.ZoneRootDepths.Add(1500);
            Slurp.Root.ZoneInitialDM.Add(1000);

            Slurp.Root.ZoneNamesToGrowRootsIn.Add("10m");
            Slurp.Root.ZoneRootDepths.Add(1500);
            Slurp.Root.ZoneInitialDM.Add(1000);

            Slurp.Root.ZoneNamesToGrowRootsIn.Add("15m");
            Slurp.Root.ZoneRootDepths.Add(1500);
            Slurp.Root.ZoneInitialDM.Add(1000);

            Slurp.Root.ZoneNamesToGrowRootsIn.Add("20m");
            Slurp.Root.ZoneRootDepths.Add(600);
            Slurp.Root.ZoneInitialDM.Add(1000);


            Slurp.Root.ZoneNamesToGrowRootsIn.Add("30m");
            Slurp.Root.ZoneRootDepths.Add(300);
            Slurp.Root.ZoneInitialDM.Add(1000);            
        }
    }
}
```
      RectangularZone 5m: Length=100; Width=5; Slope=0; AspectAngle=0; Altitude=50
        Report: EventNames=[Clock].DoReport
          VariableNames:
            [Clock].Today
            [Slurp].Root.NSupply
            [Soil].SoilWater.Eo
            [Soil].SoilWater.Es
            [Soil].SoilWater.Drainage
            [Soil].SoilWater.Runoff
            [Soil].SoilWater.pond
            sum([Soil].SoilWater.SWmm[1:5]) as SW90cm
            [Slurp].Leaf.Live.Wt
            [Slurp].Root.Live.Wt
            [Slurp].Leaf.Live.N
            [Slurp].Root.Live.N
            [Slurp].Leaf.Live.NConc
            [Slurp].Root.Live.NConc
            [Slurp].Root.WaterSupply
            [Slurp].Root.WaterUptake
            [Slurp].Leaf.Transpiration
            [Slurp].Leaf.WaterDemand
            [Slurp].Root.Depth
            [Slurp].Root.Zones[1].Depth
            [Slurp].Root.Zones[2].Depth
            [Slurp].Root.Zones[1].LayerLive[1].Wt
            [Slurp].Root.Zones[1].LayerLive[2].Wt
            [Slurp].Root.Zones[1].LayerLive[3].Wt
            [Slurp].Root.Zones[1].LayerLive[4].Wt
            [Slurp].Root.Zones[2].LayerLive[1].Wt
            [Slurp].Root.Zones[2].LayerLive[2].Wt
            [Slurp].Root.Zones[2].LayerLive[3].Wt
            [Slurp].Root.Zones[2].LayerLive[4].Wt
            [Slurp].Leaf.CoverTotal
            [Slurp].Leaf.CoverDead
            [Slurp].Leaf.LAI
            [Slurp].Leaf.Height
            [Slurp].Leaf.PotentialBiomass
            [Soil].SoilWater.SWmm
            sum([Soil].SoilWater.SWmm) as TotalSoilWater
            [Soil].SoilNitrogen.NO3.kgha
            [Slurp].Arbitrator.N.TotalPlantDemand
            [Slurp].Leaf.Fw
            [Slurp].Leaf.Fn
            [Weather].Rain
            [Wheat].AboveGround.Wt
            [Wheat].SWStress.Photo
            [Wheat].Root.RootDepth
        Fertiliser
        SurfaceOrganicMatter: InitialResidueName=wheat_stubble; InitialResidueType=wheat; InitialResidueMass=500; InitialStandingFraction=0; InitialCPR=0; InitialCNR=100; FractionFaecesAdded=0.5
        Soil: ASCOrder=Vertosol; ASCSubOrder=Grey; SoilType=Clay; Site=Warra; NearestTown=Warra, Q, 4411; Region=Darling Downs and Granite Belt; State=Queensland; Country=Australia; NaturalVegetation=Brigalow scrub; ApsoilNumber=19; Latitude=-26.897; Longitude=150.909; LocationAccuracy=+/- 20m; DataSource=0; Comments=CSIRO Sustainable Ecosystems, Toowoomba
          Physical
            Thickness  BD    AirDry  LL15  DUL   SAT   KS
            50         1.39  0.06    0.18  0.4   0.45  20
            100        1.39  0.1     0.18  0.4   0.45  20
            150        1.35  0.17    0.18  0.41  0.46  20
            300        1.35  0.17    0.18  0.41  0.46  20
            300        1.43  0.17    0.18  0.38  0.43  20
            300        1.44  0.17    0.18  0.38  0.43  20
            300        1.45  0.17    0.18  0.37  0.42  20
            SoilCrop SlurpSoil: LL=[0.18, 0.18, 0.18, 0.18, 0.18, 0.18, 0.18]; KL=[0.04, 0.04, 0.03, 0.02, 0.005, 0.005, 0.005]; XF=[1, 1, 1, 1, 1, 1, 1]
            SoilCrop WheatSoil: LL=[0.18, 0.18, 0.19, 0.19, 0.2, 0.23, 0.25]; KL=[0.06, 0.06, 0.06, 0.06, 0.06, 0.06, 0.06]; XF=[1, 1, 1, 1, 1, 1, 1]
          SoilWater: SummerDate=1-Nov; SummerU=6; SummerCona=3.5; WinterDate=1-Apr; WinterU=6; WinterCona=3.5; DiffusConst=40; DiffusSlope=16; Salb=0.12; CN2Bare=73; CNRed=20; CNCov=0.8; max_pond=0; Thickness=[150, 150, 300, 300, 300, 300]; SWCON=[0.3, 0.3, 0.3, 0.3, 0.3, 0.3]; PrecipitationInterception=0
          SoilNitrogen: same as MultiRootZone.Zone1.Soil.SoilNitrogen
          Organic: same as Agroforestry.Warra.TreeRow.Soil.Organic
          Chemical
            Thickness  NO3N  NH4N  PH
            150        1     0.1   8
            150        1     0.1   8
            300        1     0.1   8
            300        1     0.1   8
            300        1     0.1   8
            300        1     0.1   8
          Sample InitialN: Thickness=[150, 150, 300, 300, 300, 300]; SWUnits=Volumetric; OCUnits=Total; PHUnits=Water
          Fertiliser
          Sample: Thickness=[50, 100, 150, 300, 300, 300, 300]; SW=[0.2, 0.25, 0.3, 0.3, 0.31, 0.3, 0.3]; SWUnits=Volumetric; OCUnits=Total; PHUnits=Water
          CERESSoilTemperature
      RectangularZone 10m: Length=100; Width=5; Slope=0; AspectAngle=0; Altitude=50
        Report: same as Agroforestry.Warra.5m.Report
        Fertiliser
        SurfaceOrganicMatter: InitialResidueName=wheat_stubble; InitialResidueType=wheat; InitialResidueMass=500; InitialStandingFraction=0; InitialCPR=0; InitialCNR=100; FractionFaecesAdded=0.5
        Soil: ASCOrder=Vertosol; ASCSubOrder=Grey; SoilType=Clay; Site=Warra; NearestTown=Warra, Q, 4411; Region=Darling Downs and Granite Belt; State=Queensland; Country=Australia; NaturalVegetation=Brigalow scrub; ApsoilNumber=19; Latitude=-26.897; Longitude=150.909; LocationAccuracy=+/- 20m; DataSource=0; Comments=CSIRO Sustainable Ecosystems, Toowoomba
          Physical
            Thickness  BD    AirDry  LL15  DUL   SAT   KS
            50         1.39  0.06    0.18  0.4   0.45  20
            100        1.39  0.1     0.18  0.4   0.45  20
            150        1.35  0.17    0.18  0.41  0.46  20
            300        1.35  0.17    0.18  0.41  0.46  20
            300        1.43  0.17    0.18  0.38  0.43  20
            300        1.44  0.17    0.18  0.38  0.43  20
            300        1.45  0.17    0.18  0.37  0.42  20
            SoilCrop SlurpSoil: LL=[0.18, 0.18, 0.18, 0.18, 0.18, 0.18, 0.18]; KL=[0.03, 0.03, 0.02, 0.01, 0.01, 0.01, 0]; XF=[1, 1, 1, 1, 1, 1, 1]
            SoilCrop WheatSoil: LL=[0.18, 0.18, 0.19, 0.19, 0.2, 0.23, 0.25]; KL=[0.06, 0.06, 0.06, 0.06, 0.06, 0.06, 0.06]; XF=[1, 1, 1, 1, 1, 1, 1]
          SoilWater: same as Agroforestry.Warra.TreeRow.Soil.SoilWater
          SoilNitrogen: same as MultiRootZone.Zone1.Soil.SoilNitrogen
          Organic: same as Agroforestry.Warra.TreeRow.Soil.Organic
          Chemical
            Thickness  NO3N  NH4N  PH
            150        1     0.1   8
            150        1     0.1   8
            300        1     0.1   8
            300        1     0.1   8
            300        1     0.1   8
            300        1     0.1   8
          Sample InitialN: Thickness=[150, 150, 300, 300, 300, 300]; SWUnits=Volumetric; OCUnits=Total; PHUnits=Water
          Fertiliser
          Sample: Thickness=[50, 100, 150, 300, 300, 300, 300]; SW=[0.2, 0.3, 0.35, 0.33, 0.3, 0.26, 0.29]; SWUnits=Volumetric; OCUnits=Total; PHUnits=Water
          CERESSoilTemperature
      RectangularZone 15m: Length=100; Width=5; Slope=0; AspectAngle=0; Altitude=50
        Report: same as Agroforestry.Warra.5m.Report
        Fertiliser
        SurfaceOrganicMatter: InitialResidueName=wheat_stubble; InitialResidueType=wheat; InitialResidueMass=500; InitialStandingFraction=0; InitialCPR=0; InitialCNR=100; FractionFaecesAdded=0.5
        Soil: ASCOrder=Vertosol; ASCSubOrder=Grey; SoilType=Clay; Site=Warra; NearestTown=Warra, Q, 4411; Region=Darling Downs and Granite Belt; State=Queensland; Country=Australia; NaturalVegetation=Brigalow scrub; ApsoilNumber=19; Latitude=-26.897; Longitude=150.909; LocationAccuracy=+/- 20m; DataSource=0; Comments=CSIRO Sustainable Ecosystems, Toowoomba
          Physical: same as Agroforestry.Warra.10m.Soil.Physical
          SoilWater: same as Agroforestry.Warra.TreeRow.Soil.SoilWater
          SoilNitrogen: same as MultiRootZone.Zone1.Soil.SoilNitrogen
          Organic: same as Agroforestry.Warra.TreeRow.Soil.Organic
          Chemical
            Thickness  NO3N  NH4N  PH
            150        1     0.1   8
            150        1     0.1   8
            300        1     0.1   8
            300        1     0.1   8
            300        1     0.1   8
            300        1     0.1   8
          Sample InitialN: Thickness=[150, 150, 300, 300, 300, 300]; SWUnits=Volumetric; OCUnits=Total; PHUnits=Water
          Fertiliser
          Sample: Thickness=[50, 100, 150, 300, 300, 300, 300]; SW=[0.2, 0.32, 0.34, 0.35, 0.38, 0.34, 0.32]; SWUnits=Volumetric; OCUnits=Total; PHUnits=Water
          CERESSoilTemperature
      RectangularZone 20m: Length=100; Width=10; Slope=0; AspectAngle=0; Altitude=50
        Report: same as Agroforestry.Warra.5m.Report
        Fertiliser
        SurfaceOrganicMatter: InitialResidueName=wheat_stubble; InitialResidueType=wheat; InitialResidueMass=500; InitialStandingFraction=0; InitialCPR=0; InitialCNR=100; FractionFaecesAdded=0.5
        Soil: ASCOrder=Vertosol; ASCSubOrder=Grey; SoilType=Clay; Site=Warra; NearestTown=Warra, Q, 4411; Region=Darling Downs and Granite Belt; State=Queensland; Country=Australia; NaturalVegetation=Brigalow scrub; ApsoilNumber=19; Latitude=-26.897; Longitude=150.909; LocationAccuracy=+/- 20m; DataSource=0; Comments=CSIRO Sustainable Ecosystems, Toowoomba
          Physical
            Thickness  BD    AirDry  LL15  DUL   SAT   KS
            50         1.39  0.06    0.18  0.4   0.45  20
            100        1.39  0.1     0.18  0.4   0.45  20
            150        1.35  0.17    0.18  0.41  0.46  20
            300        1.35  0.17    0.18  0.41  0.46  20
            300        1.43  0.17    0.18  0.38  0.43  20
            300        1.44  0.17    0.18  0.38  0.43  20
            300        1.45  0.17    0.18  0.37  0.42  20
            SoilCrop SlurpSoil: LL=[0.18, 0.18, 0.18, 0.18, 0.18, 0.18, 0.18]; KL=[0.03, 0.02, 0.01, 0.01, 0.005, 0, 0]; XF=[1, 1, 1, 1, 1, 1, 1]
            SoilCrop WheatSoil: LL=[0.18, 0.18, 0.19, 0.19, 0.2, 0.23, 0.25]; KL=[0.06, 0.06, 0.06, 0.06, 0.06, 0.06, 0.06]; XF=[1, 1, 1, 1, 1, 1, 1]
          SoilWater: same as Agroforestry.Warra.TreeRow.Soil.SoilWater
          SoilNitrogen: same as MultiRootZone.Zone1.Soil.SoilNitrogen
          Organic: same as Agroforestry.Warra.TreeRow.Soil.Organic
          Chemical
            Thickness  NO3N  NH4N  PH
            150        1     0.1   8
            150        1     0.1   8
            300        1     0.1   8
            300        1     0.1   8
            300        1     0.1   8
            300        1     0.1   8
          Sample InitialN: Thickness=[150, 150, 300, 300, 300, 300]; SWUnits=Volumetric; OCUnits=Total; PHUnits=Water
          Fertiliser
          Sample: Thickness=[50, 100, 150, 300, 300, 300, 300]; SW=[0.32, 0.32, 0.39, 0.39, 0.38, 0.36, 0.35]; SWUnits=Volumetric; OCUnits=Total; PHUnits=Water
          CERESSoilTemperature
      RectangularZone 30m: Length=100; Width=5; Slope=0; AspectAngle=0; Altitude=50
        Report: same as Agroforestry.Warra.5m.Report
        Fertiliser
        SurfaceOrganicMatter: InitialResidueName=wheat_stubble; InitialResidueType=wheat; InitialResidueMass=500; InitialStandingFraction=0; InitialCPR=0; InitialCNR=100; FractionFaecesAdded=0.5
        Soil: ASCOrder=Vertosol; ASCSubOrder=Grey; SoilType=Clay; Site=Warra; NearestTown=Warra, Q, 4411; Region=Darling Downs and Granite Belt; State=Queensland; Country=Australia; NaturalVegetation=Brigalow scrub; ApsoilNumber=19; Latitude=-26.897; Longitude=150.909; LocationAccuracy=+/- 20m; DataSource=0; Comments=CSIRO Sustainable Ecosystems, Toowoomba
          Physical
            Thickness  BD    AirDry  LL15  DUL   SAT   KS
            50         1.39  0.06    0.18  0.4   0.45  20
            100        1.39  0.1     0.18  0.4   0.45  20
            150        1.35  0.17    0.18  0.41  0.46  20
            300        1.35  0.17    0.18  0.41  0.46  20
            300        1.43  0.17    0.18  0.38  0.43  20
            300        1.44  0.17    0.18  0.38  0.43  20
            300        1.45  0.17    0.18  0.37  0.42  20
            SoilCrop SlurpSoil: LL=[0.18, 0.18, 0.18, 0.18, 0.18, 0.18, 0.18]; KL=[0.03, 0.02, 0.005, 0, 0, 0, 0]; XF=[1, 1, 1, 1, 1, 1, 1]
            SoilCrop WheatSoil: LL=[0.18, 0.18, 0.19, 0.19, 0.2, 0.23, 0.25]; KL=[0.06, 0.06, 0.06, 0.06, 0.06, 0.06, 0.06]; XF=[1, 1, 1, 1, 1, 1, 1]
          SoilWater: same as Agroforestry.Warra.TreeRow.Soil.SoilWater
          SoilNitrogen: same as MultiRootZone.Zone1.Soil.SoilNitrogen
          Organic: same as Agroforestry.Warra.TreeRow.Soil.Organic
          Chemical
            Thickness  NO3N  NH4N  PH
            150        1     0.1   8
            150        1     0.1   8
            300        1     0.1   8
            300        1     0.1   8
            300        1     0.1   8
            300        1     0.1   8
          Sample InitialN: Thickness=[150, 150, 300, 300, 300, 300]; SWUnits=Volumetric; OCUnits=Total; PHUnits=Water
          Fertiliser
          Sample: Thickness=[50, 100, 150, 300, 300, 300, 300]; SW=[0.32, 0.32, 0.38, 0.38, 0.38, 0.36, 0.35]; SWUnits=Volumetric; OCUnits=Total; PHUnits=Water
          CERESSoilTemperature
        Plant Wheat: CropType=Wheat; IsEnding=false; DaysAfterEnding=0
      RectangularZone 40m: Length=100; Width=10; Slope=0; AspectAngle=0; Altitude=50
        Report: same as Agroforestry.Warra.5m.Report
        Fertiliser
        SurfaceOrganicMatter: InitialResidueName=wheat_stubble; InitialResidueType=wheat; InitialResidueMass=500; InitialStandingFraction=0; InitialCPR=0; InitialCNR=100; FractionFaecesAdded=0.5
        Soil: ASCOrder=Vertosol; ASCSubOrder=Grey; SoilType=Clay; Site=Warra; NearestTown=Warra, Q, 4411; Region=Darling Downs and Granite Belt; State=Queensland; Country=Australia; NaturalVegetation=Brigalow scrub; ApsoilNumber=19; Latitude=-26.897; Longitude=150.909; LocationAccuracy=+/- 20m; DataSource=0; Comments=CSIRO Sustainable Ecosystems, Toowoomba
          Physical
            Thickness  BD    AirDry  LL15  DUL   SAT   KS
            50         1.39  0.06    0.18  0.4   0.45  20
            100        1.39  0.1     0.18  0.4   0.45  20
            150        1.35  0.17    0.18  0.41  0.46  20
            300        1.35  0.17    0.18  0.41  0.46  20
            300        1.43  0.17    0.18  0.38  0.43  20
            300        1.44  0.17    0.18  0.38  0.43  20
            300        1.45  0.17    0.18  0.37  0.42  20
            SoilCrop SlurpSoil: LL=[0.18, 0.18, 0.18, 0.18, 0.18, 0.18, 0.18]; KL=[0.06, 0.06, 0.06, 0.06, 0.06, 0.06, 0.06]; XF=[1, 1, 1, 1, 1, 1, 1]
            SoilCrop WheatSoil: LL=[0.18, 0.18, 0.19, 0.19, 0.2, 0.23, 0.25]; KL=[0.06, 0.06, 0.06, 0.06, 0.06, 0.06, 0.06]; XF=[1, 1, 1, 1, 1, 1, 1]
          SoilWater: same as Agroforestry.Warra.TreeRow.Soil.SoilWater
          SoilNitrogen: same as MultiRootZone.Zone1.Soil.SoilNitrogen
          Organic: same as Agroforestry.Warra.TreeRow.Soil.Organic
          Chemical
            Thickness  NO3N  NH4N  PH
            150        1     0.1   8
            150        1     0.1   8
            300        1     0.1   8
            300        1     0.1   8
            300        1     0.1   8
            300        1     0.1   8
          Sample InitialN: Thickness=[150, 150, 300, 300, 300, 300]; SWUnits=Volumetric; OCUnits=Total; PHUnits=Water
          Fertiliser
          Sample: Thickness=[50, 100, 150, 300, 300, 300, 300]; SW=[0.32, 0.32, 0.34, 0.35, 0.38, 0.34, 0.32]; SWUnits=Volumetric; OCUnits=Total; PHUnits=Water
          CERESSoilTemperature
        Plant Wheat: CropType=Wheat; IsEnding=false; DaysAfterEnding=0
      RectangularZone 50m: Length=100; Width=5; Slope=0; AspectAngle=0; Altitude=50
        Report: same as Agroforestry.Warra.5m.Report
        Fertiliser
        SurfaceOrganicMatter: InitialResidueName=wheat_stubble; InitialResidueType=wheat; InitialResidueMass=500; InitialStandingFraction=0; InitialCPR=0; InitialCNR=100; FractionFaecesAdded=0.5
        Soil: same as Agroforestry.Warra.40m.Soil
        Plant Wheat: CropType=Wheat; IsEnding=false; DaysAfterEnding=0
      MicroClimate: a_interception=0; b_interception=1; c_interception=0; d_interception=0; soil_albedo=0.23; SoilHeatFluxFraction=0.4; NightInterceptionFraction=0.5; ReferenceHeight=2
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