Simulations: Version=46
  Replacements
    Nutrient
      DirectedGraphInfo={Nodes=[{Name=Inert}, {Name=SurfaceResidue}, {Name=Biomass}, {Name=Humic}, {Name=FOMLignin}, {Name=FOMCellulose}, {Name=FOMCarbohydrate}, {Name=Urea}, {Name=NO3}, {Name=NH4}, {Name=Biochar}, {Name=Atmosphere}], Arcs=[{SourceName=SurfaceResidue, DestinationName=Biomass}, {SourceName=SurfaceResidue, DestinationName=Humic}, {SourceName=Biomass, DestinationName=Biomass}, {SourceName=Biomass, DestinationName=Humic}, {SourceName=Humic, DestinationName=Biomass}, {SourceName=FOMLignin, DestinationName=Biomass}, {SourceName=FOMLignin, DestinationName=Humic}, {SourceName=FOMCellulose, DestinationName=Biomass}, {SourceName=FOMCellulose, DestinationName=Humic}, {SourceName=FOMCarbohydrate, DestinationName=Biomass}, {SourceName=FOMCarbohydrate, DestinationName=Humic}, {SourceName=Urea, DestinationName=NH4}, {SourceName=NH4, DestinationName=NO3}, {SourceName=NO3, DestinationName=Atmosphere}]}
      Memo TitlePage
        # The APSIM Soil Nutrient Model

        The APSIM soil nutrient model has been developed to simulate soil organic matter pools and the flows and losses of soil nutrients.  This model captures the functionality previously provided in the APSIM SoilN model ([probert_apsims_1998]).

        The model consists of:

        * a series of pools to capture soil organic matter types
        * pools for mineral N including nitrate, ammonium and urea.
      NutrientPool Inert
        Memo
          The inert pool captures organic matter that either does not decompose, or decomposes at a rate slow enough to be of little importance to simulations.  Such as approach was also captured in the APSIM SoilN model ([probert_apsims_1998]).
        ExpressionFunction InitialCarbon
          Expression=[SoilOrganicMatter].FInert*[SoilOrganicMatter].OC * 100 * [Soil].BD * [Soil].Thickness
        ExpressionFunction InitialNitrogen: Expression=[Inert].C / [Soil].SoilOrganicMatter.SoilCN
      NutrientPool SurfaceResidue
        Constant InitialCarbon: FixedValue=0
        Constant InitialNitrogen: FixedValue=0
        CarbonFlow Decomposition: destinationNames=[Biomass, Humic]; destinationFraction=[0.9, 0.1]
          Constant Rate: FixedValue=1
          Constant CO2Efficiency: FixedValue=0.4
      Solute Urea
        NFlow Hydrolysis: sourceName=Urea; destinationName=NH4
          Constant NLoss: FixedValue=0
          MultiplyFunction Rate
            BoundFunction PotentialRate
              Constant Upper: FixedValue=1
              Constant Lower: FixedValue=0.25
              ExpressionFunction Rate
                Expression=-1.12 + 1.31 * [Soil].OC + 0.203 * [Soil].PH - 0.155 * [Soil].OC * [Soil].PH
            MinimumFunction PNI
              BoundFunction WF
                Constant Upper: FixedValue=1
                Constant Lower: FixedValue=0
                ExpressionFunction Wfactor: Expression=[WaterFactorForMineralisation]+0.2
              BoundFunction TF
                Constant Upper: FixedValue=1
                Constant Lower: FixedValue=0
                ExpressionFunction Tfactor: Expression=([Soil].Temperature/40)+0.2
      Solute NO3
        NFlow Denitrification: sourceName=NO3
          Memo
            References:

            Rolston DE, Rao PSC, Davidson JM, Jessup RE (1984). "Simulation of denitrification losses of Nitrate fertiliser applied to uncropped, cropped, and manure-amended field plots". Soil Science Vol 137, No 4, pp 270-278.

            Reference for Carbon availability factor: Reddy KR, Khaleel R, Overcash MR (). "Carbon transformations in land areas receiving organic wastes in relation to nonpoint source pollution: A conceptual model".  J.Environ. Qual. 9:434-442.
          Constant NLoss: FixedValue=1
          MultiplyFunction Rate
            Constant: FixedValue=0.0006
            ExpressionFunction ActiveC: Expression=0.0031 * [TotalCppm] + 24.5
              ExpressionFunction TotalCppm
                Expression=([Humic].C+[Inert].C+[FOMCarbohydrate].C+[FOMCellulose].C+[FOMLignin].C)/[ppm2kgha]
            BoundFunction TF
              Constant Upper: FixedValue=1
              Constant Lower: FixedValue=0
              ExpressionFunction Tfactor: Expression=0.1 * Exp(0.046 * [Soil].Temperature)
            LinearInterpolationFunction WF: XProperty=[SoilWaterScale]
              SoilWaterScale
              XYPairs: X=[0, 1, 2]; Y=[0, 0, 1]
      NutrientPool Biomass
        ExpressionFunction InitialCarbon
          Expression=(([SoilOrganicMatter].OC * 100 * [Soil].BD * [Soil].Thickness -[Inert].C) * [SoilOrganicMatter].FBiom) / (1 + [SoilOrganicMatter].FBiom)
        ExpressionFunction InitialNitrogen: Expression=[Biomass].C /  [CNRatio]
        Constant CNRatio: FixedValue=8
        CarbonFlow Decomposition: destinationNames=[Biomass, Humic]; destinationFraction=[0.6, 0.4]
          MultiplyFunction Rate
            Constant PotentialRate: FixedValue=0.0081
            VariableReference TF: VariableName=[TemperatureFactorForMineralisation]
            VariableReference WF: VariableName=[WaterFactorForMineralisation]
          Constant CO2Efficiency: FixedValue=0.4
      NutrientPool Humic
        ExpressionFunction InitialCarbon
          Expression=(1-[SoilOrganicMatter].FInert)*[SoilOrganicMatter].OC * 100 * [Soil].BD * [Soil].Thickness - [Biomass].C
        ExpressionFunction InitialNitrogen: Expression=[Humic].C / [Soil].SoilOrganicMatter.SoilCN
        CarbonFlow Decomposition: destinationNames=[Biomass]; destinationFraction=[1]
          MultiplyFunction Rate
            Constant PotentialRate: FixedValue=0.00015
            VariableReference TF: VariableName=[TemperatureFactorForMineralisation]
            VariableReference WF: VariableName=[WaterFactorForMineralisation]
          Constant CO2Efficiency: FixedValue=0.4
      NutrientPool FOMLignin
        Constant InitialCarbon: FixedValue=0
        Constant InitialNitrogen: FixedValue=0
        CarbonFlow Decomposition: destinationNames=[Biomass, Humic]; destinationFraction=[0.9, 0.1]
          MultiplyFunction Rate
            Constant PotentialRate: FixedValue=0.0095
            VariableReference TF: VariableName=[TemperatureFactorForMineralisation]
            VariableReference WF: VariableName=[WaterFactorForMineralisation]
            VariableReference CNRF: VariableName=[CNRatioFactorForMineralisation]
          Constant CO2Efficiency: FixedValue=0.4
      NutrientPool FOMCellulose
        Constant InitialCarbon: FixedValue=0
        Constant InitialNitrogen: FixedValue=0
        CarbonFlow Decomposition: destinationNames=[Biomass, Humic]; destinationFraction=[0.9, 0.1]
          MultiplyFunction Rate
            Constant PotentialRate: FixedValue=0.05
            VariableReference TF: VariableName=[TemperatureFactorForMineralisation]
            VariableReference WF: VariableName=[WaterFactorForMineralisation]
            VariableReference CNRF: VariableName=[CNRatioFactorForMineralisation]
          Constant CO2Efficiency: FixedValue=0.4
      NutrientPool FOMCarbohydrate
        Constant InitialCarbon: FixedValue=0
        Constant InitialNitrogen: FixedValue=0
        CarbonFlow Decomposition: destinationNames=[Biomass, Humic]; destinationFraction=[0.9, 0.1]
          MultiplyFunction Rate
            Constant PotentialRate: FixedValue=0.2
            VariableReference TF: VariableName=[TemperatureFactorForMineralisation]
            VariableReference WF: VariableName=[WaterFactorForMineralisation]
            VariableReference CNRF: VariableName=[CNRatioFactorForMineralisation]
          Constant CO2Efficiency: FixedValue=0.4
      Solute NH4
        NFlow Nitrification: sourceName=NH4; destinationName=NO3
          Constant NLoss: FixedValue=0
          MultiplyFunction Rate
            ExpressionFunction MichaelisMenton: Expression=40/([Soil].Nutrient.NH4.ppm+90)
            MinimumFunction PNI
              LinearInterpolationFunction WF: XProperty=[SoilWaterScale]
                SoilWaterScale
                XYPairs: X=[0, 0.25, 1, 2]; Y=[0, 1, 1, 0]
              VariableReference TF: VariableName=[TemperatureFactorForMineralisation]
              LinearInterpolationFunction pHF: XProperty=[Soil].PH
                XYPairs: X=[4.5, 6, 8, 9]; Y=[0, 1, 1, 0]
      NutrientPool Biochar
        Constant InitialCarbon: FixedValue=0
        Constant InitialNitrogen: FixedValue=0
      MinimumFunction TemperatureFactorForMineralisation
        ExpressionFunction TF: Expression=([AbsT]^2)/([Topt]^2)
          Constant Topt: FixedValue=32
          MaximumFunction AbsT
            Constant Zero: FixedValue=0
            VariableReference: VariableName=[Soil].Temperature
        Constant One: FixedValue=1
      MinimumFunction WaterFactorForMineralisation
        Constant One: FixedValue=1
        LinearInterpolationFunction WF: XProperty=[SoilWaterScale]
          SoilWaterScale
          XYPairs: X=[0, 0.5, 1, 2]; Y=[0, 1, 1, 0.5]
      MinimumFunction CNRatioFactorForMineralisation
        Constant One: FixedValue=1
        ExpressionFunction CNRF: Expression=Exp(-0.693*([Nutrient].FOMCNR-25)/25)
      ExpressionFunction ppm2kgha: Expression=([Soil].BD*[Soil].Thickness)/100
      ExpressionFunction FOMCx: Expression=[FOMLignin].C+[FOMCellulose].C+[FOMCarbohydrate].C
      ExpressionFunction FOMNx: Expression=[FOMLignin].N+[FOMCellulose].N+[FOMCarbohydrate].N
    Plant TropicalPasture: CropType=TropicalPasture
      AccumulateFunction Age: StartStageName=Germination; EndStageName=Old; FractionRemovedOnCut=0; FractionRemovedOnHarvest=0; FractionRemovedOnGraze=0; FractionRemovedOnPrune=0
        Constant day: FixedValue=0.00273973
      PhotoperiodFunction Photoperiod: Twilight=0; DayLength=0
      PhotoperiodDeltaFunction PhotoperiodDelta: Twilight=0
      Phenology
        Constant ThermalTime: FixedValue=1
        GerminatingPhase Germinating: Start=Sowing; End=Germination
        EmergingPhase Emerging: ShootLag=7; ShootRate=0; Start=Germination; End=StartVegetative; TTForTimeStep=0
          VariableReference ThermalTime: VariableName=[Phenology].ThermalTime.Value
        PhotoperiodPhase VegetativePhase: CricialPhotoperiod=13; PPDirection=Increasing; Start=StartVegetative; End=StartReproductive
        PhotoperiodPhase ReproductivePhase: CricialPhotoperiod=11; PPDirection=Decreasing; Start=StartReproductive; End=EndReproductive
        GotoPhase: Start=EndReproductive; End=Old; PhaseNameToGoto=VegetativePhase
      OrganArbitrator Arbitrator
        RelativeAllocation NArbitrator
        RelativeAllocation DMArbitrator
      CompositeBiomass AboveGround: DMDOfStructural=0.6
        Propertys=[[Leaf].Live, [Leaf].Dead, [Stem].Live, [Stem].Dead, [Crown].Live, [Crown].Dead]
      CompositeBiomass AboveGroundLive: DMDOfStructural=0.6; Propertys=[[Leaf].Live, [Stem].Live, [Crown].Live]
      CompositeBiomass AboveGroundDead: DMDOfStructural=0.6; Propertys=[[Leaf].Dead, [Stem].Dead, [Crown].Dead]
      CompositeBiomass BelowGround: DMDOfStructural=0.6; Propertys=[[Root].Live, [Root].Dead]
      CompositeBiomass Total: DMDOfStructural=0.6
        Propertys=[[Leaf].Live, [Leaf].Dead, [Stem].Live, [Stem].Dead, [Root].Live, [Root].Dead, [Crown].Live, [Crown].Dead]
      CompositeBiomass TotalLive: DMDOfStructural=0.6; Propertys=[[Leaf].Live, [Stem].Live, [Root].Live, [Crown].Live]
      CompositeBiomass TotalDead: DMDOfStructural=0.6; Propertys=[[Leaf].Dead, [Stem].Dead, [Root].Dead, [Crown].Dead]
      PerennialLeaf Leaf: CohortsInitialised=false; Albedo=0.26; Gsmax=0.0075; R50=200; MicroClimatePresent=true
        zero: MaintenanceRespiration, GrowthRespiration, ApicalCohortNo, TipsAtEmergence, CohortsAtInitialisation, AppearedCohortNo, PlantAppearedLeafNo, InitialisedCohortNo, Height, FRGR, PotentialEP
        MultiplyFunction InitialWtFunction
          Constant InitialPlantWt: FixedValue=0.01; Units=g/plant
          VariableReference Population: VariableName=[Plant].Population
        MinimumFunction FRGRFunction
          VariableReference: VariableName=[Leaf].Photosynthesis.FT.Value()
        Constant ExtinctionCoefficient: FixedValue=0.65
          Memo
            Value of 0.57 from
            Radiation Interception and Growth of Planted and Coppice Stands of Four Fast-GrowingTropical Trees
            Author(s): Robin A. Harrington and James H. Fownes
            Source: Journal of Applied Ecology, Vol. 32, No. 1 (Feb., 1995), pp. 1-8

            But their data suggests a value of 0.3

            For the Brazilian Brachiaria data (Piata cultivar), the extinction coefficient was 0.65.
        LinearInterpolationFunction HeightFunction: XProperty=[AboveGround].Wt
          XYPairs: X=[0, 100, 1000]; Y=[100, 300, 1200]
        Constant MaximumNConc: FixedValue=0.021
          Memo
            0.043 gN/g from R.B. Thomas 1, D.D. Richter 2, H. Ye 2, P.R. Heine z, and B.R. Strain 1 Nitrogen dynamics and growth of seedlings of an N-fixing tree
            (GKricidia sepium (Jacq.) Walp.) exposed to elevated atmospheric carbon dioxide Oecologia (1991) 88:415-421
        Constant MinimumNConc: FixedValue=0.005
        Constant NReallocationFactor: FixedValue=0.5
          Memo
            N reallocation is working and recycling some of the non-structural N during senescence.
        BiomassRemoval BiomassRemovalDefaults
          OrganBiomassRemovalType Harvest: FractionLiveToRemove=0; FractionDeadToRemove=0; FractionLiveToResidue=0; FractionDeadToResidue=0
          OrganBiomassRemovalType Cut: FractionLiveToRemove=0; FractionDeadToRemove=0; FractionLiveToResidue=0; FractionDeadToResidue=0
          OrganBiomassRemovalType Prune: FractionLiveToRemove=0; FractionDeadToRemove=0; FractionLiveToResidue=0; FractionDeadToResidue=0
          OrganBiomassRemovalType Graze: FractionLiveToRemove=0; FractionDeadToRemove=0; FractionLiveToResidue=0; FractionDeadToResidue=0
        Constant DMConversionEfficiency: FixedValue=1
        MultiplyFunction LeafResidenceTime
          Constant Potential: FixedValue=80; Units=days
          LinearInterpolationFunction LAIfactor: XProperty=[Leaf].LAI
            XYPairs: X=[0, 5, 6, 7]; Y=[1, 1, 0.8, 0.5]
          LinearInterpolationFunction FloweringFactor: XProperty=[TropicalPasture].Age
            XYPairs: X=[0, 0.77, 1.1, 1.11, 1.27, 1.28, 5]; Y=[1, 1, 1, 0.7, 0.7, 1, 1]
          Memo
            The flowering factor is determined by daylength, but there is not a tool for this control in Apsim, so were used the plant ages correspondent to each daylength value.
        Constant LeafDetachmentTime: FixedValue=30
        Constant DMRetranslocationFactor: FixedValue=0
        Constant NRetranslocationFactor: FixedValue=0
        RUEModel Photosynthesis
          Constant RUE: FixedValue=1.44
          WeightedTemperatureFunction FT: MaximumTemperatureWeighting=0.5
            XYPairs: X=[8.9, 30.2, 40, 45]; Y=[0, 1, 1, 0]
          LinearInterpolationFunction FVPD: XProperty=[Leaf].Photosynthesis.VPD
            XYPairs: X=[0, 10, 50]; Y=[1, 1, 1]
          LinearInterpolationFunction FN: XProperty=[Leaf].Fn
            XYPairs: X=[0, 1, 1.5]; Y=[0, 1, 1]
          LinearInterpolationFunction FW: XProperty=[Leaf].Fw
            XYPairs: X=[0, 1, 1.5]; Y=[0, 1, 1]
          RUECO2Function FCO2: PhotosyntheticPathway=C4
          Memo
            Ayaz eta 2004 presented a RUE of 1.6 g/MJ PAR during non-limiting temperature conditions for field pea.  Halving this to make it total radiation gives 0.8 g/MJ and adding 20% to account for root and  nodule production and N fixiation costs gives 1.0 g/MJ.

            Bosi 2017 found a RUE of 2.31 g/MJ PAR for Brachiaria brizantha cv. BRS Piata (C4 grass) in irrigated experiment, applying a correction factor for limiting temperature and not considering data in flowering period (it changes the partitioning). Converting this to total radiation was obtained 1.16 g/MJ and adding 20% to account for root production gives 1.44 g/MJ.
          VariableReference RadnInt: VariableName=[Leaf].RadIntTot
        LinearInterpolationFunction LeafKillFraction: XProperty=[Weather].MinT
          XYPairs: X=[0, 2]; Y=[1, 0]
        Constant MinimumLAI: FixedValue=0.1; Units=m2/m2
        Constant ExtinctionCoefficientDead: FixedValue=0.57
          Memo
            Value of 0.57 from
            Radiation Interception and Growth of Planted and Coppice Stands of Four Fast-GrowingTropical Trees
            Author(s): Robin A. Harrington and James H. Fownes
            Source: Journal of Applied Ecology, Vol. 32, No. 1 (Feb., 1995), pp. 1-8

            But their data suggests a value of 0.3
        MultiplyFunction SpecificLeafAreaFunction
          LinearInterpolationFunction SLAmax: XProperty=[TropicalPasture].Age
            XYPairs: X=[0, 0.3, 0.7, 2]; Y=[0.015, 0.018, 0.02, 0.02]
          LinearInterpolationFunction WaterFactor: XProperty=[Leaf].Fw
            XYPairs: X=[0, 0.8, 1]; Y=[0, 0.4, 1]
          LinearInterpolationFunction Radiationfactor: XProperty=[Weather].Radn
            XYPairs: X=[0, 15, 30]; Y=[1.4, 1, 1]
          Memo
            The water deficit is decreasing SLA and the shading is increasing SLA, but is necessary improve the SLA simulation by solar radiation.
        Constant CarbonConcentration: FixedValue=0.4
        Constant LeafDevelopmentRate: FixedValue=1
        BiomassDemand DMDemands
          MultiplyFunction Structural
            PartitionFractionDemandFunction DMDemandFunction
              Memo
                The flowering factor is determined by daylength, but there is not a tool for this control in Apsim, so were used the plant ages correspondent to each daylength value.
              LinearInterpolationFunction PartitionFraction: XProperty=[TropicalPasture].Age
                XYPairs: X=[0, 0.2, 0.3, 0.4, 0.71, 0.72, 1.21, 1.22, 5]; Y=[0.5, 0.5, 0.55, 0.55, 0.55, 0.55, 0.55, 0.55, 0.55]
          Constant Metabolic: FixedValue=0
          Constant Storage: FixedValue=0
        BiomassDemand NDemands
          MultiplyFunction Structural
            VariableReference MinNconc: VariableName=[Leaf].minimumNconc.Value()
            VariableReference PotentialDMAllocation: VariableName=[Leaf].potentialDMAllocation.Structural
          Constant Metabolic: FixedValue=0
          StorageNDemandFunction Storage
            VariableReference MaxNconc: VariableName=[Leaf].MaximumNconc.Value()
            Constant NitrogenDemandSwitch: FixedValue=1
      Root: GrowthRespiration=0; MaintenanceRespiration=0
        Constant RootFrontVelocity: FixedValue=20
        Constant SenescenceRate: FixedValue=0.001
        Constant MaximumNConc: FixedValue=0.003
        Constant MaxDailyNUptake: FixedValue=6
        Constant MinimumNConc: FixedValue=0.001
        Constant MaximumRootDepth: FixedValue=1000000
        LinearInterpolationFunction KLModifier: XProperty=[Leaf].LAI
          XYPairs: X=[0, 3, 10]; Y=[1, 1, 1]
        LinearInterpolationFunction KNO3: XProperty=[Root].LengthDensity
          XYPairs: X=[0, 0.003]; Y=[0.03, 0.03]
        LinearInterpolationFunction KNH4: XProperty=[Root].LengthDensity
          XYPairs: X=[0, 0.003]; Y=[0, 0]
        LinearInterpolationFunction NUptakeSWFactor: XProperty=[Root].RWC
          XYPairs: X=[0, 0.5, 1]; Y=[1, 1, 1]
        Constant InitialDM: FixedValue=0.02; Units=g/plant
        Constant SpecificRootLength: FixedValue=100; Units=m/g
        BiomassRemoval BiomassRemovalDefaults
          OrganBiomassRemovalType Harvest: FractionLiveToRemove=0; FractionDeadToRemove=0; FractionLiveToResidue=0; FractionDeadToResidue=0
          OrganBiomassRemovalType Cut: FractionLiveToRemove=0; FractionDeadToRemove=0; FractionLiveToResidue=0; FractionDeadToResidue=0
          OrganBiomassRemovalType Prune: FractionLiveToRemove=0; FractionDeadToRemove=0; FractionLiveToResidue=0; FractionDeadToResidue=0
          OrganBiomassRemovalType Graze: FractionLiveToRemove=0; FractionDeadToRemove=0; FractionLiveToResidue=0; FractionDeadToResidue=0
          OrganBiomassRemovalType Thin: FractionLiveToRemove=0; FractionDeadToRemove=0; FractionLiveToResidue=0; FractionDeadToResidue=0
        Constant NitrogenDemandSwitch: FixedValue=1
        MultiplyFunction DMRetranslocationFactor
          Constant PotentialDMRetranslocationFactor: FixedValue=0
          LinearInterpolationFunction FloweringFactor: XProperty=[TropicalPasture].Age
            XYPairs
              X=[0, 0.71, 0.72, 1.21, 1.22, 1.82, 1.83, 2.32, 2.33, 2.82, 2.83, 3.32, 3.33, 5]
              Y=[0, 0, 0, 0, 0, 0, 0, 0, 0, 0, 0, 0, 0, 0]
          LinearInterpolationFunction LAIfactor: XProperty=[Leaf].LAI
            XYPairs: X=[0, 0.76, 0.77, 1.2, 1.21, 2]; Y=[0, 0, 0, 0, 0, 0]
          Memo
            The flowering factor is determined by daylength, but there is not a tool for this control in Apsim, so were used the plant ages correspondent to each daylength value.

            DM retranslocation is not working currently, so it is necessary build that in Apsim.
        MultiplyFunction NRetranslocationFactor
          Constant PotentialNRetranslocationFactor: FixedValue=0
          LinearInterpolationFunction FnFactor: XProperty=[Leaf].Fn
            XYPairs: X=[0, 0.45, 1, 1.5]; Y=[1, 0, 0, 0]
          LinearInterpolationFunction LAIfactor: XProperty=[Leaf].LAI
            XYPairs: X=[0, 1, 7]; Y=[1, 1, 1]
          Memo
            N retranslocation is working, but studies about N concentration are necessary to improve these simulations.
        Constant DMConversionEfficiency: FixedValue=1
        Constant MaintenanceRespirationFunction: FixedValue=1
        Constant RemobilisationCost: FixedValue=0
        Constant CarbonConcentration: FixedValue=0.4
        BiomassDemand DMDemands
          MultiplyFunction Structural
            PartitionFractionDemandFunction DMDemandFunction
              LinearInterpolationFunction PartitionFraction: XProperty=[TropicalPasture].Age
                XYPairs: X=[0, 0.2, 0.3, 0.4, 0.71, 0.72, 1.21, 1.22, 5]; Y=[0.33, 0.33, 0.25, 0.25, 0.2, 0, 0, 0.2, 0.2]
                Memo
                  The flowering factor is determined by daylength, but there is not a tool for this control in Apsim, so were used the plant ages correspondent to each daylength value.
            Constant StructuralFraction: FixedValue=0.8; Units=g/g
          Constant Metabolic: FixedValue=0
          StorageDMDemandFunction Storage
            SubtractFunction StorageFraction
              Constant One: FixedValue=1
              VariableReference StructuralFraction: VariableName=[Root].DMDemands.Structural.StructuralFraction.Value()
        BiomassDemand NDemands
          MultiplyFunction Structural
            VariableReference MinNconc: VariableName=[Root].minimumNconc.Value()
            VariableReference PotentialDMAllocation: VariableName=[Root].potentialDMAllocation.Structural
          MultiplyFunction Metabolic
            SubtractFunction MetabolicNconc
              VariableReference CritNconc: VariableName=[Root].criticalNConc.Value()
              VariableReference MinNconc: VariableName=[Root].minimumNconc.Value()
            VariableReference PotentialDMAllocation: VariableName=[Root].potentialDMAllocation.Structural
          StorageNDemandFunction Storage
            VariableReference NitrogenDemandSwitch: VariableName=[Root].nitrogenDemandSwitch.Value()
            VariableReference MaxNconc: VariableName=[Root].maximumNconc.Value()
      GenericOrgan Stem
        Constant NReallocationFactor: FixedValue=0
          Memo
            N reallocation is working and recycling some of the non-structural N during senescence.
        Constant NRetranslocationFactor: FixedValue=0
        Constant DMRetranslocationFactor: FixedValue=0
        Constant MaximumNConc: FixedValue=0.003
        Constant MinimumNConc: FixedValue=0.001
        Constant InitialWtFunction: FixedValue=0; Units=g/m^2
        Constant DetachmentRateFunction: FixedValue=0.01; Units=/d
        BiomassRemoval BiomassRemovalDefaults: same as Replacements.TropicalPasture.Root.BiomassRemovalDefaults
        Constant MaintenanceRespirationFunction: FixedValue=0; Units=0-1
        Constant DMConversionEfficiency: FixedValue=1; Units=0-1
        Constant NitrogenDemandSwitch: FixedValue=1
        LinearInterpolationFunction SenescenceRate: XProperty=[TropicalPasture].Age
          XYPairs
            X=[0, 0.77, 1.1, 1.11, 1.27, 1.28, 2.21, 2.22, 2.38, 2.39, 3.21, 3.22, 3.38, 3.39, 5]
            Y=[0.005, 0.005, 0.005, 0.015, 0.015, 0.005, 0.005, 0.005, 0.005, 0.005, 0.005, 0.005, 0.005, 0.005, 0.005]
          Memo
            The flowering factor is determined by daylength, but there is not a tool for this control in Apsim, so were used the plant ages correspondent to each daylength value.
        Constant DMReallocationFactor: FixedValue=0
        VariableReference CriticalNConc: VariableName=[Stem].MinimumNConc.Value()
        Constant RemobilisationCost: FixedValue=0
        Constant CarbonConcentration: FixedValue=0.4
        BiomassDemand DMDemands
          MultiplyFunction Structural
            PartitionFractionDemandFunction DMDemandFunction
              MultiplyFunction PartitionFraction
                LinearInterpolationFunction PartitionFraction: XProperty=[TropicalPasture].Age
                  XYPairs
                    X=[0, 0.2, 0.3, 0.4, 0.71, 0.72, 0.98, 0.99, 1.21, 1.22, 5]
                    Y=[0.09, 0.09, 0.1, 0.1, 0.15, 0.25, 0.25, 0.35, 0.35, 0.15, 0.15]
              Memo
                The flowering factor is determined by daylength, but there is not a tool for this control in Apsim, so were used the plant ages correspondent to each daylength value.
            Constant StructuralFraction: FixedValue=1; Units=g/g
          Constant Metabolic: FixedValue=0
          StorageDMDemandFunction Storage
            SubtractFunction StorageFraction
              Constant One: FixedValue=1
              VariableReference StructuralFraction: VariableName=[Stem].DMDemands.Structural.StructuralFraction.Value()
        BiomassDemand NDemands
          MultiplyFunction Structural
            VariableReference MinNconc: VariableName=[Stem].minimumNconc.Value()
            VariableReference PotentialDMAllocation: VariableName=[Stem].potentialDMAllocation.Structural
          MultiplyFunction Metabolic
            SubtractFunction MetabolicNconc
              VariableReference CritNconc: VariableName=[Stem].criticalNConc.Value()
              VariableReference MinNconc: VariableName=[Stem].minimumNconc.Value()
            VariableReference PotentialDMAllocation: VariableName=[Stem].potentialDMAllocation.Structural
          StorageNDemandFunction Storage
            VariableReference NitrogenDemandSwitch: VariableName=[Stem].nitrogenDemandSwitch.Value()
            VariableReference MaxNconc: VariableName=[Stem].maximumNconc.Value()
      GenericOrgan Crown
        Constant NReallocationFactor: FixedValue=0
          Memo
            N reallocation is working and recycling some of the non-structural N during senescence.
        Constant MaximumNConc: FixedValue=0.003
        Constant MinimumNConc: FixedValue=0.001
        Constant InitialWtFunction: FixedValue=0; Units=g/m^2
        Constant DetachmentRateFunction: FixedValue=0.01; Units=/d
        BiomassRemoval BiomassRemovalDefaults: same as Replacements.TropicalPasture.Root.BiomassRemovalDefaults
        Constant MaintenanceRespirationFunction: FixedValue=0; Units=0-1
        Constant DMConversionEfficiency: FixedValue=1; Units=0-1
        Constant NitrogenDemandSwitch: FixedValue=1
        MultiplyFunction DMRetranslocationFactor1
          Constant PotentialDMRetranslocationFactor: FixedValue=0
          LinearInterpolationFunction FloweringFactor: XProperty=[TropicalPasture].Age
            XYPairs: X=[0, 0.94, 0.95, 1.1, 1.11, 5]; Y=[1, 1, 1, 1, 1, 1]
          LinearInterpolationFunction LAIfactor: XProperty=[TropicalPasture].Photoperiod.Value
            XYPairs: X=[0, 0.76, 0.77, 1.2, 1.21, 7]; Y=[1, 1, 1, 1, 1, 1]
          Memo
            The flowering factor is determined by daylength, but there is not a tool for this control in Apsim, so were used the plant ages correspondent to each daylength value.

            DM retranslocation is not working currently, so it is necessary build that in Apsim.
        MultiplyFunction NRetranslocationFactor
          Constant PotentialNRetranslocationFactor: FixedValue=0
          LinearInterpolationFunction FnFactor: XProperty=[Leaf].Fn
            XYPairs: X=[0, 0.5, 1]; Y=[1, 1, 1]
          LinearInterpolationFunction LAIfactor: XProperty=[Leaf].LAI
            XYPairs: X=[0, 1, 7]; Y=[1, 1, 1]
          Memo
            N retranslocation is working, but studies about N concentration are necessary to improve these simulations.
        LinearInterpolationFunction SenescenceRate: same as Replacements.TropicalPasture.Stem.SenescenceRate
        Constant DMReallocationFactor: FixedValue=0
        Constant DMRetranslocationFactor: FixedValue=0
        VariableReference CriticalNConc: VariableName=[Crown].MinimumNConc.Value()
        Constant RemobilisationCost: FixedValue=0
        Constant CarbonConcentration: FixedValue=0.4
        BiomassDemand DMDemands
          MultiplyFunction Structural
            PartitionFractionDemandFunction DMDemandFunction
              MultiplyFunction PartitionFraction
                LinearInterpolationFunction PartitionFraction: XProperty=[TropicalPasture].Age
                  XYPairs: X=[0, 0.2, 0.3, 0.4, 0.71, 0.72, 0.98, 0.99, 1.21, 1.22, 5]; Y=[0.08, 0.08, 0.1, 0.1, 0.1, 0.2, 0.2, 0.1, 0.1, 0.1, 0.1]
              Memo
                The flowering factor is determined by daylength, but there is not a tool for this control in Apsim, so were used the plant ages correspondent to each daylength value.
            Constant StructuralFraction: FixedValue=0.5; Units=g/g
          Constant Metabolic: FixedValue=0
          StorageDMDemandFunction Storage
            SubtractFunction StorageFraction
              Constant One: FixedValue=1
              VariableReference StructuralFraction: VariableName=[Crown].DMDemands.Structural.StructuralFraction.Value()
        BiomassDemand NDemands
          MultiplyFunction Structural
            VariableReference MinNconc: VariableName=[Crown].minimumNconc.Value()
            VariableReference PotentialDMAllocation: VariableName=[Crown].potentialDMAllocation.Structural
          MultiplyFunction Metabolic
            SubtractFunction MetabolicNconc
              VariableReference CritNconc: VariableName=[Crown].criticalNConc.Value()
              VariableReference MinNconc: VariableName=[Crown].minimumNconc.Value()
            VariableReference PotentialDMAllocation: VariableName=[Crown].potentialDMAllocation.Structural
          StorageNDemandFunction Storage
            VariableReference NitrogenDemandSwitch: VariableName=[Crown].nitrogenDemandSwitch.Value()
            VariableReference MaxNconc: VariableName=[Crown].maximumNconc.Value()
      Cultivar Bambatsi
      Cultivar Brachiaria
  DataStore
    ExcelInput Observed: FileName=observed.xlsx; SheetNames=[ObsCrop, ObsSoil]
    PredictedObserved: PredictedTableName=HarvestReport; ObservedTableName=ObsCrop; FieldNameUsedForMatch=Clock.Today.Year
    PredictedObserved PredictedObservedSoil: PredictedTableName=Report; ObservedTableName=ObsSoil; FieldNameUsedForMatch=Clock.Today
      Tests: POName=PredictedObservedSoil
        AcceptedStats:
          Name        n    Slope     Intercept  SEslope    SEintercept  R2        RMSE     NSE       ME        MAE      RSR
          N           144  1         0          0          0            1         0        1         0         0        0
          TOC0_10cm   148  0.787354  3559.09    0.0325311  504.256      0.80049   1698.19  0.790935  358.923   1263.11  0.455689
          TOC0_30cm   199  0.680757  12300.3    0.0230026  866.017      0.816377  3501.06  0.78901   530.145   2450.13  0.458181
          TOC10_30cm  117  0.156964  15969.8    0.024549   435.916      0.262262  2737.83  0.039637  1186.44   2282.74  0.975784
          TOC30_60cm  171  0.855739  4048.06    0.0284017  626.794      0.843055  3367.56  0.824724  1083.37   2640.79  0.417434
          TON0_10cm   9    0.438531  768.361    0.0701909  128.245      0.847937  381.812  0.493882  -212.236  328.688  0.670733
          TON0_30cm   61   0.762884  714.776    0.0828745  292.813      0.58953   283.459  0.441506  -118.161  173.658  0.741174
          TON30_60cm  54   0.875399  21.4469    0.0845756  240.522      0.673228  343.852  -4.9503   -332.467  332.467  2.41663
        AcceptedStatsName=Name n Slope Intercept SEslope SEintercept R2 RMSE NSE ME MAE RSR
  Folder Validation
    Memo Introduction
      The Soil Nutrient model has been tested on a variety of datasets studying the impact of management (tillage, cropping rotation, nitrogen management) on soil carbon, nitrogen and crop productivity for a range of soil types and environments.
    Folder Australia
      Memo
        Insert text here to document the Australian datasets
      Folder Tarlee
        Experiment Tarlee
          Memo
            Insert text here to document the Tarlee dataset
          Factors
            Factor Rotation: Specifications=[operations]
              Operations WW
                1978-07-18  [Wheat].Sow(cultivar:hartog, depth:30, population:100, rowSpacing:300);
                1979-06-21  [Wheat].Sow(cultivar:hartog, depth:30, population:100, rowSpacing:300);
                1980-07-16  [Wheat].Sow(cultivar:hartog, depth:30, population:100, rowSpacing:300);
                1981-07-16  [Wheat].Sow(cultivar:hartog, depth:30, population:100, rowSpacing:300);
                1982-06-07  [Wheat].Sow(cultivar:hartog, depth:30, population:100, rowSpacing:300);
                1983-06-04  [Wheat].Sow(cultivar:hartog, depth:30, population:100, rowSpacing:300);
                1984-06-26  [Wheat].Sow(cultivar:hartog, depth:30, population:100, rowSpacing:300);
                1985-06-11  [Wheat].Sow(cultivar:hartog, depth:30, population:100, rowSpacing:300);
                1986-07-21  [Wheat].Sow(cultivar:hartog, depth:30, population:100, rowSpacing:300);
                1987-06-02  [Wheat].Sow(cultivar:hartog, depth:30, population:100, rowSpacing:300);
                1988-06-23  [Wheat].Sow(cultivar:hartog, depth:30, population:100, rowSpacing:300);
                1989-06-06  [Wheat].Sow(cultivar:hartog, depth:30, population:100, rowSpacing:300);
                1990-07-23  [Wheat].Sow(cultivar:hartog, depth:30, population:100, rowSpacing:300);
                1991-06-26  [Wheat].Sow(cultivar:hartog, depth:30, population:100, rowSpacing:300);
                1992-06-01  [Wheat].Sow(cultivar:hartog, depth:30, population:100, rowSpacing:300);
                1993-06-24  [Wheat].Sow(cultivar:hartog, depth:30, population:100, rowSpacing:300);
                1994-06-24  [Wheat].Sow(cultivar:hartog, depth:30, population:100, rowSpacing:300);
                1995-06-24  [Wheat].Sow(cultivar:hartog, depth:30, population:100, rowSpacing:300);
                1996-06-23  [Wheat].Sow(cultivar:hartog, depth:30, population:100, rowSpacing:300);
              Operations WF
                1979-06-21  [Wheat].Sow(cultivar:hartog, depth:30, population:100, rowSpacing:300);
                1981-07-16  [Wheat].Sow(cultivar:hartog, depth:30, population:100, rowSpacing:300);
                1983-06-04  [Wheat].Sow(cultivar:hartog, depth:30, population:100, rowSpacing:300);
                1985-06-11  [Wheat].Sow(cultivar:hartog, depth:30, population:100, rowSpacing:300);
                1987-06-02  [Wheat].Sow(cultivar:hartog, depth:30, population:100, rowSpacing:300);
                1989-06-06  [Wheat].Sow(cultivar:hartog, depth:30, population:100, rowSpacing:300);
                1991-06-26  [Wheat].Sow(cultivar:hartog, depth:30, population:100, rowSpacing:300);
                1993-06-24  [Wheat].Sow(cultivar:hartog, depth:30, population:100, rowSpacing:300);
                1995-06-24  [Wheat].Sow(cultivar:hartog, depth:30, population:100, rowSpacing:300);
            Factor Stubble: Specifications=[stubbleoperations]
              Operations Burnt
                1978-12-31  [SurfaceOrganicMatter].Incorporate(fraction: 0.90, depth: 0)
                1979-12-31  [SurfaceOrganicMatter].Incorporate(fraction: 0.90, depth: 0)
                1980-12-31  [SurfaceOrganicMatter].Incorporate(fraction: 0.90, depth: 0)
                1981-12-31  [SurfaceOrganicMatter].Incorporate(fraction: 0.90, depth: 0)
                1982-12-31  [SurfaceOrganicMatter].Incorporate(fraction: 0.90, depth: 0)
                1983-12-31  [SurfaceOrganicMatter].Incorporate(fraction: 0.90, depth: 0)
                1984-12-31  [SurfaceOrganicMatter].Incorporate(fraction: 0.90, depth: 0)
                1985-12-31  [SurfaceOrganicMatter].Incorporate(fraction: 0.90, depth: 0)
                1986-12-31  [SurfaceOrganicMatter].Incorporate(fraction: 0.90, depth: 0)
                1987-12-31  [SurfaceOrganicMatter].Incorporate(fraction: 0.90, depth: 0)
                1988-12-31  [SurfaceOrganicMatter].Incorporate(fraction: 0.90, depth: 0)
                1989-12-31  [SurfaceOrganicMatter].Incorporate(fraction: 0.90, depth: 0)
                1990-12-31  [SurfaceOrganicMatter].Incorporate(fraction: 0.90, depth: 0)
                1991-12-31  [SurfaceOrganicMatter].Incorporate(fraction: 0.90, depth: 0)
                1992-12-31  [SurfaceOrganicMatter].Incorporate(fraction: 0.90, depth: 0)
                1993-12-31  [SurfaceOrganicMatter].Incorporate(fraction: 0.90, depth: 0)
                1994-12-31  [SurfaceOrganicMatter].Incorporate(fraction: 0.90, depth: 0)
                1995-12-31  [SurfaceOrganicMatter].Incorporate(fraction: 0.90, depth: 0)
              Operations Incorporated
                1978-12-31  [SurfaceOrganicMatter].Incorporate(fraction: 0.90, depth: 100)
                1979-12-31  [SurfaceOrganicMatter].Incorporate(fraction: 0.90, depth: 100)
                1980-12-31  [SurfaceOrganicMatter].Incorporate(fraction: 0.90, depth: 100)
                1981-12-31  [SurfaceOrganicMatter].Incorporate(fraction: 0.90, depth: 100)
                1982-12-31  [SurfaceOrganicMatter].Incorporate(fraction: 0.90, depth: 100)
                1983-12-31  [SurfaceOrganicMatter].Incorporate(fraction: 0.90, depth: 100)
                1984-12-31  [SurfaceOrganicMatter].Incorporate(fraction: 0.90, depth: 100)
                1985-12-31  [SurfaceOrganicMatter].Incorporate(fraction: 0.90, depth: 100)
                1986-12-31  [SurfaceOrganicMatter].Incorporate(fraction: 0.90, depth: 100)
                1987-12-31  [SurfaceOrganicMatter].Incorporate(fraction: 0.90, depth: 100)
                1988-12-31  [SurfaceOrganicMatter].Incorporate(fraction: 0.90, depth: 100)
                1989-12-31  [SurfaceOrganicMatter].Incorporate(fraction: 0.90, depth: 100)
                1990-12-31  [SurfaceOrganicMatter].Incorporate(fraction: 0.90, depth: 100)
                1991-12-31  [SurfaceOrganicMatter].Incorporate(fraction: 0.90, depth: 100)
                1992-12-31  [SurfaceOrganicMatter].Incorporate(fraction: 0.90, depth: 100)
                1993-12-31  [SurfaceOrganicMatter].Incorporate(fraction: 0.90, depth: 100)
                1994-12-31  [SurfaceOrganicMatter].Incorporate(fraction: 0.90, depth: 100)
                1995-12-31  [SurfaceOrganicMatter].Incorporate(fraction: 0.90, depth: 100)
              Operations Retained
            Factor N: Specifications=[SowingFertiliser].Script.Amount = 0,40,80
          Simulation TarleeBaseSimulation
            Weather: FileName=Tarlee.met
            Clock: StartDate=1978-01-01; EndDate=1996-12-31
            Summary summaryfile
            Zone Field: Area=1; Slope=0
              Operations: same as Validation.Australia.Tarlee.Tarlee.Factors.Rotation.WW
              Operations stubbleoperations
              Report: EventNames=[Clock].EndOfMonth
                VariableNames:
                  [Clock].Today
                  [Soil].Nutrient.TotalC[1] as TOC0_10cm
                  [Soil].Nutrient.TotalC[2] as TOC10_30cm
                  [Soil].Nutrient.TotalC[3] as TOC30_60cm
                  ([Soil].Nutrient.TotalC[1]+[Soil].Nutrient.TotalC[2]) as TOC0_30cm
              Report HarvestReport: EventNames=[Wheat].Harvesting
                VariableNames:
                  [Clock].Today.Year
                  [Wheat].Grain.Wt
                  [Wheat].AboveGround.Wt
                  [Wheat].Grain.Size
              SurfaceOrganicMatter stubble: InitialResidueName=wheat; InitialResidueType=wheat; InitialResidueMass=1000; InitialStandingFraction=0; InitialCPR=0; InitialCNR=80; FractionFaecesAdded=0.5
              Plant wheat: ResourceName=Wheat; CropType=Wheat
              MicroClimate: a_interception=0; b_interception=1; c_interception=0; d_interception=0; soil_albedo=0.23; SoilHeatFluxFraction=0.4; NightInterceptionFraction=0.5; ReferenceHeight=2
              Manager Harvesting
                Crop = .Simulations.Validation.Australia.Tarlee.Tarlee.TarleeBaseSimulation.Field.wheat
```csharp
using System;
using Models.Core;
using Models.PMF;
using Models.Soils;
using Models.Utilities;
using APSIM.Shared.Utilities;

namespace Models
{
    [Serializable] 
    public class Script : Model
    {
        [Description("Crop")]
        public IPlant Crop { get; set; }
        
        [EventSubscribe("DoManagement")]
        private void OnDoManagement(object sender, EventArgs e)
        {
            if (Crop.IsReadyForHarvesting)
            {
                Crop.Harvest();
                Crop.EndCrop();
            }
        }
    }
}
```
              Soil: ASCOrder=Sodosol; ASCSubOrder=Red; SoilType=Sand; Site=Tarlee; NearestTown=Tarlee; Region=Mid North; State=South Australia; Country=Australia; ApsoilNumber=610; Latitude=-34.276; Longitude=138.759; LocationAccuracy=+/- 20m
                DataSource=Characterisation 2008 by University of Adelaide, CSIRO Sustainable Ecosystems and Allan Mayfield Consulting, Clare, SA
                Comments=Roots: Wheat 90cm; barley and oats estimated; OC WB as measured; Strongly duplex low-moderate clay soil. Surface CEC low, moderate below. Texture change at about 7cm. Little chemical impediment to root growth, but high ESP below about 60cm may result in slaking or dispersion and high bulk density.
                Water
                  Thickness  BD    AirDry  LL15   DUL    SAT
                  100        1.54  0.055   0.11   0.223  0.389
                  200        1.41  0.167   0.209  0.388  0.438
                  300        1.53  0.22    0.22   0.342  0.393
                  300        1.57  0.22    0.22   0.293  0.378
                  350        1.6   0.22    0.22   0.264  0.366
                  SoilCrop WheatSoil: LL=[0.11, 0.209, 0.24, 0.225, 0.222]; KL=[0.06, 0.06, 0.06, 0.04, 0.04]; XF=[1, 1, 1, 1, 1]
                SoilWater: SummerDate=1-Nov; SummerU=6; SummerCona=3.5; WinterDate=1-Apr; WinterU=2; WinterCona=2; DiffusConst=88; DiffusSlope=35; Salb=0.13; CN2Bare=73; CNRed=20; CNCov=0.8; max_pond=0; Thickness=[100, 200, 300, 300, 350]; SWCON=[0.5, 0.5, 0.5, 0.5, 0.5]; ResidueInterception=0
                Nutrient
                SoilOrganicMatter: RootCN=40; RootWt=5000; SoilCN=12; EnrACoeff=7.4; EnrBCoeff=0.2; OCUnits=Total
                  Thickness  OC    FBiom  FInert
                  100        0.96  0.04   0.1
                  200        0.72  0.02   0.15
                  300        0.38  0.02   0.5
                  300        0.12  0.02   0.99
                  350        0.12  0.01   0.99
                Analysis: Thickness=[100, 200, 300, 300, 350]; PH=[7, 7.9, 8.9, 9.2, 9.2]; PHUnits=Water; BoronUnits=HotWater
                InitialWater Initial water: PercentMethod=FilledFromTop; FractionFull=1
                Sample Initial conditions: Thickness=[1800]; NO3=[10]; NH4=[1]; NO3Units=kgha; NH4Units=kgha; SWUnits=Volumetric; OCUnits=Total; PHUnits=Water
                CERESSoilTemperature
              Manager SowingFertiliser
                Amount = 160
                CropName = wheat
```csharp
using System;
using Models.Core;
using Models.PMF;
namespace Models
{
    [Serializable]
    public class Script : Model
    {
        [Link] Clock Clock;
        [Link] Fertiliser Fertiliser;
        [Link] Summary Summary;
        
        
        [Description("Amount of fertiliser to be applied (kg/ha)")]
        public double Amount { get; set; }
        
        [Description("Crop to be fertilised")]
        public string CropName { get; set; }
        
        
        

        [EventSubscribe("Sowing")]
        private void OnSowing(object sender, EventArgs e)
        {
            Model crop = sender as Model;
            if (crop.Name.ToLower() == CropName.ToLower())
                Fertiliser.Apply(Amount: Amount, Type: Fertiliser.Types.NO3N);
        }
        
    }
}
```
              Fertiliser
              SoluteManager
            SoilArbitrator
            MicroClimate: a_interception=0; b_interception=1; c_interception=0; d_interception=0; soil_albedo=0.23; SoilHeatFluxFraction=0.4; NightInterceptionFraction=0.5; ReferenceHeight=2
      Folder Hudson
        Simulation HudsonW1
          Clock: StartDate=1994-08-05; EndDate=2000-01-23
          Summary summaryfile
          Weather: FileName=Hudson.met
          Zone paddock: Area=1; Slope=0
            Report: EventNames=[Clock].DoReport
              VariableNames:
                [Clock].Today
                [Soil].Nutrient.TotalC[1] as TOC0_10cm
                [Soil].Nutrient.TotalC[2] as TOC10_30cm
                [Soil].Nutrient.TotalC[3] as TOC30_60cm
                ([Soil].Nutrient.TotalC[1]+[Soil].Nutrient.TotalC[2]) as TOC0_30cm
            Report Hudsonreport: EventNames=[Clock].DoReport
              VariableNames:
                [Clock].Today
                sum([Soil].SoilWater.SWmm[2:3]) as SW10_50cm
                sum([Soil].SoilWater.SWmm[4:5]) as SW50_90cm
                sum([Soil].SoilWater.SWmm[6:7]) as SW90_130cm
                sum([Soil].SoilWater.SWmm[8:9]) as SW130_170cm
                sum([Soil].SoilWater.SWmm[10:11]) as SW170_210cm
                sum([Soil].SoilWater.SWmm[12:13]) as SW210_250cm
                sum([Soil].SoilWater.SWmm[2:13]) as SW10_250cm
                [Soil].SoilWater.Runoff
                [Soil].SoilWater.Drainage
                [Soil].SoilWater.Es
                [Soil].SoilWater.Eo
                [Wheat].Leaf.LAI
                [Wheat].AboveGround.Wt
                [Wheat].Grain.Wt
                [Weather].Rain
                [Wheat].AboveGround.N
                [Wheat].BelowGround.N
            Soil: Latitude=0; Longitude=0
              Water
                Thickness  BD   AirDry  LL15  DUL   SAT
                100        1    0.1     0.24  0.47  0.53
                200        1.1  0.1     0.28  0.49  0.54
                200        1.1  0.1     0.28  0.52  0.57
                200        1.1  0.1     0.29  0.52  0.55
                200        1.1  0.1     0.29  0.51  0.54
                200        1.2  0.1     0.29  0.5   0.53
                200        1.2  0.1     0.29  0.5   0.53
                200        1.2  0.1     0.33  0.48  0.51
                200        1.2  0.1     0.33  0.48  0.51
                200        1.2  0.1     0.35  0.48  0.51
                200        1.2  0.1     0.35  0.47  0.5
                200        1.2  0.1     0.35  0.45  0.48
                200        1.3  0.1     0.35  0.45  0.48
                200        1.3  0.1     0.35  0.45  0.48
                200        1.3  0.1     0.35  0.45  0.48
                200        1.3  0.1     0.35  0.45  0.48
                SoilCrop WheatSoil
                  LL=[0.25, 0.3, 0.3, 0.33, 0.33, 0.35, 0.35, 0.4, 0.4, 0.4, 0.4, 0.4, 0.4, 0.4, 0.4, 0.4]
                  KL=[0.06, 0.06, 0.06, 0.06, 0.06, 0.06, 0.06, 0.06, 0.06, 0.06, 0, 0, 0, 0, 0, 0]
                  XF=[1, 1, 1, 1, 1, 1, 1, 1, 1, 1, 0, 0, 0, 0, 0, 0]
              SoilWater: SummerDate=1-Nov; SummerU=9; SummerCona=5; WinterDate=1-Apr; WinterU=9; WinterCona=5; DiffusConst=40; DiffusSlope=16; Salb=0.13; CN2Bare=72; CNRed=20; CNCov=0.8; max_pond=0; ResidueInterception=0
                Thickness=[100, 200, 200, 200, 200, 200, 200, 200, 200, 200, 200, 200, 200, 200, 200, 200]
                SWCON=[0.4, 0.4, 0.4, 0.4, 0.4, 0.4, 0.4, 0.4, 0.4, 0.4, 0.4, 0.4, 0.4, 0.4, 0.4, 0.4]
              Nutrient
              SoilOrganicMatter: RootCN=40; RootWt=10; SoilCN=14.5; EnrACoeff=7.4; EnrBCoeff=0.2; OCUnits=Total
                Thickness  OC      FBiom  FInert
                100        1.4395  0.2    0.32
                200        1.11    0.03   0.5
                200        1.11    0.02   0.6
                200        1.11    0.015  0.7
                200        1.11    0.01   0.85
                200        1       0.01   0.9
                200        0.8     0.01   0.99
                200        0.45    0.01   0.99
                200        0.45    0.01   0.99
                200        0.45    0.01   0.99
                200        0.45    0.01   0.99
                200        0.45    0.01   0.99
                200        0.45    0.01   0.99
                200        0.45    0.01   0.99
                200        0.45    0.01   0.99
                200        0.45    0.01   0.99
              Analysis: PH=[6, 6.4, 6.8, 7.2, 7.6, 8, 8, 8, 8, 8, 8, 8, 8, 8, 8, 8]; PHUnits=Water; BoronUnits=HotWater
                Thickness=[100, 200, 200, 200, 200, 200, 200, 200, 200, 200, 200, 200, 200, 200, 200, 200]
              Sample Initial nitrogen: NO3Units=ppm; NH4Units=ppm; SWUnits=Volumetric; OCUnits=Total; PHUnits=Water
                Thickness  NO3   NH4
                100        10.7  0.3
                200        9.99  0.3
                200        7.87  0.3
                200        6.2   0.3
                200        4.85  0.3
                200        3.56  0.3
                200        2.72  0.3
                200        2.34  0.3
                200        2.47  0.3
                200        3.24  0.3
                200        4.25  0.3
                200        4.94  0.3
                200        5.2   0.3
                200        4.95  0.3
                200        4.52  0.3
                200        4.24  0.3
              Sample Initial water: NO3Units=ppm; NH4Units=ppm; SWUnits=Volumetric; OCUnits=Total; PHUnits=Water
                Thickness=[100, 200, 200, 200, 200, 200, 200, 200, 200, 200, 200, 200, 200, 200, 200, 200]
                SW=[0.43, 0.43, 0.48, 0.47, 0.46, 0.46, 0.46, 0.485, 0.49, 0.474, 0.457, 0.453, 0.447, 0.465, 0.457, 0.43]
              CERESSoilTemperature
            SurfaceOrganicMatter SurfaceOM: InitialResidueName=unknown; InitialResidueType=wheat; InitialResidueMass=0; InitialStandingFraction=1; InitialCPR=0; InitialCNR=100; FractionFaecesAdded=0.5
            MicroClimate: a_interception=0; b_interception=1; c_interception=0; d_interception=0; soil_albedo=0.23; SoilHeatFluxFraction=0.4; NightInterceptionFraction=0.5; ReferenceHeight=2
            Fertiliser
            Operations
              1994-08-05  [Wheat].Sow(population:26, cultivar:Hartog, depth:40, rowSpacing:300);
              1994-08-05  [Fertiliser].Apply(70, Fertiliser.Types.NO3N, 50);
              1994-09-07  [Wheat].EndCrop();
              1994-10-27  [Wheat].Harvest();
              1995-06-01  [Wheat].Sow(cultivar:Hartog, population:126, depth:40, rowSpacing:300);
              1995-06-01  [Fertiliser].Apply(80, Fertiliser.Types.NO3N, 50);
              1995-11-28  [Wheat].Harvest();
              1995-11-28  [Wheat].EndCrop();
              1996-07-02  [Wheat].Sow(cultivar:Hartog, population:126, depth:40, rowSpacing:300);
              1996-07-02  [Fertiliser].Apply(101, Fertiliser.Types.NO3N, 50);
              1996-12-04  [Wheat].EndCrop();
              1997-06-02  [Wheat].Sow(cultivar:Hartog, population:71, depth:40, rowSpacing:300);
              1997-06-02  [Fertiliser].Apply(100, Fertiliser.Types.NO3N, 50);
              1997-11-26  [Wheat].Harvest();
              1997-11-26  [Wheat].EndCrop();
              1998-06-18  [Wheat].Sow(cultivar:Hartog, population:126, depth:40, rowSpacing:300);
              1998-06-18  [Fertiliser].Apply(102, Fertiliser.Types.NO3N, 50);
              1998-12-02  [Wheat].Harvest();
              1998-12-02  [Wheat].EndCrop();
              1999-06-23  [Wheat].Sow(cultivar:Hartog, population:50, depth:40, rowSpacing:300);
              1999-06-23  [Fertiliser].Apply(102, Fertiliser.Types.NO3N, 50);
              1999-12-16  [Wheat].Harvest();
              1999-12-16  [Wheat].EndCrop();
            Plant Wheat: CropType=Wheat
            SoluteManager
          SoilArbitrator
        Simulation HudsonP3
          Weather: FileName=Hudson.met
          Clock: StartDate=1994-08-05; EndDate=2000-01-23
          Summary
          SoilArbitrator Soil Arbitrator
          Zone Field: Area=1; Slope=0
            Soil: Latitude=0; Longitude=0
              Water
                Thickness  BD   AirDry  LL15  DUL   SAT   KS
                100        1    0.1     0.24  0.47  0.53  384
                200        1.1  0.1     0.28  0.49  0.54  384
                200        1.1  0.1     0.28  0.52  0.57  384
                200        1.1  0.1     0.29  0.52  0.55  384
                200        1.1  0.1     0.29  0.51  0.54  384
                200        1.2  0.1     0.29  0.5   0.53  384
                200        1.2  0.1     0.29  0.5   0.53  384
                200        1.2  0.1     0.33  0.48  0.51  384
                200        1.2  0.1     0.33  0.48  0.51  384
                200        1.2  0.1     0.35  0.48  0.51  384
                200        1.2  0.1     0.35  0.47  0.5   384
                200        1.2  0.1     0.35  0.47  0.5   384
                200        1.3  0.1     0.35  0.47  0.5   384
                200        1.3  0.1     0.35  0.47  0.5   384
                200        1.3  0.1     0.35  0.47  0.5   384
                200        1.3  0.1     0.35  0.47  0.5   384
                SoilCrop TropicalPastureSoil
                  LL=[0.25, 0.3, 0.3, 0.3, 0.3, 0.33, 0.35, 0.38, 0.38, 0.4, 0.4, 0.4, 0.4, 0.4, 0.4, 0.4]
                  KL=[0.04, 0.04, 0.04, 0.03, 0.02, 0.01, 0.01, 0.01, 0.005, 0.005, 0.005, 0.005, 0.005, 0.005, 0.005, 0.005]
                  XF=[1, 1, 1, 1, 1, 0.75, 0.75, 0.5, 0.5, 0.25, 0.25, 0, 0, 0, 0, 0]
              SoilWater: SummerDate=1-Nov; SummerU=9; SummerCona=5; WinterDate=1-Apr; WinterU=9; WinterCona=5; DiffusConst=40; DiffusSlope=16; Salb=0.13; CN2Bare=75; CNRed=20; CNCov=0.8; max_pond=0; ResidueInterception=0
                Thickness=[100, 200, 200, 200, 200, 200, 200, 200, 200, 200, 200, 200, 200, 200, 200, 200]
                SWCON=[0.4, 0.4, 0.4, 0.4, 0.4, 0.4, 0.4, 0.4, 0.4, 0.4, 0.4, 0.4, 0.4, 0.4, 0.4, 0.4]
              Nutrient
              SoilOrganicMatter: RootCN=40; RootWt=10; SoilCN=14.5; EnrACoeff=7.4; EnrBCoeff=0.2; OCUnits=Total
                Thickness  OC    FBiom  FInert
                100        1.44  0.03   0.45
                200        1.11  0.03   0.45
                200        1.11  0.02   0.6
                200        1.11  0.015  0.7
                200        1.11  0.01   0.85
                200        1     0.01   0.9
                200        0.8   0.01   0.99
                200        0.45  0.01   0.99
                200        0.45  0.01   0.99
                200        0.45  0.01   0.99
                200        0.45  0.01   0.99
                200        0.45  0.01   0.99
                200        0.45  0.01   0.99
                200        0.45  0.01   0.99
                200        0.45  0.01   0.99
                200        0.45  0.01   0.99
              Analysis: PH=[6, 6.4, 6.8, 7.2, 7.6, 8, 8, 8, 8, 8, 8, 8, 8, 8, 8, 8]; PHUnits=Water; BoronUnits=HotWater
                Thickness=[100, 200, 200, 200, 200, 200, 200, 200, 200, 200, 200, 200, 200, 200, 200, 200]
              Sample Initial nitrogen: same as Validation.Australia.Hudson.HudsonW1.paddock.soil.Initial nitrogen
              Sample Initial water: NO3Units=ppm; NH4Units=ppm; SWUnits=Volumetric; OCUnits=Total; PHUnits=Water
                Thickness=[100, 200, 200, 200, 200, 200, 200, 200, 200, 200, 200, 200, 200, 200, 200, 200]
                SW=[0.47, 0.47, 0.53, 0.5, 0.47, 0.46, 0.45, 0.45, 0.45, 0.43, 0.42, 0.42, 0.41, 0.43, 0.42, 0.41]
              CERESSoilTemperature
            Irrigation
            Fertiliser
            SurfaceOrganicMatter: InitialResidueName=Wheat; InitialResidueType=Wheat; InitialResidueMass=2000; InitialStandingFraction=0; InitialCPR=0; InitialCNR=80; FractionFaecesAdded=0.5
            MicroClimate: a_interception=0.1; b_interception=1; c_interception=0; d_interception=0; soil_albedo=0.13; SoilHeatFluxFraction=0.4; NightInterceptionFraction=0.5; ReferenceHeight=2
            Operations
              1994-12-08  [Fertiliser].Apply(20.0, Fertiliser.Types.UreaN, 0);
              1995-01-01  [TropicalPasture].Sow(population: 100, cultivar: Bambatsi, depth: 100, rowSpacing: 100);
              1995-10-09  [TropicalPasture].Harvest();
              1995-11-21  [Fertiliser].Apply(50.0, Fertiliser.Types.UreaN, 0);
              1995-12-01  [TropicalPasture].Harvest();
              1996-01-30  [TropicalPasture].Harvest();
              1996-02-28  [TropicalPasture].Harvest();
              1996-11-26  [TropicalPasture].Harvest();
              1996-12-22  [Fertiliser].Apply(50.0, Fertiliser.Types.UreaN, 0);
              1997-01-14  [TropicalPasture].Harvest();
              1997-03-04  [TropicalPasture].Harvest();
              1997-06-26  [Fertiliser].Apply(22.0, Fertiliser.Types.UreaN, 0);
              1997-11-17  [TropicalPasture].Harvest();
              1998-04-07  [TropicalPasture].Harvest();
              1998-10-09  [Fertiliser].Apply(30.0, Fertiliser.Types.UreaN, 0);
              1998-12-17  [TropicalPasture].Harvest();
              1999-02-16  [TropicalPasture].Harvest();
              1999-06-02  [TropicalPasture].Harvest();
              1999-11-10  [Fertiliser].Apply(50.0, Fertiliser.Types.UreaN, 0);
              1999-09-29  [TropicalPasture].Harvest();
              2000-02-02  [TropicalPasture].Harvest();
            SoluteManager
            Report: EventNames=[Clock].DoReport
              VariableNames:
                [Clock].Today
                [Soil].Nutrient.TotalC[1] as TOC0_10cm
                [Soil].Nutrient.TotalC[2] as TOC10_30cm
                [Soil].Nutrient.TotalC[3] as TOC30_60cm
                ([Soil].Nutrient.TotalC[1]+[Soil].Nutrient.TotalC[2]) as TOC0_30cm
            Report Hudsonreport: same as Validation.Australia.Hudson.HudsonW1.paddock.Hudsonreport
            Plant TropicalPasture: CropType=TropicalPasture
          MicroClimate: a_interception=0; b_interception=1; c_interception=0; d_interception=0; soil_albedo=0.23; SoilHeatFluxFraction=0.4; NightInterceptionFraction=0.5; ReferenceHeight=2
      Folder Brigalow Catchment Study
        Simulation Brigalow
          Weather: FileName=Brigalow.met
          Clock: StartDate=1982-03-01; EndDate=2005-12-31
          Summary summaryfile
          Zone Upper: Area=1; Slope=0
            Operations SowOperations
              1982-03-01  // weed sow plants =50, sowing_depth = 20, cultivar = perennial, row_spacing = 250, crop_class = perennial_grass
              1982-10-25  // weed end_crop
              1982-10-25  [SurfaceOrganicMatter].Incorporate(fraction: 0.7, depth: 0);
              1982-10-26  // weed sow plants =50, sowing_depth = 20, cultivar = perennial, row_spacing = 250, crop_class = perennial_grass
              1982-10-01  //[Soil].Nutrient.Reset();
              1984-09-01  // weed sow plants =10, sowing_depth = 20, cultivar = perennial, row_spacing = 250, crop_class = perennial_grass
              1984-09-27  //[Maize].Sow(cultivar:Dekalb_XL82, population:2, depth:30, rowSpacing:1000);
              1985-04-01  // weed NOTsow plants =50, sowing_depth = 20, cultivar = perennial, row_spacing = 250, crop_class = perennial_grass
              1985-04-04  [Wheat].Sow(cultivar:hartog, population:34, depth:30, rowSpacing:300);
              1986-05-06  [Wheat].Sow(cultivar:hartog, population:34, depth:30, rowSpacing:300);
              1987-05-11  [Wheat].Sow(cultivar:hartog, population:34, depth:30, rowSpacing:300);
              1988-04-12  [Wheat].Sow(cultivar:hartog, population:34, depth:30, rowSpacing:300);
              1989-06-14  [Wheat].Sow(cultivar:hartog, population:34, depth:30, rowSpacing:300);
              1990-05-10  [Wheat].Sow(cultivar:hartog, population:34, depth:30, rowSpacing:300);
              1991-06-13  [Wheat].Sow(cultivar:hartog, population:34, depth:30, rowSpacing:300);
              1992-05-07  [Wheat].Sow(cultivar:hartog, population:34, depth:30, rowSpacing:300);
              1994-01-01  [Soil].SoilWater.CN2Bare = 75
              1994-04-20  [Wheat].Sow(cultivar:hartog, population:77, depth:30, rowSpacing:300);
              1995-01-16  //[Maize].Sow(cultivar:Dekalb_XL82, population:13, depth:30, rowSpacing:1000);
              1995-03-31  //[Maize].OnEndCrop();
              1995-11-01  //[Maize].Sow(cultivar:Dekalb_XL82, population:3, depth:30, rowSpacing:1000);
              1996-05-23  [Wheat].Sow(cultivar:hartog, population:49, depth:30, rowSpacing:300);
              1997-02-17  //[Maize].Sow(cultivar:Dekalb_XL82, population:3, depth:30, rowSpacing:1000);
              1997-03-21  //[Maize].OnEndCrop();
              1997-06-20  [Wheat].Sow(cultivar:hartog, population:20, depth:30, rowSpacing:300);
              1997-08-11  [Wheat].EndCrop();
              1997-10-15  //[Maize].Sow(cultivar:Dekalb_XL82, population:3, depth:30, rowSpacing:1000);
              1998-02-01  // weed sow plants =50, sowing_depth = 20, cultivar = perennial, row_spacing = 250, crop_class = perennial_grass
              1998-04-01  // weed end_crop
              1998-05-30  [Wheat].Sow(cultivar:hartog, population:34, depth:30, rowSpacing:300);
              1998-11-04  //[Maize].Sow(cultivar:Dekalb_XL82, population:3, depth:30, rowSpacing:1000);
              1999-03-26  // weed sow plants =50, sowing_depth = 20, cultivar = perennial, row_spacing = 250, crop_class = perennial_grass
              2000-01-18  //[Maize].Sow(cultivar:Dekalb_XL82, population:3, depth:30, rowSpacing:1000);
              2000-03-04  //[Maize].OnEndCrop();
              2000-11-27  // weed sow plants =100, sowing_depth = 20, cultivar = perennial, row_spacing = 250, crop_class = perennial_grass
              2000-12-06  //[Maize].Sow(cultivar:Dekalb_XL82, population:7, depth:30, rowSpacing:1000);
              2001-12-04  //[Maize].Sow(cultivar:Dekalb_XL82, population:5, depth:30, rowSpacing:1000);
              2002-06-29  [Wheat].Sow(cultivar:hartog, population:78, depth:30, rowSpacing:300);
              2003-05-14  [Wheat].Sow(cultivar:hartog, population:60, depth:30, rowSpacing:300);
              2004-01-28  //[Maize].Sow(cultivar:Dekalb_XL82, population:5, depth:30, rowSpacing:1000);
              2004-11-25  //[Maize].Sow(cultivar:Dekalb_XL82, population:7, depth:30, rowSpacing:1000);
            Operations TillOperations
              1983-10-01  [SurfaceOrganicMatter].Incorporate(fraction: 0.5, depth: 100);
              1984-07-02  [SurfaceOrganicMatter].Incorporate(fraction: 0.5, depth: 100);
              1984-08-20  [SurfaceOrganicMatter].Incorporate(fraction: 0.5, depth: 100);
              1984-08-30  [SurfaceOrganicMatter].Incorporate(fraction: 0.5, depth: 100);
              1985-01-21  [SurfaceOrganicMatter].Incorporate(fraction: 0.5, depth: 100);
              1985-01-30  [SurfaceOrganicMatter].Incorporate(fraction: 0.5, depth: 100);
              1985-02-14  [SurfaceOrganicMatter].Incorporate(fraction: 0.5, depth: 100);
              1985-03-07  [SurfaceOrganicMatter].Incorporate(fraction: 0.5, depth: 100);
              1985-03-22  [SurfaceOrganicMatter].Incorporate(fraction: 0.5, depth: 100);
              1985-10-15  [SurfaceOrganicMatter].Incorporate(fraction: 0.5, depth: 100);
              1985-11-04  [SurfaceOrganicMatter].Incorporate(fraction: 0.5, depth: 100);
              1986-01-02  [SurfaceOrganicMatter].Incorporate(fraction: 0.5, depth: 100);
              1986-01-14  [SurfaceOrganicMatter].Incorporate(fraction: 0.5, depth: 100);
              1986-02-11  [SurfaceOrganicMatter].Incorporate(fraction: 0.5, depth: 100);
              1986-03-06  [SurfaceOrganicMatter].Incorporate(fraction: 0.5, depth: 100);
              1986-10-31  [SurfaceOrganicMatter].Incorporate(fraction: 0.5, depth: 100);
              1986-11-19  [SurfaceOrganicMatter].Incorporate(fraction: 0.5, depth: 100);
              1986-12-19  [SurfaceOrganicMatter].Incorporate(fraction: 0.5, depth: 100);
              1987-02-12  [SurfaceOrganicMatter].Incorporate(fraction: 0.5, depth: 100);
              1987-04-07  [SurfaceOrganicMatter].Incorporate(fraction: 0.5, depth: 100);
              1987-12-22  [SurfaceOrganicMatter].Incorporate(fraction: 0.5, depth: 100);
              1988-01-29  [SurfaceOrganicMatter].Incorporate(fraction: 0.5, depth: 100);
              1988-03-08  [SurfaceOrganicMatter].Incorporate(fraction: 0.5, depth: 100);
              1988-04-11  [SurfaceOrganicMatter].Incorporate(fraction: 0.5, depth: 100);
              1988-09-28  [SurfaceOrganicMatter].Incorporate(fraction: 0.5, depth: 100);
              1988-11-25  [SurfaceOrganicMatter].Incorporate(fraction: 0.5, depth: 100);
              1989-01-09  [SurfaceOrganicMatter].Incorporate(fraction: 0.5, depth: 100);
              1989-01-19  [SurfaceOrganicMatter].Incorporate(fraction: 0.5, depth: 100);
              1989-02-20  [SurfaceOrganicMatter].Incorporate(fraction: 0.5, depth: 100);
              1989-04-11  [SurfaceOrganicMatter].Incorporate(fraction: 0.5, depth: 100);
              1989-04-20  [SurfaceOrganicMatter].Incorporate(fraction: 0.5, depth: 100);
              1989-06-05  [SurfaceOrganicMatter].Incorporate(fraction: 0.5, depth: 100);
              1991-03-21  [SurfaceOrganicMatter].Incorporate(fraction: 0.5, depth: 100);
              1991-05-08  [SurfaceOrganicMatter].Incorporate(fraction: 0.5, depth: 100);
              1991-12-12  [SurfaceOrganicMatter].Incorporate(fraction: 0.5, depth: 100);
              1993-02-04  [SurfaceOrganicMatter].Incorporate(fraction: 0.5, depth: 100);
              1993-03-24  [SurfaceOrganicMatter].Incorporate(fraction: 0.5, depth: 100);
              1994-02-16  [SurfaceOrganicMatter].Incorporate(fraction: 0.5, depth: 100);
              1994-04-07  [SurfaceOrganicMatter].Incorporate(fraction: 0.5, depth: 100);
              1996-11-08  [SurfaceOrganicMatter].Incorporate(fraction: 0.5, depth: 100);
              1996-12-18  [SurfaceOrganicMatter].Incorporate(fraction: 0.5, depth: 100);
              1996-12-20  [SurfaceOrganicMatter].Incorporate(fraction: 0.5, depth: 100);
              1997-02-17  [SurfaceOrganicMatter].Incorporate(fraction: 0.5, depth: 100);
              1997-04-22  [SurfaceOrganicMatter].Incorporate(fraction: 0.5, depth: 100);
              1999-02-24  [SurfaceOrganicMatter].Incorporate(fraction: 0.5, depth: 100);
              1999-03-25  [SurfaceOrganicMatter].Incorporate(fraction: 0.5, depth: 100);
              1999-10-27  [SurfaceOrganicMatter].Incorporate(fraction: 0.5, depth: 100);
              1999-10-27  [SurfaceOrganicMatter].Incorporate(fraction: 0.5, depth: 100);
              1999-11-09  [SurfaceOrganicMatter].Incorporate(fraction: 0.5, depth: 100);
              2001-05-29  [SurfaceOrganicMatter].Incorporate(fraction: 0.5, depth: 100);
              2001-08-21  [SurfaceOrganicMatter].Incorporate(fraction: 0.5, depth: 100);
              2006-02-08  [SurfaceOrganicMatter].Incorporate(fraction: 0.5, depth: 100);
              2006-04-18  [SurfaceOrganicMatter].Incorporate(fraction: 0.5, depth: 100);
              2007-01-19  [SurfaceOrganicMatter].Incorporate(fraction: 0.5, depth: 100);
              2007-02-06  [SurfaceOrganicMatter].Incorporate(fraction: 0.5, depth: 100);
              2007-03-26  [SurfaceOrganicMatter].Incorporate(fraction: 0.5, depth: 100);
            Operations SprayOperations
              1987-12-09  // SprayManager spray
              1988-03-15  // SprayManager spray
              1989-06-09  // SprayManager spray
              1989-11-30  // SprayManager spray
              1990-01-12  // SprayManager spray
              1990-03-20  // SprayManager spray
              1990-04-21  // SprayManager spray
              1990-06-26  // SprayManager spray
              1990-07-21  // SprayManager spray
              1990-12-19  // SprayManager spray
              1991-01-20  // SprayManager spray
              1991-02-20  // SprayManager spray
              1991-07-29  // SprayManager spray
              1991-12-14  // SprayManager spray
              1992-01-08  // SprayManager spray
              1992-03-03  // SprayManager spray
              1992-04-28  // SprayManager spray
              1992-05-06  // SprayManager spray
              1992-06-09  // SprayManager spray
              1993-01-16  // SprayManager spray
              1993-09-25  // SprayManager spray
              1993-11-09  // SprayManager spray
              1994-01-20  // SprayManager spray
              1994-03-20  // SprayManager spray
              1994-11-25  // SprayManager spray_not_effective
              1994-12-13  // SprayManager spray
              1995-02-03  // SprayManager spray
              1995-06-11  // SprayManager spray
              1995-11-01  // SprayManager spray
              1996-02-13  // SprayManager spray
              1996-05-16  // SprayManager spray
              1996-11-08  // SprayManager spray
              1996-12-14  // SprayManager spray
              1997-03-21  // SprayManager spray_not_effective
              1997-06-06  // SprayManager spray
              1997-08-11  // SprayManager spray
              1997-11-21  // SprayManager spray
              1997-12-19  // SprayManager sprayheliothis
              1998-03-19  // SprayManager spray
              1998-05-18  // SprayManager spray
              1998-10-19  // SprayManager spray
              1998-11-27  // SprayManager spray
              1998-12-08  // SprayManager spray
              1999-08-27  // SprayManager spray
              2000-01-14  // SprayManager spray
              2000-01-19  // SprayManager spray
              2000-03-04  // SprayManager spray
              2000-05-26  // SprayManager spray
              2000-08-28  // SprayManager spray
              2000-11-27  // SprayManager spray
              2001-11-26  // SprayManager spray
              2001-12-06  // SprayManager spray
              2002-04-17  // SprayManager spray
              2002-06-10  // SprayManager spray
              2002-06-10  // SprayManager spray
              2002-06-10  // SprayManager spray
              2002-06-22  // SprayManager spray
              2002-06-22  // SprayManager spray
              2002-12-18  // SprayManager spray
              2003-01-07  // SprayManager spray
              2003-02-19  // SprayManager spray
              2003-03-27  // SprayManager spray
              2003-07-08  // SprayManager spray
              2003-10-29  // SprayManager spray
              2003-10-29  // SprayManager spray
              2003-12-16  // SprayManager spray
              2004-01-09  // SprayManager spray
              2004-02-16  // SprayManager spray
              2004-11-04  // SprayManager spray
              2004-11-20  // SprayManager spray
              2005-03-25  // SprayManager spray
              2005-04-18  // SprayManager spray
              2005-05-19  // SprayManager spray
              2005-11-18  // SprayManager spray_not_effective
              2006-05-18  // SprayManager spray
              2007-02-26  // SprayManager spray
              2007-03-22  // SprayManager spray
              2007-06-22  // SprayManager spray
              2007-08-15  // SprayManager spray
              2007-08-30  // SprayManager spray
              2007-09-04  // SprayManager spray
            Operations SoilOperations
              1982-03-08  // ClOutput do_output
              1983-09-05  // ClOutput do_output
              1987-11-19  // ClOutput do_output
              1990-11-15  // ClOutput do_output
              1997-01-15  // ClOutput do_output
              2000-05-16  // ClOutput do_output
            Folder Manager folder
              Manager SprayManager
```csharp
using System;
using Models.Core;
using Models.PMF;
using Models.PMF;
namespace Models
{
    [Serializable]
    [System.Xml.Serialization.XmlInclude(typeof(Model))]
    public class Script : Model
    {
        [Link] Clock Clock;
        [EventSubscribe("Commencing")]
        private void OnSimulationCommencing(object sender, EventArgs e)
        {
            /*
                days_since_spraying = 0
            */
        }
        [EventSubscribe("DoCalculations")]
        private void OnDoCalculations(object sender, EventArgs e)
        {
            /*
                days_since_spraying = days_since_spraying + 1
            */
        }
        //[EventSubscribe("unknown")]
        //private void OnUnknown(object sender, EventArgs e)
        //{
        /*
                // ----- spray ----- 

if weed.plant_status = 'alive' or weed.plant_status = 'dead' then
   !weed kill_crop
   !weed end_crop
   days_since_spraying = 0
endif


            */
        //}
    }
}
```
              Manager TillManager
```csharp
using System;
using Models.Core;
using Models.PMF;
using Models.PMF;
using Models.Utilities;
using APSIM.Shared.Utilities;
using Models.Soils.Nutrient;
using System.Diagnostics;

namespace Models
{
    [Serializable]
    [System.Xml.Serialization.XmlInclude(typeof(Model))]
    public class Script : Model
    {
        [Link] Clock Clock;
        [ScopedLinkByName] NutrientPool FOMLignin;
        
        [EventSubscribe("Commencing")]
        private void OnSimulationCommencing(object sender, EventArgs e)
        {
        }
        [EventSubscribe("DoManagement")]
        private void OnDoManagement(object sender, EventArgs e)
        {
            //Debugger.Break();
            
            if (Clock.Today.DayOfYear == 60 && Clock.Today.Year == 1982)
            {
                double[] CAdded = new double[] { 11600, 80, 80 };
                double[] NAdded = new double[] { 1450, 10, 10 };
                FOMLignin.Add(CAdded, NAdded);
            }
        }
    }
}
```
              Manager Calculations
                CumRunoff = 0
```csharp
using System;
using Models.Core;
using Models.PMF;
using Models.PMF;
using Models.Soils;
namespace Models
{
    [Serializable]
    [System.Xml.Serialization.XmlInclude(typeof(Model))]
    public class Script : Model
    {
        [Link] Clock Clock;
        [Link] Soil Soil;
        
        public double CumRunoff { get; set; }
        
        [EventSubscribe("Commencing")]
        private void OnSimulationCommencing(object sender, EventArgs e)
        {
/*
                CumRunoff = 0
POC = 0
HOC = 0
TOC = 0
sw40 = 0
sw80 = 0
sw120 = 0
sw200 = 0
Nexport = 0
c10 = 0
c20 = 0
c30 = 0
            */
        }
        [EventSubscribe("DoCalculations")]
        private void OnDoCalculations(object sender, EventArgs e)
        {
            if (Clock.Today.Year > 1983)
                CumRunoff += Soil.SoilWater.Runoff;
                
 
/*
POC = (fom_c(1) + fom_c(2) + fom_c(3) + biom_c(1) + biom_c(2) + biom_c(3))/1000.
HOC = (hum_c(1) + hum_c(2) + hum_c(3))/1000
            TOC = (carbon_tot(1) + carbon_tot(2) + carbon_tot(3)) /1000

!sw40 = sw_dep(1) + sw_dep(2) +sw_dep(3) + sw_dep(4)
!sw80 = sw40 + sw_dep(5) + sw_dep(6)
!sw120 = sw80 + sw_dep(7) + sw_dep(8)
!sw200 = sw120 + sw_dep(9) + sw_dep(10)

sw40 = sw_dep(1) + sw_dep(2) +sw_dep(3) + sw_dep(4)
sw80 = sw_dep(5) + sw_dep(6)
sw120 = sw_dep(7) + sw_dep(8)
sw200 = sw_dep(9) + sw_dep(10) + sw_dep(11) + sw_dep(12)

c10 = carbon_tot(1) + 7590
c20 = carbon_tot(2) + 2460
c30 = carbon_tot(3) + 2600

            */
        }
    }
}
```
              Manager Nrunoff
```csharp
using System;
using Models.Core;
using Models.PMF;
using Models.PMF;
namespace Models
{
    [Serializable]
    [System.Xml.Serialization.XmlInclude(typeof(Model))]
    public class Script : Model
    {
        [Link] Clock Clock;
        [EventSubscribe("Commencing")]
        private void OnSimulationCommencing(object sender, EventArgs e)
        {
            /*
                CumNRunoff = 0
NRunoff = 0
delta = 0
            */
        }
        [EventSubscribe("DoCalculations")]
        private void OnDoCalculations(object sender, EventArgs e)
        {
            /*
                
if (runoff > 0) then
NRunoff = runoff * 0.17
   if no3(1) < NRunoff then
      NRunoff = no3(1)
   endif

   CumNRunoff = CumNRunoff + NRunoff
   delta = NRunoff * -1
    'Upper Nitrogen' set dlt_no3 = delta 0 0 0 0 0 0 0 0 0 0 0

else
   NRunoff = 0
   delta = 0
endif

            */
        }
    }
}
```
            SurfaceOrganicMatter: InitialResidueName=Brigalow; InitialResidueType=all_lign; InitialResidueMass=40000; InitialStandingFraction=0; InitialCPR=0; InitialCNR=30; FractionFaecesAdded=0.5
            Report BrigalowReport: EventNames=[Clock].DoReport
              VariableNames:
                [Clock].Today
                [Wheat].AboveGround.Wt
                [Wheat].Grain.Wt
                [Wheat].Grain.Protein
                sum([Soil].SoilWater.ESW)
                sum([Soil].Nutrient.FOMC) as TotalFOMC
            Soil Upper: SoilType=clay; Site=Jimbour; NearestTown=Jimbour, Q 4352; Region=South East Queensland; NaturalVegetation=Grassland, mainly Qld bluegrass; Latitude=0; Longitude=0
              Water
                Thickness  BD    AirDry  LL15  DUL   SAT
                100        1.38  0.04    0.1   0.35  0.45
                100        1.64  0.06    0.15  0.35  0.45
                100        1.73  0.06    0.18  0.35  0.41
                100        1.74  0.06    0.18  0.35  0.41
                200        1.77  0.06    0.19  0.35  0.38
                200        1.8   0.06    0.2   0.35  0.38
                200        1.83  0.06    0.22  0.34  0.37
                200        1.84  0.06    0.23  0.33  0.37
                200        1.84  0.06    0.23  0.3   0.37
                200        1.85  0.06    0.23  0.3   0.37
                200        1.86  0.06    0.24  0.3   0.37
                200        1.86  0.06    0.24  0.3   0.37
                SoilCrop SorghumSoil
                  LL=[0.1, 0.15, 0.18, 0.18, 0.19, 0.2, 0.24, 0.27, 0.28, 0.28, 0.28, 0.28]
                  KL=[0.04, 0.04, 0.04, 0.04, 0.02, 0.02, 0.02, 0.01, 0.01, 0, 0, 0]
                  XF=[1, 1, 1, 1, 1, 1, 1, 1, 1, 0, 0, 0]
                SoilCrop WheatSoil
                  LL=[0.1, 0.15, 0.18, 0.18, 0.19, 0.2, 0.24, 0.27, 0.28, 0.28, 0.28, 0.28]
                  KL=[0.06, 0.06, 0.06, 0.06, 0.06, 0.06, 0.06, 0.06, 0.06, 0.06, 0.06, 0]
                  XF=[1, 1, 1, 1, 1, 1, 1, 1, 1, 0, 0, 0]
                SoilCrop MaizeSoil
                  LL=[0.1, 0.15, 0.18, 0.18, 0.19, 0.2, 0.24, 0.27, 0.28, 0.28, 0.28, 0.28]
                  KL=[0.04, 0.04, 0.04, 0.04, 0.02, 0.02, 0.02, 0.01, 0.01, 0, 0, 0]
                  XF=[1, 1, 1, 1, 1, 1, 1, 1, 1, 0, 0, 0]
              SoilWater: SummerDate=1-Nov; SummerU=10; SummerCona=4; WinterDate=1-Apr; WinterU=10; WinterCona=4; DiffusConst=40; DiffusSlope=16; Salb=0.13; CN2Bare=72; CNRed=20; CNCov=0.8; max_pond=0; ResidueInterception=0
                Thickness=[100, 100, 100, 100, 200, 200, 200, 200, 200, 200, 200, 200]
                SWCON=[0.3, 0.3, 0.3, 0.3, 0.3, 0.3, 0.3, 0.3, 0.3, 0.3, 0.3, 0.3]
              Nutrient
              SoilOrganicMatter: RootCN=40; RootWt=200; SoilCN=17.6; EnrACoeff=7.4; EnrBCoeff=0.2; OCUnits=Total
                Thickness  OC     FBiom  FInert
                100        1.86   0.05   0.29
                100        0.848  0.05   0.175
                100        0.725  0.05   0.2
                100        0.4    0.01   0.9
                200        0.2    0.01   0.95
                200        0.2    0.01   0.95
                200        0.2    0.01   0.95
                200        0.2    0.01   0.95
                200        0.2    0.01   0.95
                200        0.2    0.01   0.95
                200        0.2    0.01   0.95
                200        0.2    0.01   0.95
              Analysis: PH=[6.6, 7.5, 8, 5, 5, 5, 5, 5, 5, 5, 5, 5]; PHUnits=Water; BoronUnits=HotWater
                Thickness=[100, 100, 100, 100, 200, 200, 200, 200, 200, 200, 200, 200]
              Sample Initial nitrogen: NO3Units=ppm; NH4Units=ppm; SWUnits=Volumetric; OCUnits=Total; PHUnits=Water
                Thickness  NO3      NH4
                100        6.50303  0.599108
                100        2.10101  0.100018
                100        2.10101  0.100018
                100        1.70101  0.100018
                200        1.70101  0.100018
                200        1.70101  0.100018
                200        1.70101  0.100018
                200        1.70101  0.100018
                200        1.70101  0.100018
                200        1.70101  0.100018
                200        1.70101  0.100018
                200        0.1      0.100001
              Sample Initial water: NO3Units=ppm; NH4Units=ppm; SWUnits=Volumetric; OCUnits=Total; PHUnits=Water
                Thickness=[100, 100, 100, 100, 200, 200, 200, 200, 200, 200, 200, 200]
                SW=[0.1, 0.15, 0.18, 0.18, 0.29, 0.26, 0.24, 0.23, 0.23, 0.23, 0.24, 0.24]
              CERESSoilTemperature
            Report ClOutput: VariableNames=[Clock].Today
            MicroClimate: a_interception=0; b_interception=1; c_interception=0; d_interception=0; soil_albedo=0.23; SoilHeatFluxFraction=0.4; NightInterceptionFraction=0.5; ReferenceHeight=2
            Plant Wheat: CropType=Wheat
            SoluteManager
            Report: EventNames=[Clock].DoReport
              VariableNames:
                [Clock].Today
                [Soil].Nutrient.TotalC[1] as TOC0_10cm
                [Soil].Nutrient.TotalC[2] as TOC10_30cm
                [Soil].Nutrient.TotalC[3] as TOC30_60cm
                ([Soil].Nutrient.TotalC[1]+[Soil].Nutrient.TotalC[2]+[Soil].Nutrient.TotalC[3]) as TOC0_30cm
                ([Soil].Nutrient.TotalN[1]+[Soil].Nutrient.NO3[1]+[Soil].Nutrient.NH4[1]) as TON0_10cm
                ([Soil].Nutrient.TotalN[1]+[Soil].Nutrient.TotalN[2]+[Soil].Nutrient.TotalN[3]) as TON0_30cm
            Report HarvestReport: EventNames=[Wheat].Harvesting
              VariableNames:
                [Clock].Today.Year
                [Wheat].Grain.Wt
                [Wheat].AboveGround.Wt
                [Wheat].Grain.Size
            Manager Harvest
```csharp
using System;
using Models.Core;
using Models.PMF;
using Models.Soils;
using Models.Utilities;
using APSIM.Shared.Utilities;

namespace Models
{
    [Serializable]
    public class Script : Model
    {
        [Link] Plant Wheat;

        [EventSubscribe("DoManagement")]
        private void OnDoManagement(object sender, EventArgs e)
        {
            if (Wheat.IsReadyForHarvesting)
            {
               Wheat.Harvest();
               Wheat.EndCrop();    
            }
        
        }
        
    }
}
```
          SoilArbitrator
          MicroClimate: a_interception=0; b_interception=1; c_interception=0; d_interception=0; soil_albedo=0.23; SoilHeatFluxFraction=0.4; NightInterceptionFraction=0.5; ReferenceHeight=2
    Folder North America
      Folder Pendleton
        Experiment Pendleton
          Factors
            Factor Treatment: Specifications=[Operations]
              Operations 6_fBN0
                1931-08-15  [SurfaceOrganicMatter].Incorporate(fraction: 0.67, depth: 0)
                1931-10-15  [Wheat].Sow(cultivar:Rex, depth:30, population:100, rowSpacing:300);
                1933-08-15  [SurfaceOrganicMatter].Incorporate(fraction: 0.67, depth: 0)
                1933-10-15  [Wheat].Sow(cultivar:Rex, depth:30, population:100, rowSpacing:300);
                1935-08-15  [SurfaceOrganicMatter].Incorporate(fraction: 0.67, depth: 0)
                1935-10-15  [Wheat].Sow(cultivar:Rex, depth:30, population:100, rowSpacing:300);
                1937-08-15  [SurfaceOrganicMatter].Incorporate(fraction: 0.67, depth: 0)
                1937-10-15  [Wheat].Sow(cultivar:Rex, depth:30, population:100, rowSpacing:300);
                1939-08-15  [SurfaceOrganicMatter].Incorporate(fraction: 0.67, depth: 0)
                1939-10-15  [Wheat].Sow(cultivar:Rex, depth:30, population:100, rowSpacing:300);
                1941-08-15  [SurfaceOrganicMatter].Incorporate(fraction: 0.67, depth: 0)
                1941-10-15  [Wheat].Sow(cultivar:Rex, depth:30, population:100, rowSpacing:300);
                1943-08-15  [SurfaceOrganicMatter].Incorporate(fraction: 0.67, depth: 0)
                1943-10-15  [Wheat].Sow(cultivar:Rex, depth:30, population:100, rowSpacing:300);
                1945-08-15  [SurfaceOrganicMatter].Incorporate(fraction: 0.67, depth: 0)
                1945-10-15  [Wheat].Sow(cultivar:Rex, depth:30, population:100, rowSpacing:300);
                1947-08-15  [SurfaceOrganicMatter].Incorporate(fraction: 0.67, depth: 0)
                1947-10-15  [Wheat].Sow(cultivar:Rex, depth:30, population:100, rowSpacing:300);
                1949-08-15  [SurfaceOrganicMatter].Incorporate(fraction: 0.67, depth: 0)
                1949-10-15  [Wheat].Sow(cultivar:Rex, depth:30, population:100, rowSpacing:300);
                1951-08-15  [SurfaceOrganicMatter].Incorporate(fraction: 0.67, depth: 0)
                1951-10-15  [Wheat].Sow(cultivar:Rex, depth:30, population:100, rowSpacing:300);
                1953-08-15  [SurfaceOrganicMatter].Incorporate(fraction: 0.67, depth: 0)
                1953-10-15  [Wheat].Sow(cultivar:Rex, depth:30, population:100, rowSpacing:300);
                1955-08-15  [SurfaceOrganicMatter].Incorporate(fraction: 0.67, depth: 0)
                1955-10-15  [Wheat].Sow(cultivar:Rex, depth:30, population:100, rowSpacing:300);
                1957-08-15  [SurfaceOrganicMatter].Incorporate(fraction: 0.67, depth: 0)
                1957-10-15  [Wheat].Sow(cultivar:Rex, depth:30, population:100, rowSpacing:300);
                1959-08-15  [SurfaceOrganicMatter].Incorporate(fraction: 0.67, depth: 0)
                1959-10-15  [Wheat].Sow(cultivar:Rex, depth:30, population:100, rowSpacing:300);
                1961-08-15  [SurfaceOrganicMatter].Incorporate(fraction: 0.67, depth: 0)
                1961-10-15  [Wheat].Sow(cultivar:Rex, depth:30, population:100, rowSpacing:300);
                1963-08-15  [SurfaceOrganicMatter].Incorporate(fraction: 0.67, depth: 0)
                1963-10-15  [Wheat].Sow(cultivar:Rex, depth:30, population:100, rowSpacing:300);
                1965-08-15  [SurfaceOrganicMatter].Incorporate(fraction: 0.67, depth: 0)
                1965-10-15  [Wheat].Sow(cultivar:Stephens, depth:30, population:150, rowSpacing:300);
                1957-08-15  [SurfaceOrganicMatter].Incorporate(fraction: 0.67, depth: 0)
                1967-10-15  [Wheat].Sow(cultivar:Stephens, depth:30, population:150, rowSpacing:300);
                1969-08-15  [SurfaceOrganicMatter].Incorporate(fraction: 0.67, depth: 0)
                1969-10-15  [Wheat].Sow(cultivar:Stephens, depth:30, population:150, rowSpacing:300);
                1971-08-15  [SurfaceOrganicMatter].Incorporate(fraction: 0.67, depth: 0)
                1971-10-15  [Wheat].Sow(cultivar:Stephens, depth:30, population:150, rowSpacing:300);
                1973-08-15  [SurfaceOrganicMatter].Incorporate(fraction: 0.67, depth: 0)
                1973-10-15  [Wheat].Sow(cultivar:Stephens, depth:30, population:150, rowSpacing:300);
                1975-08-15  [SurfaceOrganicMatter].Incorporate(fraction: 0.67, depth: 0)
                1975-10-15  [Wheat].Sow(cultivar:Stephens, depth:30, population:150, rowSpacing:300);
                1977-08-15  [SurfaceOrganicMatter].Incorporate(fraction: 0.67, depth: 0)
                1977-10-15  [Wheat].Sow(cultivar:Stephens, depth:30, population:150, rowSpacing:300);
                1979-08-15  [SurfaceOrganicMatter].Incorporate(fraction: 0.67, depth: 0)
                1979-10-15  [Wheat].Sow(cultivar:Stephens, depth:30, population:150, rowSpacing:300);
                1981-08-15  [SurfaceOrganicMatter].Incorporate(fraction: 0.67, depth: 0)
                1981-10-15  [Wheat].Sow(cultivar:Stephens, depth:30, population:150, rowSpacing:300);
                1983-08-15  [SurfaceOrganicMatter].Incorporate(fraction: 0.67, depth: 0)
                1983-10-15  [Wheat].Sow(cultivar:Stephens, depth:30, population:150, rowSpacing:300);
                1985-08-15  [SurfaceOrganicMatter].Incorporate(fraction: 0.67, depth: 0)
                1985-10-15  [Wheat].Sow(cultivar:Stephens, depth:30, population:150, rowSpacing:300);
                1987-08-15  [SurfaceOrganicMatter].Incorporate(fraction: 0.67, depth: 0)
                1987-10-15  [Wheat].Sow(cultivar:Stephens, depth:30, population:150, rowSpacing:300);
                1989-08-15  [SurfaceOrganicMatter].Incorporate(fraction: 0.67, depth: 0)
                1989-10-15  [Wheat].Sow(cultivar:Stephens, depth:30, population:150, rowSpacing:300);
                1991-08-15  [SurfaceOrganicMatter].Incorporate(fraction: 0.67, depth: 0)
                1991-10-15  [Wheat].Sow(cultivar:Stephens, depth:30, population:150, rowSpacing:300);
                1993-08-15  [SurfaceOrganicMatter].Incorporate(fraction: 0.67, depth: 0)
                1993-10-15  [Wheat].Sow(cultivar:Stephens, depth:30, population:150, rowSpacing:300);
                1995-08-15  [SurfaceOrganicMatter].Incorporate(fraction: 0.67, depth: 0)
                1995-10-15  [Wheat].Sow(cultivar:Stephens, depth:30, population:150, rowSpacing:300);
                1997-08-15  [SurfaceOrganicMatter].Incorporate(fraction: 0.67, depth: 0)
                1997-10-15  [Wheat].Sow(cultivar:Stephens, depth:30, population:150, rowSpacing:300);
                1999-08-15  [SurfaceOrganicMatter].Incorporate(fraction: 0.67, depth: 0)
                1999-10-15  [Wheat].Sow(cultivar:Stephens, depth:30, population:150, rowSpacing:300);
              Operations 7_sBN0
                1931-04-15  [SurfaceOrganicMatter].Incorporate(fraction: 0.55, depth: 0)
                1931-10-15  [Wheat].Sow(cultivar:Rex, depth:30, population:100, rowSpacing:300);
                1933-04-15  [SurfaceOrganicMatter].Incorporate(fraction: 0.55, depth: 0)
                1933-10-15  [Wheat].Sow(cultivar:Rex, depth:30, population:100, rowSpacing:300);
                1935-04-15  [SurfaceOrganicMatter].Incorporate(fraction: 0.55, depth: 0)
                1935-10-15  [Wheat].Sow(cultivar:Rex, depth:30, population:100, rowSpacing:300);
                1937-04-15  [SurfaceOrganicMatter].Incorporate(fraction: 0.55, depth: 0)
                1937-10-15  [Wheat].Sow(cultivar:Rex, depth:30, population:100, rowSpacing:300);
                1939-04-15  [SurfaceOrganicMatter].Incorporate(fraction: 0.55, depth: 0)
                1939-10-15  [Wheat].Sow(cultivar:Rex, depth:30, population:100, rowSpacing:300);
                1941-04-15  [SurfaceOrganicMatter].Incorporate(fraction: 0.55, depth: 0)
                1941-10-15  [Wheat].Sow(cultivar:Rex, depth:30, population:100, rowSpacing:300);
                1943-04-15  [SurfaceOrganicMatter].Incorporate(fraction: 0.55, depth: 0)
                1943-10-15  [Wheat].Sow(cultivar:Rex, depth:30, population:100, rowSpacing:300);
                1945-04-15  [SurfaceOrganicMatter].Incorporate(fraction: 0.55, depth: 0)
                1945-10-15  [Wheat].Sow(cultivar:Rex, depth:30, population:100, rowSpacing:300);
                1947-04-15  [SurfaceOrganicMatter].Incorporate(fraction: 0.55, depth: 0)
                1947-10-15  [Wheat].Sow(cultivar:Rex, depth:30, population:100, rowSpacing:300);
                1949-04-15  [SurfaceOrganicMatter].Incorporate(fraction: 0.55, depth: 0)
                1949-10-15  [Wheat].Sow(cultivar:Rex, depth:30, population:100, rowSpacing:300);
                1951-04-15  [SurfaceOrganicMatter].Incorporate(fraction: 0.55, depth: 0)
                1951-10-15  [Wheat].Sow(cultivar:Rex, depth:30, population:100, rowSpacing:300);
                1953-04-15  [SurfaceOrganicMatter].Incorporate(fraction: 0.55, depth: 0)
                1953-10-15  [Wheat].Sow(cultivar:Rex, depth:30, population:100, rowSpacing:300);
                1955-04-15  [SurfaceOrganicMatter].Incorporate(fraction: 0.55, depth: 0)
                1955-10-15  [Wheat].Sow(cultivar:Rex, depth:30, population:100, rowSpacing:300);
                1957-04-15  [SurfaceOrganicMatter].Incorporate(fraction: 0.55, depth: 0)
                1957-10-15  [Wheat].Sow(cultivar:Rex, depth:30, population:100, rowSpacing:300);
                1959-04-15  [SurfaceOrganicMatter].Incorporate(fraction: 0.55, depth: 0)
                1959-10-15  [Wheat].Sow(cultivar:Rex, depth:30, population:100, rowSpacing:300);
                1961-04-15  [SurfaceOrganicMatter].Incorporate(fraction: 0.55, depth: 0)
                1961-10-15  [Wheat].Sow(cultivar:Rex, depth:30, population:100, rowSpacing:300);
                1963-04-15  [SurfaceOrganicMatter].Incorporate(fraction: 0.55, depth: 0)
                1963-10-15  [Wheat].Sow(cultivar:Rex, depth:30, population:100, rowSpacing:300);
                1965-04-15  [SurfaceOrganicMatter].Incorporate(fraction: 0.55, depth: 0)
                1965-10-15  [Wheat].Sow(cultivar:Stephens, depth:30, population:150, rowSpacing:300);
                1967-04-15  [SurfaceOrganicMatter].Incorporate(fraction: 0.55, depth: 0)
                1967-10-15  [Wheat].Sow(cultivar:Stephens, depth:30, population:150, rowSpacing:300);
                1969-04-15  [SurfaceOrganicMatter].Incorporate(fraction: 0.55, depth: 0)
                1969-10-15  [Wheat].Sow(cultivar:Stephens, depth:30, population:150, rowSpacing:300);
                1971-04-15  [SurfaceOrganicMatter].Incorporate(fraction: 0.55, depth: 0)
                1971-10-15  [Wheat].Sow(cultivar:Stephens, depth:30, population:150, rowSpacing:300);
                1973-04-15  [SurfaceOrganicMatter].Incorporate(fraction: 0.55, depth: 0)
                1973-10-15  [Wheat].Sow(cultivar:Stephens, depth:30, population:150, rowSpacing:300);
                1975-04-15  [SurfaceOrganicMatter].Incorporate(fraction: 0.55, depth: 0)
                1975-10-15  [Wheat].Sow(cultivar:Stephens, depth:30, population:150, rowSpacing:300);
                1977-04-15  [SurfaceOrganicMatter].Incorporate(fraction: 0.55, depth: 0)
                1977-10-15  [Wheat].Sow(cultivar:Stephens, depth:30, population:150, rowSpacing:300);
                1979-04-15  [SurfaceOrganicMatter].Incorporate(fraction: 0.55, depth: 0)
                1979-10-15  [Wheat].Sow(cultivar:Stephens, depth:30, population:150, rowSpacing:300);
                1981-04-15  [SurfaceOrganicMatter].Incorporate(fraction: 0.55, depth: 0)
                1981-10-15  [Wheat].Sow(cultivar:Stephens, depth:30, population:150, rowSpacing:300);
                1983-04-15  [SurfaceOrganicMatter].Incorporate(fraction: 0.55, depth: 0)
                1983-10-15  [Wheat].Sow(cultivar:Stephens, depth:30, population:150, rowSpacing:300);
                1985-04-15  [SurfaceOrganicMatter].Incorporate(fraction: 0.55, depth: 0)
                1985-10-15  [Wheat].Sow(cultivar:Stephens, depth:30, population:150, rowSpacing:300);
                1987-04-15  [SurfaceOrganicMatter].Incorporate(fraction: 0.55, depth: 0)
                1987-10-15  [Wheat].Sow(cultivar:Stephens, depth:30, population:150, rowSpacing:300);
                1989-04-15  [SurfaceOrganicMatter].Incorporate(fraction: 0.55, depth: 0)
                1989-10-15  [Wheat].Sow(cultivar:Stephens, depth:30, population:150, rowSpacing:300);
                1991-04-15  [SurfaceOrganicMatter].Incorporate(fraction: 0.55, depth: 0)
                1991-10-15  [Wheat].Sow(cultivar:Stephens, depth:30, population:150, rowSpacing:300);
                1993-04-15  [SurfaceOrganicMatter].Incorporate(fraction: 0.55, depth: 0)
                1993-10-15  [Wheat].Sow(cultivar:Stephens, depth:30, population:150, rowSpacing:300);
                1995-04-15  [SurfaceOrganicMatter].Incorporate(fraction: 0.55, depth: 0)
                1995-10-15  [Wheat].Sow(cultivar:Stephens, depth:30, population:150, rowSpacing:300);
                1997-04-15  [SurfaceOrganicMatter].Incorporate(fraction: 0.55, depth: 0)
                1997-10-15  [Wheat].Sow(cultivar:Stephens, depth:30, population:150, rowSpacing:300);
                1999-04-15  [SurfaceOrganicMatter].Incorporate(fraction: 0.55, depth: 0)
                1999-10-15  [Wheat].Sow(cultivar:Stephens, depth:30, population:150, rowSpacing:300);
              Operations 0_nBN0
                1931-10-15  [Wheat].Sow(cultivar:Rex, depth:30, population:100, rowSpacing:300);
                1933-10-15  [Wheat].Sow(cultivar:Rex, depth:30, population:100, rowSpacing:300);
                1935-10-15  [Wheat].Sow(cultivar:Rex, depth:30, population:100, rowSpacing:300);
                1937-10-15  [Wheat].Sow(cultivar:Rex, depth:30, population:100, rowSpacing:300);
                1939-10-15  [Wheat].Sow(cultivar:Rex, depth:30, population:100, rowSpacing:300);
                1941-10-15  [Wheat].Sow(cultivar:Rex, depth:30, population:100, rowSpacing:300);
                1943-10-15  [Wheat].Sow(cultivar:Rex, depth:30, population:100, rowSpacing:300);
                1945-10-15  [Wheat].Sow(cultivar:Rex, depth:30, population:100, rowSpacing:300);
                1947-10-15  [Wheat].Sow(cultivar:Rex, depth:30, population:100, rowSpacing:300);
                1949-10-15  [Wheat].Sow(cultivar:Rex, depth:30, population:100, rowSpacing:300);
                1951-10-15  [Wheat].Sow(cultivar:Rex, depth:30, population:100, rowSpacing:300);
                1953-10-15  [Wheat].Sow(cultivar:Rex, depth:30, population:100, rowSpacing:300);
                1955-10-15  [Wheat].Sow(cultivar:Rex, depth:30, population:100, rowSpacing:300);
                1957-10-15  [Wheat].Sow(cultivar:Rex, depth:30, population:100, rowSpacing:300);
                1959-10-15  [Wheat].Sow(cultivar:Rex, depth:30, population:100, rowSpacing:300);
                1961-10-15  [Wheat].Sow(cultivar:Rex, depth:30, population:100, rowSpacing:300);
                1963-10-15  [Wheat].Sow(cultivar:Rex, depth:30, population:100, rowSpacing:300);
                1965-10-15  [Wheat].Sow(cultivar:Stephens, depth:30, population:150, rowSpacing:300);
                1967-10-15  [Wheat].Sow(cultivar:Stephens, depth:30, population:150, rowSpacing:300);
                1969-10-15  [Wheat].Sow(cultivar:Stephens, depth:30, population:150, rowSpacing:300);
                1971-10-15  [Wheat].Sow(cultivar:Stephens, depth:30, population:150, rowSpacing:300);
                1973-10-15  [Wheat].Sow(cultivar:Stephens, depth:30, population:150, rowSpacing:300);
                1975-10-15  [Wheat].Sow(cultivar:Stephens, depth:30, population:150, rowSpacing:300);
                1977-10-15  [Wheat].Sow(cultivar:Stephens, depth:30, population:150, rowSpacing:300);
                1979-10-15  [Wheat].Sow(cultivar:Stephens, depth:30, population:150, rowSpacing:300);
                1981-10-15  [Wheat].Sow(cultivar:Stephens, depth:30, population:150, rowSpacing:300);
                1983-10-15  [Wheat].Sow(cultivar:Stephens, depth:30, population:150, rowSpacing:300);
                1985-10-15  [Wheat].Sow(cultivar:Stephens, depth:30, population:150, rowSpacing:300);
                1987-10-15  [Wheat].Sow(cultivar:Stephens, depth:30, population:150, rowSpacing:300);
                1989-10-15  [Wheat].Sow(cultivar:Stephens, depth:30, population:150, rowSpacing:300);
                1991-10-15  [Wheat].Sow(cultivar:Stephens, depth:30, population:150, rowSpacing:300);
                1993-10-15  [Wheat].Sow(cultivar:Stephens, depth:30, population:150, rowSpacing:300);
                1995-10-15  [Wheat].Sow(cultivar:Stephens, depth:30, population:150, rowSpacing:300);
                1997-10-15  [Wheat].Sow(cultivar:Stephens, depth:30, population:150, rowSpacing:300);
                1999-10-15  [Wheat].Sow(cultivar:Stephens, depth:30, population:150, rowSpacing:300);
              Operations 2_sBN45
                1931-08-15  [SurfaceOrganicMatter].Incorporate(fraction: 0.6, depth: 200)
                1931-10-15  [Wheat].Sow(cultivar:Rex, depth:30, population:100, rowSpacing:300);
                1933-08-15  [SurfaceOrganicMatter].Incorporate(fraction: 0.6, depth: 200)
                1933-10-15  [Wheat].Sow(cultivar:Rex, depth:30, population:100, rowSpacing:300);
                1935-08-15  [SurfaceOrganicMatter].Incorporate(fraction: 0.6, depth: 200)
                1935-10-15  [Wheat].Sow(cultivar:Rex, depth:30, population:100, rowSpacing:300);
                1937-08-15  [SurfaceOrganicMatter].Incorporate(fraction: 0.6, depth: 200)
                1937-10-15  [Wheat].Sow(cultivar:Rex, depth:30, population:100, rowSpacing:300);
                1939-08-15  [SurfaceOrganicMatter].Incorporate(fraction: 0.6, depth: 200)
                1939-10-15  [Wheat].Sow(cultivar:Rex, depth:30, population:100, rowSpacing:300);
                1941-08-15  [SurfaceOrganicMatter].Incorporate(fraction: 0.6, depth: 200)
                1941-10-15  [Wheat].Sow(cultivar:Rex, depth:30, population:100, rowSpacing:300);
                1943-08-15  [SurfaceOrganicMatter].Incorporate(fraction: 0.6, depth: 200)
                1943-10-15  [Wheat].Sow(cultivar:Rex, depth:30, population:100, rowSpacing:300);
                1945-08-15  [SurfaceOrganicMatter].Incorporate(fraction: 0.6, depth: 200)
                1945-10-15  [Wheat].Sow(cultivar:Rex, depth:30, population:100, rowSpacing:300);
                1947-08-15  [SurfaceOrganicMatter].Incorporate(fraction: 0.6, depth: 200)
                1947-10-15  [Wheat].Sow(cultivar:Rex, depth:30, population:100, rowSpacing:300);
                1949-08-15  [SurfaceOrganicMatter].Incorporate(fraction: 0.6, depth: 200)
                1949-10-15  [Wheat].Sow(cultivar:Rex, depth:30, population:100, rowSpacing:300);
                1951-08-15  [SurfaceOrganicMatter].Incorporate(fraction: 0.6, depth: 200)
                1951-10-15  [Wheat].Sow(cultivar:Rex, depth:30, population:100, rowSpacing:300);
                1953-08-15  [SurfaceOrganicMatter].Incorporate(fraction: 0.6, depth: 200)
                1953-10-15  [Wheat].Sow(cultivar:Rex, depth:30, population:100, rowSpacing:300);
                1955-08-15  [SurfaceOrganicMatter].Incorporate(fraction: 0.6, depth: 200)
                1955-10-15  [Wheat].Sow(cultivar:Rex, depth:30, population:100, rowSpacing:300);
                1957-08-15  [SurfaceOrganicMatter].Incorporate(fraction: 0.6, depth: 200)
                1957-10-15  [Wheat].Sow(cultivar:Rex, depth:30, population:100, rowSpacing:300);
                1959-08-15  [SurfaceOrganicMatter].Incorporate(fraction: 0.6, depth: 200)
                1959-10-15  [Wheat].Sow(cultivar:Rex, depth:30, population:100, rowSpacing:300);
                1961-08-15  [SurfaceOrganicMatter].Incorporate(fraction: 0.6, depth: 200)
                1961-10-15  [Wheat].Sow(cultivar:Rex, depth:30, population:100, rowSpacing:300);
                1963-08-15  [SurfaceOrganicMatter].Incorporate(fraction: 0.6, depth: 200)
                1963-10-15  [Wheat].Sow(cultivar:Rex, depth:30, population:100, rowSpacing:300);
                1965-08-15  [SurfaceOrganicMatter].Incorporate(fraction: 0.6, depth: 200)
                1965-10-15  [Wheat].Sow(cultivar:Stephens, depth:30, population:150, rowSpacing:300);
                1967-10-15  [Fertiliser].Apply(Amount: 45, Type: Fertiliser.Types.NO3N);
                1967-10-15  [Wheat].Sow(cultivar:Stephens, depth:30, population:150, rowSpacing:300);
                1969-10-15  [Fertiliser].Apply(Amount: 45, Type: Fertiliser.Types.NO3N);
                1969-10-15  [Wheat].Sow(cultivar:Stephens, depth:30, population:150, rowSpacing:300);
                1971-10-15  [Fertiliser].Apply(Amount: 45, Type: Fertiliser.Types.NO3N);
                1971-10-15  [Wheat].Sow(cultivar:Stephens, depth:30, population:150, rowSpacing:300);
                1973-10-15  [Fertiliser].Apply(Amount: 45, Type: Fertiliser.Types.NO3N);
                1973-10-15  [Wheat].Sow(cultivar:Stephens, depth:30, population:150, rowSpacing:300);
                1975-10-15  [Fertiliser].Apply(Amount: 45, Type: Fertiliser.Types.NO3N);
                1975-10-15  [Wheat].Sow(cultivar:Stephens, depth:30, population:150, rowSpacing:300);
                1977-10-15  [Fertiliser].Apply(Amount: 45, Type: Fertiliser.Types.NO3N);
                1977-10-15  [Wheat].Sow(cultivar:Stephens, depth:30, population:150, rowSpacing:300);
                1979-10-15  [Fertiliser].Apply(Amount: 45, Type: Fertiliser.Types.NO3N);
                1979-10-15  [Wheat].Sow(cultivar:Stephens, depth:30, population:150, rowSpacing:300);
                1981-04-15  [SurfaceOrganicMatter].Incorporate(fraction: 0.55, depth: 0)
                1981-10-15  [Fertiliser].Apply(Amount: 45, Type: Fertiliser.Types.NO3N);
                1981-10-15  [Wheat].Sow(cultivar:Stephens, depth:30, population:150, rowSpacing:300);
                1983-04-15  [SurfaceOrganicMatter].Incorporate(fraction: 0.55, depth: 0)
                1983-10-15  [Fertiliser].Apply(Amount: 45, Type: Fertiliser.Types.NO3N);
                1983-10-15  [Wheat].Sow(cultivar:Stephens, depth:30, population:150, rowSpacing:300);
                1985-04-15  [SurfaceOrganicMatter].Incorporate(fraction: 0.55, depth: 0)
                1985-10-15  [Fertiliser].Apply(Amount: 45, Type: Fertiliser.Types.NO3N);
                1985-10-15  [Wheat].Sow(cultivar:Stephens, depth:30, population:150, rowSpacing:300);
                1987-04-15  [SurfaceOrganicMatter].Incorporate(fraction: 0.55, depth: 0)
                1987-10-15  [Fertiliser].Apply(Amount: 45, Type: Fertiliser.Types.NO3N);
                1987-10-15  [Wheat].Sow(cultivar:Stephens, depth:30, population:150, rowSpacing:300);
                1989-04-15  [SurfaceOrganicMatter].Incorporate(fraction: 0.55, depth: 0)
                1989-10-15  [Fertiliser].Apply(Amount: 45, Type: Fertiliser.Types.NO3N);
                1989-10-15  [Wheat].Sow(cultivar:Stephens, depth:30, population:150, rowSpacing:300);
                1991-04-15  [SurfaceOrganicMatter].Incorporate(fraction: 0.55, depth: 0)
                1991-10-15  [Fertiliser].Apply(Amount: 45, Type: Fertiliser.Types.NO3N);
                1991-10-15  [Wheat].Sow(cultivar:Stephens, depth:30, population:150, rowSpacing:300);
                1993-04-15  [SurfaceOrganicMatter].Incorporate(fraction: 0.55, depth: 0)
                1993-10-15  [Fertiliser].Apply(Amount: 45, Type: Fertiliser.Types.NO3N);
                1993-10-15  [Wheat].Sow(cultivar:Stephens, depth:30, population:150, rowSpacing:300);
                1995-04-15  [SurfaceOrganicMatter].Incorporate(fraction: 0.55, depth: 0)
                1995-10-15  [Fertiliser].Apply(Amount: 45, Type: Fertiliser.Types.NO3N);
                1995-10-15  [Wheat].Sow(cultivar:Stephens, depth:30, population:150, rowSpacing:300);
                1997-04-15  [SurfaceOrganicMatter].Incorporate(fraction: 0.55, depth: 0)
                1997-10-15  [Fertiliser].Apply(Amount: 45, Type: Fertiliser.Types.NO3N);
                1997-10-15  [Wheat].Sow(cultivar:Stephens, depth:30, population:150, rowSpacing:300);
                1999-04-15  [SurfaceOrganicMatter].Incorporate(fraction: 0.55, depth: 0)
                1999-10-15  [Fertiliser].Apply(Amount: 45, Type: Fertiliser.Types.NO3N);
                1999-10-15  [Wheat].Sow(cultivar:Stephens, depth:30, population:150, rowSpacing:300);
              Operations 3_sBN90
                1931-04-01  [SurfaceOrganicMatter].Incorporate(fraction: 0.6, depth: 200)
                1931-10-15  [Wheat].Sow(cultivar:Rex, depth:30, population:100, rowSpacing:300);
                1933-04-01  [SurfaceOrganicMatter].Incorporate(fraction: 0.6, depth: 200)
                1933-10-15  [Wheat].Sow(cultivar:Rex, depth:30, population:100, rowSpacing:300);
                1935-04-01  [SurfaceOrganicMatter].Incorporate(fraction: 0.6, depth: 200)
                1935-10-15  [Wheat].Sow(cultivar:Rex, depth:30, population:100, rowSpacing:300);
                1937-04-01  [SurfaceOrganicMatter].Incorporate(fraction: 0.6, depth: 200)
                1937-10-15  [Wheat].Sow(cultivar:Rex, depth:30, population:100, rowSpacing:300);
                1939-04-01  [SurfaceOrganicMatter].Incorporate(fraction: 0.6, depth: 200)
                1939-10-15  [Wheat].Sow(cultivar:Rex, depth:30, population:100, rowSpacing:300);
                1941-04-01  [SurfaceOrganicMatter].Incorporate(fraction: 0.6, depth: 200)
                1941-10-15  [Wheat].Sow(cultivar:Rex, depth:30, population:100, rowSpacing:300);
                1943-04-01  [SurfaceOrganicMatter].Incorporate(fraction: 0.6, depth: 200)
                1943-10-15  [Wheat].Sow(cultivar:Rex, depth:30, population:100, rowSpacing:300);
                1945-04-01  [SurfaceOrganicMatter].Incorporate(fraction: 0.6, depth: 200)
                1945-10-15  [Wheat].Sow(cultivar:Rex, depth:30, population:100, rowSpacing:300);
                1947-04-01  [SurfaceOrganicMatter].Incorporate(fraction: 0.6, depth: 200)
                1947-10-15  [Wheat].Sow(cultivar:Rex, depth:30, population:100, rowSpacing:300);
                1949-04-01  [SurfaceOrganicMatter].Incorporate(fraction: 0.6, depth: 200)
                1949-10-15  [Wheat].Sow(cultivar:Rex, depth:30, population:100, rowSpacing:300);
                1951-04-01  [SurfaceOrganicMatter].Incorporate(fraction: 0.6, depth: 200)
                1951-10-15  [Wheat].Sow(cultivar:Rex, depth:30, population:100, rowSpacing:300);
                1953-04-01  [SurfaceOrganicMatter].Incorporate(fraction: 0.6, depth: 200)
                1953-10-15  [Wheat].Sow(cultivar:Rex, depth:30, population:100, rowSpacing:300);
                1955-04-01  [SurfaceOrganicMatter].Incorporate(fraction: 0.6, depth: 200)
                1955-10-15  [Wheat].Sow(cultivar:Rex, depth:30, population:100, rowSpacing:300);
                1957-04-01  [SurfaceOrganicMatter].Incorporate(fraction: 0.6, depth: 200)
                1957-10-15  [Wheat].Sow(cultivar:Rex, depth:30, population:100, rowSpacing:300);
                1959-04-01  [SurfaceOrganicMatter].Incorporate(fraction: 0.6, depth: 200)
                1959-10-15  [Wheat].Sow(cultivar:Rex, depth:30, population:100, rowSpacing:300);
                1961-04-01  [SurfaceOrganicMatter].Incorporate(fraction: 0.6, depth: 200)
                1961-10-15  [Wheat].Sow(cultivar:Rex, depth:30, population:100, rowSpacing:300);
                1963-04-01  [SurfaceOrganicMatter].Incorporate(fraction: 0.6, depth: 200)
                1963-10-15  [Wheat].Sow(cultivar:Rex, depth:30, population:100, rowSpacing:300);
                1965-04-01  [SurfaceOrganicMatter].Incorporate(fraction: 0.6, depth: 200)
                1965-10-15  [Wheat].Sow(cultivar:Stephens, depth:30, population:150, rowSpacing:300);
                1967-10-15  [Fertiliser].Apply(Amount: 90, Type: Fertiliser.Types.NO3N);
                1967-10-15  [Wheat].Sow(cultivar:Stephens, depth:30, population:150, rowSpacing:300);
                1969-10-15  [Fertiliser].Apply(Amount: 90, Type: Fertiliser.Types.NO3N);
                1969-10-15  [Wheat].Sow(cultivar:Stephens, depth:30, population:150, rowSpacing:300);
                1971-10-15  [Fertiliser].Apply(Amount: 90, Type: Fertiliser.Types.NO3N);
                1971-10-15  [Wheat].Sow(cultivar:Stephens, depth:30, population:150, rowSpacing:300);
                1973-10-15  [Fertiliser].Apply(Amount: 90, Type: Fertiliser.Types.NO3N);
                1973-10-15  [Wheat].Sow(cultivar:Stephens, depth:30, population:150, rowSpacing:300);
                1975-10-15  [Fertiliser].Apply(Amount: 90, Type: Fertiliser.Types.NO3N);
                1975-10-15  [Wheat].Sow(cultivar:Stephens, depth:30, population:150, rowSpacing:300);
                1977-10-15  [Fertiliser].Apply(Amount: 90, Type: Fertiliser.Types.NO3N);
                1977-10-15  [Wheat].Sow(cultivar:Stephens, depth:30, population:150, rowSpacing:300);
                1979-10-15  [Fertiliser].Apply(Amount: 90, Type: Fertiliser.Types.NO3N);
                1979-10-15  [Wheat].Sow(cultivar:Stephens, depth:30, population:150, rowSpacing:300);
                1981-04-15  [SurfaceOrganicMatter].Incorporate(fraction: 0.55, depth: 0)
                1981-10-15  [Fertiliser].Apply(Amount: 90, Type: Fertiliser.Types.NO3N);
                1981-10-15  [Wheat].Sow(cultivar:Stephens, depth:30, population:150, rowSpacing:300);
                1983-04-15  [SurfaceOrganicMatter].Incorporate(fraction: 0.55, depth: 0)
                1983-10-15  [Fertiliser].Apply(Amount: 90, Type: Fertiliser.Types.NO3N);
                1983-10-15  [Wheat].Sow(cultivar:Stephens, depth:30, population:150, rowSpacing:300);
                1985-04-15  [SurfaceOrganicMatter].Incorporate(fraction: 0.55, depth: 0)
                1985-10-15  [Fertiliser].Apply(Amount: 90, Type: Fertiliser.Types.NO3N);
                1985-10-15  [Wheat].Sow(cultivar:Stephens, depth:30, population:150, rowSpacing:300);
                1987-04-15  [SurfaceOrganicMatter].Incorporate(fraction: 0.55, depth: 0)
                1987-10-15  [Fertiliser].Apply(Amount: 90, Type: Fertiliser.Types.NO3N);
                1987-10-15  [Wheat].Sow(cultivar:Stephens, depth:30, population:150, rowSpacing:300);
                1989-04-15  [SurfaceOrganicMatter].Incorporate(fraction: 0.55, depth: 0)
                1989-10-15  [Fertiliser].Apply(Amount: 90, Type: Fertiliser.Types.NO3N);
                1989-10-15  [Wheat].Sow(cultivar:Stephens, depth:30, population:150, rowSpacing:300);
                1991-04-15  [SurfaceOrganicMatter].Incorporate(fraction: 0.55, depth: 0)
                1991-10-15  [Fertiliser].Apply(Amount: 90, Type: Fertiliser.Types.NO3N);
                1991-10-15  [Wheat].Sow(cultivar:Stephens, depth:30, population:150, rowSpacing:300);
                1993-04-15  [SurfaceOrganicMatter].Incorporate(fraction: 0.55, depth: 0)
                1993-10-15  [Fertiliser].Apply(Amount: 90, Type: Fertiliser.Types.NO3N);
                1993-10-15  [Wheat].Sow(cultivar:Stephens, depth:30, population:150, rowSpacing:300);
                1995-04-15  [SurfaceOrganicMatter].Incorporate(fraction: 0.55, depth: 0)
                1995-10-15  [Fertiliser].Apply(Amount: 90, Type: Fertiliser.Types.NO3N);
                1995-10-15  [Wheat].Sow(cultivar:Stephens, depth:30, population:150, rowSpacing:300);
                1997-04-15  [SurfaceOrganicMatter].Incorporate(fraction: 0.55, depth: 0)
                1997-10-15  [Fertiliser].Apply(Amount: 90, Type: Fertiliser.Types.NO3N);
                1997-10-15  [Wheat].Sow(cultivar:Stephens, depth:30, population:150, rowSpacing:300);
                1999-04-15  [SurfaceOrganicMatter].Incorporate(fraction: 0.55, depth: 0)
                1999-10-15  [Fertiliser].Apply(Amount: 90, Type: Fertiliser.Types.NO3N);
                1999-10-15  [Wheat].Sow(cultivar:Stephens, depth:30, population:150, rowSpacing:300);
              Operations 4_nBN45
                1931-08-15  [SurfaceOrganicMatter].Incorporate(fraction: 0.6, depth: 200)
                1931-10-15  [Fertiliser].Apply(Amount: 34, Type: Fertiliser.Types.NO3N);
                1931-10-15  [Wheat].Sow(cultivar:Rex, depth:30, population:100, rowSpacing:300);
                1933-08-15  [SurfaceOrganicMatter].Incorporate(fraction: 0.6, depth: 200)
                1933-10-15  [Fertiliser].Apply(Amount: 34, Type: Fertiliser.Types.NO3N);
                1933-10-15  [Wheat].Sow(cultivar:Rex, depth:30, population:100, rowSpacing:300);
                1935-08-15  [SurfaceOrganicMatter].Incorporate(fraction: 0.6, depth: 200)
                1935-10-15  [Fertiliser].Apply(Amount: 34, Type: Fertiliser.Types.NO3N);
                1935-10-15  [Wheat].Sow(cultivar:Rex, depth:30, population:100, rowSpacing:300);
                1937-08-15  [SurfaceOrganicMatter].Incorporate(fraction: 0.6, depth: 200)
                1937-10-15  [Fertiliser].Apply(Amount: 34, Type: Fertiliser.Types.NO3N);
                1937-10-15  [Wheat].Sow(cultivar:Rex, depth:30, population:100, rowSpacing:300);
                1939-08-15  [SurfaceOrganicMatter].Incorporate(fraction: 0.6, depth: 200)
                1939-10-15  [Fertiliser].Apply(Amount: 34, Type: Fertiliser.Types.NO3N);
                1939-10-15  [Wheat].Sow(cultivar:Rex, depth:30, population:100, rowSpacing:300);
                1941-08-15  [SurfaceOrganicMatter].Incorporate(fraction: 0.6, depth: 200)
                1941-10-15  [Fertiliser].Apply(Amount: 34, Type: Fertiliser.Types.NO3N);
                1941-10-15  [Wheat].Sow(cultivar:Rex, depth:30, population:100, rowSpacing:300);
                1943-08-15  [SurfaceOrganicMatter].Incorporate(fraction: 0.6, depth: 200)
                1943-10-15  [Fertiliser].Apply(Amount: 34, Type: Fertiliser.Types.NO3N);
                1943-10-15  [Wheat].Sow(cultivar:Rex, depth:30, population:100, rowSpacing:300);
                1945-08-15  [SurfaceOrganicMatter].Incorporate(fraction: 0.6, depth: 200)
                1945-10-15  [Fertiliser].Apply(Amount: 34, Type: Fertiliser.Types.NO3N);
                1945-10-15  [Wheat].Sow(cultivar:Rex, depth:30, population:100, rowSpacing:300);
                1947-08-15  [SurfaceOrganicMatter].Incorporate(fraction: 0.6, depth: 200)
                1947-10-15  [Fertiliser].Apply(Amount: 34, Type: Fertiliser.Types.NO3N);
                1947-10-15  [Wheat].Sow(cultivar:Rex, depth:30, population:100, rowSpacing:300);
                1949-08-15  [SurfaceOrganicMatter].Incorporate(fraction: 0.6, depth: 200)
                1949-10-15  [Fertiliser].Apply(Amount: 34, Type: Fertiliser.Types.NO3N);
                1949-10-15  [Wheat].Sow(cultivar:Rex, depth:30, population:100, rowSpacing:300);
                1951-08-15  [SurfaceOrganicMatter].Incorporate(fraction: 0.6, depth: 200)
                1951-10-15  [Fertiliser].Apply(Amount: 34, Type: Fertiliser.Types.NO3N);
                1951-10-15  [Wheat].Sow(cultivar:Rex, depth:30, population:100, rowSpacing:300);
                1953-08-15  [SurfaceOrganicMatter].Incorporate(fraction: 0.6, depth: 200)
                1953-10-15  [Fertiliser].Apply(Amount: 34, Type: Fertiliser.Types.NO3N);
                1953-10-15  [Wheat].Sow(cultivar:Rex, depth:30, population:100, rowSpacing:300);
                1955-08-15  [SurfaceOrganicMatter].Incorporate(fraction: 0.6, depth: 200)
                1955-10-15  [Fertiliser].Apply(Amount: 34, Type: Fertiliser.Types.NO3N);
                1955-10-15  [Wheat].Sow(cultivar:Rex, depth:30, population:100, rowSpacing:300);
                1957-08-15  [SurfaceOrganicMatter].Incorporate(fraction: 0.6, depth: 200)
                1957-10-15  [Fertiliser].Apply(Amount: 34, Type: Fertiliser.Types.NO3N);
                1957-10-15  [Wheat].Sow(cultivar:Rex, depth:30, population:100, rowSpacing:300);
                1959-08-15  [SurfaceOrganicMatter].Incorporate(fraction: 0.6, depth: 200)
                1959-10-15  [Fertiliser].Apply(Amount: 34, Type: Fertiliser.Types.NO3N);
                1959-10-15  [Wheat].Sow(cultivar:Rex, depth:30, population:100, rowSpacing:300);
                1961-08-15  [SurfaceOrganicMatter].Incorporate(fraction: 0.6, depth: 200)
                1961-10-15  [Fertiliser].Apply(Amount: 34, Type: Fertiliser.Types.NO3N);
                1961-10-15  [Wheat].Sow(cultivar:Rex, depth:30, population:100, rowSpacing:300);
                1963-08-15  [SurfaceOrganicMatter].Incorporate(fraction: 0.6, depth: 200)
                1963-10-15  [Fertiliser].Apply(Amount: 34, Type: Fertiliser.Types.NO3N);
                1963-10-15  [Wheat].Sow(cultivar:Rex, depth:30, population:100, rowSpacing:300);
                1965-08-15  [SurfaceOrganicMatter].Incorporate(fraction: 0.6, depth: 200)
                1965-10-15  [Fertiliser].Apply(Amount: 34, Type: Fertiliser.Types.NO3N);
                1965-10-15  [Wheat].Sow(cultivar:Stephens, depth:30, population:150, rowSpacing:300);
                1967-10-15  [Fertiliser].Apply(Amount: 45, Type: Fertiliser.Types.NO3N);
                1967-10-15  [Wheat].Sow(cultivar:Stephens, depth:30, population:150, rowSpacing:300);
                1969-10-15  [Fertiliser].Apply(Amount: 45, Type: Fertiliser.Types.NO3N);
                1969-10-15  [Wheat].Sow(cultivar:Stephens, depth:30, population:150, rowSpacing:300);
                1971-10-15  [Fertiliser].Apply(Amount: 45, Type: Fertiliser.Types.NO3N);
                1971-10-15  [Wheat].Sow(cultivar:Stephens, depth:30, population:150, rowSpacing:300);
                1973-10-15  [Fertiliser].Apply(Amount: 45, Type: Fertiliser.Types.NO3N);
                1973-10-15  [Wheat].Sow(cultivar:Stephens, depth:30, population:150, rowSpacing:300);
                1975-10-15  [Fertiliser].Apply(Amount: 45, Type: Fertiliser.Types.NO3N);
                1975-10-15  [Wheat].Sow(cultivar:Stephens, depth:30, population:150, rowSpacing:300);
                1977-10-15  [Fertiliser].Apply(Amount: 45, Type: Fertiliser.Types.NO3N);
                1977-10-15  [Wheat].Sow(cultivar:Stephens, depth:30, population:150, rowSpacing:300);
                1979-10-15  [Fertiliser].Apply(Amount: 45, Type: Fertiliser.Types.NO3N);
                1979-10-15  [Wheat].Sow(cultivar:Stephens, depth:30, population:150, rowSpacing:300);
                1981-10-15  [Fertiliser].Apply(Amount: 45, Type: Fertiliser.Types.NO3N);
                1981-10-15  [Wheat].Sow(cultivar:Stephens, depth:30, population:150, rowSpacing:300);
                1983-10-15  [Fertiliser].Apply(Amount: 45, Type: Fertiliser.Types.NO3N);
                1983-10-15  [Wheat].Sow(cultivar:Stephens, depth:30, population:150, rowSpacing:300);
                1985-10-15  [Fertiliser].Apply(Amount: 45, Type: Fertiliser.Types.NO3N);
                1985-10-15  [Wheat].Sow(cultivar:Stephens, depth:30, population:150, rowSpacing:300);
                1987-10-15  [Fertiliser].Apply(Amount: 45, Type: Fertiliser.Types.NO3N);
                1987-10-15  [Wheat].Sow(cultivar:Stephens, depth:30, population:150, rowSpacing:300);
                1989-10-15  [Fertiliser].Apply(Amount: 45, Type: Fertiliser.Types.NO3N);
                1989-10-15  [Wheat].Sow(cultivar:Stephens, depth:30, population:150, rowSpacing:300);
                1991-10-15  [Fertiliser].Apply(Amount: 45, Type: Fertiliser.Types.NO3N);
                1991-10-15  [Wheat].Sow(cultivar:Stephens, depth:30, population:150, rowSpacing:300);
                1993-10-15  [Fertiliser].Apply(Amount: 45, Type: Fertiliser.Types.NO3N);
                1993-10-15  [Wheat].Sow(cultivar:Stephens, depth:30, population:150, rowSpacing:300);
                1995-10-15  [Fertiliser].Apply(Amount: 45, Type: Fertiliser.Types.NO3N);
                1995-10-15  [Wheat].Sow(cultivar:Stephens, depth:30, population:150, rowSpacing:300);
                1997-10-15  [Fertiliser].Apply(Amount: 45, Type: Fertiliser.Types.NO3N);
                1997-10-15  [Wheat].Sow(cultivar:Stephens, depth:30, population:150, rowSpacing:300);
                1999-10-15  [Fertiliser].Apply(Amount: 45, Type: Fertiliser.Types.NO3N);
                1999-10-15  [Wheat].Sow(cultivar:Stephens, depth:30, population:150, rowSpacing:300);
              Operations 5_nBN90
                1931-04-01  [SurfaceOrganicMatter].Incorporate(fraction: 0.6, depth: 200)
                1931-10-15  [Fertiliser].Apply(Amount: 34, Type: Fertiliser.Types.NO3N);
                1931-10-15  [Wheat].Sow(cultivar:Rex, depth:30, population:100, rowSpacing:300);
                1933-04-01  [SurfaceOrganicMatter].Incorporate(fraction: 0.6, depth: 200)
                1933-10-15  [Fertiliser].Apply(Amount: 34, Type: Fertiliser.Types.NO3N);
                1933-10-15  [Wheat].Sow(cultivar:Rex, depth:30, population:100, rowSpacing:300);
                1935-04-01  [SurfaceOrganicMatter].Incorporate(fraction: 0.6, depth: 200)
                1935-10-15  [Fertiliser].Apply(Amount: 34, Type: Fertiliser.Types.NO3N);
                1935-10-15  [Wheat].Sow(cultivar:Rex, depth:30, population:100, rowSpacing:300);
                1937-04-01  [SurfaceOrganicMatter].Incorporate(fraction: 0.6, depth: 200)
                1937-10-15  [Fertiliser].Apply(Amount: 34, Type: Fertiliser.Types.NO3N);
                1937-10-15  [Wheat].Sow(cultivar:Rex, depth:30, population:100, rowSpacing:300);
                1939-04-01  [SurfaceOrganicMatter].Incorporate(fraction: 0.6, depth: 200)
                1939-10-15  [Fertiliser].Apply(Amount: 34, Type: Fertiliser.Types.NO3N);
                1939-10-15  [Wheat].Sow(cultivar:Rex, depth:30, population:100, rowSpacing:300);
                1941-04-01  [SurfaceOrganicMatter].Incorporate(fraction: 0.6, depth: 200)
                1941-10-15  [Fertiliser].Apply(Amount: 34, Type: Fertiliser.Types.NO3N);
                1941-10-15  [Wheat].Sow(cultivar:Rex, depth:30, population:100, rowSpacing:300);
                1943-04-01  [SurfaceOrganicMatter].Incorporate(fraction: 0.6, depth: 200)
                1943-10-15  [Fertiliser].Apply(Amount: 34, Type: Fertiliser.Types.NO3N);
                1943-10-15  [Wheat].Sow(cultivar:Rex, depth:30, population:100, rowSpacing:300);
                1945-04-01  [SurfaceOrganicMatter].Incorporate(fraction: 0.6, depth: 200)
                1945-10-15  [Fertiliser].Apply(Amount: 34, Type: Fertiliser.Types.NO3N);
                1945-10-15  [Wheat].Sow(cultivar:Rex, depth:30, population:100, rowSpacing:300);
                1947-04-01  [SurfaceOrganicMatter].Incorporate(fraction: 0.6, depth: 200)
                1947-10-15  [Fertiliser].Apply(Amount: 34, Type: Fertiliser.Types.NO3N);
                1947-10-15  [Wheat].Sow(cultivar:Rex, depth:30, population:100, rowSpacing:300);
                1949-04-01  [SurfaceOrganicMatter].Incorporate(fraction: 0.6, depth: 200)
                1949-10-15  [Fertiliser].Apply(Amount: 34, Type: Fertiliser.Types.NO3N);
                1949-10-15  [Wheat].Sow(cultivar:Rex, depth:30, population:100, rowSpacing:300);
                1951-04-01  [SurfaceOrganicMatter].Incorporate(fraction: 0.6, depth: 200)
                1951-10-15  [Fertiliser].Apply(Amount: 34, Type: Fertiliser.Types.NO3N);
                1951-10-15  [Wheat].Sow(cultivar:Rex, depth:30, population:100, rowSpacing:300);
                1953-04-01  [SurfaceOrganicMatter].Incorporate(fraction: 0.6, depth: 200)
                1953-10-15  [Fertiliser].Apply(Amount: 34, Type: Fertiliser.Types.NO3N);
                1953-10-15  [Wheat].Sow(cultivar:Rex, depth:30, population:100, rowSpacing:300);
                1955-04-01  [SurfaceOrganicMatter].Incorporate(fraction: 0.6, depth: 200)
                1955-10-15  [Fertiliser].Apply(Amount: 34, Type: Fertiliser.Types.NO3N);
                1955-10-15  [Wheat].Sow(cultivar:Rex, depth:30, population:100, rowSpacing:300);
                1957-04-01  [SurfaceOrganicMatter].Incorporate(fraction: 0.6, depth: 200)
                1957-10-15  [Fertiliser].Apply(Amount: 34, Type: Fertiliser.Types.NO3N);
                1957-10-15  [Wheat].Sow(cultivar:Rex, depth:30, population:100, rowSpacing:300);
                1959-04-01  [SurfaceOrganicMatter].Incorporate(fraction: 0.6, depth: 200)
                1959-10-15  [Fertiliser].Apply(Amount: 34, Type: Fertiliser.Types.NO3N);
                1959-10-15  [Wheat].Sow(cultivar:Rex, depth:30, population:100, rowSpacing:300);
                1961-04-01  [SurfaceOrganicMatter].Incorporate(fraction: 0.6, depth: 200)
                1961-10-15  [Fertiliser].Apply(Amount: 34, Type: Fertiliser.Types.NO3N);
                1961-10-15  [Wheat].Sow(cultivar:Rex, depth:30, population:100, rowSpacing:300);
                1963-04-01  [SurfaceOrganicMatter].Incorporate(fraction: 0.6, depth: 200)
                1963-10-15  [Fertiliser].Apply(Amount: 34, Type: Fertiliser.Types.NO3N);
                1963-10-15  [Wheat].Sow(cultivar:Rex, depth:30, population:100, rowSpacing:300);
                1965-04-01  [SurfaceOrganicMatter].Incorporate(fraction: 0.6, depth: 200)
                1965-10-15  [Fertiliser].Apply(Amount: 34, Type: Fertiliser.Types.NO3N);
                1965-10-15  [Wheat].Sow(cultivar:Stephens, depth:30, population:150, rowSpacing:300);
                1967-10-15  [Fertiliser].Apply(Amount: 90, Type: Fertiliser.Types.NO3N);
                1967-10-15  [Wheat].Sow(cultivar:Stephens, depth:30, population:150, rowSpacing:300);
                1969-10-15  [Fertiliser].Apply(Amount: 90, Type: Fertiliser.Types.NO3N);
                1969-10-15  [Wheat].Sow(cultivar:Stephens, depth:30, population:150, rowSpacing:300);
                1971-10-15  [Fertiliser].Apply(Amount: 90, Type: Fertiliser.Types.NO3N);
                1971-10-15  [Wheat].Sow(cultivar:Stephens, depth:30, population:150, rowSpacing:300);
                1973-10-15  [Fertiliser].Apply(Amount: 90, Type: Fertiliser.Types.NO3N);
                1973-10-15  [Wheat].Sow(cultivar:Stephens, depth:30, population:150, rowSpacing:300);
                1975-10-15  [Fertiliser].Apply(Amount: 90, Type: Fertiliser.Types.NO3N);
                1975-10-15  [Wheat].Sow(cultivar:Stephens, depth:30, population:150, rowSpacing:300);
                1977-10-15  [Fertiliser].Apply(Amount: 90, Type: Fertiliser.Types.NO3N);
                1977-10-15  [Wheat].Sow(cultivar:Stephens, depth:30, population:150, rowSpacing:300);
                1979-10-15  [Fertiliser].Apply(Amount: 90, Type: Fertiliser.Types.NO3N);
                1979-10-15  [Wheat].Sow(cultivar:Stephens, depth:30, population:150, rowSpacing:300);
                1981-10-15  [Fertiliser].Apply(Amount: 90, Type: Fertiliser.Types.NO3N);
                1981-10-15  [Wheat].Sow(cultivar:Stephens, depth:30, population:150, rowSpacing:300);
                1983-10-15  [Fertiliser].Apply(Amount: 90, Type: Fertiliser.Types.NO3N);
                1983-10-15  [Wheat].Sow(cultivar:Stephens, depth:30, population:150, rowSpacing:300);
                1985-10-15  [Fertiliser].Apply(Amount: 90, Type: Fertiliser.Types.NO3N);
                1985-10-15  [Wheat].Sow(cultivar:Stephens, depth:30, population:150, rowSpacing:300);
                1987-10-15  [Fertiliser].Apply(Amount: 90, Type: Fertiliser.Types.NO3N);
                1987-10-15  [Wheat].Sow(cultivar:Stephens, depth:30, population:150, rowSpacing:300);
                1989-10-15  [Fertiliser].Apply(Amount: 90, Type: Fertiliser.Types.NO3N);
                1989-10-15  [Wheat].Sow(cultivar:Stephens, depth:30, population:150, rowSpacing:300);
                1991-10-15  [Fertiliser].Apply(Amount: 90, Type: Fertiliser.Types.NO3N);
                1991-10-15  [Wheat].Sow(cultivar:Stephens, depth:30, population:150, rowSpacing:300);
                1993-10-15  [Fertiliser].Apply(Amount: 90, Type: Fertiliser.Types.NO3N);
                1993-10-15  [Wheat].Sow(cultivar:Stephens, depth:30, population:150, rowSpacing:300);
                1995-10-15  [Fertiliser].Apply(Amount: 90, Type: Fertiliser.Types.NO3N);
                1995-10-15  [Wheat].Sow(cultivar:Stephens, depth:30, population:150, rowSpacing:300);
                1997-10-15  [Fertiliser].Apply(Amount: 90, Type: Fertiliser.Types.NO3N);
                1997-10-15  [Wheat].Sow(cultivar:Stephens, depth:30, population:150, rowSpacing:300);
                1999-10-15  [Fertiliser].Apply(Amount: 90, Type: Fertiliser.Types.NO3N);
                1999-10-15  [Wheat].Sow(cultivar:Stephens, depth:30, population:150, rowSpacing:300);
              Operations 9_nBPv
                1931-04-15  [SurfaceOrganicMatter].Add(mass: 2000, N: 46, P:0.0, type: "wheat", name: "");
                1931-10-15  [Wheat].Sow(cultivar:Rex, depth:30, population:100, rowSpacing:300);
                1933-04-15  [SurfaceOrganicMatter].Add(mass: 2000, N: 46, P:0.0, type: "wheat", name: "");
                1933-10-15  [Wheat].Sow(cultivar:Rex, depth:30, population:100, rowSpacing:300);
                1935-04-15  [SurfaceOrganicMatter].Add(mass: 2000, N: 46, P:0.0, type: "wheat", name: "");
                1935-10-15  [Wheat].Sow(cultivar:Rex, depth:30, population:100, rowSpacing:300);
                1937-04-15  [SurfaceOrganicMatter].Add(mass: 2000, N: 46, P:0.0, type: "wheat", name: "");
                1937-10-15  [Wheat].Sow(cultivar:Rex, depth:30, population:100, rowSpacing:300);
                1939-04-15  [SurfaceOrganicMatter].Add(mass: 2000, N: 46, P:0.0, type: "wheat", name: "");
                1939-10-15  [Wheat].Sow(cultivar:Rex, depth:30, population:100, rowSpacing:300);
                1941-04-15  [SurfaceOrganicMatter].Add(mass: 2000, N: 46, P:0.0, type: "wheat", name: "");
                1941-10-15  [Wheat].Sow(cultivar:Rex, depth:30, population:100, rowSpacing:300);
                1943-04-15  [SurfaceOrganicMatter].Add(mass: 2000, N: 46, P:0.0, type: "wheat", name: "");
                1943-10-15  [Wheat].Sow(cultivar:Rex, depth:30, population:100, rowSpacing:300);
                1945-04-15  [SurfaceOrganicMatter].Add(mass: 2000, N: 46, P:0.0, type: "wheat", name: "");
                1945-10-15  [Wheat].Sow(cultivar:Rex, depth:30, population:100, rowSpacing:300);
                1947-04-15  [SurfaceOrganicMatter].Add(mass: 2000, N: 46, P:0.0, type: "wheat", name: "");
                1947-10-15  [Wheat].Sow(cultivar:Rex, depth:30, population:100, rowSpacing:300);
                1949-04-15  [SurfaceOrganicMatter].Add(mass: 2000, N: 46, P:0.0, type: "wheat", name: "");
                1949-10-15  [Wheat].Sow(cultivar:Rex, depth:30, population:100, rowSpacing:300);
                1951-04-15  [SurfaceOrganicMatter].Add(mass: 2000, N: 46, P:0.0, type: "wheat", name: "");
                1951-10-15  [Wheat].Sow(cultivar:Rex, depth:30, population:100, rowSpacing:300);
                1953-04-15  [SurfaceOrganicMatter].Add(mass: 2000, N: 34, P:0.0, type: "wheat", name: "");
                1953-10-15  [Wheat].Sow(cultivar:Rex, depth:30, population:100, rowSpacing:300);
                1955-04-15  [SurfaceOrganicMatter].Add(mass: 2000, N: 34, P:0.0, type: "wheat", name: "");
                1955-10-15  [Wheat].Sow(cultivar:Rex, depth:30, population:100, rowSpacing:300);
                1957-04-15  [SurfaceOrganicMatter].Add(mass: 2000, N: 34, P:0.0, type: "wheat", name: "");
                1957-10-15  [Wheat].Sow(cultivar:Rex, depth:30, population:100, rowSpacing:300);
                1959-04-15  [SurfaceOrganicMatter].Add(mass: 2000, N: 34, P:0.0, type: "wheat", name: "");
                1959-10-15  [Wheat].Sow(cultivar:Rex, depth:30, population:100, rowSpacing:300);
                1961-04-15  [SurfaceOrganicMatter].Add(mass: 2000, N: 34, P:0.0, type: "wheat", name: "");
                1961-10-15  [Wheat].Sow(cultivar:Rex, depth:30, population:100, rowSpacing:300);
                1963-04-15  [SurfaceOrganicMatter].Add(mass: 2000, N: 34, P:0.0, type: "wheat", name: "");
                1963-10-15  [Wheat].Sow(cultivar:Rex, depth:30, population:100, rowSpacing:300);
                1965-04-15  [SurfaceOrganicMatter].Add(mass: 2000, N: 34, P:0.0, type: "wheat", name: "");
                1965-10-15  [Wheat].Sow(cultivar:Stephens, depth:30, population:150, rowSpacing:300);
                1967-04-15  [SurfaceOrganicMatter].Add(mass: 2000, N: 34, P:0.0, type: "wheat", name: "");
                1967-10-15  [Wheat].Sow(cultivar:Stephens, depth:30, population:150, rowSpacing:300);
                1969-04-15  [SurfaceOrganicMatter].Add(mass: 2000, N: 34, P:0.0, type: "wheat", name: "");
                1969-10-15  [Wheat].Sow(cultivar:Stephens, depth:30, population:150, rowSpacing:300);
                1971-04-15  [SurfaceOrganicMatter].Add(mass: 2000, N: 34, P:0.0, type: "wheat", name: "");
                1971-10-15  [Wheat].Sow(cultivar:Stephens, depth:30, population:150, rowSpacing:300);
                1973-04-15  [SurfaceOrganicMatter].Add(mass: 2000, N: 34, P:0.0, type: "wheat", name: "");
                1973-10-15  [Wheat].Sow(cultivar:Stephens, depth:30, population:150, rowSpacing:300);
                1975-04-15  [SurfaceOrganicMatter].Add(mass: 2000, N: 34, P:0.0, type: "wheat", name: "");
                1975-10-15  [Wheat].Sow(cultivar:Stephens, depth:30, population:150, rowSpacing:300);
                1977-04-15  [SurfaceOrganicMatter].Add(mass: 2000, N: 34, P:0.0, type: "wheat", name: "");
                1977-10-15  [Wheat].Sow(cultivar:Stephens, depth:30, population:150, rowSpacing:300);
                1979-04-15  [SurfaceOrganicMatter].Add(mass: 2000, N: 34, P:0.0, type: "wheat", name: "");
                1979-10-15  [Wheat].Sow(cultivar:Stephens, depth:30, population:150, rowSpacing:300);
                1981-04-15  [SurfaceOrganicMatter].Add(mass: 2000, N: 34, P:0.0, type: "wheat", name: "");
                1981-10-15  [Wheat].Sow(cultivar:Stephens, depth:30, population:150, rowSpacing:300);
                1983-04-15  [SurfaceOrganicMatter].Add(mass: 2000, N: 34, P:0.0, type: "wheat", name: "");
                1983-10-15  [Wheat].Sow(cultivar:Stephens, depth:30, population:150, rowSpacing:300);
                1985-04-15  [SurfaceOrganicMatter].Add(mass: 2000, N: 34, P:0.0, type: "wheat", name: "");
                1985-10-15  [Wheat].Sow(cultivar:Stephens, depth:30, population:150, rowSpacing:300);
                1987-04-15  [SurfaceOrganicMatter].Add(mass: 2000, N: 34, P:0.0, type: "wheat", name: "");
                1987-10-15  [Wheat].Sow(cultivar:Stephens, depth:30, population:150, rowSpacing:300);
                1989-04-15  [SurfaceOrganicMatter].Add(mass: 2000, N: 34, P:0.0, type: "wheat", name: "");
                1989-10-15  [Wheat].Sow(cultivar:Stephens, depth:30, population:150, rowSpacing:300);
                1991-04-15  [SurfaceOrganicMatter].Add(mass: 2000, N: 34, P:0.0, type: "wheat", name: "");
                1991-10-15  [Wheat].Sow(cultivar:Stephens, depth:30, population:150, rowSpacing:300);
                1993-04-15  [SurfaceOrganicMatter].Add(mass: 2000, N: 34, P:0.0, type: "wheat", name: "");
                1993-10-15  [Wheat].Sow(cultivar:Stephens, depth:30, population:150, rowSpacing:300);
                1995-04-15  [SurfaceOrganicMatter].Add(mass: 2000, N: 34, P:0.0, type: "wheat", name: "");
                1995-10-15  [Wheat].Sow(cultivar:Stephens, depth:30, population:150, rowSpacing:300);
                1997-04-15  [SurfaceOrganicMatter].Add(mass: 2000, N: 34, P:0.0, type: "wheat", name: "");
                1997-10-15  [Wheat].Sow(cultivar:Stephens, depth:30, population:150, rowSpacing:300);
                1999-04-15  [SurfaceOrganicMatter].Add(mass: 2000, N: 34, P:0.0, type: "wheat", name: "");
                1999-10-15  [Wheat].Sow(cultivar:Stephens, depth:30, population:150, rowSpacing:300);
              Operations 8_nBMn
                1931-04-15  [SurfaceOrganicMatter].Add(mass: 11379, N: 111, P:0.0, type: "wheat", name: "");
                1931-10-15  [Wheat].Sow(cultivar:Rex, depth:30, population:100, rowSpacing:300);
                1933-04-15  [SurfaceOrganicMatter].Add(mass: 11379, N: 111, P:0.0, type: "wheat", name: "");
                1933-10-15  [Wheat].Sow(cultivar:Rex, depth:30, population:100, rowSpacing:300);
                1935-04-15  [SurfaceOrganicMatter].Add(mass: 11379, N: 111, P:0.0, type: "wheat", name: "");
                1935-10-15  [Wheat].Sow(cultivar:Rex, depth:30, population:100, rowSpacing:300);
                1937-04-15  [SurfaceOrganicMatter].Add(mass: 11379, N: 111, P:0.0, type: "wheat", name: "");
                1937-10-15  [Wheat].Sow(cultivar:Rex, depth:30, population:100, rowSpacing:300);
                1939-04-15  [SurfaceOrganicMatter].Add(mass: 11379, N: 111, P:0.0, type: "wheat", name: "");
                1939-10-15  [Wheat].Sow(cultivar:Rex, depth:30, population:100, rowSpacing:300);
                1941-04-15  [SurfaceOrganicMatter].Add(mass: 11379, N: 111, P:0.0, type: "wheat", name: "");
                1941-10-15  [Wheat].Sow(cultivar:Rex, depth:30, population:100, rowSpacing:300);
                1943-10-15  [Wheat].Sow(cultivar:Rex, depth:30, population:100, rowSpacing:300);
                1945-10-15  [Wheat].Sow(cultivar:Rex, depth:30, population:100, rowSpacing:300);
                1947-10-15  [Wheat].Sow(cultivar:Rex, depth:30, population:100, rowSpacing:300);
                1949-04-15  [SurfaceOrganicMatter].Add(mass: 11379, N: 56, P:0.0, type: "wheat", name: "");
                1949-10-15  [Wheat].Sow(cultivar:Rex, depth:30, population:100, rowSpacing:300);
                1951-04-15  [SurfaceOrganicMatter].Add(mass: 11379, N: 56, P:0.0, type: "wheat", name: "");
                1951-10-15  [Wheat].Sow(cultivar:Rex, depth:30, population:100, rowSpacing:300);
                1953-04-15  [SurfaceOrganicMatter].Add(mass: 11379, N: 111, P:0.0, type: "wheat", name: "");
                1953-10-15  [Wheat].Sow(cultivar:Rex, depth:30, population:100, rowSpacing:300);
                1955-04-15  [SurfaceOrganicMatter].Add(mass: 11379, N: 111, P:0.0, type: "wheat", name: "");
                1955-10-15  [Wheat].Sow(cultivar:Rex, depth:30, population:100, rowSpacing:300);
                1957-04-15  [SurfaceOrganicMatter].Add(mass: 11379, N: 111, P:0.0, type: "wheat", name: "");
                1957-10-15  [Wheat].Sow(cultivar:Rex, depth:30, population:100, rowSpacing:300);
                1959-04-15  [SurfaceOrganicMatter].Add(mass: 11379, N: 111, P:0.0, type: "wheat", name: "");
                1959-10-15  [Wheat].Sow(cultivar:Rex, depth:30, population:100, rowSpacing:300);
                1961-04-15  [SurfaceOrganicMatter].Add(mass: 11379, N: 111, P:0.0, type: "wheat", name: "");
                1961-10-15  [Wheat].Sow(cultivar:Rex, depth:30, population:100, rowSpacing:300);
                1963-04-15  [SurfaceOrganicMatter].Add(mass: 11379, N: 111, P:0.0, type: "wheat", name: "");
                1963-10-15  [Wheat].Sow(cultivar:Rex, depth:30, population:100, rowSpacing:300);
                1965-04-15  [SurfaceOrganicMatter].Add(mass: 11379, N: 111, P:0.0, type: "wheat", name: "");
                1965-10-15  [Wheat].Sow(cultivar:Stephens, depth:30, population:150, rowSpacing:300);
                1967-04-15  [SurfaceOrganicMatter].Add(mass: 11379, N: 111, P:0.0, type: "wheat", name: "");
                1967-10-15  [Wheat].Sow(cultivar:Stephens, depth:30, population:150, rowSpacing:300);
                1969-04-15  [SurfaceOrganicMatter].Add(mass: 11379, N: 111, P:0.0, type: "wheat", name: "");
                1969-10-15  [Wheat].Sow(cultivar:Stephens, depth:30, population:150, rowSpacing:300);
                1971-04-15  [SurfaceOrganicMatter].Add(mass: 11379, N: 111, P:0.0, type: "wheat", name: "");
                1971-10-15  [Wheat].Sow(cultivar:Stephens, depth:30, population:150, rowSpacing:300);
                1973-04-15  [SurfaceOrganicMatter].Add(mass: 11379, N: 111, P:0.0, type: "wheat", name: "");
                1973-10-15  [Wheat].Sow(cultivar:Stephens, depth:30, population:150, rowSpacing:300);
                1975-04-15  [SurfaceOrganicMatter].Add(mass: 11379, N: 111, P:0.0, type: "wheat", name: "");
                1975-10-15  [Wheat].Sow(cultivar:Stephens, depth:30, population:150, rowSpacing:300);
                1977-04-15  [SurfaceOrganicMatter].Add(mass: 11379, N: 111, P:0.0, type: "wheat", name: "");
                1977-10-15  [Wheat].Sow(cultivar:Stephens, depth:30, population:150, rowSpacing:300);
                1979-04-15  [SurfaceOrganicMatter].Add(mass: 11379, N: 111, P:0.0, type: "wheat", name: "");
                1979-10-15  [Wheat].Sow(cultivar:Stephens, depth:30, population:150, rowSpacing:300);
                1981-04-15  [SurfaceOrganicMatter].Add(mass: 11379, N: 111, P:0.0, type: "wheat", name: "");
                1981-10-15  [Wheat].Sow(cultivar:Stephens, depth:30, population:150, rowSpacing:300);
                1983-04-15  [SurfaceOrganicMatter].Add(mass: 11379, N: 111, P:0.0, type: "wheat", name: "");
                1983-10-15  [Wheat].Sow(cultivar:Stephens, depth:30, population:150, rowSpacing:300);
                1985-04-15  [SurfaceOrganicMatter].Add(mass: 11379, N: 111, P:0.0, type: "wheat", name: "");
                1985-10-15  [Wheat].Sow(cultivar:Stephens, depth:30, population:150, rowSpacing:300);
                1987-04-15  [SurfaceOrganicMatter].Add(mass: 11379, N: 111, P:0.0, type: "wheat", name: "");
                1987-10-15  [Wheat].Sow(cultivar:Stephens, depth:30, population:150, rowSpacing:300);
                1989-04-15  [SurfaceOrganicMatter].Add(mass: 11379, N: 111, P:0.0, type: "wheat", name: "");
                1989-10-15  [Wheat].Sow(cultivar:Stephens, depth:30, population:150, rowSpacing:300);
                1991-04-15  [SurfaceOrganicMatter].Add(mass: 11379, N: 111, P:0.0, type: "wheat", name: "");
                1991-10-15  [Wheat].Sow(cultivar:Stephens, depth:30, population:150, rowSpacing:300);
                1993-04-15  [SurfaceOrganicMatter].Add(mass: 11379, N: 111, P:0.0, type: "wheat", name: "");
                1993-10-15  [Wheat].Sow(cultivar:Stephens, depth:30, population:150, rowSpacing:300);
                1995-04-15  [SurfaceOrganicMatter].Add(mass: 11379, N: 111, P:0.0, type: "wheat", name: "");
                1995-10-15  [Wheat].Sow(cultivar:Stephens, depth:30, population:150, rowSpacing:300);
                1997-04-15  [SurfaceOrganicMatter].Add(mass: 11379, N: 111, P:0.0, type: "wheat", name: "");
                1997-10-15  [Wheat].Sow(cultivar:Stephens, depth:30, population:150, rowSpacing:300);
                1999-04-15  [SurfaceOrganicMatter].Add(mass: 11379, N: 111, P:0.0, type: "wheat", name: "");
                1999-10-15  [Wheat].Sow(cultivar:Stephens, depth:30, population:150, rowSpacing:300);
          Simulation PendletonBaseSimulation
            Weather: FileName=pendletonAPSIMtav.met
            Clock: StartDate=1930-01-01; EndDate=1990-12-31
            Summary summaryfile
            Zone Field: Area=1; Slope=0
              Operations: same as Validation.North America.Pendleton.Pendleton.Factors.Treatment.0_nBN0
              Manager TillageOperations
                Crop = .Simulations.Validation.North America.Pendleton.Pendleton.PendletonBaseSimulation.Field.wheat
                TillDate = 16-may
                IncorpFraction = 0.95
```csharp
using System;
using Models.Core;
using Models.PMF;
using Models.Soils;
using Models.Utilities;
using APSIM.Shared.Utilities;
using Models.Surface;

namespace Models
{
    [Serializable] 
    public class Script : Model
    {
        [Description("Crop")]
        public IPlant Crop { get; set; }
        [Description("Tillage date (d-mmm)")]
        public string TillDate { get; set; }
        [Description("Incorporation fraction (0-1)")]
        public double IncorpFraction { get; set; }

        [Link] Clock Clock;
        [Link] SurfaceOrganicMatter SOM;
        
        [EventSubscribe("DoManagement")]
        private void OnDoManagement(object sender, EventArgs e)
        {
            if ((!Crop.IsAlive) && DateUtilities.WithinDates(TillDate, Clock.Today, TillDate))
                SOM.Incorporate(fraction: IncorpFraction, depth: 200);            
        }
    }
}
```
              Operations NOperations
              Report HarvestReport: EventNames=[Wheat].Harvesting
                VariableNames:
                  [Clock].Today
                  [Clock].Today.Year
                  [Wheat].Grain.Wt
                  [Wheat].Grain.N*10 as NExport
                  [Wheat].AboveGround.Wt
                  sum([Soil].Nutrient.TotalC[1:2]) as TOC0_30cm
                  [Soil].Nutrient.TotalC[3] as TOC30_60cm
                  sum([Soil].Nutrient.TotalN[1:2]) as TON0_30cm
                  [Soil].Nutrient.TotalN[3] as TON30_60cm
                  sum([Soil].Nutrient.TotalC[1:2])/sum([Soil].Nutrient.TotalN[1:2]) as CNR0_30cm
                  [Soil].Nutrient.TotalC[3]/[Soil].Nutrient.TotalN[3] as CNR30_60cm
              Report: EventNames=[Clock].EndOfMonth
                VariableNames:
                  [Clock].Today
                  [Soil].Nutrient.TotalC[1] as TOC0_10cm
                  [Soil].Nutrient.TotalC[2] as TOC10_30cm
                  [Soil].Nutrient.TotalC[3] as TOC30_60cm
                  ([Soil].Nutrient.TotalC[1]+[Soil].Nutrient.TotalC[2]) as TOC0_30cm
                  [Soil].Nutrient.TotalN[1] as TON0_10cm
                  [Soil].Nutrient.TotalN[2] as TON10_30cm
                  [Soil].Nutrient.TotalN[3] as TON30_60cm
                  ([Soil].Nutrient.TotalN[1]+[Soil].Nutrient.TotalN[2]) as TON0_30cm
              SurfaceOrganicMatter stubble: InitialResidueName=wheat; InitialResidueType=wheat; InitialResidueMass=1000; InitialStandingFraction=0; InitialCPR=0; InitialCNR=80; FractionFaecesAdded=0.5
              Plant wheat: ResourceName=Wheat; CropType=Wheat
              MicroClimate: a_interception=0; b_interception=1; c_interception=0; d_interception=0; soil_albedo=0.23; SoilHeatFluxFraction=0.4; NightInterceptionFraction=0.5; ReferenceHeight=2
              Manager Harvesting
                Crop = .Simulations.Validation.North America.Pendleton.Pendleton.PendletonBaseSimulation.Field.wheat
                script: same as in Validation.Australia.Tarlee.Tarlee.TarleeBaseSimulation.Field.Harvesting
              Fertiliser
              Soil: ASCOrder=Sodosol; ASCSubOrder=Red; SoilType=Sandy loam; Site=Tarlee; NearestTown=Tarlee; Region=Mid North; State=South Australia; Country=Australia; ApsoilNumber=610; Latitude=-34.276; Longitude=138.759; LocationAccuracy=+/- 20m
                DataSource=Characterisation 2008 by University of Adelaide, CSIRO Sustainable Ecosystems and Allan Mayfield Consulting, Clare, SA
                Comments=Roots: Wheat 90cm; barley and oats estimated; OC WB as measured; Strongly duplex low-moderate clay soil. Surface CEC low, moderate below. Texture change at about 7cm. Little chemical impediment to root growth, but high ESP below about 60cm may result in slaking or dispersion and high bulk density.
                Water
                  Thickness  BD    AirDry  LL15  DUL   SAT   KS
                  150        1.24  0.055   0.11  0.32  0.52  562
                  150        1.25  0.055   0.11  0.32  0.52  562
                  300        1.26  0.09    0.11  0.31  0.51  557
                  300        1.29  0.1     0.1   0.31  0.5   959
                  300        1.3   0.1     0.1   0.3   0.49  1063
                  300        1.3   0.1     0.1   0.3   0.49  1063
                  300        1.3   0.1     0.1   0.3   0.49  1063
                  SoilCrop WheatSoil: LL=[0.11, 0.11, 0.11, 0.1, 0.1, 0.1, 0.1]; KL=[0.06, 0.06, 0.05, 0.04, 0.04, 0.02, 0.01]; XF=[1, 1, 1, 1, 1, 0, 0]
                SoilWater: SummerDate=1-Apr; SummerU=6; SummerCona=3.5; WinterDate=1-Nov; WinterU=2; WinterCona=2; DiffusConst=88; DiffusSlope=35; Salb=0.13; CN2Bare=73; CNRed=20; CNCov=0.8; max_pond=0; Thickness=[100, 200, 300, 300, 900]; SWCON=[0.5, 0.5, 0.5, 0.5, 0.5]; ResidueInterception=0
                Nutrient
                SoilOrganicMatter: RootCN=57; RootWt=1109; SoilCN=13; EnrACoeff=7.4; EnrBCoeff=0.2; OCUnits=Total
                  Thickness  OC     FBiom  FInert
                  150        1.42   0.04   0.35
                  150        1.2    0.03   0.5
                  300        0.95   0.02   0.65
                  300        0.5    0.02   0.75
                  300        0.225  0.015  0.85
                  300        0.15   0.01   0.99
                  300        0.15   0.01   0.99
                Analysis: Thickness=[150, 150, 300, 300, 300, 300, 300]; PH=[6.64, 6.64, 6.64, 6.64, 6.64, 6.64, 6.64]; PHUnits=Water; BoronUnits=HotWater
                InitialWater Initial water: PercentMethod=FilledFromTop; FractionFull=1
                Sample Initial conditions: NO3Units=kgha; NH4Units=ppm; SWUnits=Volumetric; OCUnits=Total; PHUnits=Water
                  Thickness  NO3   NH4
                  100        10.2  0.0355556
                  200        19.9  0
                  300        19    0
                  300        15.5  0
                  300        21.1  0
                  300        17.7  0
                  300        17.7  0
                CERESSoilTemperature
              SoluteManager
            SoilArbitrator
            MicroClimate: a_interception=0; b_interception=1; c_interception=0; d_interception=0; soil_albedo=0.23; SoilHeatFluxFraction=0.4; NightInterceptionFraction=0.5; ReferenceHeight=2
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