Simulations: Version=10
  Memo TitlePage
    # The APSIM Oats Model

    _Allan Peake, Hamish Brown, Rob Zyskowski, Edmar I. Teixeira, Neil Huth_
  Memo Introduction
    The APSIM oats model has been developed using the Plant Modelling Framework (PMF) of [brown_plant_2014]. This new framework provides a library of plant organ and process submodels that can be coupled, at runtime, to construct a model in much the same way that models can be coupled to construct a simulation. This means that dynamic composition of lower level process and organ classes (e.g. photosynthesis, leaf) into larger constructions (e.g. maize, wheat, sorghum) can be achieved by the model developer without additional coding.

    The wheat model consists of:

    * a phenology model to simulate development through sequential growth phases
    * a structure model to simulate plant morphology
    * a collection of organs to simulate the various plant parts
    * an arbitrator to allocate resources (N, biomass) to the various plant organs

    This work builds upon earlier APSIM Wheat models such as NWheat ([Asseng200225], [KeatingNWheat]), NWheatS ([Asseng1998163]), Cropmod-Wheat ([Wang2002GenericCropModel]) , and the earlier versions developed within the Plant Modelling Framework ([brown_plant_2014]).
  Replacements
    Plant Oatz: CropType=Wheat
      Memo TitlePage
        # An APSIM Oat Model

        _Zyskowski,R.F, Brown, H.E. and Texiera,E._

        The APSIM Oat model has been developed using the Plant Modelling Framework (PMF) of [brown_plant_2014], and is heavily based on  many pricipals implemented within. This framework provides a library of plant organ and process submodels that can be coupled, at runtime, to construct a model in much the same way that models can be coupled to construct a simulation. This means that dynamic composition of lower level process and organ classes (e.g. photosynthesis, leaf) into larger constructions (e.g. maize, wheat, sorghum) can be achieved by the model developer without additional coding.

        The model consists of:

        * a phenology model to simulate development between growth phases
        * a structure model to simulate plant morphology
        * a collection of organs to simulate the various plant parts
        * an arbitrator to allocate resources (N, biomass) to the various plant organs
      Memo Rerferences
        Brown, H. E., et al. (2014). "Plant Modelling Framework: Software for building and running crop models on the APSIM platform." Environmental Modelling & Software 62: 385-398.

        Jamieson, P. D. and C. A. Munro (1999). A simple method for the phenological evaluation of new cereal cultivars. Agronomy Society of New Zealand - Proceedings, Twenty-Ninth Annual Conference, 1999. J. G. Hampton and K. M. Pollock. 29: 63-68.

        Martin, R. J., et al. (1998). The effect of daylength on final leaf number in drummond oats. Australian Agronomy Conference. Wagga Wagga.

        Sonego, M., et al. (1998). Cordination of apex and leaf deceolpment in oats. Austrlian Agronomy conference. Wagg Wagga.

        Martin, R. J. and I. N. C. Agron Soc New Zealand (1996). The effect of sowing date on growth and yield of two cultivars of oats.
        	Oats cvs. Cashel and Drummond were sown at Lincoln on 16 September, 2 November, and 21 December 1994; and on 7 February, 3 April, and 16 May 1995 in order to compare the effect of sowing date on their growth and yield. Biomass and leaf area were measured at one to four-week intervals from the end of tillering. Crops grew for periods ranging from just over 100 days to nearly 300 days. The crop sown in February died before maturity, and the one sown in April was affected by frost. Biomass production was much higher for the April sowing (over 20 t/ha) than the 7.5-15 t/ha for the other sowings, and was higher for Drummond than for Cashel at all sowing dates. Leaf area indices did not exceed 4.5 except for the February and April sowings of Drummond. There was a strong linear relationship between cumulative biomass production and intercepted radiation for all sowing dates, with the same rate of increase in biomass with radiation increase for both cultivars. Grain yields estimated from quadrat samples were higher than header yields for all sowings, but especially for the April sowing in which grain weights and harvest indices were lower than for the other sowings. Fifty-seven percent of grain yield came from post anthesis photosynthesis and 43% from remobilization from other plant parts. Oat yield is dependent on the amount of radiation intercepted by the crop and harvest index. Changes in conversion of radiation to biomass were not significantly affected by the range of conditions experienced by the crops in this study.

        Martin, R. J., et al. Effects of Timing and Intensity of Drought on the Yield of Oats (Avena sativa L.). Australian Agronomy
        Hobart.
        	The response of oats (Avena sativa L.) to timing and intensity of drought was determined in a mobile
        rainshelter, which excluded rainfall during crop growth. Ten irrigation treatments subjected the crops to
        drought of varying duration at different stages during plant growth; the crops were otherwise fully
        irrigated. Oat grain yield generally increased linearly with cumulative water use, and decreased linearly as
        the maximum potential soil moisture deficit experienced during crop growth increased, regardless of the
        timing of drought. The exception to this was the no drought (fully irrigated) treatment, where lodging
        reduced panicle number and grain weight compared to early drought treatments. Drought affected yield
        mainly by reducing panicle and grain number, effects on grain weight were small. . Relieving early drought
        through late irrigation led to more late tillers, more panicles, heavier grains, and later maturity. Full and
        late drought increased screenings.

        Sonego, M., et al. (1999). Development and growth of oat leaves at different temperatures and nitrogen levels. Agronomy Society of New Zealand - Proceedings, Twenty-Ninth Annual Conference, 1999. J. G. Hampton and K. M. Pollock. 29: 75-81.
        	This paper reports the development of a model to predict leaf appearance rate in oats (Avena sativa L.) based on the results of two field experiments and including a comparison of air and near-apex soil temperatures as predictors of leaf appearance. Oat genotype C&F 435 was sown on eight dates from April 1996 to November 1997. Nitrogen treatments (0 and 100 kg N/ha) were applied to the May and November 1997 crops. Observation of the number of visible leaf tips and leaf lamina length were taken at 2-7 day intervals. Near apex soil temperature and air temperature were recorded by data loggers. The number of visible tips was linearly related to temperature expressed as accumulated thermal time (base temperature of 0 degreesC). The rate of leaf appearance in thermal time, using either air or soil temperature, was nearly constant within a sowing date, but faster for spring sown than for autumn sown crops. Differences in this rate were less among sowing dates when near apex soil temperature was used to calculate thermal time than when screen temperatures were used. This indicated that the use of temperature near the shoot apex may improve phenological predictions from crop models. Nitrogen application had no effect on the rate of leaf appearance regardless of sowing date, but caused an average increase of 19% (P < 0.05) in the final leaf lamina length for the last five leaves.

        Sonego, M., et al. (1997). Phenological development of oat crops in response to sowing dates. Proceedings of the Twenty-Seventh Annual Conference of the Agronomy Society of New Zealand. 27: 115-118.
        	Observations of apical development in oats were made from sowings made on six occasions through an annual cycle. These were analysed to determine the effects of temperature and daylength on the duration of the period from sowing until anthesis. A simple, two-phase thermal time accumulation model, modified by daylength in the post emergence phase, accounted for most of the variation (n = 6, CV = 6%).

        Zhao, G. Q., et al. (2009). "Response of Nitrogen Uptake and Partitioning to Critical Nitrogen Supply in Oat Cultivars." Crop Science 49(3): 1040-1048.
        	Nitrogen uptake and partitioning in oat (Avena sativa L.) are not well documented. A greenhouse study was conducted to determine the critical timing of N supply on the growth, N uptake, and partitioning. Plants grown in plastic pots were subjected to five N fertilization regimes: (i) control, N supply from seedling to physiological maturity (PM); (ii) N supply from seedling to flag leaf; (iii) N supply from flag leaf to PM; (iv) N supply from seedling to heading; and (v) N supply from heading to PM. Leaf chlorophyll content, plant dry matter (DM), and N uptake and accumulation were measured. Total plant DM was 21% greater for naked 'VAO-2' than for covered 'Prescott', while both genotypes produced similar grain yields. Varietal differences in total plant N were significant (P < 0.05) with average of 18% higher N content for VAO-2, but most of its accumulated N was in the vegetative components. For both varieties, N supply was more critical before heading than thereafter. Compared with the control, restriction of N supply from seedling to flag leaf stage significantly reduced spikelet number (28%) and grain yield (26%). Withholding N supply until heading reduced yield by up to 65% and N uptake by 75%. No yield reduction occurred when N was withheld from flag leaf or heading to PM. Although naked VAO-2 accumulated more N than Prescott under the same conditions, partitioning of N to the grain in VAO-2 was less efficient.
      OrganArbitrator Arbitrator
        RelativeAllocation NArbitrator
        RelativeAllocation DMArbitrator
      Phenology: DaysAfterSowing=0
        Memo
          The oats varieties used in this model have shown no sign of winter vernilisation, and the models used here reflect that.

          The data  shows a slowdown in phenological developement in winter conditions, which could be due to temperature and photo period.

          Here we go with published data of Martin et al which usesa Photo Thermal model.
        MultiplyFunction ThermalTime
          Memo
            Photothermal time based on Sonego 1997

            TTbase = T-0

            FP = Max (0, (P -7)/9)

            TT = TTBase*FP

            Note.  Effectively Mid winter thermal time approaces 0, whereas midsummer approaches TTbase thus mabely accumlating a low temperature eefect.
          AirTemperatureFunction ThermalTimeB0
            XYPairs: X=[0, 15, 30, 40]; Y=[0, 15, 30, 0]
            Memo
              Thermal time determines the rate of developmental progress through many of the crops phases and is used by organs to determing potential growth rates.
          MaximumFunction FP
            Constant Zero: FixedValue=0
            DivideFunction
              SubtractFunction PP7
                VariableReference Photoperiod: VariableName=[Phenology].Photoperiod.Value()
                Constant Seven: FixedValue=7
              Constant Nine: FixedValue=9
        SoilTemperatureFunction: maxt_soil_surface=20; mint_soil_surface=10
          XYPairs: X=[0, 30, 40]; Y=[0, 30, 0]
        PhotoperiodFunction Photoperiod: Twilight=-6; DayLength=0
        PhotoperiodDeltaFunction: Twilight=-6
        PhaseLookup PercievedPhotoPeriod
          PhaseLookupValue ApexBelowGround: Start=Germination; End=Emergence
            Constant Photoperiod: FixedValue=0; Units=h
          PhaseLookupValue ApexAboveGround: Start=Emergence; End=HarvestRipe
            MultiplyFunction
              VariableReference Photoperiod: VariableName=[Phenology].Photoperiod.Value()
              LinearInterpolationFunction: XProperty=[Phenology].PhotoperiodDeltaFunction.Value()
                XYPairs: X=[-24, 0, 0.1, 24]; Y=[0, 0, 1, 1]
        Constant VrnSensitivity: FixedValue=0; Units=Leaves
          Memo
            The difference between Inherent earlyness leaf number and the number of leaves produced when the plant is unvernalisaed and grown in long photoperiod

            Not used in oats
        Constant MinimumLeafNumber: FixedValue=6; Units=Leaves
          Memo
            Number of leaves the plant will produce when fully vernalised early and grown in long photoperiod
        Constant VernLag: FixedValue=1; Units=Unitless
          Memo
            The amount of vernalising temperature required before vernalisation response will be evident.  Value of relative to the amount offl vernalisation temperature required from the end of the lag until vernalisation saturation.  A value of 0 means there is no lag, a value of 1 means the lag is the same (in vernal time) as the vernalisation requirement and a value of 2 means the lag is twice as long as the vernalisation response phase

            Not used in oats
        Constant PpSensitivity: FixedValue=6; Units=Leaves
          Memo
            The reduction in leaf number going from 8 to 16 h Pp

            Not used in current oat model
        Constant EarlyReproductivePpSensitivity: FixedValue=0
          Memo
            The phyllochrons duration for the plant to go from flag leaf ligual appearance at 16 h Pp compared to the phyllochron duration for the same phase at 8 h Pp.

            Not used in curreent oat model.
        Constant EarlyReproductiveLongDayBase: FixedValue=2.5
          Memo
            The phyllochrons duration for the plant to go from flag leaf ligual appearance at 16 h Pp.

            Not used in current oat model.
        GerminatingPhase Germinating: Start=Sowing; End=Germination
        EmergingPhase Emerging: Start=Germination; End=Emergence; ShootLag=40; ShootRate=3
          VariableReference ThermalTime: VariableName=[Phenology].ThermalTime.Value()
        GenericPhase Vegetative: Start=Emergence; End=VS
          Memo
            This is the first 4-6 leaf growth of the emerged oat plant, In the current model is decides the final leaf number based on Martin et al 1998.

            At the end of this grwth stage a trigger event occurs which calculates the FLN.

            Currently the leaf number is 4, due to March sowings in which th sixth leaf dosn'y emerge until after june.
          VariableReference ThermalTime: VariableName=[Phenology].ThermalTime.Value()
          MultiplyFunction Target
            Constant Six: FixedValue=4
            VariableReference Phyll: VariableName=[Structure].BasePhyllochron.Value()
        GenericPhase EarlyReproductive: Start=VS; End=TerminalSpikelet
          Memo
            Growth occurs until terminal spikelet occurs.

            In this case TS is driven fron the FLN

            Duration is (TS-6)*Phyllocgron
          VariableReference ThermalTime: VariableName=[Phenology].ThermalTime.Value()
          MultiplyFunction Target
            SubtractFunction
              VariableReference TST: VariableName=[Structure].TSLN.Value()
              Constant Six: FixedValue=6
            VariableReference Phyllochron: VariableName=[Structure].BasePhyllochron.Value()
        GenericPhase StemElongation: Start=TerminalSpikelet; End=FlagLeaf
          Memo
            The Time for the FlagLeaf to appear post TS

            1.5 * Phyylchron
          VariableReference ThermalTime: VariableName=[Phenology].ThermalTime.Value()
          MultiplyFunction Target
            VariableReference Phyllochron: VariableName=[Structure].BasePhyllochron.Value()
            Constant exp: FixedValue=1.5
        GenericPhase EarDevelopment: Start=FlagLeaf; End=Flowering
          VariableReference ThermalTime: VariableName=[Phenology].ThermalTime.Value()
          Memo
            The Time from flagLeaf  appearanace  to flowering

            Was constant at 100, however have cahnge it 1 Phyllchron.
          MultiplyFunction Target
            VariableReference Phyllochron: VariableName=[Structure].BasePhyllochron.Value()
            Constant exp: FixedValue=1
        GenericPhase GrainDevelopment: Start=Flowering; End=StartGrainFill
          Constant Target: FixedValue=240
          VariableReference ThermalTime: VariableName=[Phenology].ThermalTime.Value()
        GenericPhase GrainFilling: Start=StartGrainFill; End=EndGrainFill
          Constant Target: FixedValue=900
          VariableReference ThermalTime: VariableName=[Phenology].ThermalTime.Value()
        GenericPhase Maturing: Start=EndGrainFill; End=Maturity
          Constant Target: FixedValue=35
          VariableReference ThermalTime: VariableName=[Phenology].ThermalTime.Value()
        GenericPhase Ripening: Start=Maturity; End=HarvestRipe
          Constant Target: FixedValue=300
          VariableReference ThermalTime: VariableName=[Phenology].ThermalTime.Value()
        EndPhase ReadyForHarvesting: Start=HarvestRipe; End=Unused
          VariableReference ThermalTime: VariableName=[Phenology].ThermalTime.Value()
        ZadokPMF Zadok
        OnEventFunction FlagLeafDAS: SetEvent=FlagLeaf; ReSetEvent=never
          Memo
            A function is used to provide flowering date as days after sowing(DAS).
          Constant PreEventValue: FixedValue=0
          VariableReference PostEventValue: VariableName=[Phenology].DaysAfterSowing
        OnEventFunction FloweringDAS: SetEvent=Flowering; ReSetEvent=never
          Memo
            A function is used to provide flowering date as days after sowing(DAS).
          Constant PreEventValue: FixedValue=0
          VariableReference PostEventValue: VariableName=[Phenology].DaysAfterSowing
        OnEventFunction MaturityDAS: SetEvent=Maturity; ReSetEvent=never
          Memo
            A function is used to provide maturity date as days after sowing(DAS).
          Constant PreEventValue: FixedValue=0
          VariableReference PostEventValue: VariableName=[Phenology].DaysAfterSowing
      Structure: Initialised=false; Germinated=false; Emerged=false; CohortToInitialise=0; TipToAppear=0; ApexNum=0
        VariableReference ThermalTime: VariableName=[Phenology].ThermalTime.Value()
        MultiplyFunction MainStemNodeAppearanceRate
          Memo Rational
            Based on [Jamieson_SIRIUS_1998] where leaf appearace could be described by a base phyllochron determined between leaves 2 and 7 and a phyllochron that was 70% of base phyllochron for leaves < 2 and 130% of base phyllochron for leaves > 7
          LinearInterpolationFunction LeafStageFactor: XProperty=[Leaf].AppearedCohortNo
            XYPairs: X=[0, 2, 4, 6, 8, 14, 18]; Y=[0.75, 0.9, 1, 1.1, 1.2, 1.4, 1.5]
          LinearInterpolationFunction PhotoPeriodEffect: XProperty=[Phenology].Photoperiod.Value()
            XYPairs: X=[8, 12, 14]; Y=[1, 1, 1]
          VariableReference Phyllochron: VariableName=[Structure].BasePhyllochron.Value()
        MultiplyFunction BranchingRate
          PhaseLookup PotentialBranchingRate
            PhaseLookupValue Vegetative: Start=Emergence; End=TerminalSpikelet
              LinearInterpolationFunction PotentialBranchingRate: XProperty=[Structure].LeafTipsAppeared
                XYPairs: X=[1, 2, 3, 4, 5, 6, 7, 8]; Y=[0, 0, 1, 2, 4, 7, 12, 20]
            PhaseLookupValue Reproductive: Start=TerminalSpikelet; End=HarvestRipe
              Constant Zero: FixedValue=0
          MinimumFunction StressFactors
            LinearInterpolationFunction WSC: XProperty=[Stem].PercentWSC.Value()
              XYPairs: X=[0.2, 0.27]; Y=[1, 1]
            LinearInterpolationFunction Nitrogen: XProperty=[Arbitrator].FN
              XYPairs: X=[0.5, 2, 3]; Y=[0, 1, 1]
            LinearInterpolationFunction Cover: XProperty=[Leaf].CoverTotal
              XYPairs: X=[0, 0.1, 0.25]; Y=[1, 1, 0]
            LinearInterpolationFunction Growth: XProperty=[Structure].MeanTillerGrowthRate.Value()
              XYPairs: X=[0, 0.001, 0.005]; Y=[1, 1, 1]
            LinearInterpolationFunction PhotoPeriodEffect: XProperty=[Phenology].Photoperiod.Value()
              XYPairs: X=[11.99, 12, 14]; Y=[1, 1, 1]
            LinearInterpolationFunction TemperatureEffect: XProperty=[Weather].MeanT
              XYPairs: X=[4, 10, 14]; Y=[1, 1, 1]
        PhaseLookup BranchMortality
          PhaseLookupValue MortalityPhase: Start=FlagLeaf; End=Flowering
            MultiplyFunction Mortality
              LinearInterpolationFunction MortalityPerDegDay: XProperty=[Structure].MeanTillerGrowthRate.Value()
                XYPairs: X=[0, 0.005, 0.005]; Y=[0.002, 0, 0]
              VariableReference ThermalTime: VariableName=[Phenology].ThermalTime.Value()
        HeightFunction HeightModel
          LinearInterpolationFunction PotentialHeight: XProperty=[Phenology].Stage
            XYPairs: X=[3, 4, 5, 6, 7]; Y=[10, 200, 1000, 1100, 1200]
          LinearInterpolationFunction WaterStress: XProperty=[Oats].WaterSupplyDemandRatio
            XYPairs: X=[0.3, 1]; Y=[0, 1]
        MovingAverageFunction MeanTillerGrowthRate: NumberOfDays=5; InitialValue=0
          DivideFunction TillerGrowthRate
            VariableReference DailyGrowth: VariableName=[Arbitrator].DM.TotalFixationSupply
            VariableReference ThermalTime: VariableName=[Phenology].ThermalTime.Value()
            VariableReference StemPopulation: VariableName=[Structure].TotalStemPopn
        MovingAverageFunction MeanPhyllochron: NumberOfDays=300; InitialValue=80
          VariableReference Phyllochron: VariableName=[Structure].MainStemNodeAppearanceRate.Value()
        DivideFunction HaunStageTerminalSpikelet
          SubtractFunction FLNlessIntercept
            VariableReference FinalLeafNumber: VariableName=[Structure].MainStemFinalNodeNumber.Value()
            Constant Intercept: FixedValue=2.85
          Constant Slope: FixedValue=1.1
        AddFunction HaunStage
          VariableReference AppearedLeaves: VariableName=[Leaf].ExpandedCohortNo
          VariableReference ProportionOfExpandingLeaf: VariableName=[Leaf].NextExpandingLeafProportion
        PhaseLookup ThermalTimeP
          PhaseLookupValue SoilTemperature: Start=Sowing; End=TerminalSpikelet
            SoilTemperatureFunction: maxt_soil_surface=20; mint_soil_surface=10
              XYPairs: X=[0, 30, 40]; Y=[0, 30, 0]
          PhaseLookupValue AirTemperature: Start=TerminalSpikelet; End=HarvestRipe
            AirTemperatureFunction
              XYPairs: X=[0, 30, 40]; Y=[0, 30, 0]
        MinimumFunction MainStemFinalNodeNumber
          Memo
            An event driven method of calculating the final leaf number, Base on Martin et al 1998

            Event  occurs when vegtative stage switches to Reproductive, either 4 or 6 leaf appearance.

            If event occurs when PhotoPeriod is decreasing, then final leaf number is the MLN -2.

            Otherwise

            FLN = MLN - lc(PPS)

            For Drummond these values  MLN = 17 and Lc = 0.56

            THe model allows these to be cultivar deined.
          Constant MaxLN: FixedValue=15
          MinimumFunction FLN
            OnEventFunction AtLeafSix: SetEvent=VS; ReSetEvent=never
              VariableReference PreEventValue: VariableName=[Structure].MaxLN.Value()
              MaximumFunction PostEventValue
                Constant Zero: FixedValue=0
                LessThanFunction
                  VariableReference TestVariable: VariableName=[Phenology].PhotoperiodDeltaFunction.Value()
                  Constant Zero: FixedValue=0
                  SubtractFunction IfTrue
                    VariableReference MLN: VariableName=[Structure].MaxLN.Value()
                    Constant Two: FixedValue=2
                  SubtractFunction IfFalse
                    VariableReference MLN: VariableName=[Structure].MaxLN.Value()
                    MultiplyFunction Ic
                      VariableReference PP: VariableName=[Phenology].Photoperiod.Value()
                      VariableReference PPS: VariableName=[Structure].PPSlope.Value()
            VariableReference MLN: VariableName=[Structure].MaxLN.Value()
        MinimumFunction TSLN
          Memo
            Terminal spikelet leaf number

            This value is highly related to final leaf number, The FLN is probably dependent on TSLN rather than as cuurently defined.

            Calculation baed on Sonego 2000

            TSLN = FLN*0.995 - 1.95
          VariableReference MLN: VariableName=[Structure].MaxLN.Value()
          SubtractFunction
            MultiplyFunction
              VariableReference FLN: VariableName=[Structure].MainStemFinalNodeNumber.Value()
              Constant PS: FixedValue=0.995
            Constant LVS: FixedValue=1.95
        Constant MaxLN: FixedValue=17
        Constant BasePhyllochron: FixedValue=90; Units=oC.d
        Constant PPSlope: FixedValue=0.5
        Constant StemSenescenceAge: FixedValue=0
      ReproductiveOrgan Grain: GrowthRespiration=0; MaintenanceRespiration=0; RipeStage=Ripe
        Memo
          Grain model current a pure supply model, that is currently uses  a partition model to determine amount

          The grain Number model model left here does nothing, it is there so we can switch to it later if required.

          N conc values are from Zhao et al 2009
        Biomass Live
        Biomass Dead
        Constant MaxNConcDailyGrowth: FixedValue=0.03
        Constant WaterContent: FixedValue=0.12
        Constant MinimumNConc: FixedValue=0.032; Units=0.045
        Constant MaximumNConc: FixedValue=0.03
        Constant MaximumPotentialGrainSize: FixedValue=0.043; Units=g
        PhaseBasedSwitch NitrogenDemandSwitch: Start=Germination; End=Maturity
        AccumulateFunction AccumThermalTime: StartStageName=Flowering; EndStageName=Maturity; FractionRemovedOnCut=0; FractionRemovedOnHarvest=0; FractionRemovedOnGraze=0; FractionRemovedOnPrune=0
          VariableReference DailyThermalTimeValue: VariableName=[Phenology].ThermalTime.Value()
        AirTemperatureFunction FillingRate
          XYPairs: X=[0, 26, 30, 35]; Y=[0, 0.0015, 0.0015, 0.0015]
        PartitionFractionDemandFunction DMDemandFunction
          Memo
            Currently using Partitioning model based on SIRIUS rather tha grin filling model.
          PhaseLookup PartitionFraction
            PhaseLookupValue InitialPhase: Start=Flowering; End=StartGrainFill
              Constant: FixedValue=0.01
            PhaseLookupValue LinearPhase: Start=StartGrainFill; End=EndGrainFill
              MultiplyFunction
                Constant: FixedValue=0.6
                LinearInterpolationFunction FW: XProperty=[Leaf].Fw
                  XYPairs: X=[0, 0.5, 1]; Y=[1.5, 1, 1]
            PhaseLookupValue Ripening: Start=EndGrainFill; End=HarvestRipe
              Constant: FixedValue=0
        ExpressionFunction Protein
          Expression=([Grain].Live.N + [Grain].Dead.N)/([Grain].Live.Wt + [Grain].Dead.Wt) * 100 * 5.71
        DivideFunction GrowthRateGrainDevelopment
          AccumulateFunction AccumulatedGrowth: StartStageName=FlagLeaf; EndStageName=StartGrainFill; FractionRemovedOnCut=0; FractionRemovedOnHarvest=0; FractionRemovedOnGraze=0; FractionRemovedOnPrune=0
            VariableReference DailyBiomassProduction: VariableName=[Arbitrator].DM.TotalFixationSupply
          AccumulateFunction DaysOfGrainDevelopment: StartStageName=FlagLeaf; EndStageName=StartGrainFill; FractionRemovedOnCut=0; FractionRemovedOnHarvest=0; FractionRemovedOnGraze=0; FractionRemovedOnPrune=0
            Constant LenthOfADay: FixedValue=1; Units=days/day
        Constant InitialGrainProportion: FixedValue=0.2
        PhaseLookup NFillingRate
          PhaseLookupValue GrainFilling: Start=Flowering; End=EndGrainFill
            FillingRateFunction
              VariableReference NumberFunction: VariableName=[Grain].NumberFunction.Value()
              AddFunction FillingDuration
                VariableReference FloweringToGrainFilling: VariableName=[Phenology].GrainDevelopment.Target.Value()
                VariableReference GrainFilling: VariableName=[Phenology].GrainFilling.Target.Value()
              VariableReference ThermalTime: VariableName=[Phenology].ThermalTime.Value()
              MultiplyFunction PotentialSizeIncrement
                Constant MaximumFinalNConc: FixedValue=0.026; Units=g/g
                VariableReference MaximumSize: VariableName=[Grain].MaximumPotentialGrainSize.Value()
        BiomassRemoval BiomassRemovalDefaults
          OrganBiomassRemovalType Harvest: FractionLiveToRemove=1; FractionDeadToRemove=0; FractionLiveToResidue=0; FractionDeadToResidue=0
          OrganBiomassRemovalType Cut: FractionLiveToRemove=1; FractionDeadToRemove=0; FractionLiveToResidue=0; FractionDeadToResidue=0
          OrganBiomassRemovalType Prune: FractionLiveToRemove=0; FractionDeadToRemove=0; FractionLiveToResidue=0.8; FractionDeadToResidue=0
          OrganBiomassRemovalType Graze: FractionLiveToRemove=0.6; FractionDeadToRemove=0; FractionLiveToResidue=0.2; FractionDeadToResidue=0
          OrganBiomassRemovalType Thin: FractionLiveToRemove=0; FractionDeadToRemove=0; FractionLiveToResidue=0.05; FractionDeadToResidue=0
        HoldFunction NumberFunction: WhenToHold=Flowering
          MultiplyFunction ValueToHold
            Constant GrainsPerGramOfStem: FixedValue=22; Units=grains
            VariableReference StemMass: VariableName=[StemPlusPanicle].Wt
              VariableReference StemMass: VariableName=[StemPlusPanicle].Wt
      Root: GrowthRespiration=0; MaintenanceRespiration=0
        CompositeBiomass Live: Propertys=[[Root].LayerLive]
        CompositeBiomass Dead: Propertys=[[Root].LayerDead]
        LinearInterpolationFunction KLModifier: XProperty=[Leaf].LAI
          XYPairs: X=[0, 3]; Y=[1, 1]
        Constant SoilWaterEffect: FixedValue=1
        Constant MaxDailyNUptake: FixedValue=20
        Constant SenescenceRate: FixedValue=0.005
        Constant StructuralFraction: FixedValue=1
        Constant MaximumRootDepth: FixedValue=1000000
        Constant MaximumNConc: FixedValue=0.01
        Constant MinimumNConc: FixedValue=0.01
        PhaseLookup RootFrontVelocity
          PhaseLookupValue PreEmergence: Start=Germination; End=Emergence
            Constant Value: FixedValue=5
          PhaseLookupValue PostEmergence: Start=Emergence; End=Maturity
            Constant Value: FixedValue=20
        PhaseBasedSwitch NitrogenDemandSwitch: Start=Germination; End=Maturity
        BiomassRemoval BiomassRemovalDefaults
          OrganBiomassRemovalType Harvest: FractionLiveToRemove=0; FractionDeadToRemove=0; FractionLiveToResidue=0.2; FractionDeadToResidue=0
          OrganBiomassRemovalType Cut: FractionLiveToRemove=0; FractionDeadToRemove=0; FractionLiveToResidue=0.3; FractionDeadToResidue=0
          OrganBiomassRemovalType Prune: FractionLiveToRemove=0; FractionDeadToRemove=0; FractionLiveToResidue=0.1; FractionDeadToResidue=0
          OrganBiomassRemovalType Graze: FractionLiveToRemove=0; FractionDeadToRemove=0; FractionLiveToResidue=0.15; FractionDeadToResidue=0
          OrganBiomassRemovalType Thin: FractionLiveToRemove=0; FractionDeadToRemove=0; FractionLiveToResidue=0.05; FractionDeadToResidue=0
        LinearInterpolationFunction KNO3: XProperty=[Root].LengthDensity
          XYPairs: X=[0, 0.004]; Y=[0.002, 0.02]
        LinearInterpolationFunction KNH4: XProperty=[Root].LengthDensity
          XYPairs: X=[0, 0.004]; Y=[0.001, 0.01]
        LinearInterpolationFunction NUptakeSWFactor: XProperty=[Root].RWC
          XYPairs: X=[0, 0.2, 1]; Y=[1, 1, 1]
        Constant InitialDM: FixedValue=0.2; Units=g/plant
        Constant SpecificRootLength: FixedValue=40; Units=m/g
        PartitionFractionDemandFunction DMDemandFunction
          PhaseLookup PartitionFraction
            PhaseLookupValue PreEmergence: Start=Germination; End=Emergence
              Constant Value: FixedValue=0
            PhaseLookupValue PreFlowering: Start=Emergence; End=Flowering
              Constant Value: FixedValue=0.2
            PhaseLookupValue PostFlowering: Start=Flowering; End=EndGrainFill
              Constant Value: FixedValue=0
      Leaf: MaxCover=1; Albedo=0.2; Gsmax=0.015; R50=150; MicroClimatePresent=true; KDead=0.3; MaximumMainStemLeafNumber=30
        zero: GrowthRespiration, MaintenanceRespiration, CurrentExpandingLeaf, StartFractionExpanded, FractionNextleafExpanded, DeadNodesYesterday, FRGR, PotentialEP, DMConversionEfficiency, TipsAtEmergence, CohortsAtInitialisation, FractionDied
        LeafCohort InitialLeaves[1]: Rank=1; Area=200
          zero: NReallocationFactor, DMReallocationFactor, NRetranslocationFactor, DMRetranslocationFactor, ShadeInducedSenRate, SenescedFrac, DeltaPotentialArea, DeltaWaterConstrainedArea, DeltaCarbonConstrainedArea, PotentialStructuralDMAllocation, PotentialMetabolicDMAllocation, MetabolicNReallocated, MetabolicWtReallocated, NonStructuralNReallocated, NonStructuralWtReallocated, MetabolicNRetranslocated, NonStructuralNRetrasnlocated, DMRetranslocated, MetabolicNAllocation, StructuralDMAllocation, MetabolicDMAllocation, MaintenanceRespiration
        LeafCohort InitialLeaves[2]: Rank=2
          zero: NReallocationFactor, DMReallocationFactor, NRetranslocationFactor, DMRetranslocationFactor, ShadeInducedSenRate, SenescedFrac, DeltaPotentialArea, DeltaWaterConstrainedArea, DeltaCarbonConstrainedArea, PotentialStructuralDMAllocation, PotentialMetabolicDMAllocation, MetabolicNReallocated, MetabolicWtReallocated, NonStructuralNReallocated, NonStructuralWtReallocated, MetabolicNRetranslocated, NonStructuralNRetrasnlocated, DMRetranslocated, MetabolicNAllocation, StructuralDMAllocation, MetabolicDMAllocation, Area, MaintenanceRespiration
        CompositeBiomass Live: Propertys=[[Leaf].CohortLive]
        CompositeBiomass Dead: Propertys=[[Leaf].CohortDead]
        ArrayBiomass CohortArrayLive: Propertys=[[Leaf].Live]; ArraySize=[Leaf].MaxNodeNo
        ArrayBiomass CohortArrayDead: Propertys=[[Leaf].Dead]; ArraySize=[Leaf].MaxNodeNo
        LeafCohortParameters CohortParameters
          Constant NReallocationFactor: FixedValue=1
          Constant MaintenanceRespirationFunction: FixedValue=0
          Constant NRetranslocationFactor: FixedValue=0.03
          Constant DMReallocationFactor: FixedValue=0
          Constant DMRetranslocationFactor: FixedValue=0.1
          MinimumFunction CellDivisionStress
            LinearInterpolationFunction WaterStressFactor: XProperty=[Oats].WaterSupplyDemandRatio
              XYPairs: X=[0, 1]; Y=[0.5, 1]
            LinearInterpolationFunction NitrogenStressFactor: XProperty=[Oats].Leaf.Fn
              XYPairs: X=[0, 0.5, 1]; Y=[0.1, 0.1, 1]
          MinimumFunction ExpansionStress
            LinearInterpolationFunction WaterStress: XProperty=[Oats].WaterSupplyDemandRatio
              XYPairs: X=[0, 0.7, 1]; Y=[0, 1, 1]
            LinearInterpolationFunction TemperatureEffect: XProperty=[Weather].MeanT
              XYPairs: X=[0, 12, 14]; Y=[0, 1, 1]
          MultiplyFunction MaxArea
            Constant AreaLargestLeaves: FixedValue=5000; Units=mm^2
            LinearInterpolationFunction AgeFactor: XProperty=[Phenology].Stage
              XYPairs: X=[3, 4, 5, 7, 9]; Y=[0.1, 0.5, 1, 0.5, 0]
              Memo
                Growth Stages and Phenology
                1 Sowing
                2 Germination
                3 Emergence
                4 VS
                5 TS
                6 FLag leaf
                7 Flowering
                8 SGF
                9 EGF
                10 HR
                11
          MultiplyFunction GrowthDuration
            Constant Multiplier: FixedValue=4
            VariableReference Phyllochron: VariableName=[Structure].MainStemNodeAppearanceRate.Value()
          PhaseLookup LagDurationP
            PhaseLookupValue VegetativeGrowth: Start=Emergence; End=TerminalSpikelet
              MultiplyFunction LagDuration
                VariableReference Phyllochron: VariableName=[Structure].MainStemNodeAppearanceRate.Value()
                LinearInterpolationFunction AgeFactor: XProperty=[Phenology].Stage
                  XYPairs: X=[0, 4, 9, 11]; Y=[1, 7, 9, 0]
                  Memo
                    Growth Stages and Phenology
                    1 Sowing
                    2 Germination
                    3 Emergence
                    4 VS
                    5 TS
                    6 FLag leaf
                    7 Flowering
                    8 SGF
                    9 EGF
                    10 HR
                    11
                Constant Multiplier: FixedValue=1
            PhaseLookupValue StemElongation: Start=TerminalSpikelet; End=Maturity
              SubtractFunction LagDuration
                AddFunction ThermalTimeToRipe
                  VariableReference GrainDevelopment: VariableName=[Phenology].GrainDevelopment.Target.Value()
                  VariableReference GrainFilling: VariableName=[Phenology].GrainFilling.Target.Value()
                  VariableReference Maturing: VariableName=[Phenology].Maturing.Target.Value()
                  VariableReference Ripening: VariableName=[Phenology].Ripening.Target.Value()
                ExpressionFunction SenescenceDuration: Expression=[Leaf].CohortParameters.SenescenceDuration.Value()
          MultiplyFunction LagDuration
            VariableReference Phyllochron: VariableName=[Structure].MainStemNodeAppearanceRate.Value()
            LinearInterpolationFunction AgeFactor: XProperty=[Phenology].Stage
              XYPairs: X=[0, 4, 9, 11]; Y=[1, 2, 3, 0]
              Memo
                Growth Stages and Phenology
                1 Sowing
                2 Germination
                3 Emergence
                4 VS
                5 TS
                6 FLag leaf
                7 Flowering
                8 SGF
                9 EGF
                10 HR
                11
            Constant Multiplier: FixedValue=1
          MultiplyFunction SenescenceDuration
            Constant Multiplier: FixedValue=1
            VariableReference Phyllochron: VariableName=[Structure].MainStemNodeAppearanceRate.Value()
            LinearInterpolationFunction: XProperty=[Leaf].CohortParameters.MaxArea.Value()
              XYPairs: X=[0, 2000, 4500, 6000]; Y=[1, 2, 3, 4]
            LinearInterpolationFunction AgeFactor: XProperty=[Phenology].Stage
              XYPairs: X=[2, 4, 9, 11]; Y=[2, 2, 6, 0]
              Memo
                Growth Stages and Phenology
                1 Sowing
                2 Germination
                3 Emergence
                4 VS
                5 TS
                6 FLag leaf
                7 Flowering
                8 SGF
                9 EGF
                10 HR
                11
          Constant DetachmentLagDuration: FixedValue=1000000
          Constant DetachmentDuration: FixedValue=1000000
          Constant RelativeBranchLeafSize: FixedValue=1
          LinearInterpolationFunction MaximumNConc: XProperty=[Phenology].Stage
            XYPairs: X=[3, 4, 6]; Y=[0.08, 0.05, 0.02]
          LinearInterpolationFunction CriticalNConc: XProperty=[Phenology].Stage
            XYPairs: X=[3, 4, 6]; Y=[0.07, 0.04, 0.015]
          LinearInterpolationFunction MinimumNConc: XProperty=[Phenology].Stage
            XYPairs: X=[3, 4]; Y=[0.01, 0.005]
          AddFunction DroughtInducedLagAcceleration
            Constant One: FixedValue=1
            MultiplyFunction Stress
              Constant StressResponseCoefficient: FixedValue=1
              LinearInterpolationFunction StressFactor: XProperty=[Oats].WaterSupplyDemandRatio
                XYPairs: X=[0, 0.7]; Y=[1, 0]
          AddFunction DroughtInducedSenAcceleration: same as Replacements.Oatz.Leaf.CohortParameters.DroughtInducedLagAcceleration
          LinearInterpolationFunction SpecificLeafAreaMax: XProperty=[Phenology].Stage
            XYPairs: X=[4, 5]; Y=[35000, 50000]
            Memo
              Growth Stages and Phenology
              1 Sowing
              2 Germination
              3 Emergence
              4 VS
              5 TS
              6 FLag leaf
              7 Flowering
              8 SGF
              9 EGF
              10 HR
              11
          Constant SpecificLeafAreaMin: FixedValue=25000
          Constant InitialNConc: FixedValue=0
          Constant NonStructuralFraction: FixedValue=0.5
          Constant LeafSizeShapeParameter: FixedValue=0.3
          Constant SenessingLeafRelativeSize: FixedValue=1; Units=0-1
          MultiplyFunction ShadeInducedSenescenceRate
            LinearInterpolationFunction RatePerDegDay: XProperty=[Leaf].CohortCurrentRankCoverAbove
              XYPairs: X=[0.99, 1]; Y=[0, 0]
              Memo
                1% per degree day means it takes one phyllochron for a shaded leaf to fully sceness
            VariableReference ThermalTime: VariableName=[Phenology].ThermalTime.Value()
          PhaseLookup StructuralFraction
            PhaseLookupValue VegetativeGrowth: Start=Emergence; End=StartGrainFill
              Constant: FixedValue=0.5
            PhaseLookupValue StemElongation: Start=StartGrainFill; End=Maturity
              Constant: FixedValue=0
        RUEModel Photosynthesis
          Constant RUE: FixedValue=1.5
          WeightedTemperatureFunction FT: MaximumTemperatureWeighting=1
            XYPairs: X=[0, 4, 9, 15, 40]; Y=[0, 0, 1, 1, 1]
          LinearInterpolationFunction FVPD: XProperty=[Leaf].Photosynthesis.VPD
            XYPairs: X=[0, 10, 50]; Y=[1, 1, 1]
          LinearInterpolationFunction FN: XProperty=[Leaf].Fn
            XYPairs: X=[0, 1, 1.5]; Y=[0, 1, 1]
          LinearInterpolationFunction FW: XProperty=[Leaf].Fw
            XYPairs: X=[0, 0.3, 1]; Y=[0, 1, 1]
          RUECO2Function FCO2: PhotosyntheticPathway=C3
          VariableReference RadnInt: VariableName=[Leaf].RadIntTot
        LinearInterpolationFunction FrostFraction: XProperty=[Weather].MinT
          XYPairs: X=[-1, 0]; Y=[0, 0]
        VariableReference ThermalTime: VariableName=[Phenology].ThermalTime.Value()
        MinimumFunction FRGRFunction
          VariableReference RUE_FT: VariableName=[Leaf].Photosynthesis.FT.Value()
          MinimumFunction Others
            VariableReference RUE_FN: VariableName=[Leaf].Photosynthesis.FN.Value()
            VariableReference RUE_FVPD: VariableName=[Leaf].Photosynthesis.FVPD.Value()
        BiomassRemoval BiomassRemovalDefaults
          OrganBiomassRemovalType Harvest: FractionLiveToRemove=0; FractionDeadToRemove=0; FractionLiveToResidue=0.3; FractionDeadToResidue=0.3
          OrganBiomassRemovalType Cut: FractionLiveToRemove=0.8; FractionDeadToRemove=0.8; FractionLiveToResidue=0; FractionDeadToResidue=0
          OrganBiomassRemovalType Prune: FractionLiveToRemove=0; FractionDeadToRemove=0; FractionLiveToResidue=0.6; FractionDeadToResidue=0.6
          OrganBiomassRemovalType Graze: FractionLiveToRemove=0.6; FractionDeadToRemove=0.6; FractionLiveToResidue=0.1; FractionDeadToResidue=0.1
          OrganBiomassRemovalType Thin: FractionLiveToRemove=0; FractionDeadToRemove=0; FractionLiveToResidue=0.05; FractionDeadToResidue=0.05
        Constant ExtinctionCoeff: FixedValue=0.5
        Constant StructuralFraction: FixedValue=0
        Constant DMConversionEfficiencyFunction: FixedValue=1; Units=0-1
        ApexStandard
      GenericOrgan Panicle
        PopulationBasedDemandFunction DMDemandFunction
          VariableReference ThermalTime: VariableName=[Phenology].ThermalTime.Value()
          Constant ExpansionStress: FixedValue=1
          VariableReference OrganPopulation: VariableName=[Panicle].HeadNumber.Value()
          Constant StartStage: FixedValue=4.5
          Constant MaximumOrganWt: FixedValue=0.2
          AddFunction GrowthDuration
            VariableReference EarlyReproductive: VariableName=[Phenology].EarlyReproductive.Target.Value()
            VariableReference GrainDevelopment: VariableName=[Phenology].GrainDevelopment.Target.Value()
        Biomass Live
        Biomass Dead
        Constant NReallocationFactor: FixedValue=0
        Constant NRetranslocationFactor: FixedValue=0.1
        Constant MaximumNConc: FixedValue=0.01
        Constant StructuralFraction: FixedValue=0.9
        Constant SenescenceRate: FixedValue=0; Units=/d
        Constant MinimumNConc: FixedValue=0.003
        MultiplyFunction HeadNumber
          Constant FertileTillers: FixedValue=1
          VariableReference StemPopulation: VariableName=[Structure].TotalStemPopn
        BiomassRemoval BiomassRemovalDefaults
          OrganBiomassRemovalType Harvest: FractionLiveToRemove=0.5; FractionDeadToRemove=0; FractionLiveToResidue=0.1; FractionDeadToResidue=0
          OrganBiomassRemovalType Cut: FractionLiveToRemove=0.8; FractionDeadToRemove=0; FractionLiveToResidue=0; FractionDeadToResidue=0
          OrganBiomassRemovalType Prune: FractionLiveToRemove=0; FractionDeadToRemove=0; FractionLiveToResidue=0.6; FractionDeadToResidue=0
          OrganBiomassRemovalType Graze: FractionLiveToRemove=0.6; FractionDeadToRemove=0; FractionLiveToResidue=0.2; FractionDeadToResidue=0
          OrganBiomassRemovalType Thin: FractionLiveToRemove=0; FractionDeadToRemove=0; FractionLiveToResidue=0.05; FractionDeadToResidue=0
        PhaseBasedSwitch NitrogenDemandSwitch: Start=Emergence; End=StartGrainFill
        PhaseLookup DMRetranslocationFactor
          PhaseLookupValue VegetativeGrowth: Start=Emergence; End=StartGrainFill
            Constant DMRetranslocationFactor: FixedValue=0
          PhaseLookupValue ReproductiveGrowth: Start=StartGrainFill; End=EndGrainFill
            Constant DMRetranslocationFactor: FixedValue=0.5
        Constant InitialWtFunction: FixedValue=0; Units=g/m^2
        Constant DetachmentRateFunction: FixedValue=0; Units=/d
        Constant MaintenanceRespirationFunction: FixedValue=0; Units=0-1
        Constant DMConversionEfficiency: FixedValue=1; Units=0-1
        Constant DMReallocationFactor: FixedValue=0
        VariableReference CriticalNConc: VariableName=[Panicle].MinimumNConc.Value()
      GenericOrgan Stem
        Memo
          The stem model  currently uses  a partition model to determine amount allocated

          N conc values are from Zhao et al 2009
        Biomass Live
        Biomass Dead
        PhaseLookup StructuralFraction
          PhaseLookupValue VegetativeGrowth: Start=Sowing; End=FlagLeaf
            Constant Fraction: FixedValue=0.7
          PhaseLookupValue ReproductiveGrowth: Start=FlagLeaf; End=Flowering
            Constant Fraction: FixedValue=0.7
          PhaseLookupValue GrainFilling: Start=Flowering; End=EndGrainFill
            Constant Fraction: FixedValue=1
          PhaseLookupValue EndStemGrowth: Start=EndGrainFill; End=Maturity
            Constant Fraction: FixedValue=1
        Constant SenescenceRate: FixedValue=0; Units=/d
        LinearInterpolationFunction MaximumNConc: XProperty=[Phenology].Stage
          XYPairs: X=[3, 4, 5, 6]; Y=[0.045, 0.045, 0.045, 0.045]
        LinearInterpolationFunction MinimumNConc: XProperty=[Phenology].Stage
          XYPairs: X=[3, 4, 6]; Y=[0.0025, 0.0025, 0.0025]
        PhaseBasedSwitch NitrogenDemandSwitch: Start=Emergence; End=StartGrainFill
        Constant NReallocationFactor: FixedValue=0
        PhaseLookup NRetranslocationFactor
          PhaseLookupValue VegetativeGrowth: Start=Sowing; End=Flowering
            Constant Fraction: FixedValue=0
          PhaseLookupValue ReproductiveGrowth: Start=Flowering; End=HarvestRipe
            Constant Fraction: FixedValue=0.5
        PhaseLookup DMRetranslocationFactor: same as Replacements.Oatz.Panicle.DMRetranslocationFactor
        PartitionFractionDemandFunction DMDemandFunction
          PhaseLookup PartitionFraction
            PhaseLookupValue PreStemElongation: Start=Emergence; End=TerminalSpikelet
              Constant StemFraction: FixedValue=0.4
            PhaseLookupValue StemElongation: Start=TerminalSpikelet; End=FlagLeaf
              Constant StemFraction: FixedValue=0.6
            PhaseLookupValue EarEmergence: Start=FlagLeaf; End=Flowering
              Constant StemFraction: FixedValue=0.4
            PhaseLookupValue PostEarEmergence: Start=Flowering; End=StartGrainFill
              Constant StemFraction: FixedValue=0.4
              SubtractFunction
                Constant: FixedValue=0
            PhaseLookupValue BGF: Start=StartGrainFill; End=EndGrainFill
              Constant StemFraction: FixedValue=0.1
              SubtractFunction
                Constant: FixedValue=0
            PhaseLookupValue PostGrainFill: Start=EndGrainFill; End=HarvestRipe
              Constant One: FixedValue=0
              VariableReference: VariableName=[Grain].PartitionFraction.Value()
        BiomassRemoval BiomassRemovalDefaults: same as Replacements.Oatz.Panicle.BiomassRemovalDefaults
        DivideFunction PercentWSC
          VariableReference WSC: VariableName=[Stem].Live.NonStructuralWt
          VariableReference StemWt: VariableName=[Stem].Live.Wt
        Constant InitialWtFunction: FixedValue=0; Units=g/m^2
        Constant DetachmentRateFunction: FixedValue=0; Units=/d
        Constant MaintenanceRespirationFunction: FixedValue=0; Units=0-1
        Constant DMConversionEfficiency: FixedValue=1; Units=0-1
        Constant DMReallocationFactor: FixedValue=0
        VariableReference CriticalNConc: VariableName=[Stem].MinimumNConc.Value()
      CompositeBiomass AboveGround
        Propertys=[[Leaf].Live, [Leaf].Dead, [Stem].Live, [Stem].Dead, [Panicle].Live, [Panicle].Dead, [Grain].Live, [Grain].Dead]
      CompositeBiomass AboveGroundLive: Propertys=[[Leaf].Live, [Stem].Live, [Panicle].Live, [Grain].Live]
      CompositeBiomass AboveGroundDead: Propertys=[[Leaf].Dead, [Stem].Dead, [Panicle].Dead, [Grain].Dead]
      CompositeBiomass BelowGround: Propertys=[[Root].Live, [Root].Dead]
      CompositeBiomass Total
        Propertys=[[Leaf].Live, [Leaf].Dead, [Stem].Live, [Stem].Dead, [Root].Live, [Root].Dead, [Panicle].Live, [Panicle].Dead, [Grain].Live, [Grain].Dead]
      CompositeBiomass TotalLive
        Propertys=[[Leaf].Live, [Stem].Live, [Root].Live, [Panicle].Live, [Grain].Live]
      CompositeBiomass TotalDead
        Propertys=[[Leaf].Dead, [Stem].Dead, [Root].Dead, [Panicle].Dead, [Grain].Dead]
      CompositeBiomass Ear
        Propertys=[[Panicle].Live, [Grain].Live, [Panicle].Dead, [Grain].Dead]
        Memo
          The Ear composite biomass object includes the Live and dead pools of all organs within the Ear to allow output for total dry matter and Nutrient contents, including total structural, non-structural and metabolic pools.
      CompositeBiomass StemPlusPanicle: Propertys=[[Stem].Live, [Panicle].Live, [Stem].Dead, [Panicle].Dead]
      CultivarFolder Cultivars
        Cultivar Drummond
          Command:
            [Phenology].MinimumLeafNumber.FixedValue = 9
            [Phenology].VrnSensitivity.FixedValue = 7
            [Phenology].PpSensitivity.FixedValue = 3
            [Structure].BasePhyllochron.FixedValue = 80
        Cultivar Milton
          Command:
            [Phenology].MinimumLeafNumber.FixedValue = 9
            [Phenology].VrnSensitivity.FixedValue = 7
            [Phenology].PpSensitivity.FixedValue = 3
            [Structure].BasePhyllochron.FixedValue = 100
        Cultivar Hokunui
          Command:
            [Phenology].MinimumLeafNumber.FixedValue = 9
            [Phenology].VrnSensitivity.FixedValue = 7
            [Phenology].PpSensitivity.FixedValue = 3
            [Structure].BasePhyllochron.FixedValue = 82
            [Structure].PPSlope.FixedValue = 0.4
        Cultivar Stampede
          Command:
            [Phenology].MinimumLeafNumber.FixedValue = 9
            [Phenology].VrnSensitivity.FixedValue = 7
            [Phenology].PpSensitivity.FixedValue = 3
            [Structure].BasePhyllochron.FixedValue = 82
            [Structure].PPSlope.FixedValue = 0.4
        Cultivar Milton1
          Command:
            [Phenology].MinimumLeafNumber.FixedValue = 15
            [Phenology].VrnSensitivity.FixedValue = 7
            [Phenology].PpSensitivity.FixedValue = 3
            [Structure].MaxLN.FixedValue = 15
        Cultivar Coolibah
          Command:
            [Phenology].MinimumLeafNumber.FixedValue = 9
            [Phenology].VrnSensitivity.FixedValue = 7
            [Phenology].PpSensitivity.FixedValue = 3
            [Structure].BasePhyllochron.FixedValue = 80
        Cultivar Taipan
          Command:
            [Phenology].MinimumLeafNumber.FixedValue = 9
            [Phenology].VrnSensitivity.FixedValue = 7
            [Phenology].PpSensitivity.FixedValue = 3
            [Structure].BasePhyllochron.FixedValue = 80
        Cultivar Wintaroo
          Command:
            [Phenology].MinimumLeafNumber.FixedValue = 9
            [Phenology].VrnSensitivity.FixedValue = 7
            [Phenology].PpSensitivity.FixedValue = 3
            [Structure].BasePhyllochron.FixedValue = 80
        Cultivar Kangaroo
          Command:
            [Phenology].MinimumLeafNumber.FixedValue = 9
            [Phenology].VrnSensitivity.FixedValue = 7
            [Phenology].PpSensitivity.FixedValue = 3
            [Structure].BasePhyllochron.FixedValue = 80
        Cultivar Brusher
          Command:
            [Phenology].MinimumLeafNumber.FixedValue = 9
            [Phenology].VrnSensitivity.FixedValue = 7
            [Phenology].PpSensitivity.FixedValue = 3
            [Structure].BasePhyllochron.FixedValue = 80
        Cultivar Algerian
          Command:
            [Phenology].MinimumLeafNumber.FixedValue = 9
            [Phenology].VrnSensitivity.FixedValue = 7
            [Phenology].PpSensitivity.FixedValue = 3
            [Structure].BasePhyllochron.FixedValue = 80
        Cultivar Nugene
          Command:
            [Phenology].MinimumLeafNumber.FixedValue = 9
            [Phenology].VrnSensitivity.FixedValue = 7
            [Phenology].PpSensitivity.FixedValue = 3
            [Structure].BasePhyllochron.FixedValue = 80
        Cultivar Drover
          Command:
            [Phenology].MinimumLeafNumber.FixedValue = 9
            [Phenology].VrnSensitivity.FixedValue = 7
            [Phenology].PpSensitivity.FixedValue = 3
            [Structure].BasePhyllochron.FixedValue = 80
    Report DailyReport: EventNames=[Clock].DoReport
      VariableNames:
        [Clock].Today
        [Oats].Phenology.CurrentStageName
        [Weather].MeanT
        [Soil].SoilWater.SW
        [Soil].SoilWater.SWmm
        sum([Soil].SoilWater.SWmm) as ProfileWater
        [Oats].AboveGround.N
        [Oats].AboveGround.Wt
        [Oats].AboveGroundLive.N
        [Oats].AboveGroundLive.N*10 as UptakeNKgHA
        [Oats].AboveGroundLive.Wt
        [Oats].AboveGroundDead.N
        [Oats].AboveGroundDead.Wt
        [Oats].Arbitrator.DMDemand
        [Oats].Arbitrator.DM.TotalFixationSupply
        [Oats].Ear.N
        [Oats].Ear.Nconc
        [Oats].Ear.Wt
        [Oats].Grain.N
        [Oats].Grain.NConc
        [Oats].Grain.Number
        [Oats].Grain.Size
        [Oats].Grain.Wt
        [Oats].Grain.Live.Wt
        [Oats].Leaf.AppearedCohortNo
        [Oats].Leaf.CoverDead
        [Oats].Leaf.CoverGreen
        [Oats].Leaf.CoverTotal
        [Oats].Leaf.Dead.N
        [Oats].Leaf.Dead.NConc
        [Oats].Leaf.Dead.Wt
        [Oats].Leaf.DeadCohortNo
        [Oats].Leaf.GreenCohortNo
        [Oats].Leaf.SenescingCohortNo
        [Oats].Leaf.ExpandedCohortNo
        [Oats].Leaf.Fn
        [Oats].Leaf.Fw
        [Oats].Leaf.Height
        [Oats].Leaf.InitialisedCohortNo
        [Oats].Leaf.LAI
        [Oats].Leaf.Live.N
        [Oats].Leaf.Live.NConc
        [Oats].Leaf.Live.Wt
        [Oats].Leaf.SpecificArea
        [Oats].Leaf.Transpiration
        [Oats].Phenology.CurrentPhaseName
        [Oats].Phenology.CurrentStageName
        [Oats].Phenology.DailyVernalisation.Value()
        [Oats].Phenology.MeanTemp.Value()
        [Oats].Phenology.Photoperiod.Value()
        [Oats].Phenology.Stage
        [Oats].Phenology.ThermalTime.Value()
        [Oats].Phenology.ThermalTime.Value()
        [Oats].Phenology.Vrn1.Value()
        [Oats].Phenology.Vrn2.Value()
        [Oats].Phenology.Vrn4.Value()
        [Oats].Phenology.Zadok.Stage
        [Oats].Root.Depth
        [Oats].Root.N
        [Oats].Root.Wt
        [Oats].Root.Nconc
        [Oats].Root.WaterUptake
        [Oats].Panicle.N
        [Oats].Panicle.NConc
        [Oats].Panicle.Wt
        [Oats].Panicle.Live.NonStructuralWt
        [Oats].Stem.N
        [Oats].Stem.NConc
        [Oats].Stem.Wt
        [Oats].Stem.PercentWSC
        [Oats].Stem.Live.NonStructuralWt
        [Oats].StemPlusPanicle.Wt
        [Oats].StemPlusPanicle.N
        [Oats].SowingData.Cultivar
        [Oats].Structure.HaunStage.Value()TerminalSpikelet.Value()
        [Oats].Structure.HaunStage.Value()
        [Oats].Structure.Height
        [Oats].Structure.LeafTipsAppeared
        [Oats].Structure.MainStemFinalNodeNumber.Value()
        [Oats].Structure.MainStemFinalNodeNumber.ValueToHold.PhotoPLeaves.Value()
        [Oats].Structure.MainStemPopn
        [Oats].Structure.MeanTillerGrowthRate.Value()
        [Oats].Structure.TotalStemPopn
        [Oats].Total.N
        [Oats].Total.Wt
        [SurfaceOrganicMatter].Wt
        ([Oats].Leaf.Transpiration + [Soil].SoilWater.Es + [MicroClimate].interception) as ET
        sum([Soil].SoilNitrogen.NO3) as TotalSoilNitrogen
        [Oats].Phenology.FlagLeafDAS
        [Oats].Phenology.FloweringDAS
        [Oats].Phenology.MaturityDAS
        [Oats].Phenology.PhotoPeriod
        [Oats].Phenology.PhotoPeriodDeltaFunction
        [Oats].Phenology.Stage
        [Oats].Phenology.SoilTemperatureFunction.Value()
    Report EndTrialReport: EventNames=[Clock].EndOfSimulation
      VariableNames:
        [Oats].Structure.LeafTipsAppeared
        [Oats].Structure.MainStemFinalNodeNumber
        [Oats].Phenology.FlagLeafDAS
        [Oats].Phenology.FloweringDAS
        [Oats].Phenology.MaturityDAS
        [Script].CalcVals.SowMonth
    Plant Oats: CropType=Wheat
      Memo TitlePage
        # The APSIM Wheat Model

        _Brown, H.E., Huth, N.I. and Holzworth, D.P._

        The APSIM wheat model has been developed using the Plant Modelling Framework (PMF) of [brown_plant_2014]. This new framework provides a library of plant organ and process submodels that can be coupled, at runtime, to construct a model in much the same way that models can be coupled to construct a simulation. This means that dynamic composition of lower level process and organ classes (e.g. photosynthesis, leaf) into larger constructions (e.g. maize, wheat, sorghum) can be achieved by the model developer without additional coding.

        The model consists of:

        * a phenology model to simulate development between developmental phases
        * a structure model to simulate plant morphology
        * a collection of organs to simulate the various plant parts
        * an arbitrator to allocate resources (N, biomass) to the various plant organs
      OrganArbitrator Arbitrator
        RelativeAllocation NArbitrator
        RelativeAllocation DMArbitrator
      Phenology: DaysAfterSowing=0
        Memo
          Wheat exhibits a range of developmental responses to environment and these are strongly influences by genotype characteristics.
          Temperature effects development increasing development rates and decreasing phase durations as temperatures increase.  Theset affects are captured by thermal time, .  However, wheat also exhibits vernalisation and photoperiod sensitivities in its Vegetative phase and further photoperiod sensitivity in the EarlyReproducivePhase.  Photoperiod responses are seen as a reduction in the length of a phase for a photoperiod sensitive genotype in response to a longer photoperiod.  Vernalisation responses are more complicated as they are driven by temperature but interact with photoperiod.  For vernalisation sensitive varieties (Winter types) exposure to cool temperatures or short photoperiods during the Vegetative phase will reduce the thermal time duration of the vegetative phase.

          We draw on the Kirby Framework to capture these vernalisation and photoperiod responses.  This framework assumes that the timing of anthesis is a result of the timing of flag leaf and an additional thermal time passage from there to anthesis.  It also assumes the timing of flag leaf is a result of the Final Leaf Number which sets a target, and leaf appearance rate, which sets the rate of progress toward this target.  Leaf appearance rate is a function of Thermal time and a genotype specific Phyllochron which changes with Haun stage as described by [Jamieson_LeafAppearance_1995].

          Final Leaf Number (FLN) is modeled as the sum of three numbers:

          FLN = MinLeafNumber + VernalLeaves + PhotoLeaves

          Where MinLeafNumber is the number of leaves that a wheat crop will produce when vernalisation is satisified early in the crops duration (before 2nd true leaf) and it is grown in a long photoperiod..  VernalLeaves are the number of leaves that are added due to vernalisation effects.  For insensitive varieties this will always be zero but this is potentially a larger number for sensitivie varieties and the number progresively decreases as the crop encounters more vernalisation.  PhotoLeaves are the number of leaves that are added to the minimum leaf number as a result of short day exposure.  For insensitive varieties this will be zero but is potential larger for more sensitivie varieties and decreases as day length increases.  More detailed explinations of the components of phenology are provided below.
        DivideFunction MeanTemp
          AddFunction TempSum
            VariableReference MaxT: VariableName=[Weather].MaxT
            VariableReference MinT: VariableName=[Weather].MinT
          Constant Two: FixedValue=2
        AirTemperatureFunction ThermalTime
          XYPairs: X=[0, 26, 37]; Y=[0, 26, 0]
          Memo
            Thermal time determines the rate of developmental progress through many of the crops phases and is used by organs to determing potential growth rates.
        MultiplyFunction DailyVernalisation
          Memo
            Vernalisation responses are based on those described by [Brown_Anthesis_2013].   Vernalisation is assumed to be related to the expression of the Vrn1 Gene.  Its experssion is accumulated daily and daily upregulation as a function of development (DeltaHaunStage) and a TempResponseProfile that declines exponentially from a maximum at 1<sup>o</sup>C to zero at 0<sup>o</sup>C and at 18<sup>o</sup>C.
          VariableReference DeltaHaunStage: VariableName=[Structure].DeltaHaunStage
          AirTemperatureFunction TempResponseProfile
            XYPairs
              X=[0, 1, 2, 3, 4, 5, 6, 7, 8, 9, 10, 11, 12, 13, 14, 15, 16, 17, 18, 19, 20, 30, 32]
              Y=[0, 1.205, 1.037, 0.893, 0.768, 0.661, 0.569, 0.49, 0.422, 0.363, 0.312, 0.269, 0.231, 0.199, 0.171, 0.148, 0.127, 0.109, 0.094, 0.081, 0, 0, -0.5]
        PhotoperiodFunction Photoperiod: Twilight=-6; DayLength=0
        PhaseLookup PerceivedPhotoPeriod
          PhaseLookupValue ApexBelowGround: Start=Germination; End=Emergence
            Constant Photoperiod: FixedValue=0; Units=h
          PhaseLookupValue ApexAboveGround: Start=Emergence; End=HarvestRipe
            VariableReference Photoperiod: VariableName=[Phenology].Photoperiod.Value()
        MinimumFunction Vrn1
          Memo
            Vrn1 accumulation begins when Vrn4 experssion is down regulated to zero and stops, assuming vernalisation saturation, at a value of 1
          Constant Saturation: FixedValue=1; Units=Relative Experssion
          AccumulateFunction CurrentExpression: StartStageName=Germination; EndStageName=TerminalSpikelet; FractionRemovedOnCut=0; FractionRemovedOnHarvest=0; FractionRemovedOnGraze=0; FractionRemovedOnPrune=0
            LessThanFunction Vernalisation
              VariableReference If_Vrn4: VariableName=[Phenology].Vrn4.Value()
              VariableReference IsLessThanLag: VariableName=[Phenology].VernLag.Value()
              Constant Return_Zero: FixedValue=0
              VariableReference elseReturn_Vernalisation: VariableName=[Phenology].DailyVernalisation.Value()
        MinimumFunction Vrn4
          VariableReference MaxExpression: VariableName=[Phenology].VernLag.Value()
          AccumulateFunction CurrentExpression: StartStageName=Germination; EndStageName=TerminalSpikelet; FractionRemovedOnCut=0; FractionRemovedOnHarvest=0; FractionRemovedOnGraze=0; FractionRemovedOnPrune=0
            VariableReference VernalisationConditioning: VariableName=[Phenology].DailyVernalisation.Value()
        Constant MinimumLeafNumber: FixedValue=7; Units=Leaves
          Memo
            Number of leaves the plant will produce when fully vernalised early and grown in long photoperiod
        Constant VrnSensitivity: FixedValue=0; Units=Leaves
          Memo
            The difference between Inherent earlyness leaf number and the number of leaves produced when the plant is unvernalised and grown in long photoperiod
        Constant VernLag: FixedValue=1; Units=Unitless
          Memo
            The amount of vernalising temperature required before vernalisation response will be evident.  Value of relative to the amount offl vernalisation temperature required from the end of the lag until vernalisation saturation.  A value of 0 means there is no lag, a value of 1 means the lag is the same (in vernal time) as the vernalisation requirement and a value of 2 means the lag is twice as long as the vernalisation response phase
        Constant PpSensitivity: FixedValue=3; Units=Leaves
          Memo
            The reduction in leaf number going from 8 to 16 h Pp
        Constant EarlyReproductivePpSensitivity: FixedValue=0
          Memo
            The phyllochrons duration for the plant to go from flag leaf ligual appearance at 16 h Pp compared to the phyllochron duration for the same phase at 8 h Pp.
        Constant EarlyReproductiveLongDayBase: FixedValue=2.5
          Memo
            The phyllochrons duration for the plant to go from flag leaf ligual appearance at 16 h Pp.
        GerminatingPhase Germinating: Start=Sowing; End=Germination
        EmergingPhase Emerging: Start=Germination; End=Emergence; ShootLag=40; ShootRate=1.5
          VariableReference ThermalTime: VariableName=[Phenology].ThermalTime.Value()
        GenericPhase Vegetative: Start=Emergence; End=TerminalSpikelet
          Memo
            The duration of the vegetative phase is set by a target Haun Stage for the occurence of Terminal Spikelet and the rate of leaf appearance.
          VariableReference ThermalTime: VariableName=[Phenology].ThermalTime.Value()
          MultiplyFunction Target
            VariableReference Phyllochron: VariableName=[Structure].MeanPhyllochron.Value()
            VariableReference HSTS: VariableName=[Structure].HaunStageTerminalSpikelet.Value()
          Memo Memo1
            HaunStageTerminalSpiklet decreases as vernalisation is accumulated and as photoperiod extends, capturing the effect of these responses on the duration of the Vegetative phase
        LeafAppearancePhase StemElongation: Start=TerminalSpikelet; End=FlagLeaf
          Memo
            The Final leaf number is fixed at Terminal Spikelet and leaves contune to appear at a rate set by thermal time and phyllochron until flag leaf liguale appears and this phase is completed.
          VariableReference ThermalTime: VariableName=[Phenology].ThermalTime.Value()
        GenericPhase EarlyReproductive: Start=FlagLeaf; End=Flowering
          VariableReference ThermalTime: VariableName=[Phenology].ThermalTime.Value()
          MultiplyFunction Target
            VariableReference Phyllochron
              VariableName=[Structure].MainStemNodeAppearanceRate.BasePhyllochron.Value()
            AddFunction Phyllochrons
              VariableReference LongDayBase: VariableName=[Phenology].EarlyReproductiveLongDayBase.Value()
              MultiplyFunction IncreaseDueToShortPhotoPeriod
                LinearInterpolationFunction PhotoPeriodResponse: XProperty=[Phenology].Photoperiod.Value()
                  XYPairs: X=[11, 16]; Y=[1, 0]
                VariableReference PpSensitivity: VariableName=[Phenology].EarlyReproductivePpSensitivity.Value()
        GenericPhase GrainDevelopment: Start=Flowering; End=StartGrainFill
          Constant Target: FixedValue=120
          VariableReference ThermalTime: VariableName=[Phenology].ThermalTime.Value()
        GenericPhase GrainFilling: Start=StartGrainFill; End=EndGrainFill
          Constant Target: FixedValue=545
          VariableReference ThermalTime: VariableName=[Phenology].ThermalTime.Value()
        GenericPhase Maturing: Start=EndGrainFill; End=Maturity
          Constant Target: FixedValue=35
          VariableReference ThermalTime: VariableName=[Phenology].ThermalTime.Value()
        GenericPhase Ripening: Start=Maturity; End=HarvestRipe
          Constant Target: FixedValue=300
          VariableReference ThermalTime: VariableName=[Phenology].ThermalTime.Value()
        EndPhase ReadyForHarvesting: Start=HarvestRipe; End=Unused
          VariableReference ThermalTime: VariableName=[Phenology].ThermalTime.Value()
        ZadokPMF Zadok
        OnEventFunction FlagLeafDAS: same as Replacements.Oatz.Phenology.FlagLeafDAS
        OnEventFunction FloweringDAS: same as Replacements.Oatz.Phenology.FloweringDAS
        OnEventFunction MaturityDAS: same as Replacements.Oatz.Phenology.MaturityDAS
      Structure: Initialised=false; Germinated=false; Emerged=false; CohortToInitialise=0; TipToAppear=0; ApexNum=0
        VariableReference ThermalTime: VariableName=[Phenology].ThermalTime.Value()
        MultiplyFunction MainStemNodeAppearanceRate
          Memo Rational
            This is the thermal time between the emergence of leaf tips.  The model used here is based on [Jamieson_SIRIUS_1998] where leaf appearace could be described by a base phyllochron determined between leaves 2 and 7 and a phyllochron that was 70% of base phyllochron for leaves < 2 and 130% of base phyllochron for leaves > 7
          LinearInterpolationFunction LeafStageFactor: XProperty=[Leaf].AppearedCohortNo
            XYPairs: X=[0, 2, 3, 6, 8, 11, 12]; Y=[0.75, 0.75, 1, 1, 1.4, 1.4, 1.4]
              Memo
                Changing 4th line from 7:1 to 6:1.
                Leaf appearance rate calibrated using data from Gatton 2007 for Taipan and Coolibah
          Constant BasePhyllochron: FixedValue=120; Units=oC.d
          LinearInterpolationFunction PhotoPeriodEffect: XProperty=[Phenology].Photoperiod.Value()
            XYPairs: X=[8, 12, 14]; Y=[1.6, 1, 1]
        MultiplyFunction BranchingRate
          Memo
            Potential branching rate is determined by the commonly observed pattern of tillering in wheat, in which each tiller emerges with the third leaf on its parent axis (e.g. first tiller emerges at the same time as the third leaf on the main stem, the first secondary tiller appears with the third leaf on tiller 1).  This is described as a simple function of main stem leaf number.
          PhaseLookup PotentialBranchingRate: same as Replacements.Oatz.Structure.BranchingRate.PotentialBranchingRate
          MinimumFunction StressFactors
            LinearInterpolationFunction NitrogenEffect: XProperty=[Arbitrator].FN
              Memo
                Inadequate Nitrogen supply is assumed to affect tillering prior to any effect on photosynthesis or leaf size.
              XYPairs: X=[0.5, 2, 3]; Y=[0, 1, 1]
            LinearInterpolationFunction CoverEffect: XProperty=[Leaf].CoverTotal
              Memo
                Tillering is said to cease once a threshold fraction of incoming radiation has been achieved.  This captures shading effects on tillering described by [evers2006cessation].
              XYPairs: X=[0, 0.1, 0.25]; Y=[1, 1, 0]
            LinearInterpolationFunction WaterStressEffect: XProperty=[Root].WaterTensionFactor
              XYPairs: X=[0, 1]; Y=[0, 1]
        PhaseLookup BranchMortality
          PhaseLookupValue MortalityPhase: Start=FlagLeaf; End=Flowering
            MultiplyFunction Mortality
              LinearInterpolationFunction MortalityPerDegDay: XProperty=[Structure].MeanTillerGrowthRate.Value()
                XYPairs: X=[0, 0.005]; Y=[0.002, 0]
              VariableReference ThermalTime: VariableName=[Phenology].ThermalTime.Value()
        HeightFunction HeightModel: same as Replacements.Oatz.Structure.HeightModel
        MovingAverageFunction MeanTillerGrowthRate: NumberOfDays=5; InitialValue=0
          Memo
            This is calculated to represent the supply of asslimilate to individual tillers over the past 5 days to use as an index to determine tiller mortality.  When tiller numbers are high or total crop assimilate supply is small there will not be enough assimilate to maintain all of the tillers so the model will senesce some.
          DivideFunction TillerGrowthRate: same as Replacements.Oatz.Structure.MeanTillerGrowthRate.TillerGrowthRate
        MovingAverageFunction MeanPhyllochron: NumberOfDays=300; InitialValue=80
          VariableReference Phyllochron: VariableName=[Structure].MainStemNodeAppearanceRate.Value()
        HoldFunction MainStemFinalNodeNumber: WhenToHold=TerminalSpikelet
          AddFunction FinalNodeNumber
            VariableReference MinLeafNumber: VariableName=[Phenology].MinimumLeafNumber.Value()
            MultiplyFunction VernalLeaves
              VariableReference UnVernalisedLeaves: VariableName=[Phenology].VrnSensitivity.Value()
              SubtractFunction VernalisationReductionFactor
                Constant One: FixedValue=1
                VariableReference RelativeVrn1Expression: VariableName=[Phenology].Vrn1.Value()
            MultiplyFunction PhotoPLeaves
              VariableReference ShortPpLeaves: VariableName=[Phenology].PpSensitivity.Value()
              LinearInterpolationFunction PhotoPeriodReductionFactor: XProperty=[Phenology].Photoperiod.Value()
                XYPairs: X=[10, 16]; Y=[1, 0]
        ExpressionFunction HaunStageTerminalSpikelet: Expression=([Structure].MainStemFinalNodeNumber.Value() - 2.85)/1.1
          Memo
            The Haun stage at which Terminal Spikelet occurs is determined from final leaf number using the approach described in [Brown_Anthesis_2013].
        AddFunction HaunStage
          VariableReference AppearedLeaves: VariableName=[Leaf].ExpandedCohortNo
          VariableReference ProportionOfExpandingLeaf: VariableName=[Leaf].NextExpandingLeafProportion
        Constant StemSenescenceAge: FixedValue=0
      ReproductiveOrgan Grain: GrowthRespiration=0; MaintenanceRespiration=0; RipeStage=Ripe
        Biomass Live
        Biomass Dead
        HoldFunction NumberFunction: WhenToHold=Flowering
          MultiplyFunction GrainNumber
            Constant GrainsPerGramOfStem: FixedValue=22; Units=grains
            VariableReference StemMass: VariableName=[StemPlusPanicle].Wt
        Constant InitialGrainProportion: FixedValue=0.05
          Constant InitialGrainProportion: FixedValue=0.05
        Constant MaximumPotentialGrainSize: FixedValue=0.043; Units=g
        PhaseLookup DMDemandFunction
          PhaseLookupValue InitialPhase: Start=Flowering; End=StartGrainFill
            FillingRateFunction
              VariableReference NumberFunction: VariableName=[Grain].NumberFunction.Value()
              VariableReference FillingDuration: VariableName=[Phenology].GrainDevelopment.Target.Value()
              VariableReference ThermalTime: VariableName=[Phenology].ThermalTime.Value()
              MultiplyFunction PotentialSizeIncrement
                VariableReference InitialProportion: VariableName=[Grain].InitialGrainProportion.Value()
                VariableReference MaximumSize: VariableName=[Grain].MaximumPotentialGrainSize.Value()
          PhaseLookupValue LinearPhase: Start=StartGrainFill; End=EndGrainFill
            FillingRateFunction
              VariableReference NumberFunction: VariableName=[Grain].NumberFunction.Value()
              VariableReference FillingDuration: VariableName=[Phenology].GrainFilling.Target.Value()
              VariableReference ThermalTime: VariableName=[Phenology].ThermalTime.Value()
              MultiplyFunction PotentialSizeIncrement
                SubtractFunction ProportionLinearPhase
                  Constant One: FixedValue=1
                  VariableReference InitialProportion: VariableName=[Grain].InitialGrainProportion.Value()
                VariableReference MaximumSize: VariableName=[Grain].MaximumPotentialGrainSize.Value()
        Constant MinimumNConc: FixedValue=0.0123
        Constant MaxNConcDailyGrowth: FixedValue=0.03
        Constant MaximumNConc: FixedValue=0.03
        PhaseLookup NFillingRate
          PhaseLookupValue GrainFilling: Start=Flowering; End=EndGrainFill
            FillingRateFunction
              VariableReference NumberFunction: VariableName=[Grain].NumberFunction.Value()
              AddFunction FillingDuration
                VariableReference FloweringToGrainFilling: VariableName=[Phenology].GrainDevelopment.Target.Value()
                VariableReference GrainFilling: VariableName=[Phenology].GrainFilling.Target.Value()
              VariableReference ThermalTime: VariableName=[Phenology].ThermalTime.Value()
              MultiplyFunction PotentialSizeIncrement
                VariableReference MaximumSize: VariableName=[Grain].MaximumPotentialGrainSize.Value()
                VariableReference MaximumNConc: VariableName=[Grain].MaximumNConc.Value()
        Constant WaterContent: FixedValue=0.12
        AccumulateFunction AccumThermalTime: StartStageName=Flowering; EndStageName=Maturity; FractionRemovedOnCut=0; FractionRemovedOnHarvest=0; FractionRemovedOnGraze=0; FractionRemovedOnPrune=0
          VariableReference DailyThermalTimeValue: VariableName=[Phenology].ThermalTime.Value()
        ExpressionFunction Protein
          Expression=([Grain].Live.N + [Grain].Dead.N)/([Grain].Live.Wt + [Grain].Dead.Wt) * 100 * 5.71
        BiomassRemoval BiomassRemovalDefaults: same as Replacements.Oatz.Grain.BiomassRemovalDefaults
      Root: GrowthRespiration=0; MaintenanceRespiration=0
        CompositeBiomass Live: Propertys=[[Root].LayerLive]
          Constant KLModifier: FixedValue=1
        CompositeBiomass Dead: Propertys=[[Root].LayerDead]
        Constant KLModifier: FixedValue=1
        Constant SoilWaterEffect: FixedValue=1
        Constant MaxDailyNUptake: FixedValue=20
        Constant SenescenceRate: FixedValue=0.005
        Constant StructuralFraction: FixedValue=1
        Constant MaximumRootDepth: FixedValue=1000000
        Constant MaximumNConc: FixedValue=0.01
        Constant MinimumNConc: FixedValue=0.01
        PhaseBasedSwitch NitrogenDemandSwitch: Start=Germination; End=Maturity
        BiomassRemoval BiomassRemovalDefaults: same as Replacements.Oatz.Root.BiomassRemovalDefaults
        Constant KNO3: FixedValue=0.02
        Constant KNH4: FixedValue=0.01
        Constant InitialDM: FixedValue=0.005; Units=g/plant
        Constant SpecificRootLength: FixedValue=105; Units=m/g
        MultiplyFunction RootFrontVelocity
          PhaseLookup PotentialRootFrontVelocity
            PhaseLookupValue PreEmergence: Start=Germination; End=Emergence
              Constant Value: FixedValue=5; Units=mm/d
            PhaseLookupValue PostEmergence: Start=Emergence; End=Maturity
              Constant Value: FixedValue=20; Units=mm/d
          WeightedTemperatureFunction TemperatureFactor: MaximumTemperatureWeighting=0.5
            XYPairs: X=[0, 15, 25, 35]; Y=[0, 1, 1, 0]
          LinearInterpolationFunction WaterFactor: XProperty=[SoilWaterScale]
            SoilWaterScale
            XYPairs: X=[0, 0.25, 1]; Y=[0, 1, 1]
        LinearInterpolationFunction NUptakeSWFactor: XProperty=[SoilWaterScale]
          SoilWaterScale
          XYPairs: X=[0, 1]; Y=[0, 1]
          Memo
            This is modelled in the same way as the old wheat model where potential N uptake is decreased as the soil dries as described by NUptakeSWFactor
        PartitionFractionDemandFunction DMDemandFunction
          PhaseLookup PartitionFraction
            PhaseLookupValue PreEmergence: Start=Germination; End=Emergence
              Constant Value: FixedValue=0
            PhaseLookupValue PreFlowering: Start=Emergence; End=Flowering
              LinearInterpolationFunction AgeFactor: XProperty=[Phenology].Stage
                XYPairs: X=[3, 4]; Y=[0.5, 0.2]
            PhaseLookupValue PostFlowering: Start=Flowering; End=EndGrainFill
              Constant Value: FixedValue=0.2
      Leaf: MaxCover=1; Albedo=0.25; Gsmax=0.011; R50=150; MicroClimatePresent=true; KDead=0.3; MaximumMainStemLeafNumber=30
        zero: GrowthRespiration, MaintenanceRespiration, CurrentExpandingLeaf, StartFractionExpanded, FractionNextleafExpanded, DeadNodesYesterday, FRGR, PotentialEP, DMConversionEfficiency, TipsAtEmergence, CohortsAtInitialisation, FractionDied
        LeafCohort InitialLeaves[1]: same as Replacements.Oatz.Leaf.InitialLeaves[1]
        LeafCohort InitialLeaves[2]: same as Replacements.Oatz.Leaf.InitialLeaves[2]
        CompositeBiomass Live: Propertys=[[Leaf].CohortLive]
        CompositeBiomass Dead: Propertys=[[Leaf].CohortDead]
        ArrayBiomass CohortArrayLive: Propertys=[[Leaf].Live]; ArraySize=[Leaf].MaxNodeNo
        ArrayBiomass CohortArrayDead: Propertys=[[Leaf].Dead]; ArraySize=[Leaf].MaxNodeNo
        LeafCohortParameters CohortParameters
          Constant NReallocationFactor: FixedValue=1
          Constant MaintenanceRespirationFunction: FixedValue=0
          Constant NRetranslocationFactor: FixedValue=0.03
          Constant DMReallocationFactor: FixedValue=0
          Constant DMRetranslocationFactor: FixedValue=0
          MinimumFunction CellDivisionStress
            LinearInterpolationFunction WaterStressFactor: XProperty=[Oats].WaterSupplyDemandRatio
              XYPairs: X=[0.5, 1]; Y=[0.1, 1]
            LinearInterpolationFunction NitrogenStressFactor: XProperty=[Oats].Leaf.Fn
              XYPairs: X=[0, 0.5, 1]; Y=[0.1, 0.1, 1]
          MinimumFunction ExpansionStress
            LinearInterpolationFunction WaterStress: XProperty=[Root].WaterTensionFactor
              XYPairs: X=[0.1, 1, 1.3]; Y=[0, 1, 1]
            LinearInterpolationFunction TemperatureEffect: XProperty=[Phenology].MeanTemp.Value()
              XYPairs: X=[0, 12, 14]; Y=[0, 1, 1]
            LinearInterpolationFunction NitrogenStressFactor: XProperty=[Oats].Leaf.Fn
              XYPairs: X=[0, 0.5, 1]; Y=[0.1, 0.1, 1]
          MultiplyFunction MaxArea
            Constant AreaLargestLeaves: FixedValue=7000; Units=mm^2
              Memo
                As per NZ Lincoln data set
            LinearInterpolationFunction AgeFactor: XProperty=[Phenology].Stage
              XYPairs: X=[3, 3.45, 4]; Y=[0.1, 0.5, 1]
          MultiplyFunction GrowthDuration
            Constant Multiplier: FixedValue=2
            VariableReference Phyllochron: VariableName=[Structure].MainStemNodeAppearanceRate.Value()
          MultiplyFunction LagDuration
            LinearInterpolationFunction AgeFactor: XProperty=[Phenology].Stage
              XYPairs: X=[3, 4]; Y=[0.4, 1]
            SubtractFunction LastLeafDuration
              AddFunction ThermalTimeToRipe
                VariableReference EarlyReproductive: VariableName=[Phenology].EarlyReproductive.Target.Value()
                VariableReference GrainDevelopment: VariableName=[Phenology].GrainDevelopment.Target.Value()
                VariableReference GrainFilling: VariableName=[Phenology].GrainFilling.Target.Value()
                VariableReference Maturing: VariableName=[Phenology].Maturing.Target.Value()
                VariableReference Ripening: VariableName=[Phenology].Ripening.Target.Value()
              VariableReference SenescenceDuration: VariableName=[Leaf].CohortParameters.SenescenceDuration.Value()
          MultiplyFunction SenescenceDuration
            Constant Multiplier: FixedValue=3
            VariableReference Phyllochron: VariableName=[Structure].MainStemNodeAppearanceRate.Value()
          Constant DetachmentLagDuration: FixedValue=1000000
          Constant DetachmentDuration: FixedValue=1000000
          Constant RelativeBranchLeafSize: FixedValue=1
          LinearInterpolationFunction MaximumNConc: XProperty=[Phenology].Stage
            XYPairs: X=[3, 4, 6]; Y=[0.08, 0.05, 0.02]
          MultiplyFunction CriticalNConc
            LinearInterpolationFunction CriticalNConcAt350ppm: XProperty=[Phenology].Stage
              XYPairs: X=[3, 4, 6]; Y=[0.07, 0.04, 0.015]
            LinearInterpolationFunction CO2Factor: XProperty=[Weather].CO2
              XYPairs: X=[350, 700]; Y=[1, 0.93]
          LinearInterpolationFunction MinimumNConc: XProperty=[Phenology].Stage
            XYPairs: X=[3, 4, 6]; Y=[0.01, 0.005, 0.005]
          AddFunction DroughtInducedLagAcceleration
            Constant One: FixedValue=1
            MultiplyFunction Stress
              Constant StressResponseCoefficient: FixedValue=1
              LinearInterpolationFunction StressFactor: XProperty=[Oats].WaterSupplyDemandRatio
                XYPairs: X=[0, 0.5]; Y=[0.5, 0]
          AddFunction DroughtInducedSenAcceleration: same as Replacements.Oats.Leaf.CohortParameters.DroughtInducedLagAcceleration
          LinearInterpolationFunction SpecificLeafAreaMax: XProperty=[Phenology].Stage
            XYPairs: X=[3, 4]; Y=[18000, 30000]
          LinearInterpolationFunction SpecificLeafAreaMin: XProperty=[Leaf].Fn
            XYPairs: X=[0.4, 1]; Y=[10000, 18000]
          Constant InitialNConc: FixedValue=0
          Constant StructuralFraction: FixedValue=0.5
          Constant NonStructuralFraction: FixedValue=0
          Constant LeafSizeShapeParameter: FixedValue=0.3
          Constant SenessingLeafRelativeSize: FixedValue=1; Units=0-1
          MultiplyFunction ShadeInducedSenescenceRate
            Constant RatePerDegDay: FixedValue=0
              Memo
                1% per degree day means it takes one phyllochron for a shaded leaf to fully sceness
            VariableReference ThermalTime: VariableName=[Phenology].ThermalTime.Value()
        RUEModel Photosynthesis
          Constant RUE: FixedValue=1.5
          WeightedTemperatureFunction FT: MaximumTemperatureWeighting=0.75
            XYPairs: X=[0, 15, 25, 35]; Y=[0, 1, 1, 0]
          LinearInterpolationFunction FN: XProperty=[Leaf].Fn
            XYPairs: X=[0, 1, 1.5]; Y=[0, 1, 1]
          LinearInterpolationFunction FW: XProperty=[Leaf].Fw
            XYPairs: X=[0, 1, 1]; Y=[0, 1, 1]
          LinearInterpolationFunction FVPD: XProperty=[Photosynthesis].VPD
            XYPairs: X=[0, 10, 40]; Y=[1, 1, 0]
          RUECO2Function FCO2: PhotosyntheticPathway=C3
          VariableReference RadnInt: VariableName=[Leaf].RadIntTot
        Constant FrostFraction: FixedValue=0
        VariableReference ThermalTime: VariableName=[Phenology].ThermalTime.Value()
        MinimumFunction FRGRFunction: same as Replacements.Oatz.Leaf.FRGRFunction
        BiomassRemoval BiomassRemovalDefaults: same as Replacements.Oatz.Leaf.BiomassRemovalDefaults
        Constant ExtinctionCoeff: FixedValue=0.45
          Memo
            Experimenting with extinction coeff as per measured in Gatton 2007 (0.45). Orig value = wheat = 0.5
        Constant StructuralFraction: FixedValue=0.5
        Constant DMConversionEfficiencyFunction: FixedValue=1
        ApexStandard
      GenericOrgan Panicle
        PopulationBasedDemandFunction DMDemandFunction
          VariableReference ThermalTime: VariableName=[Phenology].ThermalTime.Value()
          Constant ExpansionStress: FixedValue=1
          VariableReference OrganPopulation: VariableName=[Panicle].HeadNumber.Value()
          Constant StartStage: FixedValue=5
          Constant MaximumOrganWt: FixedValue=0.5
          AddFunction GrowthDuration
            VariableReference EarlyReproductive: VariableName=[Phenology].EarlyReproductive.Target.Value()
            VariableReference GrainDevelopment: VariableName=[Phenology].GrainDevelopment.Target.Value()
        Biomass Live
        Biomass Dead
        Constant NReallocationFactor: FixedValue=0
        Constant NRetranslocationFactor: FixedValue=0.3
        Constant MaximumNConc: FixedValue=0.025
        Constant StructuralFraction: FixedValue=0.9
        Constant SenescenceRate: FixedValue=0; Units=/d
        Constant MinimumNConc: FixedValue=0.004
        BiomassRemoval BiomassRemovalDefaults: same as Replacements.Oatz.Panicle.BiomassRemovalDefaults
        PhaseBasedSwitch NitrogenDemandSwitch: Start=Emergence; End=StartGrainFill
        PhaseLookup DMRetranslocationFactor: same as Replacements.Oatz.Panicle.DMRetranslocationFactor
        Constant InitialWtFunction: FixedValue=0; Units=g/m^2
        Constant DetachmentRateFunction: FixedValue=0; Units=/d
        Constant MaintenanceRespirationFunction: FixedValue=0; Units=0-1
        Constant DMConversionEfficiency: FixedValue=1; Units=0-1
        VariableReference HeadNumber: VariableName=[Structure].TotalStemPopn
        Constant DMReallocationFactor: FixedValue=0
        VariableReference CriticalNConc: VariableName=[Panicle].MinimumNConc.Value()
      GenericOrgan Stem
        Biomass Live
        Biomass Dead
        PhaseLookup StructuralFraction
          PhaseLookupValue VegetativeGrowth: Start=Sowing; End=FlagLeaf
            Constant Fraction: FixedValue=0.7
          PhaseLookupValue ReproductiveGrowth: Start=FlagLeaf; End=HarvestRipe
            Constant Fraction: FixedValue=0.05
        Constant SenescenceRate: FixedValue=0; Units=/d
        LinearInterpolationFunction MaximumNConc: XProperty=[Phenology].Stage
          XYPairs: X=[3, 4, 5, 6]; Y=[0.07, 0.04, 0.015, 0.012]
        Constant MinimumNConc: FixedValue=0.0025
        PhaseBasedSwitch NitrogenDemandSwitch: Start=Emergence; End=StartGrainFill
        Constant NReallocationFactor: FixedValue=0
        PhaseLookup NRetranslocationFactor: same as Replacements.Oatz.Stem.NRetranslocationFactor
        PhaseLookup DMRetranslocationFactor: same as Replacements.Oatz.Panicle.DMRetranslocationFactor
        PartitionFractionDemandFunction DMDemandFunction
          PhaseLookup PartitionFraction
            PhaseLookupValue PreStemElongation: Start=Emergence; End=TerminalSpikelet
              Constant StemFraction: FixedValue=0.4
            PhaseLookupValue StemElongation: Start=TerminalSpikelet; End=FlagLeaf
              Constant StemFraction: FixedValue=0.6
            PhaseLookupValue EarEmergence: Start=FlagLeaf; End=Flowering
              Constant StemFraction: FixedValue=0.6
        BiomassRemoval BiomassRemovalDefaults: same as Replacements.Oatz.Panicle.BiomassRemovalDefaults
        DivideFunction PercentWSC
          VariableReference WSC: VariableName=[Stem].Live.NonStructuralWt
          VariableReference StemWt: VariableName=[Stem].Live.Wt
        Constant InitialWtFunction: FixedValue=0; Units=g/m^2
        Constant DetachmentRateFunction: FixedValue=0; Units=/d
        Constant MaintenanceRespirationFunction: FixedValue=0; Units=0-1
        Constant DMConversionEfficiency: FixedValue=1; Units=0-1
        Constant DMReallocationFactor: FixedValue=0
        VariableReference CriticalNConc: VariableName=[Stem].MinimumNConc.Value()
      CompositeBiomass AboveGround
        Propertys=[[Leaf].Live, [Leaf].Dead, [Stem].Live, [Stem].Dead, [Panicle].Live, [Panicle].Dead, [Grain].Live, [Grain].Dead]
      CompositeBiomass AboveGroundLive: Propertys=[[Leaf].Live, [Stem].Live, [Panicle].Live, [Grain].Live]
      CompositeBiomass AboveGroundDead: Propertys=[[Leaf].Dead, [Stem].Dead, [Panicle].Dead, [Grain].Dead]
      CompositeBiomass BelowGround: Propertys=[[Root].Live, [Root].Dead]
      CompositeBiomass Total
        Propertys=[[Leaf].Live, [Leaf].Dead, [Stem].Live, [Stem].Dead, [Root].Live, [Root].Dead, [Panicle].Live, [Panicle].Dead, [Grain].Live, [Grain].Dead]
      CompositeBiomass TotalLive
        Propertys=[[Leaf].Live, [Stem].Live, [Root].Live, [Panicle].Live, [Grain].Live]
      CompositeBiomass TotalDead
        Propertys=[[Leaf].Dead, [Stem].Dead, [Root].Dead, [Panicle].Dead, [Grain].Dead]
      CompositeBiomass Ear: same as Replacements.Oatz.Ear
      CompositeBiomass StemPlusPanicle: Propertys=[[Stem].Live, [Panicle].Live, [Stem].Dead, [Panicle].Dead]
      CultivarFolder Cultivars
        Cultivar Drummond
          Command:
            [Phenology].MinimumLeafNumber.FixedValue = 9
            [Phenology].VrnSensitivity.FixedValue = 7
            [Phenology].PpSensitivity.FixedValue = 3
            [Structure].MainStemNodeAppearanceRate.BasePhyllochron.FixedValue = 80
        Cultivar Milton
          Command:
            [Phenology].MinimumLeafNumber.FixedValue = 9
            [Phenology].VrnSensitivity.FixedValue = 7
            [Phenology].PpSensitivity.FixedValue = 3
            [Structure].MainStemNodeAppearanceRate.BasePhyllochron.FixedValue = 100
        Cultivar Hokunui
          Command:
            [Phenology].MinimumLeafNumber.FixedValue = 9
            [Phenology].VrnSensitivity.FixedValue = 7
            [Phenology].PpSensitivity.FixedValue = 3
            [Structure].MainStemNodeAppearanceRate.BasePhyllochron.FixedValue = 82
        Cultivar Stampede
          Command:
            [Phenology].MinimumLeafNumber.FixedValue = 9
            [Phenology].VrnSensitivity.FixedValue = 7
            [Phenology].PpSensitivity.FixedValue = 3
            [Structure].MainStemNodeAppearanceRate.BasePhyllochron.FixedValue = 82
        Cultivar Milton1
          Command:
            [Phenology].MinimumLeafNumber.FixedValue = 15
            [Phenology].VrnSensitivity.FixedValue = 7
            [Phenology].PpSensitivity.FixedValue = 3
            [Structure].MaxLN.FixedValue = 15
        Cultivar Coolibah
          Command:
            [Phenology].MinimumLeafNumber.FixedValue = 9
            [Phenology].VrnSensitivity.FixedValue = 1.7
            [Phenology].PpSensitivity.FixedValue = 2
            [Structure].MainStemNodeAppearanceRate.BasePhyllochron.FixedValue = 90
          Memo
            Leaf appearance rate calibrated using data from Gatton 2007 for Taipan and Coolibah
        Cultivar Taipan
          Command:
            [Phenology].MinimumLeafNumber.FixedValue = 9
            [Phenology].VrnSensitivity.FixedValue = 1
            [Phenology].PpSensitivity.FixedValue = 8
            [Structure].MainStemNodeAppearanceRate.BasePhyllochron.FixedValue = 90
          Memo
            Leaf appearance rate calibrated using data from Gatton 2007 for Taipan and Coolibah
        Cultivar Wintaroo
          Command:
            [Phenology].MinimumLeafNumber.FixedValue = 9
            [Phenology].VrnSensitivity.FixedValue = 2
            [Phenology].PpSensitivity.FixedValue = 2
            [Structure].MainStemNodeAppearanceRate.BasePhyllochron.FixedValue = 80
        Cultivar Kangaroo
          Command:
            [Phenology].MinimumLeafNumber.FixedValue = 9
            [Phenology].VrnSensitivity.FixedValue = 2
            [Phenology].PpSensitivity.FixedValue = 2
            [Structure].MainStemNodeAppearanceRate.BasePhyllochron.FixedValue = 80
        Cultivar Brusher
          Command:
            [Phenology].MinimumLeafNumber.FixedValue = 9
            [Phenology].VrnSensitivity.FixedValue = 2
            [Phenology].PpSensitivity.FixedValue = 2
            [Structure].MainStemNodeAppearanceRate.BasePhyllochron.FixedValue = 80
        Cultivar Algerian
          Command:
            [Phenology].MinimumLeafNumber.FixedValue = 9
            [Phenology].VrnSensitivity.FixedValue = 11.2
            [Phenology].PpSensitivity.FixedValue = 11.2
            [Structure].MainStemNodeAppearanceRate.BasePhyllochron.FixedValue = 90
        Cultivar Nugene
          Command:
            [Phenology].MinimumLeafNumber.FixedValue = 9
            [Phenology].VrnSensitivity.FixedValue = 1
            [Phenology].PpSensitivity.FixedValue = 8
            [Structure].MainStemNodeAppearanceRate.BasePhyllochron.FixedValue = 90
        Cultivar Drover
          Command:
            [Phenology].MinimumLeafNumber.FixedValue = 9
            [Phenology].VrnSensitivity.FixedValue = 1
            [Phenology].PpSensitivity.FixedValue = 8
            [Structure].MainStemNodeAppearanceRate.BasePhyllochron.FixedValue = 90
  DataStore
    ExcelInput Observed: FileName=Observed.xlsx; SheetNames=[Observed]
    ExcelInput MaxLeafSize: FileName=MaxLeafSize.xlsx; SheetNames=[MaxLeafSize]
    PredictedObserved: PredictedTableName=EndTrialReport; ObservedTableName=Observed; FieldNameUsedForMatch=Sow
    PredictedObserved DailyObsPred: PredictedTableName=DailyReport; ObservedTableName=Observed; FieldNameUsedForMatch=Clock.Today
    PredictedObserved HarvestPredictedObserved: PredictedTableName=DailyReport; ObservedTableName=Observed; FieldNameUsedForMatch=Oats.Phenology.CurrentStageName
  Folder Validation
    Memo
      A test dataset has been developed to test the APSIM Oats model for a range of environmental (soil and climate) conditions, management options (sowing dates, populations, nitrogen rates, row spacing, irrigation), genetic backgrounds (different regions, cultivar types) and for special considerations such as crop damage.  These tests have been groups into various geographical regions to allow the user to evaluate the suitability of the model for their particular region of interest.  Graphs of model performance are provided for yield, biomass production, canopy development, phenological development, water and nitrogen uptake, and grain yield components.
    Folder Combined Results
      Memo Combined Results
        Simulation results for the combined datasets from the various countries are shown in the following graphs.  The model is able to adequately capture the influence of growing conditions (soil, climate) and management (population, Nitrogen, irrigation, sowing date).
    Folder New Zealand
      Experiment RS_Oats_9899
        Memo Experiment Description
          Martin, R. J., et al. Effects of Timing and Intensity of Drought on the Yield of Oats (Avena sativa L.). Australian Agronomy
          Hobart.
          	The response of oats (Avena sativa L.) to timing and intensity of drought was determined in a mobile
          rainshelter, which excluded rainfall during crop growth. Ten irrigation treatments subjected the crops to
          drought of varying duration at different stages during plant growth; the crops were otherwise fully
          irrigated. Oat grain yield generally increased linearly with cumulative water use, and decreased linearly as
          the maximum potential soil moisture deficit experienced during crop growth increased, regardless of the
          timing of drought. The exception to this was the no drought (fully irrigated) treatment, where lodging
          reduced panicle number and grain weight compared to early drought treatments. Drought affected yield
          mainly by reducing panicle and grain number, effects on grain weight were small. . Relieving early drought
          through late irrigation led to more late tillers, more panicles, heavier grains, and later maturity. Full and
          late drought increased screenings.
        Factors
          Factor _Irrig
            Factor Nill
              Specifications:
                [Irrig]
                [Water]
                [Initial water]
              Operations Irrig
              Water
                Thickness  BD     AirDry  LL15  DUL   SAT   KS
                200        1.311  0.07    0.12  0.32  0.42  4832.039
                200        1.524  0.14    0.14  0.3   0.41  389.229
                200        1.65   0.15    0.15  0.32  0.34  16.362
                200        1.601  0.1     0.1   0.24  0.32  97.995
                200        1.601  0.14    0.14  0.23  0.35  97.995
                200        1.601  0.16    0.16  0.23  0.34  97.995
                200        1.601  0.09    0.09  0.13  0.31  97.995
                200        1.601  0.06    0.06  0.17  0.31  97.995
                SoilCrop OatsSoil: LL=[0.12, 0.14, 0.149, 0.1, 0.14, 0.16, 0.09, 0.061]; KL=[0.06, 0.07, 0.02, 0.06, 0.05, 0.01, 0.02, 0]; XF=[1, 1, 1, 1, 1, 1, 1, 1]
              Sample Initial water: Thickness=[200, 200, 200, 200, 200, 200, 200, 200]; SW=[0.32, 0.3, 0.32, 0.24, 0.23, 0.23, 0.13, 0.17]; NO3Units=kgha; NH4Units=ppm; SWUnits=Volumetric; OCUnits=Total; PHUnits=Water
            Factor Full
              Specifications:
                [Irrig]
                [Water]
                [Initial water]
              Operations Irrig
                1998-10-31  [Irrigation].Apply(30);
                1998-11-09  [Irrigation].Apply(35.3);
                1998-11-16  [Irrigation].Apply(45);
                1998-11-23  [Irrigation].Apply(44);
                1998-11-30  [Irrigation].Apply(30.1);
                1998-12-07  [Irrigation].Apply(41.6);
                1998-12-14  [Irrigation].Apply(55);
                1998-12-21  [Irrigation].Apply(50);
                1998-12-28  [Irrigation].Apply(55);
                1999-01-05  [Irrigation].Apply(53);
                1999-01-11  [Irrigation].Apply(50.4);
                1999-01-18  [Irrigation].Apply(49);
                1999-01-25  [Irrigation].Apply(49);
                1999-02-01  [Irrigation].Apply(51.2);
                1999-02-08  [Irrigation].Apply(53);
                1999-02-15  [Irrigation].Apply(34);
                1999-02-22  [Irrigation].Apply(37);
                1999-03-01  [Irrigation].Apply(24);
              Water
                Thickness  BD     AirDry  LL15   DUL    SAT
                200        1.311  0.05    0.1    0.3    0.419
                200        1.524  0.05    0.1    0.3    0.405
                200        1.65   0.149   0.149  0.28   0.342
                200        1.601  0.129   0.129  0.255  0.322
                200        1.601  0.155   0.155  0.288  0.348
                200        1.601  0.149   0.149  0.28   0.342
                200        1.601  0.053   0.053  0.107  0.307
                200        1.601  0.061   0.061  0.122  1.31
                KS=[4832.039, 389.229, 16.362, 97.995, 97.995, 97.995, 97.995, 0.05, 0.05, 0.15, 0.13, 0.16, 0.15, 0.05, 0.06]
                SoilCrop OatsSoil: LL=[0.1, 0.1, 0.149, 0.129, 0.155, 0.149, 0.053, 0.061]; KL=[0.06, 0.05, 0.04, 0.06, 0.05, 0.02, 0.02, 0]; XF=[1, 1, 1, 1, 1, 1, 1, 1]
              Memo
                Added an Irrigation on 30 Oct after looking at data and seeing a Panicle.
              Sample Initial water: Thickness=[200, 200, 200, 200, 200, 200, 200, 200]; SW=[0.3, 0.3, 0.28, 0.26, 0.29, 0.28, 0.11, 0.12]; NO3Units=kgha; NH4Units=ppm; SWUnits=Volumetric; OCUnits=Total; PHUnits=Water
            Factor LD1
              Specifications:
                [Irrig]
                [Water]
                [Initial water]
              Operations Irrig
                1998-10-27  [Irrigation].Apply(50);
                1998-11-02  [Irrigation].Apply(30);
              Water
                Thickness  BD     AirDry  LL15  DUL   SAT
                200        1.311  0.05    0.1   0.32  0.42
                200        1.524  0.14    0.14  0.3   0.41
                200        1.65   0.13    0.13  0.26  0.34
                200        1.601  0.13    0.13  0.28  0.32
                200        1.601  0.17    0.17  0.27  0.35
                200        1.601  0.18    0.18  0.28  0.34
                200        1.601  0.05    0.05  0.2   0.31
                200        1.601  0.06    0.06  0.22  0.31
                SoilCrop OatsSoil: LL=[0.1, 0.14, 0.13, 0.129, 0.17, 0.18, 0.053, 0.061]; KL=[0.06, 0.05, 0.04, 0.04, 0.03, 0.02, 0.02, 0]; XF=[1, 1, 1, 1, 1, 1, 1, 1]
              Sample Initial water: Thickness=[200, 200, 200, 200, 200, 200, 200, 200]; SW=[0.28, 0.3, 0.26, 0.28, 0.27, 0.28, 0.2, 0.22]; NO3Units=kgha; NH4Units=ppm; SWUnits=Volumetric; OCUnits=Total; PHUnits=Water
            Factor LD4
              Specifications:
                [Irrig]
                [Water]
                [Initial water]
              Operations Irrig
                1998-10-27  [Irrigation].Apply(50)
                1998-11-02  [Irrigation].Apply(30)
                1998-11-09  [Irrigation].Apply( 35.3)
                1998-11-16  [Irrigation].Apply(45)
                1998-11-23  [Irrigation].Apply( 44)
                1998-11-30  [Irrigation].Apply(30.1 )
                1998-12-07  [Irrigation].Apply( 41.6)
              Water
                Thickness  BD     AirDry  LL15  DUL   SAT   KS
                200        1.311  0.05    0.1   0.32  0.42  4832.039
                200        1.524  0.14    0.14  0.3   0.41  389.229
                200        1.65   0.1     0.1   0.26  0.34  16.362
                200        1.601  0.09    0.09  0.24  0.32  97.995
                200        1.601  0.16    0.16  0.27  0.35  97.995
                200        1.601  0.16    0.16  0.23  0.34  97.995
                200        1.601  0.11    0.11  0.15  0.31  97.995
                200        1.601  0.06    0.06  0.2   0.31  97.995
                SoilCrop OatsSoil: LL=[0.1, 0.14, 0.1, 0.09, 0.16, 0.16, 0.11, 0.061]; KL=[0.06, 0.05, 0.04, 0.06, 0.05, 0.02, 0.02, 0]; XF=[1, 1, 1, 1, 1, 1, 1, 1]
              Sample Initial water: Thickness=[200, 200, 200, 200, 200, 200, 200, 200]; SW=[0.32, 0.3, 0.26, 0.19, 0.25, 0.21, 0.13, 0.2]; NO3Units=kgha; NH4Units=ppm; SWUnits=Volumetric; OCUnits=Total; PHUnits=Water
            Factor ED1
              Specifications:
                [Irrig]
                [Water]
                [Initial water]
              Operations Irrig
                1998-11-16  [Irrigation].Apply(  45 )
                1998-11-23  [Irrigation].Apply(  44 )
                1998-11-30  [Irrigation].Apply(  30.1 )
                1998-12-07  [Irrigation].Apply(  41.6 )
                1998-12-14  [Irrigation].Apply(  55 )
                1998-12-21  [Irrigation].Apply(  50 )
                1998-12-28  [Irrigation].Apply(  55 )
                1999-01-05  [Irrigation].Apply(  53 )
                1999-01-11  [Irrigation].Apply( 50.4 )
                1999-01-18  [Irrigation].Apply(  49 )
                1999-01-25  [Irrigation].Apply(  49 )
                1999-02-01  [Irrigation].Apply(  51.2 )
                1999-02-08  [Irrigation].Apply(  53 )
                1999-02-15  [Irrigation].Apply(  34 )
                1999-02-22  [Irrigation].Apply(  37 )
                1999-03-01  [Irrigation].Apply(  24 )
              Water
                Thickness  BD    AirDry  LL15  DUL   SAT   KS
                200        1.31  0.05    0.1   0.25  0.42  4832.039
                200        1.52  0.1     0.1   0.33  0.41  389.229
                200        1.65  0.15    0.15  0.27  0.34  16.362
                200        1.6   0.14    0.14  0.22  0.32  97.995
                200        1.6   0.15    0.15  0.2   0.35  97.995
                200        1.6   0.15    0.15  0.25  0.34  97.995
                200        1.6   0.1     0.1   0.19  0.31  97.995
                200        1.6   0.06    0.06  0.17  0.31  97.995
                SoilCrop OatsSoil: LL=[0.1, 0.1, 0.149, 0.14, 0.15, 0.149, 0.1, 0.06]; KL=[0.06, 0.05, 0.04, 0.06, 0.05, 0.02, 0.02, 0]; XF=[1, 1, 1, 1, 1, 1, 1, 1]
              Sample Initial water: Thickness=[200, 200, 200, 200, 200, 200, 200, 200]; SW=[0.25, 0.33, 0.27, 0.22, 0.2, 0.25, 0.19, 0.17]; NO3Units=kgha; NH4Units=ppm; SWUnits=Volumetric; OCUnits=Total; PHUnits=Water
        Simulation Rainshelter
          Clock: StartDate=1998-09-28; EndDate=1999-04-01
          Summary summaryfile
          Weather: FileName=%root%\Examples\WeatherFiles\lincoln.met
          Zone paddock: Area=1; Slope=0
            Soil: SoilType=NZ_sedementary; Region=Plains; State=Canterbury; Country=New Zealnd; Latitude=0; Longitude=0
              Analysis: Thickness=[100, 200, 300, 300, 300, 300]; PH=[6.6, 6.2, 5.7, 5.5, 5.5, 5.5]; PHUnits=Water; BoronUnits=HotWater
              Water
                Thickness  BD     AirDry  LL15   DUL   SAT    KS
                200        1.311  0.05    0.1    0.25  0.419  4832.039
                200        1.524  0.1     0.1    0.33  0.405  389.229
                200        1.65   0.149   0.149  0.27  0.342  16.362
                200        1.601  0.14    0.14   0.22  0.322  97.995
                200        1.601  0.15    0.15   0.2   0.348  97.995
                200        1.601  0.149   0.149  0.25  0.342  97.995
                200        1.601  0.1     0.1    0.19  0.307  97.995
                200        1.601  0.06    0.06   0.17  0.309  97.995
                SoilCrop WheatSoil: LL=[0.1, 0.1, 0.07, 0.07, 0.08, 0.07, 0.07, 0.07]; KL=[0.06, 0.06, 0.06, 0.06, 0.04, 0.025, 0.01, 0.005]; XF=[1, 1, 1, 1, 1, 1, 1, 1]
                SoilCrop OatsSoil: LL=[0.1, 0.1, 0.149, 0.14, 0.15, 0.149, 0.1, 0.06]; KL=[0.06, 0.05, 0.04, 0.06, 0.05, 0.02, 0.02, 0]; XF=[1, 0.2, 1, 1, 1, 1, 1, 1]
              SoilWater: SummerDate=1-Nov; SummerU=6; SummerCona=2; WinterDate=1-Apr; WinterU=9; WinterCona=4.4; DiffusConst=0; DiffusSlope=0; Salb=0.18; CN2Bare=68; CNRed=20; CNCov=0.8; slope=0; discharge_width=0; catchment_area=0; max_pond=0; residueinterception=0
                Thickness  SWCON  KLAT
                200        0.7    0
                200        0.7    0
                200        0.95   0
                200        0.95   0
                200        0.95   0
                200        0.95   0
                200        0.95   0
                200        0.95   0
              SoilNitrogen: fom_type=[default, manure, mucuna, lablab, shemp, stable]; fract_carb=[0.2, 0.3, 0.54, 0.57, 0.45, 0]; fract_cell=[0.7, 0.3, 0.37, 0.37, 0.47, 0.1]; fract_lign=[0.1, 0.4, 0.09, 0.06, 0.08, 0.9]
              SoilOrganicMatter: RootCN=40; RootWt=1000; SoilCN=11; EnrACoeff=7.4; EnrBCoeff=0.2; OCUnits=Total
                Thickness  OC     FBiom  FInert
                180        2.625  0.033  0.437
                150        1.247  0.019  0.657
                400        0.316  0.012  0.85
                270        0.208  0.01   0.945
                500        0.2    0.01   0.983
              Sample Initial nitrogen: NO3Units=ppm; NH4Units=ppm; SWUnits=Volumetric; OCUnits=Total; PHUnits=Water
                Thickness  NO3      NH4
                200        202.213  3
                200        4.921    2
                200        4.545    1
                200        3.123    1
                200        1.562    1
                200        1.562    1
                200        1.562    1
                200        1.562    1
              Sample Initial water: Thickness=[200, 200, 200, 200, 200, 200, 200, 200]; SW=[0.31, 0.31, 0.16, 0.15, 0.1, 0.1, 0.11, 0.12]; NO3Units=kgha; NH4Units=ppm; SWUnits=Volumetric; OCUnits=Total; PHUnits=Water
              CERESSoilTemperature
            SoluteManager
            MicroClimate: a_interception=0; b_interception=1; c_interception=0; d_interception=0; soil_albedo=0.3; sun_angle=15; soil_heat_flux_fraction=0.4; night_interception_fraction=0.5; refheight=2; albedo=0.293662; emissivity=0.96; RadIntTotal=0
            Fertiliser
            SurfaceOrganicMatter Surface Organic Matter: PoolName=wheat_stubble; type=wheat; mass=0; standing_fraction=0; cnr=80; CriticalResidueWeight=2000; OptimumDecompTemp=20; MaxCumulativeEOS=20; CNRatioDecompCoeff=0.277; CNRatioDecompThreshold=25; TotalLeachRain=25; MinRainToLeach=10; CriticalMinimumOrganicC=0.004; DefaultCPRatio=0; DefaultStandingFraction=0; StandingExtinctCoeff=0.5; FractionFaecesAdded=0.5
              Pools:
                {PoolName=wheat_stubble, ResidueType=wheat, Mass=0, CNRatio=80, StandingFraction=0}
              ResidueTypes: LoadFromResource=ResidueTypes
            Irrigation
            Plant Oats: CropType=Oats
            Manager ClimateControl
              StartDate = 1998-10-17
              EndDate = 1999-04-01
```csharp
using System;
using Models.Core;
using APSIM.Shared.Utilities;



using System.Collections.Generic;
using System.Text;
using Models.PMF;
using Models;
using System.Xml.Serialization;

namespace Models
{
	[Serializable] 
	[System.Xml.Serialization.XmlInclude(typeof(Model))]
	public class Script : Model
	{
		[Link] Weather Met;
		[Link] Clock Clock;
    
		[Description("Start Date")]
		public DateTime StartDate { get; set; }
        
		[Description("End Date")]
		public DateTime EndDate { get; set; }
 
    
		[EventSubscribe("PreparingNewWeatherData")]
		private void OnPreparingNewWeatherData(object sender, EventArgs e)
		{
			if ((Clock.Today.Date >= StartDate) && (Clock.Today.Date <= EndDate))
				Met.Rain = 0;		
		}
	}
}
```
            Manager Harvesting
```csharp
using System;
using Models.Core;
using System.Collections.Generic;
using System.Text;
using Models.Soils;
using Models.PMF;
using Models;
using System.Xml.Serialization;
using APSIM.Shared.Utilities;

namespace Models
{
	[Serializable] 
	public class Script : Model
	{
		[Link] Plant Oats;
		[Link] Clock clock;
		[EventSubscribe("DoManagement")]
		private void OnDoManagement(object sender, EventArgs e)
		{
			if (Oats.IsAlive == true)
			{	
				DateTime HD = new DateTime(1999, 03, 04);
				if (clock.Today.Date == HD.Date)
				{
					Oats.Harvest();
					Oats.EndCrop();
				}
			}
		}
	}
}
```
            Folder Manager folder
              Operations
                1998-09-29  [Oats].Sow(population:300, cultivar:"Drummond", depth:15, rowSpacing:130);
              Operations Irrig
                1998-11-09  [Irrigation].Apply(35.3);
                1998-11-16  [Irrigation].Apply(45);
                1998-11-23  [Irrigation].Apply(44);
                1998-11-30  [Irrigation].Apply(30.1);
                1998-12-07  [Irrigation].Apply(41.6);
                1998-12-14  [Irrigation].Apply(55);
                1998-12-21  [Irrigation].Apply(50);
                1998-12-28  [Irrigation].Apply(55);
                1999-01-05  [Irrigation].Apply(53);
                1999-01-11  [Irrigation].Apply(50.4);
                1999-01-18  [Irrigation].Apply(49);
                1999-01-25  [Irrigation].Apply(49);
                1999-02-01  [Irrigation].Apply(51.2);
                1999-02-08  [Irrigation].Apply(53);
                1999-02-15  [Irrigation].Apply(34);
                1999-02-22  [Irrigation].Apply(37);
                1999-03-01  [Irrigation].Apply(24);
            Report DailyReport
            Report HarvestReport
            Report SupReport: EventNames=[Clock].DoReport
              VariableNames:
                [Clock].Today
                [Phenology].ThermalTime.Value()
                [Leaf].CohortSize
                [Leaf].CohortParameters.MaxArea.Value()
                [0ats].Arbitrator.DMAllocated
                [0ats].Arbitrator.DMDemand
                [0ats].Arbitrator.DMNutrientLimitation
                [0ats].Arbitrator.DMSinkLimitation
                [0ats].Arbitrator.DM.TotalFixationSupply
                [0ats].Arbitrator.FN
                [0ats].Arbitrator.NDemand
                [Oats].Structure.MainStemNodeAppearanceRate
                [0ats].Leaf.CohortMaxSize
                [0ats].Leaf.CohortParameters.GrowthDuration.Value()
                [0ats].Leaf.CohortParameters.LagDuration.Value()
                [0ats].Leaf.CohortParameters.SenescenceDuration.Value()
                [0ats].Leaf.CohortParameters.SpecificLeafAreaMax.Value()
                [0ats].Leaf.CohortParameters.SpecificLeafAreaMin.Value()
                [0ats].Leaf.Photosynthesis.FT.Value()
                [0ats].Leaf.Photosynthesis.FVPD.Value()
                [0ats].Leaf.Photosynthesis.RueAct
                [0ats].Stem.DMDemandFunction.HightLimitedDMAccumulation.Value()
                [0ats].Stem.DMDemandFunction.PotentialDMAccumulation.Value()
                [0ats].Leaf.NextExpandingLeafProportion
                [0ats].Structure.MeanTillerGrowthRate.Value()
                sum([Soil].SoilWater.SWmm[1:8]) as ProfileWater
                [LeafSize].Script.LeafAppearedPosition
                [LeafSize].Script.MostRecentlyAppearedLeafMaxSize
                [LeafSize].Script.LeafExpandedPosition
                [LeafSize].Script.MostRecentlyExpandedLeafSize
            Report EnviroReport: EventNames=[Clock].DoReport
              VariableNames:
                [Clock].Today
                [Weather].MeanT
                [Weather].Radn
                [Oats].Phenology.ThermalTime
                [Oats].Phenology.ThermalTime.MaximumFunction
                [Oats].Phenology.ThermalTime.MaximumFunction.DivideFunction
                [Oats].Phenology.ThermalTime.MaximumFunction.DivideFunction.PP7
                [Oats].Phenology.Photoperiod
                [Oats].Structure.LeafTipsAppeared
            Manager LeafSize
```csharp
using System;
using Models.Core;
using System.Collections.Generic;
using System.Text;
using Models.Soils;
using Models.PMF;
using Models;
using System.Xml.Serialization;
using APSIM.Shared.Utilities;

namespace Models
{
	[Serializable] 
	public class Script : Model
	{
		[Link] Clock Clock;
		[Link] Plant Oats;
		[Link] Zone zone;
					
		[XmlIgnore] public bool InitialDay { get; set; }
		
		[XmlIgnore] public double LeafExpandedPosition { get; set; }
		[XmlIgnore] public double LeafAppearedPosition { get; set; }
		[XmlIgnore] public double ExpandedLeafNoYesterday { get; set; }
		[XmlIgnore] public double AppearedLeafNoYesterday { get; set; }
		[XmlIgnore] public double MostRecentlyExpandedLeafSize { get; set; }
		[XmlIgnore] public double MostRecentlyAppearedLeafMaxSize { get; set; }
        
		[EventSubscribe("Commencing")]
		private void OnSimulationCommencing(object sender, EventArgs e)
		{
			InitialDay = true;
			LeafExpandedPosition = 0;
			LeafAppearedPosition = 0;
			ExpandedLeafNoYesterday = 0;
			AppearedLeafNoYesterday = 0;
			MostRecentlyExpandedLeafSize = 0;
			MostRecentlyAppearedLeafMaxSize = 0;
		}
		
		[EventSubscribe("DoManagement")]
		private void OnDoManagement(object sender, EventArgs e)
		{
			ExpandedLeafNoYesterday = (double)zone.Get("Oats.Leaf.ExpandedCohortNo");
			AppearedLeafNoYesterday = (double)zone.Get("Oats.Leaf.AppearedCohortNo");
		}
		
		[EventSubscribe("DoManagementCalculations")]
		private void OnDoManagementCalculations(object sender, EventArgs e)
		{
			if ((double)zone.Get("Oats.Leaf.ExpandedCohortNo") > ExpandedLeafNoYesterday)
			{
				LeafExpandedPosition = (double)zone.Get("Oats.Leaf.ExpandedCohortNo");
				MostRecentlyExpandedLeafSize = (double)zone.Get("Oats.Leaf.CohortSize[" + (int)LeafExpandedPosition + "]");
			}
			
			if ((double)zone.Get("Oats.Leaf.AppearedCohortNo") > AppearedLeafNoYesterday)
			{
				LeafAppearedPosition = (double)zone.Get("Oats.Leaf.AppearedCohortNo");
				MostRecentlyAppearedLeafMaxSize = (double)zone.Get("Oats.Leaf.CohortParameters.MaxArea.Value()");
			}
			
		}
	}
}
```
          SoilArbitrator Soil Arbitrator
      Experiment WinterSowing2015
        Memo
          FRNL Experiment  Brendom Malcom Agronomy 2016

          Grazing winter forage crops is an important management strategy for profitable livestock production in many New Zealand regions where there is commonly a pasture feed deficit during this period. However, the high stocking densities that are often associated with these systems can have negative environmental effects, such as nitrogen (N) leaching losses to groundwater. This field study investigated the potential biomass production and reduced risk of N leaching from establishing oats (Avena sativa L.) as a green-chop catch crop after winter-grazed forage kale (Brassica oleracea var. acephala L.) in Canterbury, New Zealand. Oat crops were direct-drilled on two sowing dates (early: 1 July 2015 and late: 1 August 2015) and were managed under high (400 kg N/ha) and low (0 kg N/ha) N load conditions, representing urine-patch and inter urine-patch areas. For the early-sown crops yields were 6.1 (low N) and 11.8 t DM/ha (high N) at final harvest (50% ear emergence) on 19 November
          2015. For the late-sown crops yields were 6.7 (low N) and 10.1 t DM/ha (high N) at the same development stage (26 November 2015). By establishing oats as a catch crop in winter soil profile mineral-N (0-120 cm depth) was reduced by up to 86% (early) and 80% (late) in the high N (simulated urine-patch) treatments compared with the respective fallow treatment. These results indicated the technical feasibility of direct drilling oats as catch crops immediately after winter forage grazing, with likely production and environmental benefits such as the reduced risk of N leaching losses.
        Factors
          Factor Sow
            Factor July
              Specifications:
                [Operations]
                [Fertilise].Script.SDSwitch = 1.0
              Operations
                2015-07-01  [Oats].Sow(population:200, cultivar:"Milton", depth:40, rowSpacing:150);
            Factor Aug
              Specifications:
                [Operations]
                [Fertilise].Script.SDSwitch = 2.0
              Operations
                2015-08-01  [Oats].Sow(population:200, cultivar:"Milton", depth:40, rowSpacing:150);
            Factor Fallow
              Specifications:
                [Operations]
                [Fertilise].Script.SDSwitch = 0.0
              Operations
          Factor Fert
            Factor 0: Specifications=[Fertilize]
              Operations Fertilize
                2015-06-01  [Fertiliser].Apply(0, Fertiliser.Types.UreaN, 10);
            Factor 400: Specifications=[Fertilize]
              Operations Fertilize
                2015-06-01  [Fertiliser].Apply(400, Fertiliser.Types.UreaN, 10);
        Simulation ABlock
          Clock: StartDate=2015-05-25; EndDate=2015-12-01
          Summary summaryfile
          Weather: FileName=%root%\Examples\WeatherFiles\lincoln.met
          Zone paddock: Area=1; Slope=0
            Folder Manager folder
              Operations
              Manager Fertilise
                FertDate1 = 05-Aug
                FertDate2 = 01-Oct
                FertDate3 = 20-Oct
                FertDate4 = 25-Nov
                Amount1 = 0
                Amount2 = 0
                Amount3 = 0
                Amount4 = 0
                SDSwitch = 0
```csharp
using System;
using Models.Core;
using Models.PMF;
using APSIM.Shared.Utilities;
namespace Models
{
	[Serializable]
	public class Script : Model
	{
		[Link] Clock Clock;
		[Link] Fertiliser Fertiliser;
		
		[Description("Date to fertilise")]
		public string FertDate1 { get; set; }
		[Description("Date to fertilise")]
		public string FertDate2 { get; set; }
		[Description("Date to fertilise")]
		public string FertDate3 { get; set; }
		[Description("Date to fertilise")]
		public string FertDate4 { get; set; }
		
		[Description("Amount of fertiliser to be applied (kg/ha)")]
		public double Amount1 { get; set; }
		[Description("Amount of fertiliser to be applied (kg/ha)")]
		public double Amount2 { get; set; }
		[Description("Amount of fertiliser to be applied (kg/ha)")]
		public double Amount3 { get; set; }
		[Description("Amount of fertiliser to be applied (kg/ha)")]
		public double Amount4 { get; set; }
		
		[Description("Amount of fertiliser to be applied (kg/ha)")]
		public double SDSwitch { get; set; }
		
		[EventSubscribe("DoManagement")]
		private void OnDoManagement(object sender, EventArgs e)
		{
			if (DateUtilities.WithinDates(FertDate1, Clock.Today, FertDate1))
				Fertiliser.Apply(Amount: Amount1 * SDSwitch, Type: Fertiliser.Types.NO3N);
			if (DateUtilities.WithinDates(FertDate2, Clock.Today, FertDate2))
				Fertiliser.Apply(Amount: Amount2, Type: Fertiliser.Types.NO3N);
			if (DateUtilities.WithinDates(FertDate3, Clock.Today, FertDate3))
				Fertiliser.Apply(Amount: Amount3, Type: Fertiliser.Types.NO3N);
			if (DateUtilities.WithinDates(FertDate4, Clock.Today, FertDate4))
				Fertiliser.Apply(Amount: Amount4 * SDSwitch, Type: Fertiliser.Types.NO3N);
		}
	}
}
```
              Operations Fertilize
                2015-06-01  [Fertiliser].Apply(0, Fertiliser.Types.UreaN, 10);
              Operations Irr
                2015-10-15  [Irrigation].Apply(25);
                2015-11-03  [Irrigation].Apply(25);
                2015-11-15  [Irrigation].Apply(25);
                2015-11-20  [Irrigation].Apply(30);
            Irrigation
            SurfaceOrganicMatter Surface Organic Matter: same as Validation.New Zealand.RS_Oats_9899.Rainshelter.paddock.Surface Organic Matter
            Fertiliser
            MicroClimate: a_interception=0; b_interception=1; c_interception=0; d_interception=0; soil_albedo=0.3; sun_angle=15; soil_heat_flux_fraction=0.4; night_interception_fraction=0.5; refheight=2; albedo=0.293662; emissivity=0.96; RadIntTotal=0
            Plant Oats: CropType=Oats
            Report DailyReport
            Report HarvestReport
            Manager Harvesting
```csharp
using System;
using Models.Core;
using System.Collections.Generic;
using System.Text;
using Models.Soils;
using Models.PMF;
using Models;
using System.Xml.Serialization;
using APSIM.Shared.Utilities;

namespace Models
{
	[Serializable] 
	public class Script : Model
	{
		[Link] Plant Oats;
		[Link] Clock clock;
		[EventSubscribe("DoManagement")]
		private void OnDoManagement(object sender, EventArgs e)
		{
			if (Oats.IsAlive == true)
			{	
				DateTime HD = new DateTime(2015, 11, 30);
				if (clock.Today.Date == HD.Date)
				{
					Oats.Harvest();
					Oats.EndCrop();
				}
			}
		}
	}
}
```
            Report SupReport: EventNames=[Clock].DoReport
              VariableNames:
                [Clock].Today
                [Leaf].CohortSize
                [0ats].Arbitrator.DMAllocated
                [0ats].Arbitrator.DMDemand
                [0ats].Arbitrator.DMNutrientLimitation
                [0ats].Arbitrator.DMSinkLimitation
                [0ats].Arbitrator.DM.TotalFixationSupply
                [0ats].Arbitrator.FN
                [0ats].Arbitrator.NDemand
                [0ats].Leaf.CohortMaxSize
                [0ats].Leaf.CohortParameters.GrowthDuration.Value()
                [0ats].Leaf.CohortParameters.LagDuration.Value()
                [0ats].Leaf.CohortParameters.MaxArea.Value()
                [0ats].Leaf.CohortParameters.SenescenceDuration.Value()
                [0ats].Leaf.CohortParameters.SpecificLeafAreaMax.Value()
                [0ats].Leaf.CohortParameters.SpecificLeafAreaMin.Value()
                [0ats].Leaf.Photosynthesis.FT.Value()
                [0ats].Leaf.Photosynthesis.FVPD.Value()
                [0ats].Leaf.Photosynthesis.RueAct
                [0ats].Stem.DMDemandFunction.HightLimitedDMAccumulation.Value()
                [0ats].Stem.DMDemandFunction.PotentialDMAccumulation.Value()
                [0ats].Leaf.NextExpandingLeafProportion
                [0ats].Structure.MeanTillerGrowthRate.Value()
                sum([Soil].SoilWater.SWmm[1:8]) as ProfileWater
            Soil: Latitude=0; Longitude=0
              Analysis: Thickness=[100, 200, 300, 300, 300, 300]; PH=[6.6, 6.2, 5.7, 5.5, 5.5, 5.5]; PHUnits=Water; BoronUnits=HotWater
              Water
                Thickness  BD   AirDry  LL15  DUL   SAT
                200        1.2  0.05    0.1   0.32  0.46
                200        1.2  0.1     0.1   0.32  0.46
                200        1.2  0.07    0.07  0.13  0.4
                200        1.2  0.07    0.07  0.1   0.3
                200        1.2  0.08    0.08  0.11  0.3
                200        1.2  0.07    0.07  0.1   0.3
                200        1.2  0.07    0.07  0.1   0.3
                200        1.2  0.07    0.07  0.1   0.3
                SoilCrop WheatSoil: LL=[0.1, 0.1, 0.07, 0.07, 0.08, 0.07, 0.07, 0.07]; KL=[0.06, 0.06, 0.06, 0.06, 0.04, 0.025, 0.01, 0.005]; XF=[1, 1, 1, 1, 1, 1, 1, 1]
                SoilCrop OatsSoil: LL=[0.1, 0.1, 0.07, 0.07, 0.08, 0.07, 0.07, 0.07]; KL=[0.06, 0.06, 0.06, 0.06, 0.04, 0.025, 0.01, 0.005]; XF=[1, 1, 1, 1, 1, 1, 1, 1]
              SoilWater: same as Validation.New Zealand.RS_Oats_9899.Rainshelter.paddock.Soil.SoilWater
              SoilNitrogen: fom_type=[default, manure, mucuna, lablab, shemp, stable]; fract_carb=[0.2, 0.3, 0.54, 0.57, 0.45, 0]; fract_cell=[0.7, 0.3, 0.37, 0.37, 0.47, 0.1]; fract_lign=[0.1, 0.4, 0.09, 0.06, 0.08, 0.9]
              SoilOrganicMatter: RootCN=30; RootWt=3000; SoilCN=11.5; EnrACoeff=7.4; EnrBCoeff=0.2; OCUnits=Total
                Thickness  OC    FBiom  FInert
                100        1.82  0.025  0.3
                200        1.47  0.025  0.4
                300        1.2   0.015  0.75
                300        1.03  0.01   0.9
                300        0.47  0.01   0.96
                300        0.47  0.01   0.96
              Sample Initial nitrogen: NO3Units=kgha; NH4Units=ppm; SWUnits=Volumetric; OCUnits=Total; PHUnits=Water
                Thickness  NO3  NH4
                100        20   0
                200        30   0
                300        5    0
                300        5    0
                300        0    0
                300        0    0
              Sample Initial water: Thickness=[200, 200, 200, 200, 200, 200, 200, 200]; SW=[0.29, 0.28, 0.16, 0.15, 0.1, 0.1, 0.11, 0.12]; NO3Units=kgha; NH4Units=ppm; SWUnits=Volumetric; OCUnits=Total; PHUnits=Water
              CERESSoilTemperature
            Report EndTrialReport: EventNames=[Clock].EndOfSimulation
              VariableNames:
                [Oats].Structure.LeafTipsAppeared
                [Oats].Structure.MainStemFinalNodeNumber
                [Oats].Phenology.FlagLeafDAS
                [Oats].Phenology.FloweringDAS
                [Oats].Phenology.MaturityDAS
                [Oats].TotalLive.N
            SoluteManager
          SoilArbitrator Soil Arbitrator
      Experiment WinterSowing2016
        Memo: same as Validation.New Zealand.WinterSowing2015.Memo
        Factors
          Factor Sow
            Factor July
              Specifications:
                [Operations]
                [Fertilise].Script.SDSwitch = 1.0
              Operations
                2016-06-01  [Oats].Sow(population:200, cultivar:"Milton", depth:40, rowSpacing:150);
            Factor Aug
              Specifications:
                [Operations]
                [Fertilise].Script.SDSwitch = 2.0
              Operations
                2016-07-01  [Oats].Sow(population:200, cultivar:"Milton", depth:40, rowSpacing:150);
          Factor Fert
            Factor 400: Specifications=[Fertilize]
              Operations Fertilize
                2015-06-01  [Fertiliser].Apply(400, Fertiliser.Types.UreaN, 10);
        Simulation RS2016
          Clock: StartDate=2016-05-25; EndDate=2016-12-01
          Summary summaryfile
          Weather: FileName=%root%\Examples\WeatherFiles\lincoln.met
          Zone paddock: Area=1; Slope=0
            Folder Manager folder
              Operations
              Manager Fertilise: same as Validation.New Zealand.WinterSowing2015.ABlock.paddock.Manager folder.Fertilise
              Operations Fertilize
                2015-06-01  [Fertiliser].Apply(0, Fertiliser.Types.UreaN, 10);
              Operations Irr
                2016-09-26  [Irrigation].Apply(25);
                2016-10-05  [Irrigation].Apply(25);
            Irrigation
            SurfaceOrganicMatter Surface Organic Matter: same as Validation.New Zealand.RS_Oats_9899.Rainshelter.paddock.Surface Organic Matter
            Fertiliser
            MicroClimate: a_interception=0; b_interception=1; c_interception=0; d_interception=0; soil_albedo=0.3; sun_angle=15; soil_heat_flux_fraction=0.4; night_interception_fraction=0.5; refheight=2; albedo=0.293662; emissivity=0.96; RadIntTotal=0
            Plant Oats: CropType=Oats
            Report DailyReport
            Report HarvestReport
            Manager Harvesting: same as Validation.New Zealand.WinterSowing2015.ABlock.paddock.Harvesting
            Report SupReport: same as Validation.New Zealand.WinterSowing2015.ABlock.paddock.SupReport
            Soil: Latitude=0; Longitude=0
              Analysis: Thickness=[100, 200, 300, 300, 300, 300]; PH=[6.6, 6.2, 5.7, 5.5, 5.5, 5.5]; PHUnits=Water; BoronUnits=HotWater
              Water: same as Validation.New Zealand.WinterSowing2015.ABlock.paddock.Soil.Water
              SoilWater: same as Validation.New Zealand.RS_Oats_9899.Rainshelter.paddock.Soil.SoilWater
              SoilNitrogen: fom_type=[default, manure, mucuna, lablab, shemp, stable]; fract_carb=[0.2, 0.3, 0.54, 0.57, 0.45, 0]; fract_cell=[0.7, 0.3, 0.37, 0.37, 0.47, 0.1]; fract_lign=[0.1, 0.4, 0.09, 0.06, 0.08, 0.9]
              SoilOrganicMatter: same as Validation.New Zealand.WinterSowing2015.ABlock.paddock.Soil.SoilOrganicMatter
              Sample Initial nitrogen: NO3Units=kgha; NH4Units=ppm; SWUnits=Volumetric; OCUnits=Total; PHUnits=Water
                Thickness  NO3  NH4
                100        217  0
                200        30   0
                300        5    0
                300        5    0
                300        0    0
                300        0    0
              Sample Initial water: Thickness=[200, 200, 200, 200, 200, 200, 200, 200]; SW=[0.29, 0.28, 0.16, 0.15, 0.1, 0.1, 0.11, 0.12]; NO3Units=kgha; NH4Units=ppm; SWUnits=Volumetric; OCUnits=Total; PHUnits=Water
              CERESSoilTemperature
            SoluteManager
          SoilArbitrator Soil Arbitrator
      Experiment SowingDate2002
        Memo
          Jamieson, P. D. and C. A. Munro (1999). A simple method for the phenological evaluation of new cereal cultivars. Agronomy Society of New Zealand - Proceedings, Twenty-Ninth Annual Conference, 1999. J. G. Hampton and K. M. Pollock. 29: 63-68.

          This experiment is part of the ongoing Cultivar Prediction Trial at Plant & Food Lincoln wher a Cultivar is planted at 3 sowing dates throughout the year and the time of flowering, Final leaf number and Flag leaf are recorded.
        Factors
          Factor Sow
            Factor HokMar
              Specifications:
                [Operations]
                [Fertilise].Script.SDSwitch = 1.0
              Operations
                2002-03-07  [Oats].Sow(population:200, cultivar:"Hokunui", depth:40, rowSpacing:150);
            Factor HokMay
              Specifications:
                [Operations]
                [Fertilise].Script.SDSwitch = 0.0
              Operations
                2002-05-15  [Oats].Sow(population:200, cultivar:"Hokunui", depth:40, rowSpacing:150);
            Factor HokSep
              Specifications:
                [Operations]
                [Fertilise].Script.SDSwitch = 2.0
              Operations
                2002-09-09  [Oats].Sow(population:200, cultivar:"Hokunui", depth:40, rowSpacing:150);
            Factor StamMar
              Specifications:
                [Operations]
                [Fertilise].Script.SDSwitch = 1.0
              Operations
                2002-03-07  [Oats].Sow(population:200, cultivar:"Stampede", depth:40, rowSpacing:150);
            Factor StamMay
              Specifications:
                [Operations]
                [Fertilise].Script.SDSwitch = 0.0
              Operations
                2002-05-15  [Oats].Sow(population:200, cultivar:"Stampede", depth:40, rowSpacing:150);
            Factor StamSep
              Specifications:
                [Operations]
                [Fertilise].Script.SDSwitch = 0.0
              Operations
                2002-09-09  [Oats].Sow(population:200, cultivar:"Stampede", depth:40, rowSpacing:150);
        Simulation PaddockS1
          Clock: StartDate=2002-03-01; EndDate=2003-02-01
          Summary summaryfile
          Weather: FileName=%root%\Examples\WeatherFiles\lincoln.met
          Zone paddock: Area=1; Slope=0
            Folder Manager folder
              Operations
              Manager Fertilise: same as Validation.New Zealand.WinterSowing2015.ABlock.paddock.Manager folder.Fertilise
              Operations Fertilize
                2015-06-01  [Fertiliser].Apply(0, Fertiliser.Types.UreaN, 10);
            Irrigation
            SurfaceOrganicMatter Surface Organic Matter: same as Validation.New Zealand.RS_Oats_9899.Rainshelter.paddock.Surface Organic Matter
            Fertiliser
            MicroClimate: a_interception=0; b_interception=1; c_interception=0; d_interception=0; soil_albedo=0.3; sun_angle=15; soil_heat_flux_fraction=0.4; night_interception_fraction=0.5; refheight=2; albedo=0.293662; emissivity=0.96; RadIntTotal=0
            Plant Oats: CropType=Oats
            Report DailyReport
            Report EndTrialReport: EventNames=[Clock].EndOfSimulation
              VariableNames:
                [Oats].Structure.LeafTipsAppeared
                [Oats].Structure.MainStemFinalNodeNumber
                [Oats].Phenology.FlagLeafDAS
                [Oats].Phenology.FloweringDAS
                [Oats].Phenology.MaturityDAS
            Manager Harvesting: same as Validation.New Zealand.WinterSowing2015.ABlock.paddock.Harvesting
            Report SupReport: same as Validation.New Zealand.WinterSowing2015.ABlock.paddock.SupReport
            Soil: same as Validation.New Zealand.WinterSowing2016.RS2016.paddock.Soil
            Report EnviroReport: EventNames=[Clock].DoReport
              VariableNames:
                [Clock].Today
                [Weather].MeanT
                [Weather].Radn
                [Oats].Phenology.ThermalTime
                [Oats].Phenology.ThermalTime.MaximumFunction
                [Oats].Phenology.ThermalTime.MaximumFunction.DivideFunction
                [Oats].Phenology.ThermalTime.MaximumFunction.DivideFunction.PP7
                [Oats].Phenology.Photoperiod
                [Oats].Phenology.PhotoperiodDeltaFunction
                [Oats].Structure.LeafTipsAppeared
            SoluteManager
          SoilArbitrator Soil Arbitrator
      Experiment SowingDate2003
        Memo: same as Validation.New Zealand.SowingDate2002.Memo
        Factors
          Factor Sow
            Factor HokMar
              Specifications:
                [Operations]
                [Fertilise].Script.SDSwitch = 1.0
              Operations
                2003-03-14  [Oats].Sow(population:200, cultivar:"Hokunui", depth:40, rowSpacing:150);
            Factor HokMay
              Specifications:
                [Operations]
                [Fertilise].Script.SDSwitch = 0.0
              Operations
                2003-05-21  [Oats].Sow(population:200, cultivar:"Hokunui", depth:40, rowSpacing:150);
            Factor HokSep
              Specifications:
                [Operations]
                [Fertilise].Script.SDSwitch = 2.0
              Operations
                2003-09-02  [Oats].Sow(population:200, cultivar:"Hokunui", depth:40, rowSpacing:150);
            Factor StamMar
              Specifications:
                [Operations]
                [Fertilise].Script.SDSwitch = 1.0
              Operations
                2003-03-14  [Oats].Sow(population:200, cultivar:"Stampede", depth:40, rowSpacing:150);
            Factor StamMay
              Specifications:
                [Operations]
                [Fertilise].Script.SDSwitch = 0.0
              Operations
                2003-05-21  [Oats].Sow(population:200, cultivar:"Stampede", depth:40, rowSpacing:150);
            Factor StamSep
              Specifications:
                [Operations]
                [Fertilise].Script.SDSwitch = 0.0
              Operations
                2003-09-02  [Oats].Sow(population:200, cultivar:"Stampede", depth:40, rowSpacing:150);
        Simulation PaddockS2
          Clock: StartDate=2003-03-01; EndDate=2004-02-01
          Summary summaryfile
          Weather: FileName=%root%\Examples\WeatherFiles\lincoln.met
          Zone paddock: Area=1; Slope=0
            Folder Manager folder
              Operations
              Manager Fertilise: same as Validation.New Zealand.WinterSowing2015.ABlock.paddock.Manager folder.Fertilise
              Operations Fertilize
                2015-06-01  [Fertiliser].Apply(0, Fertiliser.Types.UreaN, 10);
              Manager CalcVals
                SowMonth = 5
```csharp
using System;
using Models.Core;
using System.Collections.Generic;
using System.Text;
using Models.PMF;
using Models;
using System.Xml.Serialization;
using APSIM.Shared.Utilities;

namespace Models
{
	[Serializable] 
	public class Script : Model
	{
		[Link] Plant Oats;
		[Link] Clock clock;
		[Description("Sowing Month")]

		public int SowMonth { get; set; }

		[EventSubscribe("DoSowing")]
		private void OnDoSowing(object sender, EventArgs e)
		{
			SowMonth = clock.Today.DayOfYear;
				
		}
						
			
	}
}
```
            Irrigation
            SurfaceOrganicMatter Surface Organic Matter: same as Validation.New Zealand.RS_Oats_9899.Rainshelter.paddock.Surface Organic Matter
            Fertiliser
            MicroClimate: a_interception=0; b_interception=1; c_interception=0; d_interception=0; soil_albedo=0.3; sun_angle=15; soil_heat_flux_fraction=0.4; night_interception_fraction=0.5; refheight=2; albedo=0.293662; emissivity=0.96; RadIntTotal=0
            Plant Oats: CropType=Oats
            Report DailyReport
            Report EndTrialReport: EventNames=[Clock].EndOfSimulation
              VariableNames:
                [Oats].Structure.LeafTipsAppeared
                [Oats].Structure.MainStemFinalNodeNumber
                [Oats].Phenology.FlagLeafDAS
                [Oats].Phenology.FloweringDAS
                [Oats].Phenology.MaturityDAS
            Manager Harvesting: same as Validation.New Zealand.WinterSowing2015.ABlock.paddock.Harvesting
            Report SupReport: same as Validation.New Zealand.WinterSowing2015.ABlock.paddock.SupReport
            Soil: same as Validation.New Zealand.WinterSowing2016.RS2016.paddock.Soil
            SoluteManager
          SoilArbitrator Soil Arbitrator
      Experiment SowingDate2004
        Factors
          Factor Sow
            Factor HokMar
              Specifications:
                [Operations]
                [Fertilise].Script.SDSwitch = 1.0
              Operations
                2004-03-23  [Oats].Sow(population:200, cultivar:"Hokunui", depth:40, rowSpacing:150);
            Factor HokMay
              Specifications:
                [Operations]
                [Fertilise].Script.SDSwitch = 0.0
              Operations
                2004-05-28  [Oats].Sow(population:200, cultivar:"Hokunui", depth:40, rowSpacing:150);
            Factor HokSep
              Specifications:
                [Operations]
                [Fertilise].Script.SDSwitch = 2.0
              Operations
                2004-09-06  [Oats].Sow(population:200, cultivar:"Hokunui", depth:40, rowSpacing:150);
            Factor StamMar
              Specifications:
                [Operations]
                [Fertilise].Script.SDSwitch = 1.0
              Operations
                2004-03-23  [Oats].Sow(population:200, cultivar:"Stampede", depth:40, rowSpacing:150);
            Factor StamMay
              Specifications:
                [Operations]
                [Fertilise].Script.SDSwitch = 0.0
              Operations
                2004-05-28  [Oats].Sow(population:200, cultivar:"Stampede", depth:40, rowSpacing:150);
            Factor StamSep
              Specifications:
                [Operations]
                [Fertilise].Script.SDSwitch = 0.0
              Operations
                2004-09-06  [Oats].Sow(population:200, cultivar:"Stampede", depth:40, rowSpacing:150);
        Simulation PaddockS3
          Clock: StartDate=2004-03-20; EndDate=2005-02-01
          Summary summaryfile
          Weather: FileName=%root%\Examples\WeatherFiles\lincoln.met
          Zone paddock: Area=1; Slope=0
            Folder Manager folder: same as Validation.New Zealand.SowingDate2002.PaddockS1.paddock.Manager folder
            Irrigation
            SurfaceOrganicMatter Surface Organic Matter: same as Validation.New Zealand.RS_Oats_9899.Rainshelter.paddock.Surface Organic Matter
            Fertiliser
            MicroClimate: a_interception=0; b_interception=1; c_interception=0; d_interception=0; soil_albedo=0.3; sun_angle=15; soil_heat_flux_fraction=0.4; night_interception_fraction=0.5; refheight=2; albedo=0.293662; emissivity=0.96; RadIntTotal=0
            Plant Oats: CropType=Oats
            Report DailyReport
            Report EndTrialReport: EventNames=[Clock].EndOfSimulation
              VariableNames:
                [Oats].Structure.LeafTipsAppeared
                [Oats].Structure.MainStemFinalNodeNumber
                [Oats].Phenology.FlagLeafDAS
                [Oats].Phenology.FloweringDAS
                [Oats].Phenology.MaturityDAS
            Manager Harvesting: same as Validation.New Zealand.WinterSowing2015.ABlock.paddock.Harvesting
            Report SupReport: same as Validation.New Zealand.WinterSowing2015.ABlock.paddock.SupReport
            Soil: same as Validation.New Zealand.WinterSowing2016.RS2016.paddock.Soil
            SoluteManager
          SoilArbitrator Soil Arbitrator
        Memo: same as Validation.New Zealand.SowingDate2002.Memo
    Folder Australia
      Memo
        Say something here about the range of environments in Australia used to test the model
      Folder Gatton2007
        Memo
          This experiment was run in Gatton, Queensland in 2007.  This site has a warm subtropical environment.  Daytime temperatures are moderate due to the relatively low latitudes for winter cereal growing in Australia, but inland continental conditions can provide cool nights with occasional frosts.
        Experiment Gatton2007
          Memo Experiment Description: same as Validation.New Zealand.RS_Oats_9899.Experiment Description
          Factors
            Factor Cv: Specifications=[Operations]
              Operations Coolibah
                2007-05-24  [Oats].Sow(population:95, cultivar:"Coolibah", depth:40, rowSpacing:250);
              Operations Taipan
                2007-05-24  [Oats].Sow(population:104, cultivar:"Taipan", depth:40, rowSpacing:250);
          Simulation Gatton2007Base
            Clock: StartDate=2007-05-01; EndDate=2007-11-30
            Summary summaryfile
            Weather: FileName=Hybrid Gatton07 metfile.met
            Zone paddock: Area=1; Slope=0
              Irrigation
              SurfaceOrganicMatter Surface Organic Matter: same as Validation.New Zealand.RS_Oats_9899.Rainshelter.paddock.Surface Organic Matter
              Fertiliser
              MicroClimate: a_interception=0; b_interception=1; c_interception=0; d_interception=0; soil_albedo=0.3; sun_angle=15; soil_heat_flux_fraction=0.4; night_interception_fraction=0.5; refheight=2; albedo=0.293662; emissivity=0.96; RadIntTotal=0
              Plant Oats: CropType=Oats
              Report DailyReport
              Report HarvestReport
              Manager Harvesting: same as Validation.New Zealand.RS_Oats_9899.Rainshelter.paddock.Harvesting
              Report SupReport: EventNames=[Clock].DoReport
                VariableNames:
                  [Clock].Today
                  [Phenology].ThermalTime.Value()
                  [Leaf].CohortSize
                  [Leaf].CohortParameters.MaxArea.Value()
                  [0ats].Arbitrator.DMAllocated
                  [0ats].Arbitrator.DMDemand
                  [0ats].Arbitrator.DMNutrientLimitation
                  [0ats].Arbitrator.DMSinkLimitation
                  [0ats].Arbitrator.DM.TotalFixationSupply
                  [0ats].Arbitrator.FN
                  [0ats].Arbitrator.NDemand
                  [Oats].Structure.MainStemNodeAppearanceRate
                  [0ats].Leaf.CohortMaxSize
                  [0ats].Leaf.CohortParameters.GrowthDuration.Value()
                  [0ats].Leaf.CohortParameters.LagDuration.Value()
                  [0ats].Leaf.CohortParameters.SenescenceDuration.Value()
                  [0ats].Leaf.CohortParameters.SpecificLeafAreaMax.Value()
                  [0ats].Leaf.CohortParameters.SpecificLeafAreaMin.Value()
                  [0ats].Leaf.Photosynthesis.FT.Value()
                  [0ats].Leaf.Photosynthesis.FVPD.Value()
                  [0ats].Leaf.Photosynthesis.RueAct
                  [0ats].Stem.DMDemandFunction.HightLimitedDMAccumulation.Value()
                  [0ats].Stem.DMDemandFunction.PotentialDMAccumulation.Value()
                  [0ats].Leaf.NextExpandingLeafProportion
                  [0ats].Structure.MeanTillerGrowthRate.Value()
                  sum([Soil].SoilWater.SWmm[1:7]) as ProfileWater
              Soil: Latitude=0; Longitude=0
                Water
                  Thickness  BD    AirDry  LL15  DUL    SAT
                  150        1.37  0.11    0.15  0.394  0.445
                  150        1.29  0.15    0.19  0.325  0.45
                  300        1.4   0.18    0.22  0.432  0.47
                  300        1.47  0.19    0.22  0.363  0.43
                  300        1.37  0.19    0.22  0.34   0.43
                  300        1.35  0.19    0.22  0.373  0.43
                  300        1.35  0.19    0.22  0.394  0.43
                  SoilCrop OatsSoil: LL=[0.21, 0.2, 0.29, 0.295, 0.24, 0.31, 0.33]; KL=[0.15, 0.13, 0.07, 0.03, 0.03, 0.02, 0.02]; XF=[1, 1, 1, 1, 1, 1, 1]
                SoilWater: SummerDate=1-Nov; SummerU=5; SummerCona=3; WinterDate=1-Apr; WinterU=5; WinterCona=3; DiffusConst=40; DiffusSlope=16; Salb=0.13; CN2Bare=78; CNRed=20; CNCov=0.8; max_pond=0; Thickness=[150, 150, 300, 300, 300, 300, 300]; SWCON=[0.5, 0.5, 0.5, 0.5, 0.5, 0.5, 0.5]; residueinterception=0
                SoilNitrogen: fom_type=[default, manure, mucuna, lablab, shemp, stable]; fract_carb=[0.2, 0.3, 0.54, 0.57, 0.45, 0]; fract_cell=[0.7, 0.3, 0.37, 0.37, 0.47, 0.1]; fract_lign=[0.1, 0.4, 0.09, 0.06, 0.08, 0.9]
                SoilOrganicMatter: RootCN=20; RootWt=500; SoilCN=14.5; EnrACoeff=7.4; EnrBCoeff=0.2; OCUnits=Total
                  Thickness  OC    FBiom  FInert
                  150        1.65  0.035  0.45
                  150        1.13  0.02   0.55
                  300        0.68  0.015  0.8
                  300        0.48  0.01   0.99
                  300        0.3   0.01   0.99
                  300        0.39  0.01   0.99
                  300        0.36  0.01   0.99
                Analysis: Thickness=[150, 150, 300, 300, 300, 300, 300]; PH=[7.3, 7.1, 7.1, 7.1, 7.4, 7.8, 7.9]; PHUnits=Water; BoronUnits=HotWater
                Sample Initial nitrogen: NO3Units=ppm; NH4Units=ppm; SWUnits=Volumetric; OCUnits=Total; PHUnits=Water
                  Thickness  NO3      NH4
                  150        22.6002  0.300063
                  150        5.50005  0.300063
                  300        1.30001  0.300063
                  300        0        0
                  300        0        0
                  300        0        0
                  300        0        0
                Sample Initial water: Thickness=[150, 150, 300, 300, 300, 300, 300]; SW=[0.26, 0.33, 0.35, 0.33, 0.26, 0.27, 0.3]; NO3Units=ppm; NH4Units=ppm; SWUnits=Volumetric; OCUnits=Total; PHUnits=Water
                CERESSoilTemperature
              Report EnviroReport: same as Validation.New Zealand.RS_Oats_9899.Rainshelter.paddock.EnviroReport
              SoluteManager
              Operations
              Operations IrrigandFert
                2007-05-18  [Irrigation].Apply(140);
                2007-05-31  [Irrigation].Apply(15);
                2007-07-12  [Irrigation].Apply(15);
                2007-07-24  [Irrigation].Apply(29);
                2007-08-14  [Irrigation].Apply(45);
                2007-05-14  [Fertiliser].Apply(150, Fertiliser.Types.UreaN, 40);
                2007-07-23  [Fertiliser].Apply(90, Fertiliser.Types.UreaN, 10);
                2007-08-13  [Fertiliser].Apply(110, Fertiliser.Types.UreaN, 10);
            SoilArbitrator Soil Arbitrator
        Memo Leaf Rust after anthesis
          Field notes recorded leaf rust becoming severe in Coolibah on 12/9/07 - no biomass cuts were taken after this
      Folder Wellcamp2006
        Memo
          This experiment was run at DPI Wellcamp Research Station, Queensland in 2006.
          Phenology data only
        Experiment Wellcamp2006
          Memo Experiment Description: same as Validation.New Zealand.RS_Oats_9899.Experiment Description
          Factors
            Factor Cv: Specifications=[Sowing]
              Operations Coolibah
                2006-04-03  [Oats].Sow(population:100, cultivar:"Coolibah", depth:30, rowSpacing:250);
              Operations Taipan
                2006-04-03  [Oats].Sow(population:100, cultivar:"Taipan", depth:30, rowSpacing:250);
              Operations Algerian
                2006-04-03  [Oats].Sow(population:100, cultivar:"Algerian", depth:30, rowSpacing:250);
              Operations Nugene
                2006-04-03  [Oats].Sow(population:100, cultivar:"Nugene", depth:30, rowSpacing:250);
              Operations Drover
                2006-04-03  [Oats].Sow(population:100, cultivar:"Drover", depth:30, rowSpacing:250);
            Factor Cut: Specifications=[Cutting]
              Manager None
```csharp
using System;
using System.Collections.Generic;
using Models.Core;
using Models.PMF;
using Models.PMF.Interfaces;
using System.Xml.Serialization;

namespace Models
{
	[Serializable] 
	[System.Xml.Serialization.XmlInclude(typeof(Model))]
	public class Script : Model
	{
		
	}
}
```
              Manager One
                CutDate = 2006-08-10
```csharp
using System;
using System.Collections.Generic;
using Models.Core;
using Models.PMF;
using Models.PMF.Interfaces;
using System.Xml.Serialization;

namespace Models
{
	[Serializable] 
	[System.Xml.Serialization.XmlInclude(typeof(Model))]
	public class Script : Model
	{
		[Link] Plant Oats;
		[Link] Clock Clock;

		[Description("Cut Date")]
		public DateTime CutDate { get; set; }

		[XmlIgnore] private RemovalFractions Remove { get; set; }
		
		[EventSubscribe("Commencing")]
		private void OnSimulationCommencing(object sender, EventArgs e)
		{
			Remove = new RemovalFractions();
		}
		
		[EventSubscribe("DoManagement")]
		private void OnDoManagement(object sender, EventArgs e)
		{
			//Set up  array of remove fractions to send with Cut method.  Each member in the array corresponds to an organ in the same order they are set up in.
			if (Clock.Today.Date == CutDate)
			{
				//Remove.SetPhenologyStage = 3.5;
				Remove.SetFractionToRemove("Panicle", 1.0);
				Remove.SetFractionToResidue("Panicle", 0.0);
				Remove.SetFractionToRemove("Leaf", 0.8);
				Remove.SetFractionToResidue("Leaf", 0.0);
				Remove.SetFractionToRemove("Stem", 0.8);
				Remove.SetFractionToResidue("Stem", 0.0);
				Remove.SetFractionToRemove("Grain", 1.0);
				Remove.SetFractionToResidue("Grain", 0.0);
				Remove.SetFractionToRemove("Root", 0.0);
				Remove.SetFractionToResidue("Root", 0.0);
				Oats.RemoveBiomass("Cut", Remove);
			}
        }
	}
}
```
              Manager Two
                CutDate1 = 2006-08-10
                CutDate2 = 2006-09-04
```csharp
using System;
using System.Collections.Generic;
using Models.Core;
using Models.PMF;
using Models.PMF.Interfaces;
using System.Xml.Serialization;

namespace Models
{
	[Serializable] 
	[System.Xml.Serialization.XmlInclude(typeof(Model))]
	public class Script : Model
	{
		[Link] Plant Oats;
		[Link] Clock Clock;

		[Description("Cut Date1")]
		public DateTime CutDate1 { get; set; }
		[Description("Cut Date2")]
		public DateTime CutDate2 { get; set; }

		[XmlIgnore] private RemovalFractions Remove { get; set; }
		
		[EventSubscribe("Commencing")]
		private void OnSimulationCommencing(object sender, EventArgs e)
		{
			Remove = new RemovalFractions();
		}
		
		[EventSubscribe("DoManagement")]
		private void OnDoManagement(object sender, EventArgs e)
		{
			//Set up  array of remove fractions to send with Cut method.  Each member in the array corresponds to an organ in the same order they are set up in.
			if (Clock.Today.Date == CutDate1)
			{
				//Remove.SetPhenologyStage = 3.5;
				Remove.SetFractionToRemove("Panicle", 1.0);
				Remove.SetFractionToResidue("Panicle", 0.0);
				Remove.SetFractionToRemove("Leaf", 0.8);
				Remove.SetFractionToResidue("Leaf", 0.0);
				Remove.SetFractionToRemove("Stem", 0.8);
				Remove.SetFractionToResidue("Stem", 0.0);
				Remove.SetFractionToRemove("Grain", 1.0);
				Remove.SetFractionToResidue("Grain", 0.0);
				Remove.SetFractionToRemove("Root", 0.0);
				Remove.SetFractionToResidue("Root", 0.0);
				Oats.RemoveBiomass("Cut", Remove);
			}
			if (Clock.Today.Date == CutDate2)
			{
				//Remove.SetPhenologyStage = 3.5;
				Remove.SetFractionToRemove("Panicle", 1.0);
				Remove.SetFractionToResidue("Panicle", 0.0);
				Remove.SetFractionToRemove("Leaf", 0.8);
				Remove.SetFractionToResidue("Leaf", 0.0);
				Remove.SetFractionToRemove("Stem", 0.8);
				Remove.SetFractionToResidue("Stem", 0.0);
				Remove.SetFractionToRemove("Grain", 1.0);
				Remove.SetFractionToResidue("Grain", 0.0);
				Remove.SetFractionToRemove("Root", 0.0);
				Remove.SetFractionToResidue("Root", 0.0);
				Oats.RemoveBiomass("Cut", Remove);
			}
        }
	}
}
```
          Simulation Wellcamp2006Base
            Clock: StartDate=2006-02-25; EndDate=2006-11-02
            Summary summaryfile
            Weather: FileName=Roma2006.met
            Zone paddock: Area=1; Slope=0
              Irrigation
              SurfaceOrganicMatter Surface Organic Matter: same as Validation.New Zealand.RS_Oats_9899.Rainshelter.paddock.Surface Organic Matter
              Fertiliser
              MicroClimate: a_interception=0; b_interception=1; c_interception=0; d_interception=0; soil_albedo=0.3; sun_angle=15; soil_heat_flux_fraction=0.4; night_interception_fraction=0.5; refheight=2; albedo=0.293662; emissivity=0.96; RadIntTotal=0
              Plant Oats: CropType=Oats
              Report DailyReport
              Report HarvestReport
              Manager Harvesting: same as Validation.New Zealand.RS_Oats_9899.Rainshelter.paddock.Harvesting
              Report SupReport: same as Validation.Australia.Gatton2007.Gatton2007.Gatton2007Base.paddock.SupReport
              Report EnviroReport: same as Validation.New Zealand.RS_Oats_9899.Rainshelter.paddock.EnviroReport
              SoluteManager
              Operations Sowing
              Operations IrrigandFert
                2006-04-03  [Fertiliser].Apply(35, Fertiliser.Types.NO3N, 20);
                2006-05-10  [Irrigation].Apply(40);
                2006-08-15  [Fertiliser].Apply(40, Fertiliser.Types.NO3N, 10);
                2006-06-05  [Irrigation].Apply(60);
              Manager Cutting
                script: same as in Validation.Australia.Wellcamp2006.Wellcamp2006.Factors.Cut.None
              Soil: Latitude=0; Longitude=0
                Water
                  Thickness  BD    AirDry  LL15  DUL   SAT
                  150        0.9   0.11    0.22  0.52  0.59
                  150        1.01  0.306   0.34  0.53  0.59
                  300        1.02  0.3     0.38  0.54  0.59
                  300        1     0.3     0.36  0.54  0.59
                  300        1.06  0.3     0.4   0.52  0.57
                  300        1.14  0.3     0.36  0.49  0.54
                  300        1.23  0.3     0.38  0.46  0.51
                  SoilCrop WheatSoil: LL=[0.22, 0.34, 0.38, 0.36, 0.4, 0.36, 0.46]; KL=[0.1, 0.1, 0.08, 0.06, 0.04, 0.02, 0.01]; XF=[1, 1, 1, 1, 1, 1, 1]
                  SoilCrop OatsSoil: LL=[0.34, 0.34, 0.38, 0.36, 0.4, 0.36, 0.46]; KL=[0.06, 0.06, 0.04, 0.04, 0.02, 0.02, 0.01]; XF=[1, 1, 1, 1, 1, 1, 1]
                SoilWater: SummerDate=1-Nov; SummerU=6; SummerCona=3.5; WinterDate=1-Apr; WinterU=6; WinterCona=3.5; DiffusConst=40; DiffusSlope=16; Salb=0.13; CN2Bare=73; CNRed=20; CNCov=0.8; max_pond=0; Thickness=[150, 150, 300, 300, 300, 300, 300]; SWCON=[0.3, 0.3, 0.3, 0.3, 0.3, 0.3, 0.3]; residueinterception=0
                SoilNitrogen: fom_type=[default, manure, mucuna, lablab, shemp, stable]; fract_carb=[0.2, 0.3, 0.54, 0.57, 0.45, 0]; fract_cell=[0.7, 0.3, 0.37, 0.37, 0.47, 0.1]; fract_lign=[0.1, 0.4, 0.09, 0.06, 0.08, 0.9]
                SoilOrganicMatter: RootCN=40; RootWt=200; SoilCN=12.5; EnrACoeff=7.4; EnrBCoeff=0.2; OCUnits=Total
                  Thickness  OC    FBiom  FInert
                  150        1.24  0.03   0.4
                  150        1.24  0.02   0.6
                  300        1.25  0.01   0.8
                  300        1.1   0.01   0.9
                  300        0.71  0.01   0.95
                  300        0.34  0.01   0.95
                  300        0.26  0.01   0.95
                Analysis: Thickness=[150, 150, 300, 300, 300, 300, 300]; PH=[7, 7, 7, 7, 7, 7, 7]; PHUnits=Water; BoronUnits=HotWater
                Sample Initial nitrogen: NO3Units=ppm; NH4Units=ppm; SWUnits=Volumetric; OCUnits=Total; PHUnits=Water
                  Thickness  NO3   NH4
                  150        26.8  0.6
                  150        6.6   0.1
                  300        5.8   0.1
                  300        10.2  0.1
                  300        12.9  0.1
                  300        11.6  0.1
                  300        11.6  0.1
                Sample Initial water: Thickness=[150, 150, 300, 300, 300, 300, 300]; SW=[0.38, 0.46, 0.42, 0.37, 0.33, 0.35, 0.35]; NO3Units=ppm; NH4Units=ppm; SWUnits=Volumetric; OCUnits=Total; PHUnits=Water
                CERESSoilTemperature
            SoilArbitrator Soil Arbitrator
      Folder Roma2006
        Memo
          This experiment was run at Roma Research Station, Queensland in 2006.
           Two reps were used to generate cut and regrowth data (two cuts taken).
          The third rep was split in two, and one half was used to allow unlimited growth (no cutting), and the other half was only cut once.
        Experiment Roma2006
          Memo Experiment Description: same as Validation.New Zealand.RS_Oats_9899.Experiment Description
          Factors
            Factor Cv: Specifications=[Sowing]
              Operations Coolibah
                2006-05-25  [Oats].Sow(population:129, cultivar:"Coolibah", depth:30, rowSpacing:250);
              Operations Taipan
                2006-05-25  [Oats].Sow(population:123, cultivar:"Taipan", depth:30, rowSpacing:250);
              Operations Algerian
                2006-05-25  [Oats].Sow(population:105, cultivar:"Algerian", depth:30, rowSpacing:250);
            Factor Cut: Specifications=[Cutting]
              Manager None
                script: same as in Validation.Australia.Wellcamp2006.Wellcamp2006.Factors.Cut.None
              Manager One
                CutDate = 2006-08-10
```csharp
using System;
using System.Collections.Generic;
using Models.Core;
using Models.PMF;
using Models.PMF.Interfaces;
using System.Xml.Serialization;

namespace Models
{
	[Serializable] 
	[System.Xml.Serialization.XmlInclude(typeof(Model))]
	public class Script : Model
	{
		[Link] Plant Oats;
		[Link] Clock Clock;

		[Description("Cut Date")]
		public DateTime CutDate { get; set; }

		[XmlIgnore] private RemovalFractions Remove { get; set; }
		
		[EventSubscribe("Commencing")]
		private void OnSimulationCommencing(object sender, EventArgs e)
		{
			Remove = new RemovalFractions();
		}
		
		[EventSubscribe("DoManagement")]
		private void OnDoManagement(object sender, EventArgs e)
		{
			//Set up  array of remove fractions to send with Cut method.  Each member in the array corresponds to an organ in the same order they are set up in.
			if (Clock.Today.Date == CutDate)
			{
				//Remove.SetPhenologyStage = 3.5;
				Remove.SetFractionToRemove("Panicle", 1.0);
				Remove.SetFractionToResidue("Panicle", 0.0);
				Remove.SetFractionToRemove("Leaf", 0.7);
				Remove.SetFractionToResidue("Leaf", 0.0);
				Remove.SetFractionToRemove("Stem", 0.7);
				Remove.SetFractionToResidue("Stem", 0.0);
				Remove.SetFractionToRemove("Grain", 1.0);
				Remove.SetFractionToResidue("Grain", 0.0);
				Remove.SetFractionToRemove("Root", 0.0);
				Remove.SetFractionToResidue("Root", 0.0);
				Oats.RemoveBiomass("Cut", Remove);
			}
        }
	}
}
```
              Manager Two
                CutDate1 = 2006-08-10
                CutDate2 = 2006-09-04
```csharp
using System;
using System.Collections.Generic;
using Models.Core;
using Models.PMF;
using Models.PMF.Interfaces;
using System.Xml.Serialization;

namespace Models
{
	[Serializable] 
	[System.Xml.Serialization.XmlInclude(typeof(Model))]
	public class Script : Model
	{
		[Link] Plant Oats;
		[Link] Clock Clock;

		[Description("Cut Date1")]
		public DateTime CutDate1 { get; set; }
		[Description("Cut Date2")]
		public DateTime CutDate2 { get; set; }

		[XmlIgnore] private RemovalFractions Remove { get; set; }
		
		[EventSubscribe("Commencing")]
		private void OnSimulationCommencing(object sender, EventArgs e)
		{
			Remove = new RemovalFractions();
		}
		
		[EventSubscribe("DoManagement")]
		private void OnDoManagement(object sender, EventArgs e)
		{
			//Set up  array of remove fractions to send with Cut method.  Each member in the array corresponds to an organ in the same order they are set up in.
			if (Clock.Today.Date == CutDate1)
			{
				//Remove.SetPhenologyStage = 3.5;
				Remove.SetFractionToRemove("Panicle", 1.0);
				Remove.SetFractionToResidue("Panicle", 0.0);
				Remove.SetFractionToRemove("Leaf", 0.7);
				Remove.SetFractionToResidue("Leaf", 0.0);
				Remove.SetFractionToRemove("Stem", 0.7);
				Remove.SetFractionToResidue("Stem", 0.0);
				Remove.SetFractionToRemove("Grain", 1.0);
				Remove.SetFractionToResidue("Grain", 0.0);
				Remove.SetFractionToRemove("Root", 0.0);
				Remove.SetFractionToResidue("Root", 0.0);
				Oats.RemoveBiomass("Cut", Remove);
			}
			if (Clock.Today.Date == CutDate2)
			{
				//Remove.SetPhenologyStage = 3.5;
				Remove.SetFractionToRemove("Panicle", 1.0);
				Remove.SetFractionToResidue("Panicle", 0.0);
				Remove.SetFractionToRemove("Leaf", 0.7);
				Remove.SetFractionToResidue("Leaf", 0.0);
				Remove.SetFractionToRemove("Stem", 0.7);
				Remove.SetFractionToResidue("Stem", 0.0);
				Remove.SetFractionToRemove("Grain", 1.0);
				Remove.SetFractionToResidue("Grain", 0.0);
				Remove.SetFractionToRemove("Root", 0.0);
				Remove.SetFractionToResidue("Root", 0.0);
				Oats.RemoveBiomass("Cut", Remove);
			}
        }
	}
}
```
          Simulation Roma2006Base
            Clock: StartDate=2006-05-24; EndDate=2006-11-20
            Summary summaryfile
            Weather: FileName=Roma2006.met
            Zone paddock: Area=1; Slope=0
              Irrigation
              SurfaceOrganicMatter Surface Organic Matter: same as Validation.New Zealand.RS_Oats_9899.Rainshelter.paddock.Surface Organic Matter
              Fertiliser
              MicroClimate: a_interception=0; b_interception=1; c_interception=0; d_interception=0; soil_albedo=0.3; sun_angle=15; soil_heat_flux_fraction=0.4; night_interception_fraction=0.5; refheight=2; albedo=0.293662; emissivity=0.96; RadIntTotal=0
              Plant Oats: CropType=Oats
              Report DailyReport
              Report HarvestReport
              Manager Harvesting: same as Validation.New Zealand.RS_Oats_9899.Rainshelter.paddock.Harvesting
              Report SupReport: EventNames=[Clock].DoReport
                VariableNames:
                  [Clock].Today
                  [Phenology].ThermalTime.Value()
                  [Leaf].CohortSize
                  [Leaf].CohortParameters.MaxArea.Value()
                  [0ats].Arbitrator.DMAllocated
                  [0ats].Arbitrator.DMDemand
                  [0ats].Arbitrator.DMNutrientLimitation
                  [0ats].Arbitrator.DMSinkLimitation
                  [0ats].Arbitrator.DM.TotalFixationSupply
                  [0ats].Arbitrator.FN
                  [0ats].Arbitrator.NDemand
                  [Oats].Structure.MainStemNodeAppearanceRate
                  [0ats].Leaf.CohortMaxSize
                  [0ats].Leaf.CohortParameters.GrowthDuration.Value()
                  [0ats].Leaf.CohortParameters.LagDuration.Value()
                  [0ats].Leaf.CohortParameters.SenescenceDuration.Value()
                  [0ats].Leaf.CohortParameters.SpecificLeafAreaMax.Value()
                  [0ats].Leaf.CohortParameters.SpecificLeafAreaMin.Value()
                  [0ats].Leaf.Photosynthesis.FT.Value()
                  [0ats].Leaf.Photosynthesis.FVPD.Value()
                  [0ats].Leaf.Photosynthesis.RueAct
                  [0ats].Stem.DMDemandFunction.HightLimitedDMAccumulation.Value()
                  [0ats].Stem.DMDemandFunction.PotentialDMAccumulation.Value()
                  [0ats].Leaf.NextExpandingLeafProportion
                  [0ats].Structure.MeanTillerGrowthRate.Value()
                  sum([Soil].SoilWater.SWmm[1:5]) as ProfileWater
              Report EnviroReport: same as Validation.New Zealand.RS_Oats_9899.Rainshelter.paddock.EnviroReport
              SoluteManager
              Operations Sowing
              Operations IrrigandFert
                2006-05-25  [Fertiliser].Apply(35, Fertiliser.Types.NO3N, 20);
                2006-05-29  [Irrigation].Apply(10);
                2006-06-05  [Irrigation].Apply(10);
                2006-08-15  [Fertiliser].Apply(40, Fertiliser.Types.NO3N, 10);
                2006-06-05  [Irrigation].Apply(60);
              Soil: Latitude=0; Longitude=0
                Water
                  Thickness  BD    AirDry  LL15  DUL    SAT
                  150        1.25  0.11    0.19  0.4    0.45
                  150        1.33  0.15    0.19  0.389  0.44
                  300        1.32  0.18    0.21  0.422  0.47
                  300        1.47  0.19    0.22  0.317  0.4
                  300        1.52  0.19    0.22  0.332  0.38
                  300        1.55  0.19    0.22  0.33   0.38
                  SoilCrop OatsSoil: LL=[0.2, 0.2, 0.21, 0.26, 0.29, 0.3]; KL=[0.06, 0.05, 0.04, 0.03, 0.02, 0.02]; XF=[1, 1, 0.5, 0.2, 0.2, 0.2]
                SoilWater: SummerDate=1-Nov; SummerU=2; SummerCona=2; WinterDate=1-Apr; WinterU=2; WinterCona=2; DiffusConst=40; DiffusSlope=16; Salb=0.13; CN2Bare=78; CNRed=20; CNCov=0.8; max_pond=0; Thickness=[150, 150, 300, 300, 300, 300]; SWCON=[0.3, 0.3, 0.3, 0.5, 0.5, 0.5]; residueinterception=0
                SoilNitrogen: fom_type=[default, manure, mucuna, lablab, shemp, stable]; fract_carb=[0.2, 0.3, 0.54, 0.57, 0.45, 0]; fract_cell=[0.7, 0.3, 0.37, 0.37, 0.47, 0.1]; fract_lign=[0.1, 0.4, 0.09, 0.06, 0.08, 0.9]
                SoilOrganicMatter: RootCN=20; RootWt=500; SoilCN=14.5; EnrACoeff=7.4; EnrBCoeff=0.2; OCUnits=Total
                  Thickness  OC    FBiom  FInert
                  150        1.46  0.035  0.45
                  150        0.7   0.02   0.55
                  300        0.3   0.015  0.8
                  300        0.15  0.01   0.99
                  300        0.05  0.01   0.99
                  300        0.05  0.01   0.99
                Analysis: Thickness=[150, 150, 300, 300, 300, 300]; PH=[7.2, 7.9, 7.9, 7.3, 7.1, 7.1]; PHUnits=Water; BoronUnits=HotWater
                Sample Initial nitrogen: NO3Units=ppm; NH4Units=ppm; SWUnits=Volumetric; OCUnits=Total; PHUnits=Water
                  Thickness  NO3   NH4
                  150        16.1  0.3
                  150        21.7  0.3
                  300        24.3  0.3
                  300        13.3  0.3
                  300        7.9   0.3
                  300        7.9   0.5
                Sample Initial water: Thickness=[150, 150, 300, 300, 300, 300]; SW=[0.327, 0.333, 0.333, 0.262, 0.286, 0.29]; NO3Units=ppm; NH4Units=ppm; SWUnits=Volumetric; OCUnits=Total; PHUnits=Water
                CERESSoilTemperature
              Manager Cutting
                script: same as in Validation.Australia.Wellcamp2006.Wellcamp2006.Factors.Cut.None
            SoilArbitrator Soil Arbitrator
          Constant KNO3: FixedValue=0.02
      Folder Tarlee2007
        Memo
          This experiment was run at Tarlee, South Australia, in 2007.
        Experiment Tarlee2007
          Memo Experiment Description: same as Validation.New Zealand.RS_Oats_9899.Experiment Description
          Factors
            Factor AgRegime: Specifications=[Operations]
              Operations HighInput
                2007-05-30  [Fertiliser].Apply(100, Fertiliser.Types.UreaN, 10);
                2007-08-27  [Irrigation].Apply(62);
                2007-09-17  [Irrigation].Apply(62);
              Operations LowInput
                2007-05-30  [Fertiliser].Apply(50, Fertiliser.Types.UreaN, 10);
          Simulation Tarlee2007Base
            Clock: StartDate=2007-05-03; EndDate=2007-11-30
            Summary summaryfile
            Weather: FileName=Tarlee_silo_farmer_rain.met
            Zone paddock: Area=1; Slope=0
              Irrigation
              SurfaceOrganicMatter Surface Organic Matter: same as Validation.New Zealand.RS_Oats_9899.Rainshelter.paddock.Surface Organic Matter
              Fertiliser
              MicroClimate: a_interception=0; b_interception=1; c_interception=0; d_interception=0; soil_albedo=0.3; sun_angle=15; soil_heat_flux_fraction=0.4; night_interception_fraction=0.5; refheight=2; albedo=0.293662; emissivity=0.96; RadIntTotal=0
              Plant Oats: CropType=Oats
              Report DailyReport
              Report HarvestReport
              Manager Harvesting: same as Validation.New Zealand.RS_Oats_9899.Rainshelter.paddock.Harvesting
              Report SupReport: EventNames=[Clock].DoReport
                VariableNames:
                  [Clock].Today
                  [Phenology].ThermalTime.Value()
                  [Leaf].CohortSize
                  [Leaf].CohortParameters.MaxArea.Value()
                  [0ats].Arbitrator.DMAllocated
                  [0ats].Arbitrator.DMDemand
                  [0ats].Arbitrator.DMNutrientLimitation
                  [0ats].Arbitrator.DMSinkLimitation
                  [0ats].Arbitrator.DM.TotalFixationSupply
                  [0ats].Arbitrator.FN
                  [0ats].Arbitrator.NDemand
                  [Oats].Structure.MainStemNodeAppearanceRate
                  [0ats].Leaf.CohortMaxSize
                  [0ats].Leaf.CohortParameters.GrowthDuration.Value()
                  [0ats].Leaf.CohortParameters.LagDuration.Value()
                  [0ats].Leaf.CohortParameters.SenescenceDuration.Value()
                  [0ats].Leaf.CohortParameters.SpecificLeafAreaMax.Value()
                  [0ats].Leaf.CohortParameters.SpecificLeafAreaMin.Value()
                  [0ats].Leaf.Photosynthesis.FT.Value()
                  [0ats].Leaf.Photosynthesis.FVPD.Value()
                  [0ats].Leaf.Photosynthesis.RueAct
                  [0ats].Stem.DMDemandFunction.HightLimitedDMAccumulation.Value()
                  [0ats].Stem.DMDemandFunction.PotentialDMAccumulation.Value()
                  [0ats].Leaf.NextExpandingLeafProportion
                  [0ats].Structure.MeanTillerGrowthRate.Value()
                  sum([Soil].SoilWater.SWmm[1:6]) as ProfileWater
              Report EnviroReport: same as Validation.New Zealand.RS_Oats_9899.Rainshelter.paddock.EnviroReport
              SoluteManager
              Operations
              Operations Sowing
                2007-05-11  [Oats].Sow(population:200, cultivar:"Wintaroo", depth:30, rowSpacing:250);
              Soil: SoilType=Clay Loam over Medium Clay; Site=Tarlee (TDS); NearestTown=Giles Corner; Region=Mid-north; State=South Australia; Latitude=-34.2367; Longitude=138.741; LocationAccuracy=+-20m; DataSource=University of Adelaide, Roseworthy
                Water
                  Thickness  BD     AirDry  LL15   DUL    SAT
                  100        1.342  0.093   0.15   0.371  0.463
                  200        1.348  0.147   0.184  0.367  0.461
                  250        1.342  0.15    0.18   0.414  0.464
                  250        1.48   0.15    0.2    0.403  0.436
                  300        1.58   0.15    0.21   0.363  0.398
                  400        1.56   0.15    0.22   0.371  0.406
                  SoilCrop WheatSoil: LL=[0.186, 0.184, 0.228, 0.251, 0.261, 0.285]; KL=[0.06, 0.06, 0.06, 0.04, 0.04, 0.02]; XF=[1, 1, 1, 1, 1, 1]
                  SoilCrop BarleySoil: LL=[0.186, 0.184, 0.228, 0.251, 0.261, 0.285]; KL=[0.07, 0.07, 0.07, 0.05, 0.05, 0.03]; XF=[1, 1, 1, 1, 1, 1]
                  SoilCrop OatsSoil: LL=[0.15, 0.184, 0.196, 0.209, 0.235, 0.259]; KL=[0.06, 0.06, 0.04, 0.04, 0.02, 0.02]; XF=[1, 1, 1, 1, 1, 1]
                  SoilCrop VetchSoil: LL=[0.186, 0.184, 0.228, 0.251, 0.261, 0.285]; KL=[0.06, 0.06, 0.06, 0.04, 0.04, 0.02]; XF=[1, 1, 1, 1, 1, 1]
                SoilWater: SummerDate=1-Nov; SummerU=6; SummerCona=3.5; WinterDate=1-Apr; WinterU=2; WinterCona=2; DiffusConst=60; DiffusSlope=20; Salb=0.13; CN2Bare=73; CNRed=20; CNCov=0.8; max_pond=0; Thickness=[100, 200, 250, 250, 300, 400]; SWCON=[0.5, 0.5, 0.5, 0.5, 0.5, 0.5]; residueinterception=0
                SoilNitrogen: fom_type=[default, manure, mucuna, lablab, shemp, stable]; fract_carb=[0.2, 0.3, 0.54, 0.57, 0.45, 0]; fract_cell=[0.7, 0.3, 0.37, 0.37, 0.47, 0.1]; fract_lign=[0.1, 0.4, 0.09, 0.06, 0.08, 0.9]
                SoilOrganicMatter: RootCN=40; RootWt=1000; SoilCN=12; EnrACoeff=7.4; EnrBCoeff=0.2; OCUnits=Total
                  Thickness  OC    FBiom  FInert
                  100        1.56  0.04   0.4
                  200        0.74  0.02   0.5
                  250        0.48  0.02   0.7
                  250        0.2   0.02   1
                  300        0.13  0.01   1
                  400        0.13  0.01   1
                Analysis: Thickness=[100, 200, 250, 250, 300, 400]; PH=[7.2, 7.4, 8.1, 9, 9.3, 9.3]; PHUnits=Water; BoronUnits=HotWater
                Sample Initial nitrogen: NO3Units=ppm; NH4Units=ppm; SWUnits=Volumetric; OCUnits=Total; PHUnits=Water
                  Thickness  NO3       NH4
                  100        15.0001   1.00004
                  200        11        1.99998
                  250        8.00003   1.00004
                  250        4.39999   0.999998
                  300        2         0.0999905
                  400        0.999999  0.0999905
                Sample Initial water: Thickness=[100, 200, 250, 250, 300, 400]; SW=[0.22, 0.23, 0.255, 0.3, 0.332, 0.328]; NO3Units=ppm; NH4Units=ppm; SWUnits=Volumetric; OCUnits=Total; PHUnits=Water
                CERESSoilTemperature
            SoilArbitrator Soil Arbitrator
      Folder Pinery2007
        Memo
          This experiment was run at Pinery, South Australia, in 2007.
          Consisted of three separate large plots of three cultivars - i.e. the design was not replicated
          No guarantee the soil was exactly the same for each cultivar.
        Experiment Pinery2007
          Memo Experiment Description: same as Validation.New Zealand.RS_Oats_9899.Experiment Description
          Factors
            Factor Cv: Specifications=[Operations]
              Operations Wintaroo
                2007-06-05  [Oats].Sow(population:100, cultivar:"Wintaroo", depth:30, rowSpacing:250);
              Operations Kangaroo
                2007-06-05  [Oats].Sow(population:100, cultivar:"Kangaroo", depth:30, rowSpacing:250);
              Operations Brusher
                2007-06-05  [Oats].Sow(population:100, cultivar:"Brusher", depth:30, rowSpacing:250);
          Simulation Pinery2007Base
            Clock: StartDate=2007-05-03; EndDate=2007-11-30
            Summary summaryfile
            Weather: FileName=Owen2007.met
            Zone paddock: Area=1; Slope=0
              Irrigation
              SurfaceOrganicMatter Surface Organic Matter: same as Validation.New Zealand.RS_Oats_9899.Rainshelter.paddock.Surface Organic Matter
              Fertiliser
              MicroClimate: a_interception=0; b_interception=1; c_interception=0; d_interception=0; soil_albedo=0.3; sun_angle=15; soil_heat_flux_fraction=0.4; night_interception_fraction=0.5; refheight=2; albedo=0.293662; emissivity=0.96; RadIntTotal=0
              Plant Oats: CropType=Oats
              Report DailyReport
              Report HarvestReport
              Manager Harvesting: same as Validation.New Zealand.RS_Oats_9899.Rainshelter.paddock.Harvesting
              Report SupReport: same as Validation.Australia.Tarlee2007.Tarlee2007.Tarlee2007Base.paddock.SupReport
              Report EnviroReport: same as Validation.New Zealand.RS_Oats_9899.Rainshelter.paddock.EnviroReport
              SoluteManager
              Operations
              Soil: SoilType=Clay Loam over Medium Clay; Site=Tarlee (TDS); NearestTown=Giles Corner; Region=Mid-north; State=South Australia; Latitude=-34.2367; Longitude=138.741; LocationAccuracy=+-20m; DataSource=University of Adelaide, Roseworthy
                Water
                  Thickness  BD     AirDry  LL15   DUL    SAT
                  100        1.342  0.093   0.15   0.371  0.463
                  200        1.348  0.147   0.184  0.367  0.461
                  250        1.342  0.15    0.18   0.414  0.464
                  250        1.48   0.15    0.2    0.403  0.436
                  300        1.58   0.15    0.21   0.363  0.398
                  400        1.56   0.15    0.22   0.371  0.406
                  SoilCrop WheatSoil: LL=[0.186, 0.184, 0.228, 0.251, 0.261, 0.285]; KL=[0.06, 0.06, 0.06, 0.04, 0.04, 0.02]; XF=[1, 1, 1, 1, 1, 1]
                  SoilCrop BarleySoil: LL=[0.186, 0.184, 0.228, 0.251, 0.261, 0.285]; KL=[0.07, 0.07, 0.07, 0.05, 0.05, 0.03]; XF=[1, 1, 1, 1, 1, 1]
                  SoilCrop OatsSoil: LL=[0.15, 0.21, 0.225, 0.245, 0.289, 0.3]; KL=[0.06, 0.06, 0.04, 0.04, 0.02, 0.02]; XF=[1, 1, 1, 1, 1, 1]
                  SoilCrop VetchSoil: LL=[0.186, 0.184, 0.228, 0.251, 0.261, 0.285]; KL=[0.06, 0.06, 0.06, 0.04, 0.04, 0.02]; XF=[1, 1, 1, 1, 1, 1]
                SoilWater: same as Validation.Australia.Tarlee2007.Tarlee2007.Tarlee2007Base.paddock.Soil.SoilWater
                SoilNitrogen: fom_type=[default, manure, mucuna, lablab, shemp, stable]; fract_carb=[0.2, 0.3, 0.54, 0.57, 0.45, 0]; fract_cell=[0.7, 0.3, 0.37, 0.37, 0.47, 0.1]; fract_lign=[0.1, 0.4, 0.09, 0.06, 0.08, 0.9]
                SoilOrganicMatter: same as Validation.Australia.Tarlee2007.Tarlee2007.Tarlee2007Base.paddock.Soil.SoilOrganicMatter
                Analysis: Thickness=[100, 200, 250, 250, 300, 400]; PH=[7.2, 7.4, 8.1, 9, 9.3, 9.3]; PHUnits=Water; BoronUnits=HotWater
                Sample Initial nitrogen: NO3Units=ppm; NH4Units=ppm; SWUnits=Volumetric; OCUnits=Total; PHUnits=Water
                  Thickness  NO3  NH4
                  100        8    1.00004
                  200        18   1.99998
                  250        10   1.00004
                  250        1.8  0.999998
                  300        1.8  0.0999905
                  400        2.2  0.0999905
                Sample Initial water: Thickness=[100, 200, 250, 250, 300, 400]; SW=[0.31, 0.28, 0.23, 0.21, 0.22, 0.24]; NO3Units=ppm; NH4Units=ppm; SWUnits=Volumetric; OCUnits=Total; PHUnits=Water
                CERESSoilTemperature
            SoilArbitrator Soil Arbitrator
  Folder Sensibility test folder
    Memo
      Say something here about the range of environments in Australia used to test the model
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