Simulations: Version=57
  Memo TitlePage
    # APSIM MicroClimate Model
  Replacements
    Plant SimpleFruitTree: CropType=Slurp; IsEnding=false; DaysAfterEnding=0
      Memo TitlePage
        # SLURP: the Sound of a crop using water

        This model has been built using the Plant Modelling Framework (PMF) of [brown_plant_2014] to provide a simple representation of crops.  It is usefull for water and nitrogen balance studies where the focus is on soil processes and a very simple crop is adequate.  The model does not predict crop growth, development or yields.  It simply takes up water and nitrogen.   .

        SLURP has no phenology so the behaviour of the SLURP is the same throughout its ontology (with the exception of root depth being able to increase).  SLURP consists of 2 organs:

           1. Leaf which ls represented with a Simpleleaf class and provides a Water uptake demand to the soil arbitrator.
           2. Root which extracts water and nitrogen from the soil for plant growth

        #Inclusion in APSIM simulations
        A Slurp crop is included in a simulation the same as any other APSIM crop

         * The Slurp object needs to be dragged or copied from the Crop folder in the tool box into the field of your simulation.
         * It is then planted with a sowing rule
        ~~~
        Slurp.Sow(cultivar: StaticCrop, population: 1, depth: 10, rowSpacing: 150);
        ~~~
          * Note that SLURP has no notion of population or rowSpacing but these parameters are required by the Sow method so filler values are provided
          * `depth` in the Sow arguement is the depth that the crop is sown at.  While this has no effect on emergence in SLURP it sets the depth that the root system is initialised at.  For static crops this depth should be set to the rooting depth that is expected as roots will not grow during the simulation

        #Altering Slurp properties during runs
        In some cases users will wish to change properties of Slurp while the simulation is running.  This can be done using a the set method in a manager script.

        ~~~
        object LAIResetValue = leaflai;
        zone.Set("Slurp.Leaf.LAIFunction.Value()", LAIResetValue);
        object HeightResetValue = CoverToday * MaximumHeight;
        zone.Set("Slurp.Leaf.HeightFunction.Value()", HeightResetValue);
        ~~~
      Phenology
        Constant ThermalTime: FixedValue=1; Units=days
        GenericPhase Initial: Start=Initialisation; End=Sowing
          VariableReference Progression: VariableName=[Phenology].ThermalTime.Value()
          Constant Target: FixedValue=0; Units=d
        GenericPhase Ongoing: Start=Sowing; End=Never
          VariableReference Progression: VariableName=[Phenology].ThermalTime.Value()
          Constant Target: FixedValue=1e+15; Units=d
        Age
      OrganArbitrator Arbitrator
        PrioritythenRelativeAllocation NArbitrator
        PrioritythenRelativeAllocation DMArbitrator
      Root: GrowthRespiration=0; MaintenanceRespiration=0; RootAngle=45; SWAvailabilityRatio=0
        MultiplyFunction RootFrontVelocity
          AirTemperatureFunction TemperatureEffect
            XYPairs: X=[0, 26, 35]; Y=[0, 1, 1]
          Constant Potential: FixedValue=0; Units=mm/d
          Constant DMConversionEfficiency: FixedValue=1
        Constant MaxDailyNUptake: FixedValue=1; Units=g/m2
        Constant DMConversionEfficiency: FixedValue=1; Units=g/m2
        Constant RemobilisationCost: FixedValue=0
        Constant MaximumRootDepth: FixedValue=3000; Units=mm
        Constant NitrogenDemandSwitch: FixedValue=1; Units=0-1
        Constant MaximumNConc: FixedValue=0.01
        Constant MinimumNConc: FixedValue=0.01
        LinearInterpolationFunction KLModifier: XProperty=[Root].LayerMidPointDepth
          XYPairs: X=[0, 400, 1500, 3000]; Y=[1, 1, 1, 1]
          Memo Description
            This is important in SLURP as it is set for each species to represent their differences in rooting patterns between crop species
        Constant InitialDM: FixedValue=0.005; Units=g/plant
        Constant SenescenceRate: FixedValue=0; Units=/d
        Constant SpecificRootLength: FixedValue=105; Units=m/g
        LinearInterpolationFunction KNO3: XProperty=[Root].LengthDensity
          XYPairs: X=[0, 0.003]; Y=[0.02, 0.02]
        LinearInterpolationFunction KNH4: XProperty=[Root].LengthDensity
          XYPairs: X=[0, 0.003]; Y=[0, 0]
        BiomassRemoval BiomassRemovalDefaults
          OrganBiomassRemovalType Harvest: FractionLiveToRemove=0; FractionDeadToRemove=0; FractionLiveToResidue=0; FractionDeadToResidue=0
          OrganBiomassRemovalType Cut: FractionLiveToRemove=0; FractionDeadToRemove=0; FractionLiveToResidue=0; FractionDeadToResidue=0
          OrganBiomassRemovalType Prune: FractionLiveToRemove=0; FractionDeadToRemove=0; FractionLiveToResidue=0; FractionDeadToResidue=0
          OrganBiomassRemovalType Graze: FractionLiveToRemove=0; FractionDeadToRemove=0; FractionLiveToResidue=0; FractionDeadToResidue=0
        LinearInterpolationFunction NUptakeSWFactor: XProperty=[Root].RWC
          XYPairs: X=[0, 1]; Y=[0, 1]
        Constant CarbonConcentration: FixedValue=0.4
        Constant MaintenanceRespirationFunction: FixedValue=0
        BiomassDemand DMDemands
          MultiplyFunction Structural
            PartitionFractionDemandFunction DMDemandFunction
              Constant PartitionFraction: FixedValue=0; Units=0-1
            Constant StructuralFraction: FixedValue=1
          Constant Metabolic: FixedValue=0
          StorageDMDemandFunction Storage
            SubtractFunction StorageFraction
              Constant One: FixedValue=1
              VariableReference StructuralFraction: VariableName=[Root].DMDemands.Structural.StructuralFraction.Value()
        BiomassDemand NDemands
          MultiplyFunction Structural
            VariableReference MinNconc: VariableName=[Root].minimumNconc.Value()
            VariableReference PotentialDMAllocation: VariableName=[Root].potentialDMAllocation.Structural
          MultiplyFunction Metabolic
            SubtractFunction MetabolicNconc
              VariableReference CritNconc: VariableName=[Root].criticalNConc.Value()
              VariableReference MinNconc: VariableName=[Root].minimumNconc.Value()
            VariableReference PotentialDMAllocation: VariableName=[Root].potentialDMAllocation.Structural
          StorageNDemandFunction Storage
            VariableReference NitrogenDemandSwitch: VariableName=[Root].nitrogenDemandSwitch.Value()
            VariableReference MaxNconc: VariableName=[Root].maximumNconc.Value()
      SimpleLeaf Leaf: CohortsInitialised=false; Albedo=0.018; Gsmax350=0.006; R50=100; MicroClimatePresent=true; LeafInitialisationStage=Sowing
        zero: ApicalCohortNo, InitialisedCohortNo, TipsAtEmergence, CohortsAtInitialisation, AppearedCohortNo, PlantAppearedLeafNo, Height, FRGR, PotentialEP, WaterDemand, KDead, LAIDead
        Constant StomatalConductanceCO2Modifier: FixedValue=1
        Constant DetachmentRateFunction: FixedValue=0; Units=/d
        Constant RemobilisationCost: FixedValue=0
        MultiplyFunction InitialWtFunction
          Constant InitialPlantWt: FixedValue=0; Units=g/plant
          VariableReference Population: VariableName=[Plant].Population
        Constant LaiDeadFunction: FixedValue=0; Units=m^2/m^2
        Constant Photosynthesis: FixedValue=5; Units=g/m2/d
        AirTemperatureFunction FRGRFunction
          XYPairs: X=[0, 10, 25, 40]; Y=[0, 1, 1, 0]
        Constant MaximumNConc: FixedValue=0.05; Units=g/g
        Constant MinimumNConc: FixedValue=0.05; Units=g/g
        MultiplyFunction LAIFunction
          LinearInterpolationFunction SeasonalLAIPattern: XProperty=[Weather].DaysSinceWinterSolstice
            XYPairs: X=[0, 90, 140, 200, 295, 330, 365]; Y=[0, 0, 3.85, 6.68, 8.94, 0, 0]
          LinearInterpolationFunction AgeFactor: XProperty=[Phenology].Age.Years
            XYPairs: X=[0, 6]; Y=[0.05, 1]
        Constant ExtinctionCoefficientFunction: FixedValue=0.7
        MultiplyFunction HeightFunction
          LinearInterpolationFunction SeasonalHeightPattern: XProperty=[Weather].DaysSinceWinterSolstice
            XYPairs: X=[0, 90, 140, 250, 360, 361]; Y=[0.8, 0.8, 0.8, 1, 1, 0.8]
          LinearInterpolationFunction AgeFactor: XProperty=[Phenology].Age.Years
            XYPairs: X=[0, 6]; Y=[100, 3500]
        Constant NReallocationFactor: FixedValue=0
        Constant SenescenceRate: FixedValue=0
        BiomassRemoval BiomassRemovalDefaults: same as Replacements.SimpleFruitTree.Root.BiomassRemovalDefaults
        Constant MaintenanceRespirationFunction: FixedValue=0; Units=0-1
        Constant DMConversionEfficiency: FixedValue=1; Units=0-1
        Constant NRetranslocationFactor: FixedValue=0
        Constant NitrogenDemandSwitch: FixedValue=1
        Constant DMReallocationFactor: FixedValue=0
        Constant DMRetranslocationFactor: FixedValue=0
        VariableReference CriticalNConc: VariableName=[Leaf].MinimumNConc.Value()
        Constant CarbonConcentration: FixedValue=0.4
        BiomassDemand DMDemands
          MultiplyFunction Structural
            PartitionFractionDemandFunction DMDemandFunction
              Constant PartitionFraction: FixedValue=1; Units=0-1
            Constant StructuralFraction: FixedValue=0.5; Units=0-1
          Constant Metabolic: FixedValue=0
          StorageDMDemandFunction Storage
            SubtractFunction StorageFraction
              Constant One: FixedValue=1
              VariableReference StructuralFraction: VariableName=[Leaf].DMDemands.Structural.StructuralFraction.Value()
        BiomassDemand NDemands
          MultiplyFunction Structural
            VariableReference MinNconc: VariableName=[Leaf].minimumNconc.Value()
            VariableReference PotentialDMAllocation: VariableName=[Leaf].potentialDMAllocation.Structural
          MultiplyFunction Metabolic
            SubtractFunction MetabolicNconc
              VariableReference CritNconc: VariableName=[Leaf].criticalNConc.Value()
              VariableReference MinNconc: VariableName=[Leaf].minimumNconc.Value()
            VariableReference PotentialDMAllocation: VariableName=[Leaf].potentialDMAllocation.Structural
          StorageNDemandFunction Storage
            VariableReference NitrogenDemandSwitch: VariableName=[Leaf].nitrogenDemandSwitch.Value()
            VariableReference MaxNconc: VariableName=[Leaf].maximumNconc.Value()
        Constant BaseHeight: FixedValue=900; Units=mm
      Cultivar Peach
        Memo Description
          The parameters for this crop were derived from a golden queen peach orchard.
      Cultivar Grape_2Cane
        Command:
          [Leaf].HeightFunction.SeasonalHeightPattern.XYPairs.X= 0,110,240,320,321,365
          [Leaf].HeightFunction.SeasonalHeightPattern.XYPairs.Y= 900,900,2200,2200,900,900
          [Leaf].HeightFunction.AgeFactor.XYPairs.X = 1,3,10
          [Leaf].HeightFunction.AgeFactor.XYPairs.Y = 0.7,1,1
          [Leaf].LAIFunction.SeasonalLAIPattern.XYPairs.X = 0,110,200,250,290,320,365
          [Leaf].LAIFunction.SeasonalLAIPattern.XYPairs.Y = 0, 0, 7, 7, 5.5,0,0
          [Leaf].ExtinctionCoefficientFunction.FixedValue = 1
        Memo Description
          The parameters for this crop were derived from a vineyard.
      Cultivar Grape_4Cane
        Command:
          [Leaf].HeightFunction.SeasonalHeightPattern.XYPairs.X= 0,110,115,240,320,321,365
          [Leaf].HeightFunction.SeasonalHeightPattern.XYPairs.Y= 900,900,1100,2200,2200,900,900
          [Leaf].HeightFunction.AgeFactor.XYPairs.X = 1,3,10
          [Leaf].HeightFunction.AgeFactor.XYPairs.Y = 0.7,1,1
          [Leaf].LAIFunction.SeasonalLAIPattern.XYPairs.X = 0,110,200,280,310,330,365
          [Leaf].LAIFunction.SeasonalLAIPattern.XYPairs.Y = 0, 0, 8, 8, 6,0,0
          [Leaf].ExtinctionCoefficientFunction.FixedValue = 1
        Memo Description
          The parameters for this crop were derived from a vineyard.
  DataStore
    ExcelInput: FileName=OrchardObs.xlsx; SheetNames=[Observed]
    PredictedObserved: PredictedTableName=Report; ObservedTableName=Observed; FieldNameUsedForMatch=Zone; FieldName2UsedForMatch=Clock.Today
    ExcelInput GrapeObserved: FileName=Grape_observed.xlsx; SheetNames=[GrapeObserved]
  Simulation Vineyard
    Clock: StartDate=2015-07-01; EndDate=2016-06-30
    Summary SummaryFile
    Weather: FileName=lincoln.met
    MicroClimate: a_interception=0; b_interception=1; c_interception=0; d_interception=0; soil_albedo=0.3; SoilHeatFluxFraction=0.4; NightInterceptionFraction=0.5; ReferenceHeight=2
    SoilArbitrator Soil Arbitrator
    RectangularZone Vines: Length=1; Width=100; Slope=0
      Report: EventNames=[Clock].DoReport
        VariableNames:
          [Clock].Today
          [Slurp].Leaf.Height
          [Slurp].Leaf.LAI
          [Slurp].Leaf.CoverTotal
          [Slurp].Leaf.Transpiration
          sum([Soil].SoilWater.SWmm) as SWTot
      Soil: Latitude=0; Longitude=0
        Analysis: Thickness=[100, 200, 300, 300, 300, 300]; PH=[6.6, 6.2, 5.7, 5.5, 5.5, 5.5]; PHUnits=Water; BoronUnits=0
        InitialWater Initial water: PercentMethod=1; FractionFull=1
        Water
          Thickness  BD   AirDry  LL15  DUL   SAT
          150        1.2  0.05    0.1   0.33  0.5
          150        1.2  0.1     0.1   0.33  0.5
          100        1.2  0.12    0.12  0.31  0.44
          200        1.2  0.06    0.06  0.15  0.46
          200        1.2  0.04    0.04  0.1   0.44
          200        1.2  0.02    0.02  0.06  0.44
          200        1.2  0.06    0.06  0.15  0.46
          200        1.2  0.04    0.04  0.1   0.44
          200        1.2  0.06    0.06  0.13  0.44
          200        1.2  0.06    0.06  0.13  0.44
          200        1.2  0.06    0.06  0.13  0.44
          200        1.2  0.06    0.06  0.13  0.44
          400        1.2  0.06    0.06  0.13  0.44
          SoilCrop SlurpSoil
            LL=[0.1, 0.1, 0.12, 0.06, 0.04, 0.02, 0.06, 0.04, 0.06, 0.06, 0.06, 0.06, 0.06]
            KL=[0.05, 0.05, 0.05, 0.05, 0.05, 0.05, 0.05, 0.05, 0.05, 0.05, 0.05, 0.05, 0.05]
            XF=[1, 1, 1, 1, 1, 1, 1, 1, 1, 1, 1, 1, 1]
        SoilWater: SummerDate=1-Nov; SummerU=9; SummerCona=4.4; WinterDate=1-Apr; WinterU=9; WinterCona=4.4; DiffusConst=88; DiffusSlope=35.4; Salb=0.18; CN2Bare=68; CNRed=20; CNCov=0.8; slope=0; discharge_width=0; catchment_area=0; max_pond=0; ResidueInterception=0
          Thickness  SWCON  KLAT
          150        0.55   0
          150        0.55   0
          100        0.55   0
          200        0.55   0
          200        0.55   0
          200        0.55   0
          200        0.55   0
          200        0.55   0
          200        0.55   0
          200        0.55   0
          200        0.55   0
          200        0.55   0
          400        0.55   0
        SoilNitrogen: fom_types=[default, manure, mucuna, lablab, shemp, stable]; fract_carb=[0.2, 0.3, 0.54, 0.57, 0.45, 0]; fract_cell=[0.7, 0.3, 0.37, 0.37, 0.47, 0.1]; fract_lign=[0.1, 0.4, 0.09, 0.06, 0.08, 0.9]
          SoilNitrogenNO3 NO3
          SoilNitrogenNH4 NH4
          SoilNitrogenUrea Urea
          SoilNitrogenPlantAvailableNO3 PlantAvailableNO3
          SoilNitrogenPlantAvailableNH4 PlantAvailableNH4
        SoilOrganicMatter: RootCN=30; EnrACoeff=7.4; EnrBCoeff=0.2; OCUnits=Total
          Thickness  OC    SoilCN  FBiom  FInert  RootWt
          100        1.82  11.5    0.025  0.3     1243.93
          200        1.47  11.5    0.025  0.4     833.832
          300        1.2   11.5    0.015  0.75    457.617
          300        1.03  11.5    0.01   0.9     251.145
          300        0.47  11.5    0.01   0.96    137.831
          300        0.47  11.5    0.01   0.96    75.6435
        Sample Initial nitrogen: NO3Units=kg/ha; NH4Units=ppm; SWUnits=Volumetric; OCUnits=Total; PHUnits=Water
          Thickness  NO3  NH4
          100        217  0
          200        30   0
          300        5    0
          300        5    0
          300        0    0
          300        0    0
        CERESSoilTemperature
      SurfaceOrganicMatter: InitialResidueName=wheat_stubble; InitialResidueType=wheat; InitialResidueMass=500; InitialStandingFraction=0; InitialCPR=0; InitialCNR=100; FractionFaecesAdded=0.5
      Plant Slurp: CropType=Slurp; IsEnding=false; DaysAfterEnding=0
      Fertiliser
      Irrigation
      Manager VineInitialisation
        CultivarName = StaticCrop
        InitialRootDepth = 2600
        SowingDate = 2015-07-01
        RootDepth = 2600
        RFV = 10
        KLReductionFactor = -0.001
        KLReductionDepth = 150
        YKLModifiers =
        XDepth =
        MaxG = 0.006
        R50 = 100
```csharp
using System;
using Models.Core;
using Models.PMF;
using APSIM.Shared.Utilities;
using Models.Soils;
        
namespace Models
{
    [Serializable] 
    [System.Xml.Serialization.XmlInclude(typeof(Model))]
    public class Script : Model
    {
        [Link] Plant Slurp;
        [Link] Clock Clock;
        [Link] Soil Soil;
        [Link] Zone zone;

        [Display(Type = DisplayType.CultivarName)]
        [Description("Plant Type")]
        public string CultivarName { get; set; }
        [Description("Initial Root Depth")]
        public double InitialRootDepth { get; set; }
        [Description("Initialisation Date")]
        public DateTime SowingDate { get; set; }
        [Description("Maximum Root Depth")]
        public double RootDepth { get; set; }
        [Description("Roof Front Velocity")]
        public double RFV { get; set; }
        [Description("Factor to change Kl modifier with Depth")]
        public double KLReductionFactor { get; set; }
        [Description("Depth that KL starts to decline")]
        public double KLReductionDepth { get; set; }
        
        public double[] YKLModifiers { get; set; }
        public double[] XDepth { get; set; }
        private double Depth { get; set; }
        
        [Description("Maximum Stomatal Conductance")]
        public double MaxG { get; set; }
        [Description("Stomatal Radn response")]
        public double R50 { get; set; }
        
        [EventSubscribe("DoManagement")]
        private void OnDoManagement(object sender, EventArgs e)
        {
            if (Clock.Today.Date == SowingDate)
            {
                Slurp.Sow(cultivar: CultivarName, population: 1, depth: InitialRootDepth, rowSpacing: 150);
                
                YKLModifiers = new double[Soil.Thickness.Length];
                XDepth = new double[Soil.Thickness.Length];
                Depth = 0;
                for (int layer = 0; layer < Soil.Thickness.Length; layer++)
                {
                    Depth += Soil.Thickness[layer] / 2;  //Add half of the thickness of the current layer so depth is the mid depth of that layer
                    if (Depth <= KLReductionDepth)
                    {
                        YKLModifiers[layer] = 1;
                        XDepth[layer] = Depth;
                    }
                    else
                    {
                        double KLMod = 1 * Math.Exp(-KLReductionFactor * (Depth - KLReductionDepth));
                        YKLModifiers[layer] = KLMod;
                        XDepth[layer] = Depth;
                    }
                    Depth += Soil.Thickness[layer] / 2;  //Add the other half of the current layer so depth is the top of the next layer
                }
                object KLMods = YKLModifiers;
                zone.Set("Slurp.Root.KLModifier.XYPairs.Y", KLMods);
                object Depths = XDepth;
                zone.Set("Slurp.Root.KLModifier.XYPairs.X", Depths);
                object RD = RootDepth;
                zone.Set("Slurp.Root.MaximumRootDepth.FixedValue", RD);
                object RV = RFV;
                zone.Set("Slurp.Root.RootFrontVelocity.Potential.FixedValue", RV);
                object GMaxValue = MaxG;
                zone.Set("Slurp.Leaf.Gsmax350", GMaxValue); 
                object R50Value = R50; 
                zone.Set("Slurp.Leaf.R50", R50Value); 
                
            }
        }
    }
}
```
      Manager SetVineVariables
        Ext_coef = 0.8
        MaximumHeight = 2200
        MinimumHeight = 1100
        Cover = 0
        LAI = 0
```csharp
using System;
using Models.Core;
using System.Collections.Generic;
using System.Text;
using Models.PMF;
using Models;
using System.Xml.Serialization;
using APSIM.Shared.Utilities;
using System.Data;

namespace Models
{
    [Serializable] 
    //[System.Xml.Serialization.XmlInclude(typeof(Model))]
    public class Script : Model
    {
        [Link] Plant Slurp;
        [Link] Clock Clock;
        [Link] Zone zone;
        [Link] Weather weather;

        
        [Description("Extinction coefficient")]
        public  double Ext_coef { get; set; }
        [Description("Maximum height of leaves")]
        public double MaximumHeight { get; set; }
        [Description("Minimum height of leaves")]
        public double MinimumHeight { get; set; }
        
        public double Cover {get; private set;}
        public double LAI { get; private set; }
                
        [EventSubscribe("StartOfSimulation")]
        private void OnStartOfSimulation(object sender, EventArgs e)
        {
        	Cover = 0;
        }
        
        [EventSubscribe("StartOfDay")]
        private void OnStartOfDay(object sender, EventArgs e)
        {
            if (DateUtilities.WithinDates("01-Oct",Clock.Today,"01-Mar"))
            	Cover += weather.MeanT * 0.0008;

            if (Cover >= 1.0)
            {
            	Cover = 1.0;        
            	LAI = Math.Log(0.01) / -Ext_coef;
            }
            else
            {
            	if (Cover > 0)
                	LAI = Math.Log(1 - Cover) / -Ext_coef;
                else
                    LAI = 0;
            }

            if (DateUtilities.DatesEqual("15-May",Clock.Today))
            	Cover = 0;
            object LAIResetValue = LAI;
            zone.Set("Slurp.Leaf.LAIFunction.FixedValue", LAIResetValue);  
            object HeightResetValue = MinimumHeight + Cover * (MaximumHeight-MinimumHeight);
            zone.Set("Slurp.Leaf.HeightFunction.FixedValue", HeightResetValue);  
        }
    }
}
```
      Manager SetupVineRootZones
        UseExtraZone = True
```csharp
using System;
using Models.Core;
using System.Collections.Generic;
using System.Text;
using Models.PMF;
using Models;
using System.Xml.Serialization;
using APSIM.Shared.Utilities;

namespace Models
{
    [Serializable] 
    public class Script : Model
    {
        [Link] Plant Wheat;
        [Link] Clock Clock;
        [Link] Zone zone;

        [Description("Use extra root zone")]
        public bool UseExtraZone { get; set; }

        
        [EventSubscribe("Commencing")]
        private void OnSimulationCommencing(object sender, EventArgs e)
        {
            if (UseExtraZone)
            {
            Wheat.Root.ZoneNamesToGrowRootsIn.Add("Understory");
            Wheat.Root.ZoneRootDepths.Add(2600);
            Wheat.Root.ZoneInitialDM.Add(10);
            }
        }
    }
}
```
      Manager Automatic irrigation based on water deficit (disabled)
        FASW = 0
        WaterDeficit = 0
        AutoIrrigationOn = True
        FASWThreshold = 0.9
        FASWDepth = 600
```csharp
using System;
using Models.Core;
using System.Collections.Generic;
using System.Text;
using Models.Soils;
using Models.PMF;
using Models;
using System.Xml.Serialization;
using APSIM.Shared.Utilities;

namespace Models
{
    [Serializable] 
    public class Script : Model
    {
        public double FASW { get; set; }
        public double WaterDeficit  { get; set; }
    
        [Link] Zone zone;
        [Link] Irrigation irrigation;
        [Link] Soil soil;
        
        [Description("Auto irrigation on?")]
        public bool AutoIrrigationOn { get; set; }

        [Description("Threshold fraction available water (0-1)")]
        public double FASWThreshold { get; set; }

        [Description("Soil depth (mm) to which fraction available water is calculated")]
        public double FASWDepth { get; set; }

        [EventSubscribe("DoManagement")]
        private void OnDoManagement(object sender, EventArgs e)
        {
            CalculateFASW();
            if (AutoIrrigationOn)
            {
                if (FASW < FASWThreshold)
                {
                    double amount = 10;
                    irrigation.Apply(WaterDeficit, depth: 0);
                }
            }
        }
        
        private void CalculateFASW()
        {
            double[] LL15 = MathUtilities.Multiply(soil.LL15, soil.Thickness);
            double[] DUL = MathUtilities.Multiply(soil.DUL, soil.Thickness);
        
            int nlayr = GetLayerIndex();
            double cumdep = MathUtilities.Sum(soil.Thickness, 0, nlayr, 0.0);

            double excess_fr = MathUtilities.Divide((cumdep - FASWDepth), soil.Thickness[nlayr], 0.0);

            // note that results may be strange if swdep < ll15
            double avail_sw = (MathUtilities.Sum(soil.Water, 0, nlayr, 0.0)
                              - excess_fr * soil.Water[nlayr])
                              - (MathUtilities.Sum(LL15, 0, nlayr, 0.0)
                              - excess_fr * LL15[nlayr]);


            double pot_avail_sw = (MathUtilities.Sum(DUL, 0, nlayr, 0.0)
                                  - excess_fr * DUL[nlayr])
                                  - (MathUtilities.Sum(LL15, 0, nlayr, 0.0)
                                  - excess_fr * LL15[nlayr]);

            FASW = MathUtilities.Divide(avail_sw, pot_avail_sw, 0.0);
            WaterDeficit = MathUtilities.Constrain(pot_avail_sw - avail_sw, 0.0, 100000);
        }

        private int GetLayerIndex()
        {
            double[] cumThickness = Soil.ToCumThickness(soil.Thickness);
            for (int i = 1; i < cumThickness.Length; i++)
            {
                if (FASWDepth < cumThickness[i])
                    return i - 1;
            }
            
            return cumThickness.Length - 1;
        }

    }
}
```
    RectangularZone Understory: Length=1; Width=100; Slope=0
      Report: EventNames=[Clock].DoReport
        VariableNames:
          [Clock].Today
          [Slurp].Leaf.Height
          [Slurp].Leaf.LAI
          [Slurp].Leaf.CoverTotal
          [Slurp].Leaf.Transpiration
          sum([Soil].SoilWater.SWmm) as SWTot
      Soil: Latitude=0; Longitude=0
        Analysis: same as Vineyard.Vines.Soil.Analysis
        InitialWater Initial water: PercentMethod=1; FractionFull=1
        Water
          Thickness  BD   AirDry  LL15  DUL   SAT
          150        1.2  0.05    0.1   0.33  0.5
          150        1.2  0.1     0.1   0.33  0.5
          100        1.2  0.12    0.12  0.31  0.44
          200        1.2  0.06    0.06  0.15  0.46
          200        1.2  0.04    0.04  0.1   0.44
          200        1.2  0.02    0.02  0.06  0.44
          200        1.2  0.06    0.06  0.15  0.46
          200        1.2  0.04    0.04  0.1   0.44
          200        1.2  0.06    0.06  0.13  0.44
          200        1.2  0.06    0.06  0.13  0.44
          200        1.2  0.06    0.06  0.13  0.44
          200        1.2  0.06    0.06  0.13  0.44
          400        1.2  0.06    0.06  0.13  0.44
          SoilCrop SlurpSoil
            LL=[0.1, 0.1, 0.12, 0.06, 0.04, 0.02, 0.06, 0.04, 0.06, 0.06, 0.06, 0.06, 0.06]
            KL=[0.1, 0.1, 0.1, 0.1, 0.1, 0.1, 0.1, 0.1, 0.1, 0.1, 0.1, 0.1, 0.1]
            XF=[1, 1, 1, 1, 1, 1, 1, 1, 1, 1, 1, 1, 1]
        SoilWater: same as Vineyard.Vines.Soil.SoilWater
        SoilNitrogen: same as Vineyard.Vines.Soil.SoilNitrogen
        SoilOrganicMatter: same as Vineyard.Vines.Soil.SoilOrganicMatter
        Sample Initial nitrogen: NO3Units=kg/ha; NH4Units=ppm; SWUnits=Volumetric; OCUnits=Total; PHUnits=Water
          Thickness  NO3  NH4
          100        217  0
          200        30   0
          300        5    0
          300        5    0
          300        0    0
          300        0    0
        CERESSoilTemperature
      SurfaceOrganicMatter: InitialResidueName=wheat_stubble; InitialResidueType=wheat; InitialResidueMass=500; InitialStandingFraction=0; InitialCPR=0; InitialCNR=100; FractionFaecesAdded=0.5
      Plant Slurp: CropType=Slurp; IsEnding=false; DaysAfterEnding=0
      Fertiliser
      Irrigation
      Manager PastureInitialisation
        CultivarName = StaticCrop
        InitialRootDepth = 600
        SowingDate = 2015-07-01
        RootDepth = 600
        RFV = 10
        KLReductionFactor = -0.003
        KLReductionDepth = 150
        YKLModifiers =
        XDepth =
        MaxG = 0.004
        R50 = 150
```csharp
using System;
using Models.Core;
using Models.PMF;
using APSIM.Shared.Utilities;
using Models.Soils;
        
namespace Models
{
    [Serializable] 
    [System.Xml.Serialization.XmlInclude(typeof(Model))]
    public class Script : Model
    {
        [Link] Plant Slurp;
        [Link] Clock Clock;
        [Link] Soil Soil;
        [Link] Zone zone;

        [Display(Type = DisplayType.CultivarName)]
        [Description("Plant Type")]
        public string CultivarName { get; set; }
        [Description("Initial Root Depth")]
        public double InitialRootDepth { get; set; }
        [Description("Initialisation Date")]
        public DateTime SowingDate { get; set; }
        [Description("Maximum Root Depth")]
        public double RootDepth { get; set; }
        [Description("Roof Front Velocity")]
        public double RFV { get; set; }
        [Description("Factor to change Kl modifier with Depth")]
        public double KLReductionFactor { get; set; }
        [Description("Depth that KL starts to decline")]
        public double KLReductionDepth { get; set; }
        
        public double[] YKLModifiers { get; set; }
        public double[] XDepth { get; set; }
        private double Depth { get; set; }
        
        [Description("Maximum Stomatal Conductance")]
        public double MaxG { get; set; }
        [Description("Stomatal Radn response")]
        public double R50 { get; set; }
        
        [EventSubscribe("DoManagement")]
        private void OnDoManagement(object sender, EventArgs e)
        {
            if (Clock.Today.Date == SowingDate)
            {
                Slurp.Sow(cultivar: CultivarName, population: 1, depth: InitialRootDepth, rowSpacing: 150);
                
                YKLModifiers = new double[Soil.Thickness.Length];
                XDepth = new double[Soil.Thickness.Length];
                Depth = 0;
                for (int layer = 0; layer < Soil.Thickness.Length; layer++)
                {
                    Depth += Soil.Thickness[layer] / 2;  //Add half of the thickness of the current layer so depth is the mid depth of that layer
                    if (Depth <= KLReductionDepth)
                    {
                        YKLModifiers[layer] = 1;
                        XDepth[layer] = Depth;
                    }
                    else
                    {
                        double KLMod = 1 * Math.Exp(-KLReductionFactor * (Depth - KLReductionDepth));
                        YKLModifiers[layer] = KLMod;
                        XDepth[layer] = Depth;
                    }
                    Depth += Soil.Thickness[layer] / 2;  //Add the other half of the current layer so depth is the top of the next layer
                }
                object KLMods = YKLModifiers;
                zone.Set("Slurp.Root.KLModifier.XYPairs.Y", KLMods);
                object Depths = XDepth;
                zone.Set("Slurp.Root.KLModifier.XYPairs.X", Depths);
                object RD = RootDepth;
                zone.Set("Slurp.Root.MaximumRootDepth.FixedValue", RD);
                object RV = RFV;
                zone.Set("Slurp.Root.RootFrontVelocity.Potential.FixedValue", RV);
                object GMaxValue = MaxG;
                zone.Set("Slurp.Leaf.Gsmax", GMaxValue); 
                object R50Value = R50; 
                zone.Set("Slurp.Leaf.R50", R50Value); 
                
            }
        }
    }
}
```
      Manager SetPastureVariables
        Ext_coef = 0.6
        MaximumHeight = 300
        MinimumHeight = 100
        Cover = 0
        LAI = 0
```csharp
using System;
using Models.Core;
using System.Collections.Generic;
using System.Text;
using Models.PMF;
using Models;
using System.Xml.Serialization;
using APSIM.Shared.Utilities;
using System.Data;

namespace Models
{
    [Serializable] 
    //[System.Xml.Serialization.XmlInclude(typeof(Model))]
    public class Script : Model
    {
        [Link] Plant Slurp;
        [Link] Clock Clock;
        [Link] Zone zone;
        [Link] Weather weather;

        
        [Description("Extinction coefficient")]
        public  double Ext_coef { get; set; }
        [Description("Maximum height of leaves")]
        public double MaximumHeight { get; set; }
        [Description("Minimum height of leaves")]
        public double MinimumHeight { get; set; }
        
        public double Cover {get; private set;}
        public double LAI { get; private set; }
                
        [EventSubscribe("StartOfSimulation")]
        private void OnStartOfSimulation(object sender, EventArgs e)
        {
        	Cover = 0.5;
        }
        
        [EventSubscribe("StartOfDay")]
        private void OnStartOfDay(object sender, EventArgs e)
        {
            Cover += weather.MeanT * 0.001;

            if (Cover >= 1.0)
            {
            	Cover = 0.5;        
            }

          	LAI = Math.Log(1 - Cover) / -Ext_coef;

            object LAIResetValue = LAI;
            zone.Set("Slurp.Leaf.LAIFunction.FixedValue", LAIResetValue);  
            object HeightResetValue = MinimumHeight + Cover * (MaximumHeight-MinimumHeight);
            zone.Set("Slurp.Leaf.HeightFunction.FixedValue", HeightResetValue);  
        }
    }
}
```
      Manager SetupVinePastureZones
        UseExtraZone = False
```csharp
using System;
using Models.Core;
using System.Collections.Generic;
using System.Text;
using Models.PMF;
using Models;
using System.Xml.Serialization;
using APSIM.Shared.Utilities;

namespace Models
{
    [Serializable] 
    public class Script : Model
    {
        [Link] Plant Wheat;
        [Link] Clock Clock;
        [Link] Zone zone;

        [Description("Use extra root zone")]
        public bool UseExtraZone { get; set; }

        
        [EventSubscribe("Commencing")]
        private void OnSimulationCommencing(object sender, EventArgs e)
        {
            if (UseExtraZone)
            {
            Wheat.Root.ZoneNamesToGrowRootsIn.Add("Vines");
            Wheat.Root.ZoneRootDepths.Add(600);
            Wheat.Root.ZoneInitialDM.Add(10);
            }
        }
    }
}
```
  Simulation Peach
    Clock: StartDate=2007-07-01; EndDate=2011-07-01
    Summary SummaryFile
    Weather: FileName=Whakatu.met
    MicroClimate: a_interception=0; b_interception=1; c_interception=0; d_interception=0; soil_albedo=0.3; SoilHeatFluxFraction=0.4; NightInterceptionFraction=0.5; ReferenceHeight=2
    SoilArbitrator Soil Arbitrator
    RectangularZone Row: Length=100; Width=1.5; Slope=0
      Report: EventNames=[Clock].DoReport
        VariableNames:
          [Clock].Today
          [SimpleFruitTree].Leaf.Height as height
          [SimpleFruitTree].Leaf.LAI as lai
          ([SimpleFruitTree].Leaf.RadIntTot * 1.5) / ([Weather].Radn * (1.5+3.5)) as f.rad.int
          [SimpleFruitTree].Leaf.Transpiration * 1.5/5 as transpiration
          sum([Soil].SoilWater.SWmm[1:7]) as psw
          [Soil].OutputLayers.SW
          sum of [Soil].SoilWater.Flux[7] from 2009-07-01 to 2012-07-01 as drainage
          [SimpleFruitTree].Root.Depth as rootDepth
      Soil: Latitude=0; Longitude=0
        LayerStructure: Thickness=[200, 200, 200, 200, 200, 200, 400, 400, 400, 600]
        Analysis: same as Vineyard.Vines.Soil.Analysis
        InitialWater Initial water: PercentMethod=1; FractionFull=1
        Water
          Thickness  BD   AirDry  LL15  DUL   SAT
          400        1.1  0.11    0.22  0.35  0.45
          400        1.3  0.22    0.22  0.35  0.45
          400        1.4  0.25    0.25  0.42  0.47
          1800       1.4  0.25    0.25  0.42  0.47
          SoilCrop SimpleFruitTreeSoil: LL=[0.22, 0.22, 0.25, 0.25]; KL=[0.06, 0.04, 0.02, 0.01]; XF=[1, 1, 1, 1]
          SoilCrop SlurpSoil: LL=[0.22, 0.22, 0.25, 0.25]; KL=[0.1, 0.04, 0.01, 0]; XF=[1, 1, 1, 1]
        SoilWater: same as Vineyard.Vines.Soil.SoilWater
        SoilNitrogen: same as Vineyard.Vines.Soil.SoilNitrogen
        SoilOrganicMatter: same as Vineyard.Vines.Soil.SoilOrganicMatter
        Sample Initial nitrogen: NO3Units=kg/ha; NH4Units=ppm; SWUnits=Volumetric; OCUnits=Total; PHUnits=Water
          Thickness  NO3  NH4
          100        217  0
          200        30   0
          300        5    0
          300        5    0
          300        0    0
          300        0    0
        CERESSoilTemperature
        OutputLayers: Thickness=[400, 400, 400, 1800]
      SurfaceOrganicMatter: InitialResidueName=wheat_stubble; InitialResidueType=wheat; InitialResidueMass=500; InitialStandingFraction=0; InitialCPR=0; InitialCNR=100; FractionFaecesAdded=0.5
      Plant SimpleFruitTree: CropType=Slurp; IsEnding=false; DaysAfterEnding=0
      Fertiliser
      Irrigation
      Manager TreeInitialisation
        CultivarName = Peach
        SowingDate = 2007-07-01
        StartAge = 6
```csharp
using System;
using Models.Core;
using Models.PMF;
using APSIM.Shared.Utilities;
using Models.Soils;
        
namespace Models
{
    [Serializable] 
    [System.Xml.Serialization.XmlInclude(typeof(Model))]
    public class Script : Model
    {
        [Link] Plant SimpleFruitTree;
        [Link] Clock Clock;
        [Link] Soil Soil;
        [Link] Zone zone;

        [Display(Type = DisplayType.CultivarName)]
        [Description("Plant Type")]
        public string CultivarName { get; set; }
        [Description("Initialisation Date")]
        public DateTime SowingDate { get; set; }
        [Description("Age of trees (in Years) at start of simulation)")]
        public int StartAge {get;set;}

        [EventSubscribe("DoManagement")]
        private void OnDoManagement(object sender, EventArgs e)
        {
            if (Clock.Today.Date == SowingDate)
            {
            	double maxRootDepth = (double)zone.Get("SimpleFruitTree.Root.MaximumRootDepth.FixedValue");
            	double initialRootDepth = Math.Min(1,StartAge/6) * maxRootDepth;
                SimpleFruitTree.Sow(cultivar: CultivarName, population: 1, depth: initialRootDepth, rowSpacing: 3000);
                object StartAgeValue = StartAge;
                zone.Set("SimpleFruitTree.Phenology.Age.Years",StartAgeValue);
                
            }
        }
    }
}
```
      Manager SetupTreeRootZones
        UseExtraZone = True
```csharp
using System;
using Models.Core;
using System.Collections.Generic;
using System.Text;
using Models.PMF;
using Models;
using System.Xml.Serialization;
using APSIM.Shared.Utilities;

namespace Models
{
    [Serializable] 
    public class Script : Model
    {
        [Link] Plant SimpleFruitTree;
        [Link] Clock Clock;
        [Link] Zone zone;

        [Description("Use extra root zone")]
        public bool UseExtraZone { get; set; }

        
        [EventSubscribe("Commencing")]
        private void OnSimulationCommencing(object sender, EventArgs e)
        {
            if (UseExtraZone)
            {
            SimpleFruitTree.Root.ZoneNamesToGrowRootsIn.Add("Alley");
            SimpleFruitTree.Root.ZoneRootDepths.Add(2600);
            SimpleFruitTree.Root.ZoneInitialDM.Add(10);
            }
        }
    }
}
```
      Manager Automatic irrigation based on water deficit (disabled): same as Vineyard.Vines.Automatic irrigation based on water deficit
    RectangularZone Alley: Length=100; Width=3.5; Slope=0
      Report: EventNames=[Clock].DoReport
        VariableNames:
          [Clock].Today
          [Slurp].Leaf.Height as height
          [Slurp].Leaf.LAI as lai
          ([Slurp].Leaf.RadIntTot * 3.5)  / ([Weather].Radn * (1.5+3.5)) as f.rad.int
          [Slurp].Leaf.Transpiration as transpiration
          sum([Soil].SoilWater.SWmm[1:7]) as psw
          [Soil].OutputLayers.SW
          sum of [Soil].SoilWater.Flux[7] from 2009-07-01 to 2012-07-01 as drainage
      Soil: same as Peach.Row.Soil
      SurfaceOrganicMatter: InitialResidueName=wheat_stubble; InitialResidueType=wheat; InitialResidueMass=500; InitialStandingFraction=0; InitialCPR=0; InitialCNR=100; FractionFaecesAdded=0.5
      Plant Slurp: CropType=Slurp; IsEnding=false; DaysAfterEnding=0
      Fertiliser
      Irrigation
      Manager PastureInitialisation
        CultivarName = StaticCrop
        InitialRootDepth = 600
        SowingDate = 2007-07-01
        RootDepth = 600
        RFV = 10
        KLReductionFactor = -0.003
        KLReductionDepth = 150
        YKLModifiers =
        XDepth =
        MaxG = 0.004
        R50 = 150
        script: same as in Vineyard.Vines.VineInitialisation
      Manager SetPastureVariables: same as Vineyard.Understory.SetPastureVariables
      Manager SetupPastureRootZones
        UseExtraZone = False
```csharp
using System;
using Models.Core;
using System.Collections.Generic;
using System.Text;
using Models.PMF;
using Models;
using System.Xml.Serialization;
using APSIM.Shared.Utilities;

namespace Models
{
    [Serializable] 
    public class Script : Model
    {
        [Link] Plant Slurp;
        [Link] Clock Clock;
        [Link] Zone zone;

        [Description("Use extra root zone")]
        public bool UseExtraZone { get; set; }

        
        [EventSubscribe("Commencing")]
        private void OnSimulationCommencing(object sender, EventArgs e)
        {
            if (UseExtraZone)
            {
            Slurp.Root.ZoneNamesToGrowRootsIn.Add("Row");
            Slurp.Root.ZoneRootDepths.Add(600);
            Slurp.Root.ZoneInitialDM.Add(10);
            }
        }
    }
}
```
  Experiment Grape_Squire
    DisabledSimNames=[Grape_SquireIrri20, Grape_SquireIrri40, Grape_SquireIrri70, Grape_SquireIrri80]
    Factors
      Factor Irri: Specification=[VineIrrigation]
        Operations 100
          2001-10-25  [DripIrrigator].Script.applyDripIrri(10.4);
          2001-10-26  [DripIrrigator].Script.applyDripIrri(10.4);
          2001-11-01  [DripIrrigator].Script.applyDripIrri(10.4);
          2001-11-04  [DripIrrigator].Script.applyDripIrri(10.4);
          2001-11-11  [DripIrrigator].Script.applyDripIrri(10.4);
          2001-11-15  [DripIrrigator].Script.applyDripIrri(10.4);
          2001-11-25  [DripIrrigator].Script.applyDripIrri(10.4);
          2001-12-02  [DripIrrigator].Script.applyDripIrri(10.4);
          2001-12-10  [DripIrrigator].Script.applyDripIrri(10.4);
          2001-12-12  [DripIrrigator].Script.applyDripIrri(10.4);
          2001-12-18  [DripIrrigator].Script.applyDripIrri(10.4);
          2001-12-23  [DripIrrigator].Script.applyDripIrri(10.4);
          2002-01-01  [DripIrrigator].Script.applyDripIrri(10.4);
          2002-01-10  [DripIrrigator].Script.applyDripIrri(10.4);
          2002-01-13  [DripIrrigator].Script.applyDripIrri(10.4);
          2002-01-22  [DripIrrigator].Script.applyDripIrri(10.4);
          2002-01-27  [DripIrrigator].Script.applyDripIrri(10.4);
          2002-01-29  [DripIrrigator].Script.applyDripIrri(10.4);
          2002-02-14  [DripIrrigator].Script.applyDripIrri(10.4);
          2002-02-17  [DripIrrigator].Script.applyDripIrri(10.4);
          2002-02-19  [DripIrrigator].Script.applyDripIrri(10.4);
          2002-02-21  [DripIrrigator].Script.applyDripIrri(10.4);
          2002-02-25  [DripIrrigator].Script.applyDripIrri(10.4);
          2002-02-26  [DripIrrigator].Script.applyDripIrri(10.4);
          2002-03-03  [DripIrrigator].Script.applyDripIrri(10.4);
          2002-03-05  [DripIrrigator].Script.applyDripIrri(10.4);
          2002-03-07  [DripIrrigator].Script.applyDripIrri(10.4);
          2002-03-10  [DripIrrigator].Script.applyDripIrri(10.4);
          2002-03-12  [DripIrrigator].Script.applyDripIrri(10.4);
          2002-03-19  [DripIrrigator].Script.applyDripIrri(10.4);
          2002-03-24  [DripIrrigator].Script.applyDripIrri(10.4);
          2002-03-26  [DripIrrigator].Script.applyDripIrri(10.4);
          2002-10-05  [DripIrrigator].Script.applyDripIrri(14.5);
          2002-10-08  [DripIrrigator].Script.applyDripIrri(14.5);
          2002-10-10  [DripIrrigator].Script.applyDripIrri(14.5);
          2002-10-12  [DripIrrigator].Script.applyDripIrri(14.5);
          2002-10-23  [DripIrrigator].Script.applyDripIrri(14.5);
          2002-10-26  [DripIrrigator].Script.applyDripIrri(14.5);
          2002-10-28  [DripIrrigator].Script.applyDripIrri(14.5);
          2002-11-05  [DripIrrigator].Script.applyDripIrri(14.5);
          2002-11-08  [DripIrrigator].Script.applyDripIrri(14.5);
          2002-11-11  [DripIrrigator].Script.applyDripIrri(14.5);
          2002-11-18  [DripIrrigator].Script.applyDripIrri(14.5);
          2002-11-20  [DripIrrigator].Script.applyDripIrri(14.5);
          2002-11-23  [DripIrrigator].Script.applyDripIrri(14.5);
          2002-11-25  [DripIrrigator].Script.applyDripIrri(14.5);
          2002-11-29  [DripIrrigator].Script.applyDripIrri(14.5);
          2002-12-04  [DripIrrigator].Script.applyDripIrri(14.5);
          2002-12-09  [DripIrrigator].Script.applyDripIrri(14.5);
          2002-12-11  [DripIrrigator].Script.applyDripIrri(14.5);
          2002-12-19  [DripIrrigator].Script.applyDripIrri(14.5);
          2002-12-27  [DripIrrigator].Script.applyDripIrri(14.5);
          2002-12-31  [DripIrrigator].Script.applyDripIrri(14.5);
          2003-01-08  [DripIrrigator].Script.applyDripIrri(14.5);
          2003-01-09  [DripIrrigator].Script.applyDripIrri(14.5);
          2003-01-11  [DripIrrigator].Script.applyDripIrri(14.5);
          2003-01-15  [DripIrrigator].Script.applyDripIrri(14.5);
          2003-01-18  [DripIrrigator].Script.applyDripIrri(14.5);
          2003-01-23  [DripIrrigator].Script.applyDripIrri(14.5);
          2003-01-30  [DripIrrigator].Script.applyDripIrri(14.5);
          2003-02-05  [DripIrrigator].Script.applyDripIrri(14.5);
          2003-02-07  [DripIrrigator].Script.applyDripIrri(14.5);
          2003-02-09  [DripIrrigator].Script.applyDripIrri(14.5);
          2003-02-15  [DripIrrigator].Script.applyDripIrri(14.5);
          2003-02-18  [DripIrrigator].Script.applyDripIrri(14.5);
          2003-02-20  [DripIrrigator].Script.applyDripIrri(14.5);
          2003-02-23  [DripIrrigator].Script.applyDripIrri(14.5);
          2003-02-26  [DripIrrigator].Script.applyDripIrri(14.5);
          2003-03-01  [DripIrrigator].Script.applyDripIrri(14.5);
          2003-03-04  [DripIrrigator].Script.applyDripIrri(14.5);
          2003-03-06  [DripIrrigator].Script.applyDripIrri(14.5);
          2003-03-08  [DripIrrigator].Script.applyDripIrri(14.5);
          2003-03-13  [DripIrrigator].Script.applyDripIrri(14.5);
          2003-03-16  [DripIrrigator].Script.applyDripIrri(14.5);
          2003-03-18  [DripIrrigator].Script.applyDripIrri(14.5);
          2003-03-24  [DripIrrigator].Script.applyDripIrri(14.5);
          2003-10-01  [DripIrrigator].Script.applyDripIrri(26.4);
          2003-10-07  [DripIrrigator].Script.applyDripIrri(26.4);
          2003-10-14  [DripIrrigator].Script.applyDripIrri(26.4);
          2003-10-23  [DripIrrigator].Script.applyDripIrri(26.4);
          2003-11-03  [DripIrrigator].Script.applyDripIrri(26.4);
          2003-11-20  [DripIrrigator].Script.applyDripIrri(26.4);
          2003-12-11  [DripIrrigator].Script.applyDripIrri(26.4);
          2003-12-15  [DripIrrigator].Script.applyDripIrri(26.4);
          2003-12-18  [DripIrrigator].Script.applyDripIrri(26.4);
          2003-12-23  [DripIrrigator].Script.applyDripIrri(26.4);
          2003-12-30  [DripIrrigator].Script.applyDripIrri(26.4);
          2004-01-11  [DripIrrigator].Script.applyDripIrri(26.4);
          2004-01-14  [DripIrrigator].Script.applyDripIrri(26.4);
          2004-01-21  [DripIrrigator].Script.applyDripIrri(26.4);
          2004-01-25  [DripIrrigator].Script.applyDripIrri(26.4);
          2004-02-03  [DripIrrigator].Script.applyDripIrri(26.4);
          2004-02-16  [DripIrrigator].Script.applyDripIrri(26.4);
          2004-03-01  [DripIrrigator].Script.applyDripIrri(26.4);
          2004-03-04  [DripIrrigator].Script.applyDripIrri(26.4);
          2004-03-22  [DripIrrigator].Script.applyDripIrri(26.4);
          2004-10-06  [DripIrrigator].Script.applyDripIrri(14.3);
          2004-10-13  [DripIrrigator].Script.applyDripIrri(14.3);
          2004-11-03  [DripIrrigator].Script.applyDripIrri(14.3);
          2004-11-16  [DripIrrigator].Script.applyDripIrri(14.3);
          2004-11-22  [DripIrrigator].Script.applyDripIrri(14.3);
          2004-12-01  [DripIrrigator].Script.applyDripIrri(14.3);
          2004-12-20  [DripIrrigator].Script.applyDripIrri(14.3);
          2004-12-28  [DripIrrigator].Script.applyDripIrri(14.3);
          2005-01-04  [DripIrrigator].Script.applyDripIrri(14.3);
          2005-01-07  [DripIrrigator].Script.applyDripIrri(14.3);
          2005-01-11  [DripIrrigator].Script.applyDripIrri(14.3);
          2005-01-17  [DripIrrigator].Script.applyDripIrri(14.3);
          2005-01-27  [DripIrrigator].Script.applyDripIrri(14.3);
          2005-02-04  [DripIrrigator].Script.applyDripIrri(14.3);
          2005-02-15  [DripIrrigator].Script.applyDripIrri(14.3);
          2005-02-22  [DripIrrigator].Script.applyDripIrri(14.3);
          2005-03-03  [DripIrrigator].Script.applyDripIrri(14.3);
          2005-03-08  [DripIrrigator].Script.applyDripIrri(14.3);
          2005-03-11  [DripIrrigator].Script.applyDripIrri(14.3);
          2005-03-18  [DripIrrigator].Script.applyDripIrri(14.3);
          2005-03-22  [DripIrrigator].Script.applyDripIrri(14.3);
          2005-03-31  [DripIrrigator].Script.applyDripIrri(14.3);
        Operations 80
          2001-10-25  [DripIrrigator].Script.applyDripIrri(8.3);
          2001-10-26  [DripIrrigator].Script.applyDripIrri(8.3);
          2001-11-01  [DripIrrigator].Script.applyDripIrri(8.3);
          2001-11-04  [DripIrrigator].Script.applyDripIrri(8.3);
          2001-11-11  [DripIrrigator].Script.applyDripIrri(8.3);
          2001-11-15  [DripIrrigator].Script.applyDripIrri(8.3);
          2001-11-25  [DripIrrigator].Script.applyDripIrri(8.3);
          2001-12-02  [DripIrrigator].Script.applyDripIrri(8.3);
          2001-12-10  [DripIrrigator].Script.applyDripIrri(8.3);
          2001-12-12  [DripIrrigator].Script.applyDripIrri(8.3);
          2001-12-18  [DripIrrigator].Script.applyDripIrri(8.3);
          2001-12-23  [DripIrrigator].Script.applyDripIrri(8.3);
          2002-01-01  [DripIrrigator].Script.applyDripIrri(8.3);
          2002-01-10  [DripIrrigator].Script.applyDripIrri(8.3);
          2002-01-13  [DripIrrigator].Script.applyDripIrri(8.3);
          2002-01-22  [DripIrrigator].Script.applyDripIrri(8.3);
          2002-01-27  [DripIrrigator].Script.applyDripIrri(8.3);
          2002-01-29  [DripIrrigator].Script.applyDripIrri(8.3);
          2002-02-14  [DripIrrigator].Script.applyDripIrri(8.3);
          2002-02-17  [DripIrrigator].Script.applyDripIrri(8.3);
          2002-02-19  [DripIrrigator].Script.applyDripIrri(8.3);
          2002-02-21  [DripIrrigator].Script.applyDripIrri(8.3);
          2002-02-25  [DripIrrigator].Script.applyDripIrri(8.3);
          2002-02-26  [DripIrrigator].Script.applyDripIrri(8.3);
          2002-03-03  [DripIrrigator].Script.applyDripIrri(8.3);
          2002-03-05  [DripIrrigator].Script.applyDripIrri(8.3);
          2002-03-07  [DripIrrigator].Script.applyDripIrri(8.3);
          2002-03-10  [DripIrrigator].Script.applyDripIrri(8.3);
          2002-03-12  [DripIrrigator].Script.applyDripIrri(8.3);
          2002-03-19  [DripIrrigator].Script.applyDripIrri(8.3);
          2002-03-24  [DripIrrigator].Script.applyDripIrri(8.3);
          2002-03-26  [DripIrrigator].Script.applyDripIrri(8.3);
          2002-10-05  [DripIrrigator].Script.applyDripIrri(11.6);
          2002-10-08  [DripIrrigator].Script.applyDripIrri(11.6);
          2002-10-10  [DripIrrigator].Script.applyDripIrri(11.6);
          2002-10-12  [DripIrrigator].Script.applyDripIrri(11.6);
          2002-10-23  [DripIrrigator].Script.applyDripIrri(11.6);
          2002-10-26  [DripIrrigator].Script.applyDripIrri(11.6);
          2002-10-28  [DripIrrigator].Script.applyDripIrri(11.6);
          2002-11-05  [DripIrrigator].Script.applyDripIrri(11.6);
          2002-11-08  [DripIrrigator].Script.applyDripIrri(11.6);
          2002-11-11  [DripIrrigator].Script.applyDripIrri(11.6);
          2002-11-18  [DripIrrigator].Script.applyDripIrri(11.6);
          2002-11-20  [DripIrrigator].Script.applyDripIrri(11.6);
          2002-11-23  [DripIrrigator].Script.applyDripIrri(11.6);
          2002-11-25  [DripIrrigator].Script.applyDripIrri(11.6);
          2002-11-29  [DripIrrigator].Script.applyDripIrri(11.6);
          2002-12-04  [DripIrrigator].Script.applyDripIrri(11.6);
          2002-12-09  [DripIrrigator].Script.applyDripIrri(11.6);
          2002-12-11  [DripIrrigator].Script.applyDripIrri(11.6);
          2002-12-19  [DripIrrigator].Script.applyDripIrri(11.6);
          2002-12-27  [DripIrrigator].Script.applyDripIrri(11.6);
          2002-12-31  [DripIrrigator].Script.applyDripIrri(11.6);
          2003-01-08  [DripIrrigator].Script.applyDripIrri(11.6);
          2003-01-09  [DripIrrigator].Script.applyDripIrri(11.6);
          2003-01-11  [DripIrrigator].Script.applyDripIrri(11.6);
          2003-01-15  [DripIrrigator].Script.applyDripIrri(11.6);
          2003-01-18  [DripIrrigator].Script.applyDripIrri(11.6);
          2003-01-23  [DripIrrigator].Script.applyDripIrri(11.6);
          2003-01-30  [DripIrrigator].Script.applyDripIrri(11.6);
          2003-02-05  [DripIrrigator].Script.applyDripIrri(11.6);
          2003-02-07  [DripIrrigator].Script.applyDripIrri(11.6);
          2003-02-09  [DripIrrigator].Script.applyDripIrri(11.6);
          2003-02-15  [DripIrrigator].Script.applyDripIrri(11.6);
          2003-02-18  [DripIrrigator].Script.applyDripIrri(11.6);
          2003-02-20  [DripIrrigator].Script.applyDripIrri(11.6);
          2003-02-23  [DripIrrigator].Script.applyDripIrri(11.6);
          2003-02-26  [DripIrrigator].Script.applyDripIrri(11.6);
          2003-03-01  [DripIrrigator].Script.applyDripIrri(11.6);
          2003-03-04  [DripIrrigator].Script.applyDripIrri(11.6);
          2003-03-06  [DripIrrigator].Script.applyDripIrri(11.6);
          2003-03-08  [DripIrrigator].Script.applyDripIrri(11.6);
          2003-03-13  [DripIrrigator].Script.applyDripIrri(11.6);
          2003-03-16  [DripIrrigator].Script.applyDripIrri(11.6);
          2003-03-18  [DripIrrigator].Script.applyDripIrri(11.6);
          2003-03-24  [DripIrrigator].Script.applyDripIrri(11.6);
          2003-10-01  [DripIrrigator].Script.applyDripIrri(21.1);
          2003-10-07  [DripIrrigator].Script.applyDripIrri(21.1);
          2003-10-14  [DripIrrigator].Script.applyDripIrri(21.1);
          2003-10-23  [DripIrrigator].Script.applyDripIrri(21.1);
          2003-11-03  [DripIrrigator].Script.applyDripIrri(21.1);
          2003-11-20  [DripIrrigator].Script.applyDripIrri(21.1);
          2003-12-11  [DripIrrigator].Script.applyDripIrri(21.1);
          2003-12-15  [DripIrrigator].Script.applyDripIrri(21.1);
          2003-12-18  [DripIrrigator].Script.applyDripIrri(21.1);
          2003-12-23  [DripIrrigator].Script.applyDripIrri(21.1);
          2003-12-30  [DripIrrigator].Script.applyDripIrri(21.1);
          2004-01-11  [DripIrrigator].Script.applyDripIrri(21.1);
          2004-01-14  [DripIrrigator].Script.applyDripIrri(21.1);
          2004-01-21  [DripIrrigator].Script.applyDripIrri(21.1);
          2004-01-25  [DripIrrigator].Script.applyDripIrri(21.1);
          2004-02-03  [DripIrrigator].Script.applyDripIrri(21.1);
          2004-02-16  [DripIrrigator].Script.applyDripIrri(21.1);
          2004-03-01  [DripIrrigator].Script.applyDripIrri(21.1);
          2004-03-04  [DripIrrigator].Script.applyDripIrri(21.1);
          2004-03-22  [DripIrrigator].Script.applyDripIrri(21.1);
          2004-10-06  [DripIrrigator].Script.applyDripIrri(11.4);
          2004-10-13  [DripIrrigator].Script.applyDripIrri(11.4);
          2004-11-03  [DripIrrigator].Script.applyDripIrri(11.4);
          2004-11-16  [DripIrrigator].Script.applyDripIrri(11.4);
          2004-11-22  [DripIrrigator].Script.applyDripIrri(11.4);
          2004-12-01  [DripIrrigator].Script.applyDripIrri(11.4);
          2004-12-20  [DripIrrigator].Script.applyDripIrri(11.4);
          2004-12-28  [DripIrrigator].Script.applyDripIrri(11.4);
          2005-01-04  [DripIrrigator].Script.applyDripIrri(11.4);
          2005-01-07  [DripIrrigator].Script.applyDripIrri(11.4);
          2005-01-11  [DripIrrigator].Script.applyDripIrri(11.4);
          2005-01-17  [DripIrrigator].Script.applyDripIrri(11.4);
          2005-01-27  [DripIrrigator].Script.applyDripIrri(11.4);
          2005-02-04  [DripIrrigator].Script.applyDripIrri(11.4);
          2005-02-15  [DripIrrigator].Script.applyDripIrri(11.4);
          2005-02-22  [DripIrrigator].Script.applyDripIrri(11.4);
          2005-03-03  [DripIrrigator].Script.applyDripIrri(11.4);
          2005-03-08  [DripIrrigator].Script.applyDripIrri(11.4);
          2005-03-11  [DripIrrigator].Script.applyDripIrri(11.4);
          2005-03-18  [DripIrrigator].Script.applyDripIrri(11.4);
          2005-03-22  [DripIrrigator].Script.applyDripIrri(11.4);
          2005-03-31  [DripIrrigator].Script.applyDripIrri(11.4);
        Operations 70
          2001-10-25  [DripIrrigator].Script.applyDripIrri(7.3);
          2001-10-26  [DripIrrigator].Script.applyDripIrri(7.3);
          2001-11-01  [DripIrrigator].Script.applyDripIrri(7.3);
          2001-11-04  [DripIrrigator].Script.applyDripIrri(7.3);
          2001-11-11  [DripIrrigator].Script.applyDripIrri(7.3);
          2001-11-15  [DripIrrigator].Script.applyDripIrri(7.3);
          2001-11-25  [DripIrrigator].Script.applyDripIrri(7.3);
          2001-12-02  [DripIrrigator].Script.applyDripIrri(7.3);
          2001-12-10  [DripIrrigator].Script.applyDripIrri(7.3);
          2001-12-12  [DripIrrigator].Script.applyDripIrri(7.3);
          2001-12-18  [DripIrrigator].Script.applyDripIrri(7.3);
          2001-12-23  [DripIrrigator].Script.applyDripIrri(7.3);
          2002-01-01  [DripIrrigator].Script.applyDripIrri(7.3);
          2002-01-10  [DripIrrigator].Script.applyDripIrri(7.3);
          2002-01-13  [DripIrrigator].Script.applyDripIrri(7.3);
          2002-01-22  [DripIrrigator].Script.applyDripIrri(7.3);
          2002-01-27  [DripIrrigator].Script.applyDripIrri(7.3);
          2002-01-29  [DripIrrigator].Script.applyDripIrri(7.3);
          2002-02-14  [DripIrrigator].Script.applyDripIrri(7.3);
          2002-02-17  [DripIrrigator].Script.applyDripIrri(7.3);
          2002-02-19  [DripIrrigator].Script.applyDripIrri(7.3);
          2002-02-21  [DripIrrigator].Script.applyDripIrri(7.3);
          2002-02-25  [DripIrrigator].Script.applyDripIrri(7.3);
          2002-02-26  [DripIrrigator].Script.applyDripIrri(7.3);
          2002-03-03  [DripIrrigator].Script.applyDripIrri(7.3);
          2002-03-05  [DripIrrigator].Script.applyDripIrri(7.3);
          2002-03-07  [DripIrrigator].Script.applyDripIrri(7.3);
          2002-03-10  [DripIrrigator].Script.applyDripIrri(7.3);
          2002-03-12  [DripIrrigator].Script.applyDripIrri(7.3);
          2002-03-19  [DripIrrigator].Script.applyDripIrri(7.3);
          2002-03-24  [DripIrrigator].Script.applyDripIrri(7.3);
          2002-03-26  [DripIrrigator].Script.applyDripIrri(7.3);
          2002-10-05  [DripIrrigator].Script.applyDripIrri(10.2);
          2002-10-08  [DripIrrigator].Script.applyDripIrri(10.2);
          2002-10-10  [DripIrrigator].Script.applyDripIrri(10.2);
          2002-10-12  [DripIrrigator].Script.applyDripIrri(10.2);
          2002-10-23  [DripIrrigator].Script.applyDripIrri(10.2);
          2002-10-26  [DripIrrigator].Script.applyDripIrri(10.2);
          2002-10-28  [DripIrrigator].Script.applyDripIrri(10.2);
          2002-11-05  [DripIrrigator].Script.applyDripIrri(10.2);
          2002-11-08  [DripIrrigator].Script.applyDripIrri(10.2);
          2002-11-11  [DripIrrigator].Script.applyDripIrri(10.2);
          2002-11-18  [DripIrrigator].Script.applyDripIrri(10.2);
          2002-11-20  [DripIrrigator].Script.applyDripIrri(10.2);
          2002-11-23  [DripIrrigator].Script.applyDripIrri(10.2);
          2002-11-25  [DripIrrigator].Script.applyDripIrri(10.2);
          2002-11-29  [DripIrrigator].Script.applyDripIrri(10.2);
          2002-12-04  [DripIrrigator].Script.applyDripIrri(10.2);
          2002-12-09  [DripIrrigator].Script.applyDripIrri(10.2);
          2002-12-11  [DripIrrigator].Script.applyDripIrri(10.2);
          2002-12-19  [DripIrrigator].Script.applyDripIrri(10.2);
          2002-12-27  [DripIrrigator].Script.applyDripIrri(10.2);
          2002-12-31  [DripIrrigator].Script.applyDripIrri(10.2);
          2003-01-08  [DripIrrigator].Script.applyDripIrri(10.2);
          2003-01-09  [DripIrrigator].Script.applyDripIrri(10.2);
          2003-01-11  [DripIrrigator].Script.applyDripIrri(10.2);
          2003-01-15  [DripIrrigator].Script.applyDripIrri(10.2);
          2003-01-18  [DripIrrigator].Script.applyDripIrri(10.2);
          2003-01-23  [DripIrrigator].Script.applyDripIrri(10.2);
          2003-01-30  [DripIrrigator].Script.applyDripIrri(10.2);
          2003-02-05  [DripIrrigator].Script.applyDripIrri(10.2);
          2003-02-07  [DripIrrigator].Script.applyDripIrri(10.2);
          2003-02-09  [DripIrrigator].Script.applyDripIrri(10.2);
          2003-02-15  [DripIrrigator].Script.applyDripIrri(10.2);
          2003-02-18  [DripIrrigator].Script.applyDripIrri(10.2);
          2003-02-20  [DripIrrigator].Script.applyDripIrri(10.2);
          2003-02-23  [DripIrrigator].Script.applyDripIrri(10.2);
          2003-02-26  [DripIrrigator].Script.applyDripIrri(10.2);
          2003-03-01  [DripIrrigator].Script.applyDripIrri(10.2);
          2003-03-04  [DripIrrigator].Script.applyDripIrri(10.2);
          2003-03-06  [DripIrrigator].Script.applyDripIrri(10.2);
          2003-03-08  [DripIrrigator].Script.applyDripIrri(10.2);
          2003-03-13  [DripIrrigator].Script.applyDripIrri(10.2);
          2003-03-16  [DripIrrigator].Script.applyDripIrri(10.2);
          2003-03-18  [DripIrrigator].Script.applyDripIrri(10.2);
          2003-03-24  [DripIrrigator].Script.applyDripIrri(10.2);
          2003-10-01  [DripIrrigator].Script.applyDripIrri(18.5);
          2003-10-07  [DripIrrigator].Script.applyDripIrri(18.5);
          2003-10-14  [DripIrrigator].Script.applyDripIrri(18.5);
          2003-10-23  [DripIrrigator].Script.applyDripIrri(18.5);
          2003-11-03  [DripIrrigator].Script.applyDripIrri(18.5);
          2003-11-20  [DripIrrigator].Script.applyDripIrri(18.5);
          2003-12-11  [DripIrrigator].Script.applyDripIrri(18.5);
          2003-12-15  [DripIrrigator].Script.applyDripIrri(18.5);
          2003-12-18  [DripIrrigator].Script.applyDripIrri(18.5);
          2003-12-23  [DripIrrigator].Script.applyDripIrri(18.5);
          2003-12-30  [DripIrrigator].Script.applyDripIrri(18.5);
          2004-01-11  [DripIrrigator].Script.applyDripIrri(18.5);
          2004-01-14  [DripIrrigator].Script.applyDripIrri(18.5);
          2004-01-21  [DripIrrigator].Script.applyDripIrri(18.5);
          2004-01-25  [DripIrrigator].Script.applyDripIrri(18.5);
          2004-02-03  [DripIrrigator].Script.applyDripIrri(18.5);
          2004-02-16  [DripIrrigator].Script.applyDripIrri(18.5);
          2004-03-01  [DripIrrigator].Script.applyDripIrri(18.5);
          2004-03-04  [DripIrrigator].Script.applyDripIrri(18.5);
          2004-03-22  [DripIrrigator].Script.applyDripIrri(18.5);
          2004-10-06  [DripIrrigator].Script.applyDripIrri(10);
          2004-10-13  [DripIrrigator].Script.applyDripIrri(10);
          2004-11-03  [DripIrrigator].Script.applyDripIrri(10);
          2004-11-16  [DripIrrigator].Script.applyDripIrri(10);
          2004-11-22  [DripIrrigator].Script.applyDripIrri(10);
          2004-12-01  [DripIrrigator].Script.applyDripIrri(10);
          2004-12-20  [DripIrrigator].Script.applyDripIrri(10);
          2004-12-28  [DripIrrigator].Script.applyDripIrri(10);
          2005-01-04  [DripIrrigator].Script.applyDripIrri(10);
          2005-01-07  [DripIrrigator].Script.applyDripIrri(10);
          2005-01-11  [DripIrrigator].Script.applyDripIrri(10);
          2005-01-17  [DripIrrigator].Script.applyDripIrri(10);
          2005-01-27  [DripIrrigator].Script.applyDripIrri(10);
          2005-02-04  [DripIrrigator].Script.applyDripIrri(10);
          2005-02-15  [DripIrrigator].Script.applyDripIrri(10);
          2005-02-22  [DripIrrigator].Script.applyDripIrri(10);
          2005-03-03  [DripIrrigator].Script.applyDripIrri(10);
          2005-03-08  [DripIrrigator].Script.applyDripIrri(10);
          2005-03-11  [DripIrrigator].Script.applyDripIrri(10);
          2005-03-18  [DripIrrigator].Script.applyDripIrri(10);
          2005-03-22  [DripIrrigator].Script.applyDripIrri(10);
          2005-03-31  [DripIrrigator].Script.applyDripIrri(10);
        Operations 60
          2001-10-25  [DripIrrigator].Script.applyDripIrri(6.2);
          2001-10-26  [DripIrrigator].Script.applyDripIrri(6.2);
          2001-11-01  [DripIrrigator].Script.applyDripIrri(6.2);
          2001-11-04  [DripIrrigator].Script.applyDripIrri(6.2);
          2001-11-11  [DripIrrigator].Script.applyDripIrri(6.2);
          2001-11-15  [DripIrrigator].Script.applyDripIrri(6.2);
          2001-11-25  [DripIrrigator].Script.applyDripIrri(6.2);
          2001-12-02  [DripIrrigator].Script.applyDripIrri(6.2);
          2001-12-10  [DripIrrigator].Script.applyDripIrri(6.2);
          2001-12-12  [DripIrrigator].Script.applyDripIrri(6.2);
          2001-12-18  [DripIrrigator].Script.applyDripIrri(6.2);
          2001-12-23  [DripIrrigator].Script.applyDripIrri(6.2);
          2002-01-01  [DripIrrigator].Script.applyDripIrri(6.2);
          2002-01-10  [DripIrrigator].Script.applyDripIrri(6.2);
          2002-01-13  [DripIrrigator].Script.applyDripIrri(6.2);
          2002-01-22  [DripIrrigator].Script.applyDripIrri(6.2);
          2002-01-27  [DripIrrigator].Script.applyDripIrri(6.2);
          2002-01-29  [DripIrrigator].Script.applyDripIrri(6.2);
          2002-02-14  [DripIrrigator].Script.applyDripIrri(6.2);
          2002-02-17  [DripIrrigator].Script.applyDripIrri(6.2);
          2002-02-19  [DripIrrigator].Script.applyDripIrri(6.2);
          2002-02-21  [DripIrrigator].Script.applyDripIrri(6.2);
          2002-02-25  [DripIrrigator].Script.applyDripIrri(6.2);
          2002-02-26  [DripIrrigator].Script.applyDripIrri(6.2);
          2002-03-03  [DripIrrigator].Script.applyDripIrri(6.2);
          2002-03-05  [DripIrrigator].Script.applyDripIrri(6.2);
          2002-03-07  [DripIrrigator].Script.applyDripIrri(6.2);
          2002-03-10  [DripIrrigator].Script.applyDripIrri(6.2);
          2002-03-12  [DripIrrigator].Script.applyDripIrri(6.2);
          2002-03-19  [DripIrrigator].Script.applyDripIrri(6.2);
          2002-03-24  [DripIrrigator].Script.applyDripIrri(6.2);
          2002-03-26  [DripIrrigator].Script.applyDripIrri(6.2);
          2002-10-05  [DripIrrigator].Script.applyDripIrri(8.7);
          2002-10-08  [DripIrrigator].Script.applyDripIrri(8.7);
          2002-10-10  [DripIrrigator].Script.applyDripIrri(8.7);
          2002-10-12  [DripIrrigator].Script.applyDripIrri(8.7);
          2002-10-23  [DripIrrigator].Script.applyDripIrri(8.7);
          2002-10-26  [DripIrrigator].Script.applyDripIrri(8.7);
          2002-10-28  [DripIrrigator].Script.applyDripIrri(8.7);
          2002-11-05  [DripIrrigator].Script.applyDripIrri(8.7);
          2002-11-08  [DripIrrigator].Script.applyDripIrri(8.7);
          2002-11-11  [DripIrrigator].Script.applyDripIrri(8.7);
          2002-11-18  [DripIrrigator].Script.applyDripIrri(8.7);
          2002-11-20  [DripIrrigator].Script.applyDripIrri(8.7);
          2002-11-23  [DripIrrigator].Script.applyDripIrri(8.7);
          2002-11-25  [DripIrrigator].Script.applyDripIrri(8.7);
          2002-11-29  [DripIrrigator].Script.applyDripIrri(8.7);
          2002-12-04  [DripIrrigator].Script.applyDripIrri(8.7);
          2002-12-09  [DripIrrigator].Script.applyDripIrri(8.7);
          2002-12-11  [DripIrrigator].Script.applyDripIrri(8.7);
          2002-12-19  [DripIrrigator].Script.applyDripIrri(8.7);
          2002-12-27  [DripIrrigator].Script.applyDripIrri(8.7);
          2002-12-31  [DripIrrigator].Script.applyDripIrri(8.7);
          2003-01-08  [DripIrrigator].Script.applyDripIrri(8.7);
          2003-01-09  [DripIrrigator].Script.applyDripIrri(8.7);
          2003-01-11  [DripIrrigator].Script.applyDripIrri(8.7);
          2003-01-15  [DripIrrigator].Script.applyDripIrri(8.7);
          2003-01-18  [DripIrrigator].Script.applyDripIrri(8.7);
          2003-01-23  [DripIrrigator].Script.applyDripIrri(8.7);
          2003-01-30  [DripIrrigator].Script.applyDripIrri(8.7);
          2003-02-05  [DripIrrigator].Script.applyDripIrri(8.7);
          2003-02-07  [DripIrrigator].Script.applyDripIrri(8.7);
          2003-02-09  [DripIrrigator].Script.applyDripIrri(8.7);
          2003-02-15  [DripIrrigator].Script.applyDripIrri(8.7);
          2003-02-18  [DripIrrigator].Script.applyDripIrri(8.7);
          2003-02-20  [DripIrrigator].Script.applyDripIrri(8.7);
          2003-02-23  [DripIrrigator].Script.applyDripIrri(8.7);
          2003-02-26  [DripIrrigator].Script.applyDripIrri(8.7);
          2003-03-01  [DripIrrigator].Script.applyDripIrri(8.7);
          2003-03-04  [DripIrrigator].Script.applyDripIrri(8.7);
          2003-03-06  [DripIrrigator].Script.applyDripIrri(8.7);
          2003-03-08  [DripIrrigator].Script.applyDripIrri(8.7);
          2003-03-13  [DripIrrigator].Script.applyDripIrri(8.7);
          2003-03-16  [DripIrrigator].Script.applyDripIrri(8.7);
          2003-03-18  [DripIrrigator].Script.applyDripIrri(8.7);
          2003-03-24  [DripIrrigator].Script.applyDripIrri(8.7);
          2003-10-01  [DripIrrigator].Script.applyDripIrri(15.8);
          2003-10-07  [DripIrrigator].Script.applyDripIrri(15.8);
          2003-10-14  [DripIrrigator].Script.applyDripIrri(15.8);
          2003-10-23  [DripIrrigator].Script.applyDripIrri(15.8);
          2003-11-03  [DripIrrigator].Script.applyDripIrri(15.8);
          2003-11-20  [DripIrrigator].Script.applyDripIrri(15.8);
          2003-12-11  [DripIrrigator].Script.applyDripIrri(15.8);
          2003-12-15  [DripIrrigator].Script.applyDripIrri(15.8);
          2003-12-18  [DripIrrigator].Script.applyDripIrri(15.8);
          2003-12-23  [DripIrrigator].Script.applyDripIrri(15.8);
          2003-12-30  [DripIrrigator].Script.applyDripIrri(15.8);
          2004-01-11  [DripIrrigator].Script.applyDripIrri(15.8);
          2004-01-14  [DripIrrigator].Script.applyDripIrri(15.8);
          2004-01-21  [DripIrrigator].Script.applyDripIrri(15.8);
          2004-01-25  [DripIrrigator].Script.applyDripIrri(15.8);
          2004-02-03  [DripIrrigator].Script.applyDripIrri(15.8);
          2004-02-16  [DripIrrigator].Script.applyDripIrri(15.8);
          2004-03-01  [DripIrrigator].Script.applyDripIrri(15.8);
          2004-03-04  [DripIrrigator].Script.applyDripIrri(15.8);
          2004-03-22  [DripIrrigator].Script.applyDripIrri(15.8);
          2004-10-06  [DripIrrigator].Script.applyDripIrri(8.6);
          2004-10-13  [DripIrrigator].Script.applyDripIrri(8.6);
          2004-11-03  [DripIrrigator].Script.applyDripIrri(8.6);
          2004-11-16  [DripIrrigator].Script.applyDripIrri(8.6);
          2004-11-22  [DripIrrigator].Script.applyDripIrri(8.6);
          2004-12-01  [DripIrrigator].Script.applyDripIrri(8.6);
          2004-12-20  [DripIrrigator].Script.applyDripIrri(8.6);
          2004-12-28  [DripIrrigator].Script.applyDripIrri(8.6);
          2005-01-04  [DripIrrigator].Script.applyDripIrri(8.6);
          2005-01-07  [DripIrrigator].Script.applyDripIrri(8.6);
          2005-01-11  [DripIrrigator].Script.applyDripIrri(8.6);
          2005-01-17  [DripIrrigator].Script.applyDripIrri(8.6);
          2005-01-27  [DripIrrigator].Script.applyDripIrri(8.6);
          2005-02-04  [DripIrrigator].Script.applyDripIrri(8.6);
          2005-02-15  [DripIrrigator].Script.applyDripIrri(8.6);
          2005-02-22  [DripIrrigator].Script.applyDripIrri(8.6);
          2005-03-03  [DripIrrigator].Script.applyDripIrri(8.6);
          2005-03-08  [DripIrrigator].Script.applyDripIrri(8.6);
          2005-03-11  [DripIrrigator].Script.applyDripIrri(8.6);
          2005-03-18  [DripIrrigator].Script.applyDripIrri(8.6);
          2005-03-22  [DripIrrigator].Script.applyDripIrri(8.6);
          2005-03-31  [DripIrrigator].Script.applyDripIrri(8.6);
        Operations 40
          2001-10-25  [DripIrrigator].Script.applyDripIrri(4.2);
          2001-10-26  [DripIrrigator].Script.applyDripIrri(4.2);
          2001-11-01  [DripIrrigator].Script.applyDripIrri(4.2);
          2001-11-04  [DripIrrigator].Script.applyDripIrri(4.2);
          2001-11-11  [DripIrrigator].Script.applyDripIrri(4.2);
          2001-11-15  [DripIrrigator].Script.applyDripIrri(4.2);
          2001-11-25  [DripIrrigator].Script.applyDripIrri(4.2);
          2001-12-02  [DripIrrigator].Script.applyDripIrri(4.2);
          2001-12-10  [DripIrrigator].Script.applyDripIrri(4.2);
          2001-12-12  [DripIrrigator].Script.applyDripIrri(4.2);
          2001-12-18  [DripIrrigator].Script.applyDripIrri(4.2);
          2001-12-23  [DripIrrigator].Script.applyDripIrri(4.2);
          2002-01-01  [DripIrrigator].Script.applyDripIrri(4.2);
          2002-01-10  [DripIrrigator].Script.applyDripIrri(4.2);
          2002-01-13  [DripIrrigator].Script.applyDripIrri(4.2);
          2002-01-22  [DripIrrigator].Script.applyDripIrri(4.2);
          2002-01-27  [DripIrrigator].Script.applyDripIrri(4.2);
          2002-01-29  [DripIrrigator].Script.applyDripIrri(4.2);
          2002-02-14  [DripIrrigator].Script.applyDripIrri(4.2);
          2002-02-17  [DripIrrigator].Script.applyDripIrri(4.2);
          2002-02-19  [DripIrrigator].Script.applyDripIrri(4.2);
          2002-02-21  [DripIrrigator].Script.applyDripIrri(4.2);
          2002-02-25  [DripIrrigator].Script.applyDripIrri(4.2);
          2002-02-26  [DripIrrigator].Script.applyDripIrri(4.2);
          2002-03-03  [DripIrrigator].Script.applyDripIrri(4.2);
          2002-03-05  [DripIrrigator].Script.applyDripIrri(4.2);
          2002-03-07  [DripIrrigator].Script.applyDripIrri(4.2);
          2002-03-10  [DripIrrigator].Script.applyDripIrri(4.2);
          2002-03-12  [DripIrrigator].Script.applyDripIrri(4.2);
          2002-03-19  [DripIrrigator].Script.applyDripIrri(4.2);
          2002-03-24  [DripIrrigator].Script.applyDripIrri(4.2);
          2002-03-26  [DripIrrigator].Script.applyDripIrri(4.2);
          2002-10-05  [DripIrrigator].Script.applyDripIrri(5.8);
          2002-10-08  [DripIrrigator].Script.applyDripIrri(5.8);
          2002-10-10  [DripIrrigator].Script.applyDripIrri(5.8);
          2002-10-12  [DripIrrigator].Script.applyDripIrri(5.8);
          2002-10-23  [DripIrrigator].Script.applyDripIrri(5.8);
          2002-10-26  [DripIrrigator].Script.applyDripIrri(5.8);
          2002-10-28  [DripIrrigator].Script.applyDripIrri(5.8);
          2002-11-05  [DripIrrigator].Script.applyDripIrri(5.8);
          2002-11-08  [DripIrrigator].Script.applyDripIrri(5.8);
          2002-11-11  [DripIrrigator].Script.applyDripIrri(5.8);
          2002-11-18  [DripIrrigator].Script.applyDripIrri(5.8);
          2002-11-20  [DripIrrigator].Script.applyDripIrri(5.8);
          2002-11-23  [DripIrrigator].Script.applyDripIrri(5.8);
          2002-11-25  [DripIrrigator].Script.applyDripIrri(5.8);
          2002-11-29  [DripIrrigator].Script.applyDripIrri(5.8);
          2002-12-04  [DripIrrigator].Script.applyDripIrri(5.8);
          2002-12-09  [DripIrrigator].Script.applyDripIrri(5.8);
          2002-12-11  [DripIrrigator].Script.applyDripIrri(5.8);
          2002-12-19  [DripIrrigator].Script.applyDripIrri(5.8);
          2002-12-27  [DripIrrigator].Script.applyDripIrri(5.8);
          2002-12-31  [DripIrrigator].Script.applyDripIrri(5.8);
          2003-01-08  [DripIrrigator].Script.applyDripIrri(5.8);
          2003-01-09  [DripIrrigator].Script.applyDripIrri(5.8);
          2003-01-11  [DripIrrigator].Script.applyDripIrri(5.8);
          2003-01-15  [DripIrrigator].Script.applyDripIrri(5.8);
          2003-01-18  [DripIrrigator].Script.applyDripIrri(5.8);
          2003-01-23  [DripIrrigator].Script.applyDripIrri(5.8);
          2003-01-30  [DripIrrigator].Script.applyDripIrri(5.8);
          2003-02-05  [DripIrrigator].Script.applyDripIrri(5.8);
          2003-02-07  [DripIrrigator].Script.applyDripIrri(5.8);
          2003-02-09  [DripIrrigator].Script.applyDripIrri(5.8);
          2003-02-15  [DripIrrigator].Script.applyDripIrri(5.8);
          2003-02-18  [DripIrrigator].Script.applyDripIrri(5.8);
          2003-02-20  [DripIrrigator].Script.applyDripIrri(5.8);
          2003-02-23  [DripIrrigator].Script.applyDripIrri(5.8);
          2003-02-26  [DripIrrigator].Script.applyDripIrri(5.8);
          2003-03-01  [DripIrrigator].Script.applyDripIrri(5.8);
          2003-03-04  [DripIrrigator].Script.applyDripIrri(5.8);
          2003-03-06  [DripIrrigator].Script.applyDripIrri(5.8);
          2003-03-08  [DripIrrigator].Script.applyDripIrri(5.8);
          2003-03-13  [DripIrrigator].Script.applyDripIrri(5.8);
          2003-03-16  [DripIrrigator].Script.applyDripIrri(5.8);
          2003-03-18  [DripIrrigator].Script.applyDripIrri(5.8);
          2003-03-24  [DripIrrigator].Script.applyDripIrri(5.8);
          2003-10-01  [DripIrrigator].Script.applyDripIrri(10.6);
          2003-10-07  [DripIrrigator].Script.applyDripIrri(10.6);
          2003-10-14  [DripIrrigator].Script.applyDripIrri(10.6);
          2003-10-23  [DripIrrigator].Script.applyDripIrri(10.6);
          2003-11-03  [DripIrrigator].Script.applyDripIrri(10.6);
          2003-11-20  [DripIrrigator].Script.applyDripIrri(10.6);
          2003-12-11  [DripIrrigator].Script.applyDripIrri(10.6);
          2003-12-15  [DripIrrigator].Script.applyDripIrri(10.6);
          2003-12-18  [DripIrrigator].Script.applyDripIrri(10.6);
          2003-12-23  [DripIrrigator].Script.applyDripIrri(10.6);
          2003-12-30  [DripIrrigator].Script.applyDripIrri(10.6);
          2004-01-11  [DripIrrigator].Script.applyDripIrri(10.6);
          2004-01-14  [DripIrrigator].Script.applyDripIrri(10.6);
          2004-01-21  [DripIrrigator].Script.applyDripIrri(10.6);
          2004-01-25  [DripIrrigator].Script.applyDripIrri(10.6);
          2004-02-03  [DripIrrigator].Script.applyDripIrri(10.6);
          2004-02-16  [DripIrrigator].Script.applyDripIrri(10.6);
          2004-03-01  [DripIrrigator].Script.applyDripIrri(10.6);
          2004-03-04  [DripIrrigator].Script.applyDripIrri(10.6);
          2004-03-22  [DripIrrigator].Script.applyDripIrri(10.6);
          2004-10-06  [DripIrrigator].Script.applyDripIrri(5.7);
          2004-10-13  [DripIrrigator].Script.applyDripIrri(5.7);
          2004-11-03  [DripIrrigator].Script.applyDripIrri(5.7);
          2004-11-16  [DripIrrigator].Script.applyDripIrri(5.7);
          2004-11-22  [DripIrrigator].Script.applyDripIrri(5.7);
          2004-12-01  [DripIrrigator].Script.applyDripIrri(5.7);
          2004-12-20  [DripIrrigator].Script.applyDripIrri(5.7);
          2004-12-28  [DripIrrigator].Script.applyDripIrri(5.7);
          2005-01-04  [DripIrrigator].Script.applyDripIrri(5.7);
          2005-01-07  [DripIrrigator].Script.applyDripIrri(5.7);
          2005-01-11  [DripIrrigator].Script.applyDripIrri(5.7);
          2005-01-17  [DripIrrigator].Script.applyDripIrri(5.7);
          2005-01-27  [DripIrrigator].Script.applyDripIrri(5.7);
          2005-02-04  [DripIrrigator].Script.applyDripIrri(5.7);
          2005-02-15  [DripIrrigator].Script.applyDripIrri(5.7);
          2005-02-22  [DripIrrigator].Script.applyDripIrri(5.7);
          2005-03-03  [DripIrrigator].Script.applyDripIrri(5.7);
          2005-03-08  [DripIrrigator].Script.applyDripIrri(5.7);
          2005-03-11  [DripIrrigator].Script.applyDripIrri(5.7);
          2005-03-18  [DripIrrigator].Script.applyDripIrri(5.7);
          2005-03-22  [DripIrrigator].Script.applyDripIrri(5.7);
          2005-03-31  [DripIrrigator].Script.applyDripIrri(5.7);
        Operations 20
          2001-10-25  [DripIrrigator].Script.applyDripIrri(2.1);
          2001-10-26  [DripIrrigator].Script.applyDripIrri(2.1);
          2001-11-01  [DripIrrigator].Script.applyDripIrri(2.1);
          2001-11-04  [DripIrrigator].Script.applyDripIrri(2.1);
          2001-11-11  [DripIrrigator].Script.applyDripIrri(2.1);
          2001-11-15  [DripIrrigator].Script.applyDripIrri(2.1);
          2001-11-25  [DripIrrigator].Script.applyDripIrri(2.1);
          2001-12-02  [DripIrrigator].Script.applyDripIrri(2.1);
          2001-12-10  [DripIrrigator].Script.applyDripIrri(2.1);
          2001-12-12  [DripIrrigator].Script.applyDripIrri(2.1);
          2001-12-18  [DripIrrigator].Script.applyDripIrri(2.1);
          2001-12-23  [DripIrrigator].Script.applyDripIrri(2.1);
          2002-01-01  [DripIrrigator].Script.applyDripIrri(2.1);
          2002-01-10  [DripIrrigator].Script.applyDripIrri(2.1);
          2002-01-13  [DripIrrigator].Script.applyDripIrri(2.1);
          2002-01-22  [DripIrrigator].Script.applyDripIrri(2.1);
          2002-01-27  [DripIrrigator].Script.applyDripIrri(2.1);
          2002-01-29  [DripIrrigator].Script.applyDripIrri(2.1);
          2002-02-14  [DripIrrigator].Script.applyDripIrri(2.1);
          2002-02-17  [DripIrrigator].Script.applyDripIrri(2.1);
          2002-02-19  [DripIrrigator].Script.applyDripIrri(2.1);
          2002-02-21  [DripIrrigator].Script.applyDripIrri(2.1);
          2002-02-25  [DripIrrigator].Script.applyDripIrri(2.1);
          2002-02-26  [DripIrrigator].Script.applyDripIrri(2.1);
          2002-03-03  [DripIrrigator].Script.applyDripIrri(2.1);
          2002-03-05  [DripIrrigator].Script.applyDripIrri(2.1);
          2002-03-07  [DripIrrigator].Script.applyDripIrri(2.1);
          2002-03-10  [DripIrrigator].Script.applyDripIrri(2.1);
          2002-03-12  [DripIrrigator].Script.applyDripIrri(2.1);
          2002-03-19  [DripIrrigator].Script.applyDripIrri(2.1);
          2002-03-24  [DripIrrigator].Script.applyDripIrri(2.1);
          2002-03-26  [DripIrrigator].Script.applyDripIrri(2.1);
          2002-10-05  [DripIrrigator].Script.applyDripIrri(2.9);
          2002-10-08  [DripIrrigator].Script.applyDripIrri(2.9);
          2002-10-10  [DripIrrigator].Script.applyDripIrri(2.9);
          2002-10-12  [DripIrrigator].Script.applyDripIrri(2.9);
          2002-10-23  [DripIrrigator].Script.applyDripIrri(2.9);
          2002-10-26  [DripIrrigator].Script.applyDripIrri(2.9);
          2002-10-28  [DripIrrigator].Script.applyDripIrri(2.9);
          2002-11-05  [DripIrrigator].Script.applyDripIrri(2.9);
          2002-11-08  [DripIrrigator].Script.applyDripIrri(2.9);
          2002-11-11  [DripIrrigator].Script.applyDripIrri(2.9);
          2002-11-18  [DripIrrigator].Script.applyDripIrri(2.9);
          2002-11-20  [DripIrrigator].Script.applyDripIrri(2.9);
          2002-11-23  [DripIrrigator].Script.applyDripIrri(2.9);
          2002-11-25  [DripIrrigator].Script.applyDripIrri(2.9);
          2002-11-29  [DripIrrigator].Script.applyDripIrri(2.9);
          2002-12-04  [DripIrrigator].Script.applyDripIrri(2.9);
          2002-12-09  [DripIrrigator].Script.applyDripIrri(2.9);
          2002-12-11  [DripIrrigator].Script.applyDripIrri(2.9);
          2002-12-19  [DripIrrigator].Script.applyDripIrri(2.9);
          2002-12-27  [DripIrrigator].Script.applyDripIrri(2.9);
          2002-12-31  [DripIrrigator].Script.applyDripIrri(2.9);
          2003-01-08  [DripIrrigator].Script.applyDripIrri(2.9);
          2003-01-09  [DripIrrigator].Script.applyDripIrri(2.9);
          2003-01-11  [DripIrrigator].Script.applyDripIrri(2.9);
          2003-01-15  [DripIrrigator].Script.applyDripIrri(2.9);
          2003-01-18  [DripIrrigator].Script.applyDripIrri(2.9);
          2003-01-23  [DripIrrigator].Script.applyDripIrri(2.9);
          2003-01-30  [DripIrrigator].Script.applyDripIrri(2.9);
          2003-02-05  [DripIrrigator].Script.applyDripIrri(2.9);
          2003-02-07  [DripIrrigator].Script.applyDripIrri(2.9);
          2003-02-09  [DripIrrigator].Script.applyDripIrri(2.9);
          2003-02-15  [DripIrrigator].Script.applyDripIrri(2.9);
          2003-02-18  [DripIrrigator].Script.applyDripIrri(2.9);
          2003-02-20  [DripIrrigator].Script.applyDripIrri(2.9);
          2003-02-23  [DripIrrigator].Script.applyDripIrri(2.9);
          2003-02-26  [DripIrrigator].Script.applyDripIrri(2.9);
          2003-03-01  [DripIrrigator].Script.applyDripIrri(2.9);
          2003-03-04  [DripIrrigator].Script.applyDripIrri(2.9);
          2003-03-06  [DripIrrigator].Script.applyDripIrri(2.9);
          2003-03-08  [DripIrrigator].Script.applyDripIrri(2.9);
          2003-03-13  [DripIrrigator].Script.applyDripIrri(2.9);
          2003-03-16  [DripIrrigator].Script.applyDripIrri(2.9);
          2003-03-18  [DripIrrigator].Script.applyDripIrri(2.9);
          2003-03-24  [DripIrrigator].Script.applyDripIrri(2.9);
          2003-10-01  [DripIrrigator].Script.applyDripIrri(5.3);
          2003-10-07  [DripIrrigator].Script.applyDripIrri(5.3);
          2003-10-14  [DripIrrigator].Script.applyDripIrri(5.3);
          2003-10-23  [DripIrrigator].Script.applyDripIrri(5.3);
          2003-11-03  [DripIrrigator].Script.applyDripIrri(5.3);
          2003-11-20  [DripIrrigator].Script.applyDripIrri(5.3);
          2003-12-11  [DripIrrigator].Script.applyDripIrri(5.3);
          2003-12-15  [DripIrrigator].Script.applyDripIrri(5.3);
          2003-12-18  [DripIrrigator].Script.applyDripIrri(5.3);
          2003-12-23  [DripIrrigator].Script.applyDripIrri(5.3);
          2003-12-30  [DripIrrigator].Script.applyDripIrri(5.3);
          2004-01-11  [DripIrrigator].Script.applyDripIrri(5.3);
          2004-01-14  [DripIrrigator].Script.applyDripIrri(5.3);
          2004-01-21  [DripIrrigator].Script.applyDripIrri(5.3);
          2004-01-25  [DripIrrigator].Script.applyDripIrri(5.3);
          2004-02-03  [DripIrrigator].Script.applyDripIrri(5.3);
          2004-02-16  [DripIrrigator].Script.applyDripIrri(5.3);
          2004-03-01  [DripIrrigator].Script.applyDripIrri(5.3);
          2004-03-04  [DripIrrigator].Script.applyDripIrri(5.3);
          2004-03-22  [DripIrrigator].Script.applyDripIrri(5.3);
          2004-10-06  [DripIrrigator].Script.applyDripIrri(2.9);
          2004-10-13  [DripIrrigator].Script.applyDripIrri(2.9);
          2004-11-03  [DripIrrigator].Script.applyDripIrri(2.9);
          2004-11-16  [DripIrrigator].Script.applyDripIrri(2.9);
          2004-11-22  [DripIrrigator].Script.applyDripIrri(2.9);
          2004-12-01  [DripIrrigator].Script.applyDripIrri(2.9);
          2004-12-20  [DripIrrigator].Script.applyDripIrri(2.9);
          2004-12-28  [DripIrrigator].Script.applyDripIrri(2.9);
          2005-01-04  [DripIrrigator].Script.applyDripIrri(2.9);
          2005-01-07  [DripIrrigator].Script.applyDripIrri(2.9);
          2005-01-11  [DripIrrigator].Script.applyDripIrri(2.9);
          2005-01-17  [DripIrrigator].Script.applyDripIrri(2.9);
          2005-01-27  [DripIrrigator].Script.applyDripIrri(2.9);
          2005-02-04  [DripIrrigator].Script.applyDripIrri(2.9);
          2005-02-15  [DripIrrigator].Script.applyDripIrri(2.9);
          2005-02-22  [DripIrrigator].Script.applyDripIrri(2.9);
          2005-03-03  [DripIrrigator].Script.applyDripIrri(2.9);
          2005-03-08  [DripIrrigator].Script.applyDripIrri(2.9);
          2005-03-11  [DripIrrigator].Script.applyDripIrri(2.9);
          2005-03-18  [DripIrrigator].Script.applyDripIrri(2.9);
          2005-03-22  [DripIrrigator].Script.applyDripIrri(2.9);
          2005-03-31  [DripIrrigator].Script.applyDripIrri(2.9);
    Simulation Squire
      Clock: StartDate=2001-07-01; EndDate=2005-07-01
      Summary SummaryFile
      Weather: FileName=Site1004_RPC.met
      MicroClimate: a_interception=0; b_interception=1; c_interception=0; d_interception=0; soil_albedo=0.3; SoilHeatFluxFraction=0.4; NightInterceptionFraction=0.5; ReferenceHeight=2
      SoilArbitrator Soil Arbitrator
      RectangularZone Row: Length=100; Width=0.6; Slope=0
        Report: EventNames=[Clock].DoReport
          VariableNames:
            [Clock].Today
            [SimpleFruitTree].Leaf.Height as height
            [SimpleFruitTree].Leaf.LAI as lai
            ([SimpleFruitTree].Leaf.RadIntTot) / ([Weather].Radn)*(0.6/2.4) as f.rad.int
            [SimpleFruitTree].Leaf.Transpiration * 0.6/2.4 as transpiration
            sum([Soil].SoilWater.SWmm[1:5]) as psw
            [Soil].OutputLayers.SW
            [SimpleFruitTree].Root.Depth as rootDepth
            [DripIrrigator].Script.totalIrrigation as Irrig
            sum of [Soil].SoilWater.Flux[7] from 2001-07-01 to 2005-07-01 as drainage
        SurfaceOrganicMatter: InitialResidueName=wheat_stubble; InitialResidueType=wheat; InitialResidueMass=500; InitialStandingFraction=0; InitialCPR=0; InitialCNR=100; FractionFaecesAdded=0.5
        Plant SimpleFruitTree: CropType=Slurp; IsEnding=false; DaysAfterEnding=0
        Fertiliser
        Irrigation
        Manager TreeInitialisation
          CultivarName = Grape_4Cane
          SowingDate = 2001-07-01
          StartAge = 9
          script: same as in Peach.Row.TreeInitialisation
        Manager SetupTreeRootZones: same as Peach.Row.SetupTreeRootZones
        Manager DripIrrigator
          totalIrrigation = 0
```csharp
using System;
using Models.Core;
using System.Collections.Generic;
using System.Text;
using Models.Soils;
using Models.PMF;
using Models;
using System.Xml.Serialization;
using APSIM.Shared.Utilities;

namespace Models
{
    [Serializable] 
    public class Script : Model
    {
       [Link] Irrigation irrigation;
        public void applyDripIrri(double amount)
        {
        	double layerAmount = amount/3;
        	irrigation.Apply(layerAmount, 0);
        	irrigation.Apply(layerAmount, 220);
        	irrigation.Apply(layerAmount, 420);

        }
        public double totalIrrigation {get; set;}
        [EventSubscribe("Irrigated")]
        private void OnIrrigated(object sender, 
        IrrigationApplicationType irrigData)
        {
        	totalIrrigation += irrigData.Amount;
         }
    }
}
```
        Operations VineIrrigation
        Soil: Latitude=0; Longitude=0
          LayerStructure: Thickness=[200, 200, 200, 200, 200, 200, 400, 400, 400, 600]
          Analysis: same as Vineyard.Vines.Soil.Analysis
          InitialWater Initial water: PercentMethod=1; FractionFull=1; RelativeTo=LL15
          Water
            Thickness  BD    AirDry  LL15  DUL   SAT
            450        1.35  0.1     0.2   0.35  0.45
            300        1.4   0.15    0.15  0.35  0.4
            150        1.4   0.13    0.13  0.33  0.35
            150        1.4   0.1     0.1   0.28  0.35
            1950       1.59  0.06    0.06  0.15  0.3
            SoilCrop SimpleFruitTreeSoil: LL=[0.2, 0.15, 0.13, 0.1, 0.06]; KL=[0.15, 0.1, 0.07, 0.07, 0.01]; XF=[1, 1, 1, 1, 1]
            SoilCrop SlurpSoil: LL=[0.2, 0.15, 0.13, 0.1, 0.06]; KL=[0.1, 0.04, 0.01, 0, 0]; XF=[1, 1, 1, 1, 1]
          SoilWater: same as Vineyard.Vines.Soil.SoilWater
          SoilNitrogen: same as Vineyard.Vines.Soil.SoilNitrogen
          SoilOrganicMatter: same as Vineyard.Vines.Soil.SoilOrganicMatter
          Sample Initial nitrogen: NO3Units=kg/ha; NH4Units=ppm; SWUnits=Volumetric; OCUnits=Total; PHUnits=Water
            Thickness  NO3  NH4
            100        217  0
            200        30   0
            300        5    0
            300        5    0
            300        0    0
            300        0    0
          CERESSoilTemperature
          OutputLayers: Thickness=[150, 150, 150, 150, 150, 150, 150]
        Operations WinterRainfall
          2002-05-28  [Irrigation].Apply(200);
        Manager ChangeSoilProperty
          RelocationDate = 0001-01-01
```csharp
using System;
using Models.Core;
using System.Collections.Generic;
using System.Text;
using Models.Soils;
using Models.PMF;
using Models;
using System.Xml.Serialization;
using APSIM.Shared.Utilities;

namespace Models
{
    [Serializable] 
    public class Script : Model
    {
    	[Link] Clock clock;
    	[Link] Soil soil;

   		[Description("Relocation date")]
   		public DateTime RelocationDate {get; set;}

   		[EventSubscribe("StartOfDay")]
        private void OnStartOfDay(object sender, EventArgs e)
        {
        	if(clock.Today.Date == RelocationDate) 
        	{
        		soil.DUL[0] = 0.28;
        		soil.DUL[1] = 0.28;
        		soil.DUL[2] = 0.28;
        		soil.DUL[3] = 0.28;
        		soil.DUL[4] = 0.28;

        		soil.LL15[0] = 0.12;
        		soil.LL15[1] = 0.1;
        		soil.LL15[2] = 0.1;
        		soil.LL15[3] = 0.1;
        		soil.LL15[4] = 0.08;

        	}

         }


   		
    }
}
```
      RectangularZone Alley: Length=100; Width=1.8; Slope=0
        Report: EventNames=[Clock].DoReport
          VariableNames:
            [Clock].Today
            [Slurp].Leaf.Height as height
            [Slurp].Leaf.LAI as lai
            ([Slurp].Leaf.RadIntTot * 0.6)  / ([Weather].Radn * (2.4)) as f.rad.int
            sum([Soil].SoilWater.SWmm[1:5]) as psw
            [Soil].OutputLayers.SW
        SurfaceOrganicMatter: InitialResidueName=wheat_stubble; InitialResidueType=wheat; InitialResidueMass=500; InitialStandingFraction=0; InitialCPR=0; InitialCNR=100; FractionFaecesAdded=0.5
        Plant Slurp: CropType=Slurp; IsEnding=false; DaysAfterEnding=0
        Fertiliser
        Irrigation
        Manager PastureInitialisation
          CultivarName = StaticCrop
          InitialRootDepth = 600
          SowingDate = 2001-07-01
          RootDepth = 600
          RFV = 10
          KLReductionFactor = -0.003
          KLReductionDepth = 150
          YKLModifiers =
          XDepth =
          MaxG = 0.004
          R50 = 150
          script: same as in Vineyard.Vines.VineInitialisation
        Manager SetPastureVariables: same as Vineyard.Understory.SetPastureVariables
        Manager SetupPastureRootZones: same as Peach.Alley.SetupPastureRootZones
        Soil: Latitude=0; Longitude=0
          LayerStructure: Thickness=[200, 200, 200, 200, 200, 200, 400, 400, 400, 600]
          Analysis: same as Vineyard.Vines.Soil.Analysis
          InitialWater Initial water: PercentMethod=1; FractionFull=1.00166; RelativeTo=LL15
          Water
            Thickness  BD    AirDry  LL15  DUL   SAT
            450        1.35  0.1     0.2   0.35  0.45
            300        1.4   0.15    0.15  0.35  0.4
            150        1.4   0.13    0.13  0.33  0.35
            150        1.4   0.1     0.1   0.28  0.35
            1950       1.59  0.06    0.06  0.12  0.3
            SoilCrop SimpleFruitTreeSoil: LL=[0.2, 0.15, 0.13, 0.1, 0.06]; KL=[0.06, 0.04, 0.02, 0.02, 0.01]; XF=[1, 1, 1, 1, 1]
            SoilCrop SlurpSoil: LL=[0.2, 0.15, 0.13, 0.1, 0.06]; KL=[0.1, 0.04, 0.01, 0, 0]; XF=[1, 1, 1, 1, 1]
          SoilWater: same as Vineyard.Vines.Soil.SoilWater
          SoilNitrogen: same as Vineyard.Vines.Soil.SoilNitrogen
          SoilOrganicMatter: same as Vineyard.Vines.Soil.SoilOrganicMatter
          Sample Initial nitrogen: NO3Units=kg/ha; NH4Units=ppm; SWUnits=Volumetric; OCUnits=Total; PHUnits=Water
            Thickness  NO3  NH4
            100        217  0
            200        30   0
            300        5    0
            300        5    0
            300        0    0
            300        0    0
          CERESSoilTemperature
          OutputLayers: Thickness=[150, 150, 150, 150, 150, 150, 150]
        Operations WinterRainfall
          2002-05-28  [Irrigation].Apply(200);
  Experiment Grape_Seaview
    Factors
      Factor TrainingSystem
        Specification=[TreeInitialisation].Script.CultivarName = Grape_2Cane,Grape_4Cane
    Simulation Seaview
      Clock: StartDate=2001-07-01; EndDate=2005-07-01
      Summary SummaryFile
      Weather: FileName=Site1004_RPC.met
      MicroClimate: a_interception=0; b_interception=1; c_interception=0; d_interception=0; soil_albedo=0.3; SoilHeatFluxFraction=0.4; NightInterceptionFraction=0.5; ReferenceHeight=2
      SoilArbitrator Soil Arbitrator
      RectangularZone Row: Length=100; Width=0.6; Slope=0
        Report: EventNames=[Clock].DoReport
          VariableNames:
            [Clock].Today
            [SimpleFruitTree].Leaf.Height as height
            [SimpleFruitTree].Leaf.LAI as lai
            ([SimpleFruitTree].Leaf.RadIntTot) / ([Weather].Radn)*(0.6/2.4) as f.rad.int
            [SimpleFruitTree].Leaf.Transpiration * 0.6/2.4 as transpiration
            sum([Soil].SoilWater.SWmm[1:5]) as psw
            [Soil].OutputLayers.SW
            [SimpleFruitTree].Root.Depth as rootDepth
        Soil: Latitude=0; Longitude=0
          LayerStructure: Thickness=[200, 200, 200, 200, 200, 200, 400, 400, 400, 600]
          Analysis: same as Vineyard.Vines.Soil.Analysis
          InitialWater Initial water: PercentMethod=1; FractionFull=1
          Water
            Thickness  BD    AirDry  LL15  DUL   SAT
            300        1.35  0.125   0.25  0.42  0.45
            400        1.65  0.22    0.22  0.28  0.4
            350        1.4   0.07    0.07  0.16  0.35
            1950       2     0.06    0.06  0.12  0.4
            SoilCrop SimpleFruitTreeSoil: LL=[0.25, 0.22, 0.07, 0.06]; KL=[0.06, 0.04, 0.02, 0.01]; XF=[1, 1, 1, 1]
            SoilCrop SlurpSoil: LL=[0.25, 0.22, 0.07, 0.06]; KL=[0.1, 0.04, 0.01, 0]; XF=[1, 1, 1, 1]
          SoilWater: same as Vineyard.Vines.Soil.SoilWater
          SoilNitrogen: same as Vineyard.Vines.Soil.SoilNitrogen
          SoilOrganicMatter: same as Vineyard.Vines.Soil.SoilOrganicMatter
          Sample Initial nitrogen: NO3Units=kg/ha; NH4Units=ppm; SWUnits=Volumetric; OCUnits=Total; PHUnits=Water
            Thickness  NO3  NH4
            100        217  0
            200        30   0
            300        5    0
            300        5    0
            300        0    0
            300        0    0
          CERESSoilTemperature
          OutputLayers: Thickness=[150, 150, 150, 150, 150, 150, 150]
        SurfaceOrganicMatter: InitialResidueName=wheat_stubble; InitialResidueType=wheat; InitialResidueMass=500; InitialStandingFraction=0; InitialCPR=0; InitialCNR=100; FractionFaecesAdded=0.5
        Plant SimpleFruitTree: CropType=Slurp; IsEnding=false; DaysAfterEnding=0
        Fertiliser
        Irrigation
        Manager TreeInitialisation
          CultivarName = Grape_2Cane
          SowingDate = 2001-07-01
          StartAge = 9
          script: same as in Peach.Row.TreeInitialisation
        Manager SetupTreeRootZones: same as Peach.Row.SetupTreeRootZones
        Manager Automatic irrigation based on water deficit (disabled): same as Vineyard.Vines.Automatic irrigation based on water deficit
        Operations VineIrrigation
      RectangularZone Alley: Length=100; Width=1.8; Slope=0
        Report: same as Peach.Alley.Report
        Soil: same as Grape_Seaview.Seaview.Row.Soil
        SurfaceOrganicMatter: InitialResidueName=wheat_stubble; InitialResidueType=wheat; InitialResidueMass=500; InitialStandingFraction=0; InitialCPR=0; InitialCNR=100; FractionFaecesAdded=0.5
        Plant Slurp: CropType=Slurp; IsEnding=false; DaysAfterEnding=0
        Fertiliser
        Irrigation
        Manager PastureInitialisation: same as Grape_Squire.Squire.Alley.PastureInitialisation
        Manager SetPastureVariables: same as Vineyard.Understory.SetPastureVariables
        Manager SetupPastureRootZones: same as Peach.Alley.SetupPastureRootZones
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