Simulations: Version=168
  Memo TitlePage
    # The APSIM Pasture Model
  DataStore
  Folder Replacements
    Report DailyReport: EventNames=[Clock].DoReport
      VariableNames:
        [Clock].Today
        [Clock].Today.Year
        [Pasture].CoverTotal
        [Pasture].ShootDM
        [Pasture].Height
        [SurfaceOrganicMatter].Wt
        [Pasture].DeadDM
        [Pasture].GreenDM
        [Pasture].PotentialEP
        [Pasture].CoverGreen
        [Pasture].GAI
        [Pasture].LAI
        [Pasture].LAITotal
        [MicroClimate].PetAerodynamicTerm
        [MicroClimate].PetRadiationTerm
        [MicroClimate].PetTotal
  Folder Validation
    Memo
      A test dataset has been developed to test the APSIM Pasture model for a range of environmental (soil and climate) conditions, management options (grazing/cutting, nitrogen rates, irrigation) and regions.  These tests have been grouped by pasture species.  Graphs of model performance are provided for biomass production, canopy development, water and nitrogen uptake.
    Folder Perennial Ryegrass
  Folder Sensibility
    Experiment Rotation
      Memo
        Test that cutting and removing of pasture biomass works correctly with correct amount of DM moving to Surface Organic Matter
      Factors
        Factor Treatment: Specification=[Management]
          Operations WheatPasture
            1993-02-01  [Pasture].Kill();
            1993-02-02  [Pasture].Cut(cutHeight: 0, gathered: 0);
            1993-05-01  [Wheat].Sow(population: 120, cultivar: hartog, depth: 30, rowSpacing: 250);
            1994-05-01  [Wheat].Sow(population: 120, cultivar: hartog, depth: 30, rowSpacing: 250);
            1995-05-01  [Wheat].Sow(population: 120, cultivar: hartog, depth: 30, rowSpacing: 250);
            1996-03-01  [Pasture].Sow(400);
            1999-02-01  [Pasture].Kill();
            1999-02-02  [Pasture].Cut(cutHeight: 0, gathered: 0);
            1999-05-01  [Wheat].Sow(population: 120, cultivar: hartog, depth: 30, rowSpacing: 250);
            2000-05-01  [Wheat].Sow(population: 120, cultivar: hartog, depth: 30, rowSpacing: 250);
      Simulation RotationBase
        Weather: FileName=WaggaWagga.met
        Clock: Start=1990-01-01; End=2000-12-31
        Summary summaryfile
        SoilArbitrator Soil Arbitrator
        MicroClimate: a_interception=0; b_interception=1; c_interception=0; d_interception=0; SoilHeatFluxFraction=0.4; MinimumHeightDiffForNewLayer=0; NightInterceptionFraction=0.5; ReferenceHeight=2
        Zone Paddock: Area=1; Slope=0; AspectAngle=0; Altitude=50
          Operations Management
          Manager CutOnDate
            CuttingDates = 01-Sep
            HeightFraction = 0
            GatherFraction = 0
```csharp
using Models.Soils.Nutrients;
using APSIM.Shared.Utilities;
using Models.Surface;
using Models.Utilities;
using Models.Soils.Nutrients;
using Models.Soils;
using Models.PMF;
using Models.Core;
using System;
using System.Linq;
using Models.Interfaces;
using Models.GrazPlan;

namespace Models
{
    [Serializable]
    public class Script : Model
    {
        [Link] private Clock Clock;
        [Link] private Summary Summary;
        [Link] private Pasture pasture;
        
        [Description("Cutting Dates:")]
        public string[] CuttingDates { get; set; } 
        
        [Description("Fraction of Height to Remove):")]
        public double HeightFraction {get;set;}

        [Description("Fraction of Cut Biomass to Gather into Storage):")]
        public double GatherFraction {get;set;}

        [EventSubscribe("DoManagement")]
        private void OnDoManagement(object sender, EventArgs e)
        {
            foreach (string ddMMM in CuttingDates)
            {
                if (DateUtilities.DatesEqual(ddMMM, Clock.Today))
                   if (HeightFraction>0)
                   {
                      pasture.Cut(cutHeight: pasture.Height*HeightFraction, gathered: GatherFraction);
                      
                   }

            }
       }
    }
}
```
          Manager Fertilise at wheat sowing
            Crop = [Wheat]
            FertiliserType = UreaN
            Amount = 160
```csharp
using Models.Soils;
using System;
using System.Linq;
using Models.Core;
using Models.PMF;
namespace Models
{
    [Serializable]
    public class Script : Model
    {
        [Link] Clock Clock;
        [Link] Fertiliser Fertiliser;
        
        [Description("Crop to be fertilised")]
        public IPlant Crop { get; set; }

        [Description("Type of fertiliser to apply? ")] 
        public Fertiliser.Types FertiliserType { get; set; }
    
        [Description("Amount of fertiliser to be applied (kg/ha)")]
        public double Amount { get; set; }
        
        [EventSubscribe("Sowing")]
        private void OnSowing(object sender, EventArgs e)
        {
            Model crop = sender as Model;
            if (Crop != null && crop.Name.ToLower() == (Crop as IModel).Name.ToLower())
                Fertiliser.Apply(Amount: Amount, Type: FertiliserType);
        }
    }
}
```
          Manager Harvesting
            Crop = [Wheat]
```csharp
using APSIM.Shared.Utilities;
using Models.Utilities;
using Models.Soils;
using Models.PMF;
using Models.Core;
using System;
using System.Linq;

namespace Models
{
    [Serializable] 
    public class Script : Model
    {
        [Description("Crop")]
        public IPlant Crop { get; set; }
        
        [EventSubscribe("DoManagement")]
        private void OnDoManagement(object sender, EventArgs e)
        {
            if (Crop.IsReadyForHarvesting)
            {
                Crop.Harvest();
                Crop.EndCrop();
            }
        }
    }
}
```
          SurfaceOrganicMatter Surface Organic Matter: InitialResidueName=Barley_stubble; InitialResidueType=Barley; InitialResidueMass=0; InitialStandingFraction=0; InitialCPR=0; InitialCNR=80
          Irrigation
          Fertiliser
          Report RotationReport: EventNames=[Clock].DoReport
            VariableNames:
              [Clock].Today
              [Pasture].ShootDM/10 as PastureAboveGroundWt
              [Pasture].GLF_N
              [Pasture].GLF_SM
              [Pasture].PotentialEP
              [Pasture].WaterDemand
              sum([Pasture].SWUptake) as SWUptake
              [Wheat].AboveGround.Wt
              [Wheat].Grain.Wt
              sum([NO3].kgha) as TotalNO3
              sum([NH4].kgha) as TotalNH4
              sum([Water].MM) as TotalSW
              sum([Soil].Water.PAWmm) as TotalESW
          Plant Wheat
          Pasture: Species=Perennial RyeGrass; Nutrients=N; MaxRtDep=650; LaggedDayT=-999.9; Phenology=1.0015; FlowerLen=0; FlowerTime=0; SencIndex=0; DormIndex=0; DormT=-999.9; ExtinctCoeff=[0, 0, 0.55]; SeedDormTime=0; GermIndex=0; Albedo=0.23; Gsmax=0.011; R50=200; WaterDemand=0; LAI=0
            GreenCohortInitialise: RootWeight=[400, 400]; RootDepth=650; Status=established; LeafDMD=[0.825]; LeafWeight=[800]; LeafNConc=[0.01]; LeafSpecificArea=[430]; StemDMD=[0.825]; StemWeight=[800]; StemNConc=[0.01]; StemSpecificArea=[10]
            DryCohortInitialise: Status=Established; LeafDMD=[0.6]; LeafWeight=[500]; LeafNConc=[0]; LeafSpecificArea=[430]; StemDMD=[0.35]; StemWeight=[1500]; StemNConc=[0]; StemSpecificArea=[80]
          Soil Red Kandosol (No498-Generic): ASCOrder=Kandosol; ASCSubOrder=Red; SoilType=Other; Site=Generic-NSW; State=Generic; Country=Australia; ApsoilNumber=498-GENERIC; Latitude=-35.115549; Longitude=147.369477; LocationAccuracy=Regional Soil Type; YearOfSampling=0; DataSource=Generic soil; Comments=Generic soil developed for CSU.
            Physical
              Thickness  BD    AirDry  LL15  DUL   SAT
              100        1.48  0.055   0.11  0.29  0.35
              150        1.5   0.104   0.13  0.27  0.34
              150        1.45  0.15    0.15  0.25  0.32
              150        1.37  0.15    0.15  0.28  0.36
              150        1.43  0.15    0.15  0.29  0.35
              300        1.55  0.15    0.15  0.31  0.34
              300        1.67  0.15    0.15  0.31  0.34
              300        1.62  0.15    0.15  0.32  0.35
              BD, AirDry, LL15, DUL, SAT source: Estimated based on local knowledge
              SoilCrop wheatSoil: LL=[0.11, 0.13, 0.15, 0.17, 0.19, 0.22, 0.26, 0.28]; KL=[0.06, 0.06, 0.04, 0.04, 0.04, 0.04, 0.02, 0.02]; XF=[1, 1, 1, 0.9, 0.9, 0.9, 0.9, 0.8]
                LL source: Estimated based on local knowledge
              SoilCrop Perennial RyeGrassSoil: LL=[0.11, 0.13, 0.15, 0.17, 0.19, 0.22, 0.26, 0.28]; KL=[0.06, 0.06, 0.04, 0.04, 0.04, 0.04, 0.02, 0.02]; XF=[1, 1, 1, 0.9, 0.9, 0.9, 0.9, 0.9]
                LL source: Estimated based on local knowledge
            WaterBalance SoilWater: SummerDate=1-Nov; SummerU=6; SummerCona=3.5; WinterDate=1-Apr; WinterU=2; WinterCona=2; DiffusConst=44; DiffusSlope=16; Salb=0.13; CN2Bare=84; CNRed=20; CNCov=0.8; PSIDul=-100; Thickness=[100, 150, 150, 150, 150, 300, 300, 300]; SWCON=[0.5, 0.4, 0.3, 0.3, 0.2, 0.1, 0.1, 0.1]
            Organic: FOMCNRatio=45; CarbonUnits=WalkleyBlack
              Thickness  Carbon  SoilCNRatio  FBiom  FInert  FOM
              100        1       12.5         0.03   0.4     437.343
              150        0.5     12.5         0.02   0.6     330.124
              150        0.5     12.5         0.02   0.7     249.19
              150        0.5     12.5         0.02   0.8     188.099
              150        0.5     12.5         0.01   0.9     141.984
              300        0.5     12.5         0.01   0.9     80.9003
              300        0.5     12.5         0.01   1       46.0956
              300        0.5     12.5         0.01   1       26.2645
            Chemical: Thickness=[100, 150, 150, 150, 150, 300, 300, 300]; PH=[6, 6, 6, 6, 6, 6, 6, 6]; PHUnits=Water
              PH source: Estimated based on local knowledge
            Nutrient
            Solute NO3: Thickness=[1600]; InitialValues=[2]; InitialValuesUnits=ppm; WaterTableConcentration=0; D0=0; DepthConstant=0; MaxDepthSoluteAccessible=0; RunoffEffectivenessAtMovingSolute=0; MaxEffectiveRunoff=0
            Solute NH4: Thickness=[1600]; InitialValues=[0.1]; InitialValuesUnits=ppm; WaterTableConcentration=0; D0=0; DepthConstant=0; MaxDepthSoluteAccessible=0; RunoffEffectivenessAtMovingSolute=0; MaxEffectiveRunoff=0
            Solute Urea: Thickness=[100, 150, 150, 150, 150, 300, 300, 300]; InitialValues=[0, 0, 0, 0, 0, 0, 0, 0]; InitialValuesUnits=kg/ha; WaterTableConcentration=0; D0=0; DepthConstant=0; MaxDepthSoluteAccessible=0; RunoffEffectivenessAtMovingSolute=0; MaxEffectiveRunoff=0
            Water: Thickness=[100, 150, 150, 150, 150, 300, 300, 300]; InitialValues=[0.2, 0.2, 0.2, 0.2, 0.2, 0.2, 0.2, 0.2]; InitialPAWmm=87; RelativeTo=LL15; FilledFromTop=true
            CERESSoilTemperature
    Experiment Environment
      Factors
        Factor Location
          CompositeFactor Lincoln
            Specifications:
              [Weather]
              [Soil]
            Weather: FileName=%root%\Examples\WeatherFiles\lincoln.met
            Soil LincolnSoil: SoilType=NZ_Sedimentary; LocalName=Lismore; Site=Winchmore; NearestTown=Ashburton; Region=Canterbury; Country=New Zealand; Latitude=-48.48; Longitude=0
              Chemical: Thickness=[150, 150, 200, 150, 250, 300, 300]; PH=[6, 6, 6, 6, 6, 6, 6]; PHUnits=Water
              Physical
                Thickness  ParticleSizeClay  BD    AirDry  LL15   DUL    SAT   KS
                150        20                1.3   0.05    0.15   0.36   0.45  5000
                150        15                1.35  0.12    0.14   0.34   0.43  2500
                200        12                1     0.055   0.055  0.19   0.25  3000
                150        8                 0.53  0.015   0.015  0.065  0.15  10000
                250        6                 0.31  0.01    0.01   0.04   0.11  17500
                300        5                 0.3   0.01    0.01   0.03   0.11  20000
                300        5                 0.3   0.01    0.01   0.03   0.11  20000
                SoilCrop Perennial RyeGrassSoil: LL=[0.15, 0.14, 0.06, 0.02, 0.01, 0.01, 0.01]; KL=[0.1, 0.1, 0.08, 0.04, 0.01, 0, 0]; XF=[1, 1, 1, 1, 1, 0, 0]
              WaterBalance SoilWater: SummerDate=1-Nov; SummerU=6; SummerCona=3.5; WinterDate=1-apr; WinterU=2; WinterCona=2; DiffusConst=88; DiffusSlope=35; Salb=0.13; CN2Bare=73; CNRed=20; CNCov=0.8; DischargeWidth=0; CatchmentArea=0; PSIDul=-100
                Thickness  SWCON  KLAT
                150        0.5    0
                150        0.52   0
                200        0.55   0
                150        0.6    0
                250        0.65   0
                300        0.65   0
                300        0.65   0
              Organic: FOMCNRatio=40; CarbonUnits=Total
                Thickness  Carbon  SoilCNRatio  FBiom  FInert  FOM
                150        3       12           0.04   0.5     331.337
                150        1       12           0.02   0.7     245.461
                200        0.6     12           0.02   0.83    164.537
                150        0.4     12           0.01   0.9     121.892
                250        0.25    12           0.01   0.95    73.9313
                300        0.15    12           0      0.99    40.5743
                300        0.1     12           0      0.99    22.2677
              Water: Thickness=[150, 150, 200, 150, 250, 300, 300]; InitialValues=[0.3495, 0.33, 0.18325, 0.0625, 0.0385, 0.029, 0.029]; InitialPAWmm=109.725; RelativeTo=LL15; FilledFromTop=false
              CERESSoilTemperature Temperature
              Nutrient
              Solute NO3: Thickness=[150, 150, 200, 150, 250, 300, 300]; InitialValues=[5, 2.5, 1, 0.75, 0.5, 0.5, 0.5]; InitialValuesUnits=ppm; WaterTableConcentration=0; D0=0; DepthConstant=0; MaxDepthSoluteAccessible=0; RunoffEffectivenessAtMovingSolute=0; MaxEffectiveRunoff=0
              Solute NH4: Thickness=[150, 150, 200, 150, 250, 300, 300]; InitialValues=[0.1, 0.1, 0.1, 0.1, 0.1, 0.1, 0.1]; InitialValuesUnits=ppm; WaterTableConcentration=0; D0=0; DepthConstant=0; MaxDepthSoluteAccessible=0; RunoffEffectivenessAtMovingSolute=0; MaxEffectiveRunoff=0
              Solute Urea: Thickness=[150, 150, 200, 150, 250, 300, 300]; InitialValues=[0, 0, 0, 0, 0, 0, 0]; InitialValuesUnits=kg/ha; WaterTableConcentration=0; D0=0; DepthConstant=0; MaxDepthSoluteAccessible=0; RunoffEffectivenessAtMovingSolute=0; MaxEffectiveRunoff=0
          CompositeFactor WaggaWagga
            Specifications:
              [Weather]
              [Soil]
            Weather: FileName=WaggaWagga.met
            Soil Red Kandosol (No498-Generic): same as Sensibility.Rotation.RotationBase.Paddock.Red Kandosol (No498-Generic)
          CompositeFactor Armidale
            Specifications:
              [Weather]
              [Soil]
            Weather: FileName=Armidale.met
            Soil Red Kandosol (No498-Generic): same as Sensibility.Rotation.RotationBase.Paddock.Red Kandosol (No498-Generic)
          CompositeFactor WaggaWagga2
            Specifications:
              [Weather]
              [Soil]
            Weather: FileName=C:\Work\Repos\APSIMX\Examples\WeatherFiles\WaggaWagga.met
            Soil Red Kandosol (No498-Generic): same as Sensibility.Rotation.RotationBase.Paddock.Red Kandosol (No498-Generic)
      Simulation EnvironmentBase
        Weather: FileName=Armidale.met
        Clock: Start=1992-01-01; End=1995-12-31
        Summary summaryfile
        SoilArbitrator Soil Arbitrator
        MicroClimate: a_interception=0; b_interception=1; c_interception=0; d_interception=0; SoilHeatFluxFraction=0.4; MinimumHeightDiffForNewLayer=0; NightInterceptionFraction=0.5; ReferenceHeight=2
        Zone Paddock: Area=1; Slope=0; AspectAngle=0; Altitude=50
          Operations Management
          Manager CutOnDate
            CuttingDates = 01-Sep, 1-oct, 1-nov, 1-dec, 1-jan, 1-feb, 1-mar, 1-apr, 1-may, 1-jun, 1-jul, 1-aug
            GatherFraction = 1
            Height = 50
```csharp
using Models.Soils.Nutrients;
using APSIM.Shared.Utilities;
using Models.Surface;
using Models.Utilities;
using Models.Soils.Nutrients;
using Models.Soils;
using Models.PMF;
using Models.Core;
using System;
using System.Linq;
using Models.Interfaces;
using Models.GrazPlan;

namespace Models
{
    [Serializable]
    public class Script : Model
    {
        [Link] private Clock Clock;
        [Link] private Summary Summary;
        [Link] private Pasture pasture;
        
        [Description("Cutting Dates:")]
        public string[] CuttingDates { get; set; } 
        
        [Description("Cutting Height:")]
        public double Height {get;set;}

        [Description("Fraction of Cut Biomass to Gather into Storage):")]
        public double GatherFraction {get;set;}

        [EventSubscribe("DoManagement")]
        private void OnDoManagement(object sender, EventArgs e)
        {
            foreach (string ddMMM in CuttingDates)
            {
                if (DateUtilities.DatesEqual(ddMMM, Clock.Today))
                   if (Height>0)
                   {
                      pasture.Cut(cutHeight: Height, gathered: GatherFraction);
                      
                   }

            }
       }
    }
}
```
          SurfaceOrganicMatter Surface Organic Matter: InitialResidueName=Barley_stubble; InitialResidueType=Barley; InitialResidueMass=0; InitialStandingFraction=0; InitialCPR=0; InitialCNR=80
          Irrigation
          Fertiliser
          Report RotationReport: EventNames=[Clock].DoReport
            VariableNames:
              [Clock].Today
              [Pasture].ShootDM/10 as PastureAboveGroundWt
              [Pasture].GLF_N
              [Pasture].GLF_SM
              [Pasture].GLF_VPD
              [Pasture].PotentialEP
              [Pasture].WaterDemand
              sum([Pasture].SWUptake) as SWUptake
              sum([NO3].kgha) as TotalNO3
              sum([NH4].kgha) as TotalNH4
              sum([Water].MM) as TotalSW
              sum([Soil].Water.PAWmm) as TotalESW
              [Pasture].LAI
              [Pasture].Height
              [Weather].VP
              [Weather].VPD
          Pasture: same as Sensibility.Rotation.RotationBase.Paddock.Pasture
          Soil: same as Sensibility.Rotation.RotationBase.Paddock.Red Kandosol (No498-Generic)
  Folder MethodTests
    Experiment Cutting
      Memo
        Test that cutting and removing of pasture biomass works correctly with correct amount of DM moving to Surface Organic Matter
      Factors
        Factor Treatment
          CompositeFactor None: Specifications=[CutOnDate].Script.HeightFraction = 0
          CompositeFactor Remove
            Specifications:
              [CutOnDate].Script.HeightFraction = 0.5
              [CutOnDate].Script.GatherFraction = 1.0
          CompositeFactor Retain
            Specifications:
              [CutOnDate].Script.HeightFraction = 0.5
              [CutOnDate].Script.GatherFraction = 0.0
      Simulation CuttingBase
        Weather: FileName=cbr_70014.met
        Clock: Start=1990-08-01; End=1991-02-01
        Summary summaryfile
        SoilArbitrator Soil Arbitrator
        MicroClimate: a_interception=0; b_interception=1; c_interception=0; d_interception=0; SoilHeatFluxFraction=0.4; MinimumHeightDiffForNewLayer=0; NightInterceptionFraction=0.5; ReferenceHeight=2
        Supplement: SpoilageTime=0
          Stores:
            {Name=fodder, Stored=0, IsRoughage=true, DMContent=0.85, DMD=0, MEContent=0, CPConc=0, ProtDg=0, PConc=0, SConc=0, EEConc=0, ADIP2CP=0, AshAlk=0, MaxPassage=0}
        Zone Paddock: Area=1; Slope=0; AspectAngle=0; Altitude=50
          Manager CutOnDate
            CuttingDates = 01-Sep
            HeightFraction = 0.5
            GatherFraction = 0
```csharp
using Models.Soils.Nutrients;
using APSIM.Shared.Utilities;
using Models.Surface;
using Models.Utilities;
using Models.Soils.Nutrients;
using Models.Soils;
using Models.PMF;
using Models.Core;
using System;
using System.Linq;
using Models.Interfaces;
using Models.GrazPlan;

namespace Models
{
    [Serializable]
    public class Script : Model
    {
        [Link] private Clock Clock;
        [Link] private Summary Summary;
        [Link] private Pasture pasture;
        [Link] private SurfaceOrganicMatter SOM;
        
        [Description("Cutting Dates:")]
        public string[] CuttingDates { get; set; } 
        
        [Description("Fraction of Height to Remain):")]
        public double HeightFraction {get;set;}

        [Description("Fraction of Cut Biomass to Gather into Storage):")]
        public double GatherFraction {get;set;}

        [EventSubscribe("DoManagement")]
        private void OnDoManagement(object sender, EventArgs e)
        {
            foreach (string ddMMM in CuttingDates)
            {
                if (DateUtilities.DatesEqual(ddMMM, Clock.Today))
                   if (HeightFraction>0)
                   {
                      double initialSOMWt = SOM.Wt;
                      double initialPastureWt = pasture.ShootDM;
                      pasture.Cut(cutHeight: pasture.Height*HeightFraction, gathered: GatherFraction);
                      double deltaSOMWt = SOM.Wt - initialSOMWt;
                      double deltaPastureWt = initialPastureWt - pasture.ShootDM;
                      double Err = deltaPastureWt - deltaSOMWt;
                      //if (Math.Abs(Err) > 1)
                         //throw new Exception ("Error in Pasture/Surface Organic Matter masses after cutting");
                   }

            }
       }
    }
}
```
          Soil: SoilType=NZ_sedementary; Region=Plains; State=Canterbury; Country=New Zealnd; Latitude=0; Longitude=0
            Chemical: Thickness=[150, 150, 300, 300, 300, 300]; PH=[6.6, 6.2, 5.7, 5.5, 5.5, 5.5]; PHUnits=Water
            Physical
              Thickness  BD   AirDry  LL15  DUL   SAT   KS
              200        1.1  0.05    0.07  0.33  0.48  4832.039
              200        1.1  0.1     0.1   0.28  0.48  389.229
              200        1.3  0.08    0.08  0.26  0.4   97
              200        1.2  0.1     0.1   0.27  0.38  97.995
              200        1.2  0.12    0.12  0.28  0.37  97.995
              200        1.2  0.12    0.12  0.28  0.36  97.995
              200        1.2  0.12    0.12  0.26  0.36  98
              200        1.2  0.12    0.12  0.25  0.36  98
              400        1.2  0.12    0.12  0.25  0.36  98
              SoilCrop BarleySoil: LL=[0.07, 0.1, 0.08, 0.1, 0.12, 0.12, 0.12, 0.12, 0.12]; KL=[0.1, 0.07, 0.06, 0.05, 0.04, 0.03, 0.03, 0.03, 0.02]; XF=[1, 1, 1, 1, 1, 1, 1, 1, 1]
              SoilCrop PhalarisSoil: LL=[0.15, 0.14, 0.08, 0.12, 0.12, 0.12, 0.12, 0.12, 0.12]; KL=[0.1, 0.1, 0.08, 0.04, 0.01, 0, 0, 0, 0]; XF=[1, 1, 1, 1, 1, 0, 0, 0, 0]
              SoilCrop Perennial RyeGrassSoil: LL=[0.15, 0.14, 0.08, 0.12, 0.12, 0.12, 0.12, 0.12, 0.12]; KL=[0.1, 0.1, 0.08, 0.04, 0.01, 0, 0, 0, 0]; XF=[1, 1, 1, 1, 1, 0, 0, 0, 0]
            WaterBalance SoilWater: SummerDate=1-Nov; SummerU=6; SummerCona=2; WinterDate=1-Apr; WinterU=9; WinterCona=4.4; DiffusConst=0; DiffusSlope=0; Salb=0.18; CN2Bare=68; CNRed=20; CNCov=0.8; DischargeWidth=0; CatchmentArea=0; PSIDul=-100
              Thickness  SWCON  KLAT
              150        0.9    0
              150        0.9    0
              300        0.9    0
              300        0.9    0
              300        0.9    0
              300        0.9    0
            Organic: FOMCNRatio=20; CarbonUnits=Total
              Thickness  Carbon  SoilCNRatio  FBiom  FInert  FOM
              150        2.7     11           0.025  0.45    390.598
              150        2.5     11           0.025  0.6     289.362
              300        1.45    11           0.015  0.75    158.805
              300        0.32    11           0.01   0.9     87.154
              300        0.24    11           0.01   0.96    47.831
              300        0.24    11           0.01   0.96    26.25
            CERESSoilTemperature Temperature
            Water: Thickness=[200, 200, 200, 200, 200, 200, 200, 200, 400]; InitialValues=[0.31, 0.28, 0.26, 0.27, 0.28, 0.28, 0.26, 0.25, 0.25]; InitialPAWmm=324; RelativeTo=LL15; FilledFromTop=false
            Nutrient
            Solute Urea: Thickness=[150, 150, 300, 300, 300, 300]; InitialValues=[0, 0, 0, 0, 0, 0]; InitialValuesUnits=ppm; WaterTableConcentration=0; D0=0; DepthConstant=0; MaxDepthSoluteAccessible=0; RunoffEffectivenessAtMovingSolute=0; MaxEffectiveRunoff=0
            Solute NH4: Thickness=[150, 150, 300, 300, 300, 300]; InitialValues=[1.8, 1.9, 1.5, 1.3, 1.3, 0.9]; InitialValuesUnits=ppm; WaterTableConcentration=0; D0=0; DepthConstant=0; MaxDepthSoluteAccessible=0; RunoffEffectivenessAtMovingSolute=0; MaxEffectiveRunoff=0
            Solute NO3: Thickness=[150, 150, 300, 300, 300, 300]; InitialValues=[14.6, 17.8, 6.8, 7.6, 10.2, 11.2]; InitialValuesUnits=ppm; WaterTableConcentration=0; D0=0; DepthConstant=0; MaxDepthSoluteAccessible=0; RunoffEffectivenessAtMovingSolute=0; MaxEffectiveRunoff=0
          SurfaceOrganicMatter Surface Organic Matter: InitialResidueName=Barley_stubble; InitialResidueType=Barley; InitialResidueMass=0; InitialStandingFraction=0; InitialCPR=0; InitialCNR=80
          Irrigation
          Fertiliser
          Report DailyReport: EventNames=[Clock].DoReport
            VariableNames:
              [Clock].Today
              sum([Pasture].Uptake_NH4) as NH4Uptake
              sum([Pasture].Uptake_NO3) as NO3Uptake
              sum([Pasture].SWUptake)
              [Pasture].Growth
              [Pasture].GreenDM
              [Pasture].AvailGreen
              [Pasture].AvailDM
              [Pasture].DryDM
              [Pasture].LitterDM
              [Pasture].WaterDemand
              [Pasture].WaterDemandSupply
              (sum([Soil].Urea.kgha) + sum([Soil].NH4.kgha) + sum([Soil].NO3.kgha)) as SoilNContent_kgha
              [Supplement].Stores
          Pasture: Species=Perennial RyeGrass; Nutrients=N; MaxRtDep=650; LaggedDayT=-999.9; Phenology=1.0015; FlowerLen=0; FlowerTime=0; SencIndex=0; DormIndex=0; DormT=-999.9; ExtinctCoeff=[0, 0, 0.55]; SeedDormTime=0; GermIndex=0; Albedo=0.23; Gsmax=0.011; R50=200; WaterDemand=0; LAI=0
            GreenCohortInitialise: RootWeight=[400, 400]; RootDepth=650; Status=established; LeafDMD=[0.825]; LeafWeight=[800]; LeafNConc=[0.01]; LeafSpecificArea=[430]; StemDMD=[0.825]; StemWeight=[800]; StemNConc=[0.01]; StemSpecificArea=[10]
            DryCohortInitialise: Status=litter; LeafDMD=[0.6]; LeafWeight=[500]; LeafNConc=[0]; LeafSpecificArea=[430]; StemDMD=[0.35]; StemWeight=[1500]; StemNConc=[0]; StemSpecificArea=[80]
    Experiment Killing
      Memo
        Test that killing of pasture biomass works correctly with correct amount of DM moving from green to dead pools
      Factors
        Factor Fraction: Specification=[KillOnDate].Script.KillFraction=0,0.9,1.0
      Simulation KillingBase
        Weather: FileName=cbr_70014.met
        Clock: Start=1990-08-01; End=1991-02-01
        Summary summaryfile
        SoilArbitrator Soil Arbitrator
        MicroClimate: a_interception=0; b_interception=1; c_interception=0; d_interception=0; SoilHeatFluxFraction=0.4; MinimumHeightDiffForNewLayer=0; NightInterceptionFraction=0.5; ReferenceHeight=2
        Zone Paddock: Area=1; Slope=0; AspectAngle=0; Altitude=50
          Manager KillOnDate
            KillingDates = 1-sep
            KillFraction = 0
```csharp
using Models.Soils.Nutrients;
using APSIM.Shared.Utilities;
using Models.Surface;
using Models.Utilities;
using Models.Soils.Nutrients;
using Models.Soils;
using Models.PMF;
using Models.Core;
using System;
using System.Linq;
using Models.Interfaces;
using Models.GrazPlan;

namespace Models
{
    [Serializable]
    public class Script : Model
    {
        [Link] private Clock Clock;
        [Link] private Summary Summary;
        [Link] private Pasture pasture;
        [Link] private SurfaceOrganicMatter SOM;
        
        [Description("Killing Dates:")]
        public string[] KillingDates { get; set; } 
        
        [Description("Fraction of Pasture to Kill):")]
        public double KillFraction {get;set;}

        [EventSubscribe("DoManagement")]
        private void OnDoManagement(object sender, EventArgs e)
        {
            foreach (string ddMMM in KillingDates)
            {
                if (DateUtilities.DatesEqual(ddMMM, Clock.Today))
                {
                      double initialGreenWt = pasture.GreenDM;
                      double initialDeadWt = pasture.DeadDM;
                      pasture.Kill(propnHerbage: KillFraction);
                      double deltaGreenWt = pasture.GreenDM - initialGreenWt;
                      double deltaDeadWt = initialDeadWt - pasture.DeadDM;
                      double Err = deltaGreenWt - deltaDeadWt;
                      if (Math.Abs(Err) > 1)
                         throw new Exception ("Error in Pasture Live/Green masses after killing");
                 }
            }
       }
    }
}
```
          Soil: same as MethodTests.Cutting.CuttingBase.Paddock.Soil
          SurfaceOrganicMatter Surface Organic Matter: InitialResidueName=Barley_stubble; InitialResidueType=Barley; InitialResidueMass=0; InitialStandingFraction=0; InitialCPR=0; InitialCNR=80
          Irrigation
          Fertiliser
          Report DailyReport: EventNames=[Clock].DoReport
            VariableNames:
              [Clock].Today
              sum([Pasture].Uptake_NH4) as NH4Uptake
              sum([Pasture].Uptake_NO3) as NO3Uptake
              sum([Pasture].SWUptake)
              [Pasture].Growth
              [Pasture].GreenDM
              [Pasture].AvailGreen
              [Pasture].AvailDM
              [Pasture].DryDM
              [Pasture].LitterDM
              [Pasture].WaterDemand
              [Pasture].WaterDemandSupply
              (sum([Soil].Urea.kgha) + sum([Soil].NH4.kgha) + sum([Soil].NO3.kgha)) as SoilNContent_kgha
          Pasture: same as Sensibility.Rotation.RotationBase.Paddock.Pasture
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