Simulations: Version=169
  DataStore
    ExcelInput GrowthExcelInput: FileNames=[Validation\ausfarm_test_ryegrass_irrig.xlsx]; SheetNames=[Growth]
    ExcelInput MassesExcelInput: FileNames=[Validation\ausfarm_test_ryegrass_irrig.xlsx]; SheetNames=[Masses]
    PredictedObserved GrowthPredictedObserved: PredictedTableName=Growth; ObservedTableName=Growth; FieldNameUsedForMatch=Date; AllColumns=false
    PredictedObserved MassesPredictedObserved: PredictedTableName=Masses; ObservedTableName=Masses; FieldNameUsedForMatch=Date; AllColumns=false
  Simulation Irrigated
    Weather: FileName=cbr_70014.met
    Clock: Start=1990-08-01; End=1992-02-03
    Summary summaryfile
    SoilArbitrator Soil Arbitrator
    MicroClimate: a_interception=0; b_interception=1; c_interception=0; d_interception=0; SoilHeatFluxFraction=0.4; MinimumHeightDiffForNewLayer=0; NightInterceptionFraction=0.5; ReferenceHeight=2
    Zone Paddock: Area=1; Slope=0; AspectAngle=0; Altitude=50
      Soil Red Kandosol: ASCOrder=Kandosol; ASCSubOrder=Red; SoilType=Other; Site=Galong; NearestTown=Galong; Region=South West Slopes; State=New South Wales; Country=Australia; ApsoilNumber=545; Latitude=-34.6012; Longitude=148.55816; LocationAccuracy=Regional Soil Type; YearOfSampling=0; DataSource=Michael Robertson, CSIRO Sustainable Ecosystems
        Comments=Canola CLL measured, other crops estimated - Air-dry water contents changed - NO3 solute information filled in
        Physical
          Thickness  BD    AirDry  LL15  DUL   SAT
          100        1.22  0.022   0.1   0.17  0.51
          100        1.45  0.028   0.13  0.19  0.42
          100        1.45  0.03    0.14  0.2   0.42
          150        1.45  0.032   0.14  0.23  0.42
          200        1.45  0.039   0.14  0.27  0.42
          200        1.5   0.044   0.14  0.29  0.4
          200        1.5   0.14    0.14  0.33  0.4
          200        1.5   0.14    0.14  0.34  0.4
          200        1.5   0.14    0.14  0.36  0.4
          600        1.5   0.14    0.14  0.38  0.4
          BD, LL15, DUL, SAT source: Unknown source or quality of data
          AirDry source: Estimated based on local knowledge
          SoilCrop wheatSoil
            LL=[0.1, 0.13, 0.14, 0.15, 0.19, 0.22, 0.24, 0.24, 0.26, 0.27]
            KL=[0.06, 0.06, 0.06, 0.04, 0.04, 0.04, 0.04, 0.02, 0.02, 0.02]
            XF=[1, 1, 1, 1, 1, 1, 1, 1, 1, 1]
            LL source: Estimated based on local knowledge
          SoilCrop canolaSoil
            LL=[0.1, 0.13, 0.14, 0.15, 0.19, 0.22, 0.24, 0.24, 0.26, 0.27]
            KL=[0.08, 0.08, 0.08, 0.08, 0.08, 0.07, 0.06, 0.05, 0.03, 0.01]
            XF=[1, 1, 1, 1, 1, 1, 1, 1, 1, 1]
            LL source: Field measured and checked for sensibility
          SoilCrop SCRUMSoil: same as Irrigated.Paddock.Red Kandosol.Physical.wheatSoil
          SoilCrop Perennial RyegrassSoil: same as Irrigated.Paddock.Red Kandosol.Physical.wheatSoil
        WaterBalance SoilWater: SummerDate=1-Nov; SummerU=6; SummerCona=3.5; WinterDate=1-Apr; WinterU=2; WinterCona=2; DiffusConst=88; DiffusSlope=35.4; Salb=0.13; CN2Bare=72; CNRed=20; CNCov=0.8; PSIDul=-100; Thickness=[100, 100, 100, 150, 200, 200, 200, 200, 200, 600]; SWCON=[0.4, 0.4, 0.4, 0.4, 0.4, 0.4, 0.4, 0.4, 0.4, 0.4]
        Organic: FOMCNRatio=30; CarbonUnits=WalkleyBlack
          Thickness  Carbon  SoilCNRatio  FBiom  FInert  FOM
          100        1.3     14.5         0.04   0.5     432.78
          100        1       14.5         0.02   0.5     373.863
          100        0.8     14.5         0.02   0.5     322.966
          150        0.62    14.5         0.01   0.6     259.313
          200        0.42    14.5         0.01   0.6     193.515
          200        0.22    14.5         0.01   0.6     144.412
          200        0.19    14.5         0.01   0.8     107.769
          200        0.17    14.5         0.01   0.8     80.4233
          200        0.15    14.5         0.01   0.8     60.0166
          600        0.12    14.5         0.01   1       24.9425
        Chemical: Thickness=[100, 100, 100, 150, 200, 200, 200, 200, 200, 600]; PH=[5.8, 5.9, 6.6, 6.8, 7, 7.1, 7.2, 7.3, 7.4, 7.4]; PHUnits=Water
          PH source: Unknown source or quality of data
        Nutrient
        Solute NO3: Thickness=[100, 100, 100, 150, 200, 200, 200, 200, 200, 600]; InitialValues=[30, 10, 4, 2, 1.5, 1.5, 0, 0, 0, 0]; InitialValuesUnits=ppm; WaterTableConcentration=0; D0=0; DepthConstant=0; MaxDepthSoluteAccessible=0; RunoffEffectivenessAtMovingSolute=0; MaxEffectiveRunoff=0
        Solute NH4: Thickness=[100, 100, 100, 150, 200, 200, 200, 200, 200, 600]; InitialValues=[0, 0, 0, 0, 0, 0, 0, 0, 0, 0]; InitialValuesUnits=ppm; WaterTableConcentration=0; D0=0; DepthConstant=0; MaxDepthSoluteAccessible=0; RunoffEffectivenessAtMovingSolute=0; MaxEffectiveRunoff=0
        Solute Urea: Thickness=[100, 100, 100, 150, 200, 200, 200, 200, 200, 600]; InitialValues=[0, 0, 0, 0, 0, 0, 0, 0, 0, 0]; InitialValuesUnits=kg/ha; WaterTableConcentration=0; D0=0; DepthConstant=0; MaxDepthSoluteAccessible=0; RunoffEffectivenessAtMovingSolute=0; MaxEffectiveRunoff=0
        Water: Thickness=[100, 100, 100, 150, 200, 200, 200, 200, 200, 600]; InitialValues=[0.1, 0.13, 0.14, 0.14, 0.14, 0.14, 0.14, 0.14, 0.14, 0.14]; InitialPAWmm=0; RelativeTo=LL15; FilledFromTop=false
        CERESSoilTemperature
      Operations IrrigationEvents
        1990-11-18  [Irrigation].Apply(50);
        1991-11-18  [Irrigation].Apply(50);
      SurfaceOrganicMatter Surface Organic Matter: InitialResidueType=Barley; InitialResidueMass=0; InitialStandingFraction=0; InitialCPR=0; InitialCNR=0
      Irrigation
      Report DailyReport: EventNames=[Clock].DoReport
        VariableNames:
          [Clock].Today
          sum([Pasture].Uptake_NH4) as NH4Uptake
          sum([Pasture].Uptake_NO3) as NO3Uptake
          sum([Pasture].SWUptake)
          [Pasture].Growth
          [Pasture].GreenDM
          [Pasture].AvailGreen
          [Pasture].AvailDM
          [Pasture].DryDM
          [Pasture].LitterDM
          [Pasture].WaterDemand
          [Pasture].WaterDemandSupply
          (sum([Soil].Urea.kgha) + sum([Soil].NH4.kgha) + sum([Soil].NO3.kgha)) as SoilNContent_kgha
          [Pasture].GLF_GAI
          [Pasture].GLF_N
          [Pasture].GLF_Nutr
          [Pasture].GLF_SM
          [Pasture].GLF_Temp
          [Pasture].GLF_VPD
          [Pasture].GLF_WL
          sum([Water].MM) as total_water
          [Pasture].CoverGreen
          [Pasture].CoverTotal
          [Pasture].LAI
          sum([NO3].kgha) as TotalNO3
          sum([NH4].kgha) as TotalNH4
          [Pasture].PotentialEP
          sum([Pasture].SWUptake) as EP
          [Pasture].SWUptake
          [Surface Organic Matter].Cover
          [Surface Organic Matter].Wt
          [Pasture].CoverResidue
          [Pasture].DeadDM
      Pasture: Species=Perennial Ryegrass; Nutrients=N; MaxRtDep=650; LaggedDayT=-999.9; Phenology=1.0015; FlowerLen=0; FlowerTime=0; SencIndex=0; DormIndex=0; DormT=-999.9; ExtinctCoeff=[0, 0, 0.55]; SeedDormTime=0; GermIndex=0; Albedo=0.23; Gsmax=0.011; R50=200; WaterDemand=0; LAI=0
        GreenCohortInitialise: RootWeight=[400, 400]; RootDepth=650; EstIndex=0; StressIndex=0; StemReloc=0; Frosts=0; Status=established; LeafDMD=[0.825]; LeafWeight=[800]; LeafNConc=[0.01]; LeafSpecificArea=[430]; StemDMD=[0.825]; StemWeight=[800]; StemNConc=[0.01]; StemSpecificArea=[10]
        DryCohortInitialise: Status=established; LeafDMD=[0.6]; LeafWeight=[500]; LeafNConc=[0]; LeafSpecificArea=[430]; StemDMD=[0.35]; StemWeight=[1500]; StemNConc=[0]; StemSpecificArea=[80]
  Simulation NotIrrigated
    Weather: FileName=cbr_70014.met
    Clock: Start=1990-08-01; End=1992-02-03
    Summary summaryfile
    SoilArbitrator Soil Arbitrator
    MicroClimate: a_interception=0; b_interception=1; c_interception=0; d_interception=0; SoilHeatFluxFraction=0.4; MinimumHeightDiffForNewLayer=0; NightInterceptionFraction=0.5; ReferenceHeight=2
    Zone Paddock: Area=1; Slope=0; AspectAngle=0; Altitude=50
      Soil Red Kandosol: same as Irrigated.Paddock.Red Kandosol
      SurfaceOrganicMatter Surface Organic Matter: InitialResidueType=Barley; InitialResidueMass=0; InitialStandingFraction=0; InitialCPR=0; InitialCNR=0
      Report DailyReport: same as Irrigated.Paddock.DailyReport
      Pasture: same as Irrigated.Paddock.Pasture
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