Simulations: Version=100
  DataStore
    ExcelInput Observed: FileNames=[Observed.xlsx]; SheetNames=[Observed]
    PredictedObserved: PredictedTableName=DailyReport; ObservedTableName=Observed; FieldNameUsedForMatch=Clock.Today; FieldName2UsedForMatch=SimulationID
    PredictedObserved PredictedObservedHarvest: PredictedTableName=HarvestReport; ObservedTableName=Observed; FieldNameUsedForMatch=SimulationID; FieldName2UsedForMatch=PigeonPea.Phenology.CurrentStageName
  Memo TitlePage
    # The APSIM PigeonPea Model

    The APSIM PigeonPea model has been developed using the Plant Modelling Framework (PMF) of [brown_plant_2014]. This new framework provides a library of plant organ and process submodels that can be coupled, at runtime, to construct a model in much the same way that models can be coupled to construct a simulation. This means that dynamic composition of lower level process and organ classes (e.g. photosynthesis, leaf) into larger constructions (e.g. maize, wheat, sorghum) can be achieved by the model developer without additional coding.

    The model consists of:

    * a phenology model to simulate development between growth phases
    * a structure model to simulate plant morphology
    * a collection of organs to simulate the various plant parts
    * an arbitrator to allocate resources (N, biomass) to the various plant organs
  Replacements
    Plant PigeonPea: CropType=PigeonPea; IsAlive=false; IsEnding=false; DaysAfterEnding=0
      OrganArbitrator Arbitrator
        BiomassTypeArbitrator DMArbitration
          Folder PotentialPartitioningMethods
            ReallocationMethod
            AllocateFixationMethod
            RetranslocationMethod
            SendPotentialDMAllocationsMethod
          Folder AllocationMethods
            NutrientConstrainedAllocationMethod
            DryMatterAllocationsMethod
          RelativeAllocation ArbitrationMethod
        BiomassTypeArbitrator NArbitration
          Folder PotentialPartitioningMethods
            ReallocationMethod
          Folder ActualPartitioningMethods
            AllocateFixationMethod
            RetranslocationMethod
          Folder AllocationMethods
            NitrogenAllocationsMethod
          RelativeAllocation ArbitrationMethod
          AllocateUptakesMethod
        WaterUptakeMethod
        NitrogenUptakeMethod
      Phenology
        Memo Introduction
          In the new model we simplified phenology by taking out stages that are not measurable (e.g. end of juvenile stage) and by adding new stages that are measurable (e.g. start pod).
          The new phenology follows the V/R staging system
        AirTemperatureFunction VegetativeThermalTime: agregationMethod=0
          XYPairs TemperatureResponse: X=[10, 20, 30, 40]; Y=[0, 10, 20, 0]
          ThreeHourSin InterpolationMethod
        LinearInterpolationFunction VegetativePhotoperiodModifier
          XYPairs: X=[14.43, 21.19]; Y=[1, 0]
          Memo
            These parameters are overridden by cultivar parameter descriptions to capture the difference between individual cultivars in terms of their phenological development.  Responses shown here are only indicative.  See cultivar descriptions for more information.
          VariableReference XValue: VariableName=[Phenology].Photoperiod
        AirTemperatureFunction ReproductiveThermalTime: agregationMethod=0
          XYPairs TemperatureResponse: X=[10, 15, 30, 40]; Y=[5, 5, 20, 0]
          ThreeHourSin InterpolationMethod
        LinearInterpolationFunction ReproductivePhotoperiodModifier: same as Replacements.PigeonPea.Phenology.VegetativePhotoperiodModifier
        PhaseLookup ThermalTime
          PhaseLookupValue PreEmergence: Start=Sowing; End=Emergence
            VariableReference Base: VariableName=[Phenology].VegetativeThermalTime
          PhaseLookupValue VegetativeGrowth: Start=Emergence; End=EndCanopyDevelopment
            MultiplyFunction TT
              VariableReference Base: VariableName=[Phenology].VegetativeThermalTime
              VariableReference PPModifier: VariableName=[Phenology].VegetativePhotoperiodModifier
          PhaseLookupValue ReproductiveGrowth: Start=EndCanopyDevelopment; End=HarvestRipe
            MultiplyFunction TT
              VariableReference Base: VariableName=[Phenology].ReproductiveThermalTime
              VariableReference PPModifier: VariableName=[Phenology].ReproductivePhotoperiodModifier
        PhotoperiodFunction Photoperiod: Twilight=0; DayLength=0
        GerminatingPhase Germinating: Start=Sowing; End=Germination
        EmergingPhase Emerging: ShootLag=10; ShootRate=1; Start=Germination; End=Emergence; TTForTimeStep=0
          VariableReference ThermalTime: VariableName=[Phenology].VegetativeThermalTime
        GenericPhase Vegetative: Start=Emergence; End=StartFlowering
          Constant Target: FixedValue=200
          VariableReference Progression: VariableName=[Phenology].ThermalTime
        GenericPhase EarlyFlowering: Start=StartFlowering; End=StartPodDevelopment
          Memo
            The duration of the grain filling phase has been taken from the model of Robertson et al (2002).
          Constant Target: FixedValue=200
          VariableReference Progression: VariableName=[Phenology].ThermalTime
        GenericPhase EarlyPodDevelopment: Start=StartPodDevelopment; End=StartGrainFilling
          Memo
            The duration of the grain filling phase has been taken from the model of Robertson et al (2002).
          Constant Target: FixedValue=140
          VariableReference Progression: VariableName=[Phenology].ThermalTime
        GenericPhase EarlyGrainFilling: Start=StartGrainFilling; End=EndCanopyDevelopment
          MultiplyFunction Target
            Constant FractionofGrainfilling: FixedValue=0.05
            VariableReference EntireGrainfilling
              VariableName=[Phenology].LateGrainFilling.Target.EntireGrainfillPeriod.FixedValue
          VariableReference Progression: VariableName=[Phenology].ThermalTime
        GenericPhase MidGrainFilling: Start=EndCanopyDevelopment; End=EndPodDevelopment
          MultiplyFunction Target
            Constant FractionofMidToLateGrainfilling: FixedValue=0.5
            SubtractFunction MidToLateGrainfilling
              VariableReference EntireGrainfilling
                VariableName=[Phenology].LateGrainFilling.Target.EntireGrainfillPeriod.FixedValue
              VariableReference EarlyGrainfilling: VariableName=[Phenology].EarlyGrainFilling.Target
          VariableReference Progression: VariableName=[Phenology].ThermalTime
        GenericPhase LateGrainFilling: Start=EndPodDevelopment; End=EndGrainFill
          SubtractFunction Target
            Constant EntireGrainfillPeriod: FixedValue=500
            VariableReference EarlyGrainFillingTarget: VariableName=[Phenology].EarlyGrainFilling.Target
            VariableReference MidGrainFillingTarget: VariableName=[Phenology].MidGrainFilling.Target
          VariableReference Progression: VariableName=[Phenology].ThermalTime
        GenericPhase Maturing: Start=EndGrainFill; End=Maturity
          Constant Target: FixedValue=45
          VariableReference Progression: VariableName=[Phenology].ThermalTime
        GenericPhase Ripening: Start=Maturity; End=HarvestRipe
          Constant Target: FixedValue=45
          VariableReference Progression: VariableName=[Phenology].ThermalTime
        EndPhase ReadyForHarvesting: Start=HarvestRipe; End=Unused
          VariableReference ThermalTime: VariableName=[Phenology].ThermalTime
        OnEventFunction EmergenceDAS: SetEvent=Emergence; ReSetEvent=never
          Memo
            A function is used to provide maturity date as days after sowing(DAS).
          Constant PreEventValue: FixedValue=0
          VariableReference PostEventValue: VariableName=[Phenology].DaysAfterSowing
        OnEventFunction FloweringDAS: SetEvent=StartFlowering; ReSetEvent=never
          Memo
            A function is used to provide flowering date as days after sowing(DAS).
          Constant PreEventValue: FixedValue=0
          VariableReference PostEventValue: VariableName=[Phenology].DaysAfterSowing
        OnEventFunction MaturityDAS: SetEvent=Maturity; ReSetEvent=never
          Memo
            A function is used to provide maturity date as days after sowing(DAS).
          Constant PreEventValue: FixedValue=0
          VariableReference PostEventValue: VariableName=[Phenology].DaysAfterSowing
      SimpleLeaf Leaf: Albedo=0.25; Gsmax350=0.015; R50=150; LeafInitialisationStage=Emergence; Height=0; BaseHeight=0; Width=0; FRGR=0; PotentialEP=0; WaterDemand=0; KDead=0; LAIDead=0
        Memo Description
          Stover represents any part of the crop that is not removed at harvest (i.e not part of the product).
        RUEModel Photosynthesis
          Constant RUE: FixedValue=1.2
          WeightedTemperatureFunction FT: MaximumTemperatureWeighting=0.5
            XYPairs: X=[10, 20, 30, 40]; Y=[0, 1, 1, 0]
          LinearInterpolationFunction FVPD
            XYPairs: X=[0, 10, 50]; Y=[1, 1, 1]
            VariableReference XValue: VariableName=[Leaf].Photosynthesis.VPD
          LinearInterpolationFunction FN
            XYPairs: X=[0, 1, 1.5]; Y=[0, 1, 1]
            VariableReference XValue: VariableName=[Leaf].Fn
          LinearInterpolationFunction FW
            XYPairs: X=[0, 1]; Y=[0, 1]
            VariableReference XValue: VariableName=[Leaf].Fw
          RUECO2Function FCO2: PhotosyntheticPathway=C3
          VariableReference RadnInt: VariableName=[Leaf].RadIntTot
        ExpressionFunction CO2internal: Expression=(163 - [IWeather].MeanT)/(5 - 0.1*[IWeather].MeanT)
        DivideFunction StomatalConductanceCO2Modifier
          VariableReference FCO2: VariableName=[Leaf].Photosynthesis.FCO2
          ExpressionFunction RelativeCO2Gradient
            Expression=([IWeather].CO2 - [Leaf].CO2internal)/(350 - [Leaf].CO2internal)
        MultiplyFunction Area
          VariableReference SLA: VariableName=[Leaf].SpecificArea
          VariableReference LeafLiveWt: VariableName=[Leaf].Live.Wt
        MinimumFunction FRGR
          VariableReference RUE_FT: VariableName=[Leaf].Photosynthesis.FT
          MinimumFunction Others
            VariableReference RUE_FN: VariableName=[Leaf].Photosynthesis.FN
            VariableReference RUE_FVPD: VariableName=[Leaf].Photosynthesis.FVPD
        LinearInterpolationFunction ExtinctionCoefficient
          XYPairs: X=[200, 1000]; Y=[0.6, 0.4]
          VariableReference XValue: VariableName=[PigeonPea].SowingData.RowSpacing
        LinearInterpolationFunction Tallness
          XYPairs: X=[1, 2, 3, 4, 5, 6, 9]; Y=[0, 0, 50, 400, 700, 900, 1000]
          VariableReference XValue: VariableName=[Phenology].Stage
        AccumulateFunction NodeNumber: StartStageName=Emergence; EndStageName=EndCanopyDevelopment; FractionRemovedOnCut=1; FractionRemovedOnHarvest=1; FractionRemovedOnGraze=1; FractionRemovedOnPrune=0
          DivideFunction DeltaNode
            VariableReference ThermalTime: VariableName=[Phenology].VegetativeThermalTime
            VariableReference Phyllochron: VariableName=[Leaf].Phyllochron
        Constant NReallocationFactor: FixedValue=1
          Memo
            This model assumes that all metabolic and storage N is available for reallocation from senescing leaves.
        PhaseLookup SenescenceRate
          PhaseLookupValue Vegetative: Start=Emergence; End=EndCanopyDevelopment
            Constant Rate: FixedValue=0
          PhaseLookupValue Reproductive: Start=EndCanopyDevelopment; End=Maturity
            Memo
              Leaf senescence rate is calculated to ensure that all leaves are senesced by crop maturity.
            DivideFunction Rate
              VariableReference TT: VariableName=[Phenology].ThermalTime
              SubtractFunction TTRemaining
                ExpressionFunction TTRequired
                  Expression=[Phenology].MidGrainFilling.Target + [Phenology].LateGrainFilling.Target + [Phenology].Maturing.Target
                ExpressionFunction TTComplete
                  Expression=[Phenology].MidGrainFilling.ProgressThroughPhase + [Phenology].LateGrainFilling.ProgressThroughPhase + [Phenology].Maturing.ProgressThroughPhase
        Constant DetachmentRate: FixedValue=1; Units=/d
        Constant InitialWt: FixedValue=1
        Constant LaiDead: FixedValue=0; Units=m^2/m^2
        LinearInterpolationFunction MaximumNConc
          XYPairs: X=[3, 4, 9]; Y=[0.06, 0.05, 0.03]
          VariableReference XValue: VariableName=[Phenology].Stage
        LinearInterpolationFunction CriticalNConc
          XYPairs: X=[3, 4, 9]; Y=[0.06, 0.05, 0.03]
          VariableReference XValue: VariableName=[Phenology].Stage
        Constant MinimumNConc: FixedValue=0.02
        Constant MaintenanceRespiration: FixedValue=0; Units=0-1
        Constant DMConversionEfficiency: FixedValue=1; Units=0-1
        BiomassRemoval BiomassRemovalDefaults
          OrganBiomassRemovalType Harvest: FractionLiveToRemove=0; FractionDeadToRemove=0; FractionLiveToResidue=0.3; FractionDeadToResidue=0
          OrganBiomassRemovalType Cut: FractionLiveToRemove=0.95; FractionDeadToRemove=0; FractionLiveToResidue=0; FractionDeadToResidue=0
          OrganBiomassRemovalType Prune: FractionLiveToRemove=0; FractionDeadToRemove=0; FractionLiveToResidue=0.6; FractionDeadToResidue=0
          OrganBiomassRemovalType Graze: FractionLiveToRemove=0.6; FractionDeadToRemove=0; FractionLiveToResidue=0.1; FractionDeadToResidue=0
        Constant NRetranslocationFactor: FixedValue=0.5
        Constant DMReallocationFactor: FixedValue=0
        Constant DMRetranslocationFactor: FixedValue=0.5
        Constant RemobilisationCost: FixedValue=0
        Constant CarbonConcentration: FixedValue=0.4
        BiomassDemand DMDemands
          DivideFunction Structural
            VariableReference DeltaLAI: VariableName=[Leaf].DeltaLAI
            VariableReference SLA: VariableName=[Leaf].SpecificArea
            Memo
              Growth in leaf area is used to calculate the leaf dry matter demand.  Note that leaf biomass is assumed to consist of entirely structural dry matter.
          Constant Storage: FixedValue=0
          Constant Metabolic: FixedValue=0
        BiomassDemand NDemands
          MultiplyFunction Structural
            VariableReference MinNconc: VariableName=[Leaf].minimumNconc
            VariableReference PotentialDMAllocation: VariableName=[Leaf].potentialDMAllocation.Structural
          MultiplyFunction Metabolic
            SubtractFunction MetabolicNconc
              VariableReference CritNconc: VariableName=[Leaf].criticalNConc
              VariableReference MinNconc: VariableName=[Leaf].minimumNconc
            VariableReference PotentialDMAllocation: VariableName=[Leaf].potentialDMAllocation.Structural
          StorageNDemandFunction Storage
            Constant NitrogenDemandSwitch: FixedValue=1
            VariableReference MaxNconc: VariableName=[Leaf].maximumNconc
        LinearInterpolationFunction FrostFraction
          XYPairs: X=[-4, 4]; Y=[1, 0]
          VariableReference XValue: VariableName=[Weather].MinT
        LinearInterpolationFunction SpecificArea
          XYPairs: X=[0.1, 6]; Y=[0.03, 0.03]
          VariableReference XValue: VariableName=[Leaf].LAI
        PhaseLookup DeltaLAI
          PhaseLookupValue Vegetative: Start=Emergence; End=EndCanopyDevelopment
            MultiplyFunction Delta
              VariableReference AreaLargestLeaf: VariableName=[Leaf].AreaLargestLeaf
              PhaseLookup RelativeArea
                PhaseLookupValue BeforeEndPod: Start=Emergence; End=StartPodDevelopment
                  LinearInterpolationFunction RelativeArea
                    XYPairs: X=[2, 7, 10, 18]; Y=[0.6666, 1, 1, 0.83]
                    VariableReference XValue: VariableName=[Leaf].NodeNumber
                PhaseLookupValue AfterEndPod: Start=StartPodDevelopment; End=EndCanopyDevelopment
                  Constant RelativeArea: FixedValue=0.4
              VariableReference PlantNumber: VariableName=[PigeonPea].SowingData.Population
              LinearInterpolationFunction Branches
                XYPairs: X=[0, 6, 7, 8, 9]; Y=[1, 1, 2, 2, 2]
                VariableReference XValue: VariableName=[Leaf].NodeNumber
              DivideFunction LAR
                VariableReference TT: VariableName=[Phenology].VegetativeThermalTime
                VariableReference Phyllochron: VariableName=[Leaf].Phyllochron
          PhaseLookupValue Reproductive: Start=EndCanopyDevelopment; End=Maturity
            Constant: FixedValue=0
        Constant AreaLargestLeaf: FixedValue=0.006
        Constant Phyllochron: FixedValue=45
      ReproductiveOrgan Grain: GrowthRespiration=0; MaintenanceRespiration=0
        Biomass Live: DMDOfStructural=0.6
        Biomass Dead: DMDOfStructural=0.6
        Constant PotentialHarvestIndex: FixedValue=0.5
        AddFunction FillingDuration
          VariableReference EarlyGrainFillingDuration: VariableName=[Phenology].EarlyGrainFilling.Target
          VariableReference MidGrainFillingDuration: VariableName=[Phenology].MidGrainFilling.Target
          VariableReference LateGrainFillingDuration: VariableName=[Phenology].LateGrainFilling.Target
        PhaseLookup DMDemandFunction
          PhaseLookupValue GrainFilling: Start=StartGrainFilling; End=EndGrainFill
            MultiplyFunction HIGrainDemand
              VariableReference AboveGroundWt: VariableName=[AboveGround].Wt
              DivideFunction HarvestIndexIncrease
                VariableReference PotentialHarvestIndex: VariableName=[Grain].PotentialHarvestIndex
                VariableReference FillingDuration: VariableName=[Grain].FillingDuration
              VariableReference ThermalTime: VariableName=[Phenology].ThermalTime
        Constant MinimumNConc: FixedValue=0.05
        Constant MaximumNConc: FixedValue=0.058
        Constant WaterContent: FixedValue=0.12
        MultiplyFunction NFillingRate
          VariableReference NConc: VariableName=[Grain].MaximumNConc
          VariableReference DMDemand: VariableName=[Grain].DMDemandFunction
          VariableReference DMConversionEfficiency: VariableName=[Grain].DMConversionEfficiency
        BiomassRemoval BiomassRemovalDefaults
          OrganBiomassRemovalType Harvest: FractionLiveToRemove=1; FractionDeadToRemove=0; FractionLiveToResidue=0; FractionDeadToResidue=0
          OrganBiomassRemovalType Cut: FractionLiveToRemove=1; FractionDeadToRemove=0; FractionLiveToResidue=0; FractionDeadToResidue=0
          OrganBiomassRemovalType Prune: FractionLiveToRemove=0; FractionDeadToRemove=0; FractionLiveToResidue=0.8; FractionDeadToResidue=0
          OrganBiomassRemovalType Graze: FractionLiveToRemove=0.6; FractionDeadToRemove=0; FractionLiveToResidue=0.2; FractionDeadToResidue=0
        Constant DMConversionEfficiency: FixedValue=0.89
        Constant RemobilisationCost: FixedValue=0
        Constant CarbonConcentration: FixedValue=0.4
        DivideFunction HarvestIndex
          VariableReference GrainWt: VariableName=[Grain].Wt
          VariableReference AboveGroundWt: VariableName=[AboveGround].Wt
        Constant MaximumPotentialGrainSize: FixedValue=0
          Memo
            This parameter is not used.  Grain growth is calculated from harvest index increase.
        Constant NumberFunction: FixedValue=0
          Memo
            Grain number is not estimated by this model.
      Root: GrowthRespiration=0; MaintenanceRespiration=0
        RootShapeCylindre RootShape
        LinearInterpolationFunction KLModifier
          XYPairs: X=[0, 3]; Y=[1, 1]
          VariableReference XValue: VariableName=[Leaf].LAI
        AirTemperatureFunction TemperatureEffect: agregationMethod=0
          XYPairs TemperatureResponse: X=[0, 26, 35]; Y=[1, 1, 1]
          ThreeHourSin InterpolationMethod
        LinearInterpolationFunction MaxDailyNUptake
          XYPairs: X=[0, 5]; Y=[1, 3]
          VariableReference XValue: VariableName=[Leaf].LAI
        Constant SenescenceRate: FixedValue=0.005
        Constant MaximumRootDepth: FixedValue=1000000
        PhaseLookup RootFrontVelocity
          PhaseLookupValue PreEmergence: Start=Germination; End=Emergence
            Constant Function: FixedValue=5
          PhaseLookupValue early: Start=Emergence; End=StartGrainFilling
            Constant Function: FixedValue=30
          PhaseLookupValue late: Start=StartGrainFilling; End=Maturity
            Constant Function: FixedValue=5
        Constant MaximumNConc: FixedValue=0.01
        Constant MinimumNConc: FixedValue=0.005
        PhaseBasedSwitch NitrogenDemandSwitch: Start=Emergence; End=EndGrainFill
        LinearInterpolationFunction KNO3
          XYPairs: X=[0, 0.003]; Y=[0.02, 0.02]
          VariableReference XValue: VariableName=[Root].LengthDensity
        LinearInterpolationFunction KNH4
          XYPairs: X=[0, 0.003]; Y=[0, 0]
          VariableReference XValue: VariableName=[Root].LengthDensity
        BiomassRemoval BiomassRemovalDefaults
          OrganBiomassRemovalType Harvest: FractionLiveToRemove=0; FractionDeadToRemove=0; FractionLiveToResidue=0.2; FractionDeadToResidue=0
          OrganBiomassRemovalType Cut: FractionLiveToRemove=0; FractionDeadToRemove=0; FractionLiveToResidue=0.3; FractionDeadToResidue=0
          OrganBiomassRemovalType Prune: FractionLiveToRemove=0; FractionDeadToRemove=0; FractionLiveToResidue=0.1; FractionDeadToResidue=0
          OrganBiomassRemovalType Graze: FractionLiveToRemove=0; FractionDeadToRemove=0; FractionLiveToResidue=0.15; FractionDeadToResidue=0
        LinearInterpolationFunction NUptakeSWFactor
          XYPairs: X=[0, 1]; Y=[0, 1]
          VariableReference XValue: VariableName=[Root].RWC
        Constant SpecificRootLength: FixedValue=40; Units=m/g
        Constant DMConversionEfficiency: FixedValue=1
        Constant MaintenanceRespirationFunction: FixedValue=1
        Constant RemobilisationCost: FixedValue=0
        Constant CarbonConcentration: FixedValue=0.4
        BiomassDemand DMDemands
          MultiplyFunction Structural
            PartitionFractionDemandFunction DMDemandFunction
              PhaseLookup PartitionFraction
                PhaseLookupValue Early: Start=Emergence; End=StartFlowering
                  Constant Function: FixedValue=0.2
                PhaseLookupValue Middle: Start=StartFlowering; End=StartGrainFilling
                  Constant Function: FixedValue=0.2
                PhaseLookupValue Late: Start=StartGrainFilling; End=Maturity
                  Constant Function: FixedValue=0.05
            Constant StructuralFraction: FixedValue=1
          Constant Metabolic: FixedValue=0
          StorageDMDemandFunction Storage
            SubtractFunction StorageFraction
              Constant One: FixedValue=1
              VariableReference StructuralFraction: VariableName=[Root].DMDemands.Structural.StructuralFraction
        BiomassDemand NDemands
          MultiplyFunction Structural
            VariableReference MinNconc: VariableName=[Root].minimumNconc
            VariableReference PotentialDMAllocation: VariableName=[Root].potentialDMAllocation.Structural
          MultiplyFunction Metabolic
            SubtractFunction MetabolicNconc
              VariableReference CritNconc: VariableName=[Root].criticalNConc
              VariableReference MinNconc: VariableName=[Root].minimumNconc
            VariableReference PotentialDMAllocation: VariableName=[Root].potentialDMAllocation.Structural
          StorageNDemandFunction Storage
            VariableReference NitrogenDemandSwitch: VariableName=[Root].nitrogenDemandSwitch
            VariableReference MaxNconc: VariableName=[Root].maximumNconc
        VariableReference CriticalNConc: VariableName=[Root].MinimumNConc
        BiomassDemand InitialWt
          Constant Structural: FixedValue=0.2; Units=g/plant
          Constant Metabolic: FixedValue=0
          Constant Storage: FixedValue=0
      Nodule
        Constant FixationMetabolicCost: FixedValue=0
        Constant MaximumNConc: FixedValue=0.02
        Constant MinimumNConc: FixedValue=0.01
        Constant SenescenceRate: FixedValue=0
        Constant NReallocationFactor: FixedValue=0
        PhaseBasedSwitch NitrogenDemandSwitch: Start=Emergence; End=EndGrainFill
        BiomassRemoval BiomassRemovalDefaults
          OrganBiomassRemovalType Harvest: FractionLiveToRemove=0.5; FractionDeadToRemove=0; FractionLiveToResidue=0.1; FractionDeadToResidue=0
          OrganBiomassRemovalType Cut: FractionLiveToRemove=0.8; FractionDeadToRemove=0; FractionLiveToResidue=0; FractionDeadToResidue=0
          OrganBiomassRemovalType Prune: FractionLiveToRemove=0; FractionDeadToRemove=0; FractionLiveToResidue=0.6; FractionDeadToResidue=0
          OrganBiomassRemovalType Graze: FractionLiveToRemove=0.6; FractionDeadToRemove=0; FractionLiveToResidue=0.2; FractionDeadToResidue=0
        Constant InitialWtFunction: FixedValue=0; Units=g/m^2
        Constant DetachmentRateFunction: FixedValue=0; Units=/d
        Constant MaintenanceRespirationFunction: FixedValue=0; Units=0-1
        Constant DMConversionEfficiency: FixedValue=1; Units=0-1
        Constant NRetranslocationFactor: FixedValue=0
        Constant DMReallocationFactor: FixedValue=0
        Constant DMRetranslocationFactor: FixedValue=0
        VariableReference CriticalNConc: VariableName=[Nodule].MinimumNConc
        Constant RemobilisationCost: FixedValue=0
        Constant CarbonConcentration: FixedValue=0.4
        HoldFunction FixationRate: WhenToHold=StartGrainFilling
          MinimumFunction DailyPotentialFixationRate
            MultiplyFunction PotentialFixationRate
              VariableReference LiveBiomass: VariableName=[AboveGroundLive].Wt
              PhaseLookup SpecificFixationRate
                PhaseLookupValue VegetativeGrowth: Start=Emergence; End=StartFlowering
                  Constant Rate: FixedValue=0.006
                PhaseLookupValue ReproductiveGrowth: Start=StartFlowering; End=EndGrainFill
                  Constant Rate: FixedValue=0.002
            Constant MaximumFixationRate: FixedValue=0.6
        BiomassDemand DMDemands
          MultiplyFunction Structural
            PartitionFractionDemandFunction DMDemandFunction
              PhaseLookup PartitionFraction
                PhaseLookupValue Early: Start=Emergence; End=StartFlowering
                  Constant Function: FixedValue=0.03
                PhaseLookupValue Middle: Start=StartFlowering; End=StartGrainFilling
                  Constant Function: FixedValue=0.02
                PhaseLookupValue Late: Start=StartGrainFilling; End=Maturity
                  Constant Function: FixedValue=0
            Constant StructuralFraction: FixedValue=1; Units=g/g
          Constant Metabolic: FixedValue=0
          StorageDMDemandFunction Storage
            SubtractFunction StorageFraction
              Constant One: FixedValue=1
              VariableReference StructuralFraction: VariableName=[Nodule].DMDemands.Structural.StructuralFraction
        BiomassDemand NDemands
          MultiplyFunction Structural
            VariableReference MinNconc: VariableName=[Nodule].minimumNconc
            VariableReference PotentialDMAllocation: VariableName=[Nodule].potentialDMAllocation.Structural
          MultiplyFunction Metabolic
            SubtractFunction MetabolicNconc
              VariableReference CritNconc: VariableName=[Nodule].criticalNConc
              VariableReference MinNconc: VariableName=[Nodule].minimumNconc
            VariableReference PotentialDMAllocation: VariableName=[Nodule].potentialDMAllocation.Structural
          StorageNDemandFunction Storage
            VariableReference NitrogenDemandSwitch: VariableName=[Nodule].nitrogenDemandSwitch
            VariableReference MaxNconc: VariableName=[Nodule].maximumNconc
      GenericOrgan Shell: IsAboveGround=true
        Constant NReallocationFactor: FixedValue=1
        Constant NRetranslocationFactor: FixedValue=0.5
        Constant MaximumNConc: FixedValue=0.045
        VariableReference CriticalNConc: VariableName=[Shell].MinimumNConc
        Constant MinimumNConc: FixedValue=0.01
        Constant DMRetranslocationFactor: FixedValue=0.1
        PhaseBasedSwitch NitrogenDemandSwitch: Start=StartPodDevelopment; End=EndPodDevelopment
        BiomassRemoval BiomassRemovalDefaults: same as Replacements.PigeonPea.Nodule.BiomassRemovalDefaults
        PhaseLookup SenescenceRate
          PhaseLookupValue ReproductivePhase: Start=StartPodDevelopment; End=Maturity
            MinimumFunction Rate
              DivideFunction Fraction
                VariableReference TT: VariableName=[Phenology].ThermalTime
                SubtractFunction TTRemaining
                  ExpressionFunction ReproductiveTT
                    Expression=[Phenology].EarlyPodDevelopment.Target+[Phenology].EarlyGrainFilling.Target+[Phenology].MidGrainFilling.Target+[Phenology].LateGrainFilling.Target
                  ExpressionFunction ReproductiveTT1Complete
                    Expression=[Phenology].EarlyPodDevelopment.ProgressThroughPhase+[Phenology].EarlyGrainFilling.ProgressThroughPhase+[Phenology].MidGrainFilling.ProgressThroughPhase+[Phenology].LateGrainFilling.ProgressThroughPhase
              Constant One: FixedValue=1
        Constant DetachmentRateFunction: FixedValue=0; Units=/d
        Constant MaintenanceRespirationFunction: FixedValue=0; Units=0-1
        Constant DMConversionEfficiency: FixedValue=1; Units=0-1
        Constant DMReallocationFactor: FixedValue=0
        Constant RemobilisationCost: FixedValue=0
        Constant CarbonConcentration: FixedValue=0.4
        Constant PotentialHarvestIndex: FixedValue=0.2
        AddFunction FillingDuration
          VariableReference EarlyPodDevelopmentDuration: VariableName=[Phenology].EarlyPodDevelopment.Target
          VariableReference EarlyGrainFillingDuration: VariableName=[Phenology].EarlyGrainFilling.Target
          VariableReference MidGrainFillingDuration: VariableName=[Phenology].MidGrainFilling.Target
        BiomassDemand DMDemands
          MultiplyFunction Structural
            PhaseLookup DMDemandFunction
              PhaseLookupValue PodDevelopment: Start=StartPodDevelopment; End=EndPodDevelopment
                MultiplyFunction HIPodDemand
                  VariableReference AboveGroundWt: VariableName=[AboveGround].Wt
                  DivideFunction HarvestIndexIncrease
                    VariableReference PotentialHarvestIndex: VariableName=[Shell].PotentialHarvestIndex
                    VariableReference FillingDuration: VariableName=[Shell].FillingDuration
                  VariableReference ThermalTime: VariableName=[Phenology].ThermalTime
            Constant StructuralFraction: FixedValue=1
          Constant Metabolic: FixedValue=0
          StorageDMDemandFunction Storage
            SubtractFunction StorageFraction
              Constant One: FixedValue=1
              VariableReference StructuralFraction: VariableName=[Shell].DMDemands.Structural.StructuralFraction
        BiomassDemand NDemands
          MultiplyFunction Structural
            VariableReference MinNconc: VariableName=[Shell].minimumNconc
            VariableReference PotentialDMAllocation: VariableName=[Shell].potentialDMAllocation.Structural
          StorageNDemandFunction Storage
            VariableReference NitrogenDemandSwitch: VariableName=[Shell].nitrogenDemandSwitch
            VariableReference MaxNconc: VariableName=[Shell].maximumNconc
          Constant Metabolic: FixedValue=0
        RetranslocateNonStructural RetranslocateNitrogen
        BiomassDemand InitialWt
          Constant Structural: FixedValue=0; Units=g/m^2
          Constant Metabolic: FixedValue=0
          Constant Storage: FixedValue=0
      GenericOrgan Stem: IsAboveGround=true
        Constant NReallocationFactor: FixedValue=1
        Constant NRetranslocationFactor: FixedValue=0.5
        PhaseLookup DMRetranslocationFactor
          PhaseLookupValue GrainFilling: Start=EndCanopyDevelopment; End=EndGrainFill
            Constant RetranslocationFactor: FixedValue=0.2
        LinearInterpolationFunction MaximumNConc
          XYPairs: X=[3, 4, 5]; Y=[0.025, 0.02, 0.015]
          VariableReference XValue: VariableName=[Phenology].Stage
        Constant MinimumNConc: FixedValue=0.006
        PhaseBasedSwitch NitrogenDemandSwitch: Start=Emergence; End=StartGrainFilling
        BiomassRemoval BiomassRemovalDefaults: same as Replacements.PigeonPea.Nodule.BiomassRemovalDefaults
        PhaseLookup SenescenceRate
          PhaseLookupValue PostCanopyPhase: Start=EndCanopyDevelopment; End=Maturity
            MinimumFunction Rate
              DivideFunction Fraction
                VariableReference TT: VariableName=[Phenology].ThermalTime
                SubtractFunction TTRemaining
                  ExpressionFunction PostCanopyTT
                    Expression=[Phenology].EarlyPodDevelopment.Target+[Phenology].EarlyGrainFilling.Target+[Phenology].MidGrainFilling.Target+[Phenology].LateGrainFilling.Target
                  ExpressionFunction PostCanopyTTComplete
                    Expression=[Phenology].MidGrainFilling.ProgressThroughPhase+[Phenology].LateGrainFilling.ProgressThroughPhase
              Constant One: FixedValue=1
        Constant DetachmentRateFunction: FixedValue=0; Units=/d
        Constant MaintenanceRespirationFunction: FixedValue=0; Units=0-1
        Constant DMConversionEfficiency: FixedValue=1; Units=0-1
        Constant DMReallocationFactor: FixedValue=0
        VariableReference CriticalNConc: VariableName=[Stem].MinimumNConc
        Constant RemobilisationCost: FixedValue=0
        Constant CarbonConcentration: FixedValue=0.4
        BiomassDemand DMDemands
          MultiplyFunction Structural
            PhaseLookup Fraction
              PhaseLookupValue StemGrowthPhase: Start=Emergence; End=StartPodDevelopment
                Constant Fraction: FixedValue=0.75
              PhaseLookupValue PodAndGrainGrowth: Start=StartPodDevelopment; End=EndGrainFill
                Constant Fraction: FixedValue=0
            VariableReference DMDemand: VariableName=[Stem].PotentialGrowth
          Constant Metabolic: FixedValue=0
          MultiplyFunction Storage
            VariableReference DMDemand: VariableName=[Stem].PotentialGrowth
            SubtractFunction StorageFraction
              Constant One: FixedValue=1
              VariableReference StructuralFraction: VariableName=[Stem].DMDemands.Structural.Fraction
        BiomassDemand NDemands
          MultiplyFunction Structural
            VariableReference MinNconc: VariableName=[Stem].minimumNconc
            VariableReference PotentialDMAllocation: VariableName=[Stem].potentialDMAllocation.Structural
          MultiplyFunction Metabolic
            SubtractFunction MetabolicNconc
              VariableReference CritNconc: VariableName=[Stem].criticalNConc
              VariableReference MinNconc: VariableName=[Stem].minimumNconc
            VariableReference PotentialDMAllocation: VariableName=[Stem].potentialDMAllocation.Structural
          StorageNDemandFunction Storage
            VariableReference NitrogenDemandSwitch: VariableName=[Stem].nitrogenDemandSwitch
            VariableReference MaxNconc: VariableName=[Stem].maximumNconc
        PartitionFractionDemandFunction PotentialGrowth
          PhaseLookup PartitionFraction
            PhaseLookupValue StemGrowthPhase: Start=Emergence; End=EndPodDevelopment
              Constant StemFraction: FixedValue=0.4
            PhaseLookupValue GrainFilling: Start=EndPodDevelopment; End=EndGrainFill
              Constant StemFraction: FixedValue=0
        RetranslocateNonStructural RetranslocateNitrogen
        BiomassDemand InitialWt
          Constant Structural: FixedValue=0; Units=g/m^2
          Constant Metabolic: FixedValue=0
          Constant Storage: FixedValue=0
      CompositeBiomass AboveGround: DMDOfStructural=0.6
        Propertys=[[Leaf].Live, [Leaf].Dead, [Stem].Live, [Stem].Dead, [Grain].Live, [Grain].Dead, [Shell].Live, [Shell].Dead]
      CompositeBiomass BelowGround: Propertys=[[Root].Live, [Root].Dead, [Nodule].Live, [Nodule].Dead]; DMDOfStructural=0.6
      CompositeBiomass AboveGroundLive: Propertys=[[Leaf].Live, [Stem].Live, [Grain].Live, [Shell].Live]; DMDOfStructural=0.6
      CompositeBiomass Total: DMDOfStructural=0.6
        Propertys=[[Leaf].Live, [Leaf].Dead, [Stem].Live, [Stem].Dead, [Grain].Live, [Grain].Dead, [Shell].Live, [Shell].Dead, [Root].Live, [Root].Dead, [Nodule].Live, [Nodule].Dead]
      CompositeBiomass TotalLive: DMDOfStructural=0.6
        Propertys=[[Leaf].Live, [Stem].Live, [Grain].Live, [Shell].Live, [Root].Live, [Nodule].Live]
      CompositeBiomass TotalDead: DMDOfStructural=0.6
        Propertys=[[Leaf].Dead, [Stem].Dead, [Grain].Dead, [Shell].Dead, [Root].Dead, [Nodule].Dead]
      CompositeBiomass Pod: Propertys=[[Shell].Live, [Shell].Dead, [Grain].Live, [Grain].Dead]; DMDOfStructural=0.6
      Memo
        ## References

        ### **Ayaz S, McKenzie BA, McNeil DL, Hill GD.** **2004**. Light interception and utilization of four grain legumes sown at different plant populations and depths. _Journal of Agricultural Science,_ **142**: 297-308.
         **Ayaz S, McKenzie BA, Hill GD, McNeil DL.** **2004**. Variability in yield of four grain legume species in a subhumid temperate environment. II. Yield components. _Journal of Agricultural Science,_ **142**: 21-28.
         **Ayaz S, McKenzie BA, Hill GD, McNeil DL.** **2004**. Nitrogen distribution in four grain legumes. _Journal of Agricultural Science,_ **142**: 309-317.
         **Wilson DR, Robertson MJ.** **1996.** Pea phenology responses to temperature and photoperiod. _Australian Agronomy Society_.
      CultivarFolder Australia
        Cultivar Buchanan
          Command:
            [Phenology].Vegetative.Target.FixedValue = 480
            [Phenology].EarlyFlowering.Target.FixedValue = 100
            [Phenology].EarlyGrainFilling.Target.FractionofGrainfilling.FixedValue = 0.015
            [Phenology].LateGrainFilling.Target.EntireGrainfillPeriod.FixedValue = 467
            [Phenology].VegetativePhotoperiodModifier.XYPairs.X = 12.39, 15.61
            [Phenology].ReproductivePhotoperiodModifier.XYPairs.X = 12.39, 15.61
            [Phenology].MidGrainFilling.Target.FractionofMidToLateGrainfilling.FixedValue=0.33
            [Grain].MaximumNConc.FixedValue = 0.067
            [Stem].PotentialGrowth.PartitionFraction.StemGrowthPhase.StemFraction.FixedValue = 0.5
            [Leaf].AreaLargestLeaf.FixedValue=0.009
        Cultivar Djakal
          Command:
            [Phenology].Vegetative.Target.FixedValue = 380
            [Phenology].EarlyFlowering.Target.FixedValue = 100
            [Phenology].EarlyGrainFilling.Target.FractionofGrainfilling.FixedValue = 0.05
            [Phenology].LateGrainFilling.Target.EntireGrainfillPeriod.FixedValue = 405
            [Phenology].VegetativePhotoperiodModifier.XYPairs.X = 13.75, 17
            [Phenology].ReproductivePhotoperiodModifier.XYPairs.X = 11.9, 15.5
            [Leaf].AreaLargestLeaf.FixedValue=0.009
        Cultivar Davis
          Command:
            [Phenology].Vegetative.Target.FixedValue = 480
            [Phenology].EarlyFlowering.Target.FixedValue = 100
            [Phenology].EarlyGrainFilling.Target.FractionofGrainfilling.FixedValue = 0.015
            [Phenology].LateGrainFilling.Target.EntireGrainfillPeriod.FixedValue = 467
            [Phenology].VegetativePhotoperiodModifier.XYPairs.X = 12.39, 15.61
            [Phenology].ReproductivePhotoperiodModifier.XYPairs.X = 12.39, 15.61
            [Phenology].MidGrainFilling.Target.FractionofMidToLateGrainfilling.FixedValue=0.33
            [Grain].MaximumNConc.FixedValue = 0.067
            [Stem].PotentialGrowth.PartitionFraction.StemGrowthPhase.StemFraction.FixedValue = 0.5
            [Leaf].AreaLargestLeaf.FixedValue=0.012
        Cultivar Hooper_MG40
          Command:
            [Phenology].Vegetative.Target.FixedValue = 380
            [Phenology].EarlyFlowering.Target.FixedValue = 80
            [Phenology].EarlyGrainFilling.Target.FractionofGrainfilling.FixedValue = 0.05
            [Phenology].LateGrainFilling.Target.EntireGrainfillPeriod.FixedValue = 440
            [Phenology].VegetativePhotoperiodModifier.XYPairs.X = 13.26, 16.67
            [Phenology].ReproductivePhotoperiodModifier.XYPairs.X = 13.26, 16.67
            [Leaf].AreaLargestLeaf.FixedValue=0.009
        Cultivar Stephens_MG40
          Command:
            [Phenology].Vegetative.Target.FixedValue = 360
            [Phenology].EarlyFlowering.Target.FixedValue = 80
            [Phenology].EarlyGrainFilling.Target.FractionofGrainfilling.FixedValue = 0.05
            [Phenology].LateGrainFilling.Target.EntireGrainfillPeriod.FixedValue = 440
            [Phenology].VegetativePhotoperiodModifier.XYPairs.X = 13.26, 16.67
            [Phenology].ReproductivePhotoperiodModifier.XYPairs.X = 13.26, 16.67
            [Leaf].AreaLargestLeaf.FixedValue=0.009
        Cultivar FiskebyV
          Command:
            [Phenology].Vegetative.Target.FixedValue = 285
            [Phenology].EarlyFlowering.Target.FixedValue = 80
            [Phenology].EarlyGrainFilling.Target.FractionofGrainfilling.FixedValue = 0.05
            [Phenology].LateGrainFilling.Target.EntireGrainfillPeriod.FixedValue = 405
            [Phenology].VegetativePhotoperiodModifier.XYPairs.X = 13.75, 18
            [Phenology].ReproductivePhotoperiodModifier.XYPairs.X = 13.75, 18
          Memo
            Early-maturing, photoperiod-insensitive cultivar developed in Sweden for high latitude environments
        Cultivar F148_7
          Command:
            [Phenology].Vegetative.Target.FixedValue = 314
            [Phenology].EarlyFlowering.Target.FixedValue = 80
            [Phenology].EarlyGrainFilling.Target.FractionofGrainfilling.FixedValue = 0.05
            [Phenology].LateGrainFilling.Target.EntireGrainfillPeriod.FixedValue = 485
            [Phenology].VegetativePhotoperiodModifier.XYPairs.X = 13.75, 17
            [Phenology].ReproductivePhotoperiodModifier.XYPairs.X = 12, 18
            [Leaf].AreaLargestLeaf.FixedValue=0.009
          Memo
            Indeterminate breeding selection from the national PigeonPea breeding program combining phytophthora resistance, earliness,
            culinary quality, and yield
        Cultivar Bowyer
          Command:
            [Phenology].Vegetative.Target.FixedValue = 377
            [Phenology].EarlyFlowering.Target.FixedValue = 80
            [Phenology].EarlyGrainFilling.Target.FractionofGrainfilling.FixedValue = 0.05
            [Phenology].LateGrainFilling.Target.EntireGrainfillPeriod.FixedValue = 405
            [Phenology].VegetativePhotoperiodModifier.XYPairs.X = 13.75, 15.5
            [Phenology].ReproductivePhotoperiodModifier.XYPairs.X = 11.9, 15.5
          Memo
            Brown hilum cultivar, adapted to southern New South Wales, released by K McWhirter in 1982
        Cultivar Bunya
          Command:
            [Phenology].Vegetative.Target.FixedValue = 550
            [Phenology].EarlyFlowering.Target.FixedValue = 80
            [Phenology].EarlyGrainFilling.Target.FractionofGrainfilling.FixedValue = 0.05
            [Phenology].LateGrainFilling.Target.EntireGrainfillPeriod.FixedValue = 405
            [Phenology].VegetativePhotoperiodModifier.XYPairs.X = 13.75, 18
            [Phenology].ReproductivePhotoperiodModifier.XYPairs.X = 10.9, 15.5
            [Leaf].AreaLargestLeaf.FixedValue=0.009
          Memo
            Culinary cultivar released in 2006 by CSIRO with broad adaptation from northern New South Wales to northern Queensland
        Cultivar Cowrie
          Command:
            [Phenology].Vegetative.Target.FixedValue = 390
            [Phenology].EarlyFlowering.Target.FixedValue = 80
            [Phenology].EarlyGrainFilling.Target.FractionofGrainfilling.FixedValue = 0.05
            [Phenology].LateGrainFilling.Target.EntireGrainfillPeriod.FixedValue = 425
            [Phenology].VegetativePhotoperiodModifier.XYPairs.X = 12.75, 16
            [Phenology].ReproductivePhotoperiodModifier.XYPairs.X = 12.75, 16
            [Leaf].AreaLargestLeaf.FixedValue=0.009
          Memo
            Light hilum cultivar released by theNewSouth Wales Department of Agriculture for the coastal Northern Rivers District inNewSouth Wales
        Cultivar Soya791
          Command:
            [Phenology].Vegetative.Target.FixedValue = 430
            [Phenology].EarlyFlowering.Target.FixedValue = 80
            [Phenology].EarlyGrainFilling.Target.FractionofGrainfilling.FixedValue = 0.05
            [Phenology].LateGrainFilling.Target.EntireGrainfillPeriod.FixedValue = 425
            [Phenology].VegetativePhotoperiodModifier.XYPairs.X = 12.75, 15.3
            [Phenology].ReproductivePhotoperiodModifier.XYPairs.X = 12.75, 15.3
            [Leaf].AreaLargestLeaf.FixedValue=0.009
        Cultivar Manark
          Command:
            [Phenology].Vegetative.Target.FixedValue = 440
            [Phenology].EarlyFlowering.Target.FixedValue = 80
            [Phenology].EarlyGrainFilling.Target.FractionofGrainfilling.FixedValue = 0.05
            [Phenology].LateGrainFilling.Target.EntireGrainfillPeriod.FixedValue = 425
            [Phenology].VegetativePhotoperiodModifier.XYPairs.X = 12.75, 15
            [Phenology].ReproductivePhotoperiodModifier.XYPairs.X = 12.75, 15
            [Leaf].AreaLargestLeaf.FixedValue=0.009
        Cultivar Warrigal
          Command:
            [Phenology].Vegetative.Target.FixedValue = 490
            [Phenology].EarlyFlowering.Target.FixedValue = 80
            [Phenology].EarlyGrainFilling.Target.FractionofGrainfilling.FixedValue = 0.05
            [Phenology].LateGrainFilling.Target.EntireGrainfillPeriod.FixedValue = 425
            [Phenology].VegetativePhotoperiodModifier.XYPairs.X = 12.75, 15
            [Phenology].ReproductivePhotoperiodModifier.XYPairs.X = 12.75, 15
            [Leaf].AreaLargestLeaf.FixedValue=0.009
        Cultivar Leichhardt
          Command:
            [Phenology].Vegetative.Target.FixedValue = 806
            [Phenology].EarlyFlowering.Target.FixedValue = 80
            [Phenology].EarlyGrainFilling.Target.FractionofGrainfilling.FixedValue = 0.05
            [Phenology].LateGrainFilling.Target.EntireGrainfillPeriod.FixedValue = 425
            [Phenology].VegetativePhotoperiodModifier.XYPairs.X = 12.75, 14.7
            [Phenology].ReproductivePhotoperiodModifier.XYPairs.X = 12.75, 14.7
            [Leaf].AreaLargestLeaf.FixedValue=0.009
        Cultivar Djakal1
          Command:
            [Phenology].Vegetative.Target.FixedValue = 332
            [Phenology].EarlyFlowering.Target.FixedValue = 80
            [Phenology].EarlyGrainFilling.Target.FractionofGrainfilling.FixedValue = 0.05
            [Phenology].LateGrainFilling.Target.EntireGrainfillPeriod.FixedValue = 440
            [Phenology].VegetativePhotoperiodModifier.XYPairs.X = 13.26, 16.67
            [Phenology].ReproductivePhotoperiodModifier.XYPairs.X = 13.26, 16.67
            [Leaf].AreaLargestLeaf.FixedValue=0.009
      CultivarFolder USA
        Cultivar Trial_MG00
          Command:
            [Phenology].Vegetative.Target.FixedValue = 268
            [Phenology].EarlyFlowering.Target.FixedValue = 76
            [Phenology].EarlyGrainFilling.Target.FractionofGrainfilling.FixedValue = 0.05
            [Phenology].LateGrainFilling.Target.EntireGrainfillPeriod.FixedValue = 432
            [Phenology].VegetativePhotoperiodModifier.XYPairs.X = 14.43, 21.19
            [Phenology].ReproductivePhotoperiodModifier.XYPairs.X = 14.43, 21.19
        Cultivar Lambert_MG0
          Command:
            [Phenology].Vegetative.Target.FixedValue = 294
            [Phenology].EarlyFlowering.Target.FixedValue = 81
            [Phenology].EarlyGrainFilling.Target.FractionofGrainfilling.FixedValue = 0.05
            [Phenology].LateGrainFilling.Target.EntireGrainfillPeriod.FixedValue = 442
            [Phenology].VegetativePhotoperiodModifier.XYPairs.X = 14.29, 20.14
            [Phenology].ReproductivePhotoperiodModifier.XYPairs.X = 14.29, 20.14
        Cultivar IA1006_MG10
          Command:
            [Phenology].Vegetative.Target.FixedValue = 336
            [Phenology].EarlyFlowering.Target.FixedValue = 118
            [Phenology].EarlyGrainFilling.Target.FractionofGrainfilling.FixedValue = 0.05
            [Phenology].LateGrainFilling.Target.EntireGrainfillPeriod.FixedValue = 518
            [Phenology].VegetativePhotoperiodModifier.XYPairs.X = 14.37, 19.30
            [Phenology].ReproductivePhotoperiodModifier.XYPairs.X = 14.37, 19.30
        Cultivar IA2008_MG20
          Command:
            [Phenology].Vegetative.Target.FixedValue = 329
            [Phenology].EarlyFlowering.Target.FixedValue = 150
            [Phenology].EarlyGrainFilling.Target.FractionofGrainfilling.FixedValue = 0.05
            [Phenology].LateGrainFilling.Target.EntireGrainfillPeriod.FixedValue = 580
            [Phenology].VegetativePhotoperiodModifier.XYPairs.X = 13.92, 17.93
            [Phenology].ReproductivePhotoperiodModifier.XYPairs.X = 13.92, 17.93
        Cultivar PioneerP22T61_MG22
          Command:
            [Phenology].Vegetative.Target.FixedValue = 328
            [Phenology].EarlyFlowering.Target.FixedValue = 106
            [Phenology].EarlyGrainFilling.Target.FractionofGrainfilling.FixedValue = 0.3
            [Phenology].LateGrainFilling.Target.EntireGrainfillPeriod.FixedValue = 499
            [Phenology].VegetativePhotoperiodModifier.XYPairs.X = 13.59, 17.6
            [Phenology].ReproductivePhotoperiodModifier.XYPairs.X = 13.59, 17.6
        Cultivar PioneerP22T69R_MG22
          Command:
            [Phenology].Vegetative.Target.FixedValue = 328
            [Phenology].EarlyFlowering.Target.FixedValue = 106
            [Phenology].EarlyGrainFilling.Target.FractionofGrainfilling.FixedValue = 0.35
            [Phenology].LateGrainFilling.Target.EntireGrainfillPeriod.FixedValue = 580
            [Phenology].VegetativePhotoperiodModifier.XYPairs.X = 13.59, 17.6
            [Phenology].ReproductivePhotoperiodModifier.XYPairs.X = 13.59, 17.6
        Cultivar Pioneer92MGI_MG26
          Command:
            [Phenology].Vegetative.Target.FixedValue = 271
            [Phenology].EarlyFlowering.Target.FixedValue = 120
            [Phenology].EarlyGrainFilling.Target.FractionofGrainfilling.FixedValue = 0.125
            [Phenology].LateGrainFilling.Target.EntireGrainfillPeriod.FixedValue = 529
            [Phenology].VegetativePhotoperiodModifier.XYPairs.X = 13.77, 17.57
            [Phenology].ReproductivePhotoperiodModifier.XYPairs.X = 13.77, 17.57
        Cultivar PioneerP92Y75_MG27
          Command:
            [Phenology].Vegetative.Target.FixedValue = 328
            [Phenology].EarlyFlowering.Target.FixedValue = 106
            [Phenology].EarlyGrainFilling.Target.FractionofGrainfilling.FixedValue = 0.14
            [Phenology].LateGrainFilling.Target.EntireGrainfillPeriod.FixedValue = 499
            [Phenology].VegetativePhotoperiodModifier.XYPairs.X = 13.59, 17.6
            [Phenology].ReproductivePhotoperiodModifier.XYPairs.X = 13.59, 17.6
        Cultivar Macon_MG30
          Command:
            [Phenology].Vegetative.Target.FixedValue = 367
            [Phenology].EarlyFlowering.Target.FixedValue = 163
            [Phenology].EarlyGrainFilling.Target.FractionofGrainfilling.FixedValue = 0.175
            [Phenology].LateGrainFilling.Target.EntireGrainfillPeriod.FixedValue = 607
            [Phenology].VegetativePhotoperiodModifier.XYPairs.X = 14.05, 17.56
            [Phenology].ReproductivePhotoperiodModifier.XYPairs.X = 14.05, 17.56
        Cultivar PioneerP93M11_MG31
          Command:
            [Phenology].Vegetative.Target.FixedValue = 250
            [Phenology].EarlyFlowering.Target.FixedValue = 110
            [Phenology].EarlyGrainFilling.Target.FractionofGrainfilling.FixedValue = 0.30
            [Phenology].LateGrainFilling.Target.EntireGrainfillPeriod.FixedValue = 457
            [Phenology].VegetativePhotoperiodModifier.XYPairs.X = 13.4, 16.0
            [Phenology].ReproductivePhotoperiodModifier.XYPairs.X = 13.4, 16.0
            [Grain].MaximumNConc.FixedValue = 0.065
            [Shell].PotentialHarvestIndex.FixedValue = 0.5
            [Leaf].AreaLargestLeaf.FixedValue=0.013
        Cultivar Becks321NRR_MG32
          Command:
            [Phenology].Vegetative.Target.FixedValue = 272
            [Phenology].EarlyFlowering.Target.FixedValue = 117
            [Phenology].EarlyGrainFilling.Target.FractionofGrainfilling.FixedValue = 0.20
            [Phenology].LateGrainFilling.Target.EntireGrainfillPeriod.FixedValue = 522
            [Phenology].VegetativePhotoperiodModifier.XYPairs.X = 13.45, 18.0
            [Phenology].ReproductivePhotoperiodModifier.XYPairs.X = 13.45, 18.0
        Cultivar PioneerP932T16R_MG32
          Command:
            [Phenology].Vegetative.Target.FixedValue = 328
            [Phenology].EarlyFlowering.Target.FixedValue = 106
            [Phenology].EarlyGrainFilling.Target.FractionofGrainfilling.FixedValue = 0.40
            [Phenology].LateGrainFilling.Target.EntireGrainfillPeriod.FixedValue = 499
            [Phenology].VegetativePhotoperiodModifier.XYPairs.X = 13.59, 17.6
            [Phenology].ReproductivePhotoperiodModifier.XYPairs.X = 13.59, 17.6
        Cultivar Becks367NRR_MG37
          Command:
            [Phenology].Vegetative.Target.FixedValue = 267
            [Phenology].EarlyFlowering.Target.FixedValue = 112
            [Phenology].EarlyGrainFilling.Target.FractionofGrainfilling.FixedValue = 0.26
            [Phenology].LateGrainFilling.Target.EntireGrainfillPeriod.FixedValue = 506
            [Phenology].VegetativePhotoperiodModifier.XYPairs.X = 13.27, 17.2
            [Phenology].ReproductivePhotoperiodModifier.XYPairs.X = 13.27, 17.2
        Cultivar AsgrowAG4403_MG40
          Command:
            [Phenology].Vegetative.Target.FixedValue = 292
            [Phenology].EarlyFlowering.Target.FixedValue = 123
            [Phenology].EarlyGrainFilling.Target.FractionofGrainfilling.FixedValue = 0.30
            [Phenology].LateGrainFilling.Target.EntireGrainfillPeriod.FixedValue = 535
            [Phenology].VegetativePhotoperiodModifier.XYPairs.X = 13.09, 16.49
            [Phenology].ReproductivePhotoperiodModifier.XYPairs.X = 13.09, 16.49
        Cultivar HornbeckHBK4891_MG40: same as Replacements.PigeonPea.USA.AsgrowAG4403_MG40
        Cultivar Pioneer94B01_MG40
          Command:
            [Phenology].Vegetative.Target.FixedValue = 322
            [Phenology].EarlyFlowering.Target.FixedValue = 143
            [Phenology].EarlyGrainFilling.Target.FractionofGrainfilling.FixedValue = 0.30
            [Phenology].LateGrainFilling.Target.EntireGrainfillPeriod.FixedValue = 567
            [Phenology].VegetativePhotoperiodModifier.XYPairs.X = 13.05, 16.46
            [Phenology].ReproductivePhotoperiodModifier.XYPairs.X = 13.05, 16.46
        Cultivar PioneerP9504_MG50
          Command:
            [Phenology].Vegetative.Target.FixedValue = 404
            [Phenology].EarlyFlowering.Target.FixedValue = 112
            [Phenology].EarlyGrainFilling.Target.FractionofGrainfilling.FixedValue = 0.30
            [Phenology].LateGrainFilling.Target.EntireGrainfillPeriod.FixedValue = 505
            [Phenology].VegetativePhotoperiodModifier.XYPairs.X = 12.83, 16.13
            [Phenology].ReproductivePhotoperiodModifier.XYPairs.X = 12.83, 16.13
        Cultivar AsgrowAG5701_MG50
          Command:
            [Phenology].Vegetative.Target.FixedValue = 404
            [Phenology].EarlyFlowering.Target.FixedValue = 131
            [Phenology].EarlyGrainFilling.Target.FractionofGrainfilling.FixedValue = 0.30
            [Phenology].LateGrainFilling.Target.EntireGrainfillPeriod.FixedValue = 549
            [Phenology].VegetativePhotoperiodModifier.XYPairs.X = 12.83, 16.13
            [Phenology].ReproductivePhotoperiodModifier.XYPairs.X = 12.83, 16.13
        Cultivar Hutcheson_MG50
          Command:
            [Phenology].Vegetative.Target.FixedValue = 438
            [Phenology].EarlyFlowering.Target.FixedValue = 112
            [Phenology].EarlyGrainFilling.Target.FractionofGrainfilling.FixedValue = 0.30
            [Phenology].LateGrainFilling.Target.EntireGrainfillPeriod.FixedValue = 505
            [Phenology].VegetativePhotoperiodModifier.XYPairs.X = 12.58, 15.88
            [Phenology].ReproductivePhotoperiodModifier.XYPairs.X = 12.58, 15.88
        Cultivar NK622_MG60
          Command:
            [Phenology].Vegetative.Target.FixedValue = 436
            [Phenology].EarlyFlowering.Target.FixedValue = 93
            [Phenology].EarlyGrainFilling.Target.FractionofGrainfilling.FixedValue = 0.30
            [Phenology].LateGrainFilling.Target.EntireGrainfillPeriod.FixedValue = 467
            [Phenology].VegetativePhotoperiodModifier.XYPairs.X = 12.39, 15.61
            [Phenology].ReproductivePhotoperiodModifier.XYPairs.X = 12.39, 15.61
      CultivarFolder Generic
        Cultivar Generic_MG000
          Command:
            [Phenology].Vegetative.Target.FixedValue = 310
            [Phenology].EarlyFlowering.Target.FixedValue = 100
            [Phenology].EarlyGrainFilling.Target.FractionofGrainfilling.FixedValue = 0.475
            [Phenology].LateGrainFilling.Target.EntireGrainfillPeriod.FixedValue = 590
            [Phenology].VegetativePhotoperiodModifier.XYPairs.X = 14.6, 22.35
            [Phenology].ReproductivePhotoperiodModifier.XYPairs.X = 14.6, 22.35
        Cultivar Generic_MG00
          Command:
            [Phenology].Vegetative.Target.FixedValue = 320
            [Phenology].EarlyFlowering.Target.FixedValue = 100
            [Phenology].EarlyGrainFilling.Target.FractionofGrainfilling.FixedValue = 0.467
            [Phenology].LateGrainFilling.Target.EntireGrainfillPeriod.FixedValue = 600
            [Phenology].VegetativePhotoperiodModifier.XYPairs.X = 14.35, 21.11
            [Phenology].ReproductivePhotoperiodModifier.XYPairs.X = 14.35, 21.11
        Cultivar Generic_MG0
          Command:
            [Phenology].Vegetative.Target.FixedValue = 336
            [Phenology].EarlyFlowering.Target.FixedValue = 120
            [Phenology].EarlyGrainFilling.Target.FractionofGrainfilling.FixedValue = 0.422
            [Phenology].LateGrainFilling.Target.EntireGrainfillPeriod.FixedValue = 616
            [Phenology].VegetativePhotoperiodModifier.XYPairs.X = 14.1, 19.95
            [Phenology].ReproductivePhotoperiodModifier.XYPairs.X = 14.1, 19.95
        Cultivar Generic_MG1
          Command:
            [Phenology].Vegetative.Target.FixedValue = 340
            [Phenology].EarlyFlowering.Target.FixedValue = 120
            [Phenology].EarlyGrainFilling.Target.FractionofGrainfilling.FixedValue = 0.411
            [Phenology].LateGrainFilling.Target.EntireGrainfillPeriod.FixedValue = 632
            [Phenology].VegetativePhotoperiodModifier.XYPairs.X = 13.84, 18.77
            [Phenology].ReproductivePhotoperiodModifier.XYPairs.X = 13.84, 18.77
        Cultivar Generic_MG2
          Command:
            [Phenology].Vegetative.Target.FixedValue = 348
            [Phenology].EarlyFlowering.Target.FixedValue = 120
            [Phenology].EarlyGrainFilling.Target.FractionofGrainfilling.FixedValue = 0.386
            [Phenology].LateGrainFilling.Target.EntireGrainfillPeriod.FixedValue = 648
            [Phenology].VegetativePhotoperiodModifier.XYPairs.X = 13.59, 17.61
            [Phenology].ReproductivePhotoperiodModifier.XYPairs.X = 13.59, 17.61
        Cultivar Generic_MG3
          Command:
            [Phenology].Vegetative.Target.FixedValue = 380
            [Phenology].EarlyFlowering.Target.FixedValue = 120
            [Phenology].EarlyGrainFilling.Target.FractionofGrainfilling.FixedValue = 0.361
            [Phenology].LateGrainFilling.Target.EntireGrainfillPeriod.FixedValue = 664
            [Phenology].VegetativePhotoperiodModifier.XYPairs.X = 13.4, 16.91
            [Phenology].ReproductivePhotoperiodModifier.XYPairs.X = 13.4, 16.91
        Cultivar Generic_MG4
          Command:
            [Phenology].Vegetative.Target.FixedValue = 388
            [Phenology].EarlyFlowering.Target.FixedValue = 140
            [Phenology].EarlyGrainFilling.Target.FractionofGrainfilling.FixedValue = 0.324
            [Phenology].LateGrainFilling.Target.EntireGrainfillPeriod.FixedValue = 664
            [Phenology].VegetativePhotoperiodModifier.XYPairs.X = 13.1, 16.49
            [Phenology].ReproductivePhotoperiodModifier.XYPairs.X = 13.1, 16.49
        Cultivar Generic_MG5
          Command:
            [Phenology].Vegetative.Target.FixedValue = 396
            [Phenology].EarlyFlowering.Target.FixedValue = 160
            [Phenology].EarlyGrainFilling.Target.FractionofGrainfilling.FixedValue = 0.072
            [Phenology].LateGrainFilling.Target.EntireGrainfillPeriod.FixedValue = 696
            [Phenology].VegetativePhotoperiodModifier.XYPairs.X = 12.83, 16.13
            [Phenology].ReproductivePhotoperiodModifier.XYPairs.X = 12.83, 16.13
        Cultivar Generic_MG6
          Command:
            [Phenology].Vegetative.Target.FixedValue = 404
            [Phenology].EarlyFlowering.Target.FixedValue = 180
            [Phenology].EarlyGrainFilling.Target.FractionofGrainfilling.FixedValue = 0.056
            [Phenology].LateGrainFilling.Target.EntireGrainfillPeriod.FixedValue = 712
            [Phenology].VegetativePhotoperiodModifier.XYPairs.X = 12.58, 15.8
            [Phenology].ReproductivePhotoperiodModifier.XYPairs.X = 12.58, 15.8
        Cultivar Generic_MG7
          Command:
            [Phenology].Vegetative.Target.FixedValue = 416
            [Phenology].EarlyFlowering.Target.FixedValue = 200
            [Phenology].EarlyGrainFilling.Target.FractionofGrainfilling.FixedValue = 0.055
            [Phenology].LateGrainFilling.Target.EntireGrainfillPeriod.FixedValue = 728
            [Phenology].VegetativePhotoperiodModifier.XYPairs.X = 12.33, 15.46
            [Phenology].ReproductivePhotoperiodModifier.XYPairs.X = 12.33, 15.46
        Cultivar Generic_MG8
          Command:
            [Phenology].Vegetative.Target.FixedValue = 430
            [Phenology].EarlyFlowering.Target.FixedValue = 200
            [Phenology].EarlyGrainFilling.Target.FractionofGrainfilling.FixedValue = 0.054
            [Phenology].LateGrainFilling.Target.EntireGrainfillPeriod.FixedValue = 744
            [Phenology].VegetativePhotoperiodModifier.XYPairs.X = 12.07, 15.1
            [Phenology].ReproductivePhotoperiodModifier.XYPairs.X = 12.07, 15.1
        Cultivar Generic_MG9
          Command:
            [Phenology].Vegetative.Target.FixedValue = 460
            [Phenology].EarlyFlowering.Target.FixedValue = 200
            [Phenology].EarlyGrainFilling.Target.FractionofGrainfilling.FixedValue = 0.053
            [Phenology].LateGrainFilling.Target.EntireGrainfillPeriod.FixedValue = 748
            [Phenology].VegetativePhotoperiodModifier.XYPairs.X = 11.88, 14.82
            [Phenology].ReproductivePhotoperiodModifier.XYPairs.X = 11.88, 14.82
        Cultivar Generic_MG10
          Command:
            [Phenology].Vegetative.Target.FixedValue = 470
            [Phenology].EarlyFlowering.Target.FixedValue = 200
            [Phenology].EarlyGrainFilling.Target.FractionofGrainfilling.FixedValue = 0.053
            [Phenology].LateGrainFilling.Target.EntireGrainfillPeriod.FixedValue = 748
            [Phenology].VegetativePhotoperiodModifier.XYPairs.X = 11.78, 14.65
            [Phenology].ReproductivePhotoperiodModifier.XYPairs.X = 11.78, 14.65
    Report DailyReport: EventNames=[Clock].DoReport
      VariableNames:
        [Clock].Today
        [Clock].Today as Date
        [Clock].Today.DayOfYear
        [PigeonPea].Phenology.DaysAfterSowing
        [PigeonPea].Phenology.Stage
        [PigeonPea].Phenology.CurrentStageName
        [PigeonPea].Phenology.VegetativeThermalTime
        [PigeonPea].Phenology.ReproductiveThermalTime
        [Weather].MeanT
        [Weather].Radn
        [Weather].MaxT
        [Weather].MinT
        [PigeonPea].Arbitrator.DM.TotalFixationSupply
        sum([PigeonPea].Arbitrator.N.Fixation) as NFixed
        [PigeonPea].Arbitrator.DM.TotalPlantDemand
        [PigeonPea].Arbitrator.WDemand
        [PigeonPea].Arbitrator.WSupply
        [PigeonPea].Phenology.Photoperiod
        [PigeonPea].AboveGround.Wt
        [PigeonPea].AboveGround.N
        [PigeonPea].Leaf.NodeNumber
        [PigeonPea].Leaf.Fw
        [PigeonPea].Leaf.Fn
        [PigeonPea].Leaf.Photosynthesis.FT
        [PigeonPea].Leaf.LAI
        [PigeonPea].Leaf.CoverGreen
        [PigeonPea].Leaf.CoverTotal
        [PigeonPea].Leaf.Live.Wt
        [PigeonPea].Leaf.Live.StructuralWt
        [PigeonPea].Leaf.Live.MetabolicWt
        [PigeonPea].Leaf.Allocated.MetabolicWt
        [PigeonPea].Leaf.Allocated.StructuralWt
        [PigeonPea].Leaf.Dead.StructuralWt
        [PigeonPea].Leaf.Dead.MetabolicWt
        [PigeonPea].Leaf.Live.N
        [PigeonPea].Leaf.Live.NConc
        [PigeonPea].Leaf.Dead.Wt
        [PigeonPea].Leaf.Dead.N
        [PigeonPea].Leaf.Dead.NConc
        [PigeonPea].Leaf.SpecificArea
        [PigeonPea].Leaf.Wt
        [PigeonPea].Leaf.Nconc
        [PigeonPea].Leaf.Senesced.Wt
        [PigeonPea].Stem.Wt
        [PigeonPea].Stem.Total.StructuralWt
        [PigeonPea].Stem.Live.StructuralWt
        [PigeonPea].Stem.Live.StructuralN
        [PigeonPea].Stem.N
        [PigeonPea].Stem.Nconc
        [PigeonPea].Shell.Wt
        [PigeonPea].Shell.Live.Wt
        [PigeonPea].Shell.N
        [PigeonPea].Shell.Nconc
        [PigeonPea].Grain.Wt
        [PigeonPea].Grain.N
        [PigeonPea].Grain.Nconc
        [PigeonPea].Grain.HarvestIndex
        [PigeonPea].Shell.Wt
        [PigeonPea].Pod.Wt
        [PigeonPea].Pod.N
        [PigeonPea].Pod.NConc
        [PigeonPea].Nodule.NFixed
        [PigeonPea].Root.Wt
        //sum([Soil].Nutrient.NO3.kgha) as TotalSoilNO3
        //sum([Soil].Nutrient.NH4.kgha) as TotalSoilNH4
        sum([Soil].SoilWater.SWmm) as TotalSW
        [Soil].SoilWater.SW[1:3]
        [PigeonPea].Leaf.Height
        [PigeonPea].Root.Depth
        sum([Soil].SoilWater.ESW) as TotalESW
    Report HarvestReport: EventNames=[PigeonPea].Harvesting
      VariableNames:
        [Clock].Today
        [Clock].Today as Date
        [PigeonPea].Phenology.CurrentStageName
        [PigeonPea].Phenology.EmergenceDAS
        [PigeonPea].Phenology.FloweringDAS
        [PigeonPea].Phenology.MaturityDAS
        [PigeonPea].AboveGround.Wt
        [PigeonPea].Grain.Wt
  Folder Validation
    Memo
      The PigeonPea model has been tested across a range of planting and agronomic conditions.  These include datasets covering a wide range of weather conditions (See graphs that follow) and agronomic factors (irrigation, fertiliser, sowing dates).
    Folder Combined Results
      Memo Combined Results
        Simulation results for the combined datasets from the various countries are shown in the following graphs.  The model is able to adequately capture the influence of growing conditions (soil, climate) and management (population, Nitrogen, irrigation, sowing date).
    Folder India
      Folder Patancheru
        Memo
          These data [Timsina2007] were obtained from a field experiment conducted in 1999–2000 on a Hanwood loam soil at CSIRO Land and Water, Griffith, Australia.  Two indeterminate PigeonPea cultivars (Hooper and Stephens belonging to late maturity group [MG] 3 or early MG 4) were on 15 November, 8 December, and 6 January.
        Simulation PATANCHERUs742v4
          Clock: Start=1974-05-27; End=1974-10-23
          Summary summaryfile
          Weather: FileName=Patancheru.met
          SoilArbitrator Soil Arbitrator
          Zone paddock: Area=1; Slope=0; AspectAngle=0; Altitude=50
            Soil s742v4: ASCOrder=NA; ASCSubOrder=NA; SoilType=Haplic Luvisols; Site=NA; NearestTown=NA; Region=NA; State=NA; Country=India; NaturalVegetation=NA; ApsoilNumber=9999; Latitude=17.625; Longitude=78.375; LocationAccuracy=+- 250 m; DataSource=ISRIC SoilGrids
              Sample Initial nitrogen: SWUnits=Volumetric; OCUnits=Total; PHUnits=Water
                Thickness  NO3N  NH4N
                150        5     2.5
                150        3     2.5
                300        2     1.5
                300        1     1
                300        1     0.5
                300        1     0.5
                300        0.5   0.5
              InitialWater Initial water: PercentMethod=1; FractionFull=0.1
              Physical
                Thickness  ParticleSizeClay  ParticleSizeSand  ParticleSizeSilt  BD   AirDry  LL15   DUL    SAT
                150        30                44.8              25                1.2  0.1     0.224  0.39   0.44
                150        34.5              41.5              24.5              1.2  0.2     0.245  0.417  0.467
                300        37.5              38.7              23.8              1.2  0.246   0.246  0.417  0.467
                300        38.5              38.2              23.2              1.2  0.246   0.246  0.401  0.451
                300        39                38                23.2              1.2  0.247   0.247  0.403  0.453
                300        39                38                23.8              1.2  0.256   0.256  0.43   0.48
                300        38.8              38.2              23.9              1.2  0.256   0.256  0.43   0.48
                SoilCrop PigeonPeaSoil: LL=[0.224, 0.245, 0.246, 0.246, 0.247, 0.256, 0.256]; KL=[0.12, 0.08, 0.05, 0.05, 0.05, 0.05, 0.05]; XF=[1, 1, 1, 1, 1, 1, 1]
              WaterBalance SoilWater: SummerDate=1-may; SummerU=6; SummerCona=6; WinterDate=1-oct; WinterU=6; WinterCona=6; DiffusConst=4453.16; DiffusSlope=8.8; Salb=0.13; CN2Bare=73; CNRed=20; CNCov=0; Slope=0.5; DischargeWidth=5; CatchmentArea=10; Thickness=[150, 150, 300, 300, 300, 300, 300, -, -, -]; SWCON=[0.1, 0.1, 0.1, 0.1, 0.1, 0.1, 0.1, -, -, -]
              SoilNitrogen: fom_types=[default, manure, mucuna, lablab, shemp, stable]; fract_carb=[0.2, 0.3, 0.54, 0.57, 0.45, 0]; fract_cell=[0.7, 0.3, 0.37, 0.37, 0.47, 0.1]; fract_lign=[0.1, 0.4, 0.09, 0.06, 0.08, 0.9]
                SoilNitrogenNO3 NO3
                SoilNitrogenNH4 NH4
                SoilNitrogenUrea Urea
                SoilNitrogenPlantAvailableNO3 PlantAvailableNO3
                SoilNitrogenPlantAvailableNH4 PlantAvailableNH4
              CERESSoilTemperature
              Organic: FOMCNRatio=45
                Thickness  Carbon  SoilCNRatio  FBiom  FInert  FOM
                150        0.96    14.5         0.04   0.39    500
                150        0.87    14.5         0.02   0.47    200
                300        0.69    14.5         0.015  0.52    100
                300        0.63    14.5         0.01   0.62    50
                300        0.6     14.5         0.01   0.74    50
                300        0.53    14.5         0.01   0.83    50
                300        0.3     14.5         0.01   0.93    50
              Chemical
                Thickness  NO3N  NH4N  PH
                150        5     2.5   7.5
                150        3     2.5   8
                300        2     1.5   8
                300        1     1     8
                300        1     0.5   8
                300        1     0.5   8
                300        0.5   0.5   8
            MicroClimate: a_interception=0; b_interception=1; c_interception=0; d_interception=0; soil_albedo=0.23; SoilHeatFluxFraction=0.4; MinimumHeightDiffForNewLayer=0; NightInterceptionFraction=0.5; ReferenceHeight=2
            Irrigation
            Fertiliser
            SurfaceOrganicMatter: InitialResidueName=pigeonpea; InitialResidueType=pigeonpea; InitialResidueMass=1000; InitialStandingFraction=0; InitialCPR=0; InitialCNR=55
            Plant PigeonPea
            Manager SowingRule
              RowSpacing = 750
              SowingDepth = 30
              SowingRate = 4.44
              CultivarName = Generic_MG5
              SowingDate = 06/26/1974 00:00:00
```csharp
using APSIM.Shared.Utilities;
using Models.PMF;
using Models.Core;
using System;
        
        namespace Models
        {
           [Serializable] 
           [System.Xml.Serialization.XmlInclude(typeof(Model))]
            public class Script : Model
            {      
               [Link] Plant PigeonPea;
               [Link] Clock Clock;

               [Description("Spacing (mm) between rows")]
               public double RowSpacing { get; set; }
               [Description("Depth (mm) Grains are planted")]
               public double SowingDepth { get; set; }
               [Description("Seeds sown (/m2)")]
               public double SowingRate { get; set; }
               [Description("Cultivar")]
               [Display(Type=DisplayType.CultivarName)]
               public string CultivarName { get; set; }
               [Description("Sowing Date")]
               public DateTime SowingDate { get; set; }

               [EventSubscribe("DoManagement")]
               private void OnDoManagement(object sender, EventArgs e)
               {
                if (Clock.Today.Date == SowingDate)
                    PigeonPea.Sow(population:SowingRate, cultivar:CultivarName, depth:SowingDepth, rowSpacing:RowSpacing, budNumber:1);
               }
            }
        }
```
            Manager Fertilise at sowing
              Crop = [PigeonPea]
              FertiliserType = NH4NO3N
              Amount = 100
```csharp
using Models.PMF;
using Models.Core;
using System;
namespace Models
{
    [Serializable]
    public class Script : Model
    {
        [Link] Clock Clock;
        [Link] Fertiliser Fertiliser;
        
        [Description("Crop to be fertilised")]
        public IPlant Crop { get; set; }

        [Description("Type of fertiliser to apply? ")] 
        public Fertiliser.Types FertiliserType { get; set; }
    
        [Description("Amount of fertiliser to be applied (kg/ha)")]
        public double Amount { get; set; }
        
        [EventSubscribe("Sowing")]
        private void OnSowing(object sender, EventArgs e)
        {
            Model crop = sender as Model;
            if (Crop != null && crop.Name.ToLower() == (Crop as IModel).Name.ToLower())
                Fertiliser.Apply(Amount: Amount, Type: FertiliserType);
        }
    }
}
```
            Manager Fertilise on fixed dates (disabled)
              FertiliserType = NO3N
              FertiliserDates = 30-may
              Amount = 60
              AmountType = True
```csharp
using APSIM.Shared.Utilities;
using Models.PMF;
using Models.Core;
using System;
namespace Models
{
    [Serializable]
    public class Script : Model
    {
        [Link] Clock Clock;
        [Link] Fertiliser Fertiliser;
        
        [Separator("A component to apply fertiliser on one or more dates on every year of the simulation")]

        [Description("Type of fertiliser to apply? ")] 
        public Fertiliser.Types FertiliserType { get; set; }

        [Description("Enter the fertilisation dates as dd-mmm with comma separation (any year information entered will be ignored): ")] 
        public string[] FertiliserDates { get; set; } 

        [Description("Amount of fertiliser to be applied (kg /ha)")] 
        public double Amount { get; set; }

        [Description("Is the above amount to be applied each time? (yes/ticked)? Or is it the total annual amount across all dates (no/unticked)")] 
        public bool AmountType { get; set; }
        
        [EventSubscribe("DoManagement")]
        private void OnDoManagement(object sender, EventArgs e)
        {
            foreach (string ddMMM in FertiliserDates)
            {
                if (DateUtilities.DatesEqual(ddMMM, Clock.Today))
                {
                    if (AmountType)
                        Fertiliser.Apply(Amount: Amount, Type: FertiliserType);
                    else
                        Fertiliser.Apply(Amount: Amount / FertiliserDates.Length, Type: FertiliserType);
                }
            }
        }
    }
}
```
            Manager Automatic irrigation based on water deficit
              FASW = 0
              WaterDeficit = 0
              AutoIrrigationOn = True
              FASWThreshold = 0.9
              FASWDepth = 900
```csharp
using APSIM.Shared.Utilities;
using System.Xml.Serialization;
using Models;
using Models.PMF;
using Models.Soils.Nutrients;
using Models.Soils;
using System.Text;
using System.Collections.Generic;
using Models.Core;
using System;

namespace Models
{
    [Serializable] 
    public class Script : Model
    {
        public double FASW { get; set; }
        public double WaterDeficit  { get; set; }
    
        [Link] Zone zone;
        [Link] Irrigation irrigation;
        [Link] Soil soil;
        
        [Description("Auto irrigation on?")]
        public bool AutoIrrigationOn { get; set; }

        [Description("Threshold fraction available water (0-1)")]
        public double FASWThreshold { get; set; }

        [Description("Soil depth (mm) to which fraction available water is calculated")]
        public double FASWDepth { get; set; }

        [EventSubscribe("DoManagement")]
        private void OnDoManagement(object sender, EventArgs e)
        {
            CalculateFASW();
            if (AutoIrrigationOn)
            {
                if (FASW < FASWThreshold)
                {
                    double amount = 10;
                    irrigation.Apply(WaterDeficit, depth: 0);
                }
            }
        }
        
        private void CalculateFASW()
        {
            double[] LL15 = MathUtilities.Multiply(soil.LL15, soil.Thickness);
            double[] DUL = MathUtilities.Multiply(soil.DUL, soil.Thickness);
        
            int nlayr = GetLayerIndex();
            double cumdep = MathUtilities.Sum(soil.Thickness, 0, nlayr, 0.0);

            double excess_fr = MathUtilities.Divide((cumdep - FASWDepth), soil.Thickness[nlayr], 0.0);

            // note that results may be strange if swdep < ll15
            double avail_sw = (MathUtilities.Sum(soil.Water, 0, nlayr, 0.0)
                              - excess_fr * soil.Water[nlayr])
                              - (MathUtilities.Sum(LL15, 0, nlayr, 0.0)
                              - excess_fr * LL15[nlayr]);


            double pot_avail_sw = (MathUtilities.Sum(DUL, 0, nlayr, 0.0)
                                  - excess_fr * DUL[nlayr])
                                  - (MathUtilities.Sum(LL15, 0, nlayr, 0.0)
                                  - excess_fr * LL15[nlayr]);

            FASW = MathUtilities.Divide(avail_sw, pot_avail_sw, 0.0);
            WaterDeficit = MathUtilities.Constrain(pot_avail_sw - avail_sw, 0.0, 100000);
        }

        private int GetLayerIndex()
        {
            double[] cumThickness = soil.ThicknessCumulative;
            for (int i = 1; i < cumThickness.Length; i++)
            {
                if (FASWDepth < cumThickness[i])
                    return i - 1;
            }
            
            return cumThickness.Length - 1;
        }

    }
}
```
            Report DailyReport: EventNames=[Clock].DoReport
              VariableNames:
                [Clock].Today
                [DiagnosticsVariables].Script.AccumPlantN
                [DiagnosticsVariables].Script.AccumMineralisation
                [DiagnosticsVariables].Script.AccumDenit
                [DiagnosticsVariables].Script.AccumFert
                [DiagnosticsVariables].Script.AccumLeach
                [DiagnosticsVariables].Script.AccumDetach
                [DiagnosticsVariables].Script.DeltaSoilOMN
                [DiagnosticsVariables].Script.DeltaSurfaceOMN
                [DiagnosticsVariables].Script.DeltaSoilMineralN
                [PigeonPea].Root.NSupply
                [Soil].SoilWater.Eo
                [Soil].SoilWater.Es
                [DiagnosticsVariables].Script.SWC
                [DiagnosticsVariables].Script.DUL
                [Soil].SoilWater.Drainage
                [Soil].SoilWater.Runoff
                [DiagnosticsVariables].Script.OutFlowLat
                [Soil].SoilWater.pond
                [DiagnosticsVariables].Script.AccumEO
                [DiagnosticsVariables].Script.AccumEP
                [DiagnosticsVariables].Script.AccumES
                [DiagnosticsVariables].Script.AccumDrainage
                [DiagnosticsVariables].Script.AccumRunoff
                [DiagnosticsVariables].Script.AccumRainfall
                [DiagnosticsVariables].Script.AccumIrrigation
                [DiagnosticsVariables].Script.AccumOutflowLat
                [DiagnosticsVariables].Script.SoilWaterDeficit
                [PigeonPea].Grain.Live.Wt
                [PigeonPea].Shell.Live.Wt
                [PigeonPea].Stem.Live.Wt
                [PigeonPea].Stem.Live.Wt
                [PigeonPea].Grain.Live.N
                [PigeonPea].Shell.Live.N
                [PigeonPea].Leaf.Live.Wt
                [PigeonPea].Root.Live.Wt
                [PigeonPea].Leaf.Live.N
                [PigeonPea].Root.Live.N
                [PigeonPea].Leaf.Live.NConc
                [PigeonPea].Root.Live.NConc
                [PigeonPea].Root.WaterSupply
                [PigeonPea].Root.WaterUptake
                [PigeonPea].Leaf.Transpiration
                [PigeonPea].Leaf.WaterDemand
                [PigeonPea].Root.Depth
                [PigeonPea].Leaf.CoverTotal
                [PigeonPea].Leaf.CoverDead
                [PigeonPea].Leaf.LAI
                [PigeonPea].Leaf.Height
                [PigeonPea].Leaf.PotentialBiomass
                [Soil].SoilWater.SWmm
                [Soil].Nutrient.NO3.kgha
                [DiagnosticsVariables].Script.SoilNitrogenContent
                [PigeonPea].Arbitrator.N.TotalPlantDemand
                [MicroClimate].net_radn
                [MicroClimate].peta
                [MicroClimate].petr
                [DiagnosticsVariables].Script.FomN
                [DiagnosticsVariables].Script.HumN
                [DiagnosticsVariables].Script.BiomN
                [DiagnosticsVariables].Script.DltNMinRes
                [DiagnosticsVariables].Script.DltNMinTot
                [PigeonPea].Leaf.Fw
                [PigeonPea].Leaf.Fn
                [PigeonPea].Phenology.CurrentPhaseName
                [PigeonPea].Phenology.Stage
                [PigeonPea].Pod.Wt
                [PigeonPea].Pod.N
                [PigeonPea].Structure.LeafTipsAppeared
                [PigeonPea].Structure.MainStemPrimordiaNo
                [PigeonPea].Leaf.CohortArea[1]
                [PigeonPea].Leaf.CohortArea[2]
                [PigeonPea].Leaf.CohortArea[3]
                [PigeonPea].Leaf.CohortArea[4]
                [PigeonPea].Leaf.CohortArea[5]
                [PigeonPea].Leaf.CohortArea[6]
                [PigeonPea].Leaf.CohortArea[7]
                [PigeonPea].Leaf.CohortArea[8]
                [PigeonPea].Leaf.CohortArea[9]
                [PigeonPea].Leaf.CohortArea[10]
                [PigeonPea].Leaf.CohortArea[11]
                [PigeonPea].Leaf.CohortArea[12]
                [PigeonPea].Leaf.CohortArea[13]
                [PigeonPea].Leaf.CohortArea[14]
                [PigeonPea].Leaf.CohortArea[15]
                [PigeonPea].Leaf.AppearedCohortNo
                [PigeonPea].Leaf.DeadCohortNo
                [PigeonPea].AboveGround.Wt
                [PigeonPea].Phenology.Stage
                [PigeonPea].Structure.MainStemPrimordiaNo
                [PigeonPea].Phenology.NFF
                [SoybeanHarvestRule].Script.FinalTag
                [PigeonPea].Grain.NumberFunction
                [PigeonPea].Shell.PodNumber
                [PigeonPea].Phenology.FN
                [PigeonPea].Phenology.FN.TotalNodes
                [PigeonPea].Phenology.FN.VegetativeNodes
            Report HarvestReport: EventNames=[PigeonPea].Harvesting
              VariableNames:
                [Clock].Today
                [PigeonPea].Structure.MainStemPrimordiaNo
                [PigeonPea].Phenology.NFF
                [PigeonPea].Script.FinalTag
            Manager Harvesting
              Crop = [PigeonPea]
```csharp
using APSIM.Shared.Utilities;
using Models.Utilities;
using Models.Soils;
using Models.PMF;
using Models.Core;
using System;

namespace Models
{
    [Serializable] 
    public class Script : Model
    {
        [Description("Crop")]
        public IPlant Crop { get; set; }
        
        [EventSubscribe("DoManagement")]
        private void OnDoManagement(object sender, EventArgs e)
        {
            if (Crop.IsReadyForHarvesting)
            {
                Crop.Harvest();
                Crop.EndCrop();
            }
        }
    }
}
```
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