Simulations: Version=8
  Replacements
    Plant Potato: CropType=Potato
      Memo TitlePage
        # The APSIM Potato Model

        _Brown, H.E., Huth, N.I. and Holzworth, D.P._

        ##Building the model.
        The APSIM potato model has been described in part by [Brown_etal_2011] and developed using the Plant Modelling Framework (PMF) of [brown_plant_2014]. This new framework provides a library of plant organ and process submodels that can be coupled, at runtime, to construct a model in much the same way that models can be coupled to construct a simulation. This means that dynamic composition of lower level process and organ classes (e.g. photosynthesis, leaf) into larger constructions (e.g. maize, wheat, sorghum) can be achieved by the model developer without additional coding.

        The model consists of:

        * a phenology model to simulate development between growth phases
        * a structure model to simulate plant morphology
        * a collection of organs to simulate the various plant parts
        * an arbitrator to allocate resources (N, biomass) to the various plant organs

        ##Pecularities of potato
        Potato is a challenging crop to model because it is vegetatviely propigated.  For seed propigate crops, plants are always equally dormant at planting and their development begins there on.  With potato the physiological status of the seed tubers vary depending on:
        * the conditions the mother plant encountered late in its life (Stress, Desication etc)
        * the conditions that the tuber was stored (Cool store, ground store, dry store etc)
        * treatment of the seed prior to planting (chitting, cutting etc)
        All of these factors infuence the developmental behaviour of the crop that is produced including
        * The timing of emergence
        * The number of stems produced per plant and subsequent tuber number and canopy development
        * The timing of tuber initiation and subsequent growth and partitioning
        * The duration of haulm growth and subsequent tuber filling duration

        There are an enormous number of potato cultivars and they, they all differ in their responses of post planting behavour due to pre planting seed conditions, there is not a good quantitative understanding of how environment and managemet of seed potato prior to planting influences post planting behaviour and it is beyond the scope of the current APSIM infrastructure to provide environmental conditions during storage of seed.  We have tried but with a list of excuses this long we have not yet succeeded in building the effects of seed physiology into the potato model in anything other than a very elementry way.  However, it is possible to set the model up to capture seed effects for specific simulations.

        ##Including a potato crop in an APSIM simulation
        To indluce a potato crop in a simulation the Potato model needs to be added to the paddock, field or zone in which it is to be grown.  This can be done by right clicking on the paddock, selecting Add from the drop down menu and then selecting potato from the list that comes up.  A sowing action also needs to be set to start the crop off and a harvest event to remove the potato crop so the next crop can be simulated.  The PlantPotatos manager module that is included in the Potato Example simulation has script written to instigate these events and can be copied from the example simulation into other simulations.
        ###Setting sowing depth (emergence date)
        The potato model predicts emergence date as a function of sowing depth and all subsequent phenology is dependent on this timing.  Because this date is effected by seed physiology and can't yet be modeled we recommend that planting depth is not set at the actual planting depth, but varied to ensure the model predicts a realistic emergence date.
        ###Setting stem number (tuber number and early canopy growth)
        The PotatoManagement script sets the number of stems that will appear from each seed piece.  This varies enormiously due to seed physiology and variety and should be set to a number that is realistic for the cultivar being simulated and the pre-planting treatment of the seed tubers.  This parameter influences tuber number and the early development of the canopy so should be set carefully.
        ###Setting final leaf number (Crop duration)
        The duration of a potato crop is determined by the number of leaves that the mainstem produces and how long it takes for these to appear and seness.  This responds to photoperiod in many varieties and is influenced by the pre-planting treatment of seed tubers.  As such this parameter is given a default value for each cultivar but can also be set in the PotatoManagement script if more is know about the expected determinany of the potatoes under the circumstances being simulated.  Please read  [Brown_etal_2011] for a clear definition of final leaf number.
      Phenology: DaysAfterSowing=0
        AirTemperatureFunction ThermalTime
          XYPairs: X=[2, 20, 35]; Y=[0, 18, 0]
        GenericPhase Dormant: Start=Planting; End=Peeping
          Memo
            This phase is currenttly set with a very short duration and is a place holder until we have a suitalbe method for modelling tuber dormancy
          VariableReference ThermalTime: VariableName=[Phenology].ThermalTime.Value()
          Constant Target: FixedValue=1
        EmergingPhase Sprouting: Start=Peeping; End=Emergence; ShootLag=72; ShootRate=1.35
          Memo
            The sprouting phase controls when the crop emerges.  In potato this is influenced by the physiological stage of the seed tuber when it is planted.  This is difficult to model as the seed tubers physiological status begins when it is still on the mother plant and is influenced by the treatment of the mother plant, the storage conditions of the tuber, conditions when the seed is being prepared for planting and the variety of potato.  There is currently no good way of modelling this as it would require environmental information from beyond the field where the crop is to be grown which is currently beyond the scope of APSIM.  In the absence of something more elegent, we recommend that the user adjusts sowing depth to achieve a realistic emergence date and let the model deal with phenological develpment there after.
          VariableReference ThermalTime: VariableName=[Phenology].ThermalTime.Value()
        GenericPhase Vegetative: Start=Emergence; End=TuberInitiation
          Constant Target: FixedValue=300
          Memo
            During the vegetative phase the crop is only growing stem, root and leaf.  Tuber initiation usually occurs soon after emergence and the duration of this phase can be influenced by the physiological status of the seed tuber at planting.  As discussed above, we do not have a suitable method for modelling this yet so we have treated the time from emergence to tuber initiation as a thermal time constant.
          VariableReference ThermalTime: VariableName=[Phenology].ThermalTime.Value()
        LeafAppearancePhase EarlyTuber: Start=TuberInitiation; End=FinalLeaf
          Memo: same as Replacements.Potato.Phenology.Vegetative.Memo
          VariableReference ThermalTime: VariableName=[Phenology].ThermalTime.Value()
        LeafDeathPhase LateTuber: Start=FinalLeaf; End=FullSenescence
          VariableReference ThermalTime: VariableName=[Phenology].ThermalTime.Value()
        GenericPhase Senesced: Start=FullSenescence; End=Maturity
          Constant Target: FixedValue=200
          VariableReference ThermalTime: VariableName=[Phenology].ThermalTime.Value()
        EndPhase Maturity: Start=Maturity; End=Unused
          VariableReference ThermalTime: VariableName=[Phenology].ThermalTime.Value()
      OrganArbitrator Arbitrator
        PrioritythenRelativeAllocation NArbitrator
        RelativeAllocation DMArbitrator
      Structure: Initialised=false; Germinated=false; Emerged=false; CohortToInitialise=0; TipToAppear=0; ApexNum=0
        PhaseLookupValue MainStemPrimordiaInitiationRate: Start=Emergence; End=FinalLeaf
          DivideFunction NodeInitiationRateFunction
            VariableReference Phyllochron: VariableName=[Structure].MainStemNodeAppearanceRate.Phyllochron.Value()
            Constant PrimordiaPerMainstemNode: FixedValue=2
        PhaseLookupValue MainStemNodeAppearanceRate: Start=Emergence; End=FinalLeaf
          LinearInterpolationFunction Phyllochron: XProperty=[Structure].RelativeNodeApperance
            XYPairs: X=[0, 0.15, 0.74, 0.75]; Y=[5, 30, 30, 60]
        Constant MainStemFinalNodeNumber: FixedValue=34
        LinearInterpolationFunction HeightModel: XProperty=[Stem].Live.Wt
          XYPairs: X=[0, 200, 1200, 4000]; Y=[20, 300, 700, 900]
        MultiplyFunction BranchingRate
          LinearInterpolationFunction Potential_Branching_Rate: XProperty=[Structure].LeafTipsAppeared
            XYPairs: X=[0, 7, 8, 13, 14, 34]; Y=[0, 0, 0.5, 0.5, 0, 0]
          LinearInterpolationFunction: XProperty=[Leaf].CoverGreen
            XYPairs: X=[0, 0.4, 0.55, 0.8, 1]; Y=[1, 1, 0.45, 0, 0]
        Constant BranchMortality: FixedValue=0
        Constant DroughtInducedBranchMortality: FixedValue=0
        VariableReference ThermalTime: VariableName=[Phenology].ThermalTime.Value()
        Constant StemSenescenceAge: FixedValue=0
      GenericOrgan Tuber
        LinearInterpolationFunction NitrogenDemandSwitch: XProperty=[Leaf].LAI
          XYPairs: X=[0, 0.02, 0.0201, 10]; Y=[0, 0, 1, 1]
        Constant NReallocationFactor: FixedValue=0
        PotentialSizeDemandFunction DMDemandFunction: StartStageName=TuberInitiation; EndStageName=Maturity
          LinearInterpolationFunction PotentialGrowthIncrement: XProperty=[Phenology].Stage
            XYPairs: X=[4, 4.04, 4.32, 4.52, 4.95, 6.54]; Y=[0.017, 0.017, 0.06, 0.06, 0.018, 0]
          MultiplyFunction OrganNumber
            Constant OrganNumberPerStem: FixedValue=5
            VariableReference: VariableName=[Structure].MainStemPopn
          AirTemperatureFunction ThermalTime
            XYPairs: X=[2, 20, 35]; Y=[0, 18, 0]
          AccumulateFunction AccumThermalTime: StartStageName=TuberInitiation; EndStageName=Maturity; FractionRemovedOnCut=0; FractionRemovedOnHarvest=0; FractionRemovedOnGraze=0; FractionRemovedOnPrune=0
            VariableReference: VariableName=[Structure].ThermalTime.Value()
        DivideFunction LiveFWt
          VariableReference: VariableName=[Tuber].Live.Wt
          LinearInterpolationFunction DryMatterContent: XProperty=[Phenology].Stage
            XYPairs: X=[4, 4.5]; Y=[0.13, 0.22]
        LinearInterpolationFunction MaximumNConc: XProperty=[Phenology].Stage
          XYPairs: X=[3, 4, 5, 6]; Y=[0.023, 0.023, 0.018, 0.015]
        LinearInterpolationFunction MinimumNConc: XProperty=[Phenology].Stage
          XYPairs: X=[4, 4.1, 7]; Y=[0.02, 0.006, 0.006]
        Biomass Live
        Biomass Dead
        BiomassRemoval BiomassRemovalDefaults
          OrganBiomassRemovalType Harvest: FractionLiveToRemove=0.5; FractionDeadToRemove=0; FractionLiveToResidue=0.1; FractionDeadToResidue=0
          OrganBiomassRemovalType Cut: FractionLiveToRemove=0.8; FractionDeadToRemove=0; FractionLiveToResidue=0; FractionDeadToResidue=0
          OrganBiomassRemovalType Prune: FractionLiveToRemove=0; FractionDeadToRemove=0; FractionLiveToResidue=0.6; FractionDeadToResidue=0
          OrganBiomassRemovalType Graze: FractionLiveToRemove=0.6; FractionDeadToRemove=0; FractionLiveToResidue=0.2; FractionDeadToResidue=0
        Constant InitialWtFunction: FixedValue=0; Units=g/m^2
        Constant StructuralFraction: FixedValue=1; Units=g/g
        Constant DetachmentRateFunction: FixedValue=0; Units=/d
        Constant SenescenceRate: FixedValue=0; Units=/d
        Constant MaintenanceRespirationFunction: FixedValue=0; Units=0-1
        Constant DMConversionEfficiency: FixedValue=1; Units=0-1
      Root: GrowthRespiration=0; MaintenanceRespiration=0
        CompositeBiomass Live: Propertys=[[Root].LayerLive]
        CompositeBiomass Dead: Propertys=[[Root].LayerDead]
        PhaseBasedSwitch NitrogenDemandSwitch: Start=Planting; End=FinalLeaf
        PhaseLookup RootFrontVelocity
          PhaseLookupValue: Start=Peeping; End=FinalLeaf
            Constant: FixedValue=10
        PhaseLookup PartitionFraction
          PhaseLookupValue: Start=Emergence; End=TuberInitiation
            Constant: FixedValue=0.3
          PhaseLookupValue: Start=TuberInitiation; End=FinalLeaf
            Constant: FixedValue=0.05
          PhaseLookupValue: Start=FinalLeaf; End=FullSenescence
            Constant: FixedValue=0
        Constant MaximumNConc: FixedValue=0.01
        Constant MaximumRootDepth: FixedValue=1000000
        LinearInterpolationFunction MaxDailyNUptake: XProperty=[Root].Length
          XYPairs: X=[0, 0.02]; Y=[0, 6]
        Constant MinimumNConc: FixedValue=0.01
        LinearInterpolationFunction KLModifier: XProperty=[Leaf].LAI
          XYPairs: X=[0, 3]; Y=[1, 1]
        LinearInterpolationFunction SenescenceRate: XProperty=[Leaf].FractionDied
          XYPairs: X=[0, 1]; Y=[0, 0.1]
        BiomassRemoval BiomassRemovalDefaults
          OrganBiomassRemovalType Harvest: FractionLiveToRemove=0; FractionDeadToRemove=0; FractionLiveToResidue=0.2; FractionDeadToResidue=0
          OrganBiomassRemovalType Cut: FractionLiveToRemove=0; FractionDeadToRemove=0; FractionLiveToResidue=0.3; FractionDeadToResidue=0
          OrganBiomassRemovalType Prune: FractionLiveToRemove=0; FractionDeadToRemove=0; FractionLiveToResidue=0.1; FractionDeadToResidue=0
          OrganBiomassRemovalType Graze: FractionLiveToRemove=0; FractionDeadToRemove=0; FractionLiveToResidue=0.15; FractionDeadToResidue=0
        LinearInterpolationFunction KNO3: XProperty=[Root].LengthDensity
          XYPairs: X=[0, 0.003]; Y=[0.02, 0.02]
        LinearInterpolationFunction KNH4: XProperty=[Root].LengthDensity
          XYPairs: X=[0, 0.003]; Y=[0, 0]
        LinearInterpolationFunction NUptakeSWFactor: XProperty=[Root].RWC
          XYPairs: X=[0, 1]; Y=[0, 1]
        Constant InitialDM: FixedValue=5; Units=g/plant
        Constant SpecificRootLength: FixedValue=40; Units=m/g
      Leaf: CurrentExpandingLeaf=34; StartFractionExpanded=0.83819; FractionNextleafExpanded=0.926641; MaxCover=1; R50=200; MicroClimatePresent=true; KDead=0.03
        zero: GrowthRespiration, MaintenanceRespiration, DeadNodesYesterday, Albedo, Gsmax, FRGR, PotentialEP, MaximumMainStemLeafNumber, DMConversionEfficiency, TipsAtEmergence, CohortsAtInitialisation, FractionDied
        VariableReference ThermalTime: VariableName=[Phenology].ThermalTime.Value()
        LeafCohort InitialLeaf1: Rank=1; Area=900
          zero: NReallocationFactor, DMReallocationFactor, NRetranslocationFactor, DMRetranslocationFactor, ShadeInducedSenRate, SenescedFrac, DeltaPotentialArea, DeltaWaterConstrainedArea, DeltaCarbonConstrainedArea, PotentialStructuralDMAllocation, PotentialMetabolicDMAllocation, MetabolicNReallocated, MetabolicWtReallocated, NonStructuralNReallocated, NonStructuralWtReallocated, MetabolicNRetranslocated, NonStructuralNRetrasnlocated, DMRetranslocated, MetabolicNAllocation, StructuralDMAllocation, MetabolicDMAllocation, MaintenanceRespiration
        LeafCohort InitialLeaf2: Rank=2; Area=600
          zero: NReallocationFactor, DMReallocationFactor, NRetranslocationFactor, DMRetranslocationFactor, ShadeInducedSenRate, SenescedFrac, DeltaPotentialArea, DeltaWaterConstrainedArea, DeltaCarbonConstrainedArea, PotentialStructuralDMAllocation, PotentialMetabolicDMAllocation, MetabolicNReallocated, MetabolicWtReallocated, NonStructuralNReallocated, NonStructuralWtReallocated, MetabolicNRetranslocated, NonStructuralNRetrasnlocated, DMRetranslocated, MetabolicNAllocation, StructuralDMAllocation, MetabolicDMAllocation, MaintenanceRespiration
        LeafCohort InitialLeaf3: Rank=3; Area=300
          zero: NReallocationFactor, DMReallocationFactor, NRetranslocationFactor, DMRetranslocationFactor, ShadeInducedSenRate, SenescedFrac, DeltaPotentialArea, DeltaWaterConstrainedArea, DeltaCarbonConstrainedArea, PotentialStructuralDMAllocation, PotentialMetabolicDMAllocation, MetabolicNReallocated, MetabolicWtReallocated, NonStructuralNReallocated, NonStructuralWtReallocated, MetabolicNRetranslocated, NonStructuralNRetrasnlocated, DMRetranslocated, MetabolicNAllocation, StructuralDMAllocation, MetabolicDMAllocation, MaintenanceRespiration
        LeafCohortParameters CohortParameters
          LinearInterpolationFunction MaxArea: XProperty=[Structure].RelativeNodeApperance
            XYPairs: X=[0, 0.15, 0.3, 0.44, 0.59, 0.73]; Y=[2000, 18000, 27000, 15000, 6000, 1500]
          LinearInterpolationFunction GrowthDuration: XProperty=[Structure].RelativeNodeApperance
            XYPairs: X=[0, 0.3, 0.4, 1]; Y=[200, 400, 400, 400]
          LinearInterpolationFunction LagDuration: XProperty=[Structure].RelativeNodeApperance
            XYPairs: X=[0, 0.15, 0.3, 0.4, 0.73, 1]; Y=[350, 350, 350, 350, 350, 20]
          LinearInterpolationFunction SenescenceDuration: XProperty=[Structure].RelativeNodeApperance
            XYPairs: X=[0, 0.15, 0.3, 0.4, 0.73, 1]; Y=[350, 350, 350, 350, 350, 100]
          Constant DetachmentLagDuration: FixedValue=1000000
          Constant DetachmentDuration: FixedValue=1000000
          LinearInterpolationFunction SpecificLeafAreaMax: XProperty=[Structure].RelativeNodeApperance
            XYPairs: X=[0, 1]; Y=[40000, 25000]
          Constant SpecificLeafAreaMin: FixedValue=25000
          Constant StructuralFraction: FixedValue=0.5
          Constant MaximumNConc: FixedValue=0.07
          Constant MinimumNConc: FixedValue=0.03
          Constant InitialNConc: FixedValue=0
          Constant NReallocationFactor: FixedValue=1
          Constant NRetranslocationFactor: FixedValue=0.01
          LinearInterpolationFunction ExpansionStress: XProperty=[Potato].WaterSupplyDemandRatio
            XYPairs: X=[0.5, 1]; Y=[0, 1]
          Constant CriticalNConc: FixedValue=0.05
          Constant DMRetranslocationFactor: FixedValue=0.5
          LinearInterpolationFunction ShadeInducedSenescenceRate: XProperty=[Leaf].CohortCurrentRankCoverAbove
            XYPairs: X=[0, 0.5, 0.8, 1]; Y=[0, 0, 0, 0.03]
          Constant NonStructuralFraction: FixedValue=0.2
          Constant SenessingLeafRelativeSize: FixedValue=1; Units=0-1
          Constant DMReallocationFactor: FixedValue=0
          Constant LeafSizeShapeParameter: FixedValue=0.01
          Constant MaintenanceRespirationFunction: FixedValue=0
          Constant DroughtInducedLagAcceleration: FixedValue=1
          Constant DroughtInducedSenAcceleration: FixedValue=1
          Constant CellDivisionStress: FixedValue=1; Units=0-1
        RUEModel Photosynthesis
          Constant RUE: FixedValue=1.2
          RUECO2Function FCO2: PhotosyntheticPathway=C3
          LinearInterpolationFunction FN: XProperty=[Leaf].Fn
            XYPairs: X=[0, 1, 1.5]; Y=[1, 1, 1]
          WeightedTemperatureFunction FT: MaximumTemperatureWeighting=0.75
            XYPairs: X=[2, 12, 24, 34]; Y=[0, 1, 1, 0]
          LinearInterpolationFunction FW: XProperty=[Leaf].Fw
            XYPairs: X=[0, 0.4, 1.5]; Y=[0, 1, 1]
          LinearInterpolationFunction FVPD: XProperty=[Leaf].Photosynthesis.VPD
            XYPairs: X=[0, 10, 50]; Y=[1, 1, 1]
          VariableReference RadnInt: VariableName=[Leaf].RadIntTot
        MinimumFunction FRGRFunction
          VariableReference RUE_FT: VariableName=[Leaf].Photosynthesis.FT.Value()
          MinimumFunction Others
            VariableReference RUE_FN: VariableName=[Leaf].Photosynthesis.FN.Value()
            VariableReference RUE_FVPD: VariableName=[Leaf].Photosynthesis.FVPD.Value()
        MultiplyFunction ExtinctionCoeff
          Constant: FixedValue=0.8
          LinearInterpolationFunction: XProperty=[Potato].WaterSupplyDemandRatio
            XYPairs: X=[0, 1]; Y=[0.5, 1]
        LinearInterpolationFunction FrostFraction: XProperty=[Weather].MinT
          XYPairs: X=[-1, 0]; Y=[0, 0]
        CompositeBiomass Live: Propertys=[[Leaf].CohortLive]
        CompositeBiomass Dead: Propertys=[[Leaf].CohortDead]
        CompositeBiomass Total: Propertys=[[Leaf].Live, [Leaf].Dead]
        ArrayBiomass CohortArrayLive: Propertys=[[Leaf].Live]; ArraySize=[Leaf].MaxNodeNo
        ArrayBiomass CohortArrayDead: Propertys=[[Leaf].Dead]; ArraySize=[Leaf].MaxNodeNo
        BiomassRemoval BiomassRemovalDefaults
          OrganBiomassRemovalType Harvest: FractionLiveToRemove=0; FractionDeadToRemove=0; FractionLiveToResidue=0.3; FractionDeadToResidue=0
          OrganBiomassRemovalType Cut: FractionLiveToRemove=0.8; FractionDeadToRemove=0; FractionLiveToResidue=0; FractionDeadToResidue=0
          OrganBiomassRemovalType Prune: FractionLiveToRemove=0; FractionDeadToRemove=0; FractionLiveToResidue=0.6; FractionDeadToResidue=0
          OrganBiomassRemovalType Graze: FractionLiveToRemove=0.6; FractionDeadToRemove=0; FractionLiveToResidue=0.1; FractionDeadToResidue=0
        Constant StructuralFraction: FixedValue=0.5
        Constant DMConversionEfficiencyFunction: FixedValue=1
        ApexStandard
      GenericOrgan Stem
        Constant NReallocationFactor: FixedValue=0
        Constant NRetranslocationFactor: FixedValue=0.05
        PhaseBasedSwitch NitrogenDemandSwitch: Start=Planting; End=FinalLeaf
        Constant DMRetranslocationFactor: FixedValue=0
        InternodeDemandFunction DMDemandFunction
          Constant InterNodeWt: FixedValue=0.2
        LinearInterpolationFunction MaximumNConc: XProperty=[Phenology].Stage
          XYPairs: X=[3, 4, 5.3]; Y=[0.06, 0.05, 0.025]
        Constant MinimumNConc: FixedValue=0.006
        Biomass Live
        Biomass Dead
        BiomassRemoval BiomassRemovalDefaults: same as Replacements.Potato.Tuber.BiomassRemovalDefaults
        Constant InitialWtFunction: FixedValue=0; Units=g/m^2
        Constant StructuralFraction: FixedValue=1; Units=g/g
        Constant DetachmentRateFunction: FixedValue=0; Units=/d
        Constant SenescenceRate: FixedValue=0; Units=/d
        Constant MaintenanceRespirationFunction: FixedValue=0; Units=0-1
        Constant DMConversionEfficiency: FixedValue=1; Units=0-1
      CompositeBiomass AboveGround: Propertys=[[Leaf].Live, [Leaf].Dead, [Stem].Live, [Stem].Dead]
      CompositeBiomass BelowGround: Propertys=[[Root].Live, [Root].Dead, [Tuber].Live, [Tuber].Dead]
      CompositeBiomass Total
        Propertys=[[Leaf].Live, [Leaf].Dead, [Stem].Live, [Stem].Dead, [Root].Live, [Root].Dead, [Tuber].Live, [Tuber].Dead]
      CompositeBiomass TotalLive: Propertys=[[Leaf].Live, [Stem].Live, [Root].Live, [Tuber].Live]
      CompositeBiomass TotalDead: Propertys=[[Leaf].Dead, [Stem].Dead, [Root].Dead, [Tuber].Dead]
      Cultivar JerseyBenny
        Command:
          [Structure].MainStemFinalNodeNumber.FixedValue = 19
          [Structure].BranchingRate.Potential_Branching_Rate.XYPairs.X = 0,6,7,10,11
          [Structure].BranchingRate.Potential_Branching_Rate.XYPairs.Y = 0,0,0.5,0.5,0
          [Tuber].DMDemandFunction.OrganNumber.OrganNumberPerStem.FixedValue = 3
          [Tuber].LiveFWt.DryMatterContent.XYPairs.Y = 0.13,0.2
        Alias JerseyBenny
      Cultivar IlamHardy
        Command:
          [Structure].MainStemFinalNodeNumber.FixedValue = 26
          [Tuber].LiveFWt.DryMatterContent.XYPairs.Y = 0.13,0.18
        Alias IlamHardy
      Cultivar MarisPiper
        Command:
          [Structure].MainStemFinalNodeNumber.FixedValue = 50
          [Structure].BranchingRate.Potential_Branching_Rate.XYPairs.X = 0,7,8,9
          [Structure].BranchingRate.Potential_Branching_Rate.XYPairs.Y = 0,0,1,0
          [Stem].DMDemandFunction.InternodeWt.FixedValue = 0.4
          [Leaf].LagDuration.XYPairs.X = 0,0.15,0.3,0.4,0.73,1.0
          [Leaf].LagDuration.XYPairs.Y = 0,500,500,500,500,20
          [Leaf].Photosynthesis.RUE.FixedValue = 2
        Alias MarisPiper
        Alias
      Cultivar Horizon
        Command:
          [Structure].MainStemFinalNodeNumber.FixedValue = 28
          [Tuber].LiveFWt.DryMatterContent.XYPairs.Y = 0.12,0.16
        Alias Horizon
      Cultivar Karaka
        Command:
          [Structure].MainStemFinalNodeNumber.FixedValue = 29
          [Tuber].LiveFWt.DryMatterContent.XYPairs.Y = 0.13,0.2
        Alias Karaka
      Cultivar Nooksac
        Command:
          [Structure].MainStemFinalNodeNumber.FixedValue = 36
          [Tuber].LiveFWt.DryMatterContent.XYPairs.Y = 0.13,0.21
        Alias Nooksac
      Cultivar RedRascal
        Command:
          [Tuber].LiveFWt.DryMatterContent.XYPairs.Y = 0.13,0.2
        Alias RedRascal
      Cultivar Rua
        Command:
          [Structure].MainStemFinalNodeNumber.FixedValue = 29
          [Tuber].LiveFWt.DryMatterContent.XYPairs.Y = 0.13,0.21
        Alias Rua
      Cultivar Nadine
        Command:
          [Structure].MainStemFinalNodeNumber.FixedValue = 29
          [Tuber].LiveFWt.DryMatterContent.XYPairs.Y = 0.11,0.15
        Alias Nadine
      Cultivar RussetBurbank
        Command:
          [Structure].MainStemFinalNodeNumber.FixedValue = 46
        Alias RussetBurbank
      Cultivar Coliban
        Command:
          [Tuber].LiveFWt.DryMatterContent.XYPairs.Y = 0.10,0.19
        Alias Coliban
      Cultivar Others
        Alias Fianna
        Alias RussetRanger
        Alias Moonlight
        Alias Agria
        Alias Bondi
        Alias Crop39
  DataStore
    Input: FileName=Observed\potato_observations.txt
    Input InputRadInd: FileName=Observed\Potato_radint_observations.txt
    Input InputNodeNo: FileName=Observed\cultivar_nodenumber.txt
    PredictedObserved: PredictedTableName=Report; ObservedTableName=Input; FieldNameUsedForMatch=Clock.Today
    PredictedObserved FinalYieldData: PredictedTableName=Report; ObservedTableName=Input; FieldNameUsedForMatch=PotatoHarvestRule.Script.FinalTag
    TimeSeriesStats: TableName=PredictedObserved
  Simulation RussetBurbank
    Weather: FileName=lincoln.met
    Clock: StartDate=2003-10-20; EndDate=2004-06-05
    Summary
    SoilArbitrator Soil Arbitrator
    Zone Field: Area=1; Slope=0
      Soil: SoilType=Sedementary; LocalName=Lincoln; Latitude=0; Longitude=0
        Water
          Thickness  BD   AirDry  LL15  DUL   SAT
          100        1.2  0.08    0.16  0.33  0.5
          200        1.2  0.16    0.16  0.33  0.5
          300        1.2  0.15    0.15  0.31  0.44
          300        1.2  0.13    0.13  0.27  0.46
          300        1.2  0.15    0.15  0.3   0.44
          300        1.2  0.15    0.15  0.3   0.44
          SoilCrop PotatoSoil: LL=[0.13, 0.13, 0.1, 0.15, 0.3, 0.3]; KL=[0.1, 0.06, 0.04, 0.01, 0, 0]; XF=[1, 1, 1, 1, 0, 0]
        SoilWater: SummerDate=1-Nov; SummerU=9; SummerCona=4.4; WinterDate=1-Apr; WinterU=9; WinterCona=4.4; DiffusConst=88; DiffusSlope=35.4; Salb=0.18; CN2Bare=0; CNRed=-9E-05; CNCov=0; slope=0; discharge_width=0; catchment_area=0; max_pond=0; residueinterception=0
          Thickness  SWCON  KLAT
          100        0.55   0
          200        0.55   0
          300        0.55   0
          300        0.55   0
          300        0.55   0
          300        0.55   0
        SoilNitrogen: fom_type=[default, manure, mucuna, lablab, shemp, stable]; fract_carb=[0.2, 0.3, 0.54, 0.57, 0.45, 0]; fract_cell=[0.7, 0.3, 0.37, 0.37, 0.47, 0.1]; fract_lign=[0.1, 0.4, 0.09, 0.06, 0.08, 0.9]; wfpsN2N2O_x=[22, 88]; wfpsN2N2O_y=[0.1, 1]; oc=[3.51204, 2.4888, 1.19986, 1.03067, 0.470328, 0.470127]
        SoilOrganicMatter: RootCN=30; RootWt=3000; SoilCN=11.5; EnrACoeff=7.4; EnrBCoeff=0.2; OCUnits=Total
          Thickness  OC    FBiom  FInert
          100        3.5   0.025  0.3
          200        2.5   0.025  0.4
          300        1.2   0.015  0.75
          300        1.03  0.01   0.9
          300        0.47  0.01   0.96
          300        0.47  0.01   0.96
        Analysis: Thickness=[100, 200, 300, 300, 300, 300]; PH=[6.6, 6.2, 5.7, 5.5, 5.5, 5.5]; PHUnits=Water; BoronUnits=HotWater
        InitialWater Initial water: PercentMethod=FilledFromTop; FractionFull=1
        Sample: NO3Units=kgha; NH4Units=kgha; SWUnits=Volumetric; OCUnits=Total; PHUnits=Water
          Thickness  NO3   NH4
          100        40    0.1
          200        30    0.1
          300        14    0.1
          300        14    0.1
          300        1.38  0.1
          300        1.38  0.1
        CERESSoilTemperature
      SurfaceOrganicMatter: PondActive=no; ReportAdditions=no; ReportRemovals=no; PoolName=Wheat; type=Wheat; mass=2000; standing_fraction=0; cnr=80; CriticalResidueWeight=2000; OptimumDecompTemp=20; MaxCumulativeEOS=20; CNRatioDecompCoeff=0.277; CNRatioDecompThreshold=25; TotalLeachRain=25; MinRainToLeach=10; CriticalMinimumOrganicC=0.004; DefaultCPRatio=0; DefaultStandingFraction=0; StandingExtinctCoeff=0.5; FractionFaecesAdded=0.5
        Pools:
          {PoolName=Wheat, ResidueType=Wheat, Mass=2000, CNRatio=80, StandingFraction=0}
        ResidueTypes: LoadFromResource=ResidueTypes
        TillageTypes TillageTypesList
      MicroClimate: a_interception=0; b_interception=1; c_interception=0; d_interception=0; soil_albedo=0.23; sun_angle=15; soil_heat_flux_fraction=0.4; night_interception_fraction=0.5; refheight=2; albedo=0.26; emissivity=0.96; RadIntTotal=0
      Irrigation
      Fertiliser
      Plant Potato: CropType=Potato
      Operations
        2003-10-20  [Fertiliser].Apply(100, Fertiliser.Types.UreaN, 0);
        2003-11-25  [Fertiliser].Apply(69, Fertiliser.Types.UreaN,0);
        2003-11-26  [Irrigation].Apply(15);
        2003-12-04  [Irrigation].Apply(50);
        2003-12-16  [Irrigation].Apply(15);
        2003-12-22  [Irrigation].Apply(50);
        2003-12-30  [Irrigation].Apply(50);
        2004-01-08  [Irrigation].Apply(50);
        2004-01-21  [Irrigation].Apply(50);
        2004-01-31  [Irrigation].Apply(50);
        2004-02-27  [Irrigation].Apply(25);
      Manager PotatoPlantAndHarvest
        PlantingDate = 2003-10-22
        CultivarName = RussetBurbank
        RowSpace = 280
        RowWidth = 770
        PlantingDepth = 120
        StemNumberPerSeedTuber = 2.2
        SetFinalLeafNumber = 40
        HarvestDate = 2004-05-01
```csharp
using System;
using Models.Core;
using Models.PMF;
using APSIM.Shared.Utilities;
using System.Xml.Serialization;
        
namespace Models
{
	[Serializable] 
	[System.Xml.Serialization.XmlInclude(typeof(Model))]
	public class Script : Model
	{
		[Link] Plant Potato;
		[Link] Clock Clock;
		[Link] Zone zone;
		[Link] Summary Summary;
		[Description("Planting Date")]
		public DateTime PlantingDate { get; set; }
		[Description("Cultivar")]
		public string CultivarName { get; set; }
		[Description("Spacing (mm) between plants within rows")]
		public double RowSpace { get; set; }
		[Description("Spacing (mm) between rows")]
		public double RowWidth { get; set; }
		[Description("Depth (mm) tubers are planted")]
		public double PlantingDepth { get; set; }
		[Description("Number of stems per seed tuber")]
		public double StemNumberPerSeedTuber { get; set; }
		[Description("Final leaf number.  Leave at 0 if not known")]
		public double SetFinalLeafNumber { get; set; }
		[Description("HarvestDate Date")]
		public DateTime HarvestDate { get; set; }
		[XmlIgnore] public string FinalTag { get; set; }
		[XmlIgnore] public bool Harvested { get; set; }
		[XmlIgnore] public bool ReadyForHarvest { get; set; }
		
		[EventSubscribe("DoManagement")]
		private void OnDoManagement(object sender, EventArgs e)
		{
			double PlantPopulation = 1 / ((RowWidth / 1000) * (RowSpace / 1000));

			if (Clock.Today.Date == PlantingDate)
				Potato.Sow(population: PlantPopulation, cultivar: CultivarName, depth: PlantingDepth, rowSpacing: 150, budNumber: StemNumberPerSeedTuber);
			if (Clock.Today.Date == HarvestDate)
				Potato.Harvest();
			if (SetFinalLeafNumber > 0)
				zone.Set("Potato.Structure.MainStemFinalNodeNumber.FixedValue", SetFinalLeafNumber);
			if (SetFinalLeafNumber > 46)
				throw new Exception("The model will fail with leaf numbers > 46.  Reduce Final leaf number.");
		}
	}
}
```
      Report: EventNames=[Clock].DoReport
        VariableNames:
          [Clock].Today
          [ExtraVariables].Script.AccumDenit
          [ExtraVariables].Script.AccumDetach
          [ExtraVariables].Script.AccumDrainage
          [ExtraVariables].Script.AccumEO
          [ExtraVariables].Script.AccumEP
          [ExtraVariables].Script.AccumES
          [ExtraVariables].Script.AccumFert
          [ExtraVariables].Script.AccumIrrigation
          [ExtraVariables].Script.AccumLeach
          [ExtraVariables].Script.AccumMineralisation
          [ExtraVariables].Script.AccumOutflowLat
          [ExtraVariables].Script.AccumPlantN
          [ExtraVariables].Script.AccumRainfall
          [ExtraVariables].Script.AccumRunoff
          [ExtraVariables].Script.AccumTtemerg
          [ExtraVariables].Script.BiomN
          [ExtraVariables].Script.DeltaSoilMineralN
          [ExtraVariables].Script.DeltaSoilOMN
          [ExtraVariables].Script.DeltaSurfaceOMN
          [ExtraVariables].Script.DltNMinRes
          [ExtraVariables].Script.DltNMinTot
          [ExtraVariables].Script.DUL
          [ExtraVariables].Script.FomN
          [ExtraVariables].Script.HumN
          [ExtraVariables].Script.OutFlowLat
          [ExtraVariables].Script.SoilNitrogenContent
          [ExtraVariables].Script.SoilWaterDeficit
          [ExtraVariables].Script.SWC
          [MicroClimate].net_radn
          [MicroClimate].peta
          [MicroClimate].petr
          [Soil].NO3N
          [Soil].SoilWater.Drainage
          [Soil].SoilWater.Eo
          [Soil].SoilWater.Es
          [Soil].SoilWater.pond
          [Soil].SoilWater.Runoff
          [Soil].SoilWater.SWmm
          Potato.Arbitrator.DM.Allocated
          Potato.Arbitrator.DM.TotalPlantDemand
          Potato.Arbitrator.DM.NutrientLimitation
          Potato.Arbitrator.DM.SinkLimitation
          Potato.Arbitrator.DM.TotalFixationSupply
          Potato.Arbitrator.N.TotalPlantDemand
          Potato.Arbitrator.NH4NSupply
          Potato.Arbitrator.NO3NSupply
          Potato.Arbitrator.N.TotalPlantSupply
          Potato.Arbitrator.N.Allocated
          Potato.HarvestRule.Script.FinalTag
          Potato.Leaf.AppearedCohortNo
          Potato.Leaf.CohortParameters.MaximumNConc.Value()
          Potato.Leaf.CohortParameters.MinimumNConc.Value()
          Potato.Leaf.CoverDead
          Potato.Leaf.CoverGreen
          Potato.Leaf.CoverTotal
          Potato.Leaf.Dead.N
          Potato.Leaf.Dead.NConc
          Potato.Leaf.Dead.Wt
          Potato.Leaf.DeadCohortNo
          Potato.Leaf.ExpandedCohortNo
          Potato.Leaf.ExpandingCohortNo
          Potato.Leaf.Fn
          Potato.Leaf.Fw
          Potato.Leaf.LAI
          Potato.Leaf.LAIDead
          Potato.Leaf.Live.N
          Potato.Leaf.Live.NConc
          Potato.Leaf.Live.Wt
          Potato.Leaf.Photosynthesis.FT.Value()
          Potato.Leaf.Photosynthesis.FVPD.Value()
          Potato.Leaf.PlantAppearedGreenLeafNo
          Potato.Leaf.SenescingCohortNo
          Potato.Leaf.SpecificArea
          Potato.Leaf.Transpiration
          Potato.Leaf.WaterDemand
          Potato.Phenology.CurrentPhaseName
          Potato.Phenology.Stage
          Potato.Phenology.Stage
          Potato.Root.Dead.N
          Potato.Root.Dead.NConc
          Potato.Root.Dead.Wt
          Potato.Root.Depth
          Potato.Root.Live.N
          Potato.Root.Live.NConc
          Potato.Root.Live.Wt
          Potato.Root.MaximumNConc.Value()
          Potato.Root.MinimumNConc.Value()
          Potato.Root.NSupplyUptake
          Potato.Root.NUptake
          Potato.Root.WaterSupply
          Potato.Root.WaterUptake
          Potato.Stem.Dead.N
          Potato.Stem.Dead.NConc
          Potato.Stem.Dead.Wt
          Potato.Stem.Live.N
          Potato.Stem.Live.NConc
          Potato.Stem.Live.NonStructuralWt
          Potato.Stem.Live.StructuralWt
          Potato.Stem.Live.Wt
          Potato.Stem.MaximumNConc.Value()
          Potato.Stem.MinimumNConc.Value()
          Potato.Structure.Height
          Potato.Structure.LeafTipsAppeared
          Potato.Structure.PlantTotalNodeNo
          Potato.Structure.PrimaryBudTotalNodeNo
          Potato.Structure.TotalStemPopn
          Potato.AboveGround.N
          Potato.AboveGround.Wt
          Potato.BelowGround.N
          Potato.BelowGround.Wt
          Potato.Total.N
          Potato.Total.Wt
          Potato.TotalDead.N
          Potato.TotalDead.Wt
          Potato.TotalLive.N
          Potato.TotalLive.Wt
          Potato.Tuber.Dead.N
          Potato.Tuber.Dead.NConc
          Potato.Tuber.Dead.Wt
          Potato.Tuber.LiveFWt.DryMatterContent.Value()
          Potato.Tuber.Live.N
          Potato.Tuber.Live.NConc
          Potato.Tuber.Live.Wt
          Potato.Tuber.LiveFWt
          Potato.Tuber.MaximumNConc.Value()
          Potato.Tuber.MinimumNConc.Value()
      Manager ExtraVariables
```csharp
using System;
using Models.Core;
using System.Collections.Generic;
using System.Text;
using Models.Soils;
using Models.PMF;
using Models;
using System.Xml.Serialization;
using APSIM.Shared.Utilities;

namespace Models
{
	[Serializable] 
	public class Script : Model
	{
		[Link] Clock Clock;
		[Link] Soils.Soil Soil;
		[Link] Models.SurfaceOM.SurfaceOrganicMatter SOM;
		[Link] Weather Met;
		[Link] Fertiliser Fert;
		[Link] Irrigation Irrig;
		[Link] Plant Potato;
		[Link] Zone zone;
					
		[XmlIgnore] public bool InitialDay { get; set; }
		
		[XmlIgnore] public double AccumPlantN { get; set; }
		[XmlIgnore] public double AccumMineralisation { get; set; }
		[XmlIgnore] public double AccumDenit { get; set; }
		[XmlIgnore] public double AccumFert { get; set; }
		[XmlIgnore] public double AccumLeach { get; set; }
		[XmlIgnore] public double AccumDetach { get; set; }
		[XmlIgnore] public double DeltaSoilOMN { get; set; }
		[XmlIgnore] public double DeltaSurfaceOMN { get; set; }
		[XmlIgnore] public double DeltaSoilMineralN { get; set; }
		[XmlIgnore] public double SoilNitrogenContent { get; set; }
		
		[XmlIgnore] public double AccumEO { get; set; }
		[XmlIgnore] public double AccumEP { get; set; }
		[XmlIgnore] public double AccumES { get; set; }
		[XmlIgnore] public double AccumDrainage { get; set; }
		[XmlIgnore] public double AccumRunoff { get; set; }
		[XmlIgnore] public double AccumOutflowLat { get; set; }
		[XmlIgnore] public double AccumIrrigation { get; set; }
		[XmlIgnore] public double AccumRainfall { get; set; }
		[XmlIgnore] public double SoilWaterDeficit { get; set; }
		
		[XmlIgnore] public double AccumTtemerg { get; set; }
		
		[XmlIgnore] public double  InitialSoilOMN { get; set; }
		[XmlIgnore] public double  InitialSurfaceOMN { get; set; }
		[XmlIgnore] public double  InitialMineralN { get; set; }
		
		[XmlIgnore] public double SWC { get; set; }
		[XmlIgnore] public double DUL { get; set; }
		[XmlIgnore] public double OutFlowLat { get; set; }

		[XmlIgnore] public double FomN { get; set; }
		[XmlIgnore] public double BiomN { get; set; }
		[XmlIgnore] public double HumN { get; set; }
		[XmlIgnore] public double OrganicN { get; set; }
		[XmlIgnore] public double NO3N { get; set; }
		[XmlIgnore] public double NH4N { get; set; }
		[XmlIgnore] public double UreaN { get; set; }
		[XmlIgnore] public double MineralN { get; set; }
		[XmlIgnore] public double DltNMinRes { get; set; }
		[XmlIgnore] public double DltNMinTot { get; set; }
		
		[EventSubscribe("Commencing")]
		private void OnSimulationCommencing(object sender, EventArgs e)
		{
			InitialDay = true;
		}
		
		[EventSubscribe("DoManagement")]
		private void OnDoManagement(object sender, EventArgs e)
		{
			//!!!!!! Nitrogen balance components !!!!!!
			//!!!!!!^^^^^^^^^^^^^^^^^^^^^^^^^^^^^!!!!!!
			FomN = MathUtilities.Sum(Soil.SoilNitrogen.FOMN);
			HumN = MathUtilities.Sum(Soil.SoilNitrogen.HumicN);
			BiomN = MathUtilities.Sum(Soil.SoilNitrogen.MicrobialN);
			OrganicN = FomN + HumN + BiomN;
			NO3N = MathUtilities.Sum(Soil.NO3N);
			NH4N = MathUtilities.Sum(Soil.NH4N);
			UreaN = MathUtilities.Sum(Soil.SoilNitrogen.urea);
			MineralN = NO3N + NH4N + UreaN; 
			DltNMinRes = MathUtilities.Sum(Soil.SoilNitrogen.dlt_n_min_res);
			DltNMinTot = MathUtilities.Sum(Soil.SoilNitrogen.MineralisedN);
			int layers = Soil.Thickness.Length;
			if (InitialDay == true)
			{
				InitialSurfaceOMN = SOM.N;
				InitialSoilOMN = OrganicN;
				InitialMineralN = MineralN;
				InitialDay = false;
			}
			AccumFert += Fert.NitrogenApplied;
			DeltaSurfaceOMN = SOM.N - InitialSurfaceOMN;
			AccumLeach = AccumLeach - Soil.SoilWater.LeachNH4 - Soil.SoilWater.LeachNO3 - Soil.SoilWater.LeachUrea; //Fails
			AccumMineralisation += MathUtilities.Sum(Soil.SoilNitrogen.MineralisedN);
			AccumDenit -= MathUtilities.Sum(Soil.SoilNitrogen.Denitrification);
			AccumPlantN -= (double)zone.Get("Potato.Root.NUptake");
			DeltaSoilOMN = OrganicN - InitialSoilOMN;
			DeltaSoilMineralN = MineralN - InitialMineralN;
			SoilNitrogenContent = MineralN;
			
			//!!!!!! Water balance components !!!!!!
			//!!!!!!^^^^^^^^^^^^^^^^^^^^^^^^^^!!!!!!

			AccumIrrigation += Irrig.IrrigationApplied;
			AccumRainfall += Met.Rain;
			AccumEP -= (double)zone.Get("Potato.Leaf.Transpiration");
			SoilWaterDeficit = (SWC - DUL);
			double OutFlowLat = MathUtilities.Sum(Soil.SoilWater.outflow_lat);
			AccumOutflowLat -= OutFlowLat;
			
			//!!!!!! Thermal time calculation !!!!!!
			//!!!!!! ^^^^^^^^^^^^^^^^^^^^^^^^ !!!!!!
			if (Potato.Phenology.Stage >= 3)
				AccumTtemerg += Potato.Phenology.ThermalTime.Value();
		}
		
		[EventSubscribe("DoManagementCalculations")]
		private void OnDoManagementCalculations(object sender, EventArgs e)
		{
			FomN = MathUtilities.Sum(Soil.SoilNitrogen.FOMN);
			HumN = MathUtilities.Sum(Soil.SoilNitrogen.HumicN);
			BiomN = MathUtilities.Sum(Soil.SoilNitrogen.MicrobialN);
			
			
			AccumEO -= Soil.SoilWater.Eo;
			AccumES -= Soil.SoilWater.Es; 
			AccumDrainage -= Soil.SoilWater.Drainage;
			AccumRunoff -= Soil.SoilWater.Runoff;
			SWC = MathUtilities.Sum(Soil.SoilWater.SWmm);
			DUL = MathUtilities.Sum(Soil.SoilWater.DULmm);
		}
	}
}
```
      SoluteManager
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