Simulations: Version=1
  Replacements
    Plant Potato: CropType=Potato
      Cultivar JerseyBenny: Alias=JerseyBenny
        Command:
          [Structure].MainStemFinalNodeNumber.Value = 19
          [Structure].BranchingRate.Potential_Branching_Rate.XYPairs.X = 0,6,7,10,11
          [Structure].BranchingRate.Potential_Branching_Rate.XYPairs.Y = 0,0,0.5,0.5,0
          [Tuber].DMDemandFunction.OrganNumber.OrganNumberPerStem.Value = 3
          [Tuber].DryMatterContent.XYPairs.Y = 0.13,0.2
      Cultivar IlamHardy: Alias=IlamHardy
        Command:
          [Structure].MainStemFinalNodeNumber.Value = 26
          [Tuber].DryMatterContent.XYPairs.Y = 0.13,0.18
      Cultivar MarisPiper: Alias=[MarisPiper, -]
        Command:
          [Structure].MainStemFinalNodeNumber.Value = 50
          [Structure].BranchingRate.Potential_Branching_Rate.XYPairs.X = 0,7,8,9
          [Structure].BranchingRate.Potential_Branching_Rate.XYPairs.Y = 0,0,1,0
          [Stem].DMDemandFunction.InternodeWt.Value = 0.4
          [Leaf].LagDuration.XYPairs.X = 0,0.15,0.3,0.4,0.73,1.0
          [Leaf].LagDuration.XYPairs.Y = 0,500,500,500,500,20
          [Leaf].Photosynthesis.RUE.Value = 2
      Cultivar Horizon: Alias=Horizon
        Command:
          [Structure].MainStemFinalNodeNumber.Value = 28
          [Tuber].DryMatterContent.XYPairs.Y = 0.12,0.16
      Cultivar Karaka: Alias=Karaka
        Command:
          [Structure].MainStemFinalNodeNumber.Value = 29
          [Tuber].DryMatterContent.XYPairs.Y = 0.13,0.2
      Cultivar Nooksac: Alias=Nooksac
        Command:
          [Structure].MainStemFinalNodeNumber.Value = 36
          [Tuber].DryMatterContent.XYPairs.Y = 0.13,0.21
      Cultivar RedRascal: Alias=RedRascal
        Command:
          [Tuber].DryMatterContent.XYPairs.Y = 0.13,0.2
      Cultivar Rua: Alias=Rua
        Command:
          [Structure].MainStemFinalNodeNumber.Value = 29
          [Tuber].DryMatterContent.XYPairs.Y = 0.13,0.21
      Cultivar Nadine: Alias=Nadine
        Command:
          [Structure].MainStemFinalNodeNumber.Value = 29
          [Tuber].DryMatterContent.XYPairs.Y = 0.11,0.15
      Cultivar RussetBurbank: Alias=RussetBurbank
        Command:
          [Structure].MainStemFinalNodeNumber.Value = 46
      Cultivar Coliban: Alias=Coliban
        Command:
          [Tuber].DryMatterContent.XYPairs.Y = 0.10,0.19
      Cultivar Others: Alias=[Fianna, RussetRanger, Moonlight, Agria, Bondi, Crop39]
      Phenology: Emerged=false
        AirTemperatureFunction ThermalTime
          XYPairs: X=[2, 20, 35]; Y=[0, 18, 0]
        GenericPhase Dormant: Start=Planting; End=Peeping
          AirTemperatureFunction ThermalTime
            XYPairs: X=[2, 20, 35]; Y=[0, 18, 0]
          Constant Target: Value=1
        EmergingPhase Sprouting: Start=Peeping; End=Emergence; ShootLag=72; ShootRate=1.35
          AirTemperatureFunction ThermalTime
            XYPairs: X=[2, 20, 35]; Y=[0, 18, 0]
        GenericPhase Vegetative: Start=Emergence; End=TuberInitiation
          AirTemperatureFunction ThermalTime
            XYPairs: X=[2, 20, 35]; Y=[0, 18, 0]
          Constant Target: Value=300
        LeafAppearancePhase EarlyTuber: Start=TuberInitiation; End=FinalLeaf
          AirTemperatureFunction ThermalTime
            XYPairs: X=[2, 20, 35]; Y=[0, 18, 0]
        LeafDeathPhase LateTuber: Start=FinalLeaf; End=FullSenescence
          AirTemperatureFunction ThermalTime
            XYPairs: X=[2, 20, 35]; Y=[0, 18, 0]
        GenericPhase Senesced: Start=FullSenescence; End=Maturity
          AirTemperatureFunction ThermalTime
            XYPairs: X=[2, 20, 35]; Y=[0, 18, 0]
          Constant Target: Value=200
        EndPhase Maturity: Start=Maturity; End=Unused
          AirTemperatureFunction ThermalTime
            XYPairs: X=[2, 20, 35]; Y=[0, 18, 0]
      OrganArbitrator Arbitrator: NArbitrationOption=PriorityThenRelativeAllocation; DMArbitrationOption=RelativeAllocation
      Structure: InitialiseStage=Emergence; PrimaryBudNo=2.2
        AirTemperatureFunction ThermalTime
          XYPairs: X=[2, 20, 35]; Y=[0, 18, 0]
        PhaseLookupValue MainStemPrimordiaInitiationRate: Start=Emergence; End=FinalLeaf
          DivideFunction NodeInitiationRateFunction
            VariableReference Phyllochron: VariableName=[Structure].MainStemNodeAppearanceRate.Phyllochron.Value
            Constant PrimordiaPerMainstemNode: Value=2
        PhaseLookupValue MainStemNodeAppearanceRate: Start=Emergence; End=FinalLeaf
          LinearInterpolationFunction Phyllochron: XProperty=[Structure].RelativeNodeApperance
            XYPairs: X=[0, 0.15, 0.74, 0.75]; Y=[5, 30, 30, 60]
        Constant MainStemFinalNodeNumber: Value=34
        LinearInterpolationFunction HeightModel: XProperty=[Stem].Live.Wt
          XYPairs: X=[0, 200, 1200, 4000]; Y=[20, 300, 700, 900]
        MultiplyFunction BranchingRate
          LinearInterpolationFunction Potential_Branching_Rate: XProperty=[Structure].MainStemNodeNo
            XYPairs: X=[0, 7, 8, 13, 14, 34]; Y=[0, 0, 0.5, 0.5, 0, 0]
          LinearInterpolationFunction: XProperty=[Leaf].CoverGreen
            XYPairs: X=[0, 0.4, 0.55, 0.8, 1]; Y=[1, 1, 0.45, 0, 0]
        Constant ShadeInducedBranchMortality: Value=0
        Constant DroughtInducedBranchMortality: Value=0
      Summariser
        CompositeBiomass AboveGround: Propertys=[[Leaf].Live, [Leaf].Dead, [Stem].Live, [Stem].Dead]
        CompositeBiomass BelowGround: Propertys=[[Root].Live, [Root].Dead, [Tuber].Live, [Tuber].Dead]
        CompositeBiomass Total
          Propertys=[[Leaf].Live, [Leaf].Dead, [Stem].Live, [Stem].Dead, [Root].Live, [Root].Dead, [Tuber].Live, [Tuber].Dead]
        CompositeBiomass TotalLive: Propertys=[[Leaf].Live, [Stem].Live, [Root].Live, [Tuber].Live]
        CompositeBiomass TotalDead: Propertys=[[Leaf].Dead, [Stem].Dead, [Root].Dead, [Tuber].Dead]
      GenericAboveGroundOrgan Tuber
        LinearInterpolationFunction NitrogenDemandSwitch: XProperty=[Leaf].LAI
          XYPairs: X=[0, 0.02, 0.0201, 10]; Y=[0, 0, 1, 1]
        Constant StructuralFraction: Value=1
        PotentialSizeDemandFunction DMDemandFunction: StartStageName=TuberInitiation; EndStageName=Maturity
          LinearInterpolationFunction PotentialGrowthIncrement: XProperty=[Phenology].Stage
            XYPairs: X=[4, 4.04, 4.32, 4.52, 4.95, 6.54]; Y=[0.017, 0.017, 0.06, 0.06, 0.018, 0]
          MultiplyFunction OrganNumber
            Constant OrganNumberPerStem: Value=5
            VariableReference: VariableName=[Structure].MainStemPopn
          AirTemperatureFunction ThermalTime
            XYPairs: X=[2, 20, 35]; Y=[0, 18, 0]
          AccumulateFunction AccumThermalTime: StartStageName=TuberInitiation; EndStageName=Maturity
            VariableReference: VariableName=[Structure].ThermalTime.Value
        LinearInterpolationFunction DryMatterContent: XProperty=[Phenology].Stage
          XYPairs: X=[4, 4.5]; Y=[0.13, 0.22]
        LinearInterpolationFunction MaximumNConc: XProperty=[Phenology].Stage
          XYPairs: X=[3, 4, 5, 6]; Y=[0.023, 0.023, 0.018, 0.015]
        LinearInterpolationFunction MinimumNConc: XProperty=[Phenology].Stage
          XYPairs: X=[4, 4.1, 7]; Y=[0.02, 0.006, 0.006]
        Biomass Live
        Biomass Dead
      Root: InitialDM=5; SpecificRootLength=40000; KNO3_yProperty=[0.02, 0.02]; KNO3_xRootLength=[0, 0.003]; KNH4_yProperty=[0, 0]; KNH4_xRootLength=[0, 0.003]; NuptakeSupply=0
        CompositeBiomass Live: Propertys=[[Root].LayerLive]
        CompositeBiomass Dead: Propertys=[[Root].LayerDead]
        PhaseBasedSwitch NitrogenDemandSwitch: Start=Planting; End=FinalLeaf
        AirTemperatureFunction TemperatureEffect
          XYPairs: X=[0, 26, 35]; Y=[1, 1, 1]
        PhaseLookup RootFrontVelocity
          PhaseLookupValue: Start=Peeping; End=FinalLeaf
            Constant: Value=10
        PhaseLookup PartitionFraction
          PhaseLookupValue: Start=Emergence; End=TuberInitiation
            Constant: Value=0.3
          PhaseLookupValue: Start=TuberInitiation; End=FinalLeaf
            Constant: Value=0.05
          PhaseLookupValue: Start=FinalLeaf; End=FullSenescence
            Constant: Value=0
        Constant MaximumNConc: Value=0.01
        LinearInterpolationFunction MaxDailyNUptake: XProperty=[Root].Length
          XYPairs: X=[0, 0.02]; Y=[0, 6]
        Constant MinimumNConc: Value=0.01
        LinearInterpolationFunction KLModifier: XProperty=[Leaf].LAI
          XYPairs: X=[0, 3]; Y=[1, 1]
        LinearInterpolationFunction SenescenceRate: XProperty=[Leaf].FractionDied
          XYPairs: X=[0, 1]; Y=[0, 0.1]
      Leaf: CurrentExpandingLeaf=34; StartFractionExpanded=0.83819; FractionNextleafExpanded=0.926641; _ExpandedNodeNo=34.9266; DeadNodesYesterday=0; MaxCover=1; FRGR=0; PotentialEP=0; KDead=0.03; GsMax=0.03; R50=200; Emissivity=0.96; Albido=0.26; FractionDied=0
        CompositeBiomass Live: Propertys=[[Leaf].CohortLive]
        CompositeBiomass Dead: Propertys=[[Leaf].CohortDead]
        LeafCohortParameters CohortParameters
          LinearInterpolationFunction MaxArea: XProperty=[Structure].RelativeNodeApperance
            XYPairs: X=[0, 0.15, 0.3, 0.44, 0.59, 0.73]; Y=[2000, 18000, 27000, 15000, 6000, 1500]
          LinearInterpolationFunction GrowthDuration: XProperty=[Structure].RelativeNodeApperance
            XYPairs: X=[0, 0.3, 0.4, 1]; Y=[200, 400, 400, 400]
          LinearInterpolationFunction LagDuration: XProperty=[Structure].RelativeNodeApperance
            XYPairs: X=[0, 0.15, 0.3, 0.4, 0.73, 1]; Y=[350, 350, 350, 350, 350, 20]
          LinearInterpolationFunction SenescenceDuration: XProperty=[Structure].RelativeNodeApperance
            XYPairs: X=[0, 0.15, 0.3, 0.4, 0.73, 1]; Y=[350, 350, 350, 350, 350, 100]
          Constant DetachmentLagDuration: Value=1000000
          Constant DetachmentDuration: Value=1000000
          LinearInterpolationFunction SpecificLeafAreaMax: XProperty=[Structure].RelativeNodeApperance
            XYPairs: X=[0, 1]; Y=[40000, 25000]
          Constant SpecificLeafAreaMin: Value=25000
          Constant StructuralFraction: Value=0.5
          Constant MaximumNConc: Value=0.07
          Constant MinimumNConc: Value=0.03
          Constant InitialNConc: Value=0
          Constant NReallocationFactor: Value=1
          Constant NRetranslocationFactor: Value=0.01
          LinearInterpolationFunction ExpansionStress: XProperty=[Potato].WaterSupplyDemandRatio
            XYPairs: X=[0.5, 1]; Y=[0, 1]
          Constant CriticalNConc: Value=0.05
          Constant DMRetranslocationFactor: Value=0.5
          LinearInterpolationFunction ShadeInducedSenescenceRate: XProperty=[Leaf].CohortCurrentRankCoverAbove
            XYPairs: X=[0, 0.5, 0.8, 1]; Y=[0, 0, 0, 0.03]
          Constant NonStructuralFraction: Value=0.2
        RUEModel Photosynthesis
          Constant RUE: Value=1.2
          RUECO2Function FCO2: PhotosyntheticPathway=C3
          LinearInterpolationFunction FN: XProperty=[Leaf].Fn
            XYPairs: X=[0, 1, 1.5]; Y=[1, 1, 1]
          WeightedTemperatureFunction FT: MaximumTemperatureWeighting=0.75
            XYPairs: X=[2, 12, 24, 34]; Y=[0, 1, 1, 0]
          LinearInterpolationFunction FW: XProperty=[Leaf].Fw
            XYPairs: X=[0, 0.4, 1.5]; Y=[0, 1, 1]
          LinearInterpolationFunction FVPD: XProperty=[Leaf].Photosynthesis.VPD
            XYPairs: X=[0, 10, 50]; Y=[1, 1, 1]
          VariableReference RadnInt: VariableName=[Leaf].RadIntTot
        MinimumFunction FRGRFunction
          VariableReference RUE_FT: VariableName=[Leaf].Photosynthesis.FT.Value
          MinimumFunction Others
            VariableReference RUE_FN: VariableName=[Leaf].Photosynthesis.FN.Value
            VariableReference RUE_FVPD: VariableName=[Leaf].Photosynthesis.FVPD.Value
        AirTemperatureFunction ThermalTime
          XYPairs: X=[2, 20, 35]; Y=[0, 18, 0]
        MultiplyFunction ExtinctionCoeff
          Constant: Value=0.8
          LinearInterpolationFunction: XProperty=[Potato].WaterSupplyDemandRatio
            XYPairs: X=[0, 1]; Y=[0.5, 1]
        LinearInterpolationFunction FrostFraction: XProperty=[Weather].MinT
          XYPairs: X=[-1, 0]; Y=[0, 0]
        CompositeBiomass Total: Propertys=[[Leaf].Live, [Leaf].Dead]
        ArrayBiomass CohortArrayLive: Propertys=[[Leaf].Live]; ArraySize=[Leaf].MaxNodeNo
        ArrayBiomass CohortArrayDead: Propertys=[[Leaf].Dead]; ArraySize=[Leaf].MaxNodeNo
        LeafCohort InitialLeaf1: Rank=1; Area=900
        LeafCohort InitialLeaf2: Rank=2; Area=600
        LeafCohort InitialLeaf3: Rank=3; Area=300
      GenericAboveGroundOrgan Stem
        Constant NReallocationFactor: Value=0
        Constant NRetranslocationFactor: Value=0.05
        PhaseBasedSwitch NitrogenDemandSwitch: Start=Planting; End=FinalLeaf
        Constant DMRetranslocationFactor: Value=0
        Constant StructuralFraction: Value=1
        InternodeDemandFunction DMDemandFunction
          Constant InterNodeWt: Value=0.2
        LinearInterpolationFunction MaximumNConc: XProperty=[Phenology].Stage
          XYPairs: X=[3, 4, 5.3]; Y=[0.06, 0.05, 0.025]
        Constant MinimumNConc: Value=0.006
        Biomass Live
        Biomass Dead
  DataStore
    Input: FileName=Observed\potato_observations.txt
    Input InputRadInd: FileName=Observed\Potato_radint_observations.txt
    Input InputNodeNo: FileName=Observed\cultivar_nodenumber.txt
    PredictedObserved: PredictedTableName=Report; ObservedTableName=Input; FieldNameUsedForMatch=Clock.Today
    PredictedObserved FinalYieldData: PredictedTableName=Report; ObservedTableName=Input; FieldNameUsedForMatch=PotatoHarvestRule.Script.FinalTag
    TimeSeriesStats: TableName=PredictedObserved
  Tests
    Test:
      SimulationName  TableName        Type       ColumnNames  Parameters
      All             TimeSeriesStats  Tolerance  n            1,1
      All             TimeSeriesStats  Tolerance  residual     1,3
      All             TimeSeriesStats  Tolerance  R^2          1,1
      All             TimeSeriesStats  Tolerance  RMSD         1,1
      All             TimeSeriesStats  Tolerance  SB           1,3
      All             TimeSeriesStats  Mean       SDSD         3,value
      All             TimeSeriesStats  Tolerance  LCS          1,3
      All             TimeSeriesStats  Tolerance  %            1,1
  Experiment Potato
    Factors
      Factor CultivarBurbank
        Specifications:
          [PotatoSowingRule].Script.CultivarName=RussetBurbank
          [PotatoSowingRule].Script.StemNumberPerSeedTuber=2.2
          [PotatoSowingRule].Script.PlantingDepth=120
      Factor CultivarJerseyBenny
        Specifications:
          [PotatoSowingRule].Script.CultivarName=JerseyBenny
          [PotatoSowingRule].Script.StemNumberPerSeedTuber=3.6
          [PotatoSowingRule].Script.PlantingDepth=160
      Factor CultivarRedRascal
        Specifications:
          [PotatoSowingRule].Script.CultivarName=RedRascal
          [PotatoSowingRule].Script.StemNumberPerSeedTuber=4.87
          [PotatoSowingRule].Script.PlantingDepth=140
      Factor CultivarHorizon
        Specifications:
          [PotatoSowingRule].Script.CultivarName=Horizon
          [PotatoSowingRule].Script.StemNumberPerSeedTuber=3.2
          [PotatoSowingRule].Script.PlantingDepth=135
      Factor CultivarIlamHardy
        Specifications:
          [PotatoSowingRule].Script.CultivarName=IlamHardy
          [PotatoSowingRule].Script.StemNumberPerSeedTuber=4.63
          [PotatoSowingRule].Script.PlantingDepth=135
      Factor CultivarKaraka
        Specifications:
          [PotatoSowingRule].Script.CultivarName=Karaka
          [PotatoSowingRule].Script.StemNumberPerSeedTuber=3
          [PotatoSowingRule].Script.PlantingDepth=135
      Factor CultivarNooksac
        Specifications:
          [PotatoSowingRule].Script.CultivarName=Nooksac
          [PotatoSowingRule].Script.StemNumberPerSeedTuber=2.3
          [PotatoSowingRule].Script.PlantingDepth=165
      Factor CultivarRua
        Specifications:
          [PotatoSowingRule].Script.CultivarName=Rua
          [PotatoSowingRule].Script.StemNumberPerSeedTuber=2.55
          [PotatoSowingRule].Script.PlantingDepth=140
    Simulation RussetBurbank: Area=0; Slope=0
      Weather: FileName=lincoln.met
      Clock: StartDate=2003-10-20; EndDate=2004-06-05
      Summary
      SoilArbitrator Soil Arbitrator
      Zone Field: Area=0; Slope=0
        Soil: SoilType=Sedementary; LocalName=Lincoln; Latitude=0; Longitude=0
          Water
            Thickness  BD   AirDry  LL15  DUL   SAT
            100        1.2  0.08    0.16  0.33  0.5
            200        1.2  0.16    0.16  0.33  0.5
            300        1.2  0.15    0.15  0.31  0.44
            300        1.2  0.13    0.13  0.27  0.46
            300        1.2  0.15    0.15  0.3   0.44
            300        1.2  0.15    0.15  0.3   0.44
            SoilCrop PotatoSoil: LL=[0.13, 0.13, 0.1, 0.15, 0.3, 0.3]; KL=[0.1, 0.06, 0.04, 0.01, 0, 0]; XF=[1, 1, 1, 1, 0, 0]
          SoilWater: residueinterception=0; SummerDate=1-Nov; SummerU=9; SummerCona=4.4; WinterDate=1-Apr; WinterU=9; WinterCona=4.4; DiffusConst=88; DiffusSlope=35.4; Salb=0.18; CN2Bare=0; CNRed=-9E-05; CNCov=0; slope=0; discharge_width=0; catchment_area=0; max_pond=0
            Thickness  SWCON  KLAT
            100        0.55   0
            200        0.55   0
            300        0.55   0
            300        0.55   0
            300        0.55   0
            300        0.55   0
          SoilNitrogen: fom_type=[default, manure, mucuna, lablab, shemp, stable]; fract_carb=[0.2, 0.3, 0.54, 0.57, 0.45, 0]; fract_cell=[0.7, 0.3, 0.37, 0.37, 0.47, 0.1]; fract_lign=[0.1, 0.4, 0.09, 0.06, 0.08, 0.9]; wfpsN2N2O_x=[22, 88]; wfpsN2N2O_y=[0.1, 1]; oc=[3.51204, 2.4888, 1.19986, 1.03067, 0.470328, 0.470127]
          SoilOrganicMatter: RootCN=30; RootWt=3000; SoilCN=11.5; EnrACoeff=7.4; EnrBCoeff=0.2; OCUnits=Total
            Thickness  OC    FBiom  FInert
            100        3.5   0.025  0.3
            200        2.5   0.025  0.4
            300        1.2   0.015  0.75
            300        1.03  0.01   0.9
            300        0.47  0.01   0.96
            300        0.47  0.01   0.96
          Analysis: Thickness=[100, 200, 300, 300, 300, 300]; PH=[6.6, 6.2, 5.7, 5.5, 5.5, 5.5]; PHUnits=Water; BoronUnits=HotWater
          InitialWater Initial water: PercentMethod=FilledFromTop; FractionFull=1
          Sample: NO3Units=kgha; NH4Units=kgha; SWUnits=Volumetric; OCUnits=Total; PHUnits=Water
            Thickness  NO3   NH4
            100        40    0.1
            200        30    0.1
            300        14    0.1
            300        14    0.1
            300        1.38  0.1
            300        1.38  0.1
        Irrigation
        Fertiliser
        MicroClimate: air_pressure=1010; soil_emissivity=0.96; sun_angle=15; soil_heat_flux_fraction=0.4; night_interception_fraction=0.5; windspeed_default=3; refheight=2; albedo=0.26; emissivity=0.96; gsmax=0.01; r50=200; a_interception=0; b_interception=1; c_interception=0; d_interception=0; soil_albedo=0.23
        Plant Potato: CropType=Potato
        Manager PotatoSowingRule
          RowSpace = 280
          RowWidth = 770
          PlantingDepth = 120
          StemNumberPerSeedTuber = 2.2
          CultivarName = RussetBurbank
          SowingDate = 2003-10-20
```csharp
        using System;
        using Models.Core;
        using Models.PMF;
        using APSIM.Shared.Utilities;
        
        namespace Models
        {
           [Serializable] 
           [System.Xml.Serialization.XmlInclude(typeof(Model))]
            public class Script : Model
            {      
               [Link] Plant Potato;
               [Link] Clock Clock;

               [Description("Spacing (mm) between plants within rows")]
               public double RowSpace { get; set; }
               [Description("Spacing (mm) between rows")]
               public double RowWidth { get; set; }
               [Description("Depth (mm) tubers are planted")]
               public double PlantingDepth { get; set; }
               [Description("Number of stems per seed tuber")]
               public double StemNumberPerSeedTuber { get; set; }
               [Description("Cultivar")]
                public string CultivarName { get; set; }
               [Description("Sowing Date")]
               public DateTime SowingDate { get; set; }

               [EventSubscribe("DoManagement")]
               private void OnDoManagement(object sender, EventArgs e)
               {
				double PlantPopulation = 1/((RowWidth/1000)*(RowSpace/1000));

				if (Clock.Today.Date == SowingDate)
                    Potato.Sow(population:PlantPopulation, cultivar:CultivarName, depth:PlantingDepth, rowSpacing:150, budNumber:StemNumberPerSeedTuber);
                //Potato.Sow(... Contains the following arguements:
                //Population  double  Required  Seeds sowing/m2
                //Cultivar    string  Required  "NameOfCultivar"
                //Depth       double  Optional  Depth (mm) seed sown.   Default is 100mm 
                //MaxCover    double  Optional  Proportion (0-1) of the ground row crop will cover.   Default is 1.0
                //BudNumber   double  Optional  Number of mainstems per seed sown.  Default is 1.0
                //RowSpacing  double  Optional  Spaceing (mm) between drill rows when crop is sown.  Default is 150mm
                //CropClass   string  Optional  Crop class to instantiate when crop is sown.  Default is "Plant"
			   }
            }
        }
```
        Manager PotatoHarvestRule
          HarvestDate = 2004-06-01
```csharp
        using System;
        using Models.Core;
        using Models.PMF;
        using System.Xml.Serialization;
        using APSIM.Shared.Utilities;
        
        namespace Models
        {
           [Serializable] 
           [System.Xml.Serialization.XmlInclude(typeof(Model))]
            public class Script : Model
            {      
               [Link] Plant Potato;
               [Link] Clock Clock;
               [Link] Summary Summary;
               [Description("HarvestDate Date")]
               public DateTime HarvestDate { get; set; }    		
		       [XmlIgnore] public string FinalTag { get; set;}
		       [XmlIgnore] public bool Harvested {get; set;}
               [XmlIgnore] public bool ReadyForHarvest {get; set;}
               
               [EventSubscribe("Commencing")]
               private void OnSimulationCommencing(object sender, EventArgs e)
		       {
		       FinalTag = "";
               Harvested = false;
               ReadyForHarvest = false;
               }
               
               [EventSubscribe("DoManagement")]
               private void OnDoManagement(object sender, EventArgs e)
               {
               if (ReadyForHarvest == true)
                   {
                   Potato.Harvest();
                   ReadyForHarvest = false;
                   Harvested = true;
                   }
               FinalTag = "";    
               }
               
               [EventSubscribe("DoManagementCalculations")]
               private void OnDoManagementCalculations(object sender, EventArgs e)
               {
				if ((Clock.Today == HarvestDate)&&(Harvested == false))
				{
                    FinalTag = "yield";
					ReadyForHarvest = true;
                }
			   }
            }
        }
```
        Manager ExtraVariables
```csharp
using System;
using Models.Core;
using System.Collections.Generic;
using System.Text;
using Models.Soils;
using Models.PMF;
using Models;
using System.Xml.Serialization;
using APSIM.Shared.Utilities;

namespace Models
{
	[Serializable] 
	public class Script : Model
	{      
		[Link] Clock Clock;
		[Link] Soils.Soil Soil;
		[Link] Models.SurfaceOM.SurfaceOrganicMatter SOM;
		[Link] Weather Met;   
		[Link] Fertiliser Fert;
		[Link] Irrigation Irrig;  
		[Link] Plant Potato;
        [Link] Zone zone;
					
		[XmlIgnore] public bool InitialDay { get; set; }
		
		[XmlIgnore] public double AccumPlantN { get; set; }
		[XmlIgnore] public double AccumMineralisation { get; set; }
		[XmlIgnore] public double AccumDenit { get; set; }
		[XmlIgnore] public double AccumFert { get; set; }
		[XmlIgnore] public double AccumLeach { get; set; }
		[XmlIgnore] public double AccumDetach { get; set; }
		[XmlIgnore] public double DeltaSoilOMN { get; set; }
		[XmlIgnore] public double DeltaSurfaceOMN { get; set; }
		[XmlIgnore] public double DeltaSoilMineralN { get; set; }
		[XmlIgnore] public double SoilNitrogenContent { get; set; }
		
		[XmlIgnore] public double AccumEO { get; set; }
		[XmlIgnore] public double AccumEP { get; set; }
		[XmlIgnore] public double AccumES { get; set; }
		[XmlIgnore] public double AccumDrainage { get; set; }
		[XmlIgnore] public double AccumRunoff { get; set; }
		[XmlIgnore] public double AccumOutflowLat { get; set; }
		[XmlIgnore] public double AccumIrrigation { get; set; }
		[XmlIgnore] public double AccumRainfall { get; set; }
		[XmlIgnore] public double SoilWaterDeficit { get; set; }
		
		[XmlIgnore] public double AccumTtemerg { get; set; }
		
		[XmlIgnore] public double  InitialSoilOMN { get; set; }
		[XmlIgnore] public double  InitialSurfaceOMN { get; set; }
		[XmlIgnore] public double  InitialMineralN { get; set; }
		
		[XmlIgnore] public double SWC { get; set; }
		[XmlIgnore] public double DUL { get; set; }
		[XmlIgnore] public double OutFlowLat { get; set; }

		[XmlIgnore] public double FomN { get; set; }
		[XmlIgnore] public double BiomN { get; set; }
		[XmlIgnore] public double HumN { get; set; }
		[XmlIgnore] public double OrganicN { get; set; }
		[XmlIgnore] public double NO3N { get; set; }
		[XmlIgnore] public double NH4N { get; set; }
		[XmlIgnore] public double UreaN { get; set; }
		[XmlIgnore] public double MineralN { get; set; }
		[XmlIgnore] public double DltNMinRes { get; set; }
		[XmlIgnore] public double DltNMinTot { get; set; }
		
        [EventSubscribe("Commencing")]
        private void OnSimulationCommencing(object sender, EventArgs e)
        {
			InitialDay = true;
		}	   
		
		[EventSubscribe("DoManagement")]
		private void OnDoManagement(object sender, EventArgs e)
		{
			//!!!!!! Nitrogen balance components !!!!!!
			//!!!!!!^^^^^^^^^^^^^^^^^^^^^^^^^^^^^!!!!!!
           	FomN = MathUtilities.Sum(Soil.SoilNitrogen.FOMN);
			HumN = MathUtilities.Sum(Soil.SoilNitrogen.HumicN);
		    BiomN = MathUtilities.Sum(Soil.SoilNitrogen.MicrobialN);
			OrganicN = FomN + HumN + BiomN;
			NO3N = MathUtilities.Sum(Soil.NO3N);
			NH4N = MathUtilities.Sum(Soil.NH4N);
			UreaN = MathUtilities.Sum(Soil.SoilNitrogen.urea);
			MineralN = NO3N + NH4N + UreaN; 
			DltNMinRes = MathUtilities.Sum(Soil.SoilNitrogen.dlt_n_min_res);
			DltNMinTot = MathUtilities.Sum(Soil.SoilNitrogen.MineralisedN);
            int layers = Soil.Thickness.Length;
			if (InitialDay == true)
			{
				InitialSurfaceOMN = SOM.N;
				InitialSoilOMN = OrganicN;
				InitialMineralN = MineralN;
				InitialDay = false;
			}
			AccumFert += Fert.NitrogenApplied;
			DeltaSurfaceOMN = SOM.N - InitialSurfaceOMN;
			AccumLeach = AccumLeach - Soil.SoilWater.LeachNH4 - Soil.SoilWater.LeachNO3 - Soil.SoilWater.LeachUrea; //Fails
            AccumMineralisation += MathUtilities.Sum(Soil.SoilNitrogen.MineralisedN);
            AccumDenit -= MathUtilities.Sum(Soil.SoilNitrogen.Denitrification);
			AccumPlantN -= (double)zone.Get("Potato.Root.NUptake");
			DeltaSoilOMN = OrganicN - InitialSoilOMN;
			DeltaSoilMineralN = MineralN - InitialMineralN;
			SoilNitrogenContent = MineralN;
			
			//!!!!!! Water balance components !!!!!!
			//!!!!!!^^^^^^^^^^^^^^^^^^^^^^^^^^!!!!!!

			AccumIrrigation += Irrig.IrrigationApplied;
			AccumRainfall += Met.Rain;
			AccumEP -= (double)zone.Get("Potato.Leaf.Transpiration");
			SoilWaterDeficit =  (SWC - DUL);
			double OutFlowLat = MathUtilities.Sum(Soil.SoilWater.outflow_lat);
			AccumOutflowLat -= OutFlowLat;
			
			//!!!!!! Thermal time calculation !!!!!!
			//!!!!!! ^^^^^^^^^^^^^^^^^^^^^^^^ !!!!!!
			if (Potato.Phenology.Stage >= 3)
			AccumTtemerg += Potato.Phenology.ThermalTime.Value;
		}
		
		[EventSubscribe("DoManagementCalculations")]
		private void OnDoManagementCalculations(object sender, EventArgs e)
		{
			FomN = MathUtilities.Sum(Soil.SoilNitrogen.FOMN);
			HumN = MathUtilities.Sum(Soil.SoilNitrogen.HumicN);
		    BiomN = MathUtilities.Sum(Soil.SoilNitrogen.MicrobialN);
			
			
			AccumEO -= Soil.SoilWater.Eo;
			AccumES -= Soil.SoilWater.Es; 
			AccumDrainage -= Soil.SoilWater.Drainage;
			AccumRunoff -= Soil.SoilWater.Runoff;
			SWC = MathUtilities.Sum(Soil.SoilWater.SWmm);
			DUL = MathUtilities.Sum(Soil.SoilWater.DULmm);
		}
	}
}
```
        Report: EventNames=[Clock].DoReport
          VariableNames:
            [Clock].Today
            [ExtraVariables].Script.AccumTtemerg
            Potato.Phenology.CurrentPhaseName
            Potato.Phenology.Stage
            Potato.Phenology.Stage
            [ExtraVariables].Script.AccumPlantN
            [ExtraVariables].Script.AccumMineralisation
            [ExtraVariables].Script.AccumDenit
            [ExtraVariables].Script.AccumFert
            [ExtraVariables].Script.AccumLeach
            [ExtraVariables].Script.AccumDetach
            [ExtraVariables].Script.DeltaSoilOMN
            [ExtraVariables].Script.DeltaSurfaceOMN
            [ExtraVariables].Script.DeltaSoilMineralN
            Potato.Root.NSupplyUptake
            [Soil].SoilWater.Eo
            [Soil].SoilWater.Es
            [ExtraVariables].Script.SWC
            [ExtraVariables].Script.DUL
            [Soil].SoilWater.Drainage
            [Soil].SoilWater.Runoff
            [ExtraVariables].Script.OutFlowLat
            [Soil].SoilWater.pond
            [ExtraVariables].Script.AccumEO
            [ExtraVariables].Script.AccumEP
            [ExtraVariables].Script.AccumES
            [ExtraVariables].Script.AccumDrainage
            [ExtraVariables].Script.AccumRunoff
            [ExtraVariables].Script.AccumRainfall
            [ExtraVariables].Script.AccumIrrigation
            [ExtraVariables].Script.AccumOutflowLat
            [ExtraVariables].Script.SoilWaterDeficit
            Potato.Summariser.AboveGround.Wt
            Potato.Summariser.BelowGround.Wt
            Potato.Summariser.Total.Wt
            Potato.Summariser.TotalDead.Wt
            Potato.Summariser.TotalLive.Wt
            Potato.Leaf.Dead.Wt
            Potato.Leaf.Live.Wt
            Potato.Stem.Dead.Wt
            Potato.Stem.Live.Wt
            Potato.Tuber.Dead.Wt
            Potato.Tuber.Live.Wt
            Potato.Root.Dead.Wt
            Potato.Root.Live.Wt
            Potato.Summariser.AboveGround.N
            Potato.Summariser.BelowGround.N
            Potato.Summariser.Total.N
            Potato.Summariser.TotalLive.N
            Potato.Summariser.TotalDead.N
            Potato.Leaf.Dead.N
            Potato.Leaf.Live.N
            Potato.Stem.Dead.N
            Potato.Stem.Live.N
            Potato.Tuber.Dead.N
            Potato.Tuber.Live.N
            Potato.Root.Live.N
            Potato.Root.Dead.N
            Potato.Leaf.Live.NConc
            Potato.Leaf.Dead.NConc
            Potato.Stem.Live.NConc
            Potato.Stem.Dead.NConc
            Potato.Tuber.Live.NConc
            Potato.Tuber.Dead.NConc
            Potato.Root.Live.NConc
            Potato.Root.Dead.NConc
            Potato.Root.WaterSupply
            Potato.Root.WaterUptake
            Potato.Leaf.Transpiration
            Potato.Leaf.WaterDemand
            Potato.Root.Depth
            Potato.Leaf.CoverGreen
            Potato.Leaf.CoverTotal
            Potato.Leaf.CoverDead
            Potato.Leaf.LAI
            Potato.Leaf.LAIDead
            Potato.Structure.Height
            Potato.Leaf.Fn
            Potato.Leaf.Fw
            Potato.Leaf.Photosynthesis.FT.Value
            Potato.Leaf.Photosynthesis.FVPD.Value
            Potato.Structure.PlantTotalNodeNo
            Potato.Structure.TotalStemPopn
            Potato.Leaf.PlantAppearedGreenLeafNo
            Potato.Leaf.ExpandingCohortNo
            Potato.Leaf.AppearedCohortNo
            Potato.Leaf.DeadCohortNo
            Potato.Structure.MainStemNodeNo
            Potato.Leaf.SenescingCohortNo
            Potato.Structure.PrimaryBudTotalNodeNo
            Potato.Leaf.LeafCohortParameters.MinimumNConc.Value
            Potato.Stem.MinimumNConc.Value
            Potato.Tuber.MinimumNConc.Value
            Potato.Root.MinimumNConc.Value
            Potato.Leaf.LeafCohortParameters.MaximumNConc.Value
            Potato.Stem.MaximumNConc.Value
            Potato.Tuber.MaximumNConc.Value
            Potato.Root.MaximumNConc.Value
            Potato.Stem.Live.StructuralWt
            Potato.Stem.Live.NonStructuralWt
            Potato.Leaf.SpecificArea
            Potato.Leaf.ExpandedCohortNo
            [Soil].SoilWater.SWmm
            [Soil].NO3N
            [ExtraVariables].Script.SoilNitrogenContent
            Potato.Arbitrator.NDemand
            [MicroClimate].net_radn
            [MicroClimate].peta
            [MicroClimate].petr
            [ExtraVariables].Script.FomN
            [ExtraVariables].Script.HumN
            [ExtraVariables].Script.BiomN
            [ExtraVariables].Script.DltNMinRes
            [ExtraVariables].Script.DltNMinTot
            [PotatoHarvestRule].Script.FinalTag
            Potato.Tuber.LiveFWt
            Potato.Tuber.DryMatterContent.Value
            [Potato].Arbitrator.NO3NSupply
            [Potato].Arbitrator.NH4NSupply
            [Potato].Root.NUptake
        SurfaceOrganicMatter: PondActive=no; ReportAdditions=no; ReportRemovals=no; PoolName=Wheat; type=Wheat; mass=2000; standing_fraction=0; cnr=80; CriticalResidueWeight=2000; OptimumDecompTemp=20; MaxCumulativeEOS=20; CNRatioDecompCoeff=0.277; CNRatioDecompThreshold=25; TotalLeachRain=25; MinRainToLeach=10; CriticalMinimumOrganicC=0.004; DefaultCPRatio=0; DefaultStandingFraction=0; StandingExtinctCoeff=0.5; FractionFaecesAdded=0.5
          Pools:
            {PoolName=Wheat, ResidueType=Wheat, Mass=2000, CNRatio=80, StandingFraction=0}
          ResidueTypes: LoadFromResource=ResidueTypes
          TillageTypes TillageTypesList
        Operations
          2003-10-20  [Fertiliser].Apply(100, Fertiliser.Types.UreaN, 0);
          2003-11-25  [Fertiliser].Apply(69, Fertiliser.Types.UreaN,0);
          2003-11-26  [Irrigation].Apply(15);
          2003-12-04  [Irrigation].Apply(50);
          2003-12-16  [Irrigation].Apply(15);
          2003-12-22  [Irrigation].Apply(50);
          2003-12-30  [Irrigation].Apply(50);
          2004-01-08  [Irrigation].Apply(50);
          2004-01-21  [Irrigation].Apply(50);
          2004-01-31  [Irrigation].Apply(50);
          2004-02-27  [Irrigation].Apply(25);
  Experiment Baxters
    Factors
      Factor Sowing
        Factor 14Oct
          Specifications:
            [PotatoSowingRule].Script.SowingDate=1998-10-14
            [PotatoSowingRule].Script.PlantingDepth=200
            [PotatoSowingRule].Script.StemNumberPerSeedTuber=3.0
            [SetIntergerCropParameter].Script.OverRideInterger=34
        Factor 2Nov
          Specifications:
            [PotatoSowingRule].Script.SowingDate=1998-11-02
            [PotatoSowingRule].Script.PlantingDepth=160
            [PotatoSowingRule].Script.StemNumberPerSeedTuber=3.8
            [SetIntergerCropParameter].Script.OverRideInterger=28
        Factor 23Nov
          Specifications:
            [PotatoSowingRule].Script.SowingDate=1998-11-23
            [PotatoSowingRule].Script.PlantingDepth=120
            [PotatoSowingRule].Script.StemNumberPerSeedTuber=5.7
            [SetIntergerCropParameter].Script.OverRideInterger=20
      Factor Population
        Factor 4: Specifications=[PotatoSowingRule].Script.RowSpace=300
        Factor 2: Specifications=[PotatoSowingRule].Script.RowSpace=600
    Simulation BaxtersBase: Area=0; Slope=0
      Weather: FileName=lincoln.met
      Clock: StartDate=1998-10-14; EndDate=1999-05-01
      Summary
      SoilArbitrator Soil Arbitrator
      Zone Field: Area=0; Slope=0
        Soil: Latitude=0; Longitude=0
          Analysis: Thickness=[100, 200, 300, 300, 300, 300]; PH=[6.6, 6.2, 5.7, 5.5, 5.5, 5.5]; PHUnits=Water; BoronUnits=HotWater
          InitialWater Initial water: PercentMethod=EvenlyDistributed; FractionFull=1
          Water
            Thickness  BD   AirDry  LL15  DUL   SAT
            100        1.2  0.08    0.13  0.33  0.5
            200        1.2  0.13    0.13  0.33  0.5
            300        1.2  0.1     0.1   0.31  0.44
            300        1.2  0.06    0.06  0.15  0.46
            300        1.2  0.04    0.04  0.1   0.44
            300        1.2  0.02    0.02  0.06  0.44
            SoilCrop wheatSoil: LL=[0.13, 0.13, 0.1, 0.08, 0.11, 0.11]; KL=[0.06, 0.06, 0.06, 0.06, 0.06, 0.06]; XF=[1, 1, 1, 1, 1, 1]
            SoilCrop PotatoSoil: LL=[0.13, 0.13, 0.27, 0.27, 0.3, 0.3]; KL=[0.1, 0.06, 0.03, 0.01, 0, 0]; XF=[1, 1, 0.1, 0, 0, 0]
          SoilWater: residueinterception=0; SummerDate=1-Nov; SummerU=9; SummerCona=4.4; WinterDate=1-Apr; WinterU=9; WinterCona=4.4; DiffusConst=88; DiffusSlope=35.4; Salb=0.18; CN2Bare=68; CNRed=20; CNCov=0.8; slope=0; discharge_width=0; catchment_area=0; max_pond=0
            Thickness  SWCON  KLAT
            100        0.55   0
            200        0.55   0
            300        0.55   0
            300        0.55   0
            300        0.55   0
            300        0.55   0
          SoilNitrogen: fom_type=[default, manure, mucuna, lablab, shemp, stable]; fract_carb=[0.2, 0.3, 0.54, 0.57, 0.45, 0]; fract_cell=[0.7, 0.3, 0.37, 0.37, 0.47, 0.1]; fract_lign=[0.1, 0.4, 0.09, 0.06, 0.08, 0.9]; wfpsN2N2O_x=[22, 88]; wfpsN2N2O_y=[0.1, 1]; oc=[1.84181, 1.46521, 1.1998, 1.03011, 0.470339, 0.470139]
          SoilOrganicMatter: RootCN=30; RootWt=3000; SoilCN=11.5; EnrACoeff=7.4; EnrBCoeff=0.2; OCUnits=Total
            Thickness  OC    FBiom  FInert
            100        1.82  0.025  0.3
            200        1.47  0.025  0.4
            300        1.2   0.015  0.75
            300        1.03  0.01   0.9
            300        0.47  0.01   0.96
            300        0.47  0.01   0.96
          Sample Initial nitrogen: NO3Units=kgha; NH4Units=ppm; SWUnits=Volumetric; OCUnits=Total; PHUnits=Water
            Thickness  NO3  NH4
            100        217  0
            200        30   0
            300        5    0
            300        5    0
            300        0    0
            300        0    0
        Irrigation
        Fertiliser
        MicroClimate: same as Potato.RussetBurbank.Field.MicroClimate
        Plant Potato: CropType=Potato
        Manager PotatoSowingRule
          RowSpace = 300
          RowWidth = 770
          PlantingDepth = 200
          StemNumberPerSeedTuber = 3
          CultivarName = RussetBurbank
          SowingDate = 1998-10-14
```csharp
        using System;
        using Models.Core;
        using Models.PMF;
        using APSIM.Shared.Utilities;
        
        namespace Models
        {
           [Serializable] 
           [System.Xml.Serialization.XmlInclude(typeof(Model))]
            public class Script : Model
            {      
               [Link] Plant Potato;
               [Link] Clock Clock;

               [Description("Spacing (mm) between plants within rows")]
               public double RowSpace { get; set; }
               [Description("Spacing (mm) between rows")]
               public double RowWidth { get; set; }
               [Description("Depth (mm) tubers are planted")]
               public double PlantingDepth { get; set; }
               [Description("Number of stems per seed tuber")]
               public double StemNumberPerSeedTuber { get; set; }
               [Description("Cultivar")]
               [Display(DisplayType = DisplayAttribute.DisplayTypeEnum.CultivarName)]
               public string CultivarName { get; set; }
               [Description("Sowing Date")]
               public DateTime SowingDate { get; set; }

               [EventSubscribe("DoManagement")]
               private void OnDoManagement(object sender, EventArgs e)
               {
				double PlantPopulation = 1/((RowWidth/1000)*(RowSpace/1000));

				if (Clock.Today.Date == SowingDate)
                    Potato.Sow(population:PlantPopulation, cultivar:CultivarName, depth:PlantingDepth, rowSpacing:150, budNumber:StemNumberPerSeedTuber);
                //Potato.Sow(... Contains the following arguements:
                //Population  double  Required  Seeds sowing/m2
                //Cultivar    string  Required  "NameOfCultivar"
                //Depth       double  Optional  Depth (mm) seed sown.   Default is 100mm 
                //MaxCover    double  Optional  Proportion (0-1) of the ground row crop will cover.   Default is 1.0
                //BudNumber   double  Optional  Number of mainstems per seed sown.  Default is 1.0
                //RowSpacing  double  Optional  Spaceing (mm) between drill rows when crop is sown.  Default is 150mm
                //CropClass   string  Optional  Crop class to instantiate when crop is sown.  Default is "Plant"
			   }
            }
        }
```
        Manager ExtraVariables
          script: same as in Potato.RussetBurbank.Field.ExtraVariables
        Report: EventNames=[Clock].DoReport
          VariableNames:
            [Clock].Today
            [ExtraVariables].Script.AccumTtemerg
            Potato.Phenology.CurrentPhaseName
            Potato.Phenology.Stage
            [ExtraVariables].Script.AccumPlantN
            [ExtraVariables].Script.AccumMineralisation
            [ExtraVariables].Script.AccumDenit
            [ExtraVariables].Script.AccumFert
            [ExtraVariables].Script.AccumLeach
            [ExtraVariables].Script.AccumDetach
            [ExtraVariables].Script.DeltaSoilOMN
            [ExtraVariables].Script.DeltaSurfaceOMN
            [ExtraVariables].Script.DeltaSoilMineralN
            Potato.Root.NSupplyUptake
            [Soil].SoilWater.Eo
            [Soil].SoilWater.Es
            [ExtraVariables].Script.SWC
            [ExtraVariables].Script.DUL
            [Soil].SoilWater.Drainage
            [Soil].SoilWater.Runoff
            [ExtraVariables].Script.OutFlowLat
            [Soil].SoilWater.pond
            [ExtraVariables].Script.AccumEO
            [ExtraVariables].Script.AccumEP
            [ExtraVariables].Script.AccumES
            [ExtraVariables].Script.AccumDrainage
            [ExtraVariables].Script.AccumRunoff
            [ExtraVariables].Script.AccumRainfall
            [ExtraVariables].Script.AccumIrrigation
            [ExtraVariables].Script.AccumOutflowLat
            [ExtraVariables].Script.SoilWaterDeficit
            Potato.Summariser.AboveGround.Wt
            Potato.Summariser.BelowGround.Wt
            Potato.Summariser.Total.Wt
            Potato.Summariser.TotalDead.Wt
            Potato.Summariser.TotalLive.Wt
            Potato.Leaf.Dead.Wt
            Potato.Leaf.Live.Wt
            Potato.Stem.Dead.Wt
            Potato.Stem.Live.Wt
            Potato.Tuber.Dead.Wt
            Potato.Tuber.Live.Wt
            Potato.Root.Dead.Wt
            Potato.Root.Live.Wt
            Potato.Summariser.AboveGround.N
            Potato.Summariser.BelowGround.N
            Potato.Summariser.Total.N
            Potato.Summariser.TotalLive.N
            Potato.Summariser.TotalDead.N
            Potato.Leaf.Dead.N
            Potato.Leaf.Live.N
            Potato.Stem.Dead.N
            Potato.Stem.Live.N
            Potato.Tuber.Dead.N
            Potato.Tuber.Live.N
            Potato.Root.Live.N
            Potato.Root.Dead.N
            Potato.Leaf.Live.NConc
            Potato.Leaf.Dead.NConc
            Potato.Stem.Live.NConc
            Potato.Stem.Dead.NConc
            Potato.Tuber.Live.NConc
            Potato.Tuber.Dead.NConc
            Potato.Root.Live.NConc
            Potato.Root.Dead.NConc
            Potato.Root.WaterSupply
            Potato.Root.WaterUptake
            Potato.Leaf.Transpiration
            Potato.Leaf.WaterDemand
            Potato.Root.Depth
            Potato.Leaf.CoverGreen
            Potato.Leaf.CoverTotal
            Potato.Leaf.CoverDead
            Potato.Leaf.LAI
            Potato.Leaf.LAIDead
            Potato.Structure.Height
            Potato.Leaf.Fn
            Potato.Leaf.Fw
            Potato.Leaf.Photosynthesis.FT.Value
            Potato.Leaf.Photosynthesis.FVPD.Value
            Potato.Structure.PlantTotalNodeNo
            Potato.Structure.TotalStemPopn
            Potato.Leaf.PlantAppearedGreenLeafNo
            Potato.Leaf.ExpandingCohortNo
            Potato.Leaf.AppearedCohortNo
            Potato.Leaf.DeadCohortNo
            Potato.Structure.MainStemNodeNo
            Potato.Leaf.SenescingCohortNo
            Potato.Structure.PrimaryBudTotalNodeNo
            Potato.Leaf.LeafCohortParameters.MinimumNConc.Value
            Potato.Stem.MinimumNConc.Value
            Potato.Tuber.MinimumNConc.Value
            Potato.Root.MinimumNConc.Value
            Potato.Leaf.LeafCohortParameters.MaximumNConc.Value
            Potato.Stem.MaximumNConc.Value
            Potato.Tuber.MaximumNConc.Value
            Potato.Root.MaximumNConc.Value
            Potato.Stem.Live.StructuralWt
            Potato.Stem.Live.NonStructuralWt
            Potato.Leaf.SpecificArea
            Potato.Leaf.ExpandedCohortNo
            [Soil].SoilWater.SWmm
            [Soil].NO3N
            [ExtraVariables].Script.SoilNitrogenContent
            Potato.Arbitrator.NDemand
            [MicroClimate].net_radn
            [MicroClimate].peta
            [MicroClimate].petr
            [ExtraVariables].Script.FomN
            [ExtraVariables].Script.HumN
            [ExtraVariables].Script.BiomN
            [ExtraVariables].Script.DltNMinRes
            [ExtraVariables].Script.DltNMinTot
            [PotatoHarvestRule].Script.FinalTag
            Potato.Tuber.LiveFWt
            Potato.Tuber.DryMatterContent.Value
        SurfaceOrganicMatter surface organic matter: ReportAdditions=no; ReportRemovals=no; PoolName=wheat; type=wheat; mass=2000; standing_fraction=0; cnr=80; CriticalResidueWeight=2000; OptimumDecompTemp=20; MaxCumulativeEOS=20; CNRatioDecompCoeff=0.277; CNRatioDecompThreshold=25; TotalLeachRain=25; MinRainToLeach=10; CriticalMinimumOrganicC=0.004; DefaultCPRatio=0; DefaultStandingFraction=0; StandingExtinctCoeff=0.5; FractionFaecesAdded=0.5
          Pools:
            {PoolName=wheat, ResidueType=wheat, Mass=2000, CNRatio=80, StandingFraction=0}
          ResidueTypes: LoadFromResource=ResidueTypes
        Operations
          1998-10-02  [Irrigation].Apply(40);
          1998-10-26  [Irrigation].Apply(70);
          1998-12-15  [Irrigation].Apply(70);
          1998-12-29  [Irrigation].Apply(10);
          1998-12-30  [Irrigation].Apply(55);
          1999-01-07  [Irrigation].Apply(50);
          1999-01-21  [Irrigation].Apply(40);
          1999-02-10  [Irrigation].Apply(28);
          1999-02-19  [Irrigation].Apply(15);
          1999-03-09  [Irrigation].Apply(25);
          1998-12-29  [Fertiliser].Apply(150, Fertiliser.Types.UreaN, 10);
        Manager SetIntergerCropParameter
          OverRidePath = Potato.Structure.MainStemFinalNodeNumber.Value
          OverRideInterger = 34
```csharp
using System;
using Models.Core;
using System.Collections.Generic;
using System.Text;
using Models.PMF;
using Models;
using System.Xml.Serialization;
using APSIM.Shared.Utilities;

namespace Models
{
	[Serializable] 
	public class Script : Model
	{      
        [Link] Plant Plant;          
        [Link] Zone zone;
		[Description("Path for coefficient to be Overwritten")]
		public string OverRidePath { get; set; }
		[Description("Value for new coefficient Interger")]
        public int OverRideInterger { get; set; }
        
		[EventSubscribe("Sowing")]
		private void OnSowing(object sender, EventArgs e)
		{
			object ResetValue = OverRideInterger;
			zone.Set(OverRidePath, ResetValue);
	    }
	}
}
```
        Manager PotatoHarvestRule
          HarvestDate = 1999-04-27
```csharp
        using System;
        using Models.Core;
        using Models.PMF;
        using System.Xml.Serialization;
        using APSIM.Shared.Utilities;
        
        namespace Models
        {
           [Serializable] 
           [System.Xml.Serialization.XmlInclude(typeof(Model))]
            public class Script : Model
            {      
               [Link] Plant Potato;
               [Link] Clock Clock;
               [Link] Summary Summary;
               [Description("HarvestDate Date")]
               public DateTime HarvestDate { get; set; }    		
		       [XmlIgnore] public string FinalTag { get; set;}
		       [XmlIgnore] public bool Harvested {get; set;}
               [XmlIgnore] public bool ReadyForHarvest {get; set;}
               
               [EventSubscribe("Commencing")]
               private void OnSimulationCommencing(object sender, EventArgs e)
		       {
		       FinalTag = "";
               Harvested = false;
               ReadyForHarvest = false;
               }
               
               [EventSubscribe("DoManagement")]
               private void OnDoManagement(object sender, EventArgs e)
               {
               if (ReadyForHarvest == true)
                   {
                   Potato.Harvest();
                   ReadyForHarvest = false;
                   Harvested = true;
                   }
               FinalTag = "";    
               }
               
               [EventSubscribe("DoManagementCalculations")]
               private void OnDoManagementCalculations(object sender, EventArgs e)
               {
				if ((Clock.Today == HarvestDate)&&(Harvested == false))
				{
                    FinalTag = "yield";
					ReadyForHarvest = true;
                }
                if((Potato.Phenology.Stage>=7)&&(Harvested==false))
				{
					FinalTag = "yield";
					ReadyForHarvest = true;
				}
			   }
            }
        }
```
  Experiment FSP
    Factors
      Factor Nitrogen: Specifications=[operations]
        Operations 472
          2000-05-02  [Fertiliser].Apply(300, Fertiliser.Types.UreaN, 10);
          2000-06-14  [Fertiliser].Apply(170, Fertiliser.Types.UreaN, 10);
        Operations 350
          2000-05-02  [Fertiliser].Apply(180, Fertiliser.Types.UreaN, 10);
          2000-06-14  [Fertiliser].Apply(57, Fertiliser.Types.UreaN, 10);
          2000-07-10  [Fertiliser].Apply(57, Fertiliser.Types.UreaN, 10);
          2000-08-03  [Fertiliser].Apply(57, Fertiliser.Types.UreaN, 10);
        Operations 242
          2000-05-02  [Fertiliser].Apply(180, Fertiliser.Types.UreaN, 10);
          2000-06-14  [Fertiliser].Apply(46, Fertiliser.Types.UreaN, 10);
          2000-07-10  [Fertiliser].Apply(46, Fertiliser.Types.UreaN, 10);
        Operations 0
          2000-05-02  [Fertiliser].Apply(0, Fertiliser.Types.UreaN, 10);
          2000-06-14  [Fertiliser].Apply(0, Fertiliser.Types.UreaN, 10);
    Simulation FSPBase: Area=0; Slope=0
      Weather: FileName=Pukehohe.met
      Clock: StartDate=2000-05-01; EndDate=2000-12-01
      Summary
      SoilArbitrator Soil Arbitrator
      Zone Field: Area=0; Slope=0
        Soil: Latitude=0; Longitude=0
          Analysis: Thickness=[100, 200, 300, 300, 300, 300]; PH=[6.6, 6.2, 5.7, 5.5, 5.5, 5.5]; PHUnits=Water; BoronUnits=HotWater
          InitialWater Initial water: PercentMethod=EvenlyDistributed; FractionFull=1
          Water
            Thickness  BD   AirDry  LL15  DUL   SAT
            100        1.2  0.08    0.13  0.33  0.5
            200        1.2  0.08    0.13  0.33  0.5
            300        1.2  0.05    0.1   0.31  0.44
            300        1.2  0.04    0.08  0.27  0.46
            300        1.2  0.06    0.11  0.3   0.44
            300        1.2  0.06    0.11  0.3   0.44
            SoilCrop wheatSoil: LL=[0.13, 0.13, 0.1, 0.08, 0.11, 0.11]; KL=[0.06, 0.06, 0.06, 0.06, 0.06, 0.06]; XF=[1, 1, 1, 1, 1, 1]
            SoilCrop PotatoSoil: LL=[0.13, 0.13, 0.1, 0.08, 0.11, 0.11]; KL=[0.1, 0.1, 0.07, 0.05, 0.05, 0.05]; XF=[1, 1, 1, 1, 1, 1]
          SoilWater: same as Baxters.BaxtersBase.Field.Soil.SoilWater
          SoilNitrogen: fom_type=[default, manure, mucuna, lablab, shemp, stable]; fract_carb=[0.2, 0.3, 0.54, 0.57, 0.45, 0]; fract_cell=[0.7, 0.3, 0.37, 0.37, 0.47, 0.1]; fract_lign=[0.1, 0.4, 0.09, 0.06, 0.08, 0.9]; wfpsN2N2O_x=[22, 88]; wfpsN2N2O_y=[0.1, 1]; oc=[1.8494, 1.4708, 1.19956, 1.03027, 0.470379, 0.470164]
          SoilOrganicMatter: RootCN=30; RootWt=3000; SoilCN=11.5; EnrACoeff=7.4; EnrBCoeff=0.2; OCUnits=Total
            Thickness  OC    FBiom  FInert
            100        1.82  0.025  0.6
            200        1.47  0.025  0.7
            300        1.2   0.015  0.75
            300        1.03  0.01   0.9
            300        0.47  0.01   0.96
            300        0.47  0.01   0.96
          Sample Initial nitrogen: NO3Units=ppm; NH4Units=ppm; SWUnits=Volumetric; OCUnits=Total; PHUnits=Water
            Thickness  NO3  NH4
            100        15   0.1
            200        7    0.1
            300        7    0.1
            300        1    0.1
            300        1    0.1
            300        1    0.1
        Irrigation
        Fertiliser
        MicroClimate: same as Potato.RussetBurbank.Field.MicroClimate
        Plant Potato: CropType=Potato
        Manager PotatoSowingRule
          RowSpace = 280
          RowWidth = 770
          PlantingDepth = 170
          StemNumberPerSeedTuber = 2.4
          CultivarName = IlamHardy
          SowingDate = 2000-05-02
          script: same as in Baxters.BaxtersBase.Field.PotatoSowingRule
        Manager ExtraVariables
          script: same as in Potato.RussetBurbank.Field.ExtraVariables
        Report: same as Baxters.BaxtersBase.Field.Report
        SurfaceOrganicMatter surface organic matter: PoolName=wheat; type=wheat; mass=2000; standing_fraction=0; cnr=80; CriticalResidueWeight=2000; OptimumDecompTemp=20; MaxCumulativeEOS=20; CNRatioDecompCoeff=0.277; CNRatioDecompThreshold=25; TotalLeachRain=25; MinRainToLeach=10; CriticalMinimumOrganicC=0.004; DefaultCPRatio=0; DefaultStandingFraction=0; StandingExtinctCoeff=0.5; FractionFaecesAdded=0.5
          Pools:
            {PoolName=wheat, ResidueType=wheat, Mass=2000, CNRatio=80, StandingFraction=0}
          ResidueTypes: LoadFromResource=ResidueTypes
        Operations
          2000-05-02  [Fertiliser].Apply(300, Fertiliser.Types.UreaN, 10);
          2000-06-14  [Fertiliser].Apply(170, Fertiliser.Types.UreaN, 10);
        Manager PotatoHarvestRule
          HarvestDate = 2000-10-16
          script: same as in Baxters.BaxtersBase.Field.PotatoHarvestRule
  Experiment FUE_NI
    Factors
      Factor Nitrogen: Specifications=[operations]
        Operations 368
          2004-05-10  [Fertiliser].Apply(230, Fertiliser.Types.UreaN, 10);
          2004-07-17  [Fertiliser].Apply(69, Fertiliser.Types.UreaN, 10);
          2004-08-26  [Fertiliser].Apply(69, Fertiliser.Types.UreaN, 10);
        Operations 253
          2004-05-10  [Fertiliser].Apply(115, Fertiliser.Types.UreaN, 10);
          2004-07-17  [Fertiliser].Apply(69, Fertiliser.Types.UreaN, 10);
          2004-08-26  [Fertiliser].Apply(69, Fertiliser.Types.UreaN, 10);
        Operations 0
          2004-05-10  [Fertiliser].Apply(0, Fertiliser.Types.UreaN, 10);
          2004-07-17  [Fertiliser].Apply(0, Fertiliser.Types.UreaN, 10);
          2004-08-26  [Fertiliser].Apply(0, Fertiliser.Types.UreaN, 10);
    Simulation FUE_NI_base: Area=0; Slope=0
      Weather: FileName=Pukehohe.met
      Clock: StartDate=2004-05-10; EndDate=2004-12-31
      Summary
      SoilArbitrator Soil Arbitrator
      Zone paddock: Area=1; Slope=0
        Soil: Latitude=0; Longitude=0
          Analysis: Thickness=[100, 200, 300, 300, 300, 300]; PH=[6.6, 6.2, 5.7, 5.5, 5.5, 5.5]; PHUnits=Water; BoronUnits=HotWater
          InitialWater Initial water: PercentMethod=EvenlyDistributed; FractionFull=1
          Water
            Thickness  BD   AirDry  LL15  DUL   SAT
            100        1.2  0.08    0.13  0.33  0.5
            200        1.2  0.08    0.13  0.33  0.5
            300        1.2  0.05    0.1   0.31  0.44
            300        1.2  0.04    0.08  0.27  0.46
            300        1.2  0.06    0.11  0.3   0.44
            300        1.2  0.06    0.11  0.3   0.44
            SoilCrop wheatSoil: LL=[0.13, 0.13, 0.1, 0.08, 0.11, 0.11]; KL=[0.06, 0.06, 0.06, 0.06, 0.06, 0.06]; XF=[1, 1, 1, 1, 1, 1]
            SoilCrop potato2Soil: LL=[0.13, 0.13, 0.1, 0.15, 0.3, 0.3]; KL=[0.1, 0.1, 0.07, 0.05, 0.05, 0.05]; XF=[1, 1, 1, 1, 0, 0]
            SoilCrop PotatoSoil: LL=[0.13, 0.13, 0.1, 0.15, 0.3, 0.3]; KL=[0.1, 0.1, 0.07, 0.05, 0.05, 0.05]; XF=[1, 1, 1, 1, 0, 0]
          SoilWater: same as Baxters.BaxtersBase.Field.Soil.SoilWater
          SoilNitrogen: fom_type=[default, manure, mucuna, lablab, shemp, stable]; fract_carb=[0.2, 0.3, 0.54, 0.57, 0.45, 0]; fract_cell=[0.7, 0.3, 0.37, 0.37, 0.47, 0.1]; fract_lign=[0.1, 0.4, 0.09, 0.06, 0.08, 0.9]; wfpsN2N2O_x=[22, 88]; wfpsN2N2O_y=[0.1, 1]; oc=[1.83396, 1.4699, 1.19945, 1.03026, 0.470345, 0.470137]
          SoilOrganicMatter: same as Baxters.BaxtersBase.Field.Soil.SoilOrganicMatter
          Sample Initial nitrogen: NO3Units=ppm; NH4Units=ppm; SWUnits=Volumetric; OCUnits=Total; PHUnits=Water
            Thickness  NO3      NH4
            100        5        0.1
            200        3        0.1
            300        8        0.1
            300        7        0.1
            300        1.38889  0.1
            300        1.38889  0.1
        Fertiliser
        Irrigation
        SurfaceOrganicMatter surface organic matter: same as FSP.FSPBase.Field.surface organic matter
        MicroClimate: air_pressure=1010; soil_emissivity=0.96; sun_angle=15; soil_heat_flux_fraction=0.4; night_interception_fraction=0.5; windspeed_default=3; refheight=2; albedo=0.15; emissivity=0.96; gsmax=0.01; r50=200; a_interception=0; b_interception=0; c_interception=0; d_interception=0; soil_albedo=0.23
        Plant Potato: CropType=Potato
        Folder Manager folder
          Operations
            2004-05-10  [Fertiliser].Apply(0, Fertiliser.Types.UreaN, 10);
            2004-07-17  [Fertiliser].Apply(0, Fertiliser.Types.UreaN, 10);
            2004-08-26  [Fertiliser].Apply(0, Fertiliser.Types.UreaN, 10);
          Manager PotatoSowingRule
            RowSpace = 30
            RowWidth = 810
            PlantingDepth = 170
            StemNumberPerSeedTuber = 2.4
            CultivarName = Nadine
            SowingDate = 2004-05-10
            script: same as in Potato.RussetBurbank.Field.PotatoSowingRule
        Manager ExtraVariables
          script: same as in Potato.RussetBurbank.Field.ExtraVariables
        Report: same as Baxters.BaxtersBase.Field.Report
        Manager PotatoHarvestRule
          HarvestDate = 2004-11-09
          script: same as in Potato.RussetBurbank.Field.PotatoHarvestRule
        Manager SetIntergerCropParameter
          OverRidePath = Potato.Structure.MainStemFinalNodeNumber.Value
          OverRideInterger = 10
          script: same as in Baxters.BaxtersBase.Field.SetIntergerCropParameter
  Experiment FUE
    Factors
      Factor Fertiliser: Specifications=[FertiliserApplications]
        Operations 300early
          1999-10-19  [Fertiliser].Apply(150, Fertiliser.Types.UreaN, 10);
          1999-12-01  [Fertiliser].Apply(150, Fertiliser.Types.UreaN, 10);
        Operations 150early
          1999-10-19  [Fertiliser].Apply(150, Fertiliser.Types.UreaN, 10);
        Operations 275split
          1999-10-19  [Fertiliser].Apply(100, Fertiliser.Types.UreaN, 10);
          1999-12-01  [Fertiliser].Apply(25, Fertiliser.Types.UreaN, 10);
          1999-12-13  [Fertiliser].Apply(25, Fertiliser.Types.UreaN, 10);
          2000-01-17  [Fertiliser].Apply(13, Fertiliser.Types.UreaN, 10);
          2000-01-21  [Fertiliser].Apply(13, Fertiliser.Types.UreaN, 10);
          2000-01-24  [Fertiliser].Apply(13, Fertiliser.Types.UreaN, 10);
          2000-01-31  [Fertiliser].Apply(13, Fertiliser.Types.UreaN, 10);
          2000-02-07  [Fertiliser].Apply(13, Fertiliser.Types.UreaN, 10);
          2000-02-14  [Fertiliser].Apply(13, Fertiliser.Types.UreaN, 10);
          2000-02-21  [Fertiliser].Apply(13, Fertiliser.Types.UreaN, 10);
          2000-02-28  [Fertiliser].Apply(13, Fertiliser.Types.UreaN, 10);
          2000-03-06  [Fertiliser].Apply(13, Fertiliser.Types.UreaN, 10);
          2000-03-13  [Fertiliser].Apply(13, Fertiliser.Types.UreaN, 10);
          2000-03-20  [Fertiliser].Apply(13, Fertiliser.Types.UreaN, 10);
          2000-03-27  [Fertiliser].Apply(13, Fertiliser.Types.UreaN, 10);
        Operations Nil
    Simulation FUE_base: Area=0; Slope=0
      Weather: FileName=lincoln.met
      Clock: StartDate=1999-10-19; EndDate=2000-06-30
      Summary
      SoilArbitrator Soil Arbitrator
      Zone paddock: Area=1; Slope=0
        Soil: Latitude=0; Longitude=0
          Analysis: Thickness=[100, 200, 300, 300, 300, 300]; PH=[6.6, 6.2, 5.7, 5.5, 5.5, 5.5]; PHUnits=Water; BoronUnits=HotWater
          InitialWater Initial water: PercentMethod=EvenlyDistributed; FractionFull=1
          Water
            Thickness  BD   AirDry  LL15  DUL   SAT
            100        1.2  0.08    0.16  0.33  0.5
            200        1.2  0.16    0.16  0.33  0.5
            300        1.2  0.14    0.14  0.31  0.44
            300        1.2  0.11    0.11  0.27  0.46
            300        1.2  0.16    0.16  0.3   0.44
            300        1.2  0.15    0.15  0.3   0.44
            SoilCrop wheatSoil: LL=[0.13, 0.13, 0.1, 0.08, 0.11, 0.11]; KL=[0.06, 0.06, 0.06, 0.06, 0.06, 0.06]; XF=[1, 1, 1, 1, 1, 1]
            SoilCrop PotatoSoil: LL=[0.13, 0.13, 0.1, 0.15, 0.3, 0.3]; KL=[0.1, 0.06, 0.04, 0.01, 0, 0]; XF=[1, 1, 1, 1, 0, 0]
          SoilWater: same as Baxters.BaxtersBase.Field.Soil.SoilWater
          SoilNitrogen: fom_type=[default, manure, mucuna, lablab, shemp, stable]; fract_carb=[0.2, 0.3, 0.54, 0.57, 0.45, 0]; fract_cell=[0.7, 0.3, 0.37, 0.37, 0.47, 0.1]; fract_lign=[0.1, 0.4, 0.09, 0.06, 0.08, 0.9]; wfpsN2N2O_x=[22, 88]; wfpsN2N2O_y=[0.1, 1]; oc=[4.48224, 3.47597, 1.1998, 1.03068, 0.470324, 0.470122]
          SoilOrganicMatter: RootCN=30; RootWt=3000; SoilCN=11.5; EnrACoeff=7.4; EnrBCoeff=0.2; OCUnits=Total
            Thickness  OC    FBiom  FInert
            100        4.5   0.025  0.3
            200        3.5   0.025  0.3
            300        1.2   0.015  0.75
            300        1.03  0.01   0.9
            300        0.47  0.01   0.96
            300        0.47  0.01   0.96
          Sample Initial nitrogen: NO3Units=kgha; NH4Units=kgha; SWUnits=Volumetric; OCUnits=Total; PHUnits=Water
            Thickness  NO3  NH4
            100        15   0.12
            100        15   0.24
            200        41   0.36
            200        10   0.36
            200        40   0.36
            700        5    0.36
        Fertiliser
        Irrigation
        SurfaceOrganicMatter surface organic matter: PoolName=wheat; type=wheat; mass=0; standing_fraction=0; cnr=60; CriticalResidueWeight=2000; OptimumDecompTemp=20; MaxCumulativeEOS=20; CNRatioDecompCoeff=0.277; CNRatioDecompThreshold=25; TotalLeachRain=25; MinRainToLeach=10; CriticalMinimumOrganicC=0.004; DefaultCPRatio=0; DefaultStandingFraction=0; StandingExtinctCoeff=0.5; FractionFaecesAdded=0.5
          Pools:
            {PoolName=wheat, ResidueType=wheat, Mass=0, CNRatio=60, StandingFraction=0}
          ResidueTypes: LoadFromResource=ResidueTypes
        MicroClimate: same as FUE_NI.FUE_NI_base.paddock.MicroClimate
        Plant Potato: CropType=Potato
        Folder Manager folder
          Manager PotatoSowingRule
            RowSpace = 280
            RowWidth = 780
            PlantingDepth = 150
            StemNumberPerSeedTuber = 5
            CultivarName = RussetBurbank
            SowingDate = 1999-10-21
```csharp
        using System;
        using Models.Core;
        using Models.PMF;
        using APSIM.Shared.Utilities;
        
        namespace Models
        {
           [Serializable] 
           [System.Xml.Serialization.XmlInclude(typeof(Model))]
            public class Script : Model
            {      
               [Link] Plant Potato;
               [Link] Clock Clock;

               [Description("Spacing (mm) between plants within rows")]
               public double RowSpace { get; set; }
               [Description("Spacing (mm) between rows")]
               public double RowWidth { get; set; }
               [Description("Depth (mm) tubers are planted")]
               public double PlantingDepth { get; set; }
               [Description("Number of stems per seed tuber")]
               public double StemNumberPerSeedTuber { get; set; }
               [Display(DisplayType = DisplayAttribute.DisplayTypeEnum.CultivarName)]
               [Description("Cultivar")]
               public string CultivarName { get; set; }
               [Description("Sowing Date")]
               public DateTime SowingDate { get; set; }

               [EventSubscribe("DoManagement")]
               private void OnDoManagement(object sender, EventArgs e)
               {
				double PlantPopulation = 1/((RowWidth/1000)*(RowSpace/1000));

				if (Clock.Today.Date == SowingDate)
                    Potato.Sow(population:PlantPopulation, cultivar:CultivarName, depth:PlantingDepth, rowSpacing:150, budNumber:StemNumberPerSeedTuber);
                //Potato.Sow(... Contains the following arguements:
                //Population  double  Required  Seeds sowing/m2
                //Cultivar    string  Required  "NameOfCultivar"
                //Depth       double  Optional  Depth (mm) seed sown.   Default is 100mm 
                //MaxCover    double  Optional  Proportion (0-1) of the ground row crop will cover.   Default is 1.0
                //BudNumber   double  Optional  Number of mainstems per seed sown.  Default is 1.0
                //RowSpacing  double  Optional  Spaceing (mm) between drill rows when crop is sown.  Default is 150mm
                //CropClass   string  Optional  Crop class to instantiate when crop is sown.  Default is "Plant"
			   }
            }
        }
```
          Operations IrrigationApplications
            1999-12-09  [Irrigation].Apply(55);
            1999-12-23  [Irrigation].Apply(25);
            1999-12-30  [Irrigation].Apply(25);
            2000-01-21  [Irrigation].Apply(38);
            2000-02-10  [Irrigation].Apply(50);
            2000-02-16  [Irrigation].Apply(25);
            2000-03-01  [Irrigation].Apply(38);
          Operations FertiliserApplications: same as FUE.Factors.Fertiliser.275split
        Manager ExtraVariables
          script: same as in Potato.RussetBurbank.Field.ExtraVariables
        Report: same as Baxters.BaxtersBase.Field.Report
        Manager SetIntergerCropParameter
          OverRidePath = Potato.Structure.MainStemFinalNodeNumber.Value
          OverRideInterger = 28
          script: same as in Baxters.BaxtersBase.Field.SetIntergerCropParameter
        Manager PotatoHarvestRule
          HarvestDate = 2000-04-03
          script: same as in Baxters.BaxtersBase.Field.PotatoHarvestRule
  Experiment Parilla
    Factors
      Factor Sowing
        Factor 23Nov
          Specifications:
            [PotatoSowingRule].Script.SowingDate=2007-11-23
            [FertigationEvents]
            [FertiliserRule].Script.Day1=27
            [FertiliserRule].Script.Day2=52
            [FertiliserRule].Script.Day3=67
            [PotatoHarvestRule].Script.HarvestDate=2008-03-05
          Operations FertigationEvents
            2007-11-23  [Fertiliser].Apply(0, Fertiliser.Types.UreaN, 10);
            2008-01-10  [Fertiliser].Apply(48, Fertiliser.Types.UreaN, 10);
            2008-01-29  [Fertiliser].Apply(40, Fertiliser.Types.UreaN, 10);
            2008-02-12  [Fertiliser].Apply(40, Fertiliser.Types.UreaN, 10);
            2008-02-28  [Fertiliser].Apply(40, Fertiliser.Types.UreaN, 10);
            2008-02-29  [Fertiliser].Apply(20, Fertiliser.Types.UreaN, 10);
            2008-03-06  [Fertiliser].Apply(40, Fertiliser.Types.UreaN, 10);
            2008-03-16  [Fertiliser].Apply(40, Fertiliser.Types.UreaN, 10);
        Factor 3Dec
          Specifications:
            [PotatoSowingRule].Script.SowingDate=2007-12-03
            [FertigationEvents]
            [FertiliserRule].Script.Day1=42
            [FertiliserRule].Script.Day2=57
            [FertiliserRule].Script.Day3=72
            [PotatoHarvestRule].Script.HarvestDate=2008-04-14
          Operations FertigationEvents
            2008-01-27  [Fertiliser].Apply(44, Fertiliser.Types.UreaN, 10);
            2008-02-05  [Fertiliser].Apply(44, Fertiliser.Types.UreaN, 10);
            2008-02-13  [Fertiliser].Apply(40, Fertiliser.Types.UreaN, 10);
            2008-02-27  [Fertiliser].Apply(40, Fertiliser.Types.UreaN, 10);
            2008-03-06  [Fertiliser].Apply(40, Fertiliser.Types.UreaN, 10);
            2008-03-13  [Fertiliser].Apply(40, Fertiliser.Types.UreaN, 10);
            2008-03-21  [Fertiliser].Apply(40, Fertiliser.Types.UreaN, 10);
        Factor 17Dec
          Specifications:
            [PotatoSowingRule].Script.SowingDate=2007-12-17
            [FertigationEvents]
            [FertiliserRule].Script.Day1=28
            [FertiliserRule].Script.Day2=43
            [FertiliserRule].Script.Day3=58
            [PotatoHarvestRule].Script.HarvestDate=2008-04-14
          Operations FertigationEvents: same as Parilla.Factors.Sowing.3Dec.FertigationEvents
      Factor Nitrogen
        Factor lowN
          Specifications:
            [FertiliserRule].Script.Fert1=0
            [FertiliserRule].Script.Fert2=0
            [FertiliserRule].Script.Fert3=0
        Factor medN
          Specifications:
            [FertiliserRule].Script.Fert1=37
            [FertiliserRule].Script.Fert2=38
            [FertiliserRule].Script.Fert3=25
        Factor highN
          Specifications:
            [FertiliserRule].Script.Fert1=75
            [FertiliserRule].Script.Fert2=75
            [FertiliserRule].Script.Fert3=50
    Simulation Parilla_base: Area=0; Slope=0
      Weather: FileName=Lameroo.met
      Clock: StartDate=2007-11-22; EndDate=2008-06-30
      Summary
      SoilArbitrator Soil Arbitrator
      Zone paddock: Area=1; Slope=0
        Soil: Latitude=0; Longitude=0
          Analysis: Thickness=[100, 200, 300, 300, 300, 300]; PH=[6.6, 6.2, 5.7, 5.5, 5.5, 5.5]; PHUnits=Water; BoronUnits=HotWater
          InitialWater Initial water: PercentMethod=EvenlyDistributed; FractionFull=1
          Water
            Thickness  BD   AirDry  LL15  DUL   SAT
            100        1.2  0.03    0.06  0.16  0.25
            200        1.2  0.05    0.06  0.16  0.25
            300        1.2  0.06    0.06  0.12  0.25
            300        1.2  0.06    0.06  0.12  0.25
            300        1.2  0.06    0.06  0.12  0.25
            300        1.2  0.06    0.06  0.12  0.25
            SoilCrop potatoSoil: LL=[0.06, 0.06, 0.12, 0.12, 0.12, 0.12]; KL=[0.1, 0.1, 0.07, 0.05, 0.05, 0.05]; XF=[1, 1, 1, 1, 1, 1]
          SoilWater: residueinterception=0; SummerDate=1-Nov; SummerU=9; SummerCona=4.4; WinterDate=1-Apr; WinterU=9; WinterCona=4.4; DiffusConst=88; DiffusSlope=35.4; Salb=0.18; CN2Bare=68; CNRed=20; CNCov=0.8; slope=0; discharge_width=0; catchment_area=0; max_pond=0
            Thickness  SWCON  KLAT
            100        0.9    0
            200        0.9    0
            300        0.9    0
            300        0.9    0
            300        0.9    0
            300        0.9    0
          SoilNitrogen: fom_type=[default, manure, mucuna, lablab, shemp, stable]; fract_carb=[0.2, 0.3, 0.54, 0.57, 0.45, 0]; fract_cell=[0.7, 0.3, 0.37, 0.37, 0.47, 0.1]; fract_lign=[0.1, 0.4, 0.09, 0.06, 0.08, 0.9]; wfpsN2N2O_x=[22, 88]; wfpsN2N2O_y=[0.1, 1]
            oc=[0.701784, 0.497464, 0.300229, 0.300522, 0.300326, 0.300105]
          SoilOrganicMatter: RootCN=30; RootWt=3000; SoilCN=11.5; EnrACoeff=7.4; EnrBCoeff=0.2; OCUnits=Total
            Thickness  OC   FBiom  FInert
            100        0.7  0.025  0.3
            200        0.5  0.025  0.4
            300        0.3  0.015  0.75
            300        0.3  0.01   0.9
            300        0.3  0.01   0.96
            300        0.3  0.01   0.96
          Sample Initial nitrogen: NO3Units=ppm; NH4Units=ppm; SWUnits=Volumetric; OCUnits=Total; PHUnits=Water
            Thickness  NO3       NH4
            100        21.25     0.1
            200        19.125    0.1
            300        0.555556  0.1
            300        0.555556  0.1
            300        0.555556  0.1
            300        0.555556  0.1
        Fertiliser
        Irrigation
        SurfaceOrganicMatter surface organic matter: ReportAdditions=no; ReportRemovals=no; PoolName=wheat; type=wheat; mass=0; standing_fraction=0; cnr=60; CriticalResidueWeight=2000; OptimumDecompTemp=20; MaxCumulativeEOS=20; CNRatioDecompCoeff=0.277; CNRatioDecompThreshold=25; TotalLeachRain=25; MinRainToLeach=10; CriticalMinimumOrganicC=0.004; DefaultCPRatio=0; DefaultStandingFraction=0; StandingExtinctCoeff=0.5; FractionFaecesAdded=0.5
          Pools:
            {PoolName=wheat, ResidueType=wheat, Mass=0, CNRatio=60, StandingFraction=0}
          ResidueTypes: LoadFromResource=ResidueTypes
        MicroClimate: same as FUE_NI.FUE_NI_base.paddock.MicroClimate
        Plant Potato: CropType=Potato
        Manager PotatoHarvestRule
          HarvestDate = 2008-04-14
          script: same as in Baxters.BaxtersBase.Field.PotatoHarvestRule
        Folder Manager folder
          Manager PotatoSowingRule
            RowSpace = 280
            RowWidth = 770
            PlantingDepth = 170
            StemNumberPerSeedTuber = 2.4
            CultivarName = Coliban
            SowingDate = 2007-11-23
            PlantingFertiliser = 0
```csharp
        using System;
        using Models.Core;
        using Models.PMF;
        using APSIM.Shared.Utilities;
        
        namespace Models
        {
           [Serializable] 
           [System.Xml.Serialization.XmlInclude(typeof(Model))]
            public class Script : Model
            {      
               [Link] Plant Potato;
               [Link] Clock Clock;
               [Link] Fertiliser Fertiliser;
               [Description("Spacing (mm) between plants within rows")]
               public double RowSpace { get; set; }
               [Description("Spacing (mm) between rows")]
               public double RowWidth { get; set; }
               [Description("Depth (mm) tubers are planted")]
               public double PlantingDepth { get; set; }
               [Description("Number of stems per seed tuber")]
               public double StemNumberPerSeedTuber { get; set; }
               [Description("Cultivar")]
               [Display(DisplayType = DisplayAttribute.DisplayTypeEnum.CultivarName)]
               public string CultivarName { get; set; }
               [Description("Sowing Date")]
               public DateTime SowingDate { get; set; }
               [Description("Fertiliser applied at planting")]
               public double PlantingFertiliser { get; set;}
               
               [EventSubscribe("DoManagement")]
               private void OnDoManagement(object sender, EventArgs e)
               {
				double PlantPopulation = 1/((RowWidth/1000)*(RowSpace/1000));

				if (Clock.Today.Date == SowingDate)
				{
                    Potato.Sow(population:PlantPopulation, cultivar:CultivarName, depth:PlantingDepth, rowSpacing:150, budNumber:StemNumberPerSeedTuber);
                 }
                    
                //Potato.Sow(... Contains the following arguements:
                //Population  double  Required  Seeds sowing/m2
                //Cultivar    string  Required  "NameOfCultivar"
                //Depth       double  Optional  Depth (mm) seed sown.   Default is 100mm 
                //MaxCover    double  Optional  Proportion (0-1) of the ground row crop will cover.   Default is 1.0
                //BudNumber   double  Optional  Number of mainstems per seed sown.  Default is 1.0
                //RowSpacing  double  Optional  Spaceing (mm) between drill rows when crop is sown.  Default is 150mm
                //CropClass   string  Optional  Crop class to instantiate when crop is sown.  Default is "Plant"
			   }
            }
        }
```
          Operations FertigationEvents
            2008-01-10  [Fertiliser].Apply(48, Fertiliser.Types.UreaN, 10);
            2008-01-29  [Fertiliser].Apply(40, Fertiliser.Types.UreaN, 10);
            2008-02-12  [Fertiliser].Apply(40, Fertiliser.Types.UreaN, 10);
            2008-02-28  [Fertiliser].Apply(40, Fertiliser.Types.UreaN, 10);
            2008-02-29  [Fertiliser].Apply(20, Fertiliser.Types.UreaN, 10);
            2008-03-06  [Fertiliser].Apply(40, Fertiliser.Types.UreaN, 10);
            2008-03-16  [Fertiliser].Apply(40, Fertiliser.Types.UreaN, 10);
          Operations IrrigationEvents
            2007-11-23  [Irrigation].Apply(9);
            2007-11-24  [Irrigation].Apply(9);
            2007-11-25  [Irrigation].Apply(9);
            2007-11-26  [Irrigation].Apply(9);
            2007-11-27  [Irrigation].Apply(9);
            2007-11-28  [Irrigation].Apply(9);
            2007-11-29  [Irrigation].Apply(9);
            2007-12-01  [Irrigation].Apply(9);
            2007-12-02  [Irrigation].Apply(9);
            2007-12-03  [Irrigation].Apply(9);
            2007-12-04  [Irrigation].Apply(9);
            2007-12-05  [Irrigation].Apply(9);
            2007-12-06  [Irrigation].Apply(9);
            2007-12-07  [Irrigation].Apply(9);
            2007-12-08  [Irrigation].Apply(9);
            2007-12-09  [Irrigation].Apply(9);
            2007-12-10  [Irrigation].Apply(9);
            2007-12-11  [Irrigation].Apply(9);
            2007-12-12  [Irrigation].Apply(9);
            2007-12-13  [Irrigation].Apply(9);
            2007-12-14  [Irrigation].Apply(9);
            2007-12-16  [Irrigation].Apply(9);
            2007-12-17  [Irrigation].Apply(9);
            2007-12-18  [Irrigation].Apply(9);
            2007-12-19  [Irrigation].Apply(9);
            2007-12-20  [Irrigation].Apply(9);
            2007-12-21  [Irrigation].Apply(9);
            2007-12-22  [Irrigation].Apply(9);
            2007-12-23  [Irrigation].Apply(9);
            2007-12-24  [Irrigation].Apply(9);
            2007-12-25  [Irrigation].Apply(9);
            2007-12-26  [Irrigation].Apply(9);
            2007-12-27  [Irrigation].Apply(9);
            2007-12-28  [Irrigation].Apply(9);
            2007-12-29  [Irrigation].Apply(9);
            2007-12-30  [Irrigation].Apply(9);
            2007-12-31  [Irrigation].Apply(9);
            2008-01-01  [Irrigation].Apply(9);
            2008-01-02  [Irrigation].Apply(9);
            2008-01-03  [Irrigation].Apply(9);
            2008-01-04  [Irrigation].Apply(9);
            2008-01-05  [Irrigation].Apply(9);
            2008-01-06  [Irrigation].Apply(9);
            2008-01-07  [Irrigation].Apply(9);
            2008-01-08  [Irrigation].Apply(9);
            2008-01-09  [Irrigation].Apply(9);
            2008-01-10  [Irrigation].Apply(9);
            2008-01-11  [Irrigation].Apply(9);
            2008-01-12  [Irrigation].Apply(9);
            2008-01-13  [Irrigation].Apply(9);
            2008-01-14  [Irrigation].Apply(9);
            2008-01-15  [Irrigation].Apply(9);
            2008-01-16  [Irrigation].Apply(9);
            2008-01-17  [Irrigation].Apply(9);
            2008-01-18  [Irrigation].Apply(9);
            2008-01-20  [Irrigation].Apply(9);
            2008-01-21  [Irrigation].Apply(9);
            2008-01-22  [Irrigation].Apply(9);
            2008-01-23  [Irrigation].Apply(9);
            2008-01-24  [Irrigation].Apply(9);
            2008-01-25  [Irrigation].Apply(9);
            2008-01-26  [Irrigation].Apply(9);
            2008-01-27  [Irrigation].Apply(9);
            2008-01-28  [Irrigation].Apply(9);
            2008-01-29  [Irrigation].Apply(9);
            2008-01-30  [Irrigation].Apply(9);
            2008-01-31  [Irrigation].Apply(9);
            2008-02-01  [Irrigation].Apply(9);
            2008-02-02  [Irrigation].Apply(9);
            2008-02-03  [Irrigation].Apply(9);
            2008-02-04  [Irrigation].Apply(9);
            2008-02-05  [Irrigation].Apply(9);
            2008-02-06  [Irrigation].Apply(9);
            2008-02-07  [Irrigation].Apply(9);
            2008-02-08  [Irrigation].Apply(9);
            2008-02-09  [Irrigation].Apply(9);
            2008-02-10  [Irrigation].Apply(9);
            2008-02-11  [Irrigation].Apply(9);
            2008-02-12  [Irrigation].Apply(9);
            2008-02-13  [Irrigation].Apply(9);
            2008-02-14  [Irrigation].Apply(9);
            2008-02-15  [Irrigation].Apply(9);
            2008-02-16  [Irrigation].Apply(9);
            2008-02-17  [Irrigation].Apply(9);
            2008-02-18  [Irrigation].Apply(9);
            2008-02-19  [Irrigation].Apply(9);
            2008-02-20  [Irrigation].Apply(9);
            2008-02-21  [Irrigation].Apply(9);
            2008-02-22  [Irrigation].Apply(9);
            2008-02-23  [Irrigation].Apply(9);
            2008-02-24  [Irrigation].Apply(9);
            2008-02-25  [Irrigation].Apply(9);
            2008-02-26  [Irrigation].Apply(9);
            2008-02-27  [Irrigation].Apply(9);
            2008-02-28  [Irrigation].Apply(9);
            2008-02-29  [Irrigation].Apply(9);
            2008-03-01  [Irrigation].Apply(9);
            2008-03-02  [Irrigation].Apply(9);
            2008-03-03  [Irrigation].Apply(9);
            2008-03-04  [Irrigation].Apply(9);
            2008-03-05  [Irrigation].Apply(9);
            2008-03-06  [Irrigation].Apply(9);
            2008-03-07  [Irrigation].Apply(9);
            2008-03-08  [Irrigation].Apply(9);
            2008-03-09  [Irrigation].Apply(9);
            2008-03-10  [Irrigation].Apply(9);
            2008-03-11  [Irrigation].Apply(9);
            2008-03-12  [Irrigation].Apply(9);
            2008-03-13  [Irrigation].Apply(9);
            2008-03-14  [Irrigation].Apply(9);
            2008-03-15  [Irrigation].Apply(9);
            2008-03-16  [Irrigation].Apply(9);
            2008-03-17  [Irrigation].Apply(9);
            2008-03-18  [Irrigation].Apply(9);
            2008-03-19  [Irrigation].Apply(9);
            2008-03-20  [Irrigation].Apply(9);
            2008-03-22  [Irrigation].Apply(9);
            2008-03-23  [Irrigation].Apply(9);
            2008-03-25  [Irrigation].Apply(9);
            2008-03-26  [Irrigation].Apply(9);
            2008-03-28  [Irrigation].Apply(9);
            2008-03-29  [Irrigation].Apply(9);
            2008-03-31  [Irrigation].Apply(9);
            2008-04-01  [Irrigation].Apply(9);
            2008-04-03  [Irrigation].Apply(9);
            2008-04-04  [Irrigation].Apply(9);
            2008-04-06  [Irrigation].Apply(9);
            2008-04-07  [Irrigation].Apply(9);
            2008-04-09  [Irrigation].Apply(9);
            2008-04-10  [Irrigation].Apply(9);
            2008-04-12  [Irrigation].Apply(9);
            2008-04-13  [Irrigation].Apply(9);
            2008-04-15  [Irrigation].Apply(9);
            2008-04-16  [Irrigation].Apply(9);
            2008-04-18  [Irrigation].Apply(9);
            2008-04-19  [Irrigation].Apply(9);
            2008-04-21  [Irrigation].Apply(9);
            2008-04-22  [Irrigation].Apply(9);
            2008-04-24  [Irrigation].Apply(9);
            2008-04-25  [Irrigation].Apply(9);
            2008-04-27  [Irrigation].Apply(9);
            2008-04-28  [Irrigation].Apply(9);
            2008-04-30  [Irrigation].Apply(9);
            2008-05-01  [Irrigation].Apply(9);
            2008-05-03  [Irrigation].Apply(9);
            2008-05-04  [Irrigation].Apply(9);
            2008-05-06  [Irrigation].Apply(9);
            2008-05-07  [Irrigation].Apply(9);
          Manager FertiliserRule
            Fert1 = 37.5
            Fert2 = 37.5
            Fert3 = 25
            Day1 = 27
            Day2 = 52
            Day3 = 67
```csharp
        using System;
        using Models.Core;
        using Models.PMF;
        using APSIM.Shared.Utilities;
        
        namespace Models
        {
           [Serializable] 
           [System.Xml.Serialization.XmlInclude(typeof(Model))]
            public class Script : Model
            {      
               [Link] Clock Clock;
               [Link] Fertiliser Fertiliser;
               [Description("N applied (kg/ha) on first fertiliser event")]
               public double Fert1 { get; set; }
               [Description("N applied (kg/ha) on 2nd fertiliser event")]
               public double Fert2 { get; set; }
               [Description("N applied (kg/ha) on 3rd fertiliser event")]
               public double Fert3 { get; set; }
               [Description("Days after sowing for first N application")]
               public double Day1 { get; set; }
               [Description("Days after sowing for second N application")]
               public double Day2 { get; set; }
               [Description("Days after sowing for third N application")]
               public double Day3 { get; set; }
                
                private double DaysAfterSowing = 0;
               
               [EventSubscribe("Sowing")]
               private void OnSowing(object sender, EventArgs e)
               {
               DaysAfterSowing = 0;
               }
               [EventSubscribe("DoManagement")]
               private void OnDoManagement(object sender, EventArgs e)
               {
			    DaysAfterSowing += 1;
			    if(DaysAfterSowing == Day1)
			     Fertiliser.Apply(Fert1, Fertiliser.Types.UreaN, 10);
			   if(DaysAfterSowing == Day2)
			     Fertiliser.Apply(Fert2, Fertiliser.Types.UreaN, 10);
			   if(DaysAfterSowing == Day3)
			     Fertiliser.Apply(Fert3, Fertiliser.Types.UreaN, 10);
			   }
            }
        }
```
        Manager ExtraVariables
          script: same as in Potato.RussetBurbank.Field.ExtraVariables
        Report: same as Baxters.BaxtersBase.Field.Report
        Manager SetIntergerCropParameter: same as FUE.FUE_base.paddock.SetIntergerCropParameter
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