Simulations: Version=133
  Simulation
    Clock: Start=2018-01-01; End=2019-01-01
    Summary SummaryFile
    Weather: FileName=C:\2020_Try_model\weather\2019_Brandon.met
    SoilArbitrator
    Zone Field: Area=1; Slope=0; AspectAngle=0; Altitude=50
      Report: EventNames=[Barley].Harvesting
        VariableNames:
          [Clock].Today
          [Barley].Phenology.Zadok.Stage
          [Barley].Phenology.CurrentStageName
          [Barley].AboveGround.Wt
          [Barley].AboveGround.N
          [Barley].Grain.Total.Wt*10 as Yield
          [Barley].Grain.Protein
          [Barley].Grain.Size
          [Barley].Grain.Number
          [Barley].Grain.Total.Wt
          [Barley].Grain.Total.N
          [Barley].Total.Wt
      Fertiliser
      Soil: ASCOrder=Ferrasol; ASCSubOrder=gray; SoilType=gray; LocalName=Generic NQ; Site=Brandon; NearestTown=Brandon; Region=Northern Queensland; State=Queensland; Country=Australia; NaturalVegetation=Qld. Bluegrass, possible Qld. Blue gum; ApsoilNumber=497; Latitude=-17.1347; Longitude=145.4287; LocationAccuracy=+/- 20m; DataSource=Rice project Agrifutures; Comments=Ando radanielson soil calibration
        Physical
          Thickness  BD    AirDry  LL15   DUL    SAT    KS
          100        1.1   0.127   0.29   0.528  0.554  30
          100        0.96  0.127   0.3    0.528  0.554  30
          100        0.87  0.13    0.315  0.561  0.589  30
          100        0.74  0.141   0.325  0.59   0.619  30
          100        0.63  0.153   0.325  0.637  0.668  8
          100        1.16  0.09    0.325  0.403  0.423  8
          100        1.03  0.102   0.325  0.425  0.446  30
          100        0.66  0.153   0.325  0.638  0.66   30
          SoilCrop BarleySoil: LL=[0.261, 0.248, 0.28, 0.306, 0.36, 0.392, 0.153, 0.153]; KL=[0.06, 0.06, 0.06, 0.04, 0.04, 0.02, 0.01, 0.01]; XF=[1, 1, 1, 1, 1, 1, 1, 1]
        WaterBalance SoilWater: SummerDate=1-Nov; SummerU=5; SummerCona=5; WinterDate=1-Apr; WinterU=5; WinterCona=5; DiffusConst=40; DiffusSlope=16; Salb=0.12; CN2Bare=73; CNRed=20; CNCov=0.8; Thickness=[150, 150, 300, 300, 300, 300, 300]; SWCON=[0.3, 0.3, 0.3, 0.3, 0.3, 0.3, 0.3]
        Organic: FOMCNRatio=40
          Thickness  Carbon  SoilCNRatio  FBiom  FInert  FOM
          150        0.73    12           0.025  0.4     347.129
          150        0.5     12           0.012  0.5     270.344
          100        0.4     12           0.005  0.6     163.972
          100        0.3     12           0.005  0.8     99.4541
          100        0.3     12           0.005  0.8     60.322
          100        0.3     12           0.005  0       36.5871
          100        0.3     12           0.005  0.8     22.1912
          999999     -       -            -      -       -
        Chemical
          Thickness  NO3N   NH4N  PH
          100        2.5    2     5.9
          100        1.25   1     5.9
          100        1      1     5.9
          100        0.08   0.08  4.5
          100        0.008  0.08  4.5
          100        0.008  0.08  4.5
          100        0.008  0.08  4.5
          100        0.008  0.08  4.5
        InitialWater: PercentMethod=1; FractionFull=0.8
        Sample InitialN: Thickness=[100, 100, 100, 100, 100, 100, 100, 100]; EC=[0.2, 0.3, 0.3, 0.4, 0.4, 0.4, 0.4, 0.4]; SWUnits=Volumetric; OCUnits=Total; PHUnits=Water
        CERESSoilTemperature Temperature
        Nutrient
      SurfaceOrganicMatter: InitialResidueName=rice_subbtle; InitialResidueType=rice; InitialResidueMass=0; InitialStandingFraction=0; InitialCPR=0; InitialCNR=100
      MicroClimate: a_interception=0; b_interception=1; c_interception=0; d_interception=0; soil_albedo=0.3; SoilHeatFluxFraction=0.4; MinimumHeightDiffForNewLayer=0; NightInterceptionFraction=0.5; ReferenceHeight=2
      Manager SowingFertiliser
        Amount = 200
        CropName = Barley
```csharp
using Models.PMF;
using Models.Core;
using System;
namespace Models
{
    [Serializable]
    public class Script : Model
    {
        [Link] Clock Clock;
        [Link] Fertiliser Fertiliser;
        [Link] Summary Summary;
        
        
        [Description("Amount of fertiliser to be applied (kg/ha)")]
        public double Amount { get; set;}
        
        [Description("Crop to be fertilised")]
        public string CropName { get; set;}
        
        
        

        [EventSubscribe("Sowing")]
        private void OnSowing(object sender, EventArgs e)
        {
            Model crop = sender as Model;
            if (crop.Name.ToLower()==CropName.ToLower())
                Fertiliser.Apply(Amount: Amount, Type: Fertiliser.Types.NO3N);
        }
        
    }
}
```
      Manager Harvest
```csharp
using Models.Soils.Nutrients;
using System;
using Models.Core;
using Models.PMF;
using Models.Soils;
using Models.Soils.Nutrients;
using Models.Utilities;
using APSIM.Shared.Utilities;

namespace Models
{
    [Serializable]
    public class Script : Model
    {
        [Link] Plant Wheat;

        [EventSubscribe("DoManagement")]
        private void OnDoManagement(object sender, EventArgs e)
        {
            if (Wheat.IsReadyForHarvesting)
            {
               Wheat.Harvest();
               Wheat.EndCrop();    
            }
        
        }
        
    }
}
```
      Plant Barley
        CultivarFolder ando_Cultivars
          Cultivar
      Manager Sow on a fixed date
        Crop = [Barley]
        SowDate = 22-jun
        CultivarName = Dash
        SowingDepth = 20
        RowSpacing = 200
        Population = 200
```csharp
using Models.Soils.Nutrients;
using System;
using Models.Core;
using Models.PMF;
using Models.Soils;
using Models.Soils.Nutrients;
using Models.Utilities;
using APSIM.Shared.Utilities;

namespace Models
{
    [Serializable]
    public class Script : Model
    {
        [Link] Clock Clock;
        [Link] Fertiliser Fertiliser;
        [Link] Summary Summary;
        [Link] Soil Soil;
        Accumulator accumulatedRain;
        
        [Description("Crop")]
        public IPlant Crop { get; set; }
        [Description("Sowing date (d-mmm)")]
        public string SowDate { get; set; }
    [Display(Type = DisplayType.CultivarName, PlantName = "Barley")]
        [Description("Cultivar to be sown")]
        public string CultivarName { get; set; }
        [Description("Sowing depth (mm)")]
        public double SowingDepth { get; set; }
        [Description("Row spacing (mm)")]
        public double RowSpacing { get; set; }
        [Description("Plant population (/m2)")]
        public double Population { get; set; }
        


        [EventSubscribe("DoManagement")]
        private void OnDoManagement(object sender, EventArgs e)
        {
            if (DateUtilities.WithinDates(SowDate, Clock.Today, SowDate))
            {
                Crop.Sow(population: Population, cultivar: CultivarName, depth: SowingDepth, rowSpacing: RowSpacing);    
            }
        
        }
        
    }
}
```
  DataStore
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