Simulations: Version=219
  DataStore
  Experiment
    Factors
      Permutation
        Factor Models
          CompositeFactor Pasture
            Specifications:
              [IPlant]
              [Operations]
            Pasture: Species=Perennial Ryegrass; Fertility=0.8; Nutrients=N; MaxRtDep=650; LaggedDayT=-999.9; Phenology=1.0015; FlowerLen=0; FlowerTime=0; SencIndex=0; DormIndex=0; DormT=-999.9; ExtinctCoeff=[0, 10, 0]; SeedDormTime=0; GermIndex=0; Albedo=0.23; Gsmax=0.011; R50=200; WaterDemand=0; LAI=0
              GreenCohortInitialise: RootWeight=[0, 0]; RootDepth=650; EstIndex=0; StressIndex=0; StemReloc=0; Frosts=0; Status=established; LeafDMD=[0.825]; LeafWeight=[0]; LeafNConc=[0.01]; LeafSpecificArea=[430]; StemDMD=[0.825]; StemWeight=[0]; StemNConc=[0.01]; StemSpecificArea=[10]
              DryCohortInitialise: Status=established; LeafDMD=[0.6]; LeafWeight=[0]; LeafNConc=[0]; LeafSpecificArea=[430]; StemDMD=[0.35]; StemWeight=[0]; StemNConc=[0]; StemSpecificArea=[80]
              CompositeBiomass AboveGround: OrganNames=[Leaf, Stem]; IncludeLive=true; IncludeDead=true
              GenericOrgan Leaf: IsAboveGround=true
              GenericOrgan Stem: IsAboveGround=true
            Operations
              1990-10-10  [IPlant].Sow(population: 1, cultivar: "W", depth: 5, rowSpacing: 150)
          CompositeFactor AgPasture
            Specifications:
              [IPlant]
              [Operations]
            PastureSpecies AGPRyegrass: doyGermination=275; daysEmergenceToAnthesis=120; daysAnthesisToMaturity=85; degreesDayForAnthesis=1100; degreesDayForMaturity=900; daysAnnualsFactor=45; CanopyType=PastureSpecies; InitialShootDM=0; InitialRootDM=0; InitialRootDepth=2000; initialDMFractionsGrasses=[0.15, 0.25, 0.25, 0.05, 0.05, 0.1, 0.1, 0.05, 0, 0, 0]; initialDMFractionsForbs=[0.2, 0.2, 0.15, 0.05, 0.1, 0.15, 0.1, 0.05, 0, 0, 0]; PhotosyntheticEfficiency=0.01; PhotosynthesisCurveFactor=0.8; FractionPAR=0.5; ReferenceCO2=380; CO2EffectScaleFactor=700; CO2EffectOffsetFactor=600; CO2EffectMinimum=0.7; CO2EffectExponent=2; ReproSeasonDurationCoeff=2; ReproSeasonShouldersLengthFactor=1; ReproSeasonOnsetDurationFactor=0.6; RelativeTurnoverEmerging=2; DetachmentDroughtCoefficient=3; DetachmentDroughtEffectMin=0.1; TurnoverStockFactor=0.01; TurnoverDefoliationEffectMin=0.025; MinimumGreenLeafProp=0.8; MinimumGreenRootProp=0.5
              initialDMFractionsLegumes=[0.16, 0.23, 0.22, 0.05, 0.03, 0.05, 0.05, 0.01, 0.04, 0.08, 0.08]
              LinearInterpolationFunction FVPDFunction
            Operations
              1990-10-10  [IPlant].Sow(population: 1, cultivar: "W", depth: 5, rowSpacing: 150)
          CompositeFactor PMF
            Specifications:
              [IPlant]
              [Operations]
            Plant Wheat
            Operations
              1990-10-10  [IPlant].Sow(population: 100, cultivar: "Hartog", depth: 5, rowSpacing: 150)
    Simulation Base
      Clock: Start=1990-08-01; End=1992-02-03
      Summary
      Weather: FileName=cbr_70014.met
      SoilArbitrator
      MicroClimate: a_interception=0; b_interception=1; c_interception=0; d_interception=0; SoilHeatFluxFraction=0.4; MinimumHeightDiffForNewLayer=0; NightInterceptionFraction=0.5; ReferenceHeight=2
      Zone Field: Area=1; Slope=0; AspectAngle=0; Altitude=50
        Fertiliser
        SurfaceOrganicMatter: InitialResidueName=wheat_stubble; InitialResidueType=wheat; InitialResidueMass=500; InitialStandingFraction=0; InitialCPR=0; InitialCNR=100
        Plant Wheat
        Operations
        Report: EventNames=[Clock].DoReport
          VariableNames:
            [Clock].Today
            [Soil].SoilWater.Runoff
            [Weather].Rain
            [IPlant].AboveGround.Wt
            [IPlant].AboveGround.N
            [IPlant].AboveGround.NConc
            [IPlant].AboveGround.NConc
            [IPlant].AboveGround.N
            [IPlant].Leaf.Live.NConc
            [IPlant].Stem.Live.NConc
            [IPlant].Leaf.Live.N
            [IPlant].Stem.Live.N
            [IPlant].LAI
            [IPlant].CoverGreen
            [IPlant].CoverTotal
        Soil: SoilType=NZ_sedementary; Region=Plains; State=Canterbury; Country=New Zealnd; Latitude=0; Longitude=0
          Chemical: PHUnits=Water
            Thickness  PH   CEC
            100        5.8  14.287
            100        5.9  10.51
            100        6.6  12.726
            150        6.8  12.501
            200        7    16.239
            200        7.1  16.059
            CEC source: Calculated
          Physical
            Thickness  ParticleSizeSand  ParticleSizeSilt  ParticleSizeClay  Rocks  BD    AirDry  LL15  DUL   SAT
            100        58                14                28                0      1.22  0.022   0.1   0.17  0.51
            100        61                20                19                0      1.45  0.028   0.13  0.19  0.42
            100        45                22                33                0      1.45  0.03    0.14  0.2   0.42
            150        45                22                33                0      1.45  0.032   0.15  0.23  0.42
            200        45                8                 47                0      1.45  0.039   0.19  0.27  0.42
            200        45                8                 47                0      1.5   0.044   0.22  0.29  0.4
            Rocks source: Calculated
            SoilCrop Perennial RyegrassSoil: LL=[0.1, 0.13, 0.14, 0.15, 0.19, 0.22]; KL=[0.07, 0.07, 0.07, 0.06, 0.04, 0]; XF=[1, 1, 1, 1, 1, 1]
            SoilCrop WheatSoil: LL=[0.1, 0.13, 0.14, 0.15, 0.19, 0.22]; KL=[0.07, 0.07, 0.07, 0.06, 0.04, 0]; XF=[1, 1, 1, 1, 1, 1]
            SoilCrop AGPRyegrassSoil: LL=[0.1, 0.13, 0.14, 0.15, 0.19, 0.22]; KL=[0.07, 0.07, 0.07, 0.06, 0.04, 0]; XF=[1, 1, 1, 1, 1, 1]
          WaterBalance SoilWater: SummerDate=1-Nov; SummerU=6; SummerCona=3.5; WinterDate=1-Apr; WinterU=2; WinterCona=2; DiffusConst=0; DiffusSlope=0; Salb=0.13; CN2Bare=52; CNRed=20; CNCov=0.8; DischargeWidth=0; CatchmentArea=0; PSIDul=-100
            Thickness  SWCON  KLAT
            100        0.4    0
            100        0.4    0
            100        0.4    0
            150        0.4    0
            200        0.4    0
            200        0.4    0
          Organic: FOMCNRatio=53.5; CarbonUnits=Total
            Thickness  Carbon  SoilCNRatio  FBiom  FInert  FOM
            100        1.3     14.5         0.02   0       975
            100        0.6     14.5         0.01   0       600
            100        0.4     14.5         0.01   0       400
            150        0.3     14.5         0.006  0       150
            200        0.3     14.5         0.006  0       30
            200        0.22    14.5         0.006  0       20
          SoilTemperature SoilTemperatureCampbell (disabled): InteractionsPerDay=8
          CERESSoilTemperature
          Water: Thickness=[100, 100, 100, 150, 200, 200]; InitialValues=[0.17, 0.19, 0.2, 0.23, 0.27, 0.29]; FilledFromTop=false
          Nutrient
          Solute Urea: Thickness=[100, 100, 100, 150, 200, 200]; InitialValues=[0, 0, 0, 0, 0, 0]; InitialValuesUnits=ppm; WaterTableConcentration=0; D0=0; DepthConstant=0; MaxDepthSoluteAccessible=0; RunoffEffectivenessAtMovingSolute=0; MaxEffectiveRunoff=0
          Solute NO3: Thickness=[100, 100, 100, 150, 200, 200]; InitialValues=[30, 10, 4, 2, 1.5, 1.5]; InitialValuesUnits=ppm; WaterTableConcentration=0; D0=0; DepthConstant=0; MaxDepthSoluteAccessible=0; RunoffEffectivenessAtMovingSolute=0; MaxEffectiveRunoff=0
          Solute NH4: same as Experiment.Base.Field.Soil.Urea
          CERESSoilTemperature Temperature
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