Simulations: Version=190
  DataStore
    ExcelInput ObservedDataFiles: SheetNames=[Observed, ObservedDataSVS, ABlockObserved]
      FileNames=[MaizeObservation.xlsx, ObservedDataSVS.xlsx, ABlockRotationObservedData.xlsx]
    PredictedObserved: PredictedTableName=PredictedLeach; ObservedTableName=ObservedLeach; FieldNameUsedForMatch=SimulationName; FieldName2UsedForMatch=Clock.Today; AllColumns=false
      Tests: POName=PredictedObserved
        AcceptedStats:
          Name       n   Slope     Intercept  SEslope    SEintercept  R2        RMSE     NSE       ME      MAE      RSR       RMR
          N          36  1         0          0          0            1         0        1         0       0        0         0
          NLeaching  36  0.958419  13.1282    0.0754741  7.50894      0.825869  32.4458  0.783278  10.176  16.0194  0.459023  0
        AcceptedStatsName=Name n Slope Intercept SEslope SEintercept R2 RMSE NSE ME MAE RSR
    PredictedObserved PredictedObservedMaize: PredictedTableName=ReportRS; ObservedTableName=Observed; FieldNameUsedForMatch=SimulationName; FieldName2UsedForMatch=Clock.Today; AllColumns=false
      Tests: same as DataStore.PredictedObserved.Tests
    PredictedObserved PredictedObservedABlock: PredictedTableName=ReportABlock; ObservedTableName=ABlockObserved; FieldNameUsedForMatch=SimulationName; FieldName2UsedForMatch=Clock.Today; AllColumns=false
      Tests: same as DataStore.PredictedObserved.Tests
    PredictedObserved PredictedObserved_RSSoilWater: PredictedTableName=Report; ObservedTableName=Observed; FieldNameUsedForMatch=SimulationName; FieldName2UsedForMatch=Clock.Today; AllColumns=false
      Tests: POName=PredictedObserved_RSSoilWater
        AcceptedStats:
          Name                  n    Slope       Intercept    SEslope    SEintercept  R2         RMSE       NSE          ME            MAE        RSR       RMR
          ProfileWater          126  1.1592      -37.8029     0.0490602  15.5401      0.818257   26.9272    0.593019     12.1736       19.6857    0.635414  0
          Soil.SoilWater.SW(1)  126  1.25789     -0.00648064  0.035765   0.00649649   0.90889    0.0519074  0.574294     0.0356309     0.037277   0.649867  0
          Soil.SoilWater.SW(2)  126  1.1717      -0.03291     0.0452973  0.00964034   0.84365    0.0287878  0.714034     0.00244251    0.0226019  0.532632  0
          Soil.SoilWater.SW(3)  126  0.965056    0.0122203    0.0308585  0.00623278   0.887481   0.0179183  0.868892     0.00537741    0.0147627  0.360648  0
          Soil.SoilWater.SW(4)  126  0.709467    0.066874     0.0284471  0.0057517    0.833779   0.0178229  0.750964     0.00905499    0.0153507  0.497051  0
          Soil.SoilWater.SW(5)  126  0.296212    0.151906     0.0505935  0.0102712    0.216569   0.0308806  0.0734977    0.0108218     0.0261216  0.958723  0
          Soil.SoilWater.SW(6)  126  0.0964378   0.186707     0.0256049  0.00512132   0.102656   0.0209168  -0.00966551  0.00696481    0.0176272  1.00083   0
          Soil.SoilWater.SW(7)  126  -0.0536994  0.211694     0.0111469  0.00226074   0.157652   0.0264472  -0.125935    -0.000390067  0.0216854  1.05688   0
          Soil.SoilWater.SW(8)  126  -0.0578702  0.207785     0.0201434  0.00415981   0.0624073  0.0287743  -0.297288    -0.00903432   0.0221687  1.13446   0
        AcceptedStatsName=Name n Slope Intercept SEslope SEintercept R2 RMSE NSE ME MAE RSR
    PredictedObserved PredictedObservedSVS: PredictedTableName=ReportSVS; ObservedTableName=ObservedDataSVS; FieldNameUsedForMatch=SimulationName; FieldName2UsedForMatch=Clock.Today; AllColumns=false
      Tests: POName=PredictedObserved
        AcceptedStats:
          Name            n    Slope        Intercept    SEslope     SEintercept  R2         RMSE       NSE         ME           MAE        RSR       RMR
          AboveGroundN    152  1.01908      -9.6542      0.02507     3.16903      0.916775   23.3902    0.893958    -7.66998     18.9158    0.324569  0
          AboveGroundWt   144  0.740873     0.841325     0.0152071   0.112962     0.943551   1.81153    0.893907    -0.434654    1.05643    0.324586  0
          LeachedN_60cm   48   -0.00107885  0.965809     0.00106456  0.208199     0.0218391  194.961    -2.68433    -166.344     166.344    1.89936   0
          SoilN_0_120     56   0.595985     14.7544      0.110476    12.3837      0.350204   62.0828    0.0536598   -22.4773     40.4567    0.964075  0
          SoilN_0_150     56   0.622239     15.1704      0.115015    13.1916      0.351499   62.2675    0.0335539   -20.9508     41.6172    0.974263  0
          SoilN_0_30      240  0.488267     10.5364      0.0284874   2.23486      0.55244    42.0716    0.45581     -17.0308     25.549     0.736154  0
          SoilN_0_90      240  0.400767     22.3498      0.0241902   3.11788      0.535588   72.243     0.381707    -31.8189     43.2316    0.784676  0
          SoilN_120_150   144  -0.0549013   5.4338       0.0409493   0.202176     0.0125004  5.36842    -0.727812   2.50728      4.81787    1.30989   0
          SoilN_30_60     240  0.676924     4.35338      0.0624519   1.12486      0.330495   11.2897    -0.0330545  -0.22744     6.94163    1.01427   0
          SoilN_60_90     240  0.0442357    6.79854      0.0113032   0.490656     0.0604621  38.977     -0.0969825  -14.5607     16.7497    1.04519   0
          SoilN_90_120    184  0.0286968    4.59481      0.00870035  0.303861     0.0564037  31.9579    -0.151246   -13.1201     15.5213    1.07004   0
          SolutionNO3(3)  45   1.62362      34.6798      0.230322    5.61011      0.536105   53.5457    -8.29193    45.2028      45.2028    3.01421   0
          VWC_0_20        800  0.352153     0.195246     0.0234111   0.00568944   0.220906   0.0653131  -0.45043    0.0417744    0.0494348  1.20358   0
          VWC_100_120     800  0.203207     0.238201     0.0218128   0.00655062   0.0980872  0.0451343  -0.015831   0.00159131   0.0341425  1.00725   0
          VWC_120_140     800  -0.0431162   0.285021     0.0117137   0.00341828   0.0166946  0.0595221  -0.271564   -0.0143569   0.0492673  1.12693   0
          VWC_140_160     799  0.302081     0.212207     0.0476086   0.016487     0.0480855  0.059594   -1.95971    -0.0282726   0.0444133  1.71931   0
          VWC_20_40       800  0.981368     -0.00495472  0.0336907   0.0104159    0.51533    0.0282568  -0.0575528  -0.0106922   0.0224616  1.02773   0
          VWC_40_60       800  0.837602     0.045422     0.0336702   0.010082     0.436778   0.019619   0.0451729   -0.0030959   0.0150479  0.976542  0
          VWC_60_80       800  0.567543     0.126161     0.0243153   0.00738383   0.40572    0.023703   0.315652    -0.00457764  0.0190278  0.826736  0
          VWC_80_100      800  0.360985     0.186608     0.0224424   0.00678048   0.244837   0.0304128  0.164534    -0.00528237  0.0248567  0.913467  0
        AcceptedStatsName=Name n Slope Intercept SEslope SEintercept R2 RMSE NSE ME MAE RSR
  Folder Replacements
    Plant SCRUM: PlantType=SCRUM
      Memo TitlePage
        # SCRUM: the Simple Crop Resource Uptake Model

        _Hamish Brown and Rob Zyskowski, Plant and Food Research, New Zealand_

        This model has been built using the Plant Modelling Framework (PMF) of [brown_plant_2014] to simulate a range of different crops in simulations where water and nitrogen balance are of interest but a fully mechanistic plant model is not needed or is not available. It is a daily time step implementation of the crop model that is used on the Overseer nutrient balance model [Cichota_etal_2010].  It uses simple sigmoidal functions for estimating daily cover and biomass deltas to give realistic water and nitrogen demands. It does not simulate potential yield, this is specified as an input. Yield will be reduced below the specified potential yield if N or water supplies from the soil are insufficient to meet demand. The model has been paramaterised for simulating water and nitrogen balances of cropping rotations in New Zealand (where over 50 different crop types are grown and it is not feasible to produce full crop models for each of these).  Because of this the model is not as generically applicable as full APSIM crop models.   It may be adapted for other purposes and other crop types may be added but the user will need to keep in mind that because it is a simple model the the parameters might need changing for crops in different locations or for crops sown at different times of the year.  Some sensibility testing or validation is recommended before application in different sutuations.

        SCRUM has a simple phenology model which divides the crop growth into three main phases; a vegetative phase when the canopy is expanding, a reproductive phase when product is being formed and a senescing phase when the canopy is contracting.  SCRUM has 4 organ classes to represent different biomass components and the real biomass components that these classes represent changes from crop to crop:
           1. A Simple leaf class called <b>Stover</b> which represents the unharvested parts of the plant.  Generally, this represents the leaf and stem components of the crop but for crops where stem and leaf are part of the harvested product (e.g forages and leafy vegetables) than stover is the residual fraction of leaf and stem that is not harvested.
           2. A Generic organ class called <b>Product</b> which represents the plant parts that are harvested and removed from the field.  This could represent grain, fruits, tubers, leaf or stem depending on what sort of crop is being represented.
           3. A Root organ which extracts water and nitrogen from the soil for plant growth and returns biomass to the soil on harvest
           4. A Nodule organ which is only activated and fixes nitrogen for the legume crops.
        An Arbitrator is also included which determines the allocation of drymatter and nitrogen biomass between each of these organs.

        #Inclusion in APSIM simulations
        A scrum crop is included in a simulation the same as any other APSIM crop
         * The SCRUM object needs to be dragged or copied from the Crop folder in the tool box into the field of your simulation.
         * It is then planted with a sowing rule
        ~~~
        SCRUM.Sow(cultivar: Wheat_Autumn, population: 1, depth: 10, rowSpacing: 150);
        ~~~
          * Note that SCRUM has no notion of population or rowSpacing but these parameters are required by the Sow method so filler values are provided
          * To specify an expected Expected Yield that differs to the defalt value provided, included the following code in a manager script to be executed on the day of sowing.
        ~~~
         zone.Set("[SCRUM].Product.ExpectedYield.Value()", ResetValue);
        ~~~
        * SCRUM can be Harvested, Cut, Grazed and Pruned like other crops.  Defalt proportions of the biomass in each organ are removed from the sysem and/or added to the fields residue pools.  Note that defalt removal fraction for product on harvest is 0 (becaue it is represented with a generic organ) so more appropriate removal fractions should be sepcified in a manager script as follows:
        ~~~
        [EventSubscribe("Commencing")]
        private void OnSimulationCommencing(object sender, EventArgs e)
        {
          Remove = new RemovalFractions(SCRUM.Organs);
        }
        [EventSubscribe("DoManagement")]
        private void OnDoManagement(object sender, EventArgs e)
        {
          if (Clock.Today.Date == HarvestDate2)
          {
            Remove.SetFractionLiveToRemove("Product", 1.0);
            Remove.SetFractionLiveToRemove("Stover", 0.05);
            Remove.SetFractionLiveToResidue("Stover",0.95)
            SCRUM.Harvest(Remove);
            SCRUM.EndCrop();
          }
        }
        ~~~
        * A Remove class as shown above can be sent with Harvest, Cut, Graze and Prune events to specificy the proportions of removals.
         * Once a crop has been ended the field is open to plant another crop using another APSIM crop model or sowing another SCRUM crop.
      Phenology
        Memo Description
          As ThermalTime accumulates the crop progresses through the following phases:
        WeightedTemperatureFunction ThermalTime: MaximumTemperatureWeighting=0.5
          XYPairs: X=[0, 30, 40]; Y=[0, 30, 0]
        GenericPhase Seed: Start=Seed; End=Emergence; IsEmerged=false
          Memo Description
            The phase that runs from sowing until the seedlings emergence is complete.
          Constant Target: FixedValue=0; Units=<sup>o</sup>Cd
            Memo Parameter set at establishment
              SCRUM calculates this parameter during run-time, when the crop is being established. This is done in ScrumCropInstance based on parameter values set in the relevant ScrumCrop and CropManagement script.
          VariableReference Progression: VariableName=[Phenology].ThermalTime
        GenericPhase Seedling: Start=Emergence; End=Seedling; IsEmerged=true
          Memo Description
            The phase that runs from emergence until the seedlings are established (later than emergence) or ready for transplanting.
          Constant Target: same as Replacements.SCRUM.Phenology.Seed.Target
          VariableReference Progression: VariableName=[Phenology].ThermalTime
        GenericPhase Vegetative: Start=Seedling; End=Vegetative; IsEmerged=true
          Memo Description
            The phase in which the plant is rapidly growing and closing its canopy, represents the period of pure vegetative growth.
          Constant Target: same as Replacements.SCRUM.Phenology.Seed.Target
          VariableReference Progression: VariableName=[Phenology].ThermalTime
        GenericPhase EarlyReproductive: Start=Vegetative; End=EarlyReproductive; IsEmerged=true
          Memo Description
            The phase with substantial plant growth and when canopy reaches full development, represents the period in which crops are flowering.
          Constant Target: same as Replacements.SCRUM.Phenology.Seed.Target
          VariableReference Progression: VariableName=[Phenology].ThermalTime
        GenericPhase MidReproductive: Start=EarlyReproductive; End=MidReproductive; IsEmerged=true
          Memo Description
            The phase in which plant growth starts to slow down while still maintaining full canopy, represents the period when crops have started grain filling.
          Constant Target: same as Replacements.SCRUM.Phenology.Seed.Target
          VariableReference Progression: VariableName=[Phenology].ThermalTime
        GenericPhase LateReproductive: Start=MidReproductive; End=LateReproductive; IsEmerged=true
          Memo Description
            The phase in which plant growth is near completion, represents the period when crops are completing grain filling.
          Constant Target: same as Replacements.SCRUM.Phenology.Seed.Target
          VariableReference Progression: VariableName=[Phenology].ThermalTime
        GenericPhase Maturity: Start=LateReproductive; End=Maturity; IsEmerged=true
          Memo Description
            The phase in which plant growth ends reaching maximum biomass and cover, represents the period where grain filling is nearly complete
          Constant Target: same as Replacements.SCRUM.Phenology.Seed.Target
          VariableReference Progression: VariableName=[Phenology].ThermalTime
        GenericPhase Ripe: Start=Maturity; End=Ripe; IsEmerged=true
          Memo Description
            The phase in which canopy cover starts to decline, represents the period when grains are drying down to be ready for harvest.
          Constant Target: same as Replacements.SCRUM.Phenology.Seed.Target
          VariableReference Progression: VariableName=[Phenology].ThermalTime
        EndPhase ReadyForHarvesting: Start=Ripe; End=Unused; IsEmerged=true
          VariableReference ThermalTime: VariableName=[Phenology].ThermalTime
      OrganArbitrator Arbitrator
        BiomassTypeArbitrator DMArbitration
          Folder PotentialPartitioningMethods
            ReallocationMethod
            AllocateFixationMethod
            RetranslocationMethod
            SendPotentialDMAllocationsMethod
          Folder AllocationMethods
            NutrientConstrainedAllocationMethod
            DryMatterAllocationsMethod
          RelativeAllocation ArbitrationMethod
        BiomassTypeArbitrator NArbitration
          Folder PotentialPartitioningMethods
            ReallocationMethod
          Folder ActualPartitioningMethods
            AllocateFixationMethod
            RetranslocationMethod
          Folder AllocationMethods
            NitrogenAllocationsMethod
          RelativeAllocation ArbitrationMethod
          AllocateUptakesMethod
        WaterUptakeMethod
        NitrogenUptakeMethod
      GenericOrgan Product: IsAboveGround=true
        Memo Description
          This organ represents the biomass that is typically removed from the crop at harvest. It may include grain, root, leaf, stem, pod, tuber, or any other organ depending on the type of crop and how it is harvested.
        NutrientPoolFunctions InitialWt
          Constant Structural: FixedValue=0; Units=g/m^2
          Constant Metabolic: FixedValue=0; Units=g/m^2
          Constant Storage: FixedValue=0; Units=g/m^2
        VariableReference initialNConcFunction: VariableName=[Product].MaximumNConc
        Constant MaxNConcAtMaturity: FixedValue=0; Units=g/g
          Memo Parameter set at establishment
            This represents the maximum N concentration for Product at harvest time. SCRUM assumes that the maximum N concentration decreases as plants grow, starting at MaxNConcAtSeedling and reaching the value specified here at Maturity.
            SCRUM calculates this parameter during run-time, when the crop is being established. This is done in ScrumCropInstance based on parameter values set in the relevant ScrumCrop and CropManagement script.
        AddFunction MaximumNConc
          VariableReference MaxNConcAtMaturity: VariableName=[Product].MaxNConcAtMaturity
          MultiplyFunction EarlyNConcElevation
            SubtractFunction DeltaNConcentration
              VariableReference MaxNConcAtSeedling: VariableName=[SCRUM].MaxNConcAtSeedling
              VariableReference MaxNConcAtMaturity: VariableName=[Product].MaxNConcAtMaturity
            ExpressionFunction StageDilution: Expression=Min(1,exp(-[NDilutionConstant]*([Phenology].Stage-3)))
        MultiplyFunction CriticalNConc
          VariableReference MaxNConcAtMaturity: VariableName=[Product].MaxNConcAtMaturity
          Constant StructuralNFactor: FixedValue=0.6
        MultiplyFunction MinimumNConc
          VariableReference MaxNConcAtMaturity: VariableName=[Product].MaxNConcAtMaturity
          Constant StructuralNFactor: FixedValue=0.6
        Constant CarbonConcentration: FixedValue=0.4; Units=g/g
        Constant ExpectedYield: FixedValue=0; Units=g/m^2 fresh mass
          Memo Parameter set at establishment
            This value represents the expected biomass for Product at harvest time, in fresh weight basis. The actual yield may be lower due to water or N stress.
            SCRUM gets the value for this parameter during run-time, when the crop is established. The value is set on ScrumCropInstance or CropManagement script.
        Constant HarvestIndex: FixedValue=0; Units=g/g
          Memo Parameter set at establishment
            SCRUM gets the value for this parameter during run-time, when the crop is established. The value is set on ScrumCropInstance or CropManagement script.
        Constant DryMatterContent: FixedValue=0; Units=g/g
          Memo Parameter set at establishment
            SCRUM gets the value for this parameter during run-time, when the crop is established. The value is set on ScrumCropInstance or CropManagement script.
        SubtractFunction WaterContent
          Memo Description
            This is used to convert the biomass weights of this organ from dry matter basis back to fresh mass once daily partitining is complete.
          Constant One: FixedValue=1
          VariableReference DryMatterContent: VariableName=[Product].DryMatterContent
        MultiplyFunction DMAtHarvest
          Memo Description
            This is the expected yield at harvest time expressed in dry matter basis. It is calculated by the product of ExpectedYield (which is assumed to be given on fresh mass basis) and the dry matter content of the Product. Both are set during runtime, when the crop is stablished.
          VariableReference ExpectedYield: VariableName=[Product].ExpectedYield
          VariableReference DryMatterContent: VariableName=[Product].DryMatterContent
        ExpressionFunction Yield: Expression=(divide(1,[Product].DryMatterContent,0)*[Product].Wt)/100
          Memo Description
            Product fresh yield (t/ha).
        Constant Photosynthesis: FixedValue=0; Units=g/m^2
        Constant DMConversionEfficiency: FixedValue=1; Units=0-1
        Constant MaintenanceRespirationFunction: FixedValue=0; Units=0-1
        Constant SenescenceRate: FixedValue=0; Units=/d
        Constant DetachmentRateFunction: FixedValue=0; Units=/d
        Constant RemobilisationCost: FixedValue=0
        Constant DMReallocationFactor: FixedValue=0; Units=/d
        Constant DMRetranslocationFactor: FixedValue=0; Units=/d
        PhaseLookupValue NitrogenDemandSwitch: Start=Emergence; End=MidReproductive
          Constant: FixedValue=1
        Constant NReallocationFactor: FixedValue=0; Units=/d
        Constant NRetranslocationFactor: FixedValue=0; Units=/d
        RetranslocateNonStructural RetranslocateNitrogen
        BiomassRemoval BiomassRemovalDefaults: HarvestFractionLiveToRemove=1; HarvestFractionDeadToRemove=1; HarvestFractionLiveToResidue=0; HarvestFractionDeadToResidue=0
        NutrientDemandFunctions DMDemands
          MultiplyFunction Structural
            PartitionFractionDemandFunction DMDemandFunction
              SubtractFunction PartitionFraction
                Constant One: FixedValue=1
                VariableReference RootFraction
                  VariableName=[Root].DMDemands.Structural.DMDemandFunction.PartitionFraction
                VariableReference StoverFraction
                  VariableName=[Stover].DMDemands.Structural.DMDemandFunction.PartitionFraction
            Constant StructuralFraction: FixedValue=1; Units=0-1
          Constant Metabolic: FixedValue=0
          Constant Storage: FixedValue=0
          Constant QStructuralPriority: FixedValue=1
          Constant QMetabolicPriority: FixedValue=1
          Constant QStoragePriority: FixedValue=1
        NutrientDemandFunctions NDemands
          MultiplyFunction Structural
            VariableReference MinNConc: VariableName=[Product].minimumNconc
            VariableReference PotentialDMAllocation: VariableName=[Product].potentialDMAllocation.Structural
          MultiplyFunction Metabolic
            SubtractFunction MetabolicNConc
              VariableReference CritNConc: VariableName=[Product].criticalNConc
              VariableReference MinNConc: VariableName=[Product].minimumNconc
            VariableReference PotentialDMAllocation: VariableName=[Product].potentialDMAllocation.Structural
          StorageNDemandFunction Storage
            VariableReference NitrogenDemandSwitch: VariableName=[Product].nitrogenDemandSwitch
            VariableReference MaxNConc: VariableName=[Product].MaximumNconc
          Constant QStructuralPriority: FixedValue=1
          Constant QMetabolicPriority: FixedValue=1
          Constant QStoragePriority: FixedValue=1
      SimpleLeaf Stover: Albedo=0.18; Gsmax350=0.01; R50=150; LeafInitialisationStage=Emergence; Height=0; BaseHeight=0; Width=0; FRGR=0; PotentialEP=0; WaterDemand=0; KDead=0.1; LAIDead=0
        Memo Description
          This organ represents the biomass that is typically not removed at harvest. It may include leaf, stem, or any other organ depending on the type of crop and how it is harvested. The processes defining biomass accumulation over time (akin to photosythesis) are accounted for in this organ. It also holds the information about the canopy (cover, height, etc.).
        Constant InitialWt: FixedValue=0; Units=g/m^2
        Constant MaxNConcAtMaturity: FixedValue=0; Units=g/g
          Memo Parameter set at establishment
            This represents the maximum N concentration for Stover at harvest time. SCRUM assumes that the maximum N concentration decreases as plants grow, starting at MaxNConcAtSeedling and reaching the value specified here at Maturity.
            SCRUM calculates this parameter during run-time, when the crop is being established. This is done in ScrumCropInstance based on parameter values set in the relevant ScrumCrop and CropManagement script.
        AddFunction MaximumNConc
          VariableReference MaxNConcAtMaturity: VariableName=[Stover].MaxNConcAtMaturity
          MultiplyFunction EarlyNConcElevation
            SubtractFunction
              VariableReference MaxNConcAtSeedling: VariableName=[SCRUM].MaxNConcAtSeedling
              VariableReference MaxNConcAtMaturity: VariableName=[Stover].MaxNConcAtMaturity
            ExpressionFunction StageDilution: Expression=Min(1,exp(-[NDilutionConstant]*([Phenology].Stage-3)))
        MultiplyFunction CriticalNConc
          VariableReference MaxNConcAtMaturity: VariableName=[Stover].MaxNConcAtMaturity
          Constant StructuralNFactor: FixedValue=0.6
        MultiplyFunction MinimumNConc
          VariableReference MaxNConcAtMaturity: VariableName=[Stover].MaxNConcAtMaturity
          Constant StructuralNFactor: FixedValue=0.6
        Constant CarbonConcentration: FixedValue=0.4; Units=g/g
        SubtractFunction DMAtHarvest
          Memo Description
            This is the expected biomass for Stover at harvest time expressed in dry matter basis.
          VariableReference AbovegroundDMAtHarvest: VariableName=[SCRUM].AbovegroundDMAtHarvest
          VariableReference ProductDMAtHarvest: VariableName=[Product].DMAtHarvest
        MultiplyFunction Photosynthesis
          DeltaFunction UnStressedBiomass: StartStageName=Emergence
            SigmoidFunction Integral
              MultiplyFunction Ymax
                VariableReference TotalDMAtHarvest: VariableName=[SCRUM].TotalDMAtHarvest
                Constant InvertedRelativeDMAtHarvest
                  Memo Parameter set at establishment
                    This parameter is used to normalise the sigmoid function, ensuring it reached the maximum value at the specified time for harvest.
                    SCRUM calculates this parameter during run-time, when the crop is being established. This is done in ScrumCropInstance based on parameter values set in the relevant ScrumCrop and CropManagement script.
              SubtractFunction XValue
                VariableReference AccumulatedTt: VariableName=[Phenology].AccumulatedTt
                VariableReference TtEmergence: VariableName=[Phenology].Seed.Target
              Constant Xo: FixedValue=0
                Memo Parameter set at establishment
                  SCRUM calculates this parameter during run-time, when the crop is being established. This is done in ScrumCropInstance based on parameter values set in the relevant ScrumCrop and CropManagement script.
              Constant b: same as Replacements.SCRUM.Stover.Photosynthesis.UnStressedBiomass.Integral.Xo
          LinearInterpolationFunction WaterStressFactor
            XYPairs: X=[0, 1]; Y=[0, 1]
            VariableReference XValue: VariableName=[Stover].Fw
          Constant CorrectionFactor: FixedValue=1.007
            Memo Why
              The sigmoid finishes at ~99.3% at ripe (i.e. is not touching its asymtotes at 0 and 1.  So we multiply by this factor to stretch the sigmoid out a bit so it covers 100% of its range between emergence and ripe.  We add 0.7% of final biomass as initial biomass to account for not touching 0 at emergence
          PhaseLookup StageFactor
            PhaseLookupValue Emerging: Start=Seed; End=Emergence
              Constant: FixedValue=0
            PhaseLookupValue Growing: Start=Emergence; End=Maturity
              Constant: FixedValue=1
            PhaseLookupValue Ripening: Start=Maturity; End=Ripe
              Constant: FixedValue=0
        Constant DMConversionEfficiency: FixedValue=1; Units=0-1
        Constant MaintenanceRespiration: FixedValue=0; Units=0-1
        MinimumFunction FRGR
          SubDailyInterpolation FRGRFunctionTemp: agregationMethod=0
            XYPairs Response: X=[0, 10, 25, 40]; Y=[0, 1, 1, 0]
            ThreeHourAirTemperature InterpolationMethod
        AddFunction Cover
          AccumulateFunction Growth: StartStageName=Seed; EndStageName=Ripe; FractionRemovedOnCut=0; FractionRemovedOnHarvest=0; FractionRemovedOnGraze=0; FractionRemovedOnPrune=0
            MultiplyFunction Expansion
              DeltaFunction Delta: StartStageName=Seed
                SigmoidFunction Integral
                  Constant Ymax: FixedValue=0.97
                    Memo Parameter set at establishment
                      This is the maximum canopy cover for the crop, reached around the end of the Vegetative phase. Cover starts to decrease during the LaterReproductive phase.
                      SCRUM gets the value for this parameter during run-time, when the crop is established. The value is set on ScrumCropInstance or CropManagement script.
                  VariableReference XValue: VariableName=[Phenology].AccumulatedEmergedTt
                  Constant Xo: FixedValue=403.8
                    Memo Parameter set at establishment
                      SCRUM calculates this parameter during run-time, when the crop is being established. This is done in ScrumCropInstance based on parameter values set in the relevant ScrumCrop and CropManagement script.
                  Constant b: FixedValue=80.75
                    Memo Parameter set at establishment
                      SCRUM calculates this parameter during run-time, when the crop is being established. This is done in ScrumCropInstance based on parameter values set in the relevant ScrumCrop and CropManagement script.
              LinearInterpolationFunction WaterStressFactor
                XYPairs: X=[0.5, 1]; Y=[0, 1]
                VariableReference XValue: VariableName=[Stover].Fw
            PhaseLookupValue Senescence: Start=MidReproductive; End=Ripe
              DeltaFunction Delta: StartStageName=Seed
                MultiplyFunction Integral
                  HoldFunction MaxCover: WhenToHold=MidReproductive
                    VariableReference ValueToHold: VariableName=[Stover].CoverGreen
                  SubtractFunction ProportionLost
                    Constant One: FixedValue=1
                    DivideFunction ProportionRemaining
                      SubtractFunction TtSenesce
                        VariableReference AccumulatedThermalTime: VariableName=[Phenology].AccumulatedEmergedTt
                        AddFunction ThermalTimeAtStartSenescence
                          VariableReference Seedling: VariableName=[Phenology].Seedling.Target
                          VariableReference Vegetative: VariableName=[Phenology].Vegetative.Target
                          VariableReference EarlyReproductive: VariableName=[Phenology].EarlyReproductive.Target
                          VariableReference MidReproductive: VariableName=[Phenology].MidReproductive.Target
                      AddFunction SenescentPhaseDuration
                        VariableReference LateReproductive: VariableName=[Phenology].LateReproductive.Target
                        VariableReference Maturity: VariableName=[Phenology].Maturity.Target
          Constant InitialCover: FixedValue=0; Units=g/m2
        Constant ExtinctionCoefficient: FixedValue=0; Units=0-1
          Memo Parameter set at establishment
            This parameter does not have a functional use in SCRUM. As cannopy cover is calculated directly, this value is only used to estimate the value of LAI.
            SCRUM gets the value for this parameter during run-time, when the crop is established. The value is set on ScrumCropInstance or CropManagement script.
        Constant StomatalConductanceCO2Modifier: FixedValue=1
        PhaseLookup LaiDead
          PhaseLookupValue Expanding: Start=Emergence; End=MidReproductive
            Constant Zero: FixedValue=0
          PhaseLookupValue Senescence: Start=MidReproductive; End=Ripe
            MultiplyFunction SenescingLAI
              HoldFunction MaxLAI: WhenToHold=MidReproductive
                VariableReference StoverLAI: VariableName=[Stover].LAI
              Constant ProportionLost: FixedValue=1
              MinimumFunction ProportionSenesced
                Constant One: FixedValue=1
                DivideFunction ProportionSenesced: same as Replacements.SCRUM.Stover.Cover.Growth.Senescence.Delta.Integral.ProportionLost.ProportionRemaining
        SigmoidFunction HeightFunction
          Constant Ymax: FixedValue=0
            Memo Parameter set at establishment
              This represents the maximum height for the plant, it is reached at the LateReproductive phase. The height is not affected by water or N stresses.
              SCRUM gets the value for this parameter during run-time, when the crop is established. The value is set on ScrumCropInstance or CropManagement script.
          VariableReference XValue: VariableName=[Phenology].AccumulatedEmergedTt
          Constant Xo: FixedValue=0
            Memo Parameter set at establishment
              SCRUM calculates this parameter during run-time, when the crop is being established. This is done in ScrumCropInstance based on parameter values set in the relevant ScrumCrop and CropManagement script
          Constant b: same as Replacements.SCRUM.Stover.HeightFunction.Xo
        Constant SenescenceRate: FixedValue=0; Units=/d
        Constant DetachmentRate: FixedValue=0; Units=/d
        Constant RemobilisationCost: FixedValue=0
        Constant DMReallocationFactor: FixedValue=0; Units=/d
        Constant DMRetranslocationFactor: FixedValue=0; Units=/d
        PhaseLookupValue NitrogenDemandSwitch: Start=Emergence; End=MidReproductive
          Constant: FixedValue=1
        Constant NReallocationFactor: FixedValue=0; Units=/d
        Constant NRetranslocationFactor: FixedValue=0; Units=/d
        BiomassRemoval BiomassRemovalDefaults: HarvestFractionLiveToRemove=0; HarvestFractionDeadToRemove=0; HarvestFractionLiveToResidue=1; HarvestFractionDeadToResidue=1
        NutrientDemandFunctions DMDemands
          MultiplyFunction Structural
            PartitionFractionDemandFunction DMDemandFunction
              Memo Description
                DM demand is based on a simple partitioning coefficients.  At harvest the biomass partitioned to the stover = TotalDM * (1 - RootProportion) * (1 - Harvest index).  However the partitioningFraction is more complicated that this as it partitions more biomass to the stover in the CanopyExpanding Phase and less in the Yield increasing phase to give realistic patterns of accumulation of biomass in the Stover and Product over the duration of the crop
              DivideFunction PartitionFraction
                VariableReference StoverDMAtHarvest: VariableName=[Stover].DMAtHarvest
                VariableReference TotalDMAtHarvest: VariableName=[Scrum].TotalDMAtHarvest
            Constant StructuralFraction: FixedValue=1; Units=0-1
          Constant Metabolic: FixedValue=0
          Constant Storage: FixedValue=0
          Constant QStructuralPriority: FixedValue=1
          Constant QMetabolicPriority: FixedValue=1
          Constant QStoragePriority: FixedValue=1
        NutrientDemandFunctions NDemands
          MultiplyFunction Structural
            VariableReference MinNConc: VariableName=[Stover].minimumNconc
            VariableReference PotentialDMAllocation: VariableName=[Stover].potentialDMAllocation.Structural
          MultiplyFunction Metabolic
            SubtractFunction MetabolicNConc
              VariableReference CritNConc: VariableName=[Stover].criticalNConc
              VariableReference MinNConc: VariableName=[Stover].minimumNconc
            VariableReference PotentialDMAllocation: VariableName=[Stover].potentialDMAllocation.Structural
          StorageNDemandFunction Storage
            VariableReference NitrogenDemandSwitch: VariableName=[Stover].nitrogenDemandSwitch
            VariableReference MaxNConc: VariableName=[Stover].MaximumNconc
          Constant QStructuralPriority: FixedValue=1
          Constant QMetabolicPriority: FixedValue=1
          Constant QStoragePriority: FixedValue=1
      Root: GrowthRespiration=0; MaintenanceRespiration=0
        Memo Description
          This organ represents the biomass below ground that is typically not removed at harvest. The processes related to water and nitrogen uptake are handled through this organ, which also contains the information about the distribution or roots over the soil profile.
          The SCRUM model assumes that a fixed proportion of biomass is allocated to roots as the crop grows, and that it has a fixed N concentration. No retranslocation for either biomass or N is enabled from roots.
          The roots grow over time is controlled by thermal time, reaching is maximum(MaximumRootDepth) at the end of the EarlyReproductive phase.
        NutrientPoolFunctions InitialWt: same as Replacements.SCRUM.Product.InitialWt
        Constant MaximumNConc: FixedValue=0; Units=g/g
          Memo Parameter set at establishment
            SCRUM gets the value for this parameter during run-time, when the crop is established. The value is set on ScrumCropInstance or CropManagement script.
        VariableReference CriticalNConc: VariableName=[Root].MaximumNConc
        VariableReference MinimumNConc: VariableName=[Root].MaximumNConc
        Constant CarbonConcentration: FixedValue=0.4; Units=g/g
        Constant RootProportion: FixedValue=0.1; Units=g/g
          Memo Parameter set at establishment
            This represents the ratio between the biomass of roots to the otehr organs (Product plus Stover), akin to root to shoot ratio for crops that have product aboveground only.
            SCRUM gets the value for this parameter during run-time, when the crop is established. The value is set on ScrumCropInstance or CropManagement script.
        MultiplyFunction DMAtHarvest
          Memo Description
            This is the expected biomass for Roots at harvest time expressed in dry matter basis.
          VariableReference AbovegroundDMAtHarvest: VariableName=[SCRUM].AboveGroundDMAtHarvest
          VariableReference PartitionFraction: VariableName=[Root].RootProportion
        Constant DMConversionEfficiency: FixedValue=1; Units=0-1
        Constant MaintenanceRespirationFunction: FixedValue=0
        RootShapeCylinder RootShape
        Constant SpecificRootLength: FixedValue=40; Units=m/g
        Constant MaximumRootDepth: FixedValue=0; Units=mm
          Memo Parameter set at establishment
            SCRUM gets the value for this parameter during run-time, when the crop is established. The value is set on ScrumCropInstance or CropManagement script
        MultiplyFunction RootFrontVelocity
          LessThanFunction RootFrontVelocity
            VariableReference TestVariable: VariableName=[Phenology].AccumulatedEmergedTt
            AddFunction GrowthDuration
              VariableReference Emerging: VariableName=[Phenology].Seed.Target
              VariableReference Seedling: VariableName=[Phenology].Seedling.Target
              VariableReference Vegetative: VariableName=[Phenology].Vegetative.Target
              VariableReference EarlyReproductive: VariableName=[Phenology].EarlyReproductive.Target
            DivideFunction IfTrue
              VariableReference MaxRootDepth: VariableName=[Root].MaximumRootDepth
              VariableReference GrowthDuration: VariableName=[Root].RootFrontVelocity.RootFrontVelocity.GrowthDuration
            Constant IfFalse: FixedValue=0
          VariableReference ThermalTime: VariableName=[Phenology].ThermalTime
        KLModiferVsDepthFunction KLModifier
          VariableReference LayerDepth: VariableName=[Physical].DepthMidPoints
          VariableReference MaximumRootDepth: VariableName=[Root].MaximumRootDepth
        Constant SoilWaterEffect: FixedValue=1
        Constant SenescenceRate: FixedValue=0; Units=/d
        Constant RemobilisationCost: FixedValue=0
        Constant NitrogenDemandSwitch: FixedValue=1
        LinearInterpolationFunction KNO3
          XYPairs: X=[0, 0.003]; Y=[0.02, 0.02]
          VariableReference XValue: VariableName=[Root].LengthDensity
        LinearInterpolationFunction KNH4
          XYPairs: X=[0, 0.003]; Y=[0, 0]
          VariableReference XValue: VariableName=[Root].LengthDensity
        LinearInterpolationFunction NUptakeSWFactor
          XYPairs: X=[0, 1]; Y=[1, 1]
          VariableReference XValue: VariableName=[Root].RWC
        Constant MaxDailyNUptake: FixedValue=30; Units=kg N/ha/d
        BiomassRemoval BiomassRemovalDefaults: HarvestFractionLiveToRemove=0; HarvestFractionDeadToRemove=0; HarvestFractionLiveToResidue=1; HarvestFractionDeadToResidue=1
        NutrientDemandFunctions DMDemands
          MultiplyFunction Structural
            PartitionFractionDemandFunction DMDemandFunction
              DivideFunction PartitionFraction
                VariableReference RootDMAtHarvest: VariableName=[Root].DMAtHarvest
                VariableReference TotalDMAtHarvest: VariableName=[Scrum].TotalDMAtHarvest
            Constant StructuralFraction: FixedValue=1
          Constant Metabolic: FixedValue=0
          Constant Storage: FixedValue=0
          Constant QStructuralPriority: FixedValue=1
          Constant QMetabolicPriority: FixedValue=1
          Constant QStoragePriority: FixedValue=1
        NutrientDemandFunctions NDemands
          MultiplyFunction Structural
            VariableReference MinNConc: VariableName=[Root].MinimumNconc
            VariableReference PotentialDMAllocation: VariableName=[Root].potentialDMAllocation.Structural
          Constant Metabolic: FixedValue=0
          Constant Storage: FixedValue=0
          Constant QStructuralPriority: FixedValue=1
          Constant QMetabolicPriority: FixedValue=1
          Constant QStoragePriority: FixedValue=1
      Nodule
        Memo Description
          This is parameterised as a dummy organ, it can supply nitrogen if the plant is a legume, but has no biomass (DM or N) nor any other function. The organ is 'activated' using a switch, which should be turned on for legume crops (so N fixation can be added as supply to the Arbitrator to help covering the crop N demand). To turn this feature on, the value for LegumeFactor should be set to a non-zero value, this parameter represents the proportion of the potential N fixation rate that the nodules are capable of supplying. The potential fixation is linked to the daily fixation and controlled by the MaximumFixation parameter. Nitrogen fixation is switched off by setting LegumeFactor to zero.
        Constant InitialWtFunction: FixedValue=0; Units=g/m^2
        Constant MaximumNConc: FixedValue=0; Units=g/g
        Constant CriticalNConc: FixedValue=0; Units=g/g
        Constant MinimumNConc: FixedValue=0; Units=g/g
        Constant CarbonConcentration: FixedValue=0.4; Units=g/g
        Constant DMConversionEfficiency: FixedValue=1; Units=0-1
        Constant MaintenanceRespirationFunction: FixedValue=0; Units=0-1
        MultiplyFunction FixationRate
          Constant MaximumFixation: FixedValue=0.03; Units=g N / g Photosynthesis
            Memo
              This represents the maximum concentration in the plant that N fixation can maintain.
          VariableReference DailyPhotosynthesis: VariableName=[Stover].Photosynthesis
          VariableReference LegumeFactor: VariableName=[SCRUM].LegumeFactor
        Constant FixationMetabolicCost: FixedValue=0
        Constant SenescenceRate: FixedValue=0; Units=/d
        Constant DetachmentRateFunction: FixedValue=0; Units=/d
        Constant RemobilisationCost: FixedValue=0
        Constant DMReallocationFactor: FixedValue=0; Units=/d
        Constant DMRetranslocationFactor: FixedValue=0; Units=/d
        Constant NitrogenDemandSwitch: FixedValue=0
        Constant NReallocationFactor: FixedValue=0; Units=/d
        Constant NRetranslocationFactor: FixedValue=0; Units=/d
        BiomassRemoval BiomassRemovalDefaults: HarvestFractionLiveToRemove=0; HarvestFractionDeadToRemove=0; HarvestFractionLiveToResidue=0; HarvestFractionDeadToResidue=0
        NutrientPoolFunctions DMDemands
          Constant Structural: FixedValue=0
          Constant Metabolic: FixedValue=0
          Constant Storage: FixedValue=0
        NutrientPoolFunctions NDemands: same as Replacements.SCRUM.Nodule.DMDemands
      CompositeBiomass Total: OrganNames=[Stover, Product, Root]; IncludeLive=true; IncludeDead=true
      CompositeBiomass AboveGround: OrganNames=[Stover, Product]; IncludeLive=true; IncludeDead=true
        Memo
          The AboveGround composite biomass object includes Stover and Product organs.
      Constant MortalityRate: FixedValue=0
      Constant SeedMortalityRate: FixedValue=0
      Constant LegumeFactor: FixedValue=1; Units=0-1
        Memo Parameter set at establishment
          This parameter controls the potential N fixation for the crop. It varies from zero, no fixation, to one when fixation is at its maximum.
          SCRUM gets the value for this parameter during run-time, when the crop is established. The value is set on ScrumCropInstance or CropManagement script.
      DivideFunction AbovegroundDMAtHarvest
        VariableReference ProductDMAtHarvest: VariableName=[Product].DMAtHarvest
        VariableReference HarvestIndex: VariableName=[Product].HarvestIndex
      AddFunction TotalDMAtHarvest
        VariableReference AbovegroundDMAtHarvest: VariableName=[SCRUM].AbovegroundDMAtHarvest
        VariableReference RootDMAtHarvest: VariableName=[Root].DMAtHarvest
      Constant MaxNConcAtSeedling: FixedValue=0.04
        Memo Parameter set at establishment
          This represents the maximum N concentration for Stover and Product at Seedling stage. SCRUM assumes that the value for naximum N concentration decreases as plants grow, strating with the value given here and reaching values specific for each organ at Maturity.
          SCRUM gets the value for this parameter during run-time, when the crop is established. The value is set on ScrumCropInstance or CropManagement script.
      Constant NDilutionConstant: FixedValue=2
        Memo Parameter set at establishment
          This parameters controls how the maximum N concentration for Stover and Product decrease over time. Follows a exponential decrease from MaxNConcAtSeedling.
          SCRUM gets the value for this parameter during run-time, when the crop is established. The value is set on ScrumCropInstance or CropManagement script.
  Simulation SCRUMSownSelf
    Weather: FileName=%root%/Tests/WeatherFiles/lincoln.met; Latitude=-43.38; Tav=11.4; Amp=11.5
    Clock: Start=2000-07-01; End=2001-06-30
    Summary
    SoilArbitrator Soil Arbitrator
    Zone Field: Area=1; Slope=0; AspectAngle=0; Altitude=50
      Soil: Latitude=0; Longitude=0
        Chemical: PHUnits=Water
          Thickness  PH   CEC
          100        6.6  12.44
          200        6.2  11.6525
          300        5.7  11.045
          300        5.5  10.6625
          300        5.5  9.4025
          300        5.5  9.4025
          CEC source: Calculated
        Water: Thickness=[100, 200, 300, 300, 300, 300]; InitialValues=[0.33, 0.33, 0.31, 0.15, 0.1, 0.06]; InitialPAWmm=180; RelativeTo=LL15; FilledFromTop=false
        Physical
          Thickness  ParticleSizeSand  ParticleSizeSilt  ParticleSizeClay  Rocks     BD   AirDry  LL15  DUL   SAT
          100        5                 65                30                0         1.2  0.08    0.13  0.33  0.5
          200        5                 65                30                0         1.2  0.13    0.13  0.33  0.5
          300        5                 65                30                0.135336  1.2  0.1     0.1   0.31  0.44
          300        5                 65                30                0         1.2  0.06    0.06  0.15  0.46
          300        5                 65                30                0.135336  1.2  0.04    0.04  0.1   0.44
          300        5                 65                30                0.135336  1.2  0.02    0.02  0.06  0.44
          Rocks, ParticleSizeSand, ParticleSizeSilt, ParticleSizeClay source: Calculated
          SoilCrop SCRUMSoil: LL=[0.13, 0.13, 0.1, 0.08, 0.11, 0.11]; KL=[0.1, 0.1, 0.1, 0.1, 0.1, 0.1]; XF=[1, 1, 1, 1, 1, 1]
          SoilCrop PotatoSoil: LL=[0.13, 0.13, 0.27, 0.27, 0.3, 0.3]; KL=[0.1, 0.06, 0.03, 0.01, 0, 0]; XF=[1, 1, 0.1, 0, 0, 0]
        WaterBalance SoilWater: SummerDate=1-Nov; SummerU=9; SummerCona=4.4; WinterDate=1-Apr; WinterU=9; WinterCona=4.4; DiffusConst=88; DiffusSlope=35.4; Salb=0.18; CN2Bare=68; CNRed=20; CNCov=0.8; DischargeWidth=0; CatchmentArea=0; PSIDul=-100
          Thickness  SWCON  KLAT
          100        0.55   0
          200        0.55   0
          300        0.55   0
          300        0.55   0
          300        0.55   0
          300        0.55   0
        Nutrient
        Organic: FOMCNRatio=30; CarbonUnits=Total
          Thickness  Carbon  SoilCNRatio  FBiom  FInert  FOM
          100        1.82    11.5         0.025  0.3     1243.93
          200        1.47    11.5         0.025  0.4     833.832
          300        1.2     11.5         0.015  0.75    457.617
          300        1.03    11.5         0.01   0.9     251.145
          300        0.47    11.5         0.01   0.96    137.831
          300        0.47    11.5         0.01   0.96    75.6435
        LayerStructure
          Thickness=[100, 100, 100, 100, 100, 100, 100, 100, 100, 100, 100, 100, 100, 100, 100]
        Solute NO3: Thickness=[100, 200, 300, 300, 300, 300]; InitialValues=[225, 12.5, 1.389, 1.389, 0, 0]; InitialValuesUnits=ppm; WaterTableConcentration=0; D0=0; DepthConstant=0; MaxDepthSoluteAccessible=0; RunoffEffectivenessAtMovingSolute=0; MaxEffectiveRunoff=0
        Solute NH4: Thickness=[100, 200, 300, 300, 300, 300]; InitialValues=[0, 0, 0, 0, 0, 0]; InitialValuesUnits=ppm; WaterTableConcentration=0; D0=0; DepthConstant=0; MaxDepthSoluteAccessible=0; RunoffEffectivenessAtMovingSolute=0; MaxEffectiveRunoff=0
        Solute Urea: Thickness=[100, 200, 300, 300, 300, 300]; InitialValues=[0, 0, 0, 0, 0, 0]; InitialValuesUnits=kg/ha; WaterTableConcentration=0; D0=0; DepthConstant=0; MaxDepthSoluteAccessible=0; RunoffEffectivenessAtMovingSolute=0; MaxEffectiveRunoff=0
        SoilTemperature Temperature
      SurfaceOrganicMatter: InitialResidueName=wheat; InitialResidueType=wheat; InitialResidueMass=2000; InitialStandingFraction=0; InitialCPR=0; InitialCNR=80
      MicroClimate: a_interception=0; b_interception=1; c_interception=0; d_interception=0; SoilHeatFluxFraction=0.4; MinimumHeightDiffForNewLayer=0; NightInterceptionFraction=0.5; ReferenceHeight=2
      Plant SCRUM
      Irrigation
      Fertiliser
      Manager CropManagement
        CropName = SCRUM_Wheat
        EstablishDate = 14/10/2000
        EstablishStage = Seed
        PlantingDepth = 15
        HarvestTimeOption = SettingDate
        HarvestDate = 04/01/2001 00:00:00
        Tt_EstablishToHarvest = 1000
        HarvestStage = Ripe
        ExpectedYield = 12
        FieldLoss = 0
        ResidueRemoval = 0
        ResidueIncorporation = 0
        ResidueIncorporationDepth = 0
```csharp
using System;
using System.Linq;
using APSIM.Shared.Utilities;
using Models.Core;
using Models.Soils;
using Models.PMF;
using Models.PMF.SimplePlantModels;
using Models.Utilities;

namespace Models
{
    [Serializable]
    public class Script : Model
    {
        [Link] Clock clock;
        [Link] Zone zone;
        [Link(Type = LinkType.Scoped, ByName = true)]
        public Plant scrum = null;

        [Separator("Define the SCRUM crop to plant and its basic management")]

        /// <summary>SCRUM crop to stablish</summary>
        [Description("Chose the crop to plant:")]
        [Display(Type = DisplayType.SCRUMcropName)]
        public string CropName { get; set; }

        [Separator("Specify establishment and harvest conditions for this crop")]

        /// <summary>Date to establishment the crop</summary>
        [Description("Establishment date (dd-mmm or dd/mm/yyyy):")]
        public string EstablishDate { get; set; }

        /// <summary>Stages at which the SCRUM is established</summary>
        [Description("Choose the establishment stage")]
        [Display(Type = DisplayType.ScrumEstablishStages)]
        public string EstablishStage {get; set;}

        /// <summary>Depth at which the crop/seeds are planted.</summary>
        [Description(" Planting depth (mm):")]
        public double PlantingDepth { get; set; }

        /// <summary>Choice on how the duration of crop is defined</summary>
        [Description("Choose how the crop cycle is defined:")]
        public HarvestTimingOption HarvestTimeOption {get; set;}

        private bool isHarvestDateDefined { get { return HarvestTimeOption == HarvestTimingOption.SettingDate; } }
        private bool isThermalTimeDefined { get { return HarvestTimeOption == HarvestTimingOption.SettingThermalTime; } }

        /// <summary>Date to establishment the crop</summary>
        [Description("  Harvest date (dd/mm/yyyy):")]
        [Display(VisibleCallback = "isHarvestDateDefined")]
        public DateTime HarvestDate { get; set; }

        /// <summary>Thermal time from establishment to harvest (if blank or zero must specify harvest date)</summary>
        [Description("  Thermal time from establishment to harvest (oCd):")]
        [Display(VisibleCallback = "isThermalTimeDefined")]
        public double Tt_EstablishToHarvest { get; set; }

        /// <summary>Stage at which the crop is to be harvested at</summary>
        [Description("Choose the stage to harvest the crop:")]
        [Display(Type = DisplayType.ScrumHarvestStages)]
        public string HarvestStage {get; set;}

        [Separator("Specify an appropriate potential yield for the crop (based on assumed genotype, sowing date, and local conditions)\n" +
                   "  *SCRUM will reduce yield if water or N stress are predicted")]

        /// <summary>Expected crop yield (t FW/ha)</summary>
        [Description("Potential crop yield, fresh weight (t/ha)")]
        public double ExpectedYield {get; set;}

        [Separator("Specify proportions of field loss and residue removal at harvest")]

        /// <summary>Proportion of product that is left in the field at harvest (due to disease, market, ect.)</summary>
        [Description("Proportion of product lost in the field at harvest (0-1):")]
        public double FieldLoss { get; set; }

        /// <summary>Proportion of stover that is removed from the field at harvest (e.g., bailing)</summary>
        [Description("Proportion of stover removed from the field at harvest (0-1):")]
        public double ResidueRemoval { get; set; }

        /// <summaryProportion of residues that is incorporated by cultivation after harvest</summary>
        [Description("Proportion of residue incorporated to soil at harvest (0-1):")]
        public double ResidueIncorporation { get; set; }

        /// <summary>Depth down to which the residues that are incorporated to by cultivation after harvest</summary>
        [Description("Depth to incorporate residues (mm):")]
        public double ResidueIncorporationDepth { get; set; }

        private ScrumManagementInstance management;


        [EventSubscribe("DoManagement")]
        private void OnDoManagement(object sender, EventArgs e)
        {
            if (DateUtilities.DatesAreEqual(EstablishDate, clock.Today))
            {
                if (isHarvestDateDefined && (HarvestDate <= clock.Today))
                {
                    throw new Exception("Harvest date is earlier than establishment date");
                }

                management = new ScrumManagementInstance(cropName: CropName,
                                                         establishDate: clock.Today,
                                                         establishStage: EstablishStage,
                                                         plantingDepth: PlantingDepth,
                                                         harvestStage: HarvestStage,
                                                         expectedYield: ExpectedYield,
                                                         harvestDate: isHarvestDateDefined? HarvestDate : null,
                                                         ttEstablishmentToHarvest: isThermalTimeDefined? Tt_EstablishToHarvest: double.NaN,
                                                         fieldLoss: FieldLoss,
                                                         residueRemoval: ResidueRemoval,
                                                         residueIncorporation: ResidueIncorporation,
                                                         residueIncorporationDepth: ResidueIncorporationDepth);
                ScrumCropInstance currentCrop = zone.FindDescendant<ScrumCropInstance>(CropName);
                currentCrop.Establish(management);
            }
        }

        /// <summary>Flag how harvest time is defined.</summary>
        public enum HarvestTimingOption
        {
            /// <summary>A date is to be used.</summary>
            SettingDate,
            /// <summary>A given thermal time sum is to be used.</summary>
            SettingThermalTime
        }
    }
}
```
      Manager AutomaticIrrigation
        IrrigationIsEnabled = True
        SeasonStartDate = 1-Sep
        SeasonEndDate = 30-Apr
        OnlyApplyOntoCrop = True
        SeasonsAllocation = 1000
        TriggerFraction = 0.8
        RefillFraction = 0.95
        MaximumIrrigationAmount = 40
        ReturnDays = 3
        DepthToMonitor = 600
        LimitMonitoringDepth = True
```csharp
// This script can be used to apply irrigation automatically, based soil water status
// Blame to RCichota, last updated in 18/Mar/2025

using System;
using System.Xml.Serialization;
using Newtonsoft.Json;
using APSIM.Shared.Utilities;
using Models.Core;
using Models.Soils;
using Models.PMF;
using Models.Interfaces;
using Models.Soils.Nutrients;

namespace Models
{
    [Serializable]
    [System.Xml.Serialization.XmlInclude(typeof(Model))]
    public class Script : Model
    {
        //Communication to other modules
        [Link] private Clock clock;
        [Link] private ISummary summary;
        [Link] private IPhysical soilPhysical;
        [Link] private ISoilWater waterBalance;
        [Link] private Irrigation Irrigation;
        [Link] private Plant SCRUM;

        //User inputs from properties tab
        [Separator("Generic irrigation management")]
        [Description(" Enable automatic irrigation management?              ")]
        public bool IrrigationIsEnabled {get; set;}

        [Description(" Date to start the irrigation season (dd-mmm):")]
        [Display(VisibleCallback = "IrrigationIsEnabled")]
        public string SeasonStartDate {get; set;}

        [Description(" Date to end the irrigation season (dd-mmm):")]
        [Display(VisibleCallback = "IrrigationIsEnabled")]
        public string SeasonEndDate {get; set;}

        [Description(" Only irrigate if there is a crop on the field?")]
        [Display(VisibleCallback = "IrrigationIsEnabled")]
        public bool OnlyApplyOntoCrop {get; set;}

        [Description(" Season allocation (mm):")]
        [Display(VisibleCallback = "IrrigationIsEnabled")]
        public double SeasonsAllocation {get; set;}

        [Description(" Fraction of PAWC to trigger irrigation (0-1):")]
        [Display(VisibleCallback = "IrrigationIsEnabled")]
        public double TriggerFraction {get; set;}

        [Description(" Fraction of PAWC to refill soil to (0-1):")]
        [Display(VisibleCallback = "IrrigationIsEnabled")]
        public double RefillFraction {get; set;}

        [Description(" Maximum irrigation amount per application (mm):")]
        [Display(VisibleCallback = "IrrigationIsEnabled")]
        public double MaximumIrrigationAmount {get; set;}

        [Description(" Minimum number of days between irrigations:")]
        [Display(VisibleCallback = "IrrigationIsEnabled")]
        public double ReturnDays {get; set;}

        [Description(" Depth to calculate PAWC (mm):")]
        [Display(VisibleCallback = "IrrigationIsEnabled")]
        public double DepthToMonitor {get; set;}

        [Description(" Limit the depth to the rooting depth?")]
        [Display(VisibleCallback = "IrrigOnAndOnlyOnCrops")]
        public bool LimitMonitoringDepth {get; set;}

        //Class members
        [JsonIgnore] public bool SeasonIsOpen {get; set;}
        [JsonIgnore] private bool CropIsActive {get; set;}
        [JsonIgnore] private bool IrrigatorIsAvailable {get; set;}
        [JsonIgnore] private bool SoilIsDry {get; set;}
        [JsonIgnore] private bool WaterIsAvailable {get; set;}

        [JsonIgnore] public double MonitoredLayerTrigger {get; set;}
        [JsonIgnore] public double MonitoredLayerTarget {get; set;}
        [JsonIgnore] public double MonitoredLayerDUL {get; set;}
        [JsonIgnore] public double MonitoredLayerLL {get; set;}
        [JsonIgnore] public double MonitoredLayerSW {get; set;}
        [JsonIgnore] public double MonitoredLayerPAWC {get; set;}
        [JsonIgnore] public double MonitoredLayerPAW {get; set;}
        [JsonIgnore] public double MonitoredDepth {get; set;}

        [JsonIgnore] public double AmountToApply {get; set;}
        [JsonIgnore] public double SeasonAppliedAmount {get; set;}
        [JsonIgnore] public double DaysSinceLastApplication {get; set;}

        //Internal Variables
        private bool IrrigOnAndOnlyOnCrops
        { get {return IrrigationIsEnabled && OnlyApplyOntoCrop; }}
        private double lastLayerFraction;
        private int lastLayer;


        [EventSubscribe("StartOfSimulation")]
        private void OnStartOfSimulation(object sender, EventArgs e)
        {
            // initialise some variables
            DaysSinceLastApplication = ReturnDays;
            if (!OnlyApplyOntoCrop)
            {
                LimitMonitoringDepth = false;
            }

            // calculate soil water variables
            calculateWaterThresholds(DepthToMonitor);
            MonitoredLayerTrigger = MonitoredLayerLL + MonitoredLayerPAWC*TriggerFraction;
            MonitoredLayerTarget = MonitoredLayerLL + MonitoredLayerPAWC*RefillFraction;
            MonitoredDepth = DepthToMonitor;
        }

        [EventSubscribe("StartOfDay")]
        private void OnStartOfDay(object sender, EventArgs e)
        {
            // check whether we are starting a new season, zero amount
            if (DateUtilities.DatesAreEqual(SeasonStartDate, clock.Today))
            {
                SeasonAppliedAmount = 0.0;
            }
        }

        [EventSubscribe("DoManagement")]
        private void OnDoManagement(object sender, EventArgs e)
        {
            // get the current amount of water in the soil
            if (LimitMonitoringDepth)
            { // get the current rooting depth, no less than 50mm, no more than DepthToMonitor
                MonitoredDepth = DepthToMonitor;
                if (SCRUM.IsAlive)
                {
                    MonitoredDepth = Math.Min(DepthToMonitor, Math.Max(50.0, SCRUM.Root.Depth));
                }

                // re-calculate the soil water variables
                calculateWaterThresholds(MonitoredDepth);
                MonitoredLayerTrigger = MonitoredLayerLL + MonitoredLayerPAWC*TriggerFraction;
                MonitoredLayerTarget = MonitoredLayerLL + MonitoredLayerPAWC*RefillFraction;
            }

            calculateSoilWater(MonitoredDepth);

            // check water status and management conditions, if we can irrigate at all
            if (IrrigationIsEnabled)
            {
                DaysSinceLastApplication += 1;

                // are we within the irrigation season?
                SeasonIsOpen = false;
                if (DateUtilities.WithinDates(SeasonStartDate, clock.Today, SeasonEndDate))
                {
                    SeasonIsOpen = true;
                }

                // is there a crop in the ground that needs irrigation?
                CropIsActive = true;
                if (OnlyApplyOntoCrop)
                {
                    CropIsActive = false;
                    if (SCRUM.IsAlive)
                    {
                        CropIsActive = true;
                    }
                }

                // is the irrigator available?
                IrrigatorIsAvailable = false;
                if (DaysSinceLastApplication >= ReturnDays)
                {
                    IrrigatorIsAvailable = true;
                }

                // is the soil dry enough to require irrigation?
                SoilIsDry = false;
                if (MonitoredLayerPAW <= MonitoredLayerPAWC*TriggerFraction)
                {
                    SoilIsDry = true;
                }

                // is there water available, within allocation?
                WaterIsAvailable = false;
                if (SeasonAppliedAmount < SeasonsAllocation)
                {
                    WaterIsAvailable = true;
                }

                //Lets bloody well irrigate then!!!!
                if (SeasonIsOpen && CropIsActive && IrrigatorIsAvailable && SoilIsDry && WaterIsAvailable)
                {
                    AmountToApply = MonitoredLayerPAWC*RefillFraction - MonitoredLayerPAW;
                    AmountToApply = Math.Min(AmountToApply, MaximumIrrigationAmount);
                    AmountToApply = Math.Min(AmountToApply, SeasonsAllocation - SeasonAppliedAmount);
                    AmountToApply = Math.Max(AmountToApply, 0.0);
                    Irrigation.Apply(amount: AmountToApply, depth: 0.0);
                    DaysSinceLastApplication = 0;
                    SeasonAppliedAmount += AmountToApply;
                    summary.WriteMessage(this, "Automatic irrigation  applied, " + AmountToApply.ToString("#0.0") + " mm", MessageType.Diagnostic);
                }
            }
        }

        // computes the water thresholds in the soil down to a given depth
        private void calculateWaterThresholds(double depthToCalculate)
        {
            MonitoredLayerLL = 0.0;
            MonitoredLayerDUL = 0.0;
            double accumulatedDepth = 0.0;
            lastLayerFraction = 0.0;
            lastLayer = 0;
            for (int layer = 0; accumulatedDepth <= depthToCalculate; layer++)
            {
                double layerFraction = (depthToCalculate - accumulatedDepth)/soilPhysical.Thickness[layer];
                layerFraction = Math.Min(1.0, Math.Max(0.0, layerFraction));
                MonitoredLayerLL += soilPhysical.LL15mm[layer]*layerFraction;
                MonitoredLayerDUL += soilPhysical.DULmm[layer]*layerFraction;
                accumulatedDepth += soilPhysical.Thickness[layer];
                if (accumulatedDepth >= depthToCalculate)
                {
                    lastLayerFraction = layerFraction;
                    lastLayer = layer;
                }
            }

            MonitoredLayerPAWC = MonitoredLayerDUL - MonitoredLayerLL;
        }

        // computes the amount of water in the soil down to a given depth
        private void calculateSoilWater(double depthToCalculate)
        {
            MonitoredLayerSW = 0.0;
            double accumulatedDepth = 0.0;
            for (int layer = 0; accumulatedDepth <= depthToCalculate; layer++)
            {
                if (layer < lastLayer)
                {
                    MonitoredLayerSW += waterBalance.SWmm[layer];
                }
                else
                {
                    MonitoredLayerSW += waterBalance.SWmm[layer]*lastLayerFraction;
                }

                accumulatedDepth += soilPhysical.Thickness[layer];
            }

            MonitoredLayerPAW = Math.Max(0.0, MonitoredLayerSW - MonitoredLayerLL);
        }
    }
}
```
      Manager AutomaticFertiliser
        FertiliserIsEnabled = True
        SeasonStartDate = 1-Aug
        SeasonEndDate = 30-Apr
        OnlyApplyOntoCrop = False
        SeasonsAllocation = 1000
        TriggerSoilN = 50
        AmountToApply = 25
        FertiliserType = UreaN
        ReturnDays = 3
        DepthToMonitor = 300
        LimitMonitoringDepth = False
```csharp
// This script can be used to apply N fertiliser automatically, based soil mineral N status
// Blame to RCichota, last updated in 18/Mar/2025

using System;
using System.Xml.Serialization;
using Newtonsoft.Json;
using APSIM.Shared.Utilities;
using Models.Core;
using Models.Soils;
using Models.PMF;
using Models.Interfaces;
using Models.Soils.Nutrients;

namespace Models
{
    [Serializable]
    [System.Xml.Serialization.XmlInclude(typeof(Model))]
    public class Script : Model
    {
        //Communication to other modules
        [Link] private Clock clock;
        [Link] private ISummary summary;
        [Link] private IPhysical soilPhysical;
        [Link] private INutrient soilNutrient;
        [Link] private Fertiliser Fertiliser;
        [Link] private Plant SCRUM;

        //User inputs from properties tab
        [Separator("Generic N fertiliser management")]
        [Description(" Enable automatic fertiliser management?                           ")]
        public bool FertiliserIsEnabled {get; set;}

        [Description(" Date to start the fertiliser season (dd-mmm):")]
        [Display(VisibleCallback = "FertiliserIsEnabled")]
        public string SeasonStartDate {get; set;}

        [Description(" Date to end the fertiliser season (dd-mmm):")]
        [Display(VisibleCallback = "FertiliserIsEnabled")]
        public string SeasonEndDate {get; set;}

        [Description(" Only fertilise if there is a crop on the field?")]
        [Display(VisibleCallback = "FertiliserIsEnabled")]
        public bool OnlyApplyOntoCrop {get; set;}

        [Description(" Season allocation (kg N/ha):")]
        [Display(VisibleCallback = "FertiliserIsEnabled")]
        public double SeasonsAllocation {get; set;}

        [Description(" Minimum soil mineral N, trigger an application (kg N/ha):")]
        [Display(VisibleCallback = "FertiliserIsEnabled")]
        public double TriggerSoilN {get; set;}

        [Description(" Fertiliser N amount per application (kg N/ha):")]
        [Display(VisibleCallback = "FertiliserIsEnabled")]
        public double AmountToApply {get; set;}

        [Description(" Type of fertiliser to apply:")]
        [Display(VisibleCallback = "FertiliserIsEnabled", Type = DisplayType.FertiliserType)]
        public string FertiliserType { get; set; }

        [Description(" Minimum number of days between applications:")]
        [Display(VisibleCallback = "FertiliserIsEnabled")]
        public double ReturnDays {get; set;}

        [Description(" Depth to calculate soil mineral N (mm):")]
        [Display(VisibleCallback = "FertiliserIsEnabled")]
        public double DepthToMonitor {get; set;}

        [Description(" Limit the depth to the rooting depth?")]
        [Display(VisibleCallback = "FertOnAndOnlyOnCrops")]
        public bool LimitMonitoringDepth {get; set;}

        //Class members
        [JsonIgnore] public bool SeasonIsOpen {get; set;}
        [JsonIgnore] private bool CropIsActive {get; set;}
        [JsonIgnore] private bool SpreaderIsAvailable {get; set;}
        [JsonIgnore] private bool SoilNitrogenIsLow {get; set;}
        [JsonIgnore] private bool FertiliserIsAvailable {get; set;}

        [JsonIgnore] public double MonitoredLayerSoilN {get; set;}
        [JsonIgnore] public double MonitoredDepth {get; set;}

        [JsonIgnore] public double SeasonAppliedAmount {get; set;}
        [JsonIgnore] public double DaysSinceLastApplication {get; set;}

        //Internal Variables
        private bool FertOnAndOnlyOnCrops
        { get {return FertiliserIsEnabled && OnlyApplyOntoCrop; }}


        [EventSubscribe("StartOfSimulation")]
        private void OnStartOfSimulation(object sender, EventArgs e)
        {
            // initialise some variables
            DaysSinceLastApplication = ReturnDays;
            if (!OnlyApplyOntoCrop)
            {
                LimitMonitoringDepth = false;
            }

            MonitoredDepth = DepthToMonitor;
        }

        [EventSubscribe("StartOfDay")]
        private void OnStartOfDay(object sender, EventArgs e)
        {
            // check whether we are starting a new season, zero amount
            if (DateUtilities.DatesAreEqual(SeasonStartDate, clock.Today))
            {
                SeasonAppliedAmount = 0.0;
            }
        }

        [EventSubscribe("DoManagement")]
        private void OnDoManagement(object sender, EventArgs e)
        {
            // get the current amount of nitrogen in the soil
            if (LimitMonitoringDepth)
            { // get the current rooting depth, no less than 50mm, no more than DepthToMonitor
                MonitoredDepth = DepthToMonitor;
                if (SCRUM.IsAlive)
                {
                    MonitoredDepth = Math.Min(DepthToMonitor, Math.Max(50.0, SCRUM.Root.Depth));
                }
            }

            calculateSoilMineralNitrogen(MonitoredDepth);

            // check N status and management conditions, if we can fertilise at all
            if (FertiliserIsEnabled)
            {
                DaysSinceLastApplication += 1;

                // are we within the irrigation season?
                SeasonIsOpen = false;
                if (DateUtilities.WithinDates(SeasonStartDate, clock.Today, SeasonEndDate))
                {
                    SeasonIsOpen = true;
                }

                // is there a crop in the ground that needs fertiliser?
                CropIsActive = true;
                if (OnlyApplyOntoCrop)
                {
                    CropIsActive = false;
                    if (SCRUM.IsAlive)
                    {
                        CropIsActive = true;
                    }
                }

                // is the spreader available?
                SpreaderIsAvailable = false;
                if (DaysSinceLastApplication >= ReturnDays)
                {
                    SpreaderIsAvailable = true;
                }

                // is the soil N low enough to require fertiliser?
                SoilNitrogenIsLow = false;
                if (MonitoredLayerSoilN <= TriggerSoilN)
                {
                    SoilNitrogenIsLow = true;
                }

                // is there N fertiliser available, within allocation?
                FertiliserIsAvailable = false;
                if (SeasonAppliedAmount < SeasonsAllocation)
                {
                    FertiliserIsAvailable = true;
                }

                //Lets bloody well fertilise then!!!!
                if (SeasonIsOpen && CropIsActive && SpreaderIsAvailable && SoilNitrogenIsLow && FertiliserIsAvailable)
                {
                    AmountToApply = Math.Min(AmountToApply, SeasonsAllocation - SeasonAppliedAmount);
                    AmountToApply = Math.Max(AmountToApply, 0.0);
                    Fertiliser.Apply(amount: AmountToApply, type: FertiliserType, depth: 10.0);
                    DaysSinceLastApplication = 0;
                    SeasonAppliedAmount += AmountToApply;
                    summary.WriteMessage(this, "Automatic N fertiliser applied, " + AmountToApply.ToString("#0.0") + " kgN/ha", MessageType.Diagnostic);
                }
            }
        }

        // computes the amount of mineral N in the soil down to a given depth
        private void calculateSoilMineralNitrogen(double depthToCalculate)
        {
            MonitoredLayerSoilN = 0.0;
            double accumulatedDepth = 0.0;
            for (int layer = 0; accumulatedDepth <= depthToCalculate; layer++)
            {
                double layerFraction = (depthToCalculate - accumulatedDepth)/soilPhysical.Thickness[layer];
                layerFraction = Math.Min(1.0, Math.Max(0.0, layerFraction));
                MonitoredLayerSoilN += (soilNutrient.MineralN[layer])*layerFraction;
                accumulatedDepth += soilPhysical.Thickness[layer];
            }
        }
    }
}
```
      Report: EventNames=[Clock].DoReport
        VariableNames:
          [Clock].Today
          [AutomaticIrrigation].Script.AmountToApply
          [AutomaticIrrigation].Script.MonitoredLayerDUL
          [AutomaticIrrigation].Script.MonitoredLayerSW
          [AutomaticIrrigation].Script.MonitoredLayerTarget
          [AutomaticIrrigation].Script.MonitoredLayerTrigger
          [Fertiliser].NitrogenApplied
          [Irrigation].IrrigationApplied
          [SCRUM].Arbitrator.DM.NutrientLimitation
          [SCRUM].Arbitrator.DM.SinkLimitation
          [SCRUM].Arbitrator.DM.TotalFixationSupply
          [SCRUM].Arbitrator.DM.TotalPlantDemand
          [SCRUM].Arbitrator.FN
          [SCRUM].Arbitrator.N.TotalPlantDemand
          [SCRUM].Arbitrator.N.TotalPlantSupply
          [SCRUM].Arbitrator.N.TotalPlantSupply
          [SCRUM].Phenology.AccumulatedEmergedTt
          [SCRUM].Phenology.AccumulatedTt
          [SCRUM].Phenology.CurrentPhase.Name
          [SCRUM].Phenology.CurrentStageName
          [SCRUM].Phenology.Stage
          [SCRUM].Phenology.ThermalTime
          [SCRUM].Product.Allocated.Wt
          [SCRUM].Product.DMDemands.Structural.DMDemandFunction.PartitionFraction
          [SCRUM].Product.DryMatterContent
          [SCRUM].Product.DMAtHarvest
          [SCRUM].Product.ExpectedYield
          [SCRUM].Product.Live.N
          [SCRUM].Product.Live.NConc
          [SCRUM].Product.Live.Wt
          [SCRUM].Root.Depth
          [SCRUM].Root.DMatHarvest
          [SCRUM].Root.DMDemands.Structural.DMDemandFunction.PartitionFraction
          [SCRUM].Root.Live.N
          [SCRUM].Root.Live.NConc
          [SCRUM].Root.Live.Wt
          [SCRUM].Root.WaterUptake
          [SCRUM].Stover.CoverDead
          [SCRUM].Stover.CoverGreen
          [SCRUM].Stover.CoverTotal
          [SCRUM].Stover.DMAtHarvest
          [SCRUM].Stover.DMDemands.Structural.DMDemandFunction.PartitionFraction
          [SCRUM].Stover.Fn
          [SCRUM].Stover.Fw
          [SCRUM].Stover.Height
          [SCRUM].Stover.LAI
          [SCRUM].Stover.LAIDead
          [SCRUM].Stover.LAITotal
          [SCRUM].Stover.Live
          [SCRUM].Stover.Live.N
          [SCRUM].Stover.Live.NConc
          [SCRUM].Stover.Live.Wt
          [SCRUM].Stover.Transpiration
          [SCRUM].Stover.WaterDemand
          [SCRUM].Total.N
          [SCRUM].Total.Wt
          [SCRUM].TotalDMAtHarvest
          [Soil].SoilWater.Drainage
          [Soil].SoilWater.Eo
          [Soil].SoilWater.Es
          [Soil].SoilWater.pond
          [Soil].SoilWater.Runoff
          [Soil].Water.MM
          sum([Soil].Nutrient.MineralN) as TotalSoilNitrogen
          [AutomaticFertiliser].Script.MonitoredLayerSoilN
      ScrumCropInstance SCRUM_Wheat: HarvestIndex=0.45; MoistureContent=0.14; RootProportion=0.1; MaxRootDepth=1500; MaxHeight=1000; MaxCover=0.97; ExtinctionCoefficient=0.7; TypicalHarvestStage=Ripe; SeedlingNConc=0.05; ProductHarvestNConc=0.02; StoverHarvestNConc=0.01; RootNConc=0.01; LegumeFactor=0; BaseTemperature=0; OptimumTemperature=30; MaxTemperature=40; Tt_SowToEmergence=100; GSMax=0.008; R50=150; ConsiderWaterStress=true; EstablishStage=Seed; PlantingDepth=20; ExpectedYield=12; Tt_EstablishmentToHarvest=0; HarvestStage=Ripe; FieldLoss=0; ResidueRemoval=0; ResidueIncorporation=0; ResidueIncorporationDepth=0; Factor_XoBiomass=0.5; Factor_bBiomass=0.2; Factor_XoCover=0.4; Factor_bCover=0.2; Factor_XoHeight=0.7; Factor_bHeight=0.2; Tt_EmergencetoMaturity=0
  Simulation SCRUMSinglePlantingFromManager
    Weather: FileName=%root%/Tests/WeatherFiles/lincoln.met; Latitude=-43.38; Tav=11.4; Amp=11.5
    Clock: Start=2000-07-01; End=2001-06-30
    Summary
    SoilArbitrator Soil Arbitrator
    Zone Field: Area=1; Slope=0; AspectAngle=0; Altitude=50
      Soil: Latitude=0; Longitude=0
        Chemical: same as SCRUMSownSelf.Field.Soil.Chemical
        Water: Thickness=[100, 200, 300, 300, 300, 300]; InitialValues=[0.33, 0.33, 0.31, 0.15, 0.1, 0.06]; InitialPAWmm=180; RelativeTo=LL15; FilledFromTop=false
        Physical: same as SCRUMSownSelf.Field.Soil.Physical
        WaterBalance SoilWater: same as SCRUMSownSelf.Field.Soil.SoilWater
        Nutrient
        Organic: same as SCRUMSownSelf.Field.Soil.Organic
        LayerStructure
          Thickness=[100, 100, 100, 100, 100, 100, 100, 100, 100, 100, 100, 100, 100, 100, 100]
        Solute NO3: Thickness=[100, 200, 300, 300, 300, 300]; InitialValues=[225, 12.5, 1.38889, 1.38889, 0, 0]; InitialValuesUnits=ppm; WaterTableConcentration=0; D0=0; DepthConstant=0; MaxDepthSoluteAccessible=0; RunoffEffectivenessAtMovingSolute=0; MaxEffectiveRunoff=0
        Solute NH4: same as SCRUMSownSelf.Field.Soil.NH4
        Solute Urea: same as SCRUMSownSelf.Field.Soil.Urea
        SoilTemperature Temperature
      SurfaceOrganicMatter: InitialResidueName=wheat; InitialResidueType=wheat; InitialResidueMass=2000; InitialStandingFraction=0; InitialCPR=0; InitialCNR=80
      MicroClimate: a_interception=0; b_interception=1; c_interception=0; d_interception=0; SoilHeatFluxFraction=0.4; MinimumHeightDiffForNewLayer=0; NightInterceptionFraction=0.5; ReferenceHeight=2
      Plant SCRUM
      Irrigation
      Fertiliser
      Manager CropManagement
        CropName = ScrumCereal
        EstablishDate = 14/10/2000
        EstablishStage = Seed
        PlantingDepth = 15
        HarvestTimeOption = SettingThermalTime
        HarvestDate = 01/01/0001 00:00:00
        Tt_EstablishToHarvest = 1500
        HarvestStage = Maturity
        ExpectedYield = 8
        FieldLoss = 0
        ResidueRemoval = 0
        ResidueIncorporation = 1
        ResidueIncorporationDepth = 150
        script: same as in SCRUMSownSelf.Field.CropManagement
      Manager AutomaticIrrigation: same as SCRUMSownSelf.Field.AutomaticIrrigation
      Manager AutomaticFertiliser: same as SCRUMSownSelf.Field.AutomaticFertiliser
      Report: EventNames=[Clock].DoReport
        VariableNames:
          [Clock].Today
          [Soil].SoilWater.Drainage
          [Soil].SoilWater.Runoff
          [Soil].SoilWater.Eo
          [Soil].SoilWater.Es
          [Soil].SoilWater.pond
          [Soil].Water.MM
          [Soil].NO3.kgha
          [SCRUM].Stover.Live.Wt
          [SCRUM].Root.Live.Wt
          [SCRUM].Product.Live.Wt
          [SCRUM].Stover.Live.N
          [SCRUM].Root.Live.N
          [SCRUM].Product.Live.N
          [SCRUM].Stover.Live.NConc
          [SCRUM].Root.Live.NConc
          [SCRUM].Product.Live.NConc
          [SCRUM].Root.WaterUptake
          [SCRUM].Stover.Transpiration
          [SCRUM].Stover.WaterDemand
          [SCRUM].Root.Depth
          [SCRUM].Stover.CoverTotal
          [SCRUM].Stover.CoverDead
          [SCRUM].Stover.CoverGreen
          [SCRUM].Stover.LAI
          [SCRUM].Stover.LAIDead
          [SCRUM].Stover.LAITotal
          [SCRUM].Stover.Height
          [SCRUM].Arbitrator.N.TotalPlantDemand
          [SCRUM].Arbitrator.N.TotalPlantSupply
          [SCRUM].Stover.Fw
          [SCRUM].Stover.Fn
          [SCRUM].Total.Wt
          [SCRUM].Total.N
          [SCRUM].Arbitrator.DM.TotalFixationSupply
          [SCRUM].Arbitrator.DM.TotalPlantDemand
          [SCRUM].Phenology.AccumulatedEmergedTt
          [SCRUM].Phenology.AccumulatedTt
          [SCRUM].Arbitrator.DM.SinkLimitation
          [SCRUM].Arbitrator.DM.NutrientLimitation
          [SCRUM].Phenology.ThermalTime
          [SCRUM].Phenology.CurrentPhase.Name
          [SCRUM].Phenology.Stage
          [SCRUM].Phenology.CurrentStageName
          [AutomaticIrrigation].Script.MonitoredLayerTarget
          [AutomaticIrrigation].Script.MonitoredLayerTrigger
          [AutomaticIrrigation].Script.MonitoredLayerSW
          [AutomaticIrrigation].Script.MonitoredLayerDUL
          [Irrigation].IrrigationApplied
          [AutomaticIrrigation].Script.AmountToApply
          [SCRUM].Arbitrator.FN
          [SCRUM].Arbitrator.N.TotalPlantSupply
          [SCRUM].Product.DMDemands.Structural.DMDemandFunction.PartitionFraction
          [SCRUM].Stover.DMDemands.Structural.DMDemandFunction.PartitionFraction
          [SCRUM].Root.DMDemands.Structural.DMDemandFunction.PartitionFraction
      ScrumCropInstance ScrumCereal: HarvestIndex=0.45; MoistureContent=0.14; RootProportion=0.1; MaxRootDepth=1005; MaxHeight=700; MaxCover=0.97; ExtinctionCoefficient=0.55; TypicalHarvestStage=Ripe; SeedlingNConc=0.05; ProductHarvestNConc=0.015; StoverHarvestNConc=0.01; RootNConc=0.01; OptimumTemperature=30; MaxTemperature=40; Tt_SowToEmergence=100; GSMax=0.008; R50=150; ConsiderWaterStress=true; Factor_XoBiomass=0.5; Factor_bBiomass=0.2; Factor_XoCover=0.4; Factor_bCover=0.2; Factor_XoHeight=0.7; Factor_bHeight=0.2
        zero: LegumeFactor, BaseTemperature, PlantingDepth, ExpectedYield, Tt_EstablishmentToHarvest, FieldLoss, ResidueRemoval, ResidueIncorporation, ResidueIncorporationDepth, Tt_EmergencetoMaturity
  Simulation SCRUMRepeatPlantingFromManager
    Weather: FileName=%root%/Tests/WeatherFiles/lincoln.met; Latitude=-43.38; Tav=11.4; Amp=11.5
    Clock: Start=1998-10-14; End=2006-03-01
    Summary
    SoilArbitrator Soil Arbitrator
    Zone Field: Area=1; Slope=0; AspectAngle=0; Altitude=50
      Soil: same as SCRUMSinglePlantingFromManager.Field.Soil
      SurfaceOrganicMatter: InitialResidueName=wheat; InitialResidueType=wheat; InitialResidueMass=2000; InitialStandingFraction=0; InitialCPR=0; InitialCNR=80
      MicroClimate: a_interception=0; b_interception=1; c_interception=0; d_interception=0; SoilHeatFluxFraction=0.4; MinimumHeightDiffForNewLayer=0; NightInterceptionFraction=0.5; ReferenceHeight=2
      Manager Sow Cereal same date each year
        CropName = ScrumCereal
        EstablishDate = 01-Sep
        EstablishStage = Seed
        PlantingDepth = 15
        HarvestTimeOption = SettingThermalTime
        HarvestDate = 01/01/0001 00:00:00
        Tt_EstablishToHarvest = 1000
        HarvestStage = Maturity
        ExpectedYield = 8
        FieldLoss = 0
        ResidueRemoval = 0
        ResidueIncorporation = 1
        ResidueIncorporationDepth = 100
        script: same as in SCRUMSownSelf.Field.CropManagement
      Plant SCRUM
      Irrigation
      Fertiliser
      Manager AutomaticIrrigation: same as SCRUMSownSelf.Field.AutomaticIrrigation
      Manager AutomaticFertiliser
        FertiliserIsEnabled = True
        SeasonStartDate = 1-Aug
        SeasonEndDate = 30-Apr
        OnlyApplyOntoCrop = False
        SeasonsAllocation = 1000
        TriggerSoilN = 75
        AmountToApply = 25
        FertiliserType = UreaN
        ReturnDays = 3
        DepthToMonitor = 300
        LimitMonitoringDepth = False
        script: same as in SCRUMSownSelf.Field.AutomaticFertiliser
      Report: same as SCRUMSinglePlantingFromManager.Field.Report
      ScrumCropInstance ScrumCereal: HarvestIndex=0.45; MoistureContent=0.14; RootProportion=0.1; MaxRootDepth=1005; MaxHeight=700; MaxCover=0.97; ExtinctionCoefficient=0.55; TypicalHarvestStage=Ripe; SeedlingNConc=0.05; ProductHarvestNConc=0.015; StoverHarvestNConc=0.01; RootNConc=0.01; OptimumTemperature=30; MaxTemperature=40; Tt_SowToEmergence=100; GSMax=0.008; R50=150; ConsiderWaterStress=true; Factor_XoBiomass=0.5; Factor_bBiomass=0.2; Factor_XoCover=0.4; Factor_bCover=0.2; Factor_XoHeight=0.7; Factor_bHeight=0.2
        zero: LegumeFactor, BaseTemperature, PlantingDepth, ExpectedYield, Tt_EstablishmentToHarvest, FieldLoss, ResidueRemoval, ResidueIncorporation, ResidueIncorporationDepth, Tt_EmergencetoMaturity
  Simulation SCRUMRotationFromManager
    Weather: FileName=%root%/Tests/WeatherFiles/lincoln.met; Latitude=-43.38; Tav=11.4; Amp=11.5
    Clock: Start=2000-07-01; End=2002-01-01
    Summary
    SoilArbitrator Soil Arbitrator
    Zone Field: Area=1; Slope=0; AspectAngle=0; Altitude=50
      Soil: same as SCRUMSownSelf.Field.Soil
      SurfaceOrganicMatter: InitialResidueName=wheat; InitialResidueType=wheat; InitialResidueMass=2000; InitialStandingFraction=0; InitialCPR=0; InitialCNR=80
      MicroClimate: a_interception=0; b_interception=1; c_interception=0; d_interception=0; SoilHeatFluxFraction=0.4; MinimumHeightDiffForNewLayer=0; NightInterceptionFraction=0.5; ReferenceHeight=2
      Plant SCRUM
      Manager Sow Cereal on Oct2000 harvest apr2001
        CropName = ScrumCereal
        EstablishDate = 14/10/2000
        EstablishStage = Seed
        PlantingDepth = 15
        HarvestTimeOption = SettingDate
        HarvestDate = 04/14/2001 00:00:00
        Tt_EstablishToHarvest = 1000
        HarvestStage = Maturity
        ExpectedYield = 8
        FieldLoss = 0
        ResidueRemoval = 0
        ResidueIncorporation = 1
        ResidueIncorporationDepth = 150
        script: same as in SCRUMSownSelf.Field.CropManagement
      Manager Sow legume Jun2001 harvest after 600 oCd
        CropName = ScrumLegume
        EstablishDate = 01/06/2001
        EstablishStage = Seed
        PlantingDepth = 15
        HarvestTimeOption = SettingThermalTime
        HarvestDate = 01/01/0001 00:00:00
        Tt_EstablishToHarvest = 600
        HarvestStage = LateReproductive
        ExpectedYield = 3
        FieldLoss = 0.1
        ResidueRemoval = 0.6
        ResidueIncorporation = 0.5
        ResidueIncorporationDepth = 50
        script: same as in SCRUMSownSelf.Field.CropManagement
      Irrigation
      Fertiliser
      Manager AutomaticIrrigation: same as SCRUMSownSelf.Field.AutomaticIrrigation
      Manager AutomaticFertiliser: same as SCRUMSownSelf.Field.AutomaticFertiliser
      Report: same as SCRUMSinglePlantingFromManager.Field.Report
      ScrumCropInstance ScrumLegume: HarvestIndex=0.45; MoistureContent=0.14; RootProportion=0.1; MaxRootDepth=1005; MaxHeight=700; MaxCover=0.9; ExtinctionCoefficient=0.55; TypicalHarvestStage=Ripe; SeedlingNConc=0.05; ProductHarvestNConc=0.015; StoverHarvestNConc=0.01; RootNConc=0.01; LegumeFactor=1; OptimumTemperature=30; MaxTemperature=40; Tt_SowToEmergence=200; GSMax=0.008; R50=150; ConsiderWaterStress=true; Factor_XoBiomass=0.5; Factor_bBiomass=0.2; Factor_XoCover=0.4; Factor_bCover=0.2; Factor_XoHeight=0.7; Factor_bHeight=0.2
        zero: BaseTemperature, PlantingDepth, ExpectedYield, Tt_EstablishmentToHarvest, FieldLoss, ResidueRemoval, ResidueIncorporation, ResidueIncorporationDepth, Tt_EmergencetoMaturity
      ScrumCropInstance ScrumCereal: same as SCRUMRepeatPlantingFromManager.Field.ScrumCereal
  Simulation SCRUMRotationComponent
    Clock: End=1969-09-21
    Weather: FileName=%root%/Tests/WeatherFiles/lincoln.met; Latitude=-43.38; Tav=11.4; Amp=11.5
    Summary
    SoilArbitrator Soil Arbitrator
    Manager TreatmentID
```csharp
using Models.Soils;
using System.Data;
using System.IO;
using APSIM.Shared.Utilities;
using System.Xml.Serialization;
using Models;
using Models.PMF;
using System.Text;
using System.Collections.Generic;
using Models.Core;
using System;
using Newtonsoft.Json;
      

namespace Models
{
    [Serializable] 
    public class Script : Model
    {
        [JsonIgnore] public string Rotation { get; set; }
        [JsonIgnore] public string Irrigation { get; set; }
        [JsonIgnore] public string Nitrogen { get; set; }
        
        [JsonIgnore] public string TreatmentName { get; set; }
        
        [EventSubscribe("StartOfSimulation")]
        private void OnStartOfSimulation(object sender, EventArgs e)
        {
            TreatmentName = Rotation + "_" + Irrigation + "_" + Nitrogen;
        }
    }
}
```
    Zone Field: Area=1; Slope=0; AspectAngle=0; Altitude=50
      Soil: Region=Plains; State=Canterbury; Country=New Zealand; Latitude=0; Longitude=0
        DataSource=Generic profile descriptions provided by Trevor Webb and data for functional horizions based on SWAMP project results
        Comments=Bulk density values were measured on the fine earth fraction so values entered into apsim soil are adjusted down to account for stone content (assuming stones are inert from all soil process so their mass and volume is removed from model paramaters).  SAT, DUL, LL15 and Air dry have been adjusted down to account for stone content.  OC has not been adjusted so the model will get the correct carbon and N amounts using the adjusted BD.
        Chemical: PHUnits=Water
          Thickness  PH  CEC
          100        6   14.36825
          200        6   14.609
          200        6   11.6165
          100        6   9.20675
          300        6   8.89175
          200        6   8.89175
          100        6   8.89175
          300        6   8.89175
          CEC source: Calculated
        Physical
          Thickness  ParticleSizeSand  ParticleSizeSilt  ParticleSizeClay  Rocks     BD     AirDry  LL15   DUL   SAT
          100        5                 65                30                0.276409  1      0.05    0.1    0.27  0.419
          200        5                 65                30                0.317856  1      0.05    0.1    0.27  0.395
          300        5                 65                30                0         1.59   0.157   0.157  0.29  0.36
          200        5                 65                30                0         1.57   0.173   0.173  0.3   0.366
          100        5                 65                30                0         1.57   0.173   0.173  0.3   0.366
          200        5                 65                30                0         1.6    0.165   0.165  0.3   0.358
          100        5                 65                30                0         1.6    0.165   0.165  0.3   0.358
          300        5                 65                30                0.14163   1.601  0.115   0.115  0.3   0.316
          Rocks, ParticleSizeSand, ParticleSizeSilt, ParticleSizeClay source: Calculated
          SoilCrop SCRUMSoil: LL=[0.1, 0.1, 0.157, 0.173, 0.173, 0.165, 0.165, 0.115]; KL=[0.1, 0.1, 0.1, 0.1, 0.1, 0.1, 0.1, 0.1]; XF=[1, 1, 1, 1, 1, 1, 1, 1]
        WaterBalance SoilWater: SummerDate=1-oct; SummerU=9; SummerCona=4.4; WinterDate=1-Apr; WinterU=2; WinterCona=1.5; DiffusConst=88; DiffusSlope=35; Salb=0.13; CN2Bare=73; CNRed=20; CNCov=0.8; PSIDul=-100; Thickness=[100, 200, 300, 200, 100, 200, 100, 300]; SWCON=[0.9, 0.6, 0.4, 0.4, 0.4, 0.9, 0.9, 0.9]
        Nutrient
        Organic: FOMCNRatio=31.5; CarbonUnits=Total
          Thickness  Carbon  SoilCNRatio  FBiom  FInert  FOM
          100        2.677   11           0.025  0.45    536.934
          200        2.784   11           0.025  0.6     359.917
          300        1.454   11           0.015  0.75    197.527
          200        0.383   11           0.01   0.9     132.406
          100        0.243   11           0.01   0.96    108.405
          200        0.243   11           0.01   0.96    72.6661
          100        0.243   11           0.01   0.96    59.4939
          300        0.243   11           0.01   0.96    32.651
        Water: Thickness=[100, 200, 300, 200, 100, 200, 100, 300]; InitialValues=[0.27, 0.27, 0.29, 0.3, 0.3, 0.3, 0.3, 0.225]; InitialPAWmm=202.5; RelativeTo=LL15; FilledFromTop=true
        Solute NO3: Thickness=[100, 200, 200, 100, 300, 200, 100, 300]; InitialValuesUnits=ppm; WaterTableConcentration=0; D0=0; DepthConstant=0; MaxDepthSoluteAccessible=0; RunoffEffectivenessAtMovingSolute=0; MaxEffectiveRunoff=0
          InitialValues=[35, 15, 6.07966, 6.07966, 0.849257, 0.3125, 0.625, 0.208203]
        Solute NH4: Thickness=[100, 200, 200, 100, 300, 200, 100, 300]; InitialValuesUnits=ppm; WaterTableConcentration=0; D0=0; DepthConstant=0; MaxDepthSoluteAccessible=0; RunoffEffectivenessAtMovingSolute=0; MaxEffectiveRunoff=0
          InitialValues=[6.18, 3.09, 0.672956, 0.672956, 0.552017, 0.28125, 0.0625, 0.0208203]
        Solute Urea: Thickness=[100, 200, 200, 100, 300, 200, 100, 300]; InitialValues=[0, 0, 0, 0, 0, 0, 0, 0]; InitialValuesUnits=kg/ha; WaterTableConcentration=0; D0=0; DepthConstant=0; MaxDepthSoluteAccessible=0; RunoffEffectivenessAtMovingSolute=0; MaxEffectiveRunoff=0
        SoilTemperature Temperature
      SurfaceOrganicMatter: InitialResidueName=grass; InitialResidueType=grass; InitialResidueMass=2500; InitialStandingFraction=0; InitialCPR=0; InitialCNR=15
      MicroClimate: a_interception=0; b_interception=1; c_interception=0; d_interception=0; SoilHeatFluxFraction=0.4; MinimumHeightDiffForNewLayer=0; NightInterceptionFraction=0.5; ReferenceHeight=2
      Irrigation
      Fertiliser
      Plant SCRUM
      ScrumCropInstance Potato: HarvestIndex=0.9; MoistureContent=0.78; RootProportion=0.1; MaxRootDepth=600; MaxHeight=100; MaxCover=0.95; ExtinctionCoefficient=0.55; TypicalHarvestStage=LateReproductive; SeedlingNConc=0.04; ProductHarvestNConc=0.012; StoverHarvestNConc=0.009; RootNConc=0.01; BaseTemperature=5; OptimumTemperature=30; MaxTemperature=40; Tt_SowToEmergence=300; GSMax=0.008; R50=150; ConsiderWaterStress=true; Factor_XoBiomass=0.5; Factor_bBiomass=0.2; Factor_XoCover=0.4; Factor_bCover=0.2; Factor_XoHeight=0.7; Factor_bHeight=0.2
        zero: LegumeFactor, PlantingDepth, ExpectedYield, Tt_EstablishmentToHarvest, FieldLoss, ResidueRemoval, ResidueIncorporation, ResidueIncorporationDepth, Tt_EmergencetoMaturity
      ScrumCropInstance Wheat: HarvestIndex=0.5; MoistureContent=0.14; RootProportion=0.1; MaxRootDepth=2000; MaxHeight=1800; MaxCover=0.97; ExtinctionCoefficient=0.55; TypicalHarvestStage=Ripe; SeedlingNConc=0.03; ProductHarvestNConc=0.012; StoverHarvestNConc=0.009; RootNConc=0.01; OptimumTemperature=30; MaxTemperature=40; Tt_SowToEmergence=100; GSMax=0.008; R50=150; ConsiderWaterStress=true; Factor_XoBiomass=0.5; Factor_bBiomass=0.2; Factor_XoCover=0.4; Factor_bCover=0.2; Factor_XoHeight=0.7; Factor_bHeight=0.2
        zero: LegumeFactor, BaseTemperature, PlantingDepth, ExpectedYield, Tt_EstablishmentToHarvest, FieldLoss, ResidueRemoval, ResidueIncorporation, ResidueIncorporationDepth, Tt_EmergencetoMaturity
      ScrumCropInstance OatForage: HarvestIndex=0.95; RootProportion=0.1; MaxRootDepth=1000; MaxHeight=700; MaxCover=0.97; ExtinctionCoefficient=0.8; TypicalHarvestStage=EarlyReproductive; SeedlingNConc=0.05; ProductHarvestNConc=0.03; StoverHarvestNConc=0.02; RootNConc=0.01; BaseTemperature=5; OptimumTemperature=30; MaxTemperature=40; Tt_SowToEmergence=100; GSMax=0.008; R50=150; ConsiderWaterStress=true; Factor_XoBiomass=0.5; Factor_bBiomass=0.2; Factor_XoCover=0.4; Factor_bCover=0.2; Factor_XoHeight=0.7; Factor_bHeight=0.2
        zero: MoistureContent, LegumeFactor, PlantingDepth, ExpectedYield, Tt_EstablishmentToHarvest, FieldLoss, ResidueRemoval, ResidueIncorporation, ResidueIncorporationDepth, Tt_EmergencetoMaturity
      ScrumCropInstance Carrot: HarvestIndex=0.7; MoistureContent=0.88; RootProportion=0.1; MaxRootDepth=1000; MaxHeight=400; MaxCover=0.9; ExtinctionCoefficient=0.7; TypicalHarvestStage=LateReproductive; SeedlingNConc=0.03; ProductHarvestNConc=0.012; StoverHarvestNConc=0.009; RootNConc=0.01; BaseTemperature=3; OptimumTemperature=30; MaxTemperature=40; Tt_SowToEmergence=300; GSMax=0.008; R50=150; ConsiderWaterStress=true; Factor_XoBiomass=0.5; Factor_bBiomass=0.2; Factor_XoCover=0.4; Factor_bCover=0.2; Factor_XoHeight=0.7; Factor_bHeight=0.2
        zero: LegumeFactor, PlantingDepth, ExpectedYield, Tt_EstablishmentToHarvest, FieldLoss, ResidueRemoval, ResidueIncorporation, ResidueIncorporationDepth, Tt_EmergencetoMaturity
      ScrumCropInstance TurnipForage: HarvestIndex=0.8; RootProportion=0.1; MaxRootDepth=1000; MaxHeight=400; MaxCover=0.95; ExtinctionCoefficient=0.85; TypicalHarvestStage=Vegetative; SeedlingNConc=0.03; ProductHarvestNConc=0.012; StoverHarvestNConc=0.009; RootNConc=0.01; BaseTemperature=3; OptimumTemperature=30; MaxTemperature=40; Tt_SowToEmergence=200; GSMax=0.008; R50=150; ConsiderWaterStress=true; Factor_XoBiomass=0.5; Factor_bBiomass=0.2; Factor_XoCover=0.4; Factor_bCover=0.2; Factor_XoHeight=0.7; Factor_bHeight=0.2
        zero: MoistureContent, LegumeFactor, PlantingDepth, ExpectedYield, Tt_EstablishmentToHarvest, FieldLoss, ResidueRemoval, ResidueIncorporation, ResidueIncorporationDepth, Tt_EmergencetoMaturity
      Report: EventNames=[Clock].DoReport
        VariableNames:
          [Clock].Today
          [SCRUM].Product.Yield
          [SCRUM].Stover.Live.Wt
          [SCRUM].Root.Live.Wt
          [SCRUM].Product.Live.Wt
          [SCRUM].Stover.Live.N
          [SCRUM].Root.Live.N
          [SCRUM].Product.Live.N
          [SCRUM].Stover.Live.NConc
          [SCRUM].Root.Live.NConc
          [SCRUM].Product.Live.NConc
          [SCRUM].Root.WaterUptake
          [SCRUM].Stover.Transpiration
          [SCRUM].Stover.WaterDemand
          [SCRUM].Root.Depth
          [SCRUM].Stover.CoverTotal
          [SCRUM].Stover.CoverDead
          [SCRUM].Stover.LAI
          [SCRUM].Stover.Height
          [SCRUM].Stover.Fw
          [SCRUM].Stover.Fn
          [SCRUM].Total.Wt
          [SCRUM].Total.N
          [SCRUM].Stover.CoverGreen
          [SCRUM].SowingData.Cultivar
          [SCRUM].Product.Yield
      ScrumRotation: CoefficientFile=Rotation1.csv
      Manager AutomaticIrrigation
        IrrigationIsEnabled = True
        SeasonStartDate = 1-Sep
        SeasonEndDate = 30-Apr
        OnlyApplyOntoCrop = True
        SeasonsAllocation = 2000
        TriggerFraction = 0.6
        RefillFraction = 0.9
        MaximumIrrigationAmount = 100
        ReturnDays = 2
        DepthToMonitor = 600
        LimitMonitoringDepth = True
        script: same as in SCRUMSownSelf.Field.AutomaticIrrigation
      Manager AutomaticFertiliser: same as SCRUMRepeatPlantingFromManager.Field.AutomaticFertiliser
  Experiment StageTest
    Factors
      Permutation
        Factor EstabAt
          Specification=[CropManagement].Script.EstablishStage = Seed, Emergence, Seedling
        Factor HarvAt
          Specification=[CropManagement].Script.HarvestStage = Vegetative, EarlyReproductive, MidReproductive, LateReproductive, Maturity, Ripe
    Simulation SCRUMTestBase2
      Weather: FileName=%root%/Tests/WeatherFiles/lincoln.met; Latitude=-43.38; Tav=11.4; Amp=11.5
      Clock: Start=1998-10-14; End=1999-07-01
      Summary
      SoilArbitrator Soil Arbitrator
      Zone Field: Area=1; Slope=0; AspectAngle=0; Altitude=50
        Soil: Latitude=0; Longitude=0
          Chemical: same as SCRUMSownSelf.Field.Soil.Chemical
          Water: Thickness=[100, 200, 300, 300, 300, 300]; InitialValues=[0.33, 0.33, 0.31, 0.15, 0.1, 0.06]; InitialPAWmm=180; RelativeTo=LL15; FilledFromTop=false
          Physical
            Thickness  ParticleSizeSand  ParticleSizeSilt  ParticleSizeClay  Rocks     BD   AirDry  LL15  DUL   SAT
            100        5                 65                30                0         1.2  0.08    0.13  0.33  0.5
            200        5                 65                30                0         1.2  0.13    0.13  0.33  0.5
            300        5                 65                30                0.135336  1.2  0.1     0.1   0.31  0.44
            300        5                 65                30                0         1.2  0.06    0.06  0.31  0.46
            300        5                 65                30                0.135336  1.2  0.04    0.04  0.31  0.44
            300        5                 65                30                0.135336  1.2  0.02    0.02  0.31  0.44
            Rocks, ParticleSizeSand, ParticleSizeSilt, ParticleSizeClay source: Calculated
            SoilCrop SCRUMSoil: LL=[0.13, 0.13, 0.1, 0.08, 0.11, 0.11]; KL=[0.1, 0.1, 0.1, 0.1, 0.1, 0.1]; XF=[1, 1, 1, 1, 1, 1]
            SoilCrop PotatoSoil: LL=[0.13, 0.13, 0.27, 0.27, 0.3, 0.3]; KL=[0.1, 0.06, 0.03, 0.01, 0, 0]; XF=[1, 1, 0.1, 0, 0, 0]
          WaterBalance SoilWater: same as SCRUMSownSelf.Field.Soil.SoilWater
          Nutrient
          Organic: same as SCRUMSownSelf.Field.Soil.Organic
          LayerStructure
            Thickness=[100, 100, 100, 100, 100, 100, 100, 100, 100, 100, 100, 100, 100, 100, 100]
          Solute NO3: Thickness=[100, 200, 300, 300, 300, 300]; InitialValues=[1225, 12.5, 1.389, 1.389, 0, 0]; InitialValuesUnits=ppm; WaterTableConcentration=0; D0=0; DepthConstant=0; MaxDepthSoluteAccessible=0; RunoffEffectivenessAtMovingSolute=0; MaxEffectiveRunoff=0
          Solute NH4: same as SCRUMSownSelf.Field.Soil.NH4
          Solute Urea: same as SCRUMSownSelf.Field.Soil.Urea
          SoilTemperature Temperature
        SurfaceOrganicMatter: InitialResidueName=wheat; InitialResidueType=wheat; InitialResidueMass=2000; InitialStandingFraction=0; InitialCPR=0; InitialCNR=80
        MicroClimate: a_interception=0; b_interception=1; c_interception=0; d_interception=0; SoilHeatFluxFraction=0.4; MinimumHeightDiffForNewLayer=0; NightInterceptionFraction=0.5; ReferenceHeight=2
        Plant SCRUM
        Irrigation
        Fertiliser
        Manager CropManagement
          CropName = SCRUM_Wheat
          EstablishDate = 14/10/1998
          EstablishStage = Seedling
          PlantingDepth = 20
          HarvestTimeOption = SettingThermalTime
          HarvestDate = 04/01/1999 00:00:00
          Tt_EstablishToHarvest = 1000
          HarvestStage = Maturity
          ExpectedYield = 10
          FieldLoss = 0
          ResidueRemoval = 0
          ResidueIncorporation = 0
          ResidueIncorporationDepth = 0
          script: same as in SCRUMSownSelf.Field.CropManagement
        Manager AutomaticIrrigation: same as SCRUMSownSelf.Field.AutomaticIrrigation
        Manager AutomaticFertiliser
          FertiliserIsEnabled = True
          SeasonStartDate = 1-Aug
          SeasonEndDate = 30-Apr
          OnlyApplyOntoCrop = False
          SeasonsAllocation = 1000
          TriggerSoilN = 100
          AmountToApply = 100
          FertiliserType = UreaN
          ReturnDays = 3
          DepthToMonitor = 300
          LimitMonitoringDepth = False
          script: same as in SCRUMSownSelf.Field.AutomaticFertiliser
        Report Report1: EventNames=[Clock].DoReport
          VariableNames:
            [Clock].Today
            [Soil].SoilWater.Drainage
            [Soil].SoilWater.Runoff
            [Soil].SoilWater.Eo
            [Soil].SoilWater.Es
            [Soil].SoilWater.pond
            [Soil].Water.MM
            [Soil].NO3.kgha
            [SCRUM].AboveGround.NConc
            [SCRUM].Stover.Photosynthesis.UnStressedBiomass.Integral
            [SCRUM].Stover.Live.Wt
            [SCRUM].Root.Live.Wt
            [SCRUM].Product.Live.Wt
            [SCRUM].Stover.Live.N
            [SCRUM].Root.Live.N
            [SCRUM].Product.Live.N
            [SCRUM].Stover.Live.NConc
            [SCRUM].Root.Live.NConc
            [SCRUM].Product.Live.NConc
            [SCRUM].Root.WaterUptake
            [SCRUM].Stover.Transpiration
            [SCRUM].Stover.WaterDemand
            [SCRUM].Root.Depth
            [SCRUM].Stover.CoverTotal
            [SCRUM].Stover.CoverDead
            [SCRUM].Stover.CoverGreen
            [SCRUM].Stover.LAI
            [SCRUM].Stover.LAIDead
            [SCRUM].Stover.Height
            [SCRUM].Stover.Photosynthesis
            [SCRUM].Arbitrator.N.TotalPlantDemand
            [SCRUM].Arbitrator.N.TotalPlantSupply
            [SCRUM].Stover.Fw
            [SCRUM].Stover.Fn
            [SCRUM].Total.Wt
            [SCRUM].Total.N
            [SCRUM].TotalDMAtHarvest
            [SCRUM].Arbitrator.DM.TotalFixationSupply
            [SCRUM].Arbitrator.DM.TotalPlantDemand
            [SCRUM].Phenology.AccumulatedEmergedTt
            [SCRUM].Phenology.AccumulatedTt
            [SCRUM].Arbitrator.DM.SinkLimitation
            [SCRUM].Arbitrator.DM.NutrientLimitation
            [SCRUM].Phenology.ThermalTime
            [SCRUM].Phenology.CurrentPhase.Name
            [SCRUM].Phenology.Stage
            [SCRUM].Phenology.CurrentStageName
            [AutomaticIrrigation].Script.MonitoredLayerTarget
            [AutomaticIrrigation].Script.MonitoredLayerTrigger
            [AutomaticIrrigation].Script.MonitoredLayerSW
            [AutomaticIrrigation].Script.MonitoredLayerDUL
            [Irrigation].IrrigationApplied
            [AutomaticIrrigation].Script.AmountToApply
            [SCRUM].Arbitrator.FN
            [SCRUM].Arbitrator.N.TotalPlantSupply
            [SCRUM].Product.DMDemands.Structural.DMDemandFunction.PartitionFraction
            [SCRUM].Stover.DMDemands.Structural.DMDemandFunction.PartitionFraction
            [SCRUM].Root.DMDemands.Structural.DMDemandFunction.PartitionFraction
        Manager EndSim
```csharp
using System;
using Models.Core;
using Models.Interfaces;
using Models.Soils.Nutrients;
using Models.PMF;
using APSIM.Shared.Utilities;
using Models.PMF.SimplePlantModels;

namespace Models
{
    [Serializable]
    public class Script : Model
    {
        [Link] IClock clock;
        [Link] ISummary Summary;
        [Link] private Simulation sim;
        [Link] private ScrumCropInstance sm;
        
        [EventSubscribe("DoManagement")]
        private void OnDoManagement(object sender, EventArgs e)
        {
            
            if (clock.Today == sm.HarvestDate)
            {
                sim.Set("Clock.EndDate", clock.Today.AddDays(1));
            }
        }
    }
}
```
        ScrumCropInstance SCRUM_Wheat: HarvestIndex=0.5; MoistureContent=0; RootProportion=0.1; MaxRootDepth=3000; MaxHeight=1000; MaxCover=0.97; ExtinctionCoefficient=0.7; TypicalHarvestStage=Ripe; SeedlingNConc=0.05; ProductHarvestNConc=0.02; StoverHarvestNConc=0.01; RootNConc=0.01; LegumeFactor=0; BaseTemperature=0; OptimumTemperature=30; MaxTemperature=40; Tt_SowToEmergence=150; GSMax=0.008; R50=150; ConsiderWaterStress=true; EstablishDate=1998-10-14; EstablishStage=Seedling; PlantingDepth=20; ExpectedYield=10; Tt_EstablishmentToHarvest=1000; HarvestStage=Maturity; FieldLoss=0; ResidueRemoval=0; ResidueIncorporation=0; ResidueIncorporationDepth=0; Factor_XoBiomass=0.5; Factor_bBiomass=0.2; Factor_XoCover=0.4; Factor_bCover=0.2; Factor_XoHeight=0.7; Factor_bHeight=0.2; Tt_EmergencetoMaturity=0
  Experiment ForageVsSeed
    Factors
      Permutation
        Factor HarvestStage
          CompositeFactor Grain
            Specifications:
              [Oat].TypicalHarvestStage = Ripe
              [Oat].HarvestIndex = 0.50
              [Oat].MoistureContent = 0.14
              [Oat].ProductHarvestNConc = 0.015
              [CropManagement].Script.EstablishDate = 1998-05-14
              [CropManagement].Script.HarvestDate = 1999-01-01
              [CropManagement].Script.HarvestStage = Ripe
              [CropManagement].Script.ExpectedYield = 10.0
          CompositeFactor Forage
            Specifications:
              [Oat].TypicalHarvestStage = Vegetative
              [Oat].HarvestIndex = 0.95
              [Oat].MoistureContent = 0.0
              [Oat].ProductHarvestNConc = 0.017
              [CropManagement].Script.EstablishDate = 1998-05-14
              [CropManagement].Script.HarvestDate = 1998-10-08
              [CropManagement].Script.HarvestStage = Vegetative
              [CropManagement].Script.ExpectedYield = 10.6
    Simulation EndUseTest
      Weather: FileName=%root%/Tests/WeatherFiles/lincoln.met; Latitude=-43.38; Tav=11.4; Amp=11.5
      Clock: Start=1998-05-14; End=1999-03-01
      Summary
      SoilArbitrator Soil Arbitrator
      Zone Field: Area=1; Slope=0; AspectAngle=0; Altitude=50
        Soil: Latitude=0; Longitude=0
          Chemical: same as SCRUMSownSelf.Field.Soil.Chemical
          Water: Thickness=[100, 200, 300, 300, 300, 300]; InitialValues=[0.33, 0.33, 0.31, 0.15, 0.1, 0.06]; InitialPAWmm=180; RelativeTo=LL15; FilledFromTop=false
          Physical
            Thickness  ParticleSizeSand  ParticleSizeSilt  ParticleSizeClay  Rocks  BD   AirDry  LL15  DUL   SAT
            100        5                 65                30                0      1.2  0.08    0.13  0.33  0.5
            200        5                 65                30                0      1.2  0.13    0.13  0.33  0.5
            300        5                 65                30                0.135  1.2  0.1     0.1   0.31  0.44
            300        5                 65                30                0      1.2  0.06    0.06  0.15  0.46
            300        5                 65                30                0.135  1.2  0.04    0.04  0.1   0.44
            300        5                 65                30                0.135  1.2  0.02    0.02  0.06  0.44
            Rocks, ParticleSizeSand, ParticleSizeSilt, ParticleSizeClay source: Calculated
            SoilCrop SCRUMSoil: LL=[0.13, 0.13, 0.1, 0.08, 0.11, 0.11]; KL=[0.1, 0.1, 0.1, 0.1, 0.1, 0.1]; XF=[1, 1, 1, 1, 1, 1]
            SoilCrop PotatoSoil: LL=[0.13, 0.13, 0.27, 0.27, 0.3, 0.3]; KL=[0.1, 0.06, 0.03, 0.01, 0, 0]; XF=[1, 1, 0.1, 0, 0, 0]
          WaterBalance SoilWater: same as SCRUMSownSelf.Field.Soil.SoilWater
          Nutrient
          Organic: same as SCRUMSownSelf.Field.Soil.Organic
          LayerStructure
            Thickness=[100, 100, 100, 100, 100, 100, 100, 100, 100, 100, 100, 100, 100, 100, 100]
          Solute NO3: same as SCRUMSinglePlantingFromManager.Field.Soil.NO3
          Solute NH4: same as SCRUMSownSelf.Field.Soil.NH4
          Solute Urea: same as SCRUMSownSelf.Field.Soil.Urea
          SoilTemperature Temperature
        SurfaceOrganicMatter: InitialResidueName=wheat; InitialResidueType=wheat; InitialResidueMass=2000; InitialStandingFraction=0; InitialCPR=0; InitialCNR=80
        MicroClimate: a_interception=0; b_interception=1; c_interception=0; d_interception=0; SoilHeatFluxFraction=0.4; MinimumHeightDiffForNewLayer=0; NightInterceptionFraction=0.5; ReferenceHeight=2
        Plant SCRUM
        Irrigation
        Fertiliser
        Manager CropManagement
          CropName = Oat
          EstablishDate = 14/05/1998
          EstablishStage = Seed
          PlantingDepth = 15
          HarvestTimeOption = SettingDate
          HarvestDate = 01/01/1999 00:00:00
          Tt_EstablishToHarvest = 1000
          HarvestStage = Ripe
          ExpectedYield = 10
          FieldLoss = 0
          ResidueRemoval = 0
          ResidueIncorporation = 0
          ResidueIncorporationDepth = 0
          script: same as in SCRUMSownSelf.Field.CropManagement
        Manager AutomaticIrrigation: same as SCRUMSownSelf.Field.AutomaticIrrigation
        Manager AutomaticFertiliser: same as SCRUMSownSelf.Field.AutomaticFertiliser
        Report Report2: EventNames=[Clock].DoReport
          VariableNames:
            [Clock].Today
            [Soil].SoilWater.Drainage
            [Soil].SoilWater.Runoff
            [Soil].SoilWater.Eo
            [Soil].SoilWater.Es
            [Soil].SoilWater.pond
            [Soil].Water.MM
            [Soil].NO3.kgha
            [SCRUM].Stover.Live.Wt
            [SCRUM].Root.Live.Wt
            [SCRUM].Product.Live.Wt
            [SCRUM].Stover.Live.N
            [SCRUM].Root.Live.N
            [SCRUM].Product.Live.N
            [SCRUM].Stover.Live.NConc
            [SCRUM].Root.Live.NConc
            [SCRUM].Product.Live.NConc
            [SCRUM].Root.WaterUptake
            [SCRUM].Stover.Transpiration
            [SCRUM].Stover.WaterDemand
            [SCRUM].Root.Depth
            [SCRUM].Stover.CoverTotal
            [SCRUM].Stover.CoverDead
            [SCRUM].Stover.CoverGreen
            [SCRUM].Stover.LAI
            [SCRUM].Stover.LAIDead
            [SCRUM].Stover.Height
            [SCRUM].Arbitrator.N.TotalPlantDemand
            [SCRUM].Arbitrator.N.TotalPlantSupply
            [SCRUM].Stover.Fw
            [SCRUM].Stover.Fn
            [SCRUM].Total.Wt
            [SCRUM].Total.N
            [SCRUM].Arbitrator.DM.TotalFixationSupply
            [SCRUM].Arbitrator.DM.TotalPlantDemand
            [SCRUM].Phenology.AccumulatedEmergedTt
            [SCRUM].Phenology.AccumulatedTt
            [SCRUM].Arbitrator.DM.SinkLimitation
            [SCRUM].Arbitrator.DM.NutrientLimitation
            [SCRUM].Phenology.ThermalTime
            [SCRUM].Phenology.CurrentPhase.Name
            [SCRUM].Phenology.Stage
            [SCRUM].Phenology.CurrentStageName
            [AutomaticIrrigation].Script.MonitoredLayerTarget
            [AutomaticIrrigation].Script.MonitoredLayerTrigger
            [AutomaticIrrigation].Script.MonitoredLayerSW
            [AutomaticIrrigation].Script.MonitoredLayerDUL
            [Irrigation].IrrigationApplied
            [AutomaticIrrigation].Script.AmountToApply
            [SCRUM].Arbitrator.FN
            [SCRUM].Arbitrator.N.TotalPlantSupply
            [SCRUM].Product.DMDemands.Structural.DMDemandFunction.PartitionFraction
            [SCRUM].Stover.DMDemands.Structural.DMDemandFunction.PartitionFraction
            [SCRUM].Root.DMDemands.Structural.DMDemandFunction.PartitionFraction
        ScrumCropInstance Oat: HarvestIndex=0.45; MoistureContent=0.14; RootProportion=0.1; MaxRootDepth=1000; MaxHeight=700; MaxCover=0.97; ExtinctionCoefficient=0.8; TypicalHarvestStage=Maturity; SeedlingNConc=0.05; ProductHarvestNConc=0.03; StoverHarvestNConc=0.02; RootNConc=0.01; LegumeFactor=0; BaseTemperature=5; OptimumTemperature=30; MaxTemperature=40; Tt_SowToEmergence=0; GSMax=0.008; R50=150; ConsiderWaterStress=true; EstablishDate=1998-05-14; EstablishStage=Seed; PlantingDepth=15; ExpectedYield=10; HarvestDate=1999-02-01; Tt_EstablishmentToHarvest=0; HarvestStage=Ripe; FieldLoss=0; ResidueRemoval=0; ResidueIncorporation=0; ResidueIncorporationDepth=0; Factor_XoBiomass=0.5; Factor_bBiomass=0.2; Factor_XoCover=0.4; Factor_bCover=0.2; Factor_XoHeight=0.7; Factor_bHeight=0.2; Tt_EmergencetoMaturity=0
  Experiment TypicalHarvestStage
    Factors
      Permutation
        Factor HarvestStage
          CompositeFactor Ripe: Specifications=[Oat].TypicalHarvestStage = Ripe
          CompositeFactor Vegetative: Specifications=[Oat].TypicalHarvestStage = Vegetative
    Simulation HarvStageTest
      Weather: FileName=%root%/Tests/WeatherFiles/lincoln.met; Latitude=-43.38; Tav=11.4; Amp=11.5
      Clock: Start=1998-05-14; End=1999-03-01
      Summary
      SoilArbitrator Soil Arbitrator
      Zone Field: Area=1; Slope=0; AspectAngle=0; Altitude=50
        Soil: same as SCRUMSinglePlantingFromManager.Field.Soil
        SurfaceOrganicMatter: InitialResidueName=wheat; InitialResidueType=wheat; InitialResidueMass=2000; InitialStandingFraction=0; InitialCPR=0; InitialCNR=80
        MicroClimate: a_interception=0; b_interception=1; c_interception=0; d_interception=0; SoilHeatFluxFraction=0.4; MinimumHeightDiffForNewLayer=0; NightInterceptionFraction=0.5; ReferenceHeight=2
        Plant SCRUM
        Irrigation
        Fertiliser
        Manager CropManagement
          CropName = Oat
          EstablishDate = 14/05/1998
          EstablishStage = Seed
          PlantingDepth = 15
          HarvestTimeOption = SettingDate
          HarvestDate = 02/01/1999 00:00:00
          Tt_EstablishToHarvest = 1000
          HarvestStage = Ripe
          ExpectedYield = 10
          FieldLoss = 0
          ResidueRemoval = 0
          ResidueIncorporation = 0
          ResidueIncorporationDepth = 0
          script: same as in SCRUMSownSelf.Field.CropManagement
        Manager AutomaticIrrigation: same as SCRUMSownSelf.Field.AutomaticIrrigation
        Manager AutomaticFertiliser
          FertiliserIsEnabled = True
          SeasonStartDate = 1-Aug
          SeasonEndDate = 30-Apr
          OnlyApplyOntoCrop = False
          SeasonsAllocation = 1000
          TriggerSoilN = 100
          AmountToApply = 25
          FertiliserType = UreaN
          ReturnDays = 3
          DepthToMonitor = 300
          LimitMonitoringDepth = False
          script: same as in SCRUMSownSelf.Field.AutomaticFertiliser
        Report Report3: same as ForageVsSeed.EndUseTest.Field.Report2
        ScrumCropInstance Oat: same as ForageVsSeed.EndUseTest.Field.Oat
  Experiment Lincoln2012
    Memo
      Testing of SCRUM under New Zealand conditions was undertaken using the data Maize data of Teixeira et al (2014).  This dataset includes the impact of three N (0 to 250 kg/ha N) and two water regimes (dryland and fully irrigated) using a rain-shelter structure.  Observations include biomass and nitrogen accumulation, soil water contents. Total biomass ranged from 8000 kg/ha for dryland nil N crops to up to 28000kg/ha for fully irrigated and N fertilised crops.  Dryland crops recovered 25 percent less N from applied fertilizer than irrigated crops.  The expected yields were set to 18 t/ha (the yield achieved in the fully irrigation Med N plots) for all treatments and the simple N and water responses of SCRUM were allowed to predict treatment effects.  The three graphs below show that SCRUM gave adequate estimations of biomass and N accumulations in respone to irrigation and fertiliser treatments and adequate estimations of soil water content.  This suggests Scum is suitable for its intended purpose of providing realistic N and water uptake patterns for N and water balance studies.

      See details Teixeira et al 2014- http://dx.doi.org/10.1016/j.fcr.2014.08.002
    Factors
      Permutation
        Factor Nit: Specification=[Fert]
          Operations Nil
            2012-11-15  [Fertiliser].Apply(0, "UreaN", 10);
            2012-12-20  [Fertiliser].Apply(0, "UreaN", 10);
            2013-01-31  [Fertiliser].Apply(0, "UreaN", 10);
          Operations Low
            2012-11-15  [Fertiliser].Apply(25, "UreaN", 10);
            2012-12-20  [Fertiliser].Apply(50, "UreaN", 10);
          Operations Med
            2012-11-15  [Fertiliser].Apply(50, "UreaN", 10);
            2012-12-20  [Fertiliser].Apply(100, "UreaN", 10);
            2013-01-31  [Fertiliser].Apply(100, "UreaN", 10);
        Factor Irr: Specification=[Irrig]
          Operations Full
            2012-10-24  [Irrigation].Apply(16);
            2012-10-26  [Irrigation].Apply(10);
            2012-11-03  [Irrigation].Apply(13);
            2012-11-11  [Irrigation].Apply(19.5);
            2012-11-15  [Irrigation].Apply(3.1);
            2012-11-23  [Irrigation].Apply(20);
            2012-11-29  [Irrigation].Apply(20);
            2012-11-30  [Irrigation].Apply(30);
            2012-12-13  [Irrigation].Apply(19);
            2012-12-20  [Irrigation].Apply(26);
            2012-12-20  [Irrigation].Apply(4);
            2012-12-27  [Irrigation].Apply(22);
            2013-01-03  [Irrigation].Apply(39.7);
            2013-01-10  [Irrigation].Apply(42.1);
            2013-01-17  [Irrigation].Apply(46.2);
            2013-01-24  [Irrigation].Apply(44.7);
            2013-01-31  [Irrigation].Apply(49.0);
            2013-02-07  [Irrigation].Apply(37);
            2013-02-14  [Irrigation].Apply(38);
            2013-02-21  [Irrigation].Apply(38);
            2013-02-28  [Irrigation].Apply(33.4);
            2013-03-07  [Irrigation].Apply(39.7);
            2013-03-14  [Irrigation].Apply(31.3);
            2013-03-21  [Irrigation].Apply(24);
            2013-03-28  [Irrigation].Apply(34);
            2013-04-04  [Irrigation].Apply(27.5);
          Operations Nil
            2012-10-24  [Irrigation].Apply(16);
            2012-10-26  [Irrigation].Apply(10);
            2012-11-03  [Irrigation].Apply(13);
            2012-11-11  [Irrigation].Apply(19.5);
            2012-11-15  [Irrigation].Apply(3.1);
            2012-11-23  [Irrigation].Apply(25);
            2012-11-29  [Irrigation].Apply(25);
            2012-12-20  [Irrigation].Apply(4);
            2013-01-31  [Irrigation].Apply(4.3);
    Simulation Lincoln2012
      Weather: FileName=%root%/Tests/Validation/Maize/lincoln.met; Latitude=-43.63; Tav=11.4; Amp=11.5
      Clock: Start=2012-10-01; End=2013-04-25
      Summary summaryfile
      SoilArbitrator Soil Arbitrator
      Zone RainShelter: Area=1; Slope=0; AspectAngle=0; Altitude=50
        Manager CropManagement
          CropName = Scrum_Maize
          EstablishDate = 23/10/2012
          EstablishStage = Seed
          PlantingDepth = 20
          HarvestTimeOption = SettingDate
          HarvestDate = 04/25/2013 00:00:00
          Tt_EstablishToHarvest = 1000
          HarvestStage = Maturity
          ExpectedYield = 16
          FieldLoss = 0
          ResidueRemoval = 0
          ResidueIncorporation = 0
          ResidueIncorporationDepth = 0
          script: same as in SCRUMSownSelf.Field.CropManagement
        Manager ClimateControl
          StartDate = 10/23/2012 00:00:00
          EndDate = 04/10/2013 00:00:00
```csharp
using Models.Soils;
using System.Xml.Serialization;
using Models;
using Models.PMF;
using System.Text;
using System.Collections.Generic;
using APSIM.Shared.Utilities;
using Models.Core;
using System;
using Models.Climate;

namespace Models
{
    [Serializable] 
    [System.Xml.Serialization.XmlInclude(typeof(Model))]
    public class Script : Model
    {
        [Link] Weather Met;
        [Link] Clock Clock;
    
        [Description("Start Date")]
        public DateTime StartDate { get; set; }
        
        [Description("End Date")]
        public DateTime EndDate { get; set; }
 
    
        [EventSubscribe("PreparingNewWeatherData")]
        private void OnPreparingNewWeatherData(object sender, EventArgs e)
        {
            if ((Clock.Today.Date >= StartDate) && (Clock.Today.Date <= EndDate))
                Met.Rain = 0;        
        }
    }
}
```
        Manager ExtraVariables
```csharp
using Newtonsoft.Json;
using Models.PMF.Organs;
using Models.Interfaces;
using System;
using Models.Core;
using System.Collections.Generic;
using System.Text;
using Models.Soils;
using Models.Soils.Nutrients;
using Models.PMF;
using Models;
using System.Xml.Serialization;
using APSIM.Shared.Utilities;
using Models.Climate;

namespace Models
{
    [Serializable] 
    public class Script : Model
    {
        [Link] private Clock Clock;
        [Link] private Weather Met;
        [Link] private Fertiliser Fert;
        [Link] private Irrigation Irrig;
        [Link] private Plant SCRUM;
        [Link] private Zone zone;
        [Link(ByName = true)]
        private ISolute Urea;
        [Link(ByName = true)]
        private ISolute NO3;
        [Link(ByName = true)]
        private ISolute NH4;
        [Link]
        private Nutrient SoilNitrogen;
        [Link] private Soils.Soil Soil;
        [Link] private Models.Surface.SurfaceOrganicMatter SOM;
        [Link(Type = LinkType.Path, Path = "[SCRUM].Root")]
        private Root root;
        [Link]
        private IPhysical soilPhysical;
        [Link]
        private ISoilWater waterBalance;
        [Link(Type=LinkType.Path, Path="[SurfaceOrganicMatter].SurfaceResidue.Decomposition")] private OrganicFlow ResidueDecomposition;
        [Link]
        private Nutrient Nutrient;
        
        [JsonIgnore] public bool InitialDay { get; set; }
        
        [JsonIgnore] public double AccumPlantN { get; set; }
        [JsonIgnore] public double AccumMineralisation { get; set; }
        [JsonIgnore] public double AccumDenit { get; set; }
        [JsonIgnore] public double AccumFert { get; set; }
        [JsonIgnore] public double AccumLeach { get; set; }
        [JsonIgnore] public double AccumDetach { get; set; }
        [JsonIgnore] public double DeltaSoilOMN { get; set; }
        [JsonIgnore] public double DeltaSurfaceOMN { get; set; }
        [JsonIgnore] public double DeltaSoilMineralN { get; set; }
        [JsonIgnore] public double SoilNitrogenContent { get; set; }
        
        [JsonIgnore] public double AccumEO { get; set; }
        [JsonIgnore] public double AccumEP { get; set; }
        [JsonIgnore] public double AccumES { get; set; }
        [JsonIgnore] public double AccumDrainage { get; set; }
        [JsonIgnore] public double AccumRunoff { get; set; }
        [JsonIgnore] public double AccumOutflowLat { get; set; }
        [JsonIgnore] public double AccumIrrigation { get; set; }
        [JsonIgnore] public double AccumRainfall { get; set; }
        [JsonIgnore] public double SoilWaterDeficit { get; set; }
    
        [JsonIgnore] public double  InitialSoilOMN { get; set; }
        [JsonIgnore] public double  InitialSurfaceOMN { get; set; }
        [JsonIgnore] public double  InitialMineralN { get; set; }
        
        [JsonIgnore] public double SWC { get; set; }
        [JsonIgnore] public double DUL { get; set; }
        [JsonIgnore] public double OutFlowLat { get; set; }

        [JsonIgnore] public double FomN { get; set; }
        [JsonIgnore] public double BiomN { get; set; }
        [JsonIgnore] public double HumN { get; set; }
        [JsonIgnore] public double OrganicN { get; set; }
        [JsonIgnore] public double NO3N { get; set; }
        [JsonIgnore] public double NH4N { get; set; }
        [JsonIgnore] public double UreaN { get; set; }
        [JsonIgnore] public double MineralN { get; set; }
        [JsonIgnore] public double DltNMinRes { get; set; }
        [JsonIgnore] public double DltNMinTot { get; set; }
        
        [JsonIgnore] public double StoverExpandedPosition { get; set; }
        [JsonIgnore] public double StoverAppearedPosition { get; set; }
        [JsonIgnore] public double ExpandedStoverNoYesterday { get; set; }
        [JsonIgnore] public double AppearedStoverNoYesterday { get; set; }
        [JsonIgnore] public double MostRecentlyExpandedStoverSize { get; set; }
        [JsonIgnore] public double MostRecentlyAppearedStoverMaxSize { get; set; }
        
        [EventSubscribe("StartOfSimulation")]
        private void OnSimulationCommencing(object sender, EventArgs e)
        {
            InitialDay = true;
            StoverExpandedPosition = 0;
            StoverAppearedPosition = 0;
            ExpandedStoverNoYesterday = 0;
            AppearedStoverNoYesterday = 0;
            MostRecentlyExpandedStoverSize = 0;
            MostRecentlyAppearedStoverMaxSize = 0;
        }
        
        [EventSubscribe("DoManagement")]
        private void OnDoManagement(object sender, EventArgs e)
        {
            //!!!!!! Nitrogen balance components !!!!!!
            //!!!!!!^^^^^^^^^^^^^^^^^^^^^^^^^^^^^!!!!!!
            FomN = MathUtilities.Sum(SoilNitrogen.FOM.N);
            HumN = MathUtilities.Sum(SoilNitrogen.Humic.N);
            BiomN = MathUtilities.Sum(SoilNitrogen.Microbial.N);
            OrganicN = FomN + HumN + BiomN;
            NO3N = MathUtilities.Sum(NO3.kgha);
            NH4N = MathUtilities.Sum(NH4.kgha);
            UreaN = MathUtilities.Sum(Urea.kgha);
            MineralN = NO3N + NH4N + UreaN; 
            DltNMinRes = MathUtilities.Sum(ResidueDecomposition.MineralisedN);
            DltNMinTot = MathUtilities.Sum(Nutrient.MineralisedN);
            int layers = soilPhysical.Thickness.Length;
            if (InitialDay == true)
            {
                InitialSurfaceOMN = SOM.N;
                InitialSoilOMN = OrganicN;
                InitialMineralN = MineralN;
                InitialDay = false;
            }
            AccumFert += Fert.NitrogenApplied;
            DeltaSurfaceOMN = SOM.N - InitialSurfaceOMN;
            AccumLeach = AccumLeach - waterBalance.LeachNH4 - waterBalance.LeachNO3 - waterBalance.LeachUrea; //Fails
            AccumMineralisation += MathUtilities.Sum(Nutrient.MineralisedN);
            AccumDenit -= MathUtilities.Sum(SoilNitrogen.DenitrifiedN);
            AccumPlantN -= (double)zone.Get("SCRUM.Root.NUptake");
            DeltaSoilOMN = OrganicN - InitialSoilOMN;
            DeltaSoilMineralN = MineralN - InitialMineralN;
            SoilNitrogenContent = MineralN;
            
            //!!!!!! Water balance components !!!!!!
            //!!!!!!^^^^^^^^^^^^^^^^^^^^^^^^^^!!!!!!

            AccumIrrigation += Irrig.IrrigationApplied;
            AccumRainfall += Met.Rain;
            //AccumEP -= (double)zone.Get("[SCRUM].Stover.Transpiration");
            AccumEP -= (double)zone.Get("SCRUM.Root.WaterUptake");
            SoilWaterDeficit = (SWC - DUL);
            double OutFlowLat = MathUtilities.Sum(waterBalance.LateralOutflow);
            AccumOutflowLat -= OutFlowLat;
            
        }
        
        [EventSubscribe("DoManagementCalculations")]
        private void OnDoManagementCalculations(object sender, EventArgs e)
        {
            FomN = MathUtilities.Sum(SoilNitrogen.FOM.N);
            HumN = MathUtilities.Sum(SoilNitrogen.Humic.N);
            BiomN = MathUtilities.Sum(SoilNitrogen.Microbial.N);
            
            
            AccumEO -= waterBalance.Eo;
            AccumES -= waterBalance.Es; 
            AccumDrainage -= waterBalance.Drainage;
            AccumRunoff -= waterBalance.Runoff;
            SWC = MathUtilities.Sum(waterBalance.SWmm);
            DUL = MathUtilities.Sum(soilPhysical.DULmm);
            
            
            
        }
    }
}
```
        Operations Irrig
        Operations Fert
        MicroClimate: a_interception=0; b_interception=1; c_interception=0; d_interception=0; SoilHeatFluxFraction=0.4; MinimumHeightDiffForNewLayer=0; NightInterceptionFraction=0.5; ReferenceHeight=2
        Irrigation
        Fertiliser
        SurfaceOrganicMatter: InitialResidueName=wheat; InitialResidueType=wheat; InitialResidueMass=500; InitialStandingFraction=0; InitialCPR=0; InitialCNR=50
        Soil Paparua_silt_loam: SoilType=Silt_Loam; Region=Generic soil types; State=Canterbury; Latitude=999999; Longitude=999999
          DataSource=Profile descriptions provided by Trevor Webb and data for functional horizions based on SWAMP project results
          Physical
            Thickness  ParticleSizeSand  ParticleSizeSilt  ParticleSizeClay  Rocks  BD     AirDry  LL15   DUL    SAT    KS
            200        14.5              65.5              20                0      1.311  0.06    0.104  0.285  0.456  4500
            200        26.5              60.5              13                0      1.474  0.08    0.137  0.278  0.428  4000
            200        15                66                19                0      1.601  0.09    0.13   0.273  0.376  90
            200        50                45                5                 0      1.68   0.1     0.141  0.255  0.333  250
            200        45.931            49.032            5.037             0      1.553  0.1     0.123  0.217  0.333  3500
            200        43.896            51.048            5.056             10     1.374  0.1     0.117  0.205  0.35   5000
            200        41.861            53.064            5.075             20     1.32   0.1     0.116  0.203  0.367  7500
            200        37.792            57.096            5.112             30     1.15   0.1     0.115  0.21   0.389  7500
            400        37.792            57.096            5.112             30     1.15   0.1     0.113  0.2    0.4    7500
            SoilCrop SCRUMSoil
              LL=[0.104, 0.137, 0.13, 0.141, 0.123, 0.117, 0.116, 0.115, 0.113]
              KL=[0.1, 0.1, 0.1, 0.1, 0.1, 0.1, 0.1, 0.1, 0.05]
              XF=[1, 1, 0.5, 0.75, 1, 1, 1, 1, 1]
          WaterBalance SoilWater: SummerDate=1-Nov; SummerU=9; SummerCona=6; WinterDate=1-Apr; WinterU=6; WinterCona=4; DiffusConst=88; DiffusSlope=35; Salb=0.13; CN2Bare=73; CNRed=20; CNCov=0.8; PSIDul=-100; Thickness=[200, 200, 200, 200, 200, 200, 200, 200]; SWCON=[0.6, 0.55, 0.4, 0.65, 0.72, 0.76, 0.74, 0.8]
          Organic: FOMCNRatio=16; CarbonUnits=Total
            Thickness  Carbon  SoilCNRatio  FBiom  FInert  FOM
            200        3.6     11           0.03   0.3     1000
            200        2       11           0.02   0.4     500
            200        0.42    11           0.01   0.8     300
            300        0.23    11           0.01   0.9     100
            300        0.23    11           0.01   0.9     100
            300        0.23    11           0.01   0.9     100
          Chemical: Thickness=[200, 200, 200, 300, 300, 300, 1000]; PH=[6, 6, 6, 6, 6, 6, 6]; PHUnits=Water
          Nutrient
          Water: Thickness=[200, 200, 200, 200, 200, 200, 200, 200, 400]; InitialValues=[0.06, 0.2, 0.205, 0.205, 0.21, 0.205, 0.203, 0.21, 0.2]; InitialPAWmm=137.8; RelativeTo=LL15; FilledFromTop=false
          Solute NO3: Thickness=[200, 200, 200, 300, 300, 300, 1000]; InitialValues=[6.178, 3.65, 2.445, 1.359, 0.968, 0.345, 0]; InitialValuesUnits=ppm; WaterTableConcentration=0; D0=0; DepthConstant=0; MaxDepthSoluteAccessible=0; RunoffEffectivenessAtMovingSolute=0; MaxEffectiveRunoff=0
          Solute NH4: Thickness=[200, 200, 200, 300, 300, 300, 1000]; InitialValues=[0.343, 0.991, 0.178, 0.194, 0.167, 0.107, 0.107]; InitialValuesUnits=ppm; WaterTableConcentration=0; D0=0; DepthConstant=0; MaxDepthSoluteAccessible=0; RunoffEffectivenessAtMovingSolute=0; MaxEffectiveRunoff=0
          Solute Urea: Thickness=[200, 200, 200, 300, 300, 300, 1000]; InitialValues=[0, 0, 0, 0, 0, 0, 0]; InitialValuesUnits=kg/ha; WaterTableConcentration=0; D0=0; DepthConstant=0; MaxDepthSoluteAccessible=0; RunoffEffectivenessAtMovingSolute=0; MaxEffectiveRunoff=0
          SoilTemperature Temperature
        Plant SCRUM
        ScrumCropInstance Scrum_Maize: HarvestIndex=0.5; MoistureContent=0.14; RootProportion=0.1; MaxRootDepth=1500; MaxHeight=1800; MaxCover=0.97; ExtinctionCoefficient=0.55; TypicalHarvestStage=Ripe; SeedlingNConc=0.04; ProductHarvestNConc=0.012; StoverHarvestNConc=0.008; RootNConc=0.01; LegumeFactor=0; BaseTemperature=10; OptimumTemperature=30; MaxTemperature=40; Tt_SowToEmergence=50; GSMax=0.008; R50=150; ConsiderWaterStress=true; EstablishDate=2012-10-23; EstablishStage=Seed; PlantingDepth=20; ExpectedYield=16; HarvestDate=2013-04-25; HarvestStage=Maturity; FieldLoss=0; ResidueRemoval=0; ResidueIncorporation=0; ResidueIncorporationDepth=0; Factor_XoBiomass=0.5; Factor_bBiomass=0.2; Factor_XoCover=0.4; Factor_bCover=0.2; Factor_XoHeight=0.7; Factor_bHeight=0.2; Tt_EmergencetoMaturity=0
        Report ReportRS: EventNames=[Clock].DoReport
          VariableNames:
            [Clock].Today
            [ExtraVariables].Script.AccumPlantN
            [ExtraVariables].Script.AccumMineralisation
            [ExtraVariables].Script.AccumDenit
            [ExtraVariables].Script.AccumFert
            [ExtraVariables].Script.AccumLeach
            [ExtraVariables].Script.AccumDetach
            [ExtraVariables].Script.DeltaSoilOMN
            [ExtraVariables].Script.DeltaSurfaceOMN
            [ExtraVariables].Script.DeltaSoilMineralN
            [ExtraVariables].Script.SWC
            [ExtraVariables].Script.DUL
            [ExtraVariables].Script.OutFlowLat
            [ExtraVariables].Script.AccumEO
            [ExtraVariables].Script.AccumEP
            [ExtraVariables].Script.AccumES
            [ExtraVariables].Script.AccumDrainage
            [ExtraVariables].Script.AccumRunoff
            [ExtraVariables].Script.AccumRainfall
            [ExtraVariables].Script.AccumIrrigation
            [ExtraVariables].Script.AccumOutflowLat
            [ExtraVariables].Script.SoilWaterDeficit
            [ExtraVariables].Script.SoilNitrogenContent
            [ExtraVariables].Script.FomN
            [ExtraVariables].Script.HumN
            [ExtraVariables].Script.BiomN
            [ExtraVariables].Script.DltNMinRes
            [ExtraVariables].Script.DltNMinTot
            [Soil].Water.Volumetric
            [Soil].SoilWater.Eo
            [Soil].SoilWater.Es
            [Soil].SoilWater.Drainage
            [Soil].SoilWater.Runoff
            sum([Soil].Water.MM[1:8]) as ProfileWater
            sum([Soil].Physical.SATmm[1:8]) as ProfileSAT
            sum([Soil].Physical.DULmm[1:8]) as ProfileDUL
            sum([Soil].Physical.LL15mm[1:8]) as ProfileLL15
            [Soil].NO3.kgha
            [SCRUM].Product.Live.Wt
            [SCRUM].Product.Wt
            [SCRUM].Stover.Live.Wt
            [SCRUM].Stover.Wt
            [SCRUM].Root.Live.Wt
            [SCRUM].Product.Live.N
            [SCRUM].Stover.Live.N
            [SCRUM].Root.Live.N
            [SCRUM].Root.WaterUptake
            [SCRUM].Stover.Transpiration
            [SCRUM].Stover.WaterDemand
            [SCRUM].Root.Depth
            [SCRUM].Stover.CoverTotal
            [SCRUM].Stover.LAI
            [SCRUM].Stover.Height
            [SCRUM].Phenology.Stage
            [SCRUM].AboveGround.N
            [SCRUM].AboveGround.Wt
            [SCRUM].Total.N
            [SCRUM].Total.Wt
            [SCRUM].Arbitrator.N.TotalPlantDemand
            [SCRUM].Arbitrator.N.TotalPlantSupply
            [SCRUM].Arbitrator.DM.TotalFixationSupply
            [SCRUM].Arbitrator.DM.TotalPlantDemand
            [SCRUM].Arbitrator.DM.Allocated
            [SCRUM].Arbitrator.DM.SinkLimitation
            [SCRUM].Arbitrator.DM.NutrientLimitation
            [SCRUM].Stover.MaximumNConc
            [SCRUM].Stover.MinimumNConc
            [SCRUM].Stover.Live.NConc
            [SCRUM].Stover.Live.NConc
            [SCRUM].Product.Live.NConc
            [SCRUM].Stover.Fw
            [SCRUM].Arbitrator.FN
            [SCRUM].Phenology.CurrentStageName
            [SCRUM].Stover.FRGR
            (sum([SurfaceOrganicMatter].SurfaceResidue.Decomposition.MineralisedN[1:8]) + sum([Soil].Nutrient.MineralisedN[1:8]) as NetMineralisedN
            (sum([Soil].NH4.kgha[1:8]) + sum([Soil].NO3.kgha[1:8])) as ProfileMineralN
            [SurfaceOrganicMatter].N as SurfaceOMN
            sum([Soil].Nutrient.FOM.N[1:8]) as ProfileFOMN
            sum([Soil].Nutrient.Microbial.N[1:8]) as ProfileBiomN
            sum([Soil].Nutrient.Humic.N[1:8]) as ProfileHumN
  Experiment ABlock
    Memo
      In this test we use SCRUM to represent differnt crops in two different rotation treatments (Potatoes -> Wheat -> Potatoes and Potatoes -> Peas -> Potatoes) with two irrigation (W1 and W2) and three N fertiliser treatments (N0, N1 and N2).  These rotations ran over three years and were conducted to provide data for testing N leaching predictions of different models.  SCRUM yields were set to the High N full irrigation treatment values for each crop and SCRUMs N and water responses were allowed to predict any differences in crop N uptake.  It is importnat to note that the soilN organic matter degridation coefficients were set to custom (non-release) values as this has been necessary to predict accurate N mineralisation values in new zealand arable soils.

      SCRUM gave reasionable predictions of Product N removals, soil water contents and accumulated leaching from each crop treatment.  This provides further support that SCRUM is adequate for the task of providing realistic N and Water uptakes for the purpose of N and water balance studies.
    Factors
      Permutation
        Factor Rot
          CompositeFactor PP_
            Specifications:
              [IntrumCrop].Script.CropName = Pea
              [IntrumCrop].Script.EstablishDate = 2005-09-28
              [IntrumCrop].Script.EstablishStage = Seed
              [IntrumCrop].Script.HarvestDate = 2006-02-3
              [IntrumCrop].Script.HarvestStage = Maturity
              [IntrumCrop].Script.ExpectedYield = 6
              [TreatmentID].Script.Rotation = PP
              [InF].Script.NFert = 0
              [InF].Script.Irr1 = 55
              [InF].Script.Irr2 = 0
              [InF].Script.Irr3 = 38
              [InF].Script.Irr4 = 40
          CompositeFactor PW_
            Specifications:
              [IntrumCrop].Script.CropName = Wheat
              [IntrumCrop].Script.EstablishDate = 2005-05-13
              [IntrumCrop].Script.EstablishStage = Seed
              [IntrumCrop].Script.HarvestDate = 2006-02-24
              [IntrumCrop].Script.HarvestStage = Maturity
              [IntrumCrop].Script.ExpectedYield = 15
              [TreatmentID].Script.Rotation = PW
              [InF].Script.NFert = 100
              [InF].Script.Irr1 = 94
              [InF].Script.Irr2 = 34
              [InF].Script.Irr3 = 61
              [InF].Script.Irr4 = 0
        Factor W
          CompositeFactor 1_
            Specifications:
              [Irrig]
              [TreatmentID].Script.Irrigation = W1
              [InF].Script.IrrFact1 = 0
              [InF].Script.IrrFact2 = 1
              [InF].Script.IrrFact3 = 1
              [InF].Script.IrrFact4 = 0
            Operations Irrig
              2004-12-08  [Irrigation].Apply(66);
              2005-01-05  [Irrigation].Apply(59);
              2005-01-19  [Irrigation].Apply(45);
              2005-01-26  [Irrigation].Apply(48);
              2005-02-02  [Irrigation].Apply(35);
              2005-02-09  [Irrigation].Apply(38);
              2005-02-23  [Irrigation].Apply(48);
              2005-03-02  [Irrigation].Apply(29);
              2005-11-09  [Irrigation].Apply(50);
              2005-11-30  [Irrigation].Apply(21);
              2005-12-13  [Irrigation].Apply(18);
              2005-12-21  [Irrigation].Apply(26);
              2005-12-29  [Irrigation].Apply(13);
              2006-01-05  [Irrigation].Apply(39);
              2006-01-12  [Irrigation].Apply(44);
              2006-12-20  [Irrigation].Apply(22);
              2007-01-24  [Irrigation].Apply(22);
              2007-01-25  [Irrigation].Apply(10);
              2007-01-31  [Irrigation].Apply(32);
              2007-02-07  [Irrigation].Apply(23);
              2007-02-21  [Irrigation].Apply(32);
              2007-02-28  [Irrigation].Apply(31);
          CompositeFactor 2_
            Specifications:
              [Irrig]
              [TreatmentID].Script.Irrigation = W2
              [InF].Script.IrrFact1 = 1
              [InF].Script.IrrFact2 = 0
              [InF].Script.IrrFact3 = 0
              [InF].Script.IrrFact4 = 1
            Operations Irrig
              2004-12-08  [Irrigation].Apply(66);
              2004-12-22  [Irrigation].Apply(55);
              2005-01-05  [Irrigation].Apply(102);
              2005-01-19  [Irrigation].Apply(78);
              2005-01-26  [Irrigation].Apply(76);
              2005-02-02  [Irrigation].Apply(64);
              2005-02-09  [Irrigation].Apply(67);
              2005-02-23  [Irrigation].Apply(85);
              2005-03-02  [Irrigation].Apply(50);
              2005-12-14  [Irrigation].Apply(71);
              2006-01-12  [Irrigation].Apply(68);
              2007-01-25  [Irrigation].Apply(10);
              2007-02-07  [Irrigation].Apply(60);
        Factor N
          CompositeFactor 0
            Specifications:
              [Nit]
              [TreatmentID].Script.Nitrogen = N0
              [InF].Script.TreatFact = 0
            Operations Nit
          CompositeFactor 1
            Specifications:
              [Nit]
              [TreatmentID].Script.Nitrogen = N1
              [InF].Script.TreatFact = 1
            Operations Nit
              2004-10-13  [Fertiliser].Apply(100, "UreaN", 50);
              2004-12-20  [Fertiliser].Apply(50, "UreaN", 50);
              2005-01-24  [Fertiliser].Apply(50, "UreaN", 50);
              2005-10-26  [Fertiliser].Apply(50, "UreaN", 50);
              2006-10-10  [Fertiliser].Apply(100, "UreaN", 50);
              2006-12-29  [Fertiliser].Apply(50, "UreaN", 50);
              2007-01-16  [Fertiliser].Apply(50, "UreaN", 50);
          CompositeFactor 2
            Specifications:
              [Nit]
              [TreatmentID].Script.Nitrogen = N2
              [InF].Script.TreatFact = 2
            Operations Nit
              2004-10-13  [Fertiliser].Apply(200, "UreaN", 50);
              2004-12-20  [Fertiliser].Apply(100, "UreaN", 50);
              2005-01-24  [Fertiliser].Apply(100, "UreaN", 50);
              2005-10-26  [Fertiliser].Apply(100, "UreaN", 50);
              2006-10-10  [Fertiliser].Apply(200, "UreaN", 50);
              2006-12-29  [Fertiliser].Apply(100, "UreaN", 50);
              2007-01-16  [Fertiliser].Apply(100, "UreaN", 50);
    Simulation ABlock_06_07
      Weather: FileName=%root%/Tests/WeatherFiles/lincoln.met; Latitude=-43.38; Tav=11.4; Amp=11.5
      Clock: Start=2004-10-12; End=2007-03-31
      Summary
      SoilArbitrator Soil Arbitrator
      Manager TreatmentID: same as SCRUMRotationComponent.TreatmentID
      Zone Field: Area=1; Slope=0; AspectAngle=0; Altitude=50
        Folder Management
          Operations Nit: same as ABlock.Factors.Permutation.N.1.Nit
          Operations Irrig
            2004-12-08  [Irrigation].Apply(66);
            2005-01-05  [Irrigation].Apply(59);
            2005-01-19  [Irrigation].Apply(45);
            2005-01-26  [Irrigation].Apply(48);
            2005-02-02  [Irrigation].Apply(35);
            2005-02-09  [Irrigation].Apply(38);
            2005-02-23  [Irrigation].Apply(48);
            2005-03-02  [Irrigation].Apply(29);
            2005-11-09  [Irrigation].Apply(50);
            2005-11-30  [Irrigation].Apply(21);
            2005-12-07  [Irrigation].Apply(38);
            2005-12-13  [Irrigation].Apply(18);
            2005-12-21  [Irrigation].Apply(26);
            2005-12-29  [Irrigation].Apply(13);
            2006-01-05  [Irrigation].Apply(39);
            2006-01-12  [Irrigation].Apply(44);
            2006-12-20  [Irrigation].Apply(22);
            2007-01-24  [Irrigation].Apply(22);
            2007-01-25  [Irrigation].Apply(10);
            2007-01-31  [Irrigation].Apply(32);
            2007-02-07  [Irrigation].Apply(23);
            2007-02-21  [Irrigation].Apply(32);
            2007-02-28  [Irrigation].Apply(31);
          Operations Cultivation
            2006-02-24  [SurfaceOrganicMatter].Incorporate(0.8, 10)
          Manager InF
            FertDate1 = 10/26/2005 00:00:00
            FertDate2 = 11/25/2005 00:00:00
            IrrDate1 = 11/18/2005 00:00:00
            IrrDate2 = 11/23/2005 00:00:00
            IrrDate3 = 12/07/2005 00:00:00
            IrrDate4 = 12/29/2005 00:00:00
```csharp
using Models.Soils;
using System;
using Models.Core;
using System.Collections.Generic;
using System.Text;
using Models.PMF;
using Models;
using System.Xml.Serialization;
using APSIM.Shared.Utilities;
using System.Data;

namespace Models
{
    [Serializable] 
    //[System.Xml.Serialization.XmlInclude(typeof(Model))]
    public class Script : Model
    {
        [Link] Plant SCRUM;
        [Link] Clock Clock;
        [Link] Zone zone;
        [Link] Simulation Simulation;
        [Link] Fertiliser Fert;
        [Link] Irrigation Irrigation;
        
        [Description("Date of Fert on Wheat")]
        public DateTime FertDate1 { get; set; }
        [Description("Date of Fert on Wheat")]
        public DateTime FertDate2 { get; set; }
        public int NFert { get; set; }
        public double TreatFact { get; set; }
    
        [Description("Date of Irrig on Wheat")]
        public DateTime IrrDate1 { get; set; }
        public int Irr1 { get; set; }
        public double IrrFact1 { get; set; }
        [Description("Date of Irrig on Wheat")]
        public DateTime IrrDate2 { get; set; }
        public int Irr2 { get; set; }
        public double IrrFact2 { get; set; }
        [Description("Date of Irrig on Wheat")]
        public DateTime IrrDate3 { get; set; }
        public int Irr3 { get; set; }
        public double IrrFact3 { get; set; }
        [Description("Date of Irrig on Wheat")]
        public DateTime IrrDate4 { get; set; }
        public int Irr4 { get; set; }
        public double IrrFact4 { get; set; }
        
        
        [EventSubscribe("DoManagement")]
        private void OnDoManagement(object sender, EventArgs e)
        {
            if (Clock.Today.Date == FertDate1)
            {
                Fert.Apply(NFert * TreatFact * 0.5, "UreaN", 50);
            }
            if (Clock.Today.Date == FertDate2)
            {
                Fert.Apply(NFert * TreatFact, "UreaN", 50);
            }
            if (Clock.Today.Date == IrrDate1)
            {
                Irrigation.Apply(Irr1 * IrrFact1);
            }
            if (Clock.Today.Date == IrrDate2)
            {
                Irrigation.Apply(Irr2 * IrrFact2);
            }
            if (Clock.Today.Date == IrrDate3)
            {
                Irrigation.Apply(Irr3 * IrrFact3);
            }
            if (Clock.Today.Date == IrrDate4)
            {
                Irrigation.Apply(Irr4 * IrrFact4);
            }
        }
    }
}
```
          Manager FirstPotato
            CropName = Potato
            EstablishDate = 10/15/2004 00:00:00
            EstablishStage = Seed
            HarvestDate = 03/14/2005 00:00:00
            HarvestStage = Maturity
            ExpectedYield = 60
            FieldLoss = 0
            ResidueRemoval = 0
            ResidueIncorporation = 0
            ResidueIncorporationDepth = 0
```csharp
using APSIM.Shared.Utilities;
using Models.Utilities;
using Models.Soils;
using Models.PMF;
using Models.Core;
using System;
using System.Linq;
using Models.PMF.SimplePlantModels;

namespace Models
{
    [Serializable]
    public class Script : Model
    {
        [Link] Clock clock;
        [Link] Zone zone;
        /// <summary>The plant</summary>
        [Link(Type = LinkType.Scoped, ByName = true)]
        public Plant scrum = null;
        
        [Separator("Select Crop to sow and specify establish and harvest dates and stages")]
        
        /// <summary>Establishemnt Date</summary>
        [Description("Crop to plant")]
        [Display(Type = DisplayType.SCRUMcropName)]
        public string CropName { get; set; }

        /// <summary>Establishemnt Date</summary>
        [Description("Establishment Date")]
        public DateTime EstablishDate { get; set; }
       
        /// <summary>Stages that Scrum crops may be established at</summary>
        [Description("Establishment Stage")]
        [Display(Type = DisplayType.ScrumEstablishStages)]
        public string EstablishStage {get; set;}

        /// <summary>Harvest Date</summary>
        [Description("Harvest Date")]
        public DateTime HarvestDate { get; set; }

        /// <summary>Stage that Scrum crop is harvested at</summary>
        [Description("Harvest Stage")]
        [Display(Type = DisplayType.ScrumHarvestStages)]
        public string HarvestStage {get; set;}

        [Separator("Specify an appropriate potential yeild for the location, sowing date and assumed genotype \nScrum will reduce yield below potential if water or N stress are predicted")]
        
        /// <summary>Expected Yield (g FW/m2)</summary>
        [Description("Potential Yield (t/Ha)")]
        public double ExpectedYield {get; set;}
        
        [Separator("Specify proportions of field loss and residue removal at harvest")]
        
        /// <summary>Field loss (i.e the proportion of expected yield that is left in the field 
        /// because of diseaese, poor quality or lack of market)</summary>
        [Description("Field loss (%)")]
        public double FieldLoss { get; set; }

        /// <summary>Residue Removal (i.e the proportion of residues that are removed from the field 
        /// by bailing or some other means)</summary>
        [Description("Residue removal (%)")]
        public double ResidueRemoval { get; set; }
        
        [Separator("Specify proportion of residue incorporated and depth of incorporatin")]
        
        /// <summary>Residue incorporation (i.e the proportion of residues that are incorporated by cultivation  
        /// at or soon after harvest)</summary>
        [Description("Residue incorporation (%)")]
        public double ResidueIncorporation { get; set; }
        
        /// <summary>Residue incorporation depth (i.e the depth residues that are incorporated to by cultivation  
        /// at or soon after harvest)</summary>
        [Description("Residue incorporation depth (mm)")]
        public double ResidueIncorporationDepth { get; set; }
        
        private ScrumManagementInstance management {get; set;}
        
        [EventSubscribe("DoManagement")]
        private void OnDoManagement(object sender, EventArgs e)
        {
            if (clock.Today == EstablishDate)
            {
                management = new ScrumManagementInstance(cropName:CropName,
                                                 establishDate:EstablishDate,
                                                 establishStage:EstablishStage,
                                                 harvestDate:HarvestDate,
                                                 harvestStage:HarvestStage,
                                                 expectedYield:ExpectedYield,
                                                 fieldLoss:FieldLoss,
                                                 residueRemoval:ResidueRemoval,
                                                 residueIncorporation:ResidueIncorporation,
                                                 residueIncorporationDepth:ResidueIncorporationDepth);
                ScrumCropInstance currentCrop = zone.FindDescendant<ScrumCropInstance>(CropName);
                currentCrop.Establish(management);  
            }
        }
    }
}
```
          Manager SecondPotato
            CropName = Potato
            EstablishDate = 10/11/2006 00:00:00
            EstablishStage = Seed
            HarvestDate = 03/12/2007 00:00:00
            HarvestStage = Maturity
            ExpectedYield = 40
            FieldLoss = 0
            ResidueRemoval = 0
            ResidueIncorporation = 0
            ResidueIncorporationDepth = 0
            script: same as in ABlock.ABlock_06_07.Field.Management.FirstPotato
          Manager IntrumCrop
            CropName =
            EstablishDate = 01/01/0001 00:00:00
            EstablishStage =
            HarvestDate = 01/01/0001 00:00:00
            HarvestStage =
            ExpectedYield = 0
            FieldLoss = 0
            ResidueRemoval = 0
            ResidueIncorporation = 0
            ResidueIncorporationDepth = 0
            script: same as in ABlock.ABlock_06_07.Field.Management.FirstPotato
        Manager ExtraVariables: same as Lincoln2012.Lincoln2012.RainShelter.ExtraVariables
        Manager NConcReps
          NConcFile = %root%\Tests\Validation\SCRUM\NO3.csv
```csharp
using Newtonsoft.Json;
using Models.Climate;
using System;
using Models.Core;
using System.Collections.Generic;
using System.Text;
using Models.Soils;
using Models.PMF;
using Models;
using System.Xml.Serialization;
using APSIM.Shared.Utilities;
using System.Data;
using Models.Interfaces;

namespace Models
{
    [Serializable] 
    public class Script : Model
    {
        [Link] private Clock Clock;
        [Link] private Soils.Soil Soil;
        [Link] private Models.Surface.SurfaceOrganicMatter SOM;
        [Link] private Weather Met;
        [Link] private Fertiliser Fert;
        [Link] private Irrigation Irrig;
        [Link] private Plant SCRUM;
        [Link] private Zone zone;
        [Link] private Simulation Simulation;
        [Link]
        private ISoilWater waterBalance;
        
        [Description("File of Nconcs")]
        public string NConcFile { get; set; }
        
        public string FullFileName
        {
            get
            {
                return PathUtilities.GetAbsolutePath(NConcFile, Simulation.FileName);
            }
        }
        
        public double TotalLeach { get; set; }
        public double Leach_60 { get; set; }
        public double ObservedLeach1 { get; set; }
        public double ObservedLeach2 { get; set; }
        public double ObservedLeach3 { get; set; }
        public double ObservedLeach4 { get; set; }
        public double ObservedLeach5 { get; set; }
        public double NConc1 { get; set; }
        public double NConc2 { get; set; }
        public double NConc3 { get; set; }
        public double NConc4 { get; set; }
        public double NConc5 { get; set; }
    
        public string Treat_Rep1 { get; set; }
        public string Treat_Rep2 { get; set; }
        public string Treat_Rep3 { get; set; }
        public string Treat_Rep4 { get; set; }
        public string Treat_Rep5 { get; set; }
        
        public double NLeachMean { get; set; }
        
        [JsonIgnore] private DataTable NConcs { get; set; }
    
        private DateTime Date1 { get; set; }
        
        [EventSubscribe("StartOfSimulation")]
        private void OnStartOfSimulation(object sender, EventArgs e)
        {
            ApsimTextFile textFile = new ApsimTextFile();
            textFile.Open(FullFileName);
            NConcs = textFile.ToTable();
            textFile.Close();
            
            Treat_Rep1 = (string)Simulation.FindByPath("TreatmentID.Script.TreatmentName").Value + "_1";
            Treat_Rep2 = (string)Simulation.FindByPath("TreatmentID.Script.TreatmentName").Value + "_2";
            Treat_Rep3 = (string)Simulation.FindByPath("TreatmentID.Script.TreatmentName").Value + "_3";
            Treat_Rep4 = (string)Simulation.FindByPath("TreatmentID.Script.TreatmentName").Value + "_4";
            Treat_Rep5 = (string)Simulation.FindByPath("TreatmentID.Script.TreatmentName").Value + "_5";
        }
        
        [EventSubscribe("DoInitialSummary")]
        private void OnDoInitialSummary(object sender, EventArgs e)
        {
            TotalLeach = 0;
            Leach_60 = 0;
            NConc1 = 0;
            NConc2 = 0;
            NConc3 = 0;
            NConc4 = 0;
            NConc5 = 0;
            ObservedLeach1 = 0;
            ObservedLeach2 = 0;
            ObservedLeach3 = 0;
            ObservedLeach4 = 0;
            ObservedLeach5 = 0;
        }
        
        [EventSubscribe("StartOfDay")]
        private void OnStartOfDay(object sender, EventArgs e)
        {
            try
            {
                foreach (DataRow row in NConcs.Rows)
                {
                    DateTime TodayDate = Convert.ToDateTime(row["Date"]);
                    if (TodayDate.Date == Clock.Today.Date)
                    {
                        NConc1 = Convert.ToDouble(row[Treat_Rep1]);
                        NConc2 = Convert.ToDouble(row[Treat_Rep2]);
                        NConc3 = Convert.ToDouble(row[Treat_Rep3]);
                        NConc4 = Convert.ToDouble(row[Treat_Rep4]);
                        NConc5 = Convert.ToDouble(row[Treat_Rep5]);
                    }
                }
            }
            finally
            {
            }
        }
        
        [EventSubscribe("DoManagement")]
        private void OnDoManagement(object sender, EventArgs e)
        {
            DateTime Potato1Start = new DateTime(2004, 12, 9);
            DateTime Potato1End = new DateTime(2005, 3, 14);
        
            if ((Clock.Today.Date >= Potato1Start) && (Clock.Today.Date <= Potato1End))
            {
                Leach_60 = Leach_60 + (waterBalance.FlowNO3[3]);
                ObservedLeach1 = ObservedLeach1 + ((waterBalance.Flow[3] + waterBalance.Flux[3]) * NConc1) / 100;
                ObservedLeach2 = ObservedLeach2 + ((waterBalance.Flow[3] + waterBalance.Flux[3]) * NConc2) / 100;
                ObservedLeach3 = ObservedLeach3 + ((waterBalance.Flow[3] + waterBalance.Flux[3]) * NConc3) / 100;
                ObservedLeach4 = ObservedLeach4 + ((waterBalance.Flow[3] + waterBalance.Flux[3]) * NConc4) / 100;
                ObservedLeach5 = ObservedLeach5 + ((waterBalance.Flow[3] + waterBalance.Flux[3]) * NConc5) / 100;
                if (ObservedLeach5 > 0)
                    NLeachMean = (ObservedLeach1 + ObservedLeach2 + ObservedLeach3 + ObservedLeach4 + ObservedLeach5) / 5;
                else
                    NLeachMean = (ObservedLeach1 + ObservedLeach2 + ObservedLeach3) / 3;
                    
                TotalLeach = TotalLeach + (waterBalance.FlowNO3[2] + waterBalance.FlowNH4[2]);
            }
            else if (Clock.Today.Date > Potato1End)
            {    
                Leach_60 = 0;
                ObservedLeach1 = ObservedLeach1 + (waterBalance.Drainage * NConc1) / 100;
                ObservedLeach2 = ObservedLeach2 + (waterBalance.Drainage * NConc2) / 100;
                ObservedLeach3 = ObservedLeach3 + (waterBalance.Drainage * NConc3) / 100;
                ObservedLeach4 = ObservedLeach4 + (waterBalance.Drainage * NConc4) / 100;
                ObservedLeach5 = ObservedLeach5 + (waterBalance.Drainage * NConc5) / 100;
                if (ObservedLeach5 > 0)
                    NLeachMean = (ObservedLeach1 + ObservedLeach2 + ObservedLeach3 + ObservedLeach4 + ObservedLeach5) / 5;
                else
                    NLeachMean = (ObservedLeach1 + ObservedLeach2 + ObservedLeach3) / 3;
                //TotalLeach = TotalLeach + waterBalance.LeachNH4 + waterBalance.LeachNO3 + waterBalance.LeachUrea;
                TotalLeach = TotalLeach + (waterBalance.FlowNO3[7] + waterBalance.FlowNH4[7]);
            }
        }
        
        [EventSubscribe("PlantEnding")]
        private void OnPlantEnding(object sender, EventArgs e)
        {
            Leach_60 = 0;
            ObservedLeach1 = 0;
            ObservedLeach2 = 0;
            ObservedLeach3 = 0;
            ObservedLeach4 = 0;
            ObservedLeach5 = 0;
            TotalLeach = 0;
            
            
        }
    }
}
```
        MicroClimate: a_interception=0; b_interception=1; c_interception=0; d_interception=0; SoilHeatFluxFraction=0.4; MinimumHeightDiffForNewLayer=0; NightInterceptionFraction=0.5; ReferenceHeight=2
        Irrigation
        Fertiliser
        SurfaceOrganicMatter: InitialResidueName=grass; InitialResidueType=grass; InitialResidueMass=2500; InitialStandingFraction=0; InitialCPR=0; InitialCNR=15
        Soil: SoilType=Mottled Immature Palic Soil; LocalName=Templeton; Site=A Block, PFR Research Farm; NearestTown=Lincoln; Region=Canterbury; Country=New Zealand; Latitude=-43.626; Longitude=172.468; YearOfSampling=2020
          DataSource=Data from analyses at PFR soil lab using samples from site, complemented with historical data from nearby studies and PTFs (Cichota et al, 2016). Pedological description by Thomas Caspari (MWLC)
          Comments=This represents an 'average' of the two profiles described at the site. Modified after sensibility tests and checks against field measured data.
          Memo
            # Notes

            Values for physical properties, particularly water storage limits and SWCon, were adjused after comparison against field-measured data.
            Values for FOM were based on expert opinion and adjusted after comparison with measured soil N data.
          Physical
            Thickness  ParticleSizeSand  ParticleSizeSilt  ParticleSizeClay  Rocks  BD     AirDry  LL15   DUL    SAT    KS
            100        15                63                22                0      1.23   0.05    0.065  0.3    0.535  480
            100        15                63                22                0      1.235  0.065   0.065  0.325  0.53   420
            200        12.5              66                21.5              0      1.375  0.07    0.18   0.35   0.481  240
            200        15                65                20                0      1.66   0.06    0.15   0.313  0.374  48
            200        5                 72.5              22.5              0      1.59   0.074   0.175  0.325  0.4    144
            200        45                47                8                 0      1.44   0.04    0.1    0.318  0.45   1200
            200        25                60                15                0      1.525  0.048   0.12   0.315  0.425  480
            200        60                35                5                 0      1.36   0.028   0.07   0.275  0.45   720
            200        50                44                6                 0      1.35   0.04    0.08   0.33   0.46   1200
            200        50                44                6                 0      1.35   0.032   0.08   0.3    0.455  1140
            SoilCrop SCRUMSoil
              LL=[0.145, 0.17, 0.18, 0.15, 0.175, 0.1, 0.12, 0.07, 0.08, 0.08]
              KL=[0.1, 0.1, 0.1, 0.1, 0.1, 0.1, 0.1, 0.1, 0.1, 0.1]
              XF=[1, 1, 1, 1, 1, 1, 1, 1, 1, 1]
          WaterBalance SoilWater: SummerDate=15-Oct; SummerU=12; SummerCona=8; WinterDate=15-Apr; WinterU=9; WinterCona=6; DiffusConst=88; DiffusSlope=35.4; Salb=0.2; CN2Bare=60; CNRed=20; CNCov=0.8; DischargeWidth=0; CatchmentArea=0; PSIDul=-100
            Thickness  SWCON  KLAT
            100        0.563  0
            100        0.56   0
            200        0.485  0
            200        0.489  0
            200        0.585  0
            200        0.545  0
            200        0.534  0
            200        0.508  0
            200        0.534  0
            200        0.533  0
          Organic: FOMCNRatio=40; CarbonUnits=Total
            Thickness  Carbon  SoilCNRatio  FBiom  FInert  FOM
            100        3       12           0.06   0.315   850
            100        2.75    12           0.046  0.522   500
            200        1.85    11.5         0.01   0.785   450
            200        0.4     10           0.008  0.899   175
            200        0.25    9.5          0.008  0.953   75
            200        0.2     9            0.008  0.969   25
            200        0.2     9            0.008  0.989   7.5
            200        0.15    9            0.008  0.99    2.5
            200        0.1     9            0.008  0.987   0
            200        0.1     9            0.008  0.988   0
          Chemical: Thickness=[150, 150, 300, 300, 300, 300, 300]; PH=[6.5, 6.5, 6.5, 6.5, 6.5, 6.5, 6.5]; PHUnits=Water
            CEC=[13.629, 13.0665, 10.7405, 7.245, 6.905, 5.601, 6.13, 5.6925, 5.177, 5.177]
            CEC source: Calculated
          Nutrient
          Water: Thickness=[100, 100, 200, 200, 200, 200, 200, 200, 200, 200]; InitialPAWmm=341.4; RelativeTo=LL15; FilledFromTop=false
            InitialValues=[0.25, 0.27, 0.317, 0.3, 0.315, 0.315, 0.315, 0.275, 0.33, 0.3]
          OutputLayers OutputWaterLayers: Thickness=[200, 200, 200, 200, 200, 200, 200, 200, 200]
          OutputLayers OutputNutrientLayers: Thickness=[150, 150, 300, 300, 300, 300, 300]
          Solute NO3: Thickness=[150, 150, 300, 300, 300, 300, 300]; InitialValues=[35, 15, 6.08, 6.08, 0.849, 0.312, 0.625]; InitialValuesUnits=ppm; WaterTableConcentration=0; D0=0; DepthConstant=0; MaxDepthSoluteAccessible=0; RunoffEffectivenessAtMovingSolute=0; MaxEffectiveRunoff=0
          Solute NH4: Thickness=[150, 150, 300, 300, 300, 300, 300]; InitialValues=[6.18, 3.09, 0.673, 0.673, 0.552, 0.281, 0.062]; InitialValuesUnits=ppm; WaterTableConcentration=0; D0=0; DepthConstant=0; MaxDepthSoluteAccessible=0; RunoffEffectivenessAtMovingSolute=0; MaxEffectiveRunoff=0
          Solute Urea: Thickness=[150, 150, 300, 300, 300, 300, 300]; InitialValues=[0, 0, 0, 0, 0, 0, 0]; InitialValuesUnits=kg/ha; WaterTableConcentration=0; D0=0; DepthConstant=0; MaxDepthSoluteAccessible=0; RunoffEffectivenessAtMovingSolute=0; MaxEffectiveRunoff=0
          SoilTemperature Temperature
        Plant SCRUM
        ScrumCropInstance Potatox: HarvestIndex=0.9; MoistureContent=0.8; RootProportion=0.1; MaxRootDepth=2000; MaxHeight=1800; MaxCover=0.95; ExtinctionCoefficient=0.55; TypicalHarvestStage=LateReproductive; SeedlingNConc=0.03; ProductHarvestNConc=0.012; StoverHarvestNConc=0.009; RootNConc=0.01; BaseTemperature=10; OptimumTemperature=30; MaxTemperature=40; GSMax=0.008; R50=150; ConsiderWaterStress=true; Factor_XoBiomass=0.5; Factor_bBiomass=0.2; Factor_XoCover=0.4; Factor_bCover=0.2; Factor_XoHeight=0.7; Factor_bHeight=0.2
          zero: LegumeFactor, Tt_SowToEmergence, PlantingDepth, ExpectedYield, Tt_EstablishmentToHarvest, FieldLoss, ResidueRemoval, ResidueIncorporation, ResidueIncorporationDepth, Tt_EmergencetoMaturity
        ScrumCropInstance Potato: HarvestIndex=0.91; MoistureContent=0.7955; RootProportion=0.1; MaxRootDepth=1500; MaxHeight=500; MaxCover=0.97; ExtinctionCoefficient=0.8; TypicalHarvestStage=Maturity; SeedlingNConc=0.046; ProductHarvestNConc=0.022; StoverHarvestNConc=0.0205; RootNConc=0.01; LegumeFactor=0; BaseTemperature=0; OptimumTemperature=25; MaxTemperature=35; Tt_SowToEmergence=0; GSMax=0.008; R50=150; ConsiderWaterStress=true; EstablishStage=Seed; HarvestStage=Ripe; FieldLoss=0; ResidueRemoval=0; ResidueIncorporation=0; ResidueIncorporationDepth=0; Factor_XoBiomass=0.5; Factor_bBiomass=0.2; Factor_XoCover=0.4; Factor_bCover=0.2; Factor_XoHeight=0.7; Factor_bHeight=0.2; Tt_EmergencetoMaturity=0
        ScrumCropInstance Pea: HarvestIndex=0.5; MoistureContent=0.14; RootProportion=0.1; MaxRootDepth=700; MaxHeight=500; MaxCover=0.97; ExtinctionCoefficient=0.8; TypicalHarvestStage=Maturity; SeedlingNConc=0.05; ProductHarvestNConc=0.03; StoverHarvestNConc=0.02; RootNConc=0.01; LegumeFactor=1; BaseTemperature=5; OptimumTemperature=30; MaxTemperature=40; GSMax=0.008; R50=150; ConsiderWaterStress=true; Factor_XoBiomass=0.5; Factor_bBiomass=0.2; Factor_XoCover=0.4; Factor_bCover=0.2; Factor_XoHeight=0.7; Factor_bHeight=0.2
          zero: Tt_SowToEmergence, PlantingDepth, ExpectedYield, Tt_EstablishmentToHarvest, FieldLoss, ResidueRemoval, ResidueIncorporation, ResidueIncorporationDepth, Tt_EmergencetoMaturity
        ScrumCropInstance Wheat: HarvestIndex=0.5; MoistureContent=0.14; RootProportion=0.1; MaxRootDepth=2000; MaxHeight=1800; MaxCover=0.97; ExtinctionCoefficient=0.55; TypicalHarvestStage=Ripe; SeedlingNConc=0.03; ProductHarvestNConc=0.012; StoverHarvestNConc=0.009; RootNConc=0.01; BaseTemperature=10; OptimumTemperature=30; MaxTemperature=40; GSMax=0.008; R50=150; ConsiderWaterStress=true; Factor_XoBiomass=0.5; Factor_bBiomass=0.2; Factor_XoCover=0.4; Factor_bCover=0.2; Factor_XoHeight=0.7; Factor_bHeight=0.2
          zero: LegumeFactor, Tt_SowToEmergence, PlantingDepth, ExpectedYield, Tt_EstablishmentToHarvest, FieldLoss, ResidueRemoval, ResidueIncorporation, ResidueIncorporationDepth, Tt_EmergencetoMaturity
        Report ReportABlock: EventNames=[Clock].DoReport
          VariableNames:
            [Clock].Today
            [ExtraVariables].Script.AccumPlantN
            [ExtraVariables].Script.AccumMineralisation
            [ExtraVariables].Script.AccumDenit
            [ExtraVariables].Script.AccumFert
            [ExtraVariables].Script.AccumLeach as LeachNo3
            [ExtraVariables].Script.AccumDetach
            [ExtraVariables].Script.DeltaSoilOMN
            [ExtraVariables].Script.DeltaSurfaceOMN as SOM_N
            [ExtraVariables].Script.DeltaSoilMineralN
            [ExtraVariables].Script.DltNMinRes as Residue_N
            [ExtraVariables].Script.SWC as SWC
            [ExtraVariables].Script.DUL
            [ExtraVariables].Script.OutFlowLat
            [ExtraVariables].Script.AccumEO
            [ExtraVariables].Script.AccumEP
            [ExtraVariables].Script.AccumES
            [ExtraVariables].Script.AccumDrainage as Drainage
            [ExtraVariables].Script.AccumRunoff
            [ExtraVariables].Script.AccumRainfall
            [ExtraVariables].Script.AccumIrrigation
            [ExtraVariables].Script.AccumOutflowLat
            [ExtraVariables].Script.SoilWaterDeficit
            [ExtraVariables].Script.SoilNitrogenContent as TotalSoilN
            [ExtraVariables].Script.FomN
            [ExtraVariables].Script.HumN
            [ExtraVariables].Script.BiomN
            [ExtraVariables].Script.DltNMinRes
            [ExtraVariables].Script.DltNMinTot
            [Soil].SoilWater.Drainage
            [Soil].SoilWater.Runoff
            [Soil].SoilWater.Eo
            [Soil].SoilWater.Es
            [Soil].SoilWater.pond
            [Soil].Water.MM
            [Soil].NO3.kgha
            [SCRUM].Product.Yield *100 as Yield
            [SCRUM].Stover.Live.Wt
            [SCRUM].Root.Live.Wt
            [SCRUM].Product.Live.Wt
            [SCRUM].Stover.Live.N
            [SCRUM].Root.Live.N
            [SCRUM].Product.Live.N
            [SCRUM].Stover.Live.NConc
            [SCRUM].Root.Live.NConc
            [SCRUM].Product.Live.NConc
            [SCRUM].Root.WaterUptake
            [SCRUM].Stover.Transpiration
            [SCRUM].Stover.WaterDemand
            [SCRUM].Root.Depth
            [SCRUM].Stover.CoverTotal
            [SCRUM].Stover.CoverDead
            [SCRUM].Stover.LAI
            [SCRUM].Stover.Height
            [SCRUM].Arbitrator.N.TotalPlantDemand
            [SCRUM].Arbitrator.N.TotalPlantSupply
            [SCRUM].Stover.Fw
            [SCRUM].Stover.Fn
            [SCRUM].Total.Wt
            [SCRUM].Total.N
            [SCRUM].Arbitrator.DM.TotalFixationSupply
            [SCRUM].Arbitrator.DM.TotalPlantDemand
            [SCRUM].Arbitrator.DM.SinkLimitation
            [SCRUM].Arbitrator.DM.NutrientLimitation
            [SCRUM].Phenology.ThermalTime
            [SCRUM].Phenology.CurrentPhase.Name
            [SCRUM].Phenology.Stage
            [Irrigation].IrrigationApplied
            [SCRUM].Arbitrator.FN
            [NConcReps].Script.TotalLeach
            [NConcReps].Script.ObservedLeach1
            [NConcReps].Script.ObservedLeach2
            [NConcReps].Script.ObservedLeach3
            [NConcReps].Script.ObservedLeach4
            [NConcReps].Script.ObservedLeach5
            [NConcReps].Script.Leach_60
            [Soil].SoilWater.SoluteFlowEfficiency
            [Soil].SoilWater.SoluteFluxEfficiency
            [SCRUM].Total.N
            [Soil].SoilWater.FlowNO3
            [TreatmentID].Script.TreatmentName as Treat
            //[Sowing_Yield].Script.Treatment
            [TreatmentID].Script.Rotation as RotTreat
            [TreatmentID].Script.Irrigation as IrrigTreat
            [TreatmentID].Script.Nitrogen as NitTreat
            [SurfaceOrganicMatter].N
            [SurfaceOrganicMatter].wt
            [SurfaceOrganicMatter].Cover
            [Soil].OutputWaterLayers.SW[1] as VWC_0_20
            [Soil].OutputWaterLayers.SW[2] as VWC_20_40
            [Soil].OutputWaterLayers.SW[3] as VWC_40_60
            [Soil].OutputWaterLayers.SW[4] as VWC_60_80
            [Soil].OutputWaterLayers.SW[5] as VWC_80_100
            [Soil].OutputWaterLayers.SW[6] as VWC_100_120
            [Soil].OutputWaterLayers.SW[7] as VWC_120_140
            [Soil].OutputWaterLayers.SW[8] as VWC_140_160
            ([Soil].OutputNutrientLayers.NH4[1]+[Soil].OutputNutrientLayers.NO3[1]+[Soil].OutputNutrientLayers.NH4[2]+[Soil].OutputNutrientLayers.NO3[2]) as SoilN_0_60
            ([Soil].OutputNutrientLayers.NH4[3]+[Soil].OutputNutrientLayers.NO3[3] +[Soil].OutputNutrientLayers.NH4[4]+[Soil].OutputNutrientLayers.NO3[4] + [Soil].OutputNutrientLayers.NH4[5]+[Soil].OutputNutrientLayers.NO3[5]) as SoilN_60_150
            (SoilN_0_60 + SoilN_60_150) as SoilN_0_150
        Report PredictedLeach: EventNames=[SCRUM].Harvesting
          VariableNames:
            [Clock].Today
            [NConcReps].Script.TotalLeach as NLeaching
        Report ObservedLeach: EventNames=[SCRUM].Harvesting
          VariableNames:
            [Clock].Today
            [NConcReps].Script.NLeachMean as NLeaching
    Folder LeachingObsPre
      Memo
        Predictions working well for all but the high N treatment in the final wheat crop following the potato crop.  I suspect the model is under predicting Denitrification here
  Folder SVS
    Experiment LincolnRot1
      Memo SowHarvestEvents
        ### Rotation 1 - Planting and harvesting

        21-22/10/2019	-	Planting potatoes, 31 cm seed spacing and 18-20 cm deep. Row 0.82 m wide. Used 4 tonnes of seed potatoes (40-55 mm, 70-150 g/piece)
        1-6/05/2020	-	Harvesting tubers done, graded tubers in plot: <60 mm = reject, >60 mm marketable
        15/05/2020	-	Harvesting tubers finished

        19/05/2020	-	Planting 'Catherine' bread wheat, sown at 130 kg/ha
        21-22/01/2021	-	Final harvest done
        3/02/2021	-	Harvesting, local contractor baled and removed straw from site

        3-4/03/2021	-	Planting broccoli, variety 'Nobel'. Transplants from Quick Start Seedlings, at ~30 cm spacing. Checked and replaced on second day as required
        28/06/2021	-	Final harvest conducted. Total, Marketable (>125 mm tight head), and unmarketable determined. Produce from N4 discarded, the rest going to the City Mission

        7/09/2021	-	Planting onions, drilled in variety 'Tilbury'. 10 rows per bed with a target population of 750,000 seeds/ha. 2-3 mm seed coating size
        15/04/2022	-	Harvesting - Contractor commercially harvested

        6/05/2022	-	Planting ryegrass, 25 kg/ha of variety 'Nui' drilled in
        7/01/2023	-	Harvesting ...
      Memo CultivationEvents
        ### Rotation 1 - Cultivation

        01/09/2019	-	Ploughed (early September)
        01/09/2019	-	Cambridge rolled (mid-September)
        14/10/2019	-	Power-harrowed
        18/10/2019	-	Column deep grubbed
        21/10/2019	-	Column maxitilled, harrowed and rolled and then bed formed
        15/05/2020	-	Trashed removed
        18/05/2020	-	Power-harrowed, ploughed (was variable in depth), grubbed
        19/05/2020	-	Grubbed, ligt power-harrow
        09/02/2021	-	Ploughed and rolled
        22/02/2021	-	Wheel tracks grubbed and rolled
        24/02/2021	-	Power harrowed column
        01/03/2021	-	Maxitilled fertiliser and pre-emergent in
        27/08/2021	-	Ploughed to a depth of 15-20cm
        02/09/2021	-	Cambridge rolled x2
        03/09/2021	-	Powerharrowed and then Cambridge rolled x2
        07/09/2021	-	Powerharrowed
        19/04/2022	-	Grubbed
        22/04/2022	-	Maxitilled
        05/05/2022	-	Grubbed
        06/05/2022	-	Cambridge rolled x3
      Memo FertiliserEvents
        ### Rotation 1 - Fertiliser

        15/10/2019	-	Urea (46 kg/ha)
        26/11/2019	-	N applied to treatments. N rates = 0, 100, 200 and 400 kg/ha, split into four applications
        09/12/2019	-	N applied to treatments. N rates = 0, 100, 200 and 400 kg/ha, split into four applications
        23/12/2019	-	N applied to treatments. N rates = 0, 100, 200 and 400 kg/ha, split into four applications
        06/01/2020	-	N applied to treatments. N rates = 0, 100, 200 and 400 kg/ha, split into four applications
        24/08/2020	-	75 kg N/ha applied to whole trial in the form of AMMO31@245kg/ha (ammonium sulphate)
        17/09/2020	-	Fertiliser applied to the whole trial, 75 kg N/ha in the form of Sustain N
        07/04/2021	-	First side dressing of CAN applied. N2 = 15 kg N/ha, N3 = 30 kg N/ha and N4 = 60 kg N/ha
        04/05/2021	-	Second side dressing of CAN applied. N2 = 15 kg N/ha, N3 = 30 kg N/ha and N4 = 60 kg N/ha
        08/09/2021	-	1st side dressing of N applied. N1=Control, N2=15, N3=30 and N4=60 kg N/ha applied as CAN
        10/11/2021	-	2nd side dressing of N applied. N1=Control, N2=15, N3=30 and N4=60 kg N/ha applied as CAN
        03/12/2021	-	3rd side dressing of N applied. N1=Control, N2=15, N3=30 and N4=60 kg N/ha applied as CAN
        22/12/2021	-	4th side dressing of N applied. N1=Control, N2=15, N3=30 and N4=60 kg N/ha applied as CAN
        05/05/2022	-	About 180 kg/ha of Cropmaster 16 high K applied, which means N went on to all treatments = 29 kg N/ha - Error, wrong fertiliser applied
        12/05/2022	-	Decided NOT to apply 30 kg N/ha as CAN as starter N to the GMP due to accidental N application in the base fert application
        01/09/2022	-	Applied first side dressing of N (CAN) 40 kg N/ha to GMP with subsequent changes for N2 and N4
        29/09/2022	-	Applied 30 kg N/ha (CAN) to GMP and relative rates to other treatments
        04/11/2022	-	Applied 20 kg N/ha to GMP and respective rates to other treatments, CAN used
      Memo IrrigationEvents
        ### Rotation 1 - Irrigation

        11/10/2019	-	25 mm applied to entire column
        26/11/2019	-	10 mm applied to water in Urea
        03/12/2019	-	30 mm applied to all plots. Irrig 1 = 30 mm total. Wind an absolute shit! NE rain gauge = 15 mm, SW = 26 mm
        04/12/2019	-	30 mm applied to Irrig 2 = 60 mm total. Issue with surface flow contaminating treatments. NE rain gauge = 15 mm, Centre = 24 mm SE = 28 mm
        09/12/2019	-	15 mm applied to all treatments
        10/12/2019	-	24mm applied to treatment 1 and 26mm applied to treamtent 2
        11/12/2019	-	15mm applied to treatment 2
        23/12/2019	-	15 mm applied to all treatments
        30/12/2019	-	25 mm applied to whole trial area based on ET
        06/01/2020	-	15 mm applied to all treatments
        07/01/2020	-	10 mm applied to all treatments
        13/01/2020	-	25 mm applied to Trt 1 and 30 mm applied to Trt 2
        14/01/2020	-	20 mm applied to Trt 2
        20/01/2020	-	35 mm across both treatments
        21/01/2020	-	25 mm applied to treatment 2
        27/01/2020	-	30mm applied over whole trial
        28/01/2020	-	20mm applied to all treatment 2 plots only
        04/02/2020	-	Irrigation applied to both treatments today, Treatment 1 received 30mm and Treatment 2 received 20mm
        10/02/2020	-	15 mm applied to all treatments
        11/02/2020	-	35 mm applied to Treatment 2
        17/02/2020	-	Applied 30 mm across all plots today
        24/02/2020	-	20 mm applied to all treatments
        25/02/2020	-	20 mm applied to Trt 2
        02/03/2020	-	15 mm applied to all treatments
        03/03/2020	-	30 mm applied to Treatment 2 only
        01/10/2020	-	30 mm applied to whole trial
        07/10/2020	-	30 mm applied to whole trial. Started at east end on 6th, did block 4 and half of block 3 but had to stop due to strong wind. Finished on 7th
        09/10/2020	-	20 mm applied to whole trial
        17/10/2020	-	25 mm applied to whole trial
        21/10/2020	-	35 mm applied to Trt 2
        28/10/2020	-	25 mm applied to whole trial
        06/11/2020	-	25 mm applied to whole trial
        17/11/2020	-	25 mm applied to whole trial
        24/11/2020	-	15 mm applied to Irrig 1 and 25 mm to Irrig 2
        04/12/2020	-	25 mm across both treatments
        08/12/2020	-	25 mm applied to all treatments
        15/12/2020	-	30 mm  applied to all treatments
        22/12/2020	-	20 and 10 mm (30 mm in total) applied to all treatments
        05/01/2021	-	25 mm applied to all treatments
        22/02/2021	-	30 mm applied to column
        23/02/2021	-	20 mm applied to column
        04/03/2021	-	Irrigation 15 mm
        09/03/2021	-	Irrigation 15 mm in light but increasing NE winds. Irrigator ground speed 67 m/h
        15/03/2021	-	10 mm applied to whole column
        22/03/2021	-	15 mm applied to broccoli. Irrigator gave grief running offline often after covering eastern 2/3 of column
        01/04/2021	-	15 mm applied to whole column
        07/04/2021	-	15 mm applied to whole column
        10/11/2021	-	15 mm applied to whole column
        19/11/2021	-	20 mm applied to whole trial
        03/12/2021	-	10 mm applied to whole trial
        06/12/2021	-	10 mm applied to Irrig 1 and 20 mm to Irrig 2
        23/12/2021	-	15 mm applied to whole trial
        06/01/2022	-	25 mm applied to whole trial
        13/01/2022	-	15mm to treat 1 and 25mm to treat 2
        18/01/2022	-	15mm to treat 1 and 25mm to treat 2
        26/01/2022	-	15mm to treat 1 and 25mm to treat 2
        02/02/2022	-	15mm to treat 1 and 25mm to treat 2
        13/10/2022	-	30 mm applied
        19/10/2022	-	20 mm applied to Irrig 1 and 30 mm applied to Irrig 2
        03/11/2022	-	20 mm applied to whole column
        04/11/2022	-	10 mm applied to Irrig 1 and 20 mm applied to Irrig 2
        11/11/2022	-	30 mm applied to whole column
        14/11/2022	-	15 mm applied to Trt 1 and 25 mm applied to Trt 2
        07/12/2022	-	20 mm applied to Trt 1 and 30 mm applied to Trt 2
        15/12/2022	-	20 mm applied to Trt 1 and 30 mm applied to Trt 2

        Note that these are nominal or intended values. From the notes in dairy, the amount applied could be only 50-90% of intented amount in windy conditions...
        There may be inefficiencies also due to inteception by canopy.  This may explain some of the over-estimation of SWC when irrigating the crops (notable for wheat in spring 2020).
      Memo ReadPotato
        *Potatoes were first in the sequence but were removed from the simulation because of the inability of APSIM to capture uneven field (hills and furrows).
      Memo ReadWheat
        *	Winter wheat uses mean observed HI of 0.42; Grain and straw N contents of 2.18 & 0.59%, respectively.

        *	Measured grain yield (14% moisture content) range was 9.3-10.3 t DM/ha.

        *	Straw was baled.

        *	Residue (aboveground) C:N was 75
      Memo ReadBroccoli
        ### Notes

        *	Broccoli - actual trasplanting date was 03/03/2021, established a few days later in the simulation as the model 'grows' them too well at the start

        *	For the final harvest (01/07/21), the total aboveground yield = (Marketable_fresh_yield + Component_residue_FW).

        *	Alex advised that the Component_residue_FW (30-38 t FW/ha) was returned as mulch.
      Memo ReadOnions
        *	Irrigation: Total irrigation amount was 140 and 190 mm for Irrigation 1 and Irrigation 2 treatments, respectively.

        *	Tissue N conc at the penultimate harvest (09-02-2022) was as follows: -

        		- Stover (top) N conc was 2.3% (range 2.07-2.54% for Irrigation 1 and 1.99-2.58% for Irrigation 2 treatments)
            		- Bulb N conc was 1.07% (range 0.89-1.24% for Irrigation 1 and 0.89-1.27 for Irrigation 2 treatments)
            		- Root N conc taken on 22/02/2022 averaged 1.56%

        *	Measured bulb DM proportion was 0.13
      Memo ReadRyegrass
        *	Drilled on 06/05/2022

        *	Final harvest 04/01/2023

        *	Surface flooding in December (check effect)

        *	Average HI = 0.14

        *	Average seed yield (14% MC) = 1.8 (0.97-2.6) t DM/ha

        *	Average seed DM = 93%

        *	Average seed N content = 2.05%

        *	Average straw yield (14%) = 9.2 t DM/ha

        *	Average straw N content	= 1.07%
      Factors
        Permutation
          Factor _N
            CompositeFactor 1: Specifications=[NitrogenOperations]
              Operations NitrogenOperations
                2019-10-15  [Fertiliser].Apply(21, "UreaN", 10);
                2020-08-24  [Fertiliser].Apply(75, "NH4N", 10);
                2020-09-17  [Fertiliser].Apply(75, "UreaN", 10);
                2022-05-05  [Fertiliser].Apply(29, "NH4N", 10);
            CompositeFactor 2: Specifications=[NitrogenOperations]
              Operations NitrogenOperations
                2019-10-15  [Fertiliser].Apply(21, "UreaN", 10);
                2019-11-26  [Fertiliser].Apply(11, "UreaN", 10);
                2019-12-09  [Fertiliser].Apply(11, "UreaN", 10);
                2019-12-23  [Fertiliser].Apply(11, "UreaN", 10);
                2020-01-06  [Fertiliser].Apply(11, "UreaN", 10);
                2020-08-24  [Fertiliser].Apply(75, "NH4N", 10);
                2020-09-17  [Fertiliser].Apply(75, "UreaN", 10);
                2021-04-07  [Fertiliser].Apply(15, "NH4NO3N", 10);
                2021-05-04  [Fertiliser].Apply(15, "NH4NO3N", 10);
                2021-09-08  [Fertiliser].Apply(15, "NH4NO3N", 10);
                2021-11-10  [Fertiliser].Apply(15, "NH4NO3N", 10);
                2021-12-03  [Fertiliser].Apply(15, "NH4NO3N", 10);
                2021-12-22  [Fertiliser].Apply(15, "NH4NO3N", 10);
                2022-05-05  [Fertiliser].Apply(29, "NH4N", 10);
                2022-05-12  [Fertiliser].Apply(15, "NH4NO3N", 10);
                2022-09-01  [Fertiliser].Apply(20, "NH4NO3N", 10);
                2022-09-29  [Fertiliser].Apply(15, "NH4NO3N", 10);
                2022-11-04  [Fertiliser].Apply(10, "NH4NO3N", 10);
            CompositeFactor 3: Specifications=[NitrogenOperations]
              Operations NitrogenOperations
                2019-10-15  [Fertiliser].Apply(21, "UreaN", 10);
                2019-11-26  [Fertiliser].Apply(22, "UreaN", 10);
                2019-12-09  [Fertiliser].Apply(22, "UreaN", 10);
                2019-12-23  [Fertiliser].Apply(22, "UreaN", 10);
                2020-01-06  [Fertiliser].Apply(22, "UreaN", 10);
                2020-08-24  [Fertiliser].Apply(75, "NH4N", 10);
                2020-09-17  [Fertiliser].Apply(75, "UreaN", 10);
                2021-04-07  [Fertiliser].Apply(30, "NH4NO3N", 10);
                2021-05-04  [Fertiliser].Apply(30, "NH4NO3N", 10);
                2021-09-08  [Fertiliser].Apply(30, "NH4NO3N", 10);
                2021-11-10  [Fertiliser].Apply(30, "NH4NO3N", 10);
                2021-12-03  [Fertiliser].Apply(30, "NH4NO3N", 10);
                2021-12-22  [Fertiliser].Apply(30, "NH4NO3N", 10);
                2022-05-05  [Fertiliser].Apply(29, "NH4N", 10);
                2022-05-12  [Fertiliser].Apply(30, "NH4NO3N", 10);
                2022-09-01  [Fertiliser].Apply(40, "NH4NO3N", 10);
                2022-09-29  [Fertiliser].Apply(30, "NH4NO3N", 10);
                2022-11-04  [Fertiliser].Apply(20, "NH4NO3N", 10);
            CompositeFactor 4: Specifications=[NitrogenOperations]
              Operations NitrogenOperations
                2019-10-15  [Fertiliser].Apply(21, "UreaN", 10);
                2019-11-26  [Fertiliser].Apply(44, "UreaN", 10);
                2019-12-09  [Fertiliser].Apply(44, "UreaN", 10);
                2019-12-23  [Fertiliser].Apply(44, "UreaN", 10);
                2020-01-06  [Fertiliser].Apply(44, "UreaN", 10);
                2020-08-24  [Fertiliser].Apply(75, "NH4N", 10);
                2020-09-17  [Fertiliser].Apply(75, "UreaN", 10);
                2021-04-07  [Fertiliser].Apply(60, "NH4NO3N", 10);
                2021-05-04  [Fertiliser].Apply(60, "NH4NO3N", 10);
                2021-09-08  [Fertiliser].Apply(60, "NH4NO3N", 10);
                2021-11-10  [Fertiliser].Apply(60, "NH4NO3N", 10);
                2021-12-03  [Fertiliser].Apply(60, "NH4NO3N", 10);
                2021-12-22  [Fertiliser].Apply(60, "NH4NO3N", 10);
                2022-05-05  [Fertiliser].Apply(29, "NH4N", 10);
                2022-05-12  [Fertiliser].Apply(60, "NH4NO3N", 10);
                2022-09-01  [Fertiliser].Apply(80, "NH4NO3N", 10);
                2022-09-29  [Fertiliser].Apply(60, "NH4NO3N", 10);
                2022-11-04  [Fertiliser].Apply(40, "NH4NO3N", 10);
          Factor _Irr
            CompositeFactor 1: Specifications=[IrrigationOperations]
              Operations IrrigationOperations
                2019-10-11  [Irrigation].Apply(25);
                2019-11-26  [Irrigation].Apply(10);
                2019-12-03  [Irrigation].Apply(30);
                2019-12-09  [Irrigation].Apply(15);
                2019-12-10  [Irrigation].Apply(24);
                2019-12-23  [Irrigation].Apply(15);
                2019-12-30  [Irrigation].Apply(25);
                2020-01-06  [Irrigation].Apply(15);
                2020-01-07  [Irrigation].Apply(10);
                2020-01-13  [Irrigation].Apply(25);
                2020-01-20  [Irrigation].Apply(35);
                2020-01-27  [Irrigation].Apply(30);
                2020-02-04  [Irrigation].Apply(30);
                2020-02-10  [Irrigation].Apply(15);
                2020-02-17  [Irrigation].Apply(30);
                2020-02-24  [Irrigation].Apply(20);
                2020-03-02  [Irrigation].Apply(15);
                2020-10-01  [Irrigation].Apply(30);
                2020-10-07  [Irrigation].Apply(30);
                2020-10-09  [Irrigation].Apply(20);
                2020-10-17  [Irrigation].Apply(25);
                2020-10-28  [Irrigation].Apply(25);
                2020-11-06  [Irrigation].Apply(25);
                2020-11-17  [Irrigation].Apply(25);
                2020-11-24  [Irrigation].Apply(15);
                2020-12-04  [Irrigation].Apply(25);
                2020-12-08  [Irrigation].Apply(25);
                2020-12-15  [Irrigation].Apply(30);
                2020-12-22  [Irrigation].Apply(30);
                2021-01-05  [Irrigation].Apply(25);
                2021-02-22  [Irrigation].Apply(30);
                2021-02-23  [Irrigation].Apply(20);
                2021-03-04  [Irrigation].Apply(15);
                2021-03-09  [Irrigation].Apply(15);
                2021-03-15  [Irrigation].Apply(10);
                2021-03-22  [Irrigation].Apply(15);
                2021-04-01  [Irrigation].Apply(15);
                2021-04-07  [Irrigation].Apply(15);
                2021-11-10  [Irrigation].Apply(15);
                2021-11-19  [Irrigation].Apply(20);
                2021-12-03  [Irrigation].Apply(10);
                2021-12-06  [Irrigation].Apply(10);
                2021-12-23  [Irrigation].Apply(15);
                2022-01-06  [Irrigation].Apply(25);
                2022-01-13  [Irrigation].Apply(15);
                2022-01-18  [Irrigation].Apply(15);
                2022-01-26  [Irrigation].Apply(15);
                2022-02-02  [Irrigation].Apply(15);
                2022-10-13  [Irrigation].Apply(30);
                2022-10-19  [Irrigation].Apply(20);
                2022-11-03  [Irrigation].Apply(20);
                2022-11-04  [Irrigation].Apply(10);
                2022-11-11  [Irrigation].Apply(30);
                2022-11-14  [Irrigation].Apply(15);
                2022-12-07  [Irrigation].Apply(20);
                2022-12-15  [Irrigation].Apply(20);
            CompositeFactor 2: Specifications=[IrrigationOperations]
              Operations IrrigationOperations
                2019-10-11  [Irrigation].Apply(25);
                2019-11-26  [Irrigation].Apply(10);
                2019-12-03  [Irrigation].Apply(30);
                2019-12-04  [Irrigation].Apply(30);
                2019-12-09  [Irrigation].Apply(15);
                2019-12-10  [Irrigation].Apply(26);
                2019-12-11  [Irrigation].Apply(15);
                2019-12-23  [Irrigation].Apply(15);
                2019-12-30  [Irrigation].Apply(25);
                2020-01-06  [Irrigation].Apply(15);
                2020-01-07  [Irrigation].Apply(10);
                2020-01-13  [Irrigation].Apply(30);
                2020-01-14  [Irrigation].Apply(20);
                2020-01-20  [Irrigation].Apply(35);
                2020-01-21  [Irrigation].Apply(25);
                2020-01-27  [Irrigation].Apply(30);
                2020-01-28  [Irrigation].Apply(20);
                2020-02-04  [Irrigation].Apply(20);
                2020-02-10  [Irrigation].Apply(15);
                2020-02-11  [Irrigation].Apply(35);
                2020-02-17  [Irrigation].Apply(30);
                2020-02-24  [Irrigation].Apply(20);
                2020-02-25  [Irrigation].Apply(20);
                2020-03-02  [Irrigation].Apply(15);
                2020-03-03  [Irrigation].Apply(30);
                2020-10-01  [Irrigation].Apply(30);
                2020-10-07  [Irrigation].Apply(30);
                2020-10-09  [Irrigation].Apply(20);
                2020-10-17  [Irrigation].Apply(25);
                2020-10-21  [Irrigation].Apply(35);
                2020-10-28  [Irrigation].Apply(25);
                2020-11-06  [Irrigation].Apply(25);
                2020-11-17  [Irrigation].Apply(25);
                2020-11-24  [Irrigation].Apply(25);
                2020-12-04  [Irrigation].Apply(25);
                2020-12-08  [Irrigation].Apply(25);
                2020-12-15  [Irrigation].Apply(30);
                2020-12-22  [Irrigation].Apply(30);
                2021-01-05  [Irrigation].Apply(25);
                2021-02-22  [Irrigation].Apply(30);
                2021-02-23  [Irrigation].Apply(20);
                2021-03-04  [Irrigation].Apply(15);
                2021-03-09  [Irrigation].Apply(15);
                2021-03-15  [Irrigation].Apply(10);
                2021-03-22  [Irrigation].Apply(15);
                2021-04-01  [Irrigation].Apply(15);
                2021-04-07  [Irrigation].Apply(15);
                2021-11-10  [Irrigation].Apply(15);
                2021-11-19  [Irrigation].Apply(20);
                2021-12-03  [Irrigation].Apply(10);
                2021-12-06  [Irrigation].Apply(20);
                2021-12-23  [Irrigation].Apply(15);
                2022-01-06  [Irrigation].Apply(25);
                2022-01-13  [Irrigation].Apply(25);
                2022-01-18  [Irrigation].Apply(25);
                2022-01-26  [Irrigation].Apply(25);
                2022-02-02  [Irrigation].Apply(25);
                2022-10-13  [Irrigation].Apply(30);
                2022-10-19  [Irrigation].Apply(30);
                2022-11-03  [Irrigation].Apply(20);
                2022-11-04  [Irrigation].Apply(20);
                2022-11-11  [Irrigation].Apply(30);
                2022-11-14  [Irrigation].Apply(25);
                2022-12-07  [Irrigation].Apply(30);
                2022-12-15  [Irrigation].Apply(30);
      Simulation LincolnRotation1
        Clock: Start=2020-05-01; End=2023-01-31
        Weather: FileName=lincoln.met; Latitude=-43.626; Tav=11.6; Amp=10.6
        Summary
        SoilArbitrator Soil Arbitrator
        Zone Field: Area=1; Slope=0; AspectAngle=0; Altitude=50
          Folder Management
            Manager SowWheat
              CropName = SCRUM_Wheat
              EstablishDate = 19/05/2020
              EstablishStage = Seed
              PlantingDepth = 15
              HarvestTimeOption = SettingDate
              HarvestDate = 01/22/2021 00:00:00
              Tt_EstablishToHarvest = 0
              HarvestStage = Maturity
              ExpectedYield = 10.3
              FieldLoss = 0
              ResidueRemoval = 0
              ResidueIncorporation = 0
              ResidueIncorporationDepth = 0
              script: same as in SCRUMSownSelf.Field.CropManagement
            Manager SowBroccoli
              CropName = SCRUM_Broccoli
              EstablishDate = 10/03/2021
              EstablishStage = Seedling
              PlantingDepth = 15
              HarvestTimeOption = SettingDate
              HarvestDate = 07/02/2021 00:00:00
              Tt_EstablishToHarvest = 0
              HarvestStage = EarlyReproductive
              ExpectedYield = 16
              FieldLoss = 0.2
              ResidueRemoval = 0
              ResidueIncorporation = 0
              ResidueIncorporationDepth = 0
              script: same as in SCRUMSownSelf.Field.CropManagement
            Manager SowOnions
              CropName = SCRUM_Onions
              EstablishDate = 07/09/2021
              EstablishStage = Seed
              PlantingDepth = 15
              HarvestTimeOption = SettingDate
              HarvestDate = 04/15/2022 00:00:00
              Tt_EstablishToHarvest = 0
              HarvestStage = Maturity
              ExpectedYield = 80
              FieldLoss = 0
              ResidueRemoval = 0
              ResidueIncorporation = 0
              ResidueIncorporationDepth = 0
              script: same as in SCRUMSownSelf.Field.CropManagement
            Manager SowRyegrass
              CropName = SCRUM_Ryegrass
              EstablishDate = 06/05/2022
              EstablishStage = Seed
              PlantingDepth = 15
              HarvestTimeOption = SettingDate
              HarvestDate = 01/07/2023 00:00:00
              Tt_EstablishToHarvest = 0
              HarvestStage = Maturity
              ExpectedYield = 2.3
              FieldLoss = 0
              ResidueRemoval = 0
              ResidueIncorporation = 0
              ResidueIncorporationDepth = 0
              script: same as in SCRUMSownSelf.Field.CropManagement
            Manager Cultivation
              DoCultivation1 = True
              Cultivate1 = 05/18/2020 00:00:00
              RemoveProp1 = 0
              IncorporateProp1 = 0.8
              DepthIncorporate1 = 150
              DoCultivation2 = True
              Cultivate2 = 02/03/2021 00:00:00
              RemoveProp2 = 0.9
              IncorporateProp2 = 0
              DepthIncorporate2 = 0
              DoCultivation3 = True
              Cultivate3 = 02/09/2021 00:00:00
              RemoveProp3 = 0
              IncorporateProp3 = 0.7
              DepthIncorporate3 = 150
              DoCultivation4 = True
              Cultivate4 = 03/01/2021 00:00:00
              RemoveProp4 = 0
              IncorporateProp4 = 0.5
              DepthIncorporate4 = 100
              DoCultivation5 = True
              Cultivate5 = 08/27/2021 00:00:00
              RemoveProp5 = 0
              IncorporateProp5 = 0.8
              DepthIncorporate5 = 150
              DoCultivation6 = True
              Cultivate6 = 09/07/2021 00:00:00
              RemoveProp6 = 0
              IncorporateProp6 = 0.7
              DepthIncorporate6 = 100
              DoCultivation7 = True
              Cultivate7 = 04/22/2022 00:00:00
              RemoveProp7 = 0
              IncorporateProp7 = 0.5
              DepthIncorporate7 = 50
              DoCultivation8 = True
              Cultivate8 = 05/05/2022 00:00:00
              RemoveProp8 = 0
              IncorporateProp8 = 0.5
              DepthIncorporate8 = 50
              DoCultivation9 = True
              Cultivate9 = 01/08/2023 00:00:00
              RemoveProp9 = 0.75
              IncorporateProp9 = 0
              DepthIncorporate9 = 0
              DoCultivation10 = False
              Cultivate10 = 01/01/0001 00:00:00
              RemoveProp10 = 0
              IncorporateProp10 = 0
              DepthIncorporate10 = 0
```csharp
using Models.Soils;
using System;
using Models.Core;
using System.Collections.Generic;
using System.Text;
using Models.PMF;
using Models;
using System.Xml.Serialization;
using APSIM.Shared.Utilities;
using System.Data;
using Models.PMF.Interfaces;
using Models.Surface;

namespace Models
{
    [Serializable] 
    [System.Xml.Serialization.XmlInclude(typeof(Model))]
    public class Script : Model
    {
        [Link] Plant SCRUM;
        [Link] Clock Clock;
        [Link] Zone zone;
        [Link] Simulation Simulation;
        [Link] SurfaceOrganicMatter SurfOM;
        
        [Separator("Residue management (removal and incorporation)")]

        [Description("Consider first cultivation?")]
        public bool DoCultivation1 { get; set; }        
        [Description("   Date of first cultivation:")]
        [Display(VisibleCallback = "DoCultivation1")]
        public DateTime Cultivate1 { get; set; }
        [Description("   Proportion of residues to remove off field:")]
        [Display(VisibleCallback = "DoCultivation1")]
        public double RemoveProp1 { get; set; }
        [Description("   Proportion of remaining residues to incorporate:")]
        [Display(VisibleCallback = "DoCultivation1")]
        public double IncorporateProp1 { get; set; }
        [Description("   Depth to incorporate residues into the soil:")]
        [Display(VisibleCallback = "DoCultivation1")]
        public double DepthIncorporate1 { get; set; }

        [Description("Consider second cultivation?")]
        public bool DoCultivation2 { get; set; }        
        [Description("   Date of second cultivation:")]
        [Display(VisibleCallback = "DoCultivation2")]
        public DateTime Cultivate2 { get; set; }
        [Description("   Proportion of residues to remove off field:")]
        [Display(VisibleCallback = "DoCultivation2")]
        public double RemoveProp2 { get; set; }
        [Description("   Proportion of remaining residues to incorporate:")]
        [Display(VisibleCallback = "DoCultivation2")]
        public double IncorporateProp2 { get; set; }
        [Description("   Depth to incorporate residues into the soil:")]
        [Display(VisibleCallback = "DoCultivation2")]
        public double DepthIncorporate2 { get; set; }

        [Description("Consider third cultivation?")]
        public bool DoCultivation3 { get; set; }        
        [Description("   Date of third cultivation:")]
        [Display(VisibleCallback = "DoCultivation3")]
        public DateTime Cultivate3 { get; set; }
        [Description("   Proportion of residues to remove off field:")]
        [Display(VisibleCallback = "DoCultivation3")]
        public double RemoveProp3 { get; set; }
        [Description("   Proportion of remaining residues to incorporate:")]
        [Display(VisibleCallback = "DoCultivation3")]
        public double IncorporateProp3 { get; set; }
        [Description("   Depth to incorporate residues into the soil:")]
        [Display(VisibleCallback = "DoCultivation3")]
        public double DepthIncorporate3 { get; set; }

        [Description("Consider fourth cultivation?")]
        public bool DoCultivation4 { get; set; }        
        [Description("   Date of fourth cultivation:")]
        [Display(VisibleCallback = "DoCultivation4")]
        public DateTime Cultivate4 { get; set; }
        [Description("   Proportion of residues to remove off field:")]
        [Display(VisibleCallback = "DoCultivation4")]
        public double RemoveProp4 { get; set; }
        [Description("   Proportion of remaining residues to incorporate:")]
        [Display(VisibleCallback = "DoCultivation4")]
        public double IncorporateProp4 { get; set; }
        [Description("   Depth to incorporate residues into the soil:")]
        [Display(VisibleCallback = "DoCultivation4")]
        public double DepthIncorporate4 { get; set; }

        [Description("Consider fifth cultivation?")]
        public bool DoCultivation5 { get; set; }        
        [Description("   Date of fifth cultivation:")]
        [Display(VisibleCallback = "DoCultivation5")]
        public DateTime Cultivate5 { get; set; }
        [Description("   Proportion of residues to remove off field:")]
        [Display(VisibleCallback = "DoCultivation5")]
        public double RemoveProp5 { get; set; }
        [Description("   Proportion of remaining residues to incorporate:")]
        [Display(VisibleCallback = "DoCultivation5")]
        public double IncorporateProp5 { get; set; }
        [Description("   Depth to incorporate residues into the soil:")]
        [Display(VisibleCallback = "DoCultivation5")]
        public double DepthIncorporate5 { get; set; }

        [Description("Consider sixth cultivation?")]
        public bool DoCultivation6 { get; set; }        
        [Description("   Date of sixth cultivation:")]
        [Display(VisibleCallback = "DoCultivation6")]
        public DateTime Cultivate6 { get; set; }
        [Description("   Proportion of residues to remove off field:")]
        [Display(VisibleCallback = "DoCultivation6")]
        public double RemoveProp6 { get; set; }
        [Description("   Proportion of remaining residues to incorporate:")]
        [Display(VisibleCallback = "DoCultivation6")]
        public double IncorporateProp6 { get; set; }
        [Description("   Depth to incorporate residues into the soil:")]
        [Display(VisibleCallback = "DoCultivation6")]
        public double DepthIncorporate6 { get; set; }

        [Description("Consider seventh cultivation?")]
        public bool DoCultivation7 { get; set; }        
        [Description("   Date of seventh cultivation:")]
        [Display(VisibleCallback = "DoCultivation7")]
        public DateTime Cultivate7 { get; set; }
        [Description("   Proportion of residues to remove off field:")]
        [Display(VisibleCallback = "DoCultivation7")]
        public double RemoveProp7 { get; set; }
        [Description("   Proportion of remaining residues to incorporate:")]
        [Display(VisibleCallback = "DoCultivation7")]
        public double IncorporateProp7 { get; set; }
        [Description("   Depth to incorporate residues into the soil:")]
        [Display(VisibleCallback = "DoCultivation7")]
        public double DepthIncorporate7 { get; set; }

        [Description("Consider eighth cultivation?")]
        public bool DoCultivation8 { get; set; }        
        [Description("   Date of eighth cultivation:")]
        [Display(VisibleCallback = "DoCultivation8")]
        public DateTime Cultivate8 { get; set; }
        [Description("   Proportion of residues to remove off field:")]
        [Display(VisibleCallback = "DoCultivation8")]
        public double RemoveProp8 { get; set; }
        [Description("   Proportion of remaining residues to incorporate:")]
        [Display(VisibleCallback = "DoCultivation8")]
        public double IncorporateProp8 { get; set; }
        [Description("   Depth to incorporate residues into the soil:")]
        [Display(VisibleCallback = "DoCultivation8")]
        public double DepthIncorporate8 { get; set; }

        [Description("Consider nineth cultivation?")]
        public bool DoCultivation9 { get; set; }        
        [Description("   Date of nineth cultivation:")]
        [Display(VisibleCallback = "DoCultivation9")]
        public DateTime Cultivate9 { get; set; }
        [Description("   Proportion of residues to remove off field:")]
        [Display(VisibleCallback = "DoCultivation9")]
        public double RemoveProp9 { get; set; }
        [Description("   Proportion of remaining residues to incorporate:")]
        [Display(VisibleCallback = "DoCultivation9")]
        public double IncorporateProp9 { get; set; }
        [Description("   Depth to incorporate residues into the soil:")]
        [Display(VisibleCallback = "DoCultivation9")]
        public double DepthIncorporate9 { get; set; }

        [Description("Consider tenth cultivation?")]
        public bool DoCultivation10 { get; set; }        
        [Description("   Date of tenth cultivation:")]
        [Display(VisibleCallback = "DoCultivation10")]
        public DateTime Cultivate10 { get; set; }
        [Description("   Proportion of residues to remove off field:")]
        [Display(VisibleCallback = "DoCultivation10")]
        public double RemoveProp10 { get; set; }
        [Description("   Proportion of remaining residues to incorporate:")]
        [Display(VisibleCallback = "DoCultivation10")]
        public double IncorporateProp10 { get; set; }
        [Description("   Depth to incorporate residues into the soil:")]
        [Display(VisibleCallback = "DoCultivation10")]
        public double DepthIncorporate10 { get; set; }
        
        
        [EventSubscribe("DoManagement")]
        private void OnDoManagement(object sender, EventArgs e)
        {
            
            if (DoCultivation1 && Clock.Today.Date == Cultivate1)
            {
                if (RemoveProp1 > 0.0)
                     SurfOM.Incorporate(RemoveProp1, 0.0);
                if (IncorporateProp1 > 0.0)
                    SurfOM.Incorporate(IncorporateProp1, DepthIncorporate1);
            }
                
            if (DoCultivation2 && Clock.Today.Date == Cultivate2)
            {
                if (RemoveProp2 > 0.0)
                     SurfOM.Incorporate(RemoveProp2, 0.0);
                if (IncorporateProp2 > 0.0)
                    SurfOM.Incorporate(IncorporateProp2, DepthIncorporate2);
            }
            if (DoCultivation3 && Clock.Today.Date == Cultivate3)
            {
                if (RemoveProp3 > 0.0)
                     SurfOM.Incorporate(RemoveProp3, 0.0);
                if (IncorporateProp3 > 0.0)
                    SurfOM.Incorporate(IncorporateProp3, DepthIncorporate3);
            }
            if (DoCultivation4 && Clock.Today.Date == Cultivate4)
            {
                if (RemoveProp4 > 0.0)
                     SurfOM.Incorporate(RemoveProp4, 0.0);
                if (IncorporateProp4 > 0.0)
                    SurfOM.Incorporate(IncorporateProp4, DepthIncorporate4);
            }
            if (DoCultivation5 && Clock.Today.Date == Cultivate5)
            {
                if (RemoveProp5 > 0.0)
                     SurfOM.Incorporate(RemoveProp5, 0.0);
                if (IncorporateProp5 > 0.0)
                    SurfOM.Incorporate(IncorporateProp5, DepthIncorporate5);
            }
            if (DoCultivation6 && Clock.Today.Date == Cultivate6)
            {
                if (RemoveProp6 > 0.0)
                     SurfOM.Incorporate(RemoveProp6, 0.0);
                if (IncorporateProp6 > 0.0)
                    SurfOM.Incorporate(IncorporateProp6, DepthIncorporate6);
            }
            if (DoCultivation7 && Clock.Today.Date == Cultivate7)
            {
                if (RemoveProp7 > 0.0)
                     SurfOM.Incorporate(RemoveProp7, 0.0);
                if (IncorporateProp7 > 0.0)
                    SurfOM.Incorporate(IncorporateProp7, DepthIncorporate7);
            } 
            if (DoCultivation8 && Clock.Today.Date == Cultivate8)
            {
                if (RemoveProp8 > 0.0)
                     SurfOM.Incorporate(RemoveProp8, 0.0);
                if (IncorporateProp8 > 0.0)
                    SurfOM.Incorporate(IncorporateProp8, DepthIncorporate8);
            }
            if (DoCultivation9 && Clock.Today.Date == Cultivate9)
            {
                if (RemoveProp9 > 0.0)
                     SurfOM.Incorporate(RemoveProp9, 0.0);
                if (IncorporateProp9 > 0.0)
                    SurfOM.Incorporate(IncorporateProp9, DepthIncorporate9);
            }
            if (DoCultivation10 && Clock.Today.Date == Cultivate10)
            {
                if (RemoveProp10 > 0.0)
                     SurfOM.Incorporate(RemoveProp10, 0.0);
                if (IncorporateProp10 > 0.0)
                    SurfOM.Incorporate(IncorporateProp10, DepthIncorporate10);
            }  
        }
    }
}
```
            Manager SetupInitialSoilN
              Treatment1Name = LincolnRot1_N1_Irr1
              Treatment1NO3 = 9.9, 9.9, 5.7, 1.5, 1.1, 1.15, 1.2, 0.5, 0.42, 0.33
              Treatment1NH4 = 3.4, 3.4, 1.9, 0.4, 0.4, 0.45, 0.5, 0.4, 0.42, 0.43
              Treatment2Name = LincolnRot1_N2_Irr1
              Treatment2NO3 = 9.6, 9.6, 5.9, 2.2, 2.2, 2, 1.8, 3.3, 3.42, 3.53
              Treatment2NH4 = 0.5, 0.5, 0.45, 0.4, 0.1, 0.1, 0.1, 0.2, 0.22, 0.23
              Treatment3Name = LincolnRot1_N3_Irr1
              Treatment3NO3 = 9, 9, 6.5, 4, 4.5, 3.9, 3.3, 1.6, 0.92, 0.23
              Treatment3NH4 = 0.5, 0.5, 0.45, 0.4, 0.2, 0.25, 0.3, 0.2, 0.22, 0.23
              Treatment4Name = LincolnRot1_N4_Irr1
              Treatment4NO3 = 27, 27, 18.35, 9.7, 7.2, 5.15, 3.1, 2.2, 1.1, 0
              Treatment4NH4 = 0.8, 0.8, 0.55, 0.3, 0.4, 0.3, 0.2, 0.1, 0.05, 0
              Treatment5Name = LincolnRot1_N1_Irr2
              Treatment5NO3 = 7.4, 7.4, 4.3, 1.2, 0.8, 1.1, 1.4, 0.9, 1.02, 1.13
              Treatment5NH4 = 1.2, 1.2, 0.95, 0.7, 0.2, 0.2, 0.2, 0, 0, 0
              Treatment6Name = LincolnRot1_N2_Irr2
              Treatment6NO3 = 8.2, 8.2, 4.75, 1.3, 0.9, 1, 1.1, 0.7, 0.7, 0.7
              Treatment6NH4 = 1.1, 1.1, 0.85, 0.6, 0.6, 0.4, 0.2, 0.1, 0.05, 0
              Treatment7Name = LincolnRot1_N3_Irr2
              Treatment7NO3 = 9.5, 9.5, 5.75, 2, 2.5, 2.9, 3.3, 2.1, 2.17, 2.23
              Treatment7NH4 = 1.7, 1.7, 1.45, 1.2, 0.4, 0.4, 0.4, 0.5, 0.52, 0.53
              Treatment8Name = LincolnRot1_N4_Irr2
              Treatment8NO3 = 11.3, 11.3, 8.7, 6.1, 7.5, 7.2, 6.9, 5, 4.49, 3.97
              Treatment8NH4 = 0.8, 0.8, 0.6, 0.4, 0.4, 0.25, 0.1, 0.2, 0.12, 0.03
```csharp
using System;
using System.Collections.Generic;
using APSIM.Shared.Utilities;
using Models;
using Models.Core;
using Models.Soils;

namespace Models
{
    [Serializable] 
    [System.Xml.Serialization.XmlInclude(typeof(Model))]
    public class Script : Model
    {
        [Link] private Clock clock;
        [Link] private Zone myZone;
        [Link] private ISummary summary;
        [Link] private Simulation thisSimulation;
        [Link] private IPhysical soilPhysical; 
        [Link] private Chemical soilChemical;
        [Link(ByName=true)] private Solute NH4;
        [Link(ByName=true)] private Solute NO3;
        
        [Separator("A component to modify soil parameters during a simulation")]
        [Description("- Name of treament 1:")]
        public string Treatment1Name { get; set; }
        [Description("   NO3 values (ppm), per layer (comma separated):")]
        public double[] Treatment1NO3 { get; set; }
        [Description("   NH4 values (ppm), per layer (comma separated):")]
        public double[] Treatment1NH4 { get; set; }
        
        [Description("- Name of treament 2:")]
        public string Treatment2Name { get; set; }
        [Description("   NO3 values (ppm), per layer (comma separated):")]
        public double[] Treatment2NO3 { get; set; }
        [Description("   NH4 values (ppm), per layer (comma separated):")]
        public double[] Treatment2NH4 { get; set; }

        [Description("- Name of treament 3:")]
        public string Treatment3Name { get; set; }
        [Description("   NO3 values (ppm), per layer (comma separated):")]
        public double[] Treatment3NO3 { get; set; }
        [Description("   NH4 values (ppm), per layer (comma separated):")]
        public double[] Treatment3NH4 { get; set; }

        [Description("- Name of treament 4:")]
        public string Treatment4Name { get; set; }
        [Description("   NO3 values (ppm), per layer (comma separated):")]
        public double[] Treatment4NO3 { get; set; }
        [Description("   NH4 values (ppm), per layer (comma separated):")]
        public double[] Treatment4NH4 { get; set; }

        [Description("- Name of treament 5:")]
        public string Treatment5Name { get; set; }
        [Description("   NO3 values (ppm), per layer (comma separated):")]
        public double[] Treatment5NO3 { get; set; }
        [Description("   NH4 values (ppm), per layer (comma separated):")]
        public double[] Treatment5NH4 { get; set; }

        [Description("- Name of treament 6:")]
        public string Treatment6Name { get; set; }
        [Description("   NO3 values (ppm), per layer (comma separated):")]
        public double[] Treatment6NO3 { get; set; }
        [Description("   NH4 values (ppm), per layer (comma separated):")]
        public double[] Treatment6NH4 { get; set; }
        
        [Description("- Name of treament 7:")]
        public string Treatment7Name { get; set; }
        [Description("   NO3 values (ppm), per layer (comma separated):")]
        public double[] Treatment7NO3 { get; set; }
        [Description("   NH4 values (ppm), per layer (comma separated):")]
        public double[] Treatment7NH4 { get; set; }
        
        [Description("- Name of treament 8:")]
        public string Treatment8Name { get; set; }
        [Description("   NO3 values (ppm), per layer (comma separated):")]
        public double[] Treatment8NO3 { get; set; }
        [Description("   NH4 values (ppm), per layer (comma separated):")]
        public double[] Treatment8NH4 { get; set; }
        
        private int nLayers;

        
        [EventSubscribe("StartOfSimulation")]
        private void OnStartOfSimulation(object sender, EventArgs e)
        {
            nLayers = soilPhysical.Thickness.Length;
            summary.WriteMessage(this, "Initialise", MessageType.Diagnostic);
        }

        [EventSubscribe("StartOfDay")]
        private void OnStartOfDay(object sender, EventArgs e)
        {
            double[] newNO3Values = null;
            double[] newNH4Values = null;
            
            if (clock.Today.Date == clock.StartDate)
            {
                // check the values given, per treatment
                if (thisSimulation.Name == Treatment1Name)
                {
                    newNO3Values = setupNewValues(NO3.ppm, Treatment1NO3);
                    newNH4Values = setupNewValues(NH4.ppm, Treatment1NH4);
                }
                else if (thisSimulation.Name == Treatment2Name)
                {
                    newNO3Values = setupNewValues(NO3.ppm, Treatment2NO3);
                    newNH4Values = setupNewValues(NH4.ppm, Treatment2NH4);
                }
                else if (thisSimulation.Name == Treatment3Name)
                {
                    newNO3Values = setupNewValues(NO3.ppm, Treatment3NO3);
                    newNH4Values = setupNewValues(NH4.ppm, Treatment3NH4);
                }
                else if (thisSimulation.Name == Treatment4Name)
                {
                    newNO3Values = setupNewValues(NO3.ppm, Treatment4NO3);
                    newNH4Values = setupNewValues(NH4.ppm, Treatment4NH4);
                }
                else if (thisSimulation.Name == Treatment5Name)
                {
                    newNO3Values = setupNewValues(NO3.ppm, Treatment5NO3);
                    newNH4Values = setupNewValues(NH4.ppm, Treatment5NH4);
                }
                else if (thisSimulation.Name == Treatment6Name)
                {
                    newNO3Values = setupNewValues(NO3.ppm, Treatment6NO3);
                    newNH4Values = setupNewValues(NH4.ppm, Treatment6NH4);
                }
                else if (thisSimulation.Name == Treatment7Name)
                {
                    newNO3Values = setupNewValues(NO3.ppm, Treatment7NO3);
                    newNH4Values = setupNewValues(NH4.ppm, Treatment7NH4);
                }
                else if (thisSimulation.Name == Treatment8Name)
                {
                    newNO3Values = setupNewValues(NO3.ppm, Treatment8NO3);
                    newNH4Values = setupNewValues(NH4.ppm, Treatment8NH4);
                }
                else
                {
                    summary.WriteMessage(this, "No changes made because the simulation name \"" + thisSimulation.Name 
                                           + "\" did not correspond to any given treatment", MessageType.Warning);
                }

                //do the actual changes
                if(newNO3Values != null)
                {
                    NO3.kgha = newNO3Values;
                    summary.WriteMessage(this, "Initial values for soil NO3 modified", MessageType.Diagnostic);
                }
                if(newNH4Values != null)
                {
                    NH4.kgha = newNH4Values;
                    summary.WriteMessage(this, "Initial values for soil NH4 modified", MessageType.Diagnostic);
                }
            }
        }


        private double[] setupNewValues(double[] currentValues, double[] givenValues)
        {
            double[] newValues = null;
            if (givenValues[0] >=0)
            {
                newValues = new double[nLayers];
                for (int z = 0; z < nLayers; z++)
                {
                    if (z < givenValues.Length)
                    {
                        newValues[z] = givenValues[z];
                    }
                    else
                    {
                        newValues[z] = currentValues[z];
                    }
                    
                    //convert to kg/ha
                    newValues[z] *= soilPhysical.BD[z]*soilPhysical.Thickness[z]/100.0;
                }
            }
            
            return newValues;
        }
    }
}
```
            Operations NitrogenOperations
            Operations IrrigationOperations
          MicroClimate: a_interception=0; b_interception=1; c_interception=0; d_interception=0; SoilHeatFluxFraction=0.4; MinimumHeightDiffForNewLayer=0; NightInterceptionFraction=0.5; ReferenceHeight=2
          Irrigation
          Fertiliser
          SurfaceOrganicMatter: InitialResidueName=potato; InitialResidueType=potato; InitialResidueMass=4350; InitialStandingFraction=0; InitialCPR=0; InitialCNR=42.8
          Soil: SoilType=Mottled Immature Palic Soil; LocalName=Templeton; Site=A Block, PFR Research Farm; NearestTown=Lincoln; Region=Canterbury; Country=New Zealand; Latitude=-43.626; Longitude=172.468; YearOfSampling=2020
            DataSource=Data from analyses at PFR soil lab using samples from site, complemented with historical data from nearby studies and PTFs (Cichota et al, 2016). Pedological description by Thomas Caspari (MWLC)
            Comments=This represents an 'average' of the two profiles described at the site. Modified after sensibility tests and checks against field measured data.
            Memo
              # Notes

              Values for physical properties, particularly water storage limits and SWCon, were adjused after comparison against field-measured data.
              Values for FOM were based on expert opinion and adjusted after comparison with measured soil N data.
            Physical
              Thickness  ParticleSizeSand  ParticleSizeSilt  ParticleSizeClay  Rocks  BD     AirDry  LL15   DUL    SAT    KS
              100        15                63                22                0      1.23   0.05    0.145  0.3    0.535  480
              100        15                63                22                0      1.235  0.065   0.17   0.325  0.53   420
              200        12.5              66                21.5              0      1.375  0.07    0.18   0.35   0.481  240
              200        15                65                20                0      1.66   0.06    0.15   0.313  0.374  48
              200        5                 72.5              22.5              0      1.59   0.074   0.175  0.325  0.4    144
              200        45                47                8                 0      1.44   0.04    0.1    0.318  0.45   1200
              200        25                60                15                0      1.525  0.048   0.12   0.315  0.425  480
              200        60                35                5                 0      1.36   0.028   0.07   0.275  0.45   720
              200        50                44                6                 0      1.35   0.04    0.08   0.33   0.46   1200
              200        50                44                6                 0      1.35   0.032   0.08   0.3    0.455  1140
              SoilCrop SCRUMSoil: same as ABlock.ABlock_06_07.Field.Soil.Physical.SCRUMSoil
            WaterBalance SoilWater: same as ABlock.ABlock_06_07.Field.Soil.SoilWater
            Organic: same as ABlock.ABlock_06_07.Field.Soil.Organic
            Chemical: same as ABlock.ABlock_06_07.Field.Soil.Chemical
            Nutrient
            Water: Thickness=[100, 100, 200, 200, 200, 200, 200, 200, 200, 200]; InitialPAWmm=322.9; RelativeTo=LL15; FilledFromTop=false
              InitialValues=[0.25, 0.27, 0.317, 0.3, 0.315, 0.315, 0.315, 0.275, 0.33, 0.3]
            OutputLayers OutputWaterLayers: Thickness=[200, 200, 200, 200, 200, 200, 200, 200, 200]
            OutputLayers OutputNutrientLayers: Thickness=[150, 150, 300, 300, 300, 300, 300]
            Solute NO3: Thickness=[150, 150, 300, 300, 300, 300, 300]; InitialValues=[13.4, 2.5, 1, 0.75, 1, 1, 1]; InitialValuesUnits=ppm; WaterTableConcentration=0; D0=0; DepthConstant=0; MaxDepthSoluteAccessible=0; RunoffEffectivenessAtMovingSolute=0; MaxEffectiveRunoff=0
            Solute NH4: Thickness=[150, 150, 300, 300, 300, 300, 300]; InitialValues=[1, 0.5, 0.1, 0.1, 0, 0, 0]; InitialValuesUnits=ppm; WaterTableConcentration=0; D0=0; DepthConstant=0; MaxDepthSoluteAccessible=0; RunoffEffectivenessAtMovingSolute=0; MaxEffectiveRunoff=0
            Solute Urea: same as ABlock.ABlock_06_07.Field.Soil.Urea
            SoilTemperature Temperature
          Plant SCRUM
          ScrumCropInstance SCRUM_Wheat: HarvestIndex=0.42; MoistureContent=0.14; RootProportion=0.1; MaxRootDepth=1650; MaxHeight=1000; MaxCover=0.84; ExtinctionCoefficient=0.7; TypicalHarvestStage=Maturity; SeedlingNConc=0.0496; ProductHarvestNConc=0.0218; StoverHarvestNConc=0.0059; RootNConc=0.01; LegumeFactor=0; BaseTemperature=0; OptimumTemperature=25; MaxTemperature=35; Tt_SowToEmergence=125; GSMax=0.008; R50=150; ConsiderWaterStress=true; PlantingDepth=20; ExpectedYield=11; FieldLoss=0; ResidueRemoval=0; ResidueIncorporation=0; ResidueIncorporationDepth=0; Factor_XoBiomass=0.5; Factor_bBiomass=0.2; Factor_XoCover=0.4; Factor_bCover=0.2; Factor_XoHeight=0.7; Factor_bHeight=0.2; Tt_EmergencetoMaturity=0
          ScrumCropInstance SCRUM_Broccoli: HarvestIndex=0.28; MoistureContent=0.894; RootProportion=0.1; MaxRootDepth=1500; MaxHeight=350; MaxCover=0.88; ExtinctionCoefficient=0.99; TypicalHarvestStage=MidReproductive; SeedlingNConc=0.057; ProductHarvestNConc=0.046; StoverHarvestNConc=0.0282; RootNConc=0.018; LegumeFactor=0; BaseTemperature=0; OptimumTemperature=20; MaxTemperature=38; Tt_SowToEmergence=0; GSMax=0.008; R50=150; ConsiderWaterStress=true; EstablishStage=Seedling; HarvestStage=Ripe; FieldLoss=0; ResidueRemoval=0; ResidueIncorporation=0; ResidueIncorporationDepth=0; Factor_XoBiomass=0.5; Factor_bBiomass=0.2; Factor_XoCover=0.4; Factor_bCover=0.2; Factor_XoHeight=0.7; Factor_bHeight=0.2; Tt_EmergencetoMaturity=0
          ScrumCropInstance SCRUM_Onions: HarvestIndex=0.7; MoistureContent=0.87; RootProportion=0.2; MaxRootDepth=500; MaxHeight=380; MaxCover=0.76; ExtinctionCoefficient=0.4; TypicalHarvestStage=Maturity; SeedlingNConc=0.05; ProductHarvestNConc=0.0113; StoverHarvestNConc=0.0228; RootNConc=0.0156; LegumeFactor=0; BaseTemperature=5; OptimumTemperature=30; MaxTemperature=40; Tt_SowToEmergence=400; GSMax=0.008; R50=150; ConsiderWaterStress=true; EstablishStage=Seed; HarvestStage=Ripe; FieldLoss=0; ResidueRemoval=0; ResidueIncorporation=0; ResidueIncorporationDepth=0; Factor_XoBiomass=0.5; Factor_bBiomass=0.2; Factor_XoCover=0.4; Factor_bCover=0.2; Factor_XoHeight=0.7; Factor_bHeight=0.2; Tt_EmergencetoMaturity=0
          ScrumCropInstance SCRUM_Ryegrass: HarvestIndex=0.14; MoistureContent=0.14; RootProportion=0.1; MaxRootDepth=1500; MaxHeight=500; MaxCover=0.97; ExtinctionCoefficient=0.86; TypicalHarvestStage=Maturity; SeedlingNConc=0.06; ProductHarvestNConc=0.0205; StoverHarvestNConc=0.015; RootNConc=0.01; LegumeFactor=0; BaseTemperature=0; OptimumTemperature=20; MaxTemperature=35; Tt_SowToEmergence=350; GSMax=0.008; R50=150; ConsiderWaterStress=true; EstablishStage=Seed; HarvestStage=MidReproductive; FieldLoss=0; ResidueRemoval=0; ResidueIncorporation=0; ResidueIncorporationDepth=0; Factor_XoBiomass=0.5; Factor_bBiomass=0.2; Factor_XoCover=0.4; Factor_bCover=0.2; Factor_XoHeight=0.7; Factor_bHeight=0.2; Tt_EmergencetoMaturity=0
          Report ReportSVS: EventNames=[Clock].DoReport
            VariableNames:
              [Clock].Today
              [SCRUM].SowingData.Cultivar as CropName
              // Water balance outputs
              [Weather].Rain as Rainfall
              [Irrigation].IrrigationApplied as IrrigationApplied
              [Soil].SoilWater.Eo as Eo
              [Soil].SoilWater.Es as Evaporation
              [SCRUM].Stover.Transpiration as Transpiration
              [Soil].SoilWater.pond as PondedWater
              [Soil].SoilWater.Drainage as Drainage
              [Soil].SoilWater.Runoff as Runoff
              sum([Soil].SoilWater.LateralOutflow) as LateralFlow
              sum([Soil].Water.MM) as TotalSWC
              sum([Soil].OutputWaterLayers.SWmm) as TotalSWmmCheck
              sum([Soil].Physical.SATmm) as TotalSAT
              sum([Soil].Physical.DULmm) as TotalDUL
              sum([Soil].Physical.LL15mm) as TotalLL15
              // Nitrogen balance outputs
              [Fertiliser].NitrogenApplied as FertiliserNApplied
              sum([Soil].Nutrient.DenitrifiedN) as DenitrifiedN
              ([Soil].SoilWater.LeachNH4 + [Soil].SoilWater.LeachNO3) as LeachedN
              (-[SCRUM].Root.NUptake) as UptakeN
              (sum([SurfaceOrganicMatter].SurfaceResidue.Decomposition.MineralisedN) + sum([Soil].Nutrient.MineralisedN)) as NetMineralisedN
              sum([Soil].Nutrient.MineralisedN) as MineralisedSoilN
              sum([SurfaceOrganicMatter].SurfaceResidue.Decomposition.MineralisedN) as MineralisedSurfOMN
              (sum([Soil].Urea.kgha) + sum([Soil].NH4.kgha) + sum([Soil].NO3.kgha)) as TotalSoilN
              sum([Soil].Urea.kgha) as TotalUrea
              sum([Soil].NH4.kgha) as TotalNH4
              sum([Soil].NO3.kgha) as TotalNO3
              [SurfaceOrganicMatter].N as TotalSurfaceOMN
              sum([Soil].Nutrient.FOM.N) as TotalFOMN
              sum([Soil].Nutrient.Humic.N) as TotalHumicN
              sum([Soil].Nutrient.Microbial.N) as TotalMicrobialN
              [SCRUM].Total.N*10 as TotalPlantN
              [SCRUM].AboveGround.N *10 as AboveGroundN
              // Crop outputs
              [SCRUM].Total.Wt*10 as TotalPlantWt
              [SCRUM].AboveGround.Wt
              [SCRUM].Root.Wt as SCRUM.BelowGround.Wt
              [SCRUM].Stover.Wt
              [SCRUM].Stover.Live.Wt
              [SCRUM].Product.Wt
              [SCRUM].Product.Live.Wt
              [SCRUM].Root.Wt
              [SCRUM].Product.Live.N
              [SCRUM].Stover.Live.NConc
              [SCRUM].Total.NConc
              [SCRUM].AboveGround.NConc
              [SCRUM].Stover.Fw
              [SCRUM].Stover.Fn
              [SCRUM].Stover.LAI as LAIGreen
              [SCRUM].Stover.LAIDead as LAIDead
              [SCRUM].Stover.LAITotal as LAITotal
              [SCRUM].Stover.Height as CropHeight
              [SCRUM].Stover.CoverGreen as CoverGreen
              [SCRUM].Stover.CoverDead as CoverDead
              [SCRUM].Stover.CoverTotal as CoverTotal
              [SCRUM].Root.Depth as RootDepth
              [SCRUM].Phenology.CurrentPhase.Name
              [SCRUM].Phenology.CurrentStageName
              [SCRUM].Phenology.Stage
              // Harvest outptus
              [SCRUM_Wheat].ProductHarvested.Wt
              [SCRUM_Broccoli].ProductHarvested.Wt
              [SCRUM_Onions].ProductHarvested.Wt
              [SCRUM_Ryegrass].ProductHarvested.Wt
              [SCRUM_Wheat].StoverRemoved.Wt
              [SCRUM_Broccoli].StoverRemoved.Wt
              [SCRUM_Onions].StoverRemoved.Wt
              [SCRUM_Ryegrass].StoverRemoved.Wt
              //([SCRUM_Wheat].ProductHarvested.Wt + [SCRUM_Broccoli].ProductHarvested.Wt + [SCRUM_Onions].ProductHarvested.Wt + [SCRUM_Ryegrass].ProductHarvested.Wt) as CropYield
              //([SCRUM_Wheat].StoverRemoved.Wt + [SCRUM_Broccoli].StoverRemoved.Wt + [SCRUM_Onions].StoverRemoved.Wt + [SCRUM_Ryegrass].StoverRemoved.Wt) as ResidueRemovedWt
              //([SCRUM_Wheat].ProductHarvested.N + [SCRUM_Broccoli].ProductHarvested.N + [SCRUM_Onions].ProductHarvested.N + [SCRUM_Ryegrass].ProductHarvested.N) as CropYield_N
              //([SCRUM_Wheat].StoverRemoved.N + [SCRUM_Broccoli].StoverRemoved.N + [SCRUM_Onions].StoverRemoved.N + [SCRUM_Ryegrass].StoverRemoved.N) as ResidueRemoved_N
              // Fresh organic matter outptus
              [SurfaceOrganicMatter].Wt as TotalSurfaceOMWt
              [SurfaceOrganicMatter].C as TotalSurfaceOMC
              ([SurfaceOrganicMatter].C/([SurfaceOrganicMatter].N + 0.000000001) as SurfaceOM.CN
              (sum([Soil].Nutrient.FOM.C)/(sum([Soil].Nutrient.FOM.N) + 0.000000001) as SoilFOM.CN
              sum([Soil].Nutrient.FOM.C)/0.4 as TotalFOMWt
              sum([Soil].Nutrient.FOM.C) as TotalFOMC
              // VALIDATION outputs
              ([SCRUM].AboveGround.Wt)/100 as AboveGroundWt
              [SCRUM].Stover.CoverTotal as Cover
              [Soil].OutputWaterLayers.SW[1] as VWC_0_20
              [Soil].OutputWaterLayers.SW[2] as VWC_20_40
              [Soil].OutputWaterLayers.SW[3] as VWC_40_60
              [Soil].OutputWaterLayers.SW[4] as VWC_60_80
              [Soil].OutputWaterLayers.SW[5] as VWC_80_100
              [Soil].OutputWaterLayers.SW[6] as VWC_100_120
              [Soil].OutputWaterLayers.SW[7] as VWC_120_140
              [Soil].OutputWaterLayers.SW[8] as VWC_140_160
              ([Soil].OutputWaterLayers.SWmm[1] + [Soil].OutputWaterLayers.SWmm[2] + [Soil].OutputWaterLayers.SWmm[3]) as SWCmm_0_60
              ([Soil].OutputNutrientLayers.NH4[1]+[Soil].OutputNutrientLayers.NO3[1]+[Soil].OutputNutrientLayers.NH4[2]+[Soil].OutputNutrientLayers.NO3[2]) as SoilN_0_30
              ([Soil].OutputNutrientLayers.NH4[3]+[Soil].OutputNutrientLayers.NO3[3]) as SoilN_30_60
              ([Soil].OutputNutrientLayers.NH4[4]+[Soil].OutputNutrientLayers.NO3[4]) as SoilN_60_90
              ([Soil].OutputNutrientLayers.NH4[5]+[Soil].OutputNutrientLayers.NO3[5]) as SoilN_90_120
              ([Soil].OutputNutrientLayers.NH4[6]+[Soil].OutputNutrientLayers.NO3[6]) as SoilN_120_150
              (SoilN_0_30 + SoilN_30_60) as SoilN_0_60
              (SoilN_0_30 + SoilN_30_60 + SoilN_60_90) as SoilN_0_90
              (SoilN_0_30 + SoilN_30_60 + SoilN_60_90 + SoilN_90_120) as SoilN_0_120
              (SoilN_0_30 + SoilN_30_60 + SoilN_60_90 + SoilN_90_120 + SoilN_120_150) as SoilN_0_150
              ([Soil].SoilWater.Flux[3] + [Soil].SoilWater.Flow[3]) as Drainage_60cm
              ([Soil].SoilWater.FlowNH4[3] + [Soil].SoilWater.FlowNO3[3]) as LeachedN_60cm
              Sum of ([Soil].SoilWater.FlowNH4[4] + [Soil].SoilWater.FlowNO3[4]) from [Clock].StartDate to [Clock].Today as LeachedN_60cm
              ([Soil].SoilWater.Flux[4] + [Soil].SoilWater.Flow[4]) as Drainage_90cm
              ([Soil].SoilWater.FlowNH4[4] + [Soil].SoilWater.FlowNO3[4]) as LeachedN_90cm
              [Soil].SoilWater.FlowNO3
              ([Soil].OutputNutrientLayers.NO3ppm*[Soil].OutputNutrientLayers.BD/[Soil].OutputNutrientLayers.SW) as SolutionNO3
              [Soil].NO3.ppm*[Soil].Physical.BD/[Soil].Water.Volumetric as SolutionConc
              [Soil].Nutrient.MineralisedN
              [SCRUM].Root.NTakenUp
              [SCRUM].Root.WaterUptake
              [Soil].SoilWater.Flux as WaterFlow
      Folder LeachedN
        Memo
          *	Message from Alex (no measurements done after the wheat crop) - any leaching wouldn't have been recorded so should be voided.
    Experiment LincolnRot2
      Memo Rotation details
        *	Shanghai Pak choi: (sown 7 Dec 2020, harvested 22 Jan 2021)

        *	Milton oats: (sown 02 Mar 2021, final harvest 26 Jul 2021) - harvested crop was baled

        *	Potatoes (Agria) : (sown 22/10/2021, final harvest 08/03/2022)

        *	Ryegrass (Nui) : (sown 06/05/2022, final harvest 04/01/2023)

        *	Surface flooding in December (Consider when checking model response to N and water balance components)
      Memo SowHarvestEvents
        ### Rotation 2 - Planting and harvesting

        19/05/2020	-	Planting - Oats sown at 110 kg/ha (variety 'Milton')

        7/12/2020	-	Planting - Pak Choi sown (variety 'Shanghai'), 4 pairs (8 rows) to a 1.64 m bed, and approximately 10-15 mm deep
        20/01/2021	-	Harvesting - Final harvest done. Marketable and residue (unmarketable and trimmings) weighed, residue returned to plots
        22/01/2021	-	Harvesting - Decided to remove the bulk with the Cibus forage harvester. Took residual measurements from every plot

        2/03/2021	-	Planting - Oats drilled @ 120 kg/ha, variety 'Milton'
        30/07/2021	-	Harvesting - Oats mown and baled about 5 days later

        22/10/2021	-	Planting - Planting of Agria seed tubers. Targeted a population between 45-50000 tubers/ha around 27.5cm in row spacing. And depth around 17cm. Tuber size is around 45-55mm
        15/04/2022	-	Harvesting - Potatoes commercially harvested

        6/05/2022	-	Planting - Drilled 25 kg/ha of 'Nui' ryegrass
        7/01/2023	-	Harvesting - ...
      Memo CultivationEvents
        ### Rotation 2 - Cultivation

        11/05/2020	-	Site Power-harrowed
        12/05/2020	-	Ploughed and rolled
        19/05/2020	-	Grubbed, power-harrowed
        15/09/2020	-	Ploughed and rolled
        3/11/2020	-	Deep power harrow
        3/12/2020	-	Wheel rutts lifted with maxitill and PZ used
        7/12/2020	-	Power harrow
        19/02/2021	-	Grub, disc and roll
        1/03/2021	-	Maxitilled three times. First pass was did not do anything as crumbler was out of the ground
        24/09/2021	-	Ploughed to 25cm then cambridged rolled twice
        11/10/2021	-	Power harrowed whole column
        12/10/2021	-	Pz whole site then cambridged rolled site
        20/10/2021	-	Potato site moulded ready for planting
        19/04/2022	-	Grubbed
        22/04/2022	-	Maxitilled
        5/05/2022	-	Grubbed
        6/05/2022	-	Cambridge rolled x3
      Memo FertiliserEvents
        ### Rotation 2 - Fertiliser

        05/08/2020	-	40 kg N in the form of Urea applied
        21/12/2020	-	First side dressing of CAN applied. N1 = 0, N2 = 15, N3 = 30 and N4 = 60 kg N/ha
        12/01/2021	-	Second side dressing of CAN applied. N1 = 0, N2 = 15, N3 = 30 and N4 = 60 kg N/ha. Plot 21, 27 and 32 (N4) received 80 kg N/ha accidentally
        15/01/2021	-	Applied 20 kg N/ha (CAN) to Plots 2, 8, 12, 15, and 19 to make up for the over application to Plots 21, 27 and 32. Total N applied to N4 = 140 kg N/ha
        13/12/2021	-	First side dressing of N applied. N1 = 0, N2 = 31, N3 = 62 and N4 = 124 kg N/ha as CAN. Plot 25 (N1) accidentally received 124 kg N/ha
        22/12/2021	-	2nd side dressing of N applied. N1 = 0, N2 = 31, N3 = 62 and N4 = 124 kg N/ha as CAN
        07/01/2022	-	3rd side dressing of N applied. N1 = 0, N2 = 41, N3 = 82 and N4 = 164 kg N/ha as CAN
        12/05/2022	-	Applied 30 kg N/ha as CAN to GMP and respective rates to other treatments as starter N
        01/09/2022	-	Applied first side dressing of N (CAN) 40 kg N/ha to GMP with subsequent changes for N2 and N4
        29/09/2022	-	Applied 30 kg N/ha (CAN) to GMP and relative rates to other treatments
        04/11/2022	-	Applied 20 kg N/ha to GMP and respective rates to other treatments. CAN used
      Memo IrrigationEvents
        ### Rotation 2 - Irrigation

        .../10/2020	-	Approx. 80 mm applied over the month to wet up profile
        06/12/2020	-	15 mm applied to moisten clods
        14/12/2020	-	10 mm applied
        16/12/2020	-	10 mm applied
        17/12/2020	-	10 mm applied
        08/01/2020	-	10 mm applied to Irrig 1, 15 mm applied to Irrig 2
        12/01/2021	-	15 mm applied to Trt 1 and 20 mm applied to Trt 2
        15/01/2021	-	10 mm applied to all treatments
        19/01/2021	-	15 mm applied to whole trial
        25/02/2021	-	30 mm applied to column
        16/03/2021	-	25 mm applied to whole column
        27/03/2021	-	25 mm applied to whole column
        18/11/2021	-	20 mm applied to whole trial
        23/12/2021	-	20 mm applied to whole trial
        28/12/2021	-	25 mm applied to whole trial
        07/01/2022	-	25 mm applied to whole trial
        12/01/2022	-	Irrig 1 = 20 mm and Irrig 2 = 30 mm
        19/01/2022	-	Irrig 1 = 25 mm and Irrig 2 = 35 mm
        01/02/2022	-	Irrig 1 = 10 mm and Irrig 2 = 20 mm
        13/10/2022	-	30 mm applied to column
        19/10/2022	-	20 mm applied to Irrig 1 and 30 mm applied to Irrig 2
        03/11/2022	-	20 mm applied to whole column
        04/11/2022	-	10 mm applied to Irrig 1 and 20 mm applied to Irrig 2
        11/11/2022	-	30 mm applied to whole column
        14/11/2022	-	15 mm applied to Trt 1 and 25 mm applied to Trt 2
        07/12/2022	-	20 mm applied to Trt 1 and 30 mm applied to Trt 2
        15/12/2022	-	20 mm applied to Trt 1 and 30 mm applied to Trt 2
      Memo ReadPakChoi
        *See info in diary re an error in fertiliser N application. Since we do not have plots in the model, we've estimated 80 kg N/ha for the second application to Pak choi N4 plots.

            Second side dressing of CAN applied. N1=0, N2=15, N3=30 & N4=60 kg N/ha. Plot 21, 27 and 32 (N4) received 80 kg N/ha accidentally on 12/01/2021.

        *Details from measurements are as follows

            The average DM content was 0.054 and 0.072 for Irrigation 1 and Irrigation 2, espectively

            The N content in the aboveground biomass (residue + marketable components) averaged 3.65% (range of 3.63-3.68)

            FWT @ final harvest averaged 55 (51 - 59) t/ha
      Memo ReadOats
        *The harvested forage was baled (removed fromm the system) - we estimate ~5-10% was returned as residue.

        *Carbon & nitrogen composition of the aboveground biomass shown below:

        Date	       C (%)	 N (%)

        6/04/2021	41.8 	5.81

        3/05/2021	42.4 	3.43

        9/06/2021	42.3 	2.18

        5/07/2021	42.4 	1.79

        26/07/2021	42.9 	1.46

        *The hot water extractable N (HWEN) estimated xx kg N/ha of mineralised N available for the potato crop (i.e. following the oat crop).

        *APSIM did not predict as much mineralised N as the HWEN
      Memo ReadPotatoes
        *	One plot (plot 25 of N1) accidentally received 124 kg N/ha instead of 0 kg N/ha on 13/12/2021 (see highlighted in diary).

        *	Tissue N content at the final harvest (08/03/2022) was:

        		-	2.00 and 2.13% (stover) and 1.55 and 1.59% (tuber) for unirrigated and irrigated crops, respectively/

        *	One rep (Irr 2, N4) had an uptake of ~1000 kg N/ha on 17/01/2022 - This has been omitted from the observations.

        *	Average tuber FWT at final harvest was 79 (65-92) t/ha

        *	Average tuber DM = 19.8 (18.3-21.4)%
      Memo ReadRyegrass
        **	Applied N (kg/ha) according to the diary

        *	Date		N1	N2	N3	N4

        *	2022-05-12	0	15	30	60

        *	2022-09-01	0	20	40	80

        *	2022-09-29	0	15	30	60

        *	2022-11-04	0	10	20	40

        *	Seed yield = 1.51 (0.63-2.25)t DM/ha

        *	HI = 0.15 (0.11-0.19)

        *	Seed DM = 93.4 (89.9-96.4)%

        *	Seed N content = 1.57 (1.21-2.3)%

        *	Straw N content = 0.88 (0.45-2.5)%

        *	Straw yield = 8.9 (4.7-13.8) t DM/ha
      Factors
        Permutation
          Factor _N
            CompositeFactor 1: Specifications=[NitrogenOperations]
              Operations NitrogenOperations
                2020-08-05  [Fertiliser].Apply(40, "UreaN", 10);
            CompositeFactor 2: Specifications=[NitrogenOperations]
              Operations NitrogenOperations
                2020-08-05  [Fertiliser].Apply(40, "UreaN", 10);
                2020-12-21  [Fertiliser].Apply(15, "NH4NO3N", 10);
                2021-01-12  [Fertiliser].Apply(15, "NH4NO3N", 10);
                2021-12-13  [Fertiliser].Apply(31, "NH4NO3N", 10);
                2021-12-22  [Fertiliser].Apply(31, "NH4NO3N", 10);
                2022-01-07  [Fertiliser].Apply(41, "NH4NO3N", 10);
                2022-05-12  [Fertiliser].Apply(15, "NH4NO3N", 10);
                2022-09-01  [Fertiliser].Apply(20, "NH4NO3N", 10);
                2022-09-29  [Fertiliser].Apply(15, "NH4NO3N", 10);
                2022-11-04  [Fertiliser].Apply(10, "NH4NO3N", 10);
            CompositeFactor 3: Specifications=[NitrogenOperations]
              Operations NitrogenOperations
                2020-08-05  [Fertiliser].Apply(40, "UreaN", 10);
                2020-12-21  [Fertiliser].Apply(30, "NH4NO3N", 10);
                2021-01-12  [Fertiliser].Apply(30, "NH4NO3N", 10);
                2021-12-13  [Fertiliser].Apply(62, "NH4NO3N", 10);
                2021-12-22  [Fertiliser].Apply(62, "NH4NO3N", 10);
                2022-01-07  [Fertiliser].Apply(82, "NH4NO3N", 10);
                2022-05-12  [Fertiliser].Apply(30, "NH4NO3N", 10);
                2022-09-01  [Fertiliser].Apply(40, "NH4NO3N", 10);
                2022-09-29  [Fertiliser].Apply(30, "NH4NO3N", 10);
                2022-11-04  [Fertiliser].Apply(20, "NH4NO3N", 10);
            CompositeFactor 4: Specifications=[NitrogenOperations]
              Operations NitrogenOperations
                2020-08-05  [Fertiliser].Apply(40, "UreaN", 10);
                2020-12-21  [Fertiliser].Apply(60, "NH4NO3N", 10);
                2021-01-12  [Fertiliser].Apply(80, "NH4NO3N", 10);
                2021-12-13  [Fertiliser].Apply(124, "NH4NO3N", 10);
                2021-12-22  [Fertiliser].Apply(124, "NH4NO3N", 10);
                2022-01-07  [Fertiliser].Apply(164, "NH4NO3N", 10);
                2022-05-12  [Fertiliser].Apply(60, "NH4NO3N", 10);
                2022-09-01  [Fertiliser].Apply(80, "NH4NO3N", 10);
                2022-09-29  [Fertiliser].Apply(60, "NH4NO3N", 10);
                2022-11-04  [Fertiliser].Apply(40, "NH4NO3N", 10);
          Factor _Irr
            CompositeFactor 1: Specifications=[IrrigationOperations]
              Operations IrrigationOperations
                2020-10-01  [Irrigation].Apply(15);
                2020-10-10  [Irrigation].Apply(15);
                2020-10-15  [Irrigation].Apply(15);
                2020-10-20  [Irrigation].Apply(15);
                2020-10-25  [Irrigation].Apply(20);
                2020-12-06  [Irrigation].Apply(15);
                2020-12-14  [Irrigation].Apply(10);
                2020-12-16  [Irrigation].Apply(10);
                2020-12-17  [Irrigation].Apply(10);
                2020-01-08  [Irrigation].Apply(10);
                2021-01-12  [Irrigation].Apply(15);
                2021-01-15  [Irrigation].Apply(10);
                2021-01-19  [Irrigation].Apply(15);
                2021-02-25  [Irrigation].Apply(30);
                2021-03-16  [Irrigation].Apply(25);
                2021-03-27  [Irrigation].Apply(25);
                2021-11-18  [Irrigation].Apply(20);
                2021-12-23  [Irrigation].Apply(20);
                2021-12-28  [Irrigation].Apply(25);
                2022-01-07  [Irrigation].Apply(25);
                2022-01-12  [Irrigation].Apply(20);
                2022-01-19  [Irrigation].Apply(25);
                2022-02-01  [Irrigation].Apply(10);
                2022-10-13  [Irrigation].Apply(30);
                2022-10-19  [Irrigation].Apply(20);
                2022-11-03  [Irrigation].Apply(20);
                2022-11-04  [Irrigation].Apply(10);
                2022-11-11  [Irrigation].Apply(30);
                2022-11-14  [Irrigation].Apply(15);
                2022-12-07  [Irrigation].Apply(20);
                2022-12-15  [Irrigation].Apply(20);
            CompositeFactor 2: Specifications=[IrrigationOperations]
              Operations IrrigationOperations
                2020-10-01  [Irrigation].Apply(15);
                2020-10-10  [Irrigation].Apply(15);
                2020-10-15  [Irrigation].Apply(15);
                2020-10-20  [Irrigation].Apply(15);
                2020-10-25  [Irrigation].Apply(20);
                2020-12-06  [Irrigation].Apply(15);
                2020-12-14  [Irrigation].Apply(10);
                2020-12-16  [Irrigation].Apply(10);
                2020-12-17  [Irrigation].Apply(10);
                2020-01-08  [Irrigation].Apply(15);
                2021-01-12  [Irrigation].Apply(20);
                2021-01-15  [Irrigation].Apply(10);
                2021-01-19  [Irrigation].Apply(15);
                2021-02-25  [Irrigation].Apply(30);
                2021-03-16  [Irrigation].Apply(25);
                2021-03-27  [Irrigation].Apply(25);
                2021-11-18  [Irrigation].Apply(20);
                2021-12-23  [Irrigation].Apply(20);
                2021-12-28  [Irrigation].Apply(25);
                2022-01-07  [Irrigation].Apply(25);
                2022-01-12  [Irrigation].Apply(30);
                2022-01-19  [Irrigation].Apply(35);
                2022-02-01  [Irrigation].Apply(20);
                2022-10-13  [Irrigation].Apply(30);
                2022-10-19  [Irrigation].Apply(30);
                2022-11-03  [Irrigation].Apply(20);
                2022-11-04  [Irrigation].Apply(20);
                2022-11-11  [Irrigation].Apply(30);
                2022-11-14  [Irrigation].Apply(25);
                2022-12-07  [Irrigation].Apply(30);
                2022-12-15  [Irrigation].Apply(30);
      Simulation Rot2_Lincoln
        Clock: Start=2020-12-01; End=2023-01-31
        Weather: FileName=lincoln.met; Latitude=-43.626; Tav=11.6; Amp=10.6
        Summary
        SoilArbitrator Soil Arbitrator
        Zone Field: Area=1; Slope=0; AspectAngle=0; Altitude=50
          Folder Management
            Manager SowPakChoi
              CropName = SCRUM_PakChoi
              EstablishDate = 07/12/2020
              EstablishStage = Seed
              PlantingDepth = 15
              HarvestTimeOption = SettingDate
              HarvestDate = 01/22/2021 00:00:00
              Tt_EstablishToHarvest = 0
              HarvestStage = Vegetative
              ExpectedYield = 59
              FieldLoss = 0
              ResidueRemoval = 0
              ResidueIncorporation = 0
              ResidueIncorporationDepth = 0
              script: same as in SCRUMSownSelf.Field.CropManagement
            Manager SowOats
              CropName = SCRUM_Oats
              EstablishDate = 02/03/2021
              EstablishStage = Seed
              PlantingDepth = 15
              HarvestTimeOption = SettingDate
              HarvestDate = 07/30/2021 00:00:00
              Tt_EstablishToHarvest = 0
              HarvestStage = MidReproductive
              ExpectedYield = 37
              FieldLoss = 0.05
              ResidueRemoval = 0
              ResidueIncorporation = 0
              ResidueIncorporationDepth = 0
              script: same as in SCRUMSownSelf.Field.CropManagement
            Manager SowPotatoes
              CropName = SCRUM_Potatoes
              EstablishDate = 20/10/2021
              EstablishStage = Seed
              PlantingDepth = 15
              HarvestTimeOption = SettingDate
              HarvestDate = 04/15/2022 00:00:00
              Tt_EstablishToHarvest = 0
              HarvestStage = Ripe
              ExpectedYield = 92
              FieldLoss = 0
              ResidueRemoval = 0
              ResidueIncorporation = 0
              ResidueIncorporationDepth = 0
              script: same as in SCRUMSownSelf.Field.CropManagement
            Manager SowRyegrass
              CropName = SCRUM_Ryegrass
              EstablishDate = 06/05/2022
              EstablishStage = Seed
              PlantingDepth = 15
              HarvestTimeOption = SettingDate
              HarvestDate = 01/07/2023 00:00:00
              Tt_EstablishToHarvest = 0
              HarvestStage = Maturity
              ExpectedYield = 1.51
              FieldLoss = 0
              ResidueRemoval = 0
              ResidueIncorporation = 0
              ResidueIncorporationDepth = 0
              script: same as in SCRUMSownSelf.Field.CropManagement
            Manager Cultivation
              DoCultivation1 = True
              Cultivate1 = 12/03/2020 00:00:00
              RemoveProp1 = 0
              IncorporateProp1 = 0.7
              DepthIncorporate1 = 150
              DoCultivation2 = False
              Cultivate2 = 01/22/2021 00:00:00
              RemoveProp2 = 0.8
              IncorporateProp2 = 0
              DepthIncorporate2 = 0
              DoCultivation3 = True
              Cultivate3 = 02/09/2021 00:00:00
              RemoveProp3 = 0
              IncorporateProp3 = 0.7
              DepthIncorporate3 = 150
              DoCultivation4 = True
              Cultivate4 = 03/01/2021 00:00:00
              RemoveProp4 = 0
              IncorporateProp4 = 0.5
              DepthIncorporate4 = 100
              DoCultivation5 = True
              Cultivate5 = 09/24/2021 00:00:00
              RemoveProp5 = 0
              IncorporateProp5 = 0.8
              DepthIncorporate5 = 200
              DoCultivation6 = True
              Cultivate6 = 10/20/2021 00:00:00
              RemoveProp6 = 0
              IncorporateProp6 = 0.7
              DepthIncorporate6 = 100
              DoCultivation7 = True
              Cultivate7 = 04/16/2022 00:00:00
              RemoveProp7 = 0
              IncorporateProp7 = 0.5
              DepthIncorporate7 = 50
              DoCultivation8 = True
              Cultivate8 = 05/05/2022 00:00:00
              RemoveProp8 = 0
              IncorporateProp8 = 0.7
              DepthIncorporate8 = 100
              DoCultivation9 = True
              Cultivate9 = 01/08/2023 00:00:00
              RemoveProp9 = 0.75
              IncorporateProp9 = 0
              DepthIncorporate9 = 0
              DoCultivation10 = False
              Cultivate10 = 01/01/0001 00:00:00
              RemoveProp10 = 0
              IncorporateProp10 = 0
              DepthIncorporate10 = 0
              script: same as in SVS.LincolnRot1.LincolnRotation1.Field.Management.Cultivation
            Manager SetupInitialSoilN
              Treatment1Name = LincolnRot2_N1_Irr1
              Treatment1NO3 = 12.2, 12.74, 8.06, 2.85, 2.9, 3.16, 3.42, 2.75, 2.81, 2.87
              Treatment1NH4 = 0.16, 0.21, 0.15, 0.03, 0, 0, 0, 0, 0, 0
              Treatment2Name = LincolnRot2_N2_Irr1
              Treatment2NO3 = 11.75, 12.47, 7.87, 2.56, 2.42, 2.84, 3.25, 2.21, 2.32, 2.42
              Treatment2NH4 = 0.15, 0.34, 0.31, 0.1, 0, 0, 0, 0.03, 0.04, 0.04
              Treatment3Name = LincolnRot2_N3_Irr1
              Treatment3NO3 = 11.81, 12.57, 7.97, 2.61, 2.23, 2.64, 3.04, 2.03, 2.13, 2.23
              Treatment3NH4 = 0.22, 0.24, 0.14, 0.01, 0, 0, 0, 0, 0, 0
              Treatment4Name = LincolnRot2_N4_Irr1
              Treatment4NO3 = 11.13, 12, 7.83, 2.78, 2.39, 2.68, 2.96, 2.08, 2.13, 2.17
              Treatment4NH4 = 0.37, 0.39, 0.22, 0.02, 0, 0, 0, 0, 0, 0
              Treatment5Name = LincolnRot2_N1_Irr2
              Treatment5NO3 = 11.28, 11, 6.63, 2.54, 2.19, 2.46, 2.72, 1.85, 1.88, 1.91
              Treatment5NH4 = 0.17, 0.22, 0.19, 0.1, 0, 0.01, 0.02, 0, 0.01, 0.01
              Treatment6Name = LincolnRot2_N2_Irr2
              Treatment6NO3 = 11.59, 11.66, 7.11, 2.48, 2.37, 2.55, 2.72, 2.08, 2.09, 2.1
              Treatment6NH4 = 0.43, 0.46, 0.36, 0.22, 0, 0.02, 0.03, 0.05, 0.07, 0.08
              Treatment7Name = LincolnRot2_N3_Irr2
              Treatment7NO3 = 9.45, 10, 6.17, 1.79, 1.96, 2.2, 2.44, 2.21, 2.33, 2.45
              Treatment7NH4 = 0.68, 0.39, 0.08, 0.05, 0, 0, 0, 0.01, 0.01, 0.01
              Treatment8Name = LincolnRot2_N4_Irr2
              Treatment8NO3 = 10.58, 11.03, 7.07, 2.65, 2.26, 2.47, 2.68, 1.85, 1.85, 1.85
              Treatment8NH4 = 0.43, 0.35, 0.21, 0.15, 0.09, 0.11, 0.12, 0, 0, 0
              script: same as in SVS.LincolnRot1.LincolnRotation1.Field.Management.SetupInitialSoilN
            Operations NitrogenOperations
            Operations IrrigationOperations
            Operations ExtraNitrogen
              2021-09-13  [Fertiliser].Apply(30, "NH4NO3N", 10);
              2021-10-25  [Fertiliser].Apply(20, "NH4NO3N", 10);
              2021-10-25  [Fertiliser].Apply(10, "NH4NO3N", 350);
              2021-11-22  [Fertiliser].Apply(30, "NH4NO3N", 10);
              2021-11-22  [Fertiliser].Apply(20, "NH4NO3N", 350);
          MicroClimate: a_interception=0; b_interception=1; c_interception=0; d_interception=0; SoilHeatFluxFraction=0.4; MinimumHeightDiffForNewLayer=0; NightInterceptionFraction=0.5; ReferenceHeight=2
          Irrigation
          Fertiliser
          SurfaceOrganicMatter: InitialResidueName=greenManure; InitialResidueType=oats; InitialResidueMass=2500; InitialStandingFraction=0; InitialCPR=0; InitialCNR=30
          Soil: SoilType=Mottled Immature Palic Soil; LocalName=Templeton; Site=A Block, PFR Research Farm; NearestTown=Lincoln; Region=Canterbury; Country=New Zealand; Latitude=-43.626; Longitude=172.468; YearOfSampling=2020
            DataSource=Data from analyses at PFR soil lab using samples from site, complemented with historical data from nearby studies and PTFs (Cichota et al, 2016). Pedological description by Thomas Caspari (MWLC)
            Comments=This represents an 'average' of the two profiles described at the site. Modified after sensibility tests and checks against field measured data.
            Memo
              # Notes

              Values for physical properties, particularly water storage limits and SWCon, were adjused after comparison against field-measured data.
              Values for FOM were based on expert opinion and adjusted after comparison with measured soil N data.
            Physical
              Thickness  ParticleSizeSand  ParticleSizeSilt  ParticleSizeClay  Rocks  BD     AirDry  LL15   DUL    SAT    KS
              100        15                63                22                0      1.23   0.05    0.145  0.3    0.535  480
              100        15                63                22                0      1.235  0.065   0.17   0.325  0.53   420
              200        12.5              66                21.5              0      1.375  0.07    0.18   0.35   0.481  240
              200        15                65                20                0      1.66   0.06    0.15   0.313  0.374  48
              200        5                 72.5              22.5              0      1.59   0.074   0.175  0.325  0.4    144
              200        45                47                8                 0      1.44   0.04    0.1    0.318  0.45   1200
              200        25                60                15                0      1.525  0.048   0.12   0.315  0.425  480
              200        60                35                5                 0      1.36   0.028   0.09   0.325  0.45   720
              200        50                44                6                 0      1.35   0.04    0.11   0.34   0.46   1200
              200        50                44                6                 0      1.35   0.032   0.1    0.325  0.455  1140
              SoilCrop SCRUMSoil
                LL=[0.145, 0.17, 0.18, 0.15, 0.175, 0.1, 0.12, 0.09, 0.11, 0.1]
                KL=[0.1, 0.1, 0.1, 0.1, 0.1, 0.1, 0.1, 0.1, 0.1, 0.1]
                XF=[1, 1, 1, 1, 1, 1, 1, 1, 1, 1]
            WaterBalance SoilWater: same as ABlock.ABlock_06_07.Field.Soil.SoilWater
            Organic: FOMCNRatio=35; CarbonUnits=Total
              Thickness  Carbon  SoilCNRatio  FBiom  FInert  FOM
              100        3       12           0.06   0.315   950
              100        2.75    12           0.046  0.522   600
              200        1.85    11.5         0.01   0.785   450
              200        0.4     10           0.008  0.899   175
              200        0.25    9.5          0.008  0.953   75
              200        0.2     9            0.008  0.969   25
              200        0.2     9            0.008  0.989   7.5
              200        0.15    9            0.008  0.99    2.5
              200        0.1     9            0.008  0.987   0
              200        0.1     9            0.008  0.988   0
            Chemical: same as ABlock.ABlock_06_07.Field.Soil.Chemical
            Nutrient
            Water: Thickness=[100, 100, 200, 200, 200, 200, 200, 200, 200, 200]; InitialPAWmm=335.7; RelativeTo=LL15; FilledFromTop=false
              InitialValues=[0.23, 0.27, 0.35, 0.313, 0.325, 0.318, 0.315, 0.325, 0.34, 0.325]
            OutputLayers OutputWaterLayers: Thickness=[200, 200, 200, 200, 200, 200, 200, 200, 200]
            OutputLayers OutputNutrientLayers: Thickness=[150, 150, 300, 300, 300, 300, 300]
            Solute NO3: same as SVS.LincolnRot1.LincolnRotation1.Field.Soil.NO3
            Solute NH4: same as SVS.LincolnRot1.LincolnRotation1.Field.Soil.NH4
            Solute Urea: same as ABlock.ABlock_06_07.Field.Soil.Urea
            SoilTemperature Temperature
          Plant SCRUM
          ScrumCropInstance SCRUM_PakChoi: HarvestIndex=0.7; MoistureContent=0.94; RootProportion=0.1; MaxRootDepth=1500; MaxHeight=350; MaxCover=0.86; ExtinctionCoefficient=0.7; TypicalHarvestStage=Vegetative; SeedlingNConc=0.055; ProductHarvestNConc=0.0365; StoverHarvestNConc=0.0365; RootNConc=0.0209; LegumeFactor=0; BaseTemperature=0; OptimumTemperature=20; MaxTemperature=35; Tt_SowToEmergence=200; GSMax=0.008; R50=150; ConsiderWaterStress=true; EstablishStage=Seedling; HarvestStage=Vegetative; FieldLoss=0; ResidueRemoval=0; ResidueIncorporation=0; ResidueIncorporationDepth=0; Factor_XoBiomass=0.5; Factor_bBiomass=0.2; Factor_XoCover=0.4; Factor_bCover=0.2; Factor_XoHeight=0.7; Factor_bHeight=0.2; Tt_EmergencetoMaturity=0
          ScrumCropInstance SCRUM_Oats: HarvestIndex=0.9; MoistureContent=0.81; RootProportion=0.1; MaxRootDepth=1500; MaxHeight=1000; MaxCover=0.92; ExtinctionCoefficient=0.7; TypicalHarvestStage=EarlyReproductive; SeedlingNConc=0.06; ProductHarvestNConc=0.016; StoverHarvestNConc=0.025; RootNConc=0.01; LegumeFactor=0; BaseTemperature=0; OptimumTemperature=30; MaxTemperature=40; Tt_SowToEmergence=80; GSMax=0.008; R50=150; ConsiderWaterStress=true; EstablishStage=Seedling; HarvestStage=Vegetative; FieldLoss=0; ResidueRemoval=0.9; ResidueIncorporation=0; ResidueIncorporationDepth=0; Factor_XoBiomass=0.5; Factor_bBiomass=0.2; Factor_XoCover=0.4; Factor_bCover=0.2; Factor_XoHeight=0.7; Factor_bHeight=0.2; Tt_EmergencetoMaturity=0
          ScrumCropInstance SCRUM_Potatoes: HarvestIndex=0.91; MoistureContent=0.7955; RootProportion=0.1; MaxRootDepth=1500; MaxHeight=500; MaxCover=0.935; ExtinctionCoefficient=0.8; TypicalHarvestStage=Maturity; SeedlingNConc=0.055; ProductHarvestNConc=0.021; StoverHarvestNConc=0.025; RootNConc=0.01; LegumeFactor=0; BaseTemperature=0; OptimumTemperature=25; MaxTemperature=35; Tt_SowToEmergence=300; GSMax=0.008; R50=150; ConsiderWaterStress=true; EstablishStage=Seed; HarvestStage=Ripe; FieldLoss=0; ResidueRemoval=0; ResidueIncorporation=0; ResidueIncorporationDepth=0; Factor_XoBiomass=0.5; Factor_bBiomass=0.2; Factor_XoCover=0.4; Factor_bCover=0.2; Factor_XoHeight=0.7; Factor_bHeight=0.2; Tt_EmergencetoMaturity=0
          ScrumCropInstance SCRUM_Ryegrass: HarvestIndex=0.15; MoistureContent=0.07; RootProportion=0.1; MaxRootDepth=1500; MaxHeight=500; MaxCover=0.95; ExtinctionCoefficient=0.86; TypicalHarvestStage=Maturity; SeedlingNConc=0.06; ProductHarvestNConc=0.023; StoverHarvestNConc=0.02; RootNConc=0.01; LegumeFactor=0; BaseTemperature=0; OptimumTemperature=20; MaxTemperature=35; Tt_SowToEmergence=500; GSMax=0.008; R50=150; ConsiderWaterStress=true; EstablishStage=Seed; HarvestStage=MidReproductive; FieldLoss=0; ResidueRemoval=0; ResidueIncorporation=0; ResidueIncorporationDepth=0; Factor_XoBiomass=0.5; Factor_bBiomass=0.2; Factor_XoCover=0.4; Factor_bCover=0.2; Factor_XoHeight=0.7; Factor_bHeight=0.2; Tt_EmergencetoMaturity=0
          Report ReportSVS: EventNames=[Clock].DoReport
            VariableNames:
              [Clock].Today
              [SCRUM].SowingData.Cultivar as CropName
              // Water balance outputs
              [Weather].Rain as Rainfall
              [Irrigation].IrrigationApplied as IrrigationApplied
              [Soil].SoilWater.Eo as Eo
              [Soil].SoilWater.Es as Evaporation
              [SCRUM].Stover.Transpiration as Transpiration
              [Soil].SoilWater.pond as PondedWater
              [Soil].SoilWater.Drainage as Drainage
              [Soil].SoilWater.Runoff as Runoff
              sum([Soil].SoilWater.LateralOutflow) as LateralFlow
              sum([Soil].Water.MM) as TotalSWC
              sum([Soil].OutputWaterLayers.SWmm) as TotalSWmmCheck
              sum([Soil].Physical.SATmm) as TotalSAT
              sum([Soil].Physical.DULmm) as TotalDUL
              sum([Soil].Physical.LL15mm) as TotalLL15
              // Nitrogen balance outputs
              [Fertiliser].NitrogenApplied as FertiliserNApplied
              sum([Soil].Nutrient.DenitrifiedN) as DenitrifiedN
              ([Soil].SoilWater.LeachNH4 + [Soil].SoilWater.LeachNO3) as LeachedN
              (-[SCRUM].Root.NUptake) as UptakeN
              (sum([SurfaceOrganicMatter].SurfaceResidue.Decomposition.MineralisedN) + sum([Soil].Nutrient.MineralisedN)) as NetMineralisedN
              sum([Soil].Nutrient.MineralisedN) as MineralisedSoilN
              sum([SurfaceOrganicMatter].SurfaceResidue.Decomposition.MineralisedN) as MineralisedSurfOMN
              (sum([Soil].Urea.kgha) + sum([Soil].NH4.kgha) + sum([Soil].NO3.kgha)) as TotalSoilN
              sum([Soil].Urea.kgha) as TotalUrea
              sum([Soil].NH4.kgha) as TotalNH4
              sum([Soil].NO3.kgha) as TotalNO3
              [SurfaceOrganicMatter].N as TotalSurfaceOMN
              sum([Soil].Nutrient.FOM.N) as TotalFOMN
              sum([Soil].Nutrient.Humic.N) as TotalHumicN
              sum([Soil].Nutrient.Microbial.N) as TotalMicrobialN
              [SCRUM].Total.N*10 as TotalPlantN
              [SCRUM].AboveGround.N *10 as AboveGroundN
              // Crop outputs
              [SCRUM].Total.Wt*10 as TotalPlantWt
              [SCRUM].AboveGround.Wt
              [SCRUM].Root.Wt as SCRUM.BelowGround.Wt
              [SCRUM].Stover.Wt
              [SCRUM].Stover.Live.Wt
              [SCRUM].Product.Wt
              [SCRUM].Product.Live.Wt
              [SCRUM].Root.Wt
              [SCRUM].Product.Live.N
              [SCRUM].Stover.Live.NConc
              [SCRUM].Total.NConc
              [SCRUM].AboveGround.NConc
              [SCRUM].Stover.Fw
              [SCRUM].Stover.Fn
              [SCRUM].Stover.LAI as LAIGreen
              [SCRUM].Stover.LAIDead as LAIDead
              [SCRUM].Stover.LAITotal as LAITotal
              [SCRUM].Stover.Height as CropHeight
              [SCRUM].Stover.CoverGreen as CoverGreen
              [SCRUM].Stover.CoverDead as CoverDead
              [SCRUM].Stover.CoverTotal as CoverTotal
              [SCRUM].Root.Depth as RootDepth
              [SCRUM].Phenology.CurrentPhase.Name
              [SCRUM].Phenology.CurrentStageName
              [SCRUM].Phenology.Stage
              // Harvest outptus
              [SCRUM_PakChoi].ProductHarvested.Wt
              [SCRUM_Oats].ProductHarvested.Wt
              [SCRUM_Potatoes].ProductHarvested.Wt
              [SCRUM_Ryegrass].ProductHarvested.Wt
              [SCRUM_PakChoi].StoverRemoved.Wt
              [SCRUM_Oats].StoverRemoved.Wt
              [SCRUM_Potatoes].StoverRemoved.Wt
              [SCRUM_Ryegrass].StoverRemoved.Wt
              // Fresh organic matter outptus
              [SurfaceOrganicMatter].Wt as TotalSurfaceOMWt
              [SurfaceOrganicMatter].C as TotalSurfaceOMC
              ([SurfaceOrganicMatter].C/([SurfaceOrganicMatter].N + 0.000000001) as SurfaceOM.CN
              (sum([Soil].Nutrient.FOM.C)/(sum([Soil].Nutrient.FOM.N) + 0.000000001) as SoilFOM.CN
              sum([Soil].Nutrient.FOM.C)/0.4 as TotalFOMWt
              sum([Soil].Nutrient.FOM.C) as TotalFOMC
              // VALIDATION outputs
              ([SCRUM].AboveGround.Wt)/100 as AboveGroundWt
              [SCRUM].Stover.CoverTotal as Cover
              [Soil].OutputWaterLayers.SW[1] as VWC_0_20
              [Soil].OutputWaterLayers.SW[2] as VWC_20_40
              [Soil].OutputWaterLayers.SW[3] as VWC_40_60
              [Soil].OutputWaterLayers.SW[4] as VWC_60_80
              [Soil].OutputWaterLayers.SW[5] as VWC_80_100
              [Soil].OutputWaterLayers.SW[6] as VWC_100_120
              [Soil].OutputWaterLayers.SW[7] as VWC_120_140
              [Soil].OutputWaterLayers.SW[8] as VWC_140_160
              ([Soil].OutputWaterLayers.SWmm[1] + [Soil].OutputWaterLayers.SWmm[2] + [Soil].OutputWaterLayers.SWmm[3]) as SWCmm_0_60
              ([Soil].OutputNutrientLayers.NH4[1]+[Soil].OutputNutrientLayers.NO3[1]+[Soil].OutputNutrientLayers.NH4[2]+[Soil].OutputNutrientLayers.NO3[2]) as SoilN_0_30
              ([Soil].OutputNutrientLayers.NH4[3]+[Soil].OutputNutrientLayers.NO3[3]) as SoilN_30_60
              ([Soil].OutputNutrientLayers.NH4[4]+[Soil].OutputNutrientLayers.NO3[4]) as SoilN_60_90
              ([Soil].OutputNutrientLayers.NH4[5]+[Soil].OutputNutrientLayers.NO3[5]) as SoilN_90_120
              ([Soil].OutputNutrientLayers.NH4[6]+[Soil].OutputNutrientLayers.NO3[6]) as SoilN_120_150
              (SoilN_0_30 + SoilN_30_60) as SoilN_0_60
              (SoilN_0_30 + SoilN_30_60 + SoilN_60_90) as SoilN_0_90
              (SoilN_0_30 + SoilN_30_60 + SoilN_60_90 + SoilN_90_120) as SoilN_0_120
              (SoilN_0_30 + SoilN_30_60 + SoilN_60_90 + SoilN_90_120 + SoilN_120_150) as SoilN_0_150
              ([Soil].SoilWater.Flux[3] + [Soil].SoilWater.Flow[3]) as Drainage_60cm
              ([Soil].SoilWater.FlowNH4[3] + [Soil].SoilWater.FlowNO3[3]) as LeachedN_60cm
              Sum of ([Soil].SoilWater.FlowNH4[4] + [Soil].SoilWater.FlowNO3[4]) from [Clock].StartDate to [Clock].Today as LeachedCumN_60cm
              ([Soil].SoilWater.Flux[4] + [Soil].SoilWater.Flow[4]) as Drainage_90cm
              ([Soil].SoilWater.FlowNH4[4] + [Soil].SoilWater.FlowNO3[4]) as LeachedN_90cm
              [Soil].SoilWater.FlowNO3[4] as LeachedNO3_60cm
              [Soil].SoilWater.FlowNO3
              ([Soil].OutputNutrientLayers.NO3ppm*[Soil].OutputNutrientLayers.BD/[Soil].OutputNutrientLayers.SW) as SolutionNO3
              [Soil].NO3.ppm*[Soil].Physical.BD/[Soil].Water.Volumetric as SolutionConc
              [Soil].Nutrient.MineralisedN
              [SCRUM].Root.NTakenUp
              [SCRUM].Root.WaterUptake
              [Soil].SoilWater.Flux as WaterFlow
    Experiment HawkesBayRot3
      Memo SowHarvestEvents
        ### Rotation 3 - Planting and harvesting

        25/09/2021	-	Planting - Onions planted using Jerry's onion drill, Variety 'Tilbury'. Decided on a 9.3cm spacing with the aim of a 70-80mm bulb
        8-11/04/2022	-	Harvesting - Finish harvesting, removed bulbs have been disposed of in the agronomy field next to column 7 for mulching and cultivating

        20/05/2022	-	Planting - Annual ryegrass (asset/Tama mix @25kg/ha) planted with Duncan Renovator Drill (2.8m)
        17/08/2022	-	Harvesting - 1st biomass harvest (first cut of the ryegrass)
        05/09/2022	-	Harvesting - Harvest #2 ( as a re-growth)
        12/09/2022	-	Harvesting - All plots mown
        27/10/2022	-	Harvesting - Harvest #3 (as a re-growth)
        22/10/2022	-	Harvesting - All plots mowed for removal
        26/10/2022	-	Harvesting - Grass bailed and removed
        29/11/2022	-	Harvesting - Harvest #4
      Memo CultivationEvents
        ### Rotation 3 - Cultivation

        14/05/2021	-	Ploughed by Kettle contracting
        14/05/2021	-	Rolled after ploughing
        11/08/2021	-	Powerharrowed (single pass) to flatten out block and rolled to hold surface together
        15/09/2021	-	Powerharrowed (single pass) to level out after suction cups
        22/09/2021	-	Powerharrow (single pass) over plots to incorporate fertiliser
        25/09/2021	-	Spring tine harrows (single pass) set at its shallowest setting to break up the cap after rain and fluff the soil up for a better planting bed
        11/04/2022	-	Plots mulched to remove weeds
        25/04/2022	-	Ploughed
        09/05/2022	-	Powerharrow (two passes) both plots , one set deep (about 20cm) one shallower (about 10cm)
        16/05/2022	-	Springtine harrows (two passes) set at its highest setting to level out the plots ready for planting
        23/05/2022	-	Grass rolled
        09/12/2022	-	Ploughed in both plots, some issues with plough setup to start with made for a couple of poor furrows at start
        12/12/2022	-	Powerharrowed (single pass) to flattern out the plots and allow for more consistent soil sampling conditions
      Memo FertiliserEvents
        ### Rotation 3 - Fertiliser

        04/10/2021	-	Planting N fert applied to plots. 1kg, 2kg, 4kg
        30/11/2021	-	CAN Applied - side dressing 2 rates are 0g, 481g, 963g and 1926g
        20/12/2021	-	Applied 3rd lot of CAN - rates 0g, 963g, 1926g and 3856g

        NOTE: to get actual rates in kg N/ha, multiply each 1kg applied by 23.5
      Memo IrrigationEvents
        ### Rotation 3 - Irrigation

        07/12/2021	-	15mm Irrigation applied to both treatments
        10/12/2021	-	15mm applied to both treatments
        23/12/2021	-	25mm irrigation to both treatments
        11/01/2022	-	20mm applied to column 4 & 3
        17/01/2022	-	irrigation trt of 15 (trt 1) and 25mm (trt 2)
        18/01/2022	-	irrigation trt of 15 (trt 1) and 25mm (trt 2)
        20/01/2022	-	20mm applied to column 4 & 3
        25/01/2022	-	20mm applied to column 3 & 4
        02/02/2022	-	20 mm applied to column 3 & 4
      Memo ReadOnions
        *Irrigation: The same amount (168 mm) across irrigation treatments

        * Lower yields compared to Lincoln: Total aboveground biomass of 4.07-5.8 t DM/ha (average FWT of 38.7 (range 34.4-44.1)

        * Residue proportion was 11% on average

        *Measured bulb DM proportion (04-02-2022) was 0.13

        *Tissue N and C conc measured on (04-03-2022) was

            - Residue(leaves + skins) N conc was 0.86% (range 0.71-1.20%), Carbon conc 37.4% (30.7-39.6%)

            - Bulb N conc was 1.77% (range 1.55-2.08)%, Carbon conc 41.9% (41.5-42.5%)

        *Root N conc taken on 01/02/2022 averaged 2.22%; Carbon content was 34.3%
      Memo ReadRyegrass
        *Total yield averaged 4.12 t DM/ha (no seed weight given).

        *At the final harvest Aboveground biomass N conc averaged 1.8%

        *DM content of the biomass averaged 16%

        *Lab results showed the following C and N concentrations

        -	Date	       C (%)	 		N (%)

        -	17/08/2022	41.6(37.6-43.4)%	3.82(3.13-4.38)%

        -	5/09/2022	42.2(40.7-43.2)%	3.07(2.15-4.28)%

        -	27/10/2022	41.8(40.3-42.4)% 	1.25(0.91-1.74)%

        -	29/11/2022	42.1(41.4-42.7)%	1.78(1.19-2.30)%

        *Note: RG managed as a cut crop, hence some measurements done on re-growths.
      Factors
        Permutation
          Factor _N
            CompositeFactor 1: Specifications=[NitrogenOperations]
              Operations NitrogenOperations
            CompositeFactor 2: Specifications=[NitrogenOperations]
              Operations NitrogenOperations
                2021-10-04  [Fertiliser].Apply(23.5, "NH4NO3N", 50);
                2021-11-30  [Fertiliser].Apply(11.3, "NH4NO3N", 50);
                2021-12-20  [Fertiliser].Apply(22.6, "NH4NO3N", 50);
            CompositeFactor 3: Specifications=[NitrogenOperations]
              Operations NitrogenOperations
                2021-10-04  [Fertiliser].Apply(47.0, "NH4NO3N", 50);
                2021-11-30  [Fertiliser].Apply(22.6, "NH4NO3N", 50);
                2021-12-20  [Fertiliser].Apply(45.3, "NH4NO3N", 50);
            CompositeFactor 4: Specifications=[NitrogenOperations]
              Operations NitrogenOperations
                2021-10-04  [Fertiliser].Apply(94.0, "NH4NO3N", 50);
                2021-11-30  [Fertiliser].Apply(45.3, "NH4NO3N", 50);
                2021-12-20  [Fertiliser].Apply(90.6, "NH4NO3N", 50);
          Factor _Irr
            CompositeFactor 1: Specifications=[IrrigationOperations]
              Operations IrrigationOperations
                2021-12-07  [Irrigation].Apply(15);
                2021-12-10  [Irrigation].Apply(15);
                2021-12-23  [Irrigation].Apply(25);
                2022-01-11  [Irrigation].Apply(20);
                2022-01-17  [Irrigation].Apply(15);
                2022-01-18  [Irrigation].Apply(15);
                2022-01-20  [Irrigation].Apply(20);
                2022-01-25  [Irrigation].Apply(20);
                2022-02-02  [Irrigation].Apply(20);
            CompositeFactor 2: Specifications=[IrrigationOperations]
              Operations IrrigationOperations
                2021-12-07  [Irrigation].Apply(15);
                2021-12-10  [Irrigation].Apply(15);
                2021-12-23  [Irrigation].Apply(25);
                2022-01-11  [Irrigation].Apply(20);
                2022-01-17  [Irrigation].Apply(25);
                2022-01-18  [Irrigation].Apply(25);
                2022-01-20  [Irrigation].Apply(20);
                2022-01-25  [Irrigation].Apply(20);
                2022-02-02  [Irrigation].Apply(20);
      Simulation Rot3_HB
        Clock: Start=2021-09-01; End=2023-03-15
        Weather: FileName=Whakatu.met; Latitude=-39.60698; Tav=13.3; Amp=9.5
        Summary
        SoilArbitrator Soil Arbitrator
        Zone Field: Area=1; Slope=0; AspectAngle=0; Altitude=50
          Folder Management
            Manager SowOnions
              CropName = SCRUM_Onions
              EstablishDate = 25/09/2021
              EstablishStage = Seed
              PlantingDepth = 15
              HarvestTimeOption = SettingDate
              HarvestDate = 04/10/2022 00:00:00
              Tt_EstablishToHarvest = 0
              HarvestStage = Ripe
              ExpectedYield = 54
              FieldLoss = 0.05
              ResidueRemoval = 0
              ResidueIncorporation = 0
              ResidueIncorporationDepth = 0
              script: same as in SCRUMSownSelf.Field.CropManagement
            Manager SowRyegrass
              CropName = SCRUM_Ryegrass
              EstablishDate = 20/05/2022
              EstablishStage = Seed
              PlantingDepth = 15
              HarvestTimeOption = SettingDate
              HarvestDate = 11/30/2022 00:00:00
              Tt_EstablishToHarvest = 0
              HarvestStage = Maturity
              ExpectedYield = 1.5
              FieldLoss = 0
              ResidueRemoval = 0
              ResidueIncorporation = 0
              ResidueIncorporationDepth = 0
              script: same as in SCRUMSownSelf.Field.CropManagement
            Manager Cultivation
              DoCultivation1 = True
              Cultivate1 = 09/22/2021 00:00:00
              RemoveProp1 = 0
              IncorporateProp1 = 0.8
              DepthIncorporate1 = 100
              DoCultivation2 = True
              Cultivate2 = 04/25/2022 00:00:00
              RemoveProp2 = 0
              IncorporateProp2 = 0.7
              DepthIncorporate2 = 150
              DoCultivation3 = True
              Cultivate3 = 05/16/2022 00:00:00
              RemoveProp3 = 0
              IncorporateProp3 = 0.5
              DepthIncorporate3 = 100
              DoCultivation4 = True
              Cultivate4 = 12/09/2022 00:00:00
              RemoveProp4 = 0
              IncorporateProp4 = 0.7
              DepthIncorporate4 = 150
              DoCultivation5 = False
              Cultivate5 = 01/01/0001 00:00:00
              RemoveProp5 = 0
              IncorporateProp5 = 0
              DepthIncorporate5 = 0
              DoCultivation6 = False
              Cultivate6 = 01/01/0001 00:00:00
              RemoveProp6 = 0
              IncorporateProp6 = 0
              DepthIncorporate6 = 0
              DoCultivation7 = False
              Cultivate7 = 01/01/0001 00:00:00
              RemoveProp7 = 0
              IncorporateProp7 = 0
              DepthIncorporate7 = 0
              DoCultivation8 = False
              Cultivate8 = 01/01/0001 00:00:00
              RemoveProp8 = 0
              IncorporateProp8 = 0
              DepthIncorporate8 = 0
              DoCultivation9 = False
              Cultivate9 = 01/01/0001 00:00:00
              RemoveProp9 = 0
              IncorporateProp9 = 0
              DepthIncorporate9 = 0
              DoCultivation10 = False
              Cultivate10 = 01/01/0001 00:00:00
              RemoveProp10 = 0
              IncorporateProp10 = 0
              DepthIncorporate10 = 0
              script: same as in SVS.LincolnRot1.LincolnRotation1.Field.Management.Cultivation
            Manager SetupInitialSoilN
              Treatment1Name = HawkesBayRot3_N1_Irr1
              Treatment1NO3 = 32.04, 32.25, 28.39, 17.46, 8, 4.41, 2.45
              Treatment1NH4 = 0.11, 0.29, 0.13, 0.04, 0.09, 0.12, 0.14
              Treatment2Name = HawkesBayRot3_N2_Irr1
              Treatment2NO3 = 33.12, 32.61, 30.21, 19.67, 10.35, 3.96, 1.56
              Treatment2NH4 = 0.11, 0.15, 0.19, 0.08, 0.17, 0.2, 0.23
              Treatment3Name = HawkesBayRot3_N3_Irr1
              Treatment3NO3 = 26.18, 30.13, 24.8, 16.57, 8.7, 4.1, 2.01
              Treatment3NH4 = 0.18, 0.29, 0.11, 0.01, 0.13, 0.15, 0.18
              Treatment4Name = HawkesBayRot3_N4_Irr1
              Treatment4NO3 = 30.28, 29.23, 22.91, 16.76, 10.21, 5.6, 2.9
              Treatment4NH4 = 0.16, 0.22, 0.21, 0.19, 0.24, 0.2, 0.19
              Treatment5Name = HawkesBayRot3_N1_Irr2
              Treatment5NO3 = 30.57, 28.84, 25.84, 18.15, 10.03, 5.11, 2.58
              Treatment5NH4 = 0.21, 0.38, 0.52, 0.22, 0.4, 0.41, 0.46
              Treatment6Name = HawkesBayRot3_N2_Irr2
              Treatment6NO3 = 30.72, 33.85, 26.97, 16.61, 8.86, 4.85, 2.56
              Treatment6NH4 = 0.38, 0.19, 0.29, 0.14, 0.18, 0.2, 0.24
              Treatment7Name = HawkesBayRot3_N3_Irr2
              Treatment7NO3 = 31.82, 29.09, 23.5, 14.87, 9.15, 4.63, 2.19
              Treatment7NH4 = 0.28, 0.11, 0.12, 0.11, 0.11, 0.2, 0.25
              Treatment8Name = HawkesBayRot3_N4_Irr2
              Treatment8NO3 = 28.28, 29.91, 27.22, 19.67, 12.58, 5.93, 2.66
              Treatment8NH4 = 0.46, 0.34, 0.25, 0.28, 0.31, 0.47, 0.62, 0.45, 0.49, 0.53
              script: same as in SVS.LincolnRot1.LincolnRotation1.Field.Management.SetupInitialSoilN
            Manager WaterTable
              scriptAllowed = False
              StartDate = 1-Jan
              EndDate = 31-Dec
              amount = 1.5
              depth = 1200
```csharp
using Models.Zones;
using APSIM.Shared.Utilities;
using Models.Soils;
using System.Collections.Generic;
using Models.PMF;
using Models.Core;
using System;

namespace Models
{
    [Serializable]
    public class Script : Model
    {
        [Link] Clock Clock;
        [Link] Soil soil;
        [Link] Irrigation irrigation;
        [Description("Allow this script to add water")]
        public bool scriptAllowed { get; set; }
        [Description("Start of sowing window (d-mmm)")]
        public string StartDate { get; set; }
        [Description("End of sowing window (d-mmm)")]
        public string EndDate { get; set; }
        [Description("Water amount to apply (mm)")]
        public double amount { get; set; }
        [Description("Depth to apply (mm)")]
        public double depth { get; set; }
        
        [EventSubscribe("StartOfDay")]
        private void OnStartOfDay(object sender, EventArgs e)
        {if (scriptAllowed)
        {
        if (DateUtilities.WithinDates(StartDate, Clock.Today, EndDate))
            irrigation.Apply(amount, depth);
        }
        }
    }
}
```
            Operations NitrogenOperations
            Operations IrrigationOperations
          MicroClimate: a_interception=0; b_interception=1; c_interception=0; d_interception=0; SoilHeatFluxFraction=0.4; MinimumHeightDiffForNewLayer=0; NightInterceptionFraction=0.5; ReferenceHeight=2
          Irrigation
          Fertiliser
          SurfaceOrganicMatter: InitialResidueName=grass; InitialResidueType=pasture; InitialResidueMass=2500; InitialStandingFraction=0; InitialCPR=0; InitialCNR=40
          Soil: SoilType=Typic Orthic Gley Soil; LocalName=Kaiapo; Site=Pattison Block, PFR Research Farm; NearestTown=Havelock North; Region=Hawkes Bay; Country=New Zealand; Latitude=-39.6601; Longitude=176.8764; YearOfSampling=2020
            DataSource=Data from analyses at PFR soil lab using samples from site, complemented with historical data from nearby studies and PTFs (Cichota et al, 2016). Pedological description by Sharn Hainsworth (MWLC)
            Comments=This represents an 'average' of all four profiles described at the site
            Memo
              # Notes

              Values for physical properties, particularly water storage limits and SWCon, were adjused after comparison against field-measured data.
              Values for FOM were based on expert opinion and adjusted after comparison with measured soil N data.
            Physical
              Thickness  ParticleSizeSand  ParticleSizeSilt  ParticleSizeClay  Rocks  BD       AirDry  LL15   DUL    SAT      KS
              100        1.1               65.9              33                0      1.107    0.074   0.135  0.325  0.508    258.5
              150        1                 64.2              34.8              0      1.214    0.216   0.24   0.403  0.507    166.9
              300        0.8               60.8              38.3              0      1.393    0.268   0.268  0.398  0.472    108.3
              300        14.7              48.5              36.8              0      1.313    0.25    0.25   0.401  0.494    401.5
              300        2.7               65.9              31.4              0      1.302    0.243   0.243  0.421  0.49     125
              300        1.3               35.2              63.5              0      1.359    0.306   0.306  0.446  0.486    42.4
              300        14.88             28.2875           34.3325           22.5   0.76415  0.248   0.248  0.372  0.39525  1.7
              SoilCrop SCRUMSoil: LL=[0.223, 0.24, 0.268, 0.25, 0.243, 0.306, 0.248]; KL=[0.1, 0.09, 0.05, 0.03, 0.02, 0.005, 0]; XF=[1, 1, 1, 1, 1, 1, 1]
            WaterBalance SoilWater: SummerDate=15-Oct; SummerU=12; SummerCona=8; WinterDate=15-Apr; WinterU=9; WinterCona=6; DiffusConst=88; DiffusSlope=34.5; Salb=0.2; CN2Bare=60; CNRed=20; CNCov=0.8; DischargeWidth=0; CatchmentArea=0; PSIDul=-100
              Thickness  SWCON  KLAT
              100        0.572  0
              150        0.514  0
              300        0.491  0
              300        0.51   0
              300        0.405  0
              300        0.395  0
              300        0.1    0
            Organic: FOMCNRatio=40; CarbonUnits=Total
              Thickness  Carbon  SoilCNRatio  FBiom  FInert  FOM
              110        2.9     10.2         0.06   0.33    850
              170        1.42    10.1         0.032  0.389   699.6
              160        0.7     9.8          0.008  0.806   287.6
              230        0.63    10.1         0.008  0.93    160.3
              350        0.44    8.9          0.008  0.969   61.4
              160        0.6     9.3          0.008  0.992   7.1
              320        0.55    10.2         0.008  0.995   4.6
              300        0.55    10.2         0.008  0.996   0
            Chemical: PHUnits=Water
              Thickness  PH   CEC
              150        6.5  15.4097
              150        6.5  12.5536
              300        6.5  11.8547
              300        6.5  12.228
              300        6.5  9.5547
              300        6.5  18.3916
              300        6.5  11.4012
              CEC source: Calculated
            Nutrient
            Water: Thickness=[100, 150, 300, 300, 300, 300, 300]; InitialValues=[0.325, 0.403, 0.398, 0.401, 0.421, 0.446, 0.372]; InitialPAWmm=260.35; RelativeTo=LL15; FilledFromTop=true
            OutputLayers OutputWaterLayers: Thickness=[200, 200, 200, 200, 200, 200, 200, 200, 200]
            OutputLayers OutputNutrientLayers: Thickness=[150, 150, 300, 300, 300, 300, 300]
            Solute NO3: Thickness=[150, 150, 300, 300, 300, 300, 300]; InitialValues=[20, 20, 30, 18, 1, 0.5, 0.5]; InitialValuesUnits=ppm; WaterTableConcentration=0; D0=0; DepthConstant=0; MaxDepthSoluteAccessible=0; RunoffEffectivenessAtMovingSolute=0; MaxEffectiveRunoff=0
            Solute NH4: Thickness=[150, 150, 300, 300, 300, 300, 300]; InitialValues=[8, 5, 0.1, 0.1, 0, 0, 0]; InitialValuesUnits=ppm; WaterTableConcentration=0; D0=0; DepthConstant=0; MaxDepthSoluteAccessible=0; RunoffEffectivenessAtMovingSolute=0; MaxEffectiveRunoff=0
            Solute Urea: same as ABlock.ABlock_06_07.Field.Soil.Urea
            SoilTemperature Temperature
          Plant SCRUM
          BiomassRemovalEvents SCRUM_Cut: PlantToRemoveBiomassFrom=SCRUM; RemovalType=0; StageToSet=3.8; RemovalDatesInput=12/09/2022, 22/10/2022
            BiomassRemovals:
              PlantName  OrganName  TypeString  LiveToRemove  DeadToRemove  LiveToResidue  DeadToResidue
              SCRUM      Product    Cutting     0.5           0             0              1
              SCRUM      Stover     Cutting     0.5           0             0              1
              SCRUM      Root       Cutting     0             0             0              0
              SCRUM      Nodule     Cutting     0             0             0              0
          ScrumCropInstance SCRUM_Onions: HarvestIndex=0.8; MoistureContent=0.87; RootProportion=0.1; MaxRootDepth=500; MaxHeight=380; MaxCover=0.84; ExtinctionCoefficient=0.4; TypicalHarvestStage=Maturity; SeedlingNConc=0.056; ProductHarvestNConc=0.019; StoverHarvestNConc=0.0096; RootNConc=0.01; LegumeFactor=0; BaseTemperature=0; OptimumTemperature=30; MaxTemperature=40; Tt_SowToEmergence=500; GSMax=0.008; R50=150; ConsiderWaterStress=true; EstablishStage=Seed; HarvestStage=Ripe; FieldLoss=0; ResidueRemoval=0; ResidueIncorporation=0; ResidueIncorporationDepth=0; Factor_XoBiomass=0.5; Factor_bBiomass=0.2; Factor_XoCover=0.4; Factor_bCover=0.2; Factor_XoHeight=0.7; Factor_bHeight=0.2; Tt_EmergencetoMaturity=0
          ScrumCropInstance SCRUM_Ryegrass: HarvestIndex=0.14; MoistureContent=0.14; RootProportion=0.1; MaxRootDepth=1500; MaxHeight=500; MaxCover=0.99; ExtinctionCoefficient=0.86; TypicalHarvestStage=Maturity; SeedlingNConc=0.06; ProductHarvestNConc=0.0206; StoverHarvestNConc=0.0206; RootNConc=0.01; LegumeFactor=0; BaseTemperature=0; OptimumTemperature=20; MaxTemperature=35; Tt_SowToEmergence=200; GSMax=0.008; R50=150; ConsiderWaterStress=true; EstablishStage=Seed; HarvestStage=MidReproductive; FieldLoss=0; ResidueRemoval=0; ResidueIncorporation=0; ResidueIncorporationDepth=0; Factor_XoBiomass=0.5; Factor_bBiomass=0.2; Factor_XoCover=0.4; Factor_bCover=0.2; Factor_XoHeight=0.7; Factor_bHeight=0.2; Tt_EmergencetoMaturity=0
          Report ReportSVS: EventNames=[Clock].DoReport
            VariableNames:
              [Clock].Today
              [SCRUM].SowingData.Cultivar as CropName
              // Water balance outputs
              [Weather].Rain as Rainfall
              [Irrigation].IrrigationApplied as IrrigationApplied
              [Soil].SoilWater.Eo as Eo
              [Soil].SoilWater.Es as Evaporation
              [SCRUM].Stover.Transpiration as Transpiration
              [Soil].SoilWater.pond as PondedWater
              [Soil].SoilWater.Drainage as Drainage
              [Soil].SoilWater.Runoff as Runoff
              sum([Soil].SoilWater.LateralOutflow) as LateralFlow
              sum([Soil].Water.MM) as TotalSWC
              sum([Soil].OutputWaterLayers.SWmm) as TotalSWmmCheck
              sum([Soil].Physical.SATmm) as TotalSAT
              sum([Soil].Physical.DULmm) as TotalDUL
              sum([Soil].Physical.LL15mm) as TotalLL15
              // Nitrogen balance outputs
              [Fertiliser].NitrogenApplied as FertiliserNApplied
              sum([Soil].Nutrient.DenitrifiedN) as DenitrifiedN
              ([Soil].SoilWater.LeachNH4 + [Soil].SoilWater.LeachNO3) as LeachedN
              (-[SCRUM].Root.NUptake) as UptakeN
              (sum([SurfaceOrganicMatter].SurfaceResidue.Decomposition.MineralisedN) + sum([Soil].Nutrient.MineralisedN)) as NetMineralisedN
              sum([Soil].Nutrient.MineralisedN) as MineralisedSoilN
              sum([SurfaceOrganicMatter].SurfaceResidue.Decomposition.MineralisedN) as MineralisedSurfOMN
              (sum([Soil].Urea.kgha) + sum([Soil].NH4.kgha) + sum([Soil].NO3.kgha)) as TotalSoilN
              sum([Soil].Urea.kgha) as TotalUrea
              sum([Soil].NH4.kgha) as TotalNH4
              sum([Soil].NO3.kgha) as TotalNO3
              [SurfaceOrganicMatter].N as TotalSurfaceOMN
              sum([Soil].Nutrient.FOM.N) as TotalFOMN
              sum([Soil].Nutrient.Humic.N) as TotalHumicN
              sum([Soil].Nutrient.Microbial.N) as TotalMicrobialN
              [SCRUM].Total.N*10 as TotalPlantN
              [SCRUM].AboveGround.N *10 as AboveGroundN
              // Crop outputs
              [SCRUM].Total.Wt*10 as TotalPlantWt
              [SCRUM].AboveGround.Wt
              [SCRUM].Root.Wt as SCRUM.BelowGround.Wt
              [SCRUM].Stover.Wt
              [SCRUM].Stover.Live.Wt
              [SCRUM].Product.Wt
              [SCRUM].Product.Live.Wt
              [SCRUM].Root.Wt
              [SCRUM].Product.Live.N
              [SCRUM].Stover.Live.NConc
              [SCRUM].Total.NConc
              [SCRUM].AboveGround.NConc
              [SCRUM].Stover.Fw
              [SCRUM].Stover.Fn
              [SCRUM].Stover.LAI as LAIGreen
              [SCRUM].Stover.LAIDead as LAIDead
              [SCRUM].Stover.LAITotal as LAITotal
              [SCRUM].Stover.Height as CropHeight
              [SCRUM].Stover.CoverGreen as CoverGreen
              [SCRUM].Stover.CoverDead as CoverDead
              [SCRUM].Stover.CoverTotal as CoverTotal
              [SCRUM].Root.Depth as RootDepth
              [SCRUM].Phenology.CurrentPhase.Name
              [SCRUM].Phenology.CurrentStageName
              [SCRUM].Phenology.Stage
              // Harvest outptus
              [SCRUM_Onions].ProductHarvested.Wt
              [SCRUM_Ryegrass].ProductHarvested.Wt
              [SCRUM_Onions].StoverRemoved.Wt
              [SCRUM_Ryegrass].StoverRemoved.Wt
              // Fresh organic matter outptus
              [SurfaceOrganicMatter].Wt as TotalSurfaceOMWt
              [SurfaceOrganicMatter].C as TotalSurfaceOMC
              ([SurfaceOrganicMatter].C/([SurfaceOrganicMatter].N + 0.000000001) as SurfaceOM.CN
              (sum([Soil].Nutrient.FOM.C)/(sum([Soil].Nutrient.FOM.N) + 0.000000001) as SoilFOM.CN
              sum([Soil].Nutrient.FOM.C)/0.4 as TotalFOMWt
              sum([Soil].Nutrient.FOM.C) as TotalFOMC
              // VALIDATION outputs
              ([SCRUM].AboveGround.Wt)/100 as AboveGroundWt
              [SCRUM].Stover.CoverTotal as Cover
              [Soil].OutputWaterLayers.SW[1] as VWC_0_20
              [Soil].OutputWaterLayers.SW[2] as VWC_20_40
              [Soil].OutputWaterLayers.SW[3] as VWC_40_60
              [Soil].OutputWaterLayers.SW[4] as VWC_60_80
              [Soil].OutputWaterLayers.SW[5] as VWC_80_100
              [Soil].OutputWaterLayers.SW[6] as VWC_100_120
              [Soil].OutputWaterLayers.SW[7] as VWC_120_140
              [Soil].OutputWaterLayers.SW[8] as VWC_140_160
              ([Soil].OutputWaterLayers.SWmm[1] + [Soil].OutputWaterLayers.SWmm[2] + [Soil].OutputWaterLayers.SWmm[3]) as SWCmm_0_60
              ([Soil].OutputNutrientLayers.NH4[1]+[Soil].OutputNutrientLayers.NO3[1]+[Soil].OutputNutrientLayers.NH4[2]+[Soil].OutputNutrientLayers.NO3[2]) as SoilN_0_30
              ([Soil].OutputNutrientLayers.NH4[3]+[Soil].OutputNutrientLayers.NO3[3]) as SoilN_30_60
              ([Soil].OutputNutrientLayers.NH4[4]+[Soil].OutputNutrientLayers.NO3[4]) as SoilN_60_90
              ([Soil].OutputNutrientLayers.NH4[5]+[Soil].OutputNutrientLayers.NO3[5]) as SoilN_90_120
              ([Soil].OutputNutrientLayers.NH4[6]+[Soil].OutputNutrientLayers.NO3[6]) as SoilN_120_150
              (SoilN_0_30 + SoilN_30_60) as SoilN_0_60
              (SoilN_0_30 + SoilN_30_60 + SoilN_60_90) as SoilN_0_90
              (SoilN_0_30 + SoilN_30_60 + SoilN_60_90 + SoilN_90_120) as SoilN_0_120
              (SoilN_0_30 + SoilN_30_60 + SoilN_60_90 + SoilN_90_120 + SoilN_120_150) as SoilN_0_150
              ([Soil].SoilWater.Flux[3] + [Soil].SoilWater.Flow[3]) as Drainage_60cm
              ([Soil].SoilWater.FlowNH4[3] + [Soil].SoilWater.FlowNO3[3]) as LeachedN_60cm
              Sum of ([Soil].SoilWater.FlowNH4[4] + [Soil].SoilWater.FlowNO3[4]) from [Clock].StartDate to [Clock].Today as LeachedCumN_60cm
              ([Soil].SoilWater.Flux[4] + [Soil].SoilWater.Flow[4]) as Drainage_90cm
              ([Soil].SoilWater.FlowNH4[4] + [Soil].SoilWater.FlowNO3[4]) as LeachedN_90cm
              [Soil].SoilWater.FlowNO3[4] as LeachedNO3_60cm
              [Soil].SoilWater.FlowNO3
              ([Soil].OutputNutrientLayers.NO3ppm*[Soil].OutputNutrientLayers.BD/[Soil].OutputNutrientLayers.SW) as SolutionNO3
              [Soil].NO3.ppm*[Soil].Physical.BD/[Soil].Water.Volumetric as SolutionConc
              [Soil].Nutrient.MineralisedN
              [SCRUM].Root.NTakenUp
              [SCRUM].Root.WaterUptake
              [Soil].SoilWater.Flux as WaterFlow
    Experiment HawkesBayRot4
      Memo SowHarvestEvents
        ### Rotation 4 - Planting and harvesting

        22/04/2021	-	Planting - Pak Choi (Sumo Ncrust) planted using onion planter (8 row) with spacing of 9.3cm between plants
        8-9/07/2021	-	Harvesting - Final harvest, marketable and residue plants weighed, residue returned to plots

        9/09/2021	-	Planting - Seedlings planted. Lettuce Iceberg type, variety 'Contessa'
        19/11/2021	-	Harvesting - Harvested lettuces, recorded number of good/marketable non-marketable

        20/12/2021	-	Planting - Peas, variety 'Ashton, sown - 159kg per ha. Target seed depth was 1-2cm
        21/02/2022	-	Harvesting - Harvest ...
        8/03/2022	-	Harvesting - Bales of hay removed from field

        12/05/2022	-	Planting - Planted cauliflower with Lansek?? Transplanter.  Row spacing is 60ish cm apart, and approx 35-40 cm between plants in row. Variety planted is Terranova Casper
        14-31/10/2022	-	Harvesting - Harvested and processed cauliflowers, from some plants and some plots
        4/11/2022	-	Harvesting - Final harvest done, remaining plots have been harvested & processed

        13/12/2022	-	Planting - Ryegrass, variety Winter Star II, planted, about 30kg/ha with Duncan 2.8m seed drill (15cm row spacing)
        23/01/2023	-	Harvesting - All plots mown using HB bar mower
        25/01/2023	-	Harvesting - Grass still green, need some heat or wind to dry more effectively
        13/03/2023	-	Harvesting - All plots mown with 2.4 m bar mower aiming for a 5-7cm cut height
        23/03/2023	-	Harvesting - Grass baled
        19/04/2023	-	Harvesting - All plots mown with 2.4m bar mower. Aiming for a cut height of 4-5 cm
        26/04/2023	-	Harvesting - Grass baled. Due to rain bales ended up as mulch
      Memo CultivationEvents
        ### Rotation 4 - Cultivation

        18/12/2020	-	Plots mulched to remove oats stubble
        06/01/2021	-	Ploughed all plots
        18/01/2021	-	Plots rolled to break down furrows
        05/02/2021	-	Plot 1 ripped to 400mm depth (the limit of the tractor)
        15/02/2021	-	Plot 2 ripped to 400mm depth
        08/03/2021	-	Power harrow, two passes in plot 2, one pass in plot 1
        09/03/2021	-	Power harrow single pass in plot 1
        10/03/2021	-	power harrow single pass plot 2
        12/03/2021	-	Power harrow single pass plot 1
        01/04/2021	-	Power harrow single pass in all plots
        16/04/2021	-	Cultivated with spring tine harrows to level out seed bed for planting
        22/04/2021	-	Single pass with spring tine harrows to incorporate triple super
        02/08/2021	-	Mulched all plots, then powerharrowed plot 1, was unable to do plot 2
        03/08/2021	-	Powerharrow plot 2
        04/08/2021	-	Rolled all plots
        01/09/2021	-	Powerharrow all plots, single pass to level out after suction cup install
        08/09/2021	-	2 passes of springtine harrows to work in fert and prep transplant bed
        06/12/2021	-	2 passes with power harrow at low speed, worked down to about 10cm
        09/12/2021	-	2 passes with spring tine harrows to work agrichemical in
        10/03/2022	-	Ploughed all plots with 3 furrow plough then rolled with Cambridge roller
        25/04/2022	-	Two passes with power harrow (2m)
        09/05/2022	-	one pass with springtine harrow to level plots out
        12/05/2022	-	One pass with power harrow, set shallow (5cm) to work pinnacle into soil
        11/11/2022	-	Rotary hoe used to chop remaining biomass into the soil
        13/12/2022	-	Two passes with power harrow, first pass at about 20cm deep to break pan created by rotary hoe when residue was chopped in. second pass was shallow to even seed bed out
        01/05/2023	-	Ploughed all plots. Plough set for about 15cm deep
        02/05/2023	-	Cultivated area rolled with cambridge ring roller
      Memo FertiliserEvents: same as SVS.LincolnRot1.FertiliserEvents
      Memo IrrigationEvents
        ### Rotation 4 - Irrigation

        09/03/2021	-	30mm of irrigation applied to column 2 in an attempt to soften up soil
        10/03/2021	-	30mm of irrigation applied to column 1 to achive finer seed bed
        22/04/2021	-	5mm applied to column 1
        23/04/2021	-	5 mm applied to column 2
        26/04/2021	-	5 mm applied to both columns
        29/04/2021	-	5 mm applied to both columns once fertiliser applied
        03/05/2021	-	5 mm applied to both columns
        07/05/2021	-	5 mm applied to both columns
        20/05/2021	-	10mm applied to both columns to wash fert in.
        09/09/2021	-	5mm applied to column 1
        10/09/2021	-	5mm applied to column 2
        13/09/2021	-	10mm applied to column1
        14/09/2021	-	10 mm applied to column 2
        23/12/2021	-	15mn across both treatments
        06/01/2022	-	15mm column 1
        07/01/2022	-	15 mm column 2
        18/01/2022	-	irrigation in column 1. 15mm applied
        19/01/2022	-	irrigation applied in column 2. 15mm applied
        24/01/2022	-	Applied 15mm on column 1 & 2
        31/01/2022	-	Applied 15mm on column 1 & 2
        12/05/2022	-	10mm applied to incorporate Fungicide into seedbed
        26/05/2022	-	5mm of water applied on column 1 & 2
      Memo ReadCompletedTasks
        *	Irrigation - done!

        *	Soil mineral N - done!

        *	Soil moisture - done!

        *	Fertiliser N - done but confirm with team that values are correct.

        * 	Biomass & N uptake completed for PakChoi and Lettuce - alert IS or AM about wrong calculations for Lettuce yield. Also, check that entry Q61 wasn't a typo (i.e., 59.7 rather than 597 which ultimately gives 17 t DM/ha).

        *	Biomass  Nuptake for peas and cauliflower.
      Memo DeleteAfterAdressingAll
        *	Confirm N fertiliser rates
        *	Confirm ryegrass was not irrigated
        *	Confirm N uptake for cauliflower.
      Memo RotationInfo_Read
        Pak choi-Lettuce-Peas-Cauliflower-Ryegrass
      Memo ReadPakChoi
        *Details from measurements are as follows:

            The average DM content at the final harvest was 4.9 and 4.6% for Marketable and residue biomasss, respectively.

            The average FW at final harvest was 61.5 (range 58.9 - 63) tFW/ha.

        *Average aboveground tissue N content at final harvest was 4.4%

        *C:N analysis of total biomass was as follows:

            	Date		Average C%	Average N%
        		18/05/2021	37.9		6.5
        		15/06/2021	35.5		6.1
        		8/07/2021	34.5		4.5
        		27/07/2021	26.7		3.5
      Memo ReadLettuce
        *Details from measurements are as follows:

            The average DM content at the final harvest was 3.5% (3.3 and 4.7% for marketable and residue biomasss, respectively).

            Average total N conc at final harvest was 3.5%

            Average FWT at final harvest was 60 t/ha

            The average tFW/ha at final harvest for  marketable & residue components was 29.7(range 23.5 - 26.8) and 30.2(range 24.7 - 32.4), respectively.

            Average HI = 0.4

        *C:N analysis of total biomass was as follows:

            	Date		Average C%	Average N%
        		15/09/2021	42.0		2.6
        		14/10/2021	39.6		5.0
        		8/11/2021	37.4		4.3
        		19/11/2021	37.4		3.5
      Memo ReadPeas
        *Details from measurements are as follows:

            The average DM content at the final harvest was x and x% for marketable and residue biomasss, respectively.

            The average tFW/ha at final harvest for  marketable & residue components was x(range x - x) and x(range x - x), respectively. HI ~x(check!).

        *C:N analysis of total biomass was as follows: Done!

            	Date		Average C%	Average N%
        		31/01/2022	43.7		5.0
        		21/02/2022	42.2		3.6
        		08/03/2022	42.1		2.2
      Memo ReadCauliflower
        *Cauliflower sown on 12/05/2022

        *Details from measurements are as follows: Done (but check again with team).

            The average DM content of the total biomass at the final harvest was 10%.

            The average total tFW/ha at final harvest 42.6(range 31.3 - 59.2) - Modified

            The average total tDM/ha at final harvest 1.71(range 1.54 - 1.85).

        *C:N analysis of total biomass was as follows: Done!

            	Date		Average C%	Average N%
        		28/06/2022	41.4		5.3
        		25/07/2022	41.2		5.9
        		19/08/2022	40.5		5.9
        		15/09/2022	39.7		4.6
        		1/10/2022	40.2		3.6
        *Message from Issy - N concentration measured only at the final harvest.

        *Harvesting of heads was carried out severally, so an average approx. final date is estimated.
      Factors
        Permutation
          Factor _N
            CompositeFactor 1: Specifications=[NitrogenOperations]
              Operations NitrogenOperations
            CompositeFactor 2: Specifications=[NitrogenOperations]
              Operations NitrogenOperations
                2021-04-29  [Fertiliser].Apply(15, "NH4NO3N", 10);
                2021-05-20  [Fertiliser].Apply(15, "NH4NO3N", 10);
                2021-09-24  [Fertiliser].Apply(12, "NH4NO3N", 10);
                2021-10-18  [Fertiliser].Apply(6.25, "NH4NO3N", 10);
                2022-05-27  [Fertiliser].Apply(25, "NH4NO3N", 10);
                2022-06-30  [Fertiliser].Apply(25, "NH4NO3N", 10);
                2022-09-12  [Fertiliser].Apply(50, "NH4NO3N", 10);
            CompositeFactor 3: Specifications=[NitrogenOperations]
              Operations NitrogenOperations
                2021-04-29  [Fertiliser].Apply(30, "NH4NO3N", 10);
                2021-05-20  [Fertiliser].Apply(30, "NH4NO3N", 10);
                2021-09-24  [Fertiliser].Apply(25, "NH4NO3N", 10);
                2021-10-18  [Fertiliser].Apply(12.5, "NH4NO3N", 10);
                2022-05-27  [Fertiliser].Apply(50, "NH4NO3N", 10);
                2022-06-30  [Fertiliser].Apply(50, "NH4NO3N", 10);
                2022-09-12  [Fertiliser].Apply(100, "NH4NO3N", 10);
            CompositeFactor 4: Specifications=[NitrogenOperations]
              Operations NitrogenOperations
                2021-04-29  [Fertiliser].Apply(60, "NH4NO3N", 10);
                2021-05-20  [Fertiliser].Apply(61, "NH4NO3N", 10);
                2021-09-24  [Fertiliser].Apply(50, "NH4NO3N", 10);
                2021-10-18  [Fertiliser].Apply(25, "NH4NO3N", 10);
                2022-05-27  [Fertiliser].Apply(100, "NH4NO3N", 10);
                2022-06-30  [Fertiliser].Apply(100, "NH4NO3N", 10);
                2022-09-12  [Fertiliser].Apply(200, "NH4NO3N", 10);
          Factor _Irr
            CompositeFactor 1: Specifications=[IrrigationOperations]
              Operations IrrigationOperations
                2021-03-10  [Irrigation].Apply(30);
                2021-04-22  [Irrigation].Apply(5);
                2021-04-26  [Irrigation].Apply(5);
                2021-04-29  [Irrigation].Apply(5);
                2021-05-03  [Irrigation].Apply(5);
                2021-05-07  [Irrigation].Apply(5);
                2021-05-20  [Irrigation].Apply(10);
                2021-09-09  [Irrigation].Apply(5);
                2021-09-13  [Irrigation].Apply(10);
                2021-12-23  [Irrigation].Apply(15);
                2022-01-06  [Irrigation].Apply(15);
                2022-01-18  [Irrigation].Apply(15);
                2022-01-24  [Irrigation].Apply(15);
                2022-01-31  [Irrigation].Apply(15);
                2022-05-12  [Irrigation].Apply(10);
                2022-05-26  [Irrigation].Apply(3);
            CompositeFactor 2: Specifications=[IrrigationOperations]
              Operations IrrigationOperations
                2021-03-09  [Irrigation].Apply(30);
                2021-04-23  [Irrigation].Apply(5);
                2021-04-26  [Irrigation].Apply(5);
                2021-04-29  [Irrigation].Apply(5);
                2021-05-03  [Irrigation].Apply(5);
                2021-05-07  [Irrigation].Apply(5);
                2021-05-20  [Irrigation].Apply(10);
                2021-09-10  [Irrigation].Apply(5);
                2021-09-14  [Irrigation].Apply(10);
                2021-12-23  [Irrigation].Apply(15);
                2022-01-07  [Irrigation].Apply(15);
                2022-01-19  [Irrigation].Apply(15);
                2022-01-24  [Irrigation].Apply(15);
                2022-01-31  [Irrigation].Apply(15);
                2022-05-12  [Irrigation].Apply(10);
                2022-05-26  [Irrigation].Apply(3);
      Simulation Rot4_HB
        Clock: Start=2021-04-01; End=2023-06-30
        Weather: FileName=Whakatu.met; Latitude=-39.60698; Tav=13.3; Amp=9.5
        Summary
        SoilArbitrator Soil Arbitrator
        Zone Field: Area=1; Slope=0; AspectAngle=0; Altitude=50
          Folder Management
            Manager SowPakChoi
              CropName = SCRUM_PakChoi
              EstablishDate = 22/04/2021
              EstablishStage = Seed
              PlantingDepth = 15
              HarvestTimeOption = SettingDate
              HarvestDate = 07/10/2021 00:00:00
              Tt_EstablishToHarvest = 0
              HarvestStage = Vegetative
              ExpectedYield = 50
              FieldLoss = 0
              ResidueRemoval = 0
              ResidueIncorporation = 0
              ResidueIncorporationDepth = 0
              script: same as in SCRUMSownSelf.Field.CropManagement
            Manager SowLettuce
              CropName = SCRUM_Lettuce
              EstablishDate = 09/09/2021
              EstablishStage = Emergence
              PlantingDepth = 15
              HarvestTimeOption = SettingDate
              HarvestDate = 11/20/2021 00:00:00
              Tt_EstablishToHarvest = 0
              HarvestStage = Vegetative
              ExpectedYield = 45
              FieldLoss = 0
              ResidueRemoval = 0
              ResidueIncorporation = 0
              ResidueIncorporationDepth = 0
              script: same as in SCRUMSownSelf.Field.CropManagement
            Manager SowGreenPeas
              CropName = SCRUM_GreenPeas
              EstablishDate = 20/12/2021
              EstablishStage = Seed
              PlantingDepth = 15
              HarvestTimeOption = SettingDate
              HarvestDate = 02/22/2022 00:00:00
              Tt_EstablishToHarvest = 0
              HarvestStage = LateReproductive
              ExpectedYield = 8
              FieldLoss = 0
              ResidueRemoval = 0
              ResidueIncorporation = 0
              ResidueIncorporationDepth = 0
              script: same as in SCRUMSownSelf.Field.CropManagement
            Manager SowCauliflower
              CropName = SCRUM_Cauliflower
              EstablishDate = 12/05/2022
              EstablishStage = Seed
              PlantingDepth = 15
              HarvestTimeOption = SettingDate
              HarvestDate = 11/01/2022 00:00:00
              Tt_EstablishToHarvest = 0
              HarvestStage = MidReproductive
              ExpectedYield = 26
              FieldLoss = 0
              ResidueRemoval = 0
              ResidueIncorporation = 0
              ResidueIncorporationDepth = 0
              script: same as in SCRUMSownSelf.Field.CropManagement
            Manager SowRyegrass
              CropName = SCRUM_Ryegrass
              EstablishDate = 13/12/2022
              EstablishStage = Seed
              PlantingDepth = 15
              HarvestTimeOption = SettingDate
              HarvestDate = 04/20/2023 00:00:00
              Tt_EstablishToHarvest = 0
              HarvestStage = Maturity
              ExpectedYield = 1.5
              FieldLoss = 0
              ResidueRemoval = 0
              ResidueIncorporation = 0
              ResidueIncorporationDepth = 0
              script: same as in SCRUMSownSelf.Field.CropManagement
            Manager Cultivation
              DoCultivation1 = True
              Cultivate1 = 04/02/2021 00:00:00
              RemoveProp1 = 0
              IncorporateProp1 = 0.8
              DepthIncorporate1 = 150
              DoCultivation2 = True
              Cultivate2 = 08/02/2021 00:00:00
              RemoveProp2 = 0
              IncorporateProp2 = 0.7
              DepthIncorporate2 = 100
              DoCultivation3 = True
              Cultivate3 = 09/08/2021 00:00:00
              RemoveProp3 = 0
              IncorporateProp3 = 0.7
              DepthIncorporate3 = 100
              DoCultivation4 = True
              Cultivate4 = 12/06/2021 00:00:00
              RemoveProp4 = 0
              IncorporateProp4 = 0.7
              DepthIncorporate4 = 100
              DoCultivation5 = True
              Cultivate5 = 03/08/2022 00:00:00
              RemoveProp5 = 0.5
              IncorporateProp5 = 0
              DepthIncorporate5 = 0
              DoCultivation6 = True
              Cultivate6 = 03/10/2022 00:00:00
              RemoveProp6 = 0
              IncorporateProp6 = 0.8
              DepthIncorporate6 = 150
              DoCultivation7 = True
              Cultivate7 = 05/12/2022 00:00:00
              RemoveProp7 = 0
              IncorporateProp7 = 0.7
              DepthIncorporate7 = 100
              DoCultivation8 = True
              Cultivate8 = 11/11/2022 00:00:00
              RemoveProp8 = 0
              IncorporateProp8 = 0.8
              DepthIncorporate8 = 100
              DoCultivation9 = True
              Cultivate9 = 05/01/2023 00:00:00
              RemoveProp9 = 0
              IncorporateProp9 = 0.8
              DepthIncorporate9 = 150
              DoCultivation10 = False
              Cultivate10 = 01/01/0001 00:00:00
              RemoveProp10 = 0
              IncorporateProp10 = 0
              DepthIncorporate10 = 0
              script: same as in SVS.LincolnRot1.LincolnRotation1.Field.Management.Cultivation
            Manager SetupInitialSoilN
              Treatment1Name = HawkesBayRot4_N1_Irr1
              Treatment1NO3 = 92.16, 65.84, 23.99, 8.46, 6.5, 8.8, 11.1
              Treatment1NH4 = 0.17, 0.18, 0.5, 0.81, 0.32, 0.43, 0.53
              Treatment2Name = HawkesBayRot4_N2_Irr1
              Treatment2NO3 = 91.97, 61.51, 19.2, 7.34, 4.71, 9.2, 13.68
              Treatment2NH4 = 0, 0, 0.01, 0.02, 0, 0.03, 0.05
              Treatment3Name = HawkesBayRot4_N3_Irr1
              Treatment3NO3 = 97.5, 68.63, 25.31, 10.87, 7.08, 8.12, 9.15
              Treatment3NH4 = 1.02, 0.95, 0.87, 0.85, 0.97, 1.16, 1.35
              Treatment4Name = HawkesBayRot4_N4_Irr1
              Treatment4NO3 = 87.55, 60.61, 20.96, 8.25, 5.79, 7.53, 9.26
              Treatment4NH4 = 0.02, 0.01, 0.06, 0.11, 0, 0.22, 0.43
              Treatment5Name = HawkesBayRot4_N1_Irr2
              Treatment5NO3 = 98.34, 70.31, 24.67, 7.06, 3.89, 19.68, 35.46
              Treatment5NH4 = 0.78, 0.79, 0.78, 0.76, 0.53, 0.65, 0.77
              Treatment6Name = HawkesBayRot4_N2_Irr2
              Treatment6NO3 = 97.11, 68.38, 23.86, 8.08, 13.75, 17.2, 20.64
              Treatment6NH4 = 0.41, 0.53, 0.6, 0.56, 0.39, 0.84, 1.28
              Treatment7Name = HawkesBayRot4_N3_Irr2
              Treatment7NO3 = 99.62, 69.99, 29.66, 18.96, 3.08, 10.44, 17.8
              Treatment7NH4 = 0.88, 0.79, 0.63, 0.56, 1.01, 1.05, 1.08
              Treatment8Name = HawkesBayRot4_N4_Irr2
              Treatment8NO3 = 82.75, 61.08, 22.72, 6.03, 5.98, 7.4, 8.82
              Treatment8NH4 = 0.96, 1.24, 1.17, 0.83, 1.1, 0.95, 0.8
              script: same as in SVS.LincolnRot1.LincolnRotation1.Field.Management.SetupInitialSoilN
            Manager WaterTable: same as SVS.HawkesBayRot3.Rot3_HB.Field.Management.WaterTable
            Operations NitrogenOperations
            Operations IrrigationOperations
          MicroClimate: a_interception=0; b_interception=1; c_interception=0; d_interception=0; SoilHeatFluxFraction=0.4; MinimumHeightDiffForNewLayer=0; NightInterceptionFraction=0.5; ReferenceHeight=2
          Irrigation
          Fertiliser
          SurfaceOrganicMatter: InitialResidueName=wheat; InitialResidueType=pasture; InitialResidueMass=2500; InitialStandingFraction=0; InitialCPR=0; InitialCNR=80
          Soil: SoilType=Typic Orthic Gley Soil; LocalName=Kaiapo; Site=Pattison Block, PFR Research Farm; NearestTown=Havelock North; Region=Hawkes Bay; Country=New Zealand; Latitude=-39.6601; Longitude=176.8764; YearOfSampling=2020
            DataSource=Data from analyses at PFR soil lab using samples from site, complemented with historical data from nearby studies and PTFs (Cichota et al, 2016). Pedological description by Sharn Hainsworth (MWLC)
            Comments=This represents an 'average' of all four profiles described at the site
            Memo
              # Notes

              Values for physical properties, particularly water storage limits and SWCon, were adjused after comparison against field-measured data.
              Values for FOM were based on expert opinion and adjusted after comparison with measured soil N data.
            Physical
              Thickness  ParticleSizeSand  ParticleSizeSilt  ParticleSizeClay  Rocks  BD       AirDry  LL15   DUL    SAT      KS
              100        1.1               65.9              33                0      1.07     0.074   0.135  0.325  0.508    258.5
              150        1                 64.2              34.8              0      1.214    0.216   0.24   0.403  0.507    166.9
              300        0.8               60.8              38.3              0      1.19     0.268   0.268  0.39   0.497    108.3
              300        14.7              48.5              36.8              0      1.175    0.25    0.25   0.392  0.51     401.5
              300        2.7               65.9              31.4              0      1.26     0.243   0.243  0.421  0.504    125
              300        1.3               35.2              63.5              0      1.27     0.306   0.306  0.446  0.512    42.4
              300        14.88             28.2875           34.3325           22.5   0.76415  0.248   0.248  0.372  0.39525  1.7
              SoilCrop SCRUMSoil: LL=[0.223, 0.24, 0.268, 0.25, 0.243, 0.306, 0.248]; KL=[0.1, 0.09, 0.05, 0.03, 0.02, 0.005, 0]; XF=[1, 1, 1, 1, 1, 1, 1]
            WaterBalance SoilWater: same as SVS.HawkesBayRot3.Rot3_HB.Field.Soil.SoilWater
            Organic: same as SVS.HawkesBayRot3.Rot3_HB.Field.Soil.Organic
            Chemical: same as SVS.HawkesBayRot3.Rot3_HB.Field.Soil.Chemical
            Nutrient
            Water: Thickness=[100, 150, 300, 300, 300, 300, 300]; InitialValues=[0.325, 0.403, 0.39, 0.392, 0.421, 0.446, 0.372]; InitialPAWmm=255.25; RelativeTo=LL15; FilledFromTop=true
            OutputLayers OutputWaterLayers: Thickness=[200, 200, 200, 200, 200, 200, 200, 200, 200]
            OutputLayers OutputNutrientLayers: Thickness=[150, 150, 300, 300, 300, 300, 300]
            Solute NO3: same as SVS.HawkesBayRot3.Rot3_HB.Field.Soil.NO3
            Solute NH4: same as SVS.HawkesBayRot3.Rot3_HB.Field.Soil.NH4
            Solute Urea: same as ABlock.ABlock_06_07.Field.Soil.Urea
            SoilTemperature Temperature
          Plant SCRUM
          BiomassRemovalEvents SCRUM_Cut: PlantToRemoveBiomassFrom=SCRUM; RemovalType=0; StageToSet=3.8; RemovalDatesInput=23/01/2023, 13/03/2023, 19/04/2023
            BiomassRemovals:
              PlantName  OrganName  TypeString  LiveToRemove  DeadToRemove  LiveToResidue  DeadToResidue
              SCRUM      Product    Cutting     0.5           0             0              1
              SCRUM      Stover     Cutting     0.5           0             0              1
              SCRUM      Root       Cutting     0             0             0              0
              SCRUM      Nodule     Cutting     0             0             0              0
          ScrumCropInstance SCRUM_PakChoi: HarvestIndex=0.7; MoistureContent=0.95; RootProportion=0.1; MaxRootDepth=1500; MaxHeight=350; MaxCover=0.89; ExtinctionCoefficient=0.7; TypicalHarvestStage=Vegetative; SeedlingNConc=0.068; ProductHarvestNConc=0.044; StoverHarvestNConc=0.044; RootNConc=0.0209; LegumeFactor=0; BaseTemperature=0; OptimumTemperature=20; MaxTemperature=35; Tt_SowToEmergence=200; GSMax=0.008; R50=150; ConsiderWaterStress=true; EstablishStage=Seedling; HarvestStage=Vegetative; FieldLoss=0; ResidueRemoval=0; ResidueIncorporation=0; ResidueIncorporationDepth=0; Factor_XoBiomass=0.5; Factor_bBiomass=0.2; Factor_XoCover=0.4; Factor_bCover=0.2; Factor_XoHeight=0.7; Factor_bHeight=0.2; Tt_EmergencetoMaturity=0
          ScrumCropInstance SCRUM_Lettuce: HarvestIndex=0.47; MoistureContent=0.97; RootProportion=0.1; MaxRootDepth=1500; MaxHeight=350; MaxCover=0.89; ExtinctionCoefficient=0.7; TypicalHarvestStage=Vegetative; SeedlingNConc=0.055; ProductHarvestNConc=0.035; StoverHarvestNConc=0.035; RootNConc=0.02; LegumeFactor=0; BaseTemperature=0; OptimumTemperature=20; MaxTemperature=35; Tt_SowToEmergence=100; GSMax=0.008; R50=150; ConsiderWaterStress=true; EstablishStage=Seedling; HarvestStage=Vegetative; FieldLoss=0; ResidueRemoval=0; ResidueIncorporation=0; ResidueIncorporationDepth=0; Factor_XoBiomass=0.5; Factor_bBiomass=0.2; Factor_XoCover=0.4; Factor_bCover=0.2; Factor_XoHeight=0.7; Factor_bHeight=0.2; Tt_EmergencetoMaturity=0
          ScrumCropInstance SCRUM_GreenPeas: HarvestIndex=0.4; MoistureContent=0.78; RootProportion=0.1; MaxRootDepth=1500; MaxHeight=350; MaxCover=0.89; ExtinctionCoefficient=0.7; TypicalHarvestStage=Maturity; SeedlingNConc=0.055; ProductHarvestNConc=0.025; StoverHarvestNConc=0.045; RootNConc=0.015; LegumeFactor=1; BaseTemperature=0; OptimumTemperature=20; MaxTemperature=35; Tt_SowToEmergence=150; GSMax=0.008; R50=150; ConsiderWaterStress=true; EstablishStage=Seedling; HarvestStage=Vegetative; FieldLoss=0; ResidueRemoval=0; ResidueIncorporation=0; ResidueIncorporationDepth=0; Factor_XoBiomass=0.5; Factor_bBiomass=0.2; Factor_XoCover=0.4; Factor_bCover=0.2; Factor_XoHeight=0.7; Factor_bHeight=0.2; Tt_EmergencetoMaturity=0
          ScrumCropInstance SCRUM_Cauliflower: HarvestIndex=0.35; MoistureContent=0.94; RootProportion=0.1; MaxRootDepth=1500; MaxHeight=350; MaxCover=0.89; ExtinctionCoefficient=0.7; TypicalHarvestStage=LateReproductive; SeedlingNConc=0.055; ProductHarvestNConc=0.038; StoverHarvestNConc=0.035; RootNConc=0.0209; LegumeFactor=0; BaseTemperature=0; OptimumTemperature=20; MaxTemperature=35; Tt_SowToEmergence=200; GSMax=0.008; R50=150; ConsiderWaterStress=true; EstablishStage=Seedling; HarvestStage=Vegetative; FieldLoss=0; ResidueRemoval=0; ResidueIncorporation=0; ResidueIncorporationDepth=0; Factor_XoBiomass=0.5; Factor_bBiomass=0.2; Factor_XoCover=0.4; Factor_bCover=0.2; Factor_XoHeight=0.7; Factor_bHeight=0.2; Tt_EmergencetoMaturity=0
          ScrumCropInstance SCRUM_Ryegrass: HarvestIndex=0.14; MoistureContent=0.14; RootProportion=0.1; MaxRootDepth=1500; MaxHeight=500; MaxCover=0.99; ExtinctionCoefficient=0.86; TypicalHarvestStage=Maturity; SeedlingNConc=0.06; ProductHarvestNConc=0.02; StoverHarvestNConc=0.02; RootNConc=0.01; LegumeFactor=0; BaseTemperature=0; OptimumTemperature=20; MaxTemperature=35; Tt_SowToEmergence=200; GSMax=0.008; R50=150; ConsiderWaterStress=true; EstablishStage=Seed; HarvestStage=MidReproductive; FieldLoss=0; ResidueRemoval=0; ResidueIncorporation=0; ResidueIncorporationDepth=0; Factor_XoBiomass=0.5; Factor_bBiomass=0.2; Factor_XoCover=0.4; Factor_bCover=0.2; Factor_XoHeight=0.7; Factor_bHeight=0.2; Tt_EmergencetoMaturity=0
          Report ReportSVS: EventNames=[Clock].DoReport
            VariableNames:
              [Clock].Today
              [SCRUM].SowingData.Cultivar as CropName
              // Water balance outputs
              [Weather].Rain as Rainfall
              [Irrigation].IrrigationApplied as IrrigationApplied
              [Soil].SoilWater.Eo as Eo
              [Soil].SoilWater.Es as Evaporation
              [SCRUM].Stover.Transpiration as Transpiration
              [Soil].SoilWater.pond as PondedWater
              [Soil].SoilWater.Drainage as Drainage
              [Soil].SoilWater.Runoff as Runoff
              sum([Soil].SoilWater.LateralOutflow) as LateralFlow
              sum([Soil].Water.MM) as TotalSWC
              sum([Soil].OutputWaterLayers.SWmm) as TotalSWmmCheck
              sum([Soil].Physical.SATmm) as TotalSAT
              sum([Soil].Physical.DULmm) as TotalDUL
              sum([Soil].Physical.LL15mm) as TotalLL15
              // Nitrogen balance outputs
              [Fertiliser].NitrogenApplied as FertiliserNApplied
              sum([Soil].Nutrient.DenitrifiedN) as DenitrifiedN
              ([Soil].SoilWater.LeachNH4 + [Soil].SoilWater.LeachNO3) as LeachedN
              (-[SCRUM].Root.NUptake) as UptakeN
              (sum([SurfaceOrganicMatter].SurfaceResidue.Decomposition.MineralisedN) + sum([Soil].Nutrient.MineralisedN)) as NetMineralisedN
              sum([Soil].Nutrient.MineralisedN) as MineralisedSoilN
              sum([SurfaceOrganicMatter].SurfaceResidue.Decomposition.MineralisedN) as MineralisedSurfOMN
              (sum([Soil].Urea.kgha) + sum([Soil].NH4.kgha) + sum([Soil].NO3.kgha)) as TotalSoilN
              sum([Soil].Urea.kgha) as TotalUrea
              sum([Soil].NH4.kgha) as TotalNH4
              sum([Soil].NO3.kgha) as TotalNO3
              [SurfaceOrganicMatter].N as TotalSurfaceOMN
              sum([Soil].Nutrient.FOM.N) as TotalFOMN
              sum([Soil].Nutrient.Humic.N) as TotalHumicN
              sum([Soil].Nutrient.Microbial.N) as TotalMicrobialN
              [SCRUM].Total.N*10 as TotalPlantN
              [SCRUM].AboveGround.N *10 as AboveGroundN
              // Crop outputs
              [SCRUM].Total.Wt*10 as TotalPlantWt
              [SCRUM].AboveGround.Wt
              [SCRUM].Root.Wt as SCRUM.BelowGround.Wt
              [SCRUM].Stover.Wt
              [SCRUM].Stover.Live.Wt
              [SCRUM].Product.Wt
              [SCRUM].Product.Live.Wt
              [SCRUM].Root.Wt
              [SCRUM].Product.Live.N
              [SCRUM].Stover.Live.NConc
              [SCRUM].Total.NConc
              [SCRUM].AboveGround.NConc
              [SCRUM].Stover.Fw
              [SCRUM].Stover.Fn
              [SCRUM].Stover.LAI as LAIGreen
              [SCRUM].Stover.LAIDead as LAIDead
              [SCRUM].Stover.LAITotal as LAITotal
              [SCRUM].Stover.Height as CropHeight
              [SCRUM].Stover.CoverGreen as CoverGreen
              [SCRUM].Stover.CoverDead as CoverDead
              [SCRUM].Stover.CoverTotal as CoverTotal
              [SCRUM].Root.Depth as RootDepth
              [SCRUM].Phenology.CurrentPhase.Name
              [SCRUM].Phenology.CurrentStageName
              [SCRUM].Phenology.Stage
              // Harvest outptus
              [SCRUM_PakChoi].ProductHarvested.Wt
              [SCRUM_Lettuce].ProductHarvested.Wt
              [SCRUM_GreenPeas].ProductHarvested.Wt
              [SCRUM_Cauliflower].ProductHarvested.Wt
              //[SCRUM_Ryegrass].ProductHarvested.Wt
              [SCRUM_PakChoi].StoverRemoved.Wt
              [SCRUM_Lettuce].StoverRemoved.Wt
              [SCRUM_GreenPeas].StoverRemoved.Wt
              [SCRUM_Cauliflower].StoverRemoved.Wt
              //[SCRUM_Ryegrass].StoverRemoved.Wt
              // Fresh organic matter outptus
              [SurfaceOrganicMatter].Wt as TotalSurfaceOMWt
              [SurfaceOrganicMatter].C as TotalSurfaceOMC
              ([SurfaceOrganicMatter].C/([SurfaceOrganicMatter].N + 0.000000001) as SurfaceOM.CN
              (sum([Soil].Nutrient.FOM.C)/(sum([Soil].Nutrient.FOM.N) + 0.000000001) as SoilFOM.CN
              sum([Soil].Nutrient.FOM.C)/0.4 as TotalFOMWt
              sum([Soil].Nutrient.FOM.C) as TotalFOMC
              // VALIDATION outputs
              ([SCRUM].AboveGround.Wt)/100 as AboveGroundWt
              [SCRUM].Stover.CoverTotal as Cover
              [Soil].OutputWaterLayers.SW[1] as VWC_0_20
              [Soil].OutputWaterLayers.SW[2] as VWC_20_40
              [Soil].OutputWaterLayers.SW[3] as VWC_40_60
              [Soil].OutputWaterLayers.SW[4] as VWC_60_80
              [Soil].OutputWaterLayers.SW[5] as VWC_80_100
              [Soil].OutputWaterLayers.SW[6] as VWC_100_120
              [Soil].OutputWaterLayers.SW[7] as VWC_120_140
              [Soil].OutputWaterLayers.SW[8] as VWC_140_160
              ([Soil].OutputWaterLayers.SWmm[1] + [Soil].OutputWaterLayers.SWmm[2] + [Soil].OutputWaterLayers.SWmm[3]) as SWCmm_0_60
              ([Soil].OutputNutrientLayers.NH4[1]+[Soil].OutputNutrientLayers.NO3[1]+[Soil].OutputNutrientLayers.NH4[2]+[Soil].OutputNutrientLayers.NO3[2]) as SoilN_0_30
              ([Soil].OutputNutrientLayers.NH4[3]+[Soil].OutputNutrientLayers.NO3[3]) as SoilN_30_60
              ([Soil].OutputNutrientLayers.NH4[4]+[Soil].OutputNutrientLayers.NO3[4]) as SoilN_60_90
              ([Soil].OutputNutrientLayers.NH4[5]+[Soil].OutputNutrientLayers.NO3[5]) as SoilN_90_120
              ([Soil].OutputNutrientLayers.NH4[6]+[Soil].OutputNutrientLayers.NO3[6]) as SoilN_120_150
              (SoilN_0_30 + SoilN_30_60) as SoilN_0_60
              (SoilN_0_30 + SoilN_30_60 + SoilN_60_90) as SoilN_0_90
              (SoilN_0_30 + SoilN_30_60 + SoilN_60_90 + SoilN_90_120) as SoilN_0_120
              (SoilN_0_30 + SoilN_30_60 + SoilN_60_90 + SoilN_90_120 + SoilN_120_150) as SoilN_0_150
              ([Soil].SoilWater.Flux[3] + [Soil].SoilWater.Flow[3]) as Drainage_60cm
              ([Soil].SoilWater.FlowNH4[3] + [Soil].SoilWater.FlowNO3[3]) as LeachedN_60cm
              Sum of ([Soil].SoilWater.FlowNH4[4] + [Soil].SoilWater.FlowNO3[4]) from [Clock].StartDate to [Clock].Today as LeachedCumN_60cm
              ([Soil].SoilWater.Flux[4] + [Soil].SoilWater.Flow[4]) as Drainage_90cm
              ([Soil].SoilWater.FlowNH4[4] + [Soil].SoilWater.FlowNO3[4]) as LeachedN_90cm
              [Soil].SoilWater.FlowNO3[4] as LeachedNO3_60cm
              [Soil].SoilWater.FlowNO3
              ([Soil].OutputNutrientLayers.NO3ppm*[Soil].OutputNutrientLayers.BD/[Soil].OutputNutrientLayers.SW) as SolutionNO3
              [Soil].NO3.ppm*[Soil].Physical.BD/[Soil].Water.Volumetric as SolutionConc
              [Soil].Nutrient.MineralisedN
              [SCRUM].Root.NTakenUp
              [SCRUM].Root.WaterUptake
              [Soil].SoilWater.Flux as WaterFlow
  Experiment EstablishmentMethodTest
    Factors
      Permutation
        Factor EstabAt
          Specification=[CropManagement].Script.EstablishStage = Seed, Emergence, Seedling
        Factor HarvAt: Specification=[CropManagement].Script.HarvestStage =  Ripe
    Simulation TestBaseENK
      Weather: FileName=lincoln.met; Latitude=-43.626; Tav=11.6; Amp=10.6
      Clock: Start=2020-09-20; End=2021-03-31
      Summary
      SoilArbitrator Soil Arbitrator
      Zone Field: Area=1; Slope=0; AspectAngle=0; Altitude=50
        Soil: same as StageTest.SCRUMTestBase2.Field.Soil
        SurfaceOrganicMatter: InitialResidueName=wheat; InitialResidueType=wheat; InitialResidueMass=2000; InitialStandingFraction=0; InitialCPR=0; InitialCNR=80
        MicroClimate: a_interception=0; b_interception=1; c_interception=0; d_interception=0; SoilHeatFluxFraction=0.4; MinimumHeightDiffForNewLayer=0; NightInterceptionFraction=0.5; ReferenceHeight=2
        Plant SCRUM
        Irrigation
        Fertiliser
        Manager CropManagement
          CropName = SCRUM_Wheat
          EstablishDate = 20/09/2020
          EstablishStage = Seedling
          PlantingDepth = 20
          HarvestTimeOption = SettingDate
          HarvestDate = 02/28/2021 00:00:00
          Tt_EstablishToHarvest = 1000
          HarvestStage = Ripe
          ExpectedYield = 8
          FieldLoss = 0.05
          ResidueRemoval = 0.05
          ResidueIncorporation = 0.9
          ResidueIncorporationDepth = 100
          script: same as in SCRUMSownSelf.Field.CropManagement
        Manager AutomaticIrrigation: same as SCRUMSownSelf.Field.AutomaticIrrigation
        Manager AutomaticFertiliser: same as StageTest.SCRUMTestBase2.Field.AutomaticFertiliser
        Report ReportENK: EventNames=[Clock].DoReport
          VariableNames:
            [AutomaticIrrigation].Script.AmountToApply
            [AutomaticIrrigation].Script.MonitoredLayerDUL
            [AutomaticIrrigation].Script.MonitoredLayerSW
            [AutomaticIrrigation].Script.MonitoredLayerTarget
            [AutomaticIrrigation].Script.MonitoredLayerTrigger
            [Clock].Today
            [Fertiliser].NitrogenApplied
            [Irrigation].IrrigationApplied
            [SCRUM].AboveGround.NConc
            [SCRUM].Arbitrator.DM.NutrientLimitation
            [SCRUM].Arbitrator.DM.SinkLimitation
            [SCRUM].Arbitrator.DM.TotalFixationSupply
            [SCRUM].Arbitrator.DM.TotalPlantDemand
            [SCRUM].Arbitrator.FN
            [SCRUM].Arbitrator.N.TotalPlantDemand
            [SCRUM].Arbitrator.N.TotalPlantSupply
            [SCRUM].Phenology.AccumulatedEmergedTt
            [SCRUM].Phenology.AccumulatedTt
            [SCRUM].Phenology.CurrentPhase.Name
            [SCRUM].Phenology.CurrentStageName
            [SCRUM].Phenology.Stage
            [SCRUM].Phenology.ThermalTime
            [SCRUM].Product.Allocated.Wt
            [SCRUM].Product.DMDemands.Structural.DMDemandFunction.PartitionFraction
            [SCRUM].Product.DryMatterContent
            [SCRUM].Product.ExpectedYield
            [SCRUM].Product.Live.N
            [SCRUM].Product.Live.NConc
            [SCRUM].Product.Live.Wt
            [SCRUM].Product.Yield
            [SCRUM].Root.Depth
            [SCRUM].Root.DMatHarvest
            [SCRUM].Root.DMDemands.Structural.DMDemandFunction.PartitionFraction
            [SCRUM].Root.Live.N
            [SCRUM].Root.Live.NConc
            [SCRUM].Root.Live.Wt
            [SCRUM].Root.WaterUptake
            [SCRUM].Stover.CoverDead
            [SCRUM].Stover.CoverGreen
            [SCRUM].Stover.CoverTotal
            [SCRUM].Stover.CriticalNConc
            [SCRUM].Stover.CritNConc
            [SCRUM].Stover.DMAtHarvest
            [SCRUM].Stover.DMDemands.Structural.DMDemandFunction.PartitionFraction
            [SCRUM].Stover.Fn
            [SCRUM].Stover.Fw
            [SCRUM].Stover.Height
            [SCRUM].Stover.LAI
            [SCRUM].Stover.LAIDead
            [SCRUM].Stover.LAITotal
            [SCRUM].Stover.Live.N
            [SCRUM].Stover.Live.NConc
            [SCRUM].Stover.Live.Wt
            [SCRUM].Stover.MinimumNConc
            [SCRUM].Stover.MaximumNConc
            [SCRUM].Stover.Photosynthesis
            [SCRUM].Stover.Transpiration
            [SCRUM].Stover.WaterDemand
            [SCRUM].Total.N
            [SCRUM].Total.Wt
            [SCRUM].TotalDMAtHarvest
            [Soil].SoilWater.Drainage
            [Soil].SoilWater.Eo
            [Soil].SoilWater.Es
            [Soil].SoilWater.pond
            [Soil].SoilWater.Runoff
            [Soil].Water.MM
            sum([Soil].NO3.kgha)
        Manager EndSim: same as StageTest.SCRUMTestBase2.Field.EndSim
        ScrumCropInstance SCRUM_Wheat: HarvestIndex=0.45; MoistureContent=0.14; RootProportion=0.1; MaxRootDepth=1500; MaxHeight=1000; MaxCover=0.97; ExtinctionCoefficient=0.7; TypicalHarvestStage=Ripe; SeedlingNConc=0.05; ProductHarvestNConc=0.02; StoverHarvestNConc=0.01; RootNConc=0.01; LegumeFactor=0; BaseTemperature=0; OptimumTemperature=20; MaxTemperature=30; Tt_SowToEmergence=150; GSMax=0.008; R50=150; ConsiderWaterStress=true; EstablishDate=1998-10-14; EstablishStage=Seedling; PlantingDepth=20; ExpectedYield=10; Tt_EstablishmentToHarvest=1000; HarvestStage=Maturity; FieldLoss=0; ResidueRemoval=0; ResidueIncorporation=0; ResidueIncorporationDepth=0; Factor_XoBiomass=0.5; Factor_bBiomass=0.2; Factor_XoCover=0.4; Factor_bCover=0.2; Factor_XoHeight=0.7; Factor_bHeight=0.2; Tt_EmergencetoMaturity=0
  Experiment ResouceLimitationTest
    Factors
      Permutation
        Factor _Irr
          CompositeFactor _No: Specifications=[AutomaticIrrigation].Script.Enabled = FALSE
          CompositeFactor _Yes: Specifications=[AutomaticIrrigation].Script.Enabled = TRUE
        Factor _Nit
          CompositeFactor _No: Specifications=[AutomaticFertiliser].Script.Enabled = FALSE
          CompositeFactor _Yes: Specifications=[AutomaticFertiliser].Script.Enabled = TRUE
    Simulation Test_ENK
      Weather: FileName=lincoln.met; Latitude=-43.626; Tav=11.6; Amp=10.6
      Clock: Start=2020-09-20; End=2021-03-31
      Summary
      SoilArbitrator Soil Arbitrator
      Zone Field: Area=1; Slope=0; AspectAngle=0; Altitude=50
        Soil: SoilType=Mottled Immature Palic Soil; LocalName=Templeton; Site=A Block, PFR Research Farm; NearestTown=Lincoln; Region=Canterbury; Country=New Zealand; Latitude=-43.626; Longitude=172.468; YearOfSampling=2020
          DataSource=Data from analyses at PFR soil lab using samples from site, complemented with historical data from nearby studies and PTFs (Cichota et al, 2016). Pedological description by Thomas Caspari (MWLC)
          Comments=This represents an 'average' of the two profiles described at the site. Modified after sensibility tests and checks against field measured data.
          Memo
            # Notes

            Values for physical properties, particularly water storage limits and SWCon, were adjused after comparison against field-measured data.
            Values for FOM were based on expert opinion and adjusted after comparison with measured soil N data.
          Physical: same as SVS.LincolnRot1.LincolnRotation1.Field.Soil.Physical
          WaterBalance SoilWater: same as ABlock.ABlock_06_07.Field.Soil.SoilWater
          Organic: same as ABlock.ABlock_06_07.Field.Soil.Organic
          Chemical: same as ABlock.ABlock_06_07.Field.Soil.Chemical
          Nutrient
          Water: Thickness=[100, 100, 200, 200, 200, 200, 200, 200, 200, 200]; InitialPAWmm=172.6; RelativeTo=LL15; FilledFromTop=false
            InitialValues=[0.2225, 0.2475, 0.265, 0.2315, 0.25, 0.209, 0.2175, 0.1725, 0.205, 0.19]
          OutputLayers OutputWaterLayers: Thickness=[200, 200, 200, 200, 200, 200, 200, 200, 200]
          OutputLayers OutputNutrientLayers: Thickness=[150, 150, 300, 300, 300, 300, 300]
          Solute NO3: Thickness=[150, 150, 300, 300, 300, 300, 300]; InitialValues=[23.4, 12.5, 11, 1.75, 1, 1, 1]; InitialValuesUnits=ppm; WaterTableConcentration=0; D0=0; DepthConstant=0; MaxDepthSoluteAccessible=0; RunoffEffectivenessAtMovingSolute=0; MaxEffectiveRunoff=0
          Solute NH4: same as SVS.LincolnRot1.LincolnRotation1.Field.Soil.NH4
          Solute Urea: same as ABlock.ABlock_06_07.Field.Soil.Urea
          SoilTemperature Temperature
        SurfaceOrganicMatter: InitialResidueName=wheat; InitialResidueType=wheat; InitialResidueMass=2000; InitialStandingFraction=0; InitialCPR=0; InitialCNR=80
        MicroClimate: a_interception=0; b_interception=1; c_interception=0; d_interception=0; SoilHeatFluxFraction=0.4; MinimumHeightDiffForNewLayer=0; NightInterceptionFraction=0.5; ReferenceHeight=2
        Plant SCRUM
        Irrigation
        Fertiliser
        Manager CropManagement
          CropName = SCRUM_Wheat
          EstablishDate = 20/09/2020
          EstablishStage = Seed
          PlantingDepth = 20
          HarvestTimeOption = SettingDate
          HarvestDate = 02/28/2021 00:00:00
          Tt_EstablishToHarvest = 1000
          HarvestStage = Ripe
          ExpectedYield = 8
          FieldLoss = 0.05
          ResidueRemoval = 0.05
          ResidueIncorporation = 0.9
          ResidueIncorporationDepth = 100
          script: same as in SCRUMSownSelf.Field.CropManagement
        Manager AutomaticIrrigation
          IrrigationIsEnabled = True
          SeasonStartDate = 20-Sep
          SeasonEndDate = 15-Dec
          OnlyApplyOntoCrop = True
          SeasonsAllocation = 1000
          TriggerFraction = 0.7
          RefillFraction = 0.9
          MaximumIrrigationAmount = 20
          ReturnDays = 3
          DepthToMonitor = 600
          LimitMonitoringDepth = True
          script: same as in SCRUMSownSelf.Field.AutomaticIrrigation
        Manager AutomaticFertiliser
          FertiliserIsEnabled = True
          SeasonStartDate = 20-Sep
          SeasonEndDate = 15-Dec
          OnlyApplyOntoCrop = False
          SeasonsAllocation = 500
          TriggerSoilN = 60
          AmountToApply = 30
          FertiliserType = UreaN
          ReturnDays = 7
          DepthToMonitor = 600
          LimitMonitoringDepth = False
          script: same as in SCRUMSownSelf.Field.AutomaticFertiliser
        Report ReportENK2: EventNames=[Clock].DoReport
          VariableNames:
            [AutomaticIrrigation].Script.AmountToApply
            [AutomaticIrrigation].Script.MonitoredLayerDUL
            [AutomaticIrrigation].Script.MonitoredLayerSW
            [AutomaticIrrigation].Script.MonitoredLayerTarget
            [AutomaticIrrigation].Script.MonitoredLayerTrigger
            [Clock].Today
            [Fertiliser].NitrogenApplied
            [Irrigation].IrrigationApplied
            [SCRUM].AboveGround.NConc
            [SCRUM].Arbitrator.DM.NutrientLimitation
            [SCRUM].Arbitrator.DM.SinkLimitation
            [SCRUM].Arbitrator.DM.TotalFixationSupply
            [SCRUM].Arbitrator.DM.TotalPlantDemand
            [SCRUM].Arbitrator.DM.TotalPlantSupply
            [SCRUM].Arbitrator.FN
            [SCRUM].Arbitrator.N.TotalPlantDemand
            [SCRUM].Arbitrator.N.TotalPlantSupply
            [SCRUM].Phenology.AccumulatedEmergedTt
            [SCRUM].Phenology.AccumulatedTt
            [SCRUM].Phenology.CurrentPhase.Name
            [SCRUM].Phenology.CurrentStageName
            [SCRUM].Phenology.Stage
            [SCRUM].Phenology.ThermalTime
            [SCRUM].Product.Allocated.Wt
            [SCRUM].Product.DMDemands.Structural.DMDemandFunction.PartitionFraction
            [SCRUM].Product.DryMatterContent
            [SCRUM].Product.ExpectedYield
            [SCRUM].Product.Live.N
            [SCRUM].Product.Live.NConc
            [SCRUM].Product.Live.Wt
            [SCRUM].Product.Yield
            [SCRUM].Root.Depth
            [SCRUM].Root.DMatHarvest
            [SCRUM].Root.DMDemands.Structural.DMDemandFunction.PartitionFraction
            [SCRUM].Root.Live.N
            [SCRUM].Root.Live.NConc
            [SCRUM].Root.Live.Wt
            [SCRUM].Root.WaterUptake
            [SCRUM].Stover.CoverDead
            [SCRUM].Stover.CoverGreen
            [SCRUM].Stover.CoverTotal
            [SCRUM].Stover.CriticalNConc
            [SCRUM].Stover.CritNConc
            [SCRUM].Stover.DMAtHarvest
            [SCRUM].Stover.DMDemands.Structural.DMDemandFunction.PartitionFraction
            [SCRUM].Stover.DMDemands.Structural
            [SCRUM].Stover.Fn
            [SCRUM].Stover.Fw
            [SCRUM].Stover.Height
            [SCRUM].Stover.LAI
            [SCRUM].Stover.LAIDead
            [SCRUM].Stover.LAITotal
            [SCRUM].Stover.Live.N
            [SCRUM].Stover.Live.NConc
            [SCRUM].Stover.Live.Wt
            [SCRUM].Stover.MinimumNConc
            [SCRUM].Stover.MaximumNConc
            [SCRUM].Stover.Photosynthesis
            [SCRUM].Stover.Transpiration
            [SCRUM].Stover.WaterDemand
            [SCRUM].Total.N
            [SCRUM].Total.Wt
            [SCRUM].TotalDMAtHarvest
            [Soil].SoilWater.Drainage
            [Soil].SoilWater.Eo
            [Soil].SoilWater.Es
            [Soil].SoilWater.pond
            [Soil].SoilWater.Runoff
            [Soil].Water.MM
            [Soil].Nutrient.MineralN
            sum([Soil].Nutrient.MineralN) as ProfileN
            ([Soil].Nutrient.MineralN[1] +[Soil].Nutrient.MineralN[2]+[Soil].Nutrient.MineralN[3] +[Soil].Nutrient.MineralN[4]) as MinN_0_60
            sum([Soil].NO3.kgha)
            [Weather].Rain
        Manager EndSim: same as StageTest.SCRUMTestBase2.Field.EndSim
        ScrumCropInstance SCRUM_Wheat: same as EstablishmentMethodTest.TestBaseENK.Field.SCRUM_Wheat
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