Simulations: Version=122
  Simulation T1_f0u0
    Manager Trt
    Weather: FileName=Lysimeter Exp.met
    Clock: Start=2010-12-15; End=2012-08-27
    Summary summaryfile
    SoilArbitrator
    MicroClimate: a_interception=0; b_interception=0; c_interception=0; d_interception=0; soil_albedo=0.23; SoilHeatFluxFraction=0; MinimumHeightDiffForNewLayer=0; NightInterceptionFraction=0; ReferenceHeight=0
    Zone paddock: Area=1; Slope=0; AspectAngle=0; Altitude=50
      Soil: SoilType=Black Vertosol; Site=Jimbour; NearestTown=Jimbour, Q 4352; Region=South East Queensland; NaturalVegetation=Grassland, mainly Qld bluegrass; Latitude=0; Longitude=0
        Swim3 Swim: Salb=0.13; CNRed=20; CNCov=0.8; KDul=1; PSIDul=-100; VC=true; DTMax=1440; MaxWaterIncrement=10; Diagnostics=false
          zero: PrecipitationInterception, CN2Bare, DTMin, SpaceWeightingFactor, SoluteSpaceWeightingFactor, Dis, Disp, A, DTHC, DTHP, WaterTable
          SwimSoluteParameters: WaterTableConcentration=0; D0=0; Thickness=[200, 180, 100, 140, 80, 999999]
        SoilNitrogen: fom_types=[default, manure, mucuna, lablab, shemp, stable]; fract_carb=[0.2, 0.3, 0.54, 0.57, 0.45, 0]; fract_cell=[0.7, 0.3, 0.37, 0.37, 0.47, 0.1]; fract_lign=[0.1, 0.4, 0.09, 0.06, 0.08, 0.9]; NPartitionApproach=0
          SoilNitrogenNO3 NO3
          SoilNitrogenNH4 NH4
          SoilNitrogenUrea Urea
          SoilNitrogenPlantAvailableNO3 PlantAvailableNO3
          SoilNitrogenPlantAvailableNH4 PlantAvailableNH4
        CERESSoilTemperature Temperature
        InitialWater Initial water: PercentMethod=0; FractionFull=0.86; RelativeTo=LL15
        Physical
          Thickness  ParticleSizeClay  ParticleSizeSand  ParticleSizeSilt  BD     AirDry  LL15   DUL    SAT
          60         17.61             33.77             48.62             0.865  0.077   0.231  0.565  0.58
          110        16.36             33.91             49.73             0.835  0.069   0.207  0.515  0.606
          140        16.42             35.91             47.67             0.805  0.068   0.205  0.514  0.617
          240        29.03             46.26             24.71             0.83   0.088   0.264  0.475  0.62
          150        18.44             53.54             28.02             0.82   0.097   0.29   0.481  0.625
          SoilCrop AGPRyegrassSoil: LL=[0.231, 0.207, 0.205, 0.264, 0.29]; KL=[0.1, 0.1, 0.1, 0.1, 0]; XF=[1, 1, 1, 1, 0]
        Organic: FOMCNRatio=40
          Thickness  Carbon  SoilCNRatio  FBiom  FInert  FOM
          60         8.2     12.5         0.08   0.58    92.8733
          110        5.5     12.5         0.02   0.7     57.9632
          140        3.3     12.5         0.015  0.77    31.8109
          240        1.7     12.5         0.01   0.9     11.3729
          150        1.7     12.5         0.01   0.99    5.97975
        Chemical
          Thickness  NO3N   NH4N      PH
          60         6.503  0.599004  5.7
          110        2.101  0.100001  5.3
          140        2.101  0.100001  5.9
          240        1.701  0.100001  6.6
          150        1.701  0.1       6.7
        LayerStructure: Thickness=[10, 20, 30, 40, 50, 50, 50, 50, 100, 100, 50, 50, 50, 50]
      Folder Manager folder
        Manager Exp1_Urine
        Manager nh3_volatilisation
        Manager Fert
        Manager Exp1Report
        Manager Seepage
```csharp
using Models.PMF;
using Models.Core;
using System;
namespace Models
{
    [Serializable]
    [System.Xml.Serialization.XmlInclude(typeof(Model))]
    public class Script : Model
    {
        [Link] Clock Clock;

        [EventSubscribe("DoManagement")]
        private void OnDoManagement(object sender, EventArgs e)
        {
            /*
                if day = 349 then
   ! set seepage when bottom boundary is saturated
   bbc_seepage_potential = 0
endif
            */
        }
    }
}
```
        Operations Cutting
          0001-01-01
          2010-12-21  // agpasture graze type = residue, amount = 1600.00 (kg/ha)
          2011-01-06  // agpasture graze type = residue, amount = 1600.00 (kg/ha)
          2011-02-20  // agpasture graze type = residue, amount = 1600.00 (kg/ha)
          2011-03-23  // agpasture graze type = residue, amount = 1600.00 (kg/ha)
          2011-04-29  // agpasture graze type = residue, amount = 1600.00 (kg/ha)
          2011-04-11  // agpasture graze type = residue, amount = 1600.00 (kg/ha)
          2011-05-31  // agpasture graze type = residue, amount = 1600.00 (kg/ha)
          2011-06-27  // agpasture graze type = residue, amount = 1600.00 (kg/ha)
          2011-07-28  // agpasture graze type = residue, amount = 1600.00 (kg/ha)
          2011-09-06  // agpasture graze type = residue, amount = 1600.00 (kg/ha)
          2011-09-28  // agpasture graze type = residue, amount = 1600.00 (kg/ha)
          2011-10-16  // agpasture graze type = residue, amount = 1600.00 (kg/ha)
          2011-11-03  // agpasture graze type = residue, amount = 1600.00 (kg/ha)
          2011-11-17  // agpasture graze type = residue, amount = 1600.00 (kg/ha)
          2011-12-05  // agpasture graze type = residue, amount = 1600.00 (kg/ha)
          2011-12-19  // agpasture graze type = residue, amount = 1600.00 (kg/ha)
          2012-01-12  // agpasture graze type = residue, amount = 1600.00 (kg/ha)
          2012-02-07  // agpasture graze type = residue, amount = 1600.00 (kg/ha)
          2012-03-13  // agpasture graze type = residue, amount = 1600.00 (kg/ha)
          2012-04-13  // agpasture graze type = residue, amount = 1600.00 (kg/ha)
          2012-05-17  // agpasture graze type = residue, amount = 1600.00 (kg/ha)
          2012-07-02  // agpasture graze type = residue, amount = 1600.00 (kg/ha)
          2012-08-24  // agpasture graze type = residue, amount = 1600.00 (kg/ha)
        Operations NonTrt_Fert
          2010-12-21  [Fertiliser].Apply(10, Fertiliser.Types., 1);
          2010-12-21  [Fertiliser].Apply(10, Fertiliser.Types., 10);
          2010-12-21  [Fertiliser].Apply(5, Fertiliser.Types., 20);
          0001-01-01
          0001-01-01
          0001-01-01
        Operations Irrig
          2010-12-27  [Irrigation].Apply(5.3);
          2010-12-31  [Irrigation].Apply(5.3);
          2011-01-03  [Irrigation].Apply(5.3);
          2011-01-05  [Irrigation].Apply(5.3);
          2011-01-07  [Irrigation].Apply(5.3);
          2011-01-11  [Irrigation].Apply(5.3);
          2011-01-12  [Irrigation].Apply(95.4);
          2011-01-13  [Irrigation].Apply(53.0);
          2011-01-14  [Irrigation].Apply(106.0);
          2011-01-17  [Irrigation].Apply(79.5);
          2011-01-18  [Irrigation].Apply(106.0);
          2011-01-19  [Irrigation].Apply(106.0);
          2011-01-20  [Irrigation].Apply(106.0);
          2011-01-25  [Irrigation].Apply(79.5);
          2011-01-26  [Irrigation].Apply(53);
          2011-02-21  [Irrigation].Apply(10);
          2011-03-28  [Irrigation].Apply(10);
          2011-05-04  [Irrigation].Apply(10);
          2011-05-31  [Irrigation].Apply(10);
          2011-08-31  [Irrigation].Apply(10);
          2011-09-29  [Irrigation].Apply(10);
          2011-11-07  [Irrigation].Apply(10);
          2011-12-05  [Irrigation].Apply(10);
          2012-02-28  [Irrigation].Apply(10);
          2012-03-30  [Irrigation].Apply(10);
          2012-04-30  [Irrigation].Apply(10);
          2012-05-31  [Irrigation].Apply(10);
          0001-01-01
          0001-01-01
          0001-01-01
      MicroClimate: a_interception=0; b_interception=0; c_interception=0; d_interception=0; soil_albedo=0.23; SoilHeatFluxFraction=0; MinimumHeightDiffForNewLayer=0; NightInterceptionFraction=0; ReferenceHeight=0
      Irrigation
      Fertiliser
      SurfaceOrganicMatter: InitialResidueName=grass; InitialResidueType=grass; InitialResidueMass=20; InitialStandingFraction=0; InitialCPR=0; InitialCNR=17
      PastureSpecies AGPRyegrass: InitialShootDM=1500; InitialRootDM=450; InitialRootDepth=750
      PastureSpecies AGPWhiteClover (disabled): InitialShootDM=500; InitialRootDM=150; InitialRootDepth=350
      Report Sim
        VariableNames:
          Treat
          FertLevel
          UrineLevel
          [Clock].Today
          year
          month
          simulation_days
          rain
          Irrigation
          CumPrecip
          SWdep
          Satdep
          Duldep
          ll15dep
          CumDrain
          Dul_l as dul
          ll15_l as ll15
          sw_l as sw
          AboveGroundWt as Herbage
          AboveGroundLiveWt as Live
          AboveGroundDeadWt as Dead
          SpeciesLiveWt(1) as RyeGrass
          SpeciesLiveWt(2) as Clover
          cumHarvestWt
          HarvestWt
          cumHarvestN
          HarvestN
          urea_l as urea
          nh4_l as nh4
          no3_l as no3
          leach_urea
          leach_nh4
          leach_no3
          cumleach_no3
          cumleach_nh4
          dnit() as tot_denit format 3
          n2o_atm() as n2o_denit format3
          cum_dnit
          cum_n2o_atm
          SoilpH(1)
          min_n_l as min_n
          org_n_l as org_n
          biom_n_l as biom_n
          fom_n_l as fom_n
          hum_n_l as hum_n
          dlt_biom_n_l as dlt_biom_n
          dlt_fom_n_l as dlt_fom_n
          dlt_hum_n_l as dlt_hum_n
          dlt_org_n_l as dlt_org_n
          dlt_min_n_l as dlt_min_n
          emission_nh3() as Volat
          urea
          nh4
          n2o_atm() as AllN2O format 6
          n2o_atm_denitrification() as DenitN2O format 6
          n2o_atm_nitrification()  as NitrifN2O format 6
          n2o_atm as AllN2OByLayer format 6
          carbon_tot
          fom_c
          hum_c
          biom_c
  DataStore
