Simulations: Version=155
  Memo Title page
    # APSIM Fodder Beet Model

    Khaembah E.N., Brown H.E., Zyskowski R., Chakwizira E., de Ruiter J.M., Teixeira E.I.

    The New Zealand Institute for Plant & Food Research Limited
    Private Bag 4704, Christchurch, New Zealand

    The APSIM Fodder Beet Model has been developed using the Plant Modelling Framework (PMF) of [brown_plant_2014]. This framework provides a library of plant organ and process submodels that can be coupled, at runtime, to construct a model in much the same way that models can be coupled to construct a simulation. This means that dynamic composition of lower level process and organ classes (e.g. photosynthesis, leaf) into larger constructions (e.g. maize, barley, sorghum) can be achieved by the model developer without additional coding.

    The model consists of:

    * A phenology model to simulate development between growth phases
    * A structure model to simulate plant morphology
    * A collection of organs to simulate the various plant parts
    * An arbitrator to allocate resources (N, biomass) to various plant organs.
  Folder Replacements
    Report: EventNames=[Clock].DoReport
      VariableNames:
        [Clock].Today
        [FodderBeet].AboveGround.Wt
        [FodderBeet].AboveGround.N
        [FodderBeet].AboveGroundDead.Wt
        [FodderBeet].AboveGroundDead.N
        [FodderBeet].AboveGroundDead.NConc
        [FodderBeet].Total.C
        [FodderBeet].Total.Wt*0.4 as TotalC
        [FodderBeet].TotalLive.Wt*0.4 as TotalLiveC
        [FodderBeet].TotalDead.Wt*0.4 as TotalDeadC
        [FodderBeet].Arbitrator.Nitrogen.TotalUptakeSupply
        [FodderBeet].Arbitrator.Nitrogen.TotalReAllocationSupply
        [FodderBeet].Arbitrator.Nitrogen.TotalReTranslocationSupply
        [FodderBeet].Arbitrator.Carbon.TotalFixationSupply
        [FodderBeet].Arbitrator.Carbon.TotalReAllocationSupply
        [FodderBeet].Arbitrator.Carbon.TotalReTranslocationSupply
        [FodderBeet].StorageRoot.Nitrogen.Demands.Total
        [FodderBeet].Leaf.Nitrogen.Demands.Total
        [FodderBeet].Petiole.Nitrogen.Demands.Total
        [FodderBeet].Root.Nitrogen.Demands.Total
        [FodderBeet].StorageRoot.Carbon.Demands.Total
        [FodderBeet].Leaf.Carbon.Demands.Total
        [FodderBeet].Petiole.Carbon.Demands.Total
        [FodderBeet].Root.Carbon.Demands.Total
        [FodderBeet].Leaf.Carbon.Supplies.Fixation
        [FodderBeet].Leaf.Photosynthesis
        [FodderBeet].Leaf.Photosynthesis.FT
        [Fertiliser].NitrogenApplied
        [FodderBeet].Leaf.Canopy.CoverDead
        [FodderBeet].Leaf.Canopy.CoverGreen
        [FodderBeet].Leaf.Canopy.CoverTotal
        [FodderBeet].Leaf.Canopy.Fw
        [FodderBeet].Leaf.Canopy.Height
        [FodderBeet].Leaf.Canopy.LAI
        [FodderBeet].Leaf.Canopy.Transpiration
        [FodderBeet].Leaf.Carbon.Demands.Total
        [FodderBeet].Leaf.Photosynthesis.RadnInt
        [FodderBeet].Leaf.Nitrogen.ConcentrationOrFraction.Metabolic
        [FodderBeet].Leaf.Dead.N
        [FodderBeet].Leaf.Dead.NConc
        [FodderBeet].Leaf.Dead.Nitrogen.Metabolic
        [FodderBeet].Leaf.Dead.Nitrogen.Storage
        [FodderBeet].Leaf.Dead.Nitrogen.Structural
        [FodderBeet].Leaf.Dead.Wt
        [FodderBeet].Leaf.DeltaLAI
        [FodderBeet].Leaf.Fn
        [FodderBeet].Leaf.FNmetabolic
        [FodderBeet].Leaf.Canopy.Fw
        [FodderBeet].Leaf.Live.N
        [FodderBeet].Leaf.Live.NConc
        [FodderBeet].Leaf.Live.Wt
        [FodderBeet].Leaf.Nitrogen.ConcentrationOrFraction.Storage
        [FodderBeet].Leaf.Nitrogen.ConcentrationOrFraction.Structural
        [FodderBeet].Leaf.NodeNumber
        [FodderBeet].Leaf.SpecificArea
        [FodderBeet].Petiole.Nitrogen.ConcentrationOrFraction.Metabolic
        [FodderBeet].Petiole.Dead.NConc
        [FodderBeet].Petiole.Live.N
        [FodderBeet].Petiole.Live.NConc
        [FodderBeet].Petiole.Live.Wt
        [FodderBeet].Petiole.Nitrogen.ConcentrationOrFraction.Storage
        [FodderBeet].Petiole.Nitrogen.ConcentrationOrFraction.Structural
        [FodderBeet].Petiole.NConc
        [FodderBeet].Phenology.AccumulatedThermalTime
        [FodderBeet].Phenology.CurrentPhase.Name
        [FodderBeet].Phenology.CurrentStageName
        [FodderBeet].Phenology.Photoperiod
        [FodderBeet].Phenology.Stage
        [FodderBeet].Phenology.ThermalTime
        [FodderBeet].Root.Nitrogen.ConcentrationOrFraction.Metabolic
        [FodderBeet].Root.Live.N
        [FodderBeet].Root.Live.NConc
        [FodderBeet].Root.Live.Wt
        [FodderBeet].Root.Dead.NConc
        [FodderBeet].Root.Nitrogen.ConcentrationOrFraction.Storage
        [FodderBeet].Root.Nitrogen.ConcentrationOrFraction.Structural
        [FodderBeet].Root.N
        [FodderBeet].Root.Nconc
        [FodderBeet].Root.Network.Depth
        [FodderBeet].Root.Network.WaterUptake
        //[FodderBeet].SCS
        [FodderBeet].SowingData.Cultivar
        [FodderBeet].StorageRoot.Nitrogen.ConcentrationOrFraction.Metabolic
        [FodderBeet].StorageRoot.Live.N
        [FodderBeet].StorageRoot.Live.NConc
        [FodderBeet].StorageRoot.Live.Wt
        [FodderBeet].StorageRoot.Nitrogen.ConcentrationOrFraction.Storage
        [FodderBeet].StorageRoot.Nitrogen.ConcentrationOrFraction.Structural
        [FodderBeet].StorageRoot.NConc
        [FodderBeet].StorageRoot.Wt
        //[FodderBeet].Total.N
        //[FodderBeet].Total.NConc
        //[FodderBeet].Total.Wt
        //[FodderBeet].TotalDead.N
        //[FodderBeet].TotalDead.NConc
        //[FodderBeet].TotalDead.Wt
        [Irrigation].IrrigationApplied
        [Phenology].Photoperiod
        [Soil].SoilWater.LeachNO3
        [Soil].Water.Volumetric
        [Soil].Water.MM
        [SurfaceOrganicMatter].Wt
        [Weather].MeanT
        [Weather].Rain
        sum([Soil].SoilNitrogen.mineral_n) as ProfileN
        sum([Soil].NO3.kgha) as TotalSoilNitrogen
        sum([Soil].Water.MM[1:7]) as ProfileWater
        [Soil].SoilNitrogen.mineral_n
        [FodderBeet].StorageRoot.Live.C + [FodderBeet].StorageRoot.Dead.C + [FodderBeet].Leaf.Live.C + [FodderBeet].Leaf.Dead.C + [FodderBeet].Root.Live.C + [FodderBeet].Root.Dead.C + [FodderBeet].Petiole.Live.C + [FodderBeet].Petiole.Dead.C as SumPlantC
  DataStore
    ExcelInput ObservedData: FileNames=[0bserved.xlsx]; SheetNames=[ObservedData]
    PredictedObserved: PredictedTableName=Report; ObservedTableName=ObservedData; FieldNameUsedForMatch=Clock.Today; AllColumns=false
      Tests: POName=PredictedObserved
        AcceptedStats:
          {Name=FodderBeet.AboveGround.N, n=318, Slope=0.938006, Intercept=2.03246, SEslope=0.0354646, SEintercept=0.883552, R2=0.68884, RMSE=6.9747, NSE=0.595244, ME=0.645537, MAE=5.16363, RSR=0.635203}
          {Name=FodderBeet.AboveGround.Wt, n=419, Slope=0.923824, Intercept=174.982, SEslope=0.0219921, SEintercept=37.8735, R2=0.808856, RMSE=377.886, NSE=0.787223, ME=59.5892, MAE=292.114, RSR=0.460726}
          {Name=FodderBeet.Leaf.CoverGreen, n=236, Slope=0.80735, Intercept=0.129945, SEslope=0.0268541, SEintercept=0.0211523, R2=0.794352, RMSE=0.0991336, NSE=0.78863, ME=-0.016004, MAE=0.0772493, RSR=0.458775}
          {Name=FodderBeet.Leaf.CoverTotal, n=120, Slope=0.617119, Intercept=0.343463, SEslope=0.0416276, SEintercept=0.0292236, R2=0.650653, RMSE=0.149123, NSE=0.471511, ME=0.0864014, MAE=0.106643, RSR=0.723937}
          {Name=FodderBeet.Leaf.LAI, n=387, Slope=0.566521, Intercept=1.04607, SEslope=0.0320736, SEintercept=0.0872368, R2=0.447623, RMSE=0.917751, NSE=0.415944, ME=-0.0118086, MAE=0.672606, RSR=0.763248}
          {Name=FodderBeet.Leaf.Live.N, n=304, Slope=0.656384, Intercept=2.18115, SEslope=0.0364784, SEintercept=0.233661, R2=0.517398, RMSE=2.02371, NSE=0.474917, ME=0.200345, MAE=1.52771, RSR=0.723433}
          {Name=FodderBeet.Leaf.Live.Wt, n=389, Slope=0.764059, Intercept=71.7031, SEslope=0.0417322, SEintercept=6.90444, R2=0.464141, RMSE=68.7892, NSE=-0.00848723, ME=36.1704, MAE=52.8249, RSR=1.00294}
          {Name=FodderBeet.Leaf.PlantAppearedGreenLeafNo, n=207, Slope=1.09434, Intercept=1.50281, SEslope=0.0373819, SEintercept=0.826107, R2=0.806969, RMSE=4.8185, NSE=0.371827, ME=3.50725, MAE=3.70435, RSR=0.790657}
          {Name=FodderBeet.Petiole.Live.N, n=304, Slope=0.420079, Intercept=1.54401, SEslope=0.0361783, SEintercept=0.103415, R2=0.308646, RMSE=1.24998, NSE=0.261934, ME=0.117128, MAE=0.97193, RSR=0.857694}
          {Name=FodderBeet.Petiole.Live.Wt, n=389, Slope=0.575146, Intercept=69.3703, SEslope=0.0300095, SEintercept=4.53989, R2=0.486953, RMSE=56.596, NSE=0.438176, ME=13.6756, MAE=44.3575, RSR=0.748585}
          {Name=FodderBeet.Phenology.Stage, n=16, Slope=1.1979, Intercept=-0.360065, SEslope=0.0215605, SEintercept=0.0955135, R2=0.995485, RMSE=0.550194, NSE=0.806264, ME=0.480991, MAE=0.480991, RSR=0.426178}
          {Name=FodderBeet.SCS, n=2, Slope=1.06257, Intercept=-325.122, SEslope=0, SEintercept=0, R2=1, RMSE=258.901, NSE=-6.198, ME=-258.83, MAE=258.83, RSR=1.8971}
          {Name=FodderBeet.StorageRoot.Live.N, n=304, Slope=0.968959, Intercept=-1.00743, SEslope=0.0351606, SEintercept=0.543942, R2=0.715483, RMSE=5.22354, NSE=0.596075, ME=-1.41426, MAE=3.9769, RSR=0.634505}
          {Name=FodderBeet.StorageRoot.Live.Wt, n=389, Slope=0.874342, Intercept=106.108, SEslope=0.0211491, SEintercept=28.7261, R2=0.815375, RMSE=312.911, NSE=0.808121, ME=-39.0587, MAE=235.213, RSR=0.437477}
          {Name=FodderBeet.Structure.LeafTipsAppeared, n=207, Slope=0.978821, Intercept=0.702624, SEslope=0.0100946, SEintercept=0.404815, R2=0.978662, RMSE=2.49368, NSE=0.978647, ME=-0.0659708, MAE=1.96682, RSR=0.145775}
          {Name=FodderBeet.TotalDead.N, n=98, Slope=2.48882, Intercept=0.19878, SEslope=0.172148, SEintercept=0.26952, R2=0.685264, RMSE=2.97312, NSE=-8.54089, ME=2.03717, MAE=2.13922, RSR=3.07303}
          {Name=Nit, n=1112, Slope=1, Intercept=0, SEslope=0, SEintercept=0, R2=1, RMSE=0, NSE=1, ME=0, MAE=0, RSR=0}
        AcceptedStatsName=Name n Slope Intercept SEslope SEintercept R2 RMSE NSE ME MAE RSR
  Folder LincolnCalibrationData
    Experiment LincolnRS2016
      Memo Trial details
        This trial was conducted in the rainshelter at Plant and Food Research in Lincoln, New Zealand in 2016. The objective was to evaluate the effect of nitrogen and irrigation on the development and growth of fodder beet crops.
        Details:

        •	Three nitrogen treatments:  0 kg N/ha, 50 kg N/ha & 300 kg N/ha applied as dissolved urea with fertigation
        •	Two irrigation treatments: Nil and full irrigation

        Fodder beet (cultivar "Rivage") was precision drilled on 18 October 2016. Sowing density was 11 plants/m2 and row spacing was 0.45m.
      Factors
        Permutation
          Factor Irr
            CompositeFactor Full
              Specifications:
                [Irrig]
                [StateFactors].Script.IrrFactor = true
              Operations Full
                2016-11-23  [Irrigation].Apply(30);
                2016-12-07  [Irrigation].Apply(25);
                2016-12-21  [Irrigation].Apply(25);
                2016-12-29  [Irrigation].Apply(30);
                2017-01-04  [Irrigation].Apply(40);
                2017-01-11  [Irrigation].Apply(32.9);
                2017-01-18  [Irrigation].Apply(25.4);
                2017-01-25  [Irrigation].Apply(31.3);
                2017-02-08  [Irrigation].Apply(33);
                2017-02-15  [Irrigation].Apply(35);
                2017-02-22  [Irrigation].Apply(29);
                2017-03-08  [Irrigation].Apply(34);
                2017-03-22  [Irrigation].Apply(50);
                2017-04-12  [Irrigation].Apply(30.9);
                2017-04-27  [Irrigation].Apply(18.9);
                Memo
                  Have added an extra irrigation, on 22 Oct,

                  Data indcates water applied but no notes of it RFZ

                  In Statefactors have donethe irrigations for
                    17/12  21/1 19/11 14/1
            CompositeFactor Nil
              Specifications:
                [Irrig]
                [StateFactors].Script.IrrFactor = false
              Operations Nil
                2016-09-02  [Irrigation].Apply(20)
                2016-10-25  [Irrigation].Apply(5)
                2017-01-18  [Irrigation].Apply(5)
                2017-05-21  [Irrigation].Apply(50)
                Memo
                  Have added an extra irrigation, on 3 Nov,

                  Data indcates water applied but no notes of it RFZ
          Factor Nit
            CompositeFactor 0
              Specifications:
                [Fert]
                [StateFactors].Script.NitFactor = 0
              Operations 0
                2016-10-29  [Fertiliser].Apply(0, Fertiliser.Types.NO3N, 10);
                2017-01-18  [Fertiliser].Apply(0, Fertiliser.Types.NO3N, 10);
                2017-02-25  [Fertiliser].Apply(0, Fertiliser.Types.NO3N, 10);
                2016-10-29  [Irrigation].Apply(10);
                2017-01-18  [Irrigation].Apply(10);
                2017-02-15  [Irrigation].Apply(10);
                Memo
                  Uniques fertigation event
            CompositeFactor 50
              Specifications:
                [Fert]
                [StateFactors].Script.NitFactor = 50
              Operations 50
                2016-10-29  [Fertiliser].Apply(25, Fertiliser.Types.NO3N, 10);
                2017-01-18  [Fertiliser].Apply(25, Fertiliser.Types.NO3N, 10);
                2017-02-25  [Fertiliser].Apply(0, Fertiliser.Types.NO3N, 10);
                2016-10-29  [Irrigation].Apply(10);
                2017-01-18  [Irrigation].Apply(10);
                2017-02-15  [Irrigation].Apply(10);
            CompositeFactor 300
              Specifications:
                [Fert]
                [StateFactors].Script.NitFactor = 300
              Operations 300
                2016-10-29  [Fertiliser].Apply(100, Fertiliser.Types.NO3N, 10);
                2017-01-18  [Fertiliser].Apply(100, Fertiliser.Types.NO3N, 10);
                2017-02-15  [Fertiliser].Apply(100, Fertiliser.Types.NO3N, 10);
                2016-10-29  [Irrigation].Apply(10);
                2017-01-18  [Irrigation].Apply(10);
                2017-02-15  [Irrigation].Apply(10);
      Simulation Rainshelter
        Clock: Start=2016-10-09; End=2017-05-18
        Summary summaryfile
        Weather
          FileName=C:\GitHubRepos\ApsimX\Tests\Validation\FodderBeet\lincoln.met
        SoilArbitrator Soil Arbitrator
        Zone paddock: Area=1; Slope=0; AspectAngle=0; Altitude=50
          Plant FodderBeet
          Folder Manager folder
            Operations GeneralIrrigation
              2016-09-02  [Irrigation].Apply(25.0);
              2016-10-25  [Irrigation].Apply(5.0);
              2016-10-28  [Irrigation].Apply(5.0);
            Operations Irrig
            Operations Fert
            Operations Testing
            Manager ClimateControl
              StartDate = 10/17/2016 00:00:00
              EndDate = 05/20/2017 00:00:00
```csharp
using Models.Soils;
using System.Xml.Serialization;
using Models;
using Models.PMF;
using System.Text;
using System.Collections.Generic;
using APSIM.Shared.Utilities;
using Models.Core;
using System;
using Models.Climate;

namespace Models
{
    [Serializable] 
    [System.Xml.Serialization.XmlInclude(typeof(Model))]
    public class Script : Model
    {
        [Link] Weather Met;
        [Link] Clock Clock;
    
        [Description("Start Date")]
        public DateTime StartDate { get; set; }
        
        [Description("End Date")]
        public DateTime EndDate { get; set; }
 
    
        [EventSubscribe("PreparingNewWeatherData")]
        private void OnPreparingNewWeatherData(object sender, EventArgs e)
        {
            if ((Clock.Today.Date >= StartDate) && (Clock.Today.Date <= EndDate))
                Met.Rain = 0;        
        }
    }
}
```
            Manager StateFactors
              IrrFactor = False
              NitFactor = 0
```csharp
using Models.Interfaces;
using System;
using Models.Core;
using System.Collections.Generic;
using System.Text;
using Models.Soils;
using Models.PMF;
using Models;
using System.Xml.Serialization;
using APSIM.Shared.Utilities;

namespace Models
{
    [Serializable] 
    public class Script : Model
    {
        [Link] private Clock Clock;
        [Link] private Irrigation Irrigation;
        [Link] private Fertiliser Fert;
        [Link] private Soil ThisSoil;
        [Link] private IPhysical soilPhysical;
        [Link] private ISoilWater waterBalance;
        [Link] private Water InitSW;
        [Link] private SoilCrop fodderBeetSoil;
        [Description("Amount of Irrgation be applied 0/1")]
        public bool IrrFactor { get; set; }
        [Description("Amount of fertiliser to be applied (kg/ha)")]
        public double NitFactor { get; set; }
        
          
        private void SetSoilLayers()
        {
            /*
            Not used yrt use whenmore detailed info is known
            */
            int i = 0;
            if ((IrrFactor == false) && (NitFactor == 0))
            {
                if (soilPhysical.Thickness.Length != 8)
                {
                    throw new Exception("Soil layer exception");
                }
                soilPhysical.LL15[0] = 0.10;
                soilPhysical.LL15[1] = 0.11;
                soilPhysical.LL15[2] = 0.12;
                soilPhysical.LL15[3] = 0.12;
                soilPhysical.LL15[4] = 0.18;
                soilPhysical.LL15[5] = 0.16;
                soilPhysical.LL15[6] = 0.14;
                soilPhysical.LL15[7] = 0.14;
                
                soilPhysical.DUL[0] = 0.33;
                soilPhysical.DUL[1] = 0.3;
                soilPhysical.DUL[2] = 0.31;
                soilPhysical.DUL[3] = 0.31;
                soilPhysical.DUL[4] = 0.31;
                soilPhysical.DUL[5] = 0.31;
                soilPhysical.DUL[6] = 0.25;
                soilPhysical.DUL[7] = 0.20;
                
                InitSW.InitialValues[0] = 0.21;
                InitSW.InitialValues[1] = 0.24;
                InitSW.InitialValues[2] = 0.245;
                InitSW.InitialValues[3] = 0.24;
                InitSW.InitialValues[4] = 0.27;
                InitSW.InitialValues[5] = 0.28;
                InitSW.InitialValues[6] = 0.19;
                InitSW.InitialValues[7] = 0.19;
            }   
            if ((IrrFactor == false) && (NitFactor == 50))
            {
                if (soilPhysical.Thickness.Length != 8)
                {
                    throw new Exception("Soil layer exception");
                }
                soilPhysical.LL15[0] = 0.10;
                soilPhysical.LL15[1] = 0.10;
                soilPhysical.LL15[2] = 0.12;
                soilPhysical.LL15[3] = 0.12;
                soilPhysical.LL15[4] = 0.17;
                soilPhysical.LL15[5] = 0.16;
                soilPhysical.LL15[6] = 0.10;
                soilPhysical.LL15[7] = 0.10;

                soilPhysical.DUL[0] = 0.33;
                soilPhysical.DUL[1] = 0.3;
                soilPhysical.DUL[2] = 0.31;
                soilPhysical.DUL[3] = 0.31;
                soilPhysical.DUL[4] = 0.31;
                soilPhysical.DUL[5] = 0.31;
                soilPhysical.DUL[6] = 0.25;
                soilPhysical.DUL[7] = 0.20;
                
                InitSW.InitialValues[0] = 0.21;
                InitSW.InitialValues[1] = 0.23;
                InitSW.InitialValues[2] = 0.25;
                InitSW.InitialValues[3] = 0.27;
                InitSW.InitialValues[4] = 0.26;
                InitSW.InitialValues[5] = 0.25;
                InitSW.InitialValues[6] = 0.12;
                InitSW.InitialValues[7] = 0.12;
            }   
            if ((IrrFactor == false) && (NitFactor == 300))
            {
                if (soilPhysical.Thickness.Length != 8)
                {
                    throw new Exception("Soil layer exception");
                }
                soilPhysical.LL15[0] = 0.10;
                soilPhysical.LL15[1] = 0.11;
                soilPhysical.LL15[2] = 0.10;
                soilPhysical.LL15[3] = 0.15;
                soilPhysical.LL15[4] = 0.16;
                soilPhysical.LL15[5] = 0.16;
                soilPhysical.LL15[6] = 0.14;
                soilPhysical.LL15[7] = 0.14;

                soilPhysical.DUL[0] = 0.33;
                soilPhysical.DUL[1] = 0.3;
                soilPhysical.DUL[2] = 0.31;
                soilPhysical.DUL[3] = 0.31;
                soilPhysical.DUL[4] = 0.31;
                soilPhysical.DUL[5] = 0.31;
                soilPhysical.DUL[6] = 0.25;
                soilPhysical.DUL[7] = 0.20;

                InitSW.InitialValues[0] = 0.21;
                InitSW.InitialValues[1] = 0.27;
                InitSW.InitialValues[2] = 0.245;
                InitSW.InitialValues[3] = 0.28;
                InitSW.InitialValues[4] = 0.28;
                InitSW.InitialValues[5] = 0.28;
                InitSW.InitialValues[6] = 0.20;
                InitSW.InitialValues[7] = 0.20;
                
            }   
            if ((IrrFactor == true) && (NitFactor == 0))
            {
                if (soilPhysical.Thickness.Length != 8)
                {
                    throw new Exception("Soil layer exception");
                }
             
                soilPhysical.LL15[0] = 0.13;
                soilPhysical.LL15[1] = 0.15;
                soilPhysical.LL15[2] = 0.16;
                soilPhysical.LL15[3] = 0.16;
                soilPhysical.LL15[4] = 0.16;
                soilPhysical.LL15[5] = 0.16;
                soilPhysical.LL15[6] = 0.10;
                soilPhysical.LL15[7] = 0.10;
                
                soilPhysical.DUL[0] = 0.33;
                soilPhysical.DUL[1] = 0.3;
                soilPhysical.DUL[2] = 0.31;
                soilPhysical.DUL[3] = 0.31;
                soilPhysical.DUL[4] = 0.31;
                soilPhysical.DUL[5] = 0.31;
                soilPhysical.DUL[6] = 0.25;
                soilPhysical.DUL[7] = 0.20;
                
                InitSW.InitialValues[0] = 0.21;
                InitSW.InitialValues[1] = 0.24;
                InitSW.InitialValues[2] = 0.25;
                InitSW.InitialValues[3] = 0.24;
                InitSW.InitialValues[4] = 0.21;
                InitSW.InitialValues[5] = 0.26;
                InitSW.InitialValues[6] = 0.17;
                InitSW.InitialValues[7] = 0.17;
            }   
            if ((IrrFactor == true) && (NitFactor == 50))
            {
                if (soilPhysical.Thickness.Length != 8)
                {
                    throw new Exception("Soil layer exception");
                }
             
                soilPhysical.LL15[0] = 0.13;
                soilPhysical.LL15[1] = 0.15;
                soilPhysical.LL15[2] = 0.16;
                soilPhysical.LL15[3] = 0.16;
                soilPhysical.LL15[4] = 0.16;
                soilPhysical.LL15[5] = 0.16;
                soilPhysical.LL15[6] = 0.10;
                soilPhysical.LL15[7] = 0.10;
                
                soilPhysical.DUL[0] = 0.33;
                soilPhysical.DUL[1] = 0.3;
                soilPhysical.DUL[2] = 0.31;
                soilPhysical.DUL[3] = 0.31;
                soilPhysical.DUL[4] = 0.31;
                soilPhysical.DUL[5] = 0.31;
                soilPhysical.DUL[6] = 0.25;
                soilPhysical.DUL[7] = 0.20;
                
                InitSW.InitialValues[0] = 0.23;
                InitSW.InitialValues[1] = 0.24;
                InitSW.InitialValues[2] = 0.25;
                InitSW.InitialValues[3] = 0.30;
                InitSW.InitialValues[4] = 0.27;
                InitSW.InitialValues[5] = 0.24;
                InitSW.InitialValues[6] = 0.14;
                InitSW.InitialValues[7] = 0.14;
                waterBalance.Reset();
                
            }
            if ((IrrFactor == true) && (NitFactor == 300))
            {
                if (soilPhysical.Thickness.Length != 8)
                {
                    throw new Exception("Soil layer exception");
                }
             
                soilPhysical.LL15[0] = 0.13;
                soilPhysical.LL15[1] = 0.15;
                soilPhysical.LL15[2] = 0.16;
                soilPhysical.LL15[3] = 0.16;
                soilPhysical.LL15[4] = 0.16;
                soilPhysical.LL15[5] = 0.16;
                soilPhysical.LL15[6] = 0.10;
                soilPhysical.LL15[7] = 0.10;
                
                soilPhysical.DUL[0] = 0.33;
                soilPhysical.DUL[1] = 0.3;
                soilPhysical.DUL[2] = 0.31;
                soilPhysical.DUL[3] = 0.31;
                soilPhysical.DUL[4] = 0.31;
                soilPhysical.DUL[5] = 0.31;
                soilPhysical.DUL[6] = 0.25;
                soilPhysical.DUL[7] = 0.20;
                
                InitSW.InitialValues[0] = 0.225;
                InitSW.InitialValues[1] = 0.23;
                InitSW.InitialValues[2] = 0.27;
                InitSW.InitialValues[3] = 0.315;
                InitSW.InitialValues[4] = 0.28;
                InitSW.InitialValues[5] = 0.21;
                InitSW.InitialValues[6] = 0.14;
                InitSW.InitialValues[7] = 0.145;
            }
            fodderBeetSoil.LL[0] = soilPhysical.LL15[0];
            fodderBeetSoil.LL[1] = soilPhysical.LL15[1];
            fodderBeetSoil.LL[2] = soilPhysical.LL15[2];
            fodderBeetSoil.LL[3] = soilPhysical.LL15[3];
            fodderBeetSoil.LL[4] = soilPhysical.LL15[4];
            fodderBeetSoil.LL[5] = soilPhysical.LL15[5];
            fodderBeetSoil.LL[6] = soilPhysical.LL15[6];
            fodderBeetSoil.LL[7] = soilPhysical.LL15[7];
            
            soilPhysical.AirDry[0] = soilPhysical.LL15[0] * 0.5;
            soilPhysical.AirDry[1] = soilPhysical.LL15[1];
            soilPhysical.AirDry[2] = soilPhysical.LL15[2];
            soilPhysical.AirDry[3] = soilPhysical.LL15[3];
            soilPhysical.AirDry[4] = soilPhysical.LL15[4];
            soilPhysical.AirDry[5] = soilPhysical.LL15[5];
            soilPhysical.AirDry[6] = soilPhysical.LL15[6];
            soilPhysical.AirDry[7] = soilPhysical.LL15[7];
            
            soilPhysical.SAT[0] = soilPhysical.DUL[0] * 1.2;
            soilPhysical.SAT[1] = soilPhysical.DUL[1] * 1.2;
            soilPhysical.SAT[2] = soilPhysical.DUL[2] * 1.2;
            soilPhysical.SAT[3] = soilPhysical.DUL[3] * 1.2;
            soilPhysical.SAT[4] = soilPhysical.DUL[4] * 1.2;
            soilPhysical.SAT[5] = soilPhysical.DUL[5] * 1.2;
            soilPhysical.SAT[6] = soilPhysical.DUL[6] * 1.2;
            soilPhysical.SAT[7] = soilPhysical.DUL[7] * 1.2;
            
            waterBalance.Reset();
        }

        [EventSubscribe("StartOfSimulation")]
        private void OnSimulationCommencing(object sender, EventArgs e)
        {
                SetSoilLayers();
        }
        
        [EventSubscribe("DoManagement")]
        private void OnDoManagement(object sender, EventArgs e)
        {
            //Specific irrgations
            
            if ((DateUtilities.CompareDates("16-Nov", Clock.Today) == 0))
                    SetSoilLayers();
            
            if ((IrrFactor == true) && (NitFactor == 300))
            {
                if ((DateUtilities.CompareDates("1-Feb", Clock.Today) == 0))
                    Irrigation.Apply(40);
                if ((DateUtilities.CompareDates("1-Mar", Clock.Today) == 0))
                    Irrigation.Apply(33);
            }
        
          
            
            
        }
    }
        
        
}
```
            Manager SowDateCv
              InitialRootDepth = 5
              CropToSow = Rivage
              SowingDate = 10/18/2016 00:00:00
```csharp
using Models.Soils;
using System;
using Models.Core;
using System.Collections.Generic;
using System.Text;
using Models.PMF;
using Models;
using System.Xml.Serialization;
using APSIM.Shared.Utilities;
using System.Data;
using Models.PMF.Interfaces;
using Models.Surface;

namespace Models
{
    [Serializable] 
    //[System.Xml.Serialization.XmlInclude(typeof(Model))]
    public class Script : Model
    {
        [Link] Plant FodderBeet;
        [Link] Clock Clock;
        [Link] Zone zone;
        [Link] Simulation Simulation;
        [Link] SurfaceOrganicMatter SurfOM;
        
                
        [Description("Initial Root Depth")]
        public double InitialRootDepth { get; set; }
        [Description("Sown Crop")]
        public string CropToSow { get; set; }
        [Description("Sowing Date")]
        public DateTime SowingDate { get; set; }
        //[Description("Sowing Date2")]
        //public DateTime SowingDate2 { get; set; }
        //[Description("Sowing Date3")]
        //public DateTime SowingDate3 { get; set; }
        //[Description("Sowing Date4")]
        //public DateTime SowingDate4 { get; set; }
        
        
        [EventSubscribe("DoManagement")]
        private void OnDoManagement(object sender, EventArgs e)
        {
            if (Clock.Today.Date == SowingDate)
            {
                FodderBeet.Sow(cultivar: CropToSow, population: 9, depth: InitialRootDepth, rowSpacing: 500);
                
            }
            //else if (Clock.Today.Date == SowingDate2)
            {
                //    FodderBeet.Sow(cultivar: CropToSow, population: 9, depth: InitialRootDepth, rowSpacing: 500);
            }
            //else if (Clock.Today.Date == SowingDate3)
            {
                //    FodderBeet.Sow(cultivar: CropToSow, population: 9, depth: InitialRootDepth, rowSpacing: 500);
            }
            //else if (Clock.Today.Date == SowingDate4)
            {
                //    FodderBeet.Sow(cultivar: CropToSow, population: 9, depth: InitialRootDepth, rowSpacing: 500);
        
            }
            
            
        }
    }
}
```
          MicroClimate: a_interception=0; b_interception=1; c_interception=0; d_interception=0; SoilHeatFluxFraction=0.4; MinimumHeightDiffForNewLayer=0; NightInterceptionFraction=0.5; ReferenceHeight=2
          Irrigation
          Fertiliser
          SurfaceOrganicMatter Surface Organic Matter: InitialResidueName=wheat_stubble; InitialResidueType=grass; InitialResidueMass=2500; InitialStandingFraction=0; InitialCPR=0; InitialCNR=40
          Soil: SoilType=NZ_sedementary; Region=Plains; State=Canterbury; Country=New Zealnd; Latitude=0; Longitude=0
            Chemical: Thickness=[100, 200, 300, 300, 300, 300]; PH=[6.6, 6.2, 5.7, 5.5, 5.5, 5.5]; PHUnits=Water
            Physical
              Thickness  BD     AirDry  LL15  DUL   SAT    KS
              150        1      0.05    0.08  0.32  0.35   4832.039
              150        1.32   0.05    0.08  0.32  0.35   389.229
              300        1.35   0.05    0.08  0.32  0.342  16.362
              300        1.3    0.05    0.08  0.28  0.322  97.995
              300        1.3    0.05    0.08  0.28  0.348  97.995
              300        1.3    0.05    0.08  0.28  0.342  97.995
              300        1.3    0.05    0.08  0.28  0.307  97.995
              300        1.601  0.06    0.08  0.22  0.309  97.995
              SoilCrop FodderBeetSoil: LL=[0.12, 0.12, 0.12, 0.12, 0.12, 0.12, 0.12, 0.12]; KL=[0.2, 0.07, 0.05, 0.05, 0.05, 0.01, 0.01, 0.01]; XF=[1, 1, 1, 1, 1, 1, 1, 1]
            WaterBalance SoilWater: SummerDate=1-Nov; SummerU=6; SummerCona=2; WinterDate=1-Apr; WinterU=9; WinterCona=4.4; DiffusConst=0; DiffusSlope=0; Salb=0.18; CN2Bare=68; CNRed=20; CNCov=0.8; DischargeWidth=0; CatchmentArea=0; PSIDul=-100
              Thickness  SWCON  KLAT
              200        0.7    0
              200        0.7    0
              200        0.95   0
              200        0.95   0
              200        0.95   0
              200        0.95   0
              200        0.95   0
              200        0.95   0
            SoilNitrogen: fom_types=[default, manure, mucuna, lablab, shemp, stable]; fract_carb=[0.2, 0.3, 0.54, 0.57, 0.45, 0]; fract_cell=[0.7, 0.3, 0.37, 0.37, 0.47, 0.1]; fract_lign=[0.1, 0.4, 0.09, 0.06, 0.08, 0.9]; NPartitionApproach=0
            Organic: FOMCNRatio=20; CarbonUnits=Total
              Thickness  Carbon  SoilCNRatio  FBiom  FInert  FOM
              180        3       11           0.06   0.337   1427.528
              150        1.247   11           0.04   0.657   316.72
              400        0.316   11           0.012  0.85    142.312
              270        0.208   11           0.01   0.945   82.9318
              500        0.2     11           0.01   0.983   30.5089
            Water: Thickness=[200, 200, 200, 200, 200, 200, 200, 200]; InitialValues=[0.3, 0.28, 0.24, 0.24, 0.28, 0.28, 0.28, 0.22]; FilledFromTop=false
            CERESSoilTemperature Temperature
            SoilNitrogenNO3 NO3: Thickness=[100, 200, 300, 300, 300, 300]; InitialValues=[8.33333, 4.72846, 1.6091, 0.769231, 0.769231, 1.15385]; InitialValuesUnits=ppm; WaterTableConcentration=0; D0=0
            SoilNitrogenNH4 NH4: Thickness=[100, 200, 300, 300, 300, 300]; InitialValues=[14.8148, 10.5909, 3.60383, 1.92308, 1.92308, 1.92308]; InitialValuesUnits=ppm; WaterTableConcentration=0; D0=0
            SoilNitrogenUrea Urea: Thickness=[100, 200, 300, 300, 300, 300]; InitialValues=[0, 0, 0, 0, 0, 0]; InitialValuesUnits=kg/ha; WaterTableConcentration=0; D0=0
          Report: EventNames=[Clock].DoReport
            VariableNames:
              [Clock].Today
              [Weather].MeanT
              [Soil].Water.Volumetric
              [Soil].Water.MM
              sum([Soil].Water.MM) as ProfileWater
              [FodderBeet].AboveGround.N
              [FodderBeet].AboveGround.Wt
              [FodderBeet].AboveGroundLive.N
              [FodderBeet].AboveGroundLive.Wt
              [FodderBeet].AboveGroundDead.N
              [FodderBeet].AboveGroundDead.Wt
              [FodderBeet].Arbitrator.DMDemand
              [FodderBeet].Arbitrator.DM.TotalFixationSupply
              [FodderBeet].Leaf.AppearedCohortNo
              [FodderBeet].Leaf.CoverDead
              [FodderBeet].Leaf.CoverGreen
              [FodderBeet].Leaf.CoverTotal
              [FodderBeet].Leaf.Dead.N
              [FodderBeet].Leaf.Dead.NConc
              [FodderBeet].Leaf.Dead.Wt
              [FodderBeet].Leaf.DeadCohortNo
              [FodderBeet].Leaf.SenescingCohortNo
              [FodderBeet].Leaf.ExpandedCohortNo
              [FodderBeet].Leaf.Fn
              [FodderBeet].Leaf.Fw
              [FodderBeet].Leaf.Height
              [FodderBeet].Leaf.InitialisedCohortNo
              [FodderBeet].Leaf.LAI
              [FodderBeet].Leaf.Live.N
              [FodderBeet].Leaf.Live.NConc
              [FodderBeet].Leaf.Live.Wt
              [FodderBeet].Leaf.SpecificArea
              [FodderBeet].Leaf.Transpiration
              [FodderBeet].Phenology.CurrentPhase.Name
              [FodderBeet].Phenology.CurrentStageName
              [FodderBeet].Phenology.DailyVernalisation
              [FodderBeet].Phenology.Photoperiod
              [FodderBeet].Phenology.Stage
              [FodderBeet].Phenology.ThermalTime
              [FodderBeet].Phenology.ThermalTime
              [FodderBeet].Phenology.Vrn1
              [FodderBeet].Phenology.Vrn2
              [FodderBeet].Phenology.Vrn4
              [FodderBeet].Phenology.Zadok.Stage
              [FodderBeet].Root.Depth
              [FodderBeet].Root.N
              [FodderBeet].Root.Wt
              [FodderBeet].Root.Nconc
              [FodderBeet].Root.WaterUptake
              [FodderBeet].StorageRoot.N
              [FodderBeet].StorageRoot.NConc
              [FodderBeet].StorageRoot.Wt
              [FodderBeet].StorageRoot.Live.StorageWt
              [FodderBeet].Petiole.N
              [FodderBeet].Petiole.NConc
              [FodderBeet].Petiole.Wt
              [FodderBeet].Petiole.PercentWSC
              [FodderBeet].Petiole.Live.StorageWt
              [FodderBeet].SowingData.Cultivar
              [FodderBeet].Structure.Height
              [FodderBeet].Structure.LeafTipsAppeared
              [FodderBeet].Leaf.PlantAppearedGreenLeafNo
              [FodderBeet].Structure.MainStemPopn
              [FodderBeet].Structure.TotalStemPopn
              [FodderBeet].Total.N
              [FodderBeet].Total.Wt
              [SurfaceOrganicMatter].Wt
              sum([Soil].NO3.kgha) as TotalSoilNitrogen
              [FodderBeet].Phenology.FlagLeafDAS
              [FodderBeet].Phenology.FloweringDAS
              [FodderBeet].Phenology.MaturityDAS
              [FodderBeet].Phenology.PhotoPeriod
              [FodderBeet].Phenology.PhotoPeriodDeltaFunction
              [FodderBeet].Phenology.Stage
              [FodderBeet].Phenology.SoilTemperatureFunction
          Manager SetCropParameters
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