Simulations: Version=57
  DataStore
    ExcelInput: FileName=Observed.xlsx; SheetNames=[Observed]
    PredictedObserved: PredictedTableName=outputfile; ObservedTableName=Observed; FieldNameUsedForMatch=SimulationID
    Probability: TableName=BugeseraSensibility; Exceedence=false; FieldToSplitOn=SimulationName
  Replacements
    Plant Sorghum: CropType=Sorghum; IsEnding=false; DaysAfterEnding=0
      Memo TitlePage
        The APSIM Sorghum Model

        McLean, G., Brider, J., Doherty, A.

        The APSIM sorghum model has been developed using the Plant Modelling Framework (PMF) of Brown et al(2014).
        This new framework provides a library of plant organ and process submodels that can be coupled, at runtime, to construct a model in much the same way that models can be coupled to construct a simulation. This means that dynamic composition of lower level process and organ classes (e.g. photosynthesis, leaf) into larger constructions (e.g. sorghum, wheat, sorghum) can be achieved by the model developer without additional coding.
      SorghumArbitrator Arbitrator: WatSupply=0; NMassFlowSupply=0; NDiffusionSupply=0
        SorghumArbitratorN NArbitrator
        PrioritythenRelativeAllocation DMArbitrator
      Phenology
        Memo
          The phenology model used in the APSIM sorghum model follows the approach used in earlier sorghum models(Jones and Kiniry (1986), Carberry and Arbrecht (1991), Carberry et al (1989).
          The model predicts development of primordia on the apex of the main stem and appearance of individual leaves to predict time to flag leaf.  Other stages use thermal time targets.
        MultiplyFunction ThermalTime
          PhaseLookup TT
            PhaseLookupValue TT: Start=Germination; End=Flowering
              AirTemperatureFunction ThermalTime
                XYPairs: X=[11, 30, 42]; Y=[0, 19, 0]
            PhaseLookupValue TTFM: Start=Flowering; End=HarvestRipe
              WeightedTemperatureFunction: MaximumTemperatureWeighting=0.5
                XYPairs: X=[5.7, 23.5]; Y=[0, 17.8]
        GerminatingPhase Germinating: Start=Sowing; End=Germination
        EmergingPhase Emerging: ShootLag=15; ShootRate=0.6; Start=Germination; End=Emergence; TTForTimeStep=0
          VariableReference ThermalTime: VariableName=[Phenology].ThermalTime.Value()
        GenericPhase Juvenile: Start=Emergence; End=EndJuvenile
          Constant Target: FixedValue=100
          VariableReference Progression: VariableName=[Phenology].ThermalTime.Value()
        GenericPhase JuvenileToFloralInit: Start=EndJuvenile; End=FloralInitiation
          VariableReference Progression: VariableName=[Phenology].ThermalTime.Value()
          VariableReference Target: VariableName=[Phenology].TTTargetPhotoSensitive.Value()
        GenericPhase FloralInitToFlagLeaf: Start=FloralInitiation; End=FlagLeaf
          VariableReference Progression: VariableName=[Phenology].ThermalTime.Value()
          SubtractFunction Target
            VariableReference TTEmergToFlag: VariableName=[Phenology].TTEmergToFlagLeaf.Value()
            VariableReference TTJuvenile: VariableName=[Phenology].Juvenile.Target.Value()
            VariableReference TTJuvToFloralInit: VariableName=[Phenology].JuvenileToFloralInit.Target.Value()
        GenericPhase FlagLeafToFlowering: Start=FlagLeaf; End=Flowering
          Constant Target: FixedValue=170
          VariableReference Progression: VariableName=[Phenology].ThermalTime.Value()
        GenericPhase FloweringToGrainFilling: Start=Flowering; End=StartGrainFill
          Constant Target: FixedValue=80
          VariableReference Progression: VariableName=[Phenology].ThermalTime.Value()
        GenericPhase GrainFilling: Start=StartGrainFill; End=EndGrainFill
          VariableReference Progression: VariableName=[Phenology].ThermalTime.Value()
          SubtractFunction Target
            VariableReference FlowerToMaturity: VariableName=[Phenology].TTFIowerToMaturity.Value()
            VariableReference FlowerToGrainFill: VariableName=[Phenology].FloweringToGrainFilling.Target.Value()
            VariableReference GrainFillToMaturity: VariableName=[Phenology].TTGrainFillToMaturity.Value()
          VariableReference Progression1: VariableName=[Phenology].ThermalTime.Value()
        GenericPhase Maturing: Start=EndGrainFill; End=Maturity
          VariableReference Progression: VariableName=[Phenology].ThermalTime.Value()
          VariableReference Target: VariableName=[Phenology].TTGrainFillToMaturity.Value()
        GenericPhase MaturityToHarvestRipe: Start=Maturity; End=HarvestRipe
          VariableReference Progression: VariableName=[Phenology].ThermalTime.Value()
          Constant Target: FixedValue=1
        EndPhase ReadyForHarvesting: Start=HarvestRipe; End=Unused
          VariableReference ThermalTime: VariableName=[Phenology].ThermalTime.Value()
        PhotoperiodFunction Photoperiod: Twilight=-6; DayLength=0
        OnEventFunction FloweringDAS: SetEvent=Flowering; ReSetEvent=never
          Memo
            A function is used to provide flowering date as days after sowing(DAS).
          Constant PreEventValue: FixedValue=0
          VariableReference PostEventValue: VariableName=[Phenology].DaysAfterSowing
        OnEventFunction MaturityDAS: SetEvent=Maturity; ReSetEvent=never
          Memo
            A function is used to provide maturity date as days after sowing(DAS).
          Constant PreEventValue: FixedValue=0
          VariableReference PostEventValue: VariableName=[Phenology].DaysAfterSowing
        Constant TTFIowerToMaturity: FixedValue=761
        Constant TTEndJuvToInit: FixedValue=160
        MultiplyFunction TTGrainFillToMaturity
          VariableReference FlowerToMaturity: VariableName=[Phenology].TTFIowerToMaturity.Value()
          Constant Proportion: FixedValue=0.05
        PhaseLookup TTTargetPhotoSensitive
          PhaseLookupValue: Start=Sowing; End=Emergence
            VariableReference PreEventValue: VariableName=[Phenology].TTEndJuvToInit.Value()
          PhaseLookupValue EmergenceToEndJuve: Start=Emergence; End=EndJuvenile
            AddFunction Add
              LinearInterpolationFunction PhotoModifier: XProperty=[Phenology].Photoperiod.Value()
                XYPairs: X=[11.5, 13.5]; Y=[0, 23]
              VariableReference TTEndJuvToInit: VariableName=[Phenology].TTEndJuvToInit.Value()
          PhaseLookupValue EndJuveToMaturity: Start=EndJuvenile; End=HarvestRipe
            OnEventFunction TTTargetPhoto: SetEvent=EndJuvenile; ReSetEvent=never
              VariableReference PreEventValue: VariableName=[Phenology].TTEndJuvToInit.Value()
              AddFunction PostEventValue: same as Replacements.Sorghum.Phenology.TTTargetPhotoSensitive.EmergenceToEndJuve.Add
        OnEventFunction TTTargetPhotoSensitivess: same as Replacements.Sorghum.Phenology.TTTargetPhotoSensitive.EndJuveToMaturity.TTTargetPhoto
        Constant FinalLeafNo: FixedValue=17.101
        Constant LeafNoAtEmergence: FixedValue=1
        Constant LeafNoRateChange: FixedValue=3.5
        AddFunction TTEmergToFlagLeaf
          MultiplyFunction LeafAppearingPhase1
            SubtractFunction NoLeavesRate1
              VariableReference FinalLeafNo: VariableName=[Phenology].FinalLeafNo.Value()
              VariableReference LeafNoAtEmergence: VariableName=[Phenology].LeafNoAtEmergence.Value()
              VariableReference LeafNoRateChange: VariableName=[Phenology].LeafNoRateChange.Value()
            Constant LeafAppearanceRate1: FixedValue=41
          MultiplyFunction LeafAppearingPhase2
            Constant LeafAppearanceRate2: FixedValue=20
            VariableReference LeafNoRateChange: VariableName=[Phenology].LeafNoRateChange.Value()
        AccumulateFunction TTFromEmergence: StartStageName=Emergence; EndStageName=Maturity; FractionRemovedOnCut=0; FractionRemovedOnHarvest=0; FractionRemovedOnGraze=0; FractionRemovedOnPrune=0
          VariableReference ThermalTime: VariableName=[Phenology].ThermalTime.Value()
        AccumulateFunction TTFMFromFlowering: StartStageName=Flowering; EndStageName=Maturity; FractionRemovedOnCut=0; FractionRemovedOnHarvest=0; FractionRemovedOnGraze=0; FractionRemovedOnPrune=0
          VariableReference ThermalTime: VariableName=[Phenology].ThermalTime.Value()
        AddFunction TTEmergToFloralInit
          VariableReference TTTargetJuvenille: VariableName=[Phenology].Juvenile.Target.Value()
          VariableReference TTTargetJuvToFI: VariableName=[Phenology].JuvenileToFloralInit.Target.Value()
        Constant SorghumFlag: FixedValue=1
      CulmStructure Structure: FinalLeafNo=0; FertileTillerNumber=0; CurrentLeafNo=0; LeafInitialisationStage=Emergence
        Memo
          Though tillering is common in some sorghum varieties under certain agronomic conditions, no tillering is accounted for within this model.  Therefore all branching has been parameterised out of the current sorghum model.
        VariableReference ThermalTime: VariableName=[Phenology].ThermalTime.Value()
        LessThanFunction Phyllochron
          VariableReference CurrentLeafNum: VariableName=[Structure].CurrentLeafNo
          SubtractFunction
            VariableReference FinalLeafNum: VariableName=[Structure].FinalLeafNumber.Value()
            Constant LeafNumRateChange: FixedValue=3.5
          Constant LeafAppRate1: FixedValue=41
          Constant LeafAppRate2: FixedValue=20
        HoldFunction FinalLeafNumber: WhenToHold=FloralInitiation
          AddFunction ValueToHold
            VariableReference LeafNumSeed: VariableName=[Structure].LeafNumSeed.Value()
            DivideFunction
              VariableReference TTEmergToFI: VariableName=[Phenology].TTEmergToFloralInit.Value()
              VariableReference LeafInitRate: VariableName=[Structure].LeafInitiationRate.Value()
        HeightFunction HeightModel
          LinearInterpolationFunction PotentialHeight: XProperty=[Phenology].Stage
            XYPairs: X=[3, 4, 5, 6]; Y=[20, 50, 60, 1700]
        Constant LeafNumSeed: FixedValue=4
        Constant LeafInitiationRate: FixedValue=21.6
        Constant LeafNumAtEmergence: FixedValue=1
        Constant VerticalAdjustment: FixedValue=0
      ReproductiveOrgan Grain: GrowthRespiration=0; MaintenanceRespiration=0
        Biomass Live: DMDOfStructural=0.6
        Biomass Dead: DMDOfStructural=0.6
        Constant InitialGrainProportion: FixedValue=0.05
        Constant MaximumPotentialGrainSize: FixedValue=0.3
        Constant MinimumNConc: FixedValue=0.008
        PhaseLookup MaximumNConc
          PhaseLookupValue InitialPhase: Start=Flowering; End=StartGrainFill
            Constant InitialNconc: FixedValue=0.05
          PhaseLookupValue LinearPhase: Start=StartGrainFill; End=EndGrainFill
            Constant FinalNconc: FixedValue=0.0175
        Constant WaterContent: FixedValue=0.13
        PhaseLookup NFillingRate
          PhaseLookupValue GrainFilling: Start=StartGrainFill; End=EndGrainFill
            LessThanFunction
              DivideFunction
                VariableReference TTGrainFillToMaturity: VariableName=[Phenology].TTGrainFillToMaturity
                VariableReference TTStartGrainToNow: VariableName=[Grain].TTStartGrainToNow
              Constant GrainFillFraction: FixedValue=0.5; Units=g/g
              MultiplyFunction
                VariableReference NumberFunction: VariableName=[Grain].NumberFunction.Value()
                VariableReference ThermalTime: VariableName=[Phenology].ThermalTime.Value()
                DivideFunction
                  Constant GrainFillRate: FixedValue=0.001
                  Constant Thousand: FixedValue=1000
              MultiplyFunction MultiplyFunction1
                VariableReference dltDmGreen: VariableName=[Grain].potentialDMAllocation.Structural
                VariableReference maxNConc: VariableName=[Grain].MaximumNConc
        MultiplyFunction NumberFunction
          MinimumFunction
            VariableReference FinalGrainNum: VariableName=[Grain].FinalGrainNum.Value()
            MultiplyFunction
              VariableReference FinalGrainNum: VariableName=[Grain].FinalGrainNum.Value()
              DivideFunction
                VariableReference TTStartGrainToNow: VariableName=[Grain].TTStartGrainToNow.Value()
                Constant RampTT: FixedValue=100
          Constant TemperatureFactor: FixedValue=1
        OnEventFunction FinalGrainNum: SetEvent=StartGrainFill
          Constant PreEventValue: FixedValue=0
          DivideFunction PostEventValue
            DivideFunction GrowthRate
              SubtractFunction PlantGrowth
                VariableReference TotalBiomass: VariableName=[Sorghum].Total.Wt
                VariableReference GreenWtAtFI: VariableName=[Grain].GreenWtAtFI.Value()
              AddFunction
                VariableReference DaysFIToStartGF: VariableName=[Grain].DaysFIToStartGrainFill.Value()
                Constant 1DayOffset: FixedValue=0
            Constant DMPerSeed: FixedValue=0.00083
        AccumulateFunction DaysFIToStartGrainFill: StartStageName=FloralInitiation; EndStageName=StartGrainFill; FractionRemovedOnCut=0; FractionRemovedOnHarvest=0; FractionRemovedOnGraze=0; FractionRemovedOnPrune=0
          Constant One: FixedValue=1
        OnEventFunction GreenWtAtFI: SetEvent=FloralInitiation
          Constant PreEventValue: FixedValue=0
          VariableReference PostEventValue: VariableName=[Sorghum].TotalLive.Wt
        AccumulateFunction TTStartGrainToNow: StartStageName=StartGrainFill; EndStageName=Maturity; FractionRemovedOnCut=0; FractionRemovedOnHarvest=0; FractionRemovedOnGraze=0; FractionRemovedOnPrune=0
          VariableReference ThermalTime: VariableName=[Phenology].ThermalTime.Value()
        DivideFunction DMCaryopsis
          VariableReference DMFixationSupply: VariableName=[Arbitrator].DM.TotalFixationSupply
          VariableReference GrainNumber: VariableName=[Grain].NumberFunction.Value()
          VariableReference ThermalTime: VariableName=[Phenology].ThermalTime.Value()
        MinimumFunction PotGrainFillRate
          MultiplyFunction
            AddFunction
              MultiplyFunction
                VariableReference DMCaryopsis: VariableName=[Grain].DMCaryopsis.Value()
                Constant: FixedValue=0.4026
              Constant: FixedValue=3.19e-05
            Constant: FixedValue=1000
          Constant MaxGrainFillRate: FixedValue=0.09
        MultiplyFunction DMDemandFunction
          VariableReference GrainFillRate: VariableName=[Grain].PotGrainFillRate.Value()
          VariableReference ThermalTime: VariableName=[Phenology].ThermalTime.Value()
          VariableReference GrainNumber: VariableName=[Grain].NumberFunction.Value()
          Constant: FixedValue=0.001
        BiomassRemoval BiomassRemovalDefaults
          OrganBiomassRemovalType Harvest: FractionLiveToRemove=0.5; FractionDeadToRemove=0; FractionLiveToResidue=0.1; FractionDeadToResidue=0
          OrganBiomassRemovalType Cut: FractionLiveToRemove=0.8; FractionDeadToRemove=0; FractionLiveToResidue=0; FractionDeadToResidue=0
          OrganBiomassRemovalType Prune: FractionLiveToRemove=0; FractionDeadToRemove=0; FractionLiveToResidue=0.6; FractionDeadToResidue=0
          OrganBiomassRemovalType Graze: FractionLiveToRemove=0.6; FractionDeadToRemove=0; FractionLiveToResidue=0.2; FractionDeadToResidue=0
        Constant DMConversionEfficiency: FixedValue=1
        Constant RemobilisationCost: FixedValue=0
        Constant CarbonConcentration: FixedValue=0.4
      Root: GrowthRespiration=0; MaintenanceRespiration=0; RootAngle=45; SWAvailabilityRatio=0
        Constant InitialDM: FixedValue=0.1; Units=g/plant
        LinearInterpolationFunction KLModifier: XProperty=[Sorghum].Population
          Memo
            The parameter KL is is described by Meinke et al (1993) to combine elements of soil conductivity (K) with root length (L) in determining root water uptake.  Peake et al (2013) demonstrated that in sorghum KL varied with plant population through impacts on root length density.  Here we adjust KL linearly with plant population.
          XYPairs: X=[0, 10]; Y=[1, 1]
        Constant SoilWaterEffect: FixedValue=1
          Memo
            No effect of soil water content on root growth is currently captured in the model.
        Constant TemperatureEffect: FixedValue=1
          Memo
            No effect of temperature on root growth is currently captured in the model.
        Constant MaxDailyNUptake: FixedValue=20
          Memo
            Maximum daily N uptake is set to an arbitrarily high value.
        Constant SenescenceRate: FixedValue=0.002
          Memo
            Jones and Kiniry (1986) used a constant root senescence fraction in the CERES-Sorghum model.
        Constant MaximumNConc: FixedValue=0.02
        Constant MinimumNConc: FixedValue=0.002
        Constant MaximumRootDepth: FixedValue=1000000
        PhaseLookup RootFrontVelocity
          Memo
            Hammer et al (2009) used a constant extraction front velocity of 2.5cm per day in their analysis of historical sorghum yield trends in the US corn belt.
          PhaseLookupValue PreGrainFill: Start=Germination; End=StartGrainFill
            Constant Function: FixedValue=27
          PhaseLookupValue GrainfillToMaturity: Start=StartGrainFill; End=Maturity
            Constant Function: FixedValue=0
        PhaseBasedSwitch NitrogenDemandSwitch: Start=Germination; End=Maturity
        LinearInterpolationFunction KNO3: XProperty=[Root].LengthDensity
          XYPairs: X=[0, 0.003]; Y=[0.03, 0.03]
        LinearInterpolationFunction NUptakeSWFactor: XProperty=[Root].RWC
          XYPairs: X=[0, 0.2, 1]; Y=[1, 1, 1]
        LinearInterpolationFunction KNH4: XProperty=[Root].LengthDensity
          XYPairs: X=[0, 0.003]; Y=[0.03, 0.03]
        Constant SpecificRootLength: FixedValue=100000; Units=m/g
        BiomassRemoval BiomassRemovalDefaults: same as Replacements.Sorghum.Grain.BiomassRemovalDefaults
        Constant DMConversionEfficiency: FixedValue=1
        Constant MaintenanceRespirationFunction: FixedValue=1
        Constant RemobilisationCost: FixedValue=0
        Constant CarbonConcentration: FixedValue=0.4
        BiomassDemand DMDemands
          MultiplyFunction Structural
            PhaseLookup ratioRootShoot
              Memo
                This is a straight lookup table not an lineaer relationship
              PhaseLookupValue BetweenEmergenceAndFloralInit: Start=Emergence; End=FloralInitiation
                Constant rootFraction: FixedValue=1; Units=0-1
              PhaseLookupValue BetweenFloralInitAndFlowering: Start=FloralInitiation; End=Flowering
                Constant rootFraction: FixedValue=0.33; Units=0-1
              PhaseLookupValue BetweenFloweringAndGrainFill: Start=Flowering; End=StartGrainFill
                Constant rootFraction: FixedValue=0.087; Units=0-1
            VariableReference LeafSupplyFunction: VariableName=[Leaf].DMSupplyFunction
          Constant Metabolic: FixedValue=0
          Constant Storage: FixedValue=0
        BiomassDemand NDemands
          MaximumFunction Structural
            Constant zero: FixedValue=0
            SubtractFunction
              MultiplyFunction required
                VariableReference MinNconc: VariableName=[Root].minimumNconc.Value()
                AddFunction
                  VariableReference dltDmGreen: VariableName=[Root].potentialDMAllocation.Structural
                  VariableReference dmGreen: VariableName=[Root].Live.Wt
              VariableReference nGreen: VariableName=[Root].Live.N
          Constant Metabolic: FixedValue=0
          Constant Storage: FixedValue=0
        PhaseBasedSwitch NitrogenRootCalcSwitch: Start=Germination; End=Maturity
        LinearInterpolationFunction RootDepthStressFactor: XProperty=[Root].SWAvailabilityRatio
          XYPairs: X=[0, 0.25]; Y=[0, 1]
        Constant RootFrontCalcSwitch: FixedValue=1
        Constant MaxNUptakeRate: FixedValue=0.029
        Constant NSupplyFraction: FixedValue=5
        LessThanFunction DltThermalTime
          VariableReference TTPostAnthesis: VariableName=[Phenology].TTFMFromFlowering
          Constant NCeaseUptake: FixedValue=570
          VariableReference ThermalTime: VariableName=[Phenology].ThermalTime
          Constant Zero: FixedValue=0
        Constant MaxDiffusion: FixedValue=2
        PhaseLookup ratioRootShootInverse
          PhaseLookupValue BetweenEmergenceAndEndJuvenile: Start=Emergence; End=EndJuvenile
            SubtractFunction
              Constant rootFraction: FixedValue=1; Units=0-1
              DivideFunction
                Constant inverse: FixedValue=1; Units=0-1
                Constant rootFraction: FixedValue=2; Units=0-1
          PhaseLookupValue BetweenEndJuvenileAndFlagLeaf: Start=EndJuvenile; End=FlagLeaf
            SubtractFunction
              Constant rootFraction: FixedValue=1; Units=0-1
              DivideFunction
                Constant inverse: FixedValue=1; Units=0-1
                Constant rootFraction: FixedValue=1.33; Units=0-1
          Memo
            This is a straight lookup table not an lineaer relationship
          PhaseLookupValue BetweenFlagLeafAndGrainFill: Start=FlagLeaf; End=StartGrainFill
            SubtractFunction
              Constant rootFraction: FixedValue=1; Units=0-1
              DivideFunction
                Constant inverse: FixedValue=1; Units=0-1
                Constant rootFraction: FixedValue=1.087; Units=0-1
      SorghumLeaf Leaf: MicroClimatePresent=false; LeafInitialisationStage=Emergence; KDead=0.03; PhosphorusStress=1; senLightTimeConst=10; frostKill=1; senThreshold=0.25; senWaterTimeConst=10
        zero: DltLAI, dltPotentialLAI, dltStressedLAI, LAI, SLN, CoverGreen, Height, WaterDemand, BiomassRUE, BiomassTE, LAIDead, senRadnCrit, LossFromExpansionStress, SenescedLai, DltRetranslocatedN, DltSenescedN, DltSenescedLaiN, DltSenescedLai, DltSenescedLaiLight, DltSenescedLaiWater, DltSenescedLaiFrost
        Constant InitialLAIFunction: FixedValue=200
        Constant InitialSLNFunction: FixedValue=1.5
        Constant InitialWtFunction: FixedValue=0.1; Units=g/plant
        Constant LaiDeadFunction: FixedValue=0; Units=m^2/m^2
        MinimumFunction ExpansionStress
          LinearInterpolationFunction WaterStressEffect: XProperty=[Leaf].sdRatio
            XYPairs: X=[0.1, 1.1]; Y=[0, 1]
          Constant NitrogenStressEffect: FixedValue=1
          Constant PhosphorusStressEffect: FixedValue=1
        DivideFunction sdRatio
          VariableReference WSupply: VariableName=[Arbitrator].WatSupply
          VariableReference WDemand: VariableName=[Leaf].WaterDemandFunction
        MultiplyFunction ExtinctionCoefficientFunction
          LinearInterpolationFunction PotentialExtinctionCoeff: XProperty=[Sorghum].SowingData.RowSpacing
            XYPairs: X=[0.2, 0.5, 1]; Y=[0.7, 0.4, 0.4]
        RUEModel Photosynthesis
          Constant RUE: FixedValue=1.25
          WeightedTemperatureFunction FT: MaximumTemperatureWeighting=0.5
            XYPairs: X=[0, 8, 20, 35, 50]; Y=[0, 0, 1, 1, 0]
          Memo
            Replaced the RUE2CO2 function as C4 Photosynthetic pathway is not represented in old sorghum.
            Look to reimplement it once the stats are working
          Constant FCO2: FixedValue=1
          VariableReference FN: VariableName=[Leaf].NitrogenStress
          VariableReference RadnInt: VariableName=[Leaf].RadIntTot
          Constant FVPD: FixedValue=1
          Constant FW: FixedValue=1
        LinearInterpolationFunction TemperatureStressFunction: XProperty=[Weather].MeanT
          XYPairs: X=[8, 20, 35, 50]; Y=[0, 1, 1, 0]
        LinearInterpolationFunction FrostFraction: XProperty=[Weather].MinT
          XYPairs: X=[-10, -9]; Y=[1, 0]
        MinimumFunction FRGRFunction
          VariableReference RUE_FT: VariableName=[Leaf].Photosynthesis.FT.Value()
          MinimumFunction Others
            VariableReference RUE_FN: VariableName=[Leaf].Photosynthesis.FN.Value()
            VariableReference RUE_FVPD: VariableName=[Leaf].Photosynthesis.FVPD.Value()
        VariableReference ThermalTime: VariableName=[Phenology].ThermalTime.Value()
        Constant FTN: FixedValue=0.1
        Constant NConc: FixedValue=0.1
        Constant HeightFunction: FixedValue=10
        DivideFunction LeafPartitioningCoefficient
          Constant One: FixedValue=1
          AddFunction
            Constant One: FixedValue=1
            MultiplyFunction
              VariableReference PartitionRate: VariableName=[Leaf].PartitionRate.Value()
              PowerFunction: Exponent=2
                VariableReference LeafNumber: VariableName=[Structure].NLeaves
                Memo
                  LeafNumber is referring to NLeaves for copatitibility with old model.
                  Should be CurrentLeafNo?
        Constant PartitionRate: FixedValue=0.006
        SubtractFunction DMRemaining
          VariableReference DMFixationSupply: VariableName=[Leaf].DMSupplyFunction.Value()
          VariableReference LeafDMDemand: VariableName=[Leaf].DMDemands.Structural.DMDemandFunction.Value()
        Constant MinimumNConc: FixedValue=0
        Constant MaximumNConc: FixedValue=0
        Constant NReallocationFactor: FixedValue=0
        Constant SenescenceRate: FixedValue=0
        Constant DetachmentRateFunction: FixedValue=0
        TEWaterDemandFunction WaterDemandFunction
          Constant SVPFrac: FixedValue=0.75
          Constant TranspirationEfficiencyCoefficient: FixedValue=0.009
          VariableReference Photosynthesis: VariableName=[Leaf].Photosynthesis.Value()
        MultiplyFunction DMSupplyFixation
          PhaseLookup ratioRootShoot
            PhaseLookupValue BetweenEmergenceAndFloralInit: Start=Emergence; End=FloralInitiation
              Constant rootFraction: FixedValue=2; Units=0-1
            PhaseLookupValue BetweenFloralInitAndFlowering: Start=FloralInitiation; End=Flowering
              Constant rootFraction: FixedValue=1.33; Units=0-1
            Memo
              This is a straight lookup table not an lineaer relationship
            PhaseLookupValue BetweenFloweringAndGrainFill: Start=Flowering; End=StartGrainFill
              Constant rootFraction: FixedValue=1.087; Units=0-1
            PhaseLookupValue BetweenGrainFillAndHarvestRipe: Start=StartGrainFill; End=HarvestRipe
              Constant rootFraction: FixedValue=1; Units=0-1
          VariableReference DMSupplyFunction: VariableName=[Leaf].DMSupplyFunction.Value()
        MinimumFunction DMSupplyFunction
          VariableReference BiomassTE: VariableName=[Leaf].BiomassTE
          VariableReference BiomassRUE: VariableName=[Leaf].BiomassRUE
        MultiplyFunction PotentialBiomassTEFunction
          DivideFunction TE
            VariableReference TECoeff
              VariableName=[Leaf].WaterDemandFunction.TranspirationEfficiencyCoefficient.Value()
            VariableReference VPD: VariableName=[Leaf].WaterDemandFunction.VPD
            Constant g2mm: FixedValue=0.001
          VariableReference WaterSupply: VariableName=[Arbitrator].WatSupply
        Constant MaintenanceRespirationFunction: FixedValue=0; Units=0-1
        Constant DMConversionEfficiency: FixedValue=1; Units=0-1
        BiomassRemoval BiomassRemovalDefaults: same as Replacements.Sorghum.Grain.BiomassRemovalDefaults
        Constant DMReallocationFactor: FixedValue=0
        Constant DMRetranslocationFactor: FixedValue=0
        VariableReference CriticalNConc: VariableName=[Leaf].MinimumNConc.Value()
        Constant RemobilisationCost: FixedValue=0
        Constant CarbonConcentration: FixedValue=0.4
        BiomassDemand DMDemands
          MultiplyFunction Structural
            PhaseLookup DMDemandFunction
              PhaseLookupValue BetweenEmergenceAndFlag: Start=Emergence; End=FlagLeaf
                MinimumFunction
                  MultiplyFunction
                    VariableReference LeafPartitionCoeff: VariableName=[Leaf].LeafPartitioningCoefficient
                    VariableReference DMSupplyFunction: VariableName=[Leaf].DMSupplyFunction
                  DivideFunction dltDmLeafMax
                    VariableReference DltStressedLAI: VariableName=[Leaf].DltStressedLAI
                    MultiplyFunction
                      VariableReference SlaMin: VariableName=[Leaf].SlaMin
                      Constant smm2sm: FixedValue=1e-06
            Constant StructuralFraction: FixedValue=1; Units=0-1
          Constant Metabolic: FixedValue=0
          StorageDMDemandFunction Storage
            SubtractFunction StorageFraction
              Constant One: FixedValue=1
              VariableReference StructuralFraction: VariableName=[Leaf].DMDemands.Structural.StructuralFraction.Value()
        BiomassDemand NDemands
          PhaseLookup Structural
            PhaseLookupValue BetweenEmergenceAndFlower: Start=Emergence; End=Flowering
              MultiplyFunction NewLeafNDemand
                VariableReference dltLAI: VariableName=[Leaf].DltStressedLAI
                VariableReference newLeafSLN: VariableName=[Leaf].NewLeafSLN
          MaximumFunction Metabolic
            SubtractFunction
              MultiplyFunction nRequired
                AddFunction laiToday
                  VariableReference LAI: VariableName=[Leaf].LAI
                  VariableReference DltLAI: VariableName=[Leaf].DltLAI
                VariableReference TargetSLN: VariableName=[Leaf].TargetSLN
              VariableReference nGreen: VariableName=[Leaf].Live.N
            Constant Zero: FixedValue=0
          Constant Storage: FixedValue=0
        Constant NitrogenDemandSwitch: FixedValue=1
        PhaseLookup DltLAIFunction
          Memo
            ```
            if(stage >= endJuv && stage < maturity)
                  dltLAI = Min(dltStressedLAI,dltDmGreen * slaMax * smm2sm);
               else dltLAI = dltStressedLAI;
            ```
          PhaseLookupValue BetweenEndJuvenileAndMaturity: Start=EndJuvenile; End=Maturity
            MinimumFunction MinFunction
              VariableReference DltStressedLAI: VariableName=[Leaf].dltStressedLAI
              MultiplyFunction LimitedSLN
                AddFunction dltDMGreen
                  VariableReference Structural: VariableName=[Leaf].DMPotentialAllocation.Structural
                  VariableReference Metabolic: VariableName=[Leaf].DMPotentialAllocation.Metabolic
                Constant slaMax: FixedValue=45000
                Constant smm2sm: FixedValue=1e-06
          PhaseLookupValue BetweenEmergenceAndEndJuvenile: Start=Emergence; End=EndJuvenile
            VariableReference DltStressedLAI: VariableName=[Leaf].dltStressedLAI
        Constant StomatalConductanceCO2Modifier: FixedValue=1
        Constant SlaMin: FixedValue=8000
        Constant NewLeafSLN: FixedValue=1
        Constant SenescedLeafSLN: FixedValue=0.3
        Constant NDilutionSlope: FixedValue=0.0043
        Constant NDilutionIntercept: FixedValue=-0.0017
        OnEventFunction TargetSLN: SetEvent=FlagLeaf
          Constant PreEventValue: FixedValue=1.5
          VariableReference PostEventValue: VariableName=[Leaf].SLN
        PhaseBasedSwitch MinPlantWt: Start=StartGrainFill; End=EndGrainFill
          OnEventFunction OnFlowering: SetEvent=Flowering
            Constant PreEventValue: FixedValue=0
            MultiplyFunction PostEventValue
              DivideFunction
                VariableReference LiveWt: VariableName=Leaf.Live.Wt
                VariableReference Density: VariableName=[Plant].SowingData.Density
              SubtractFunction
                Constant base: FixedValue=1
                Constant RetranslocationFactor: FixedValue=0.15
      GenericOrgan Rachis
        Constant InitialWtFunction: FixedValue=0; Units=g/plant
        Constant InitialNConcFunction: FixedValue=0
        Constant NReallocationFactor: FixedValue=0
        RetranslocateAvailableN
          MaximumFunction RetranslocateFunction
            MinimumFunction
              MultiplyFunction availableDilnN
                DivideFunction
                  MultiplyFunction dltStemNConc
                    AddFunction
                      MultiplyFunction
                        Constant dilnNSlope: FixedValue=0.0062
                        MultiplyFunction stemNConc
                          DivideFunction divide
                            VariableReference nGreen: VariableName=[Rachis].Live.N
                            AddFunction DMToday
                              VariableReference dltDmGreen: VariableName=[Rachis].potentialDMAllocation.Structural
                              VariableReference dmGreen: VariableName=[Rachis].Live.Wt
                          Constant Percentage: FixedValue=100
                      Constant dilnNInt: FixedValue=-0.001
                    VariableReference ThermalTime: VariableName=[Phenology].ThermalTime
                  Constant: FixedValue=100
                AddFunction DMToday
                  VariableReference dltDmGreen: VariableName=[Rachis].potentialDMAllocation.Structural
                  VariableReference dmGreen: VariableName=[Rachis].Live.Wt
              SubtractFunction
                VariableReference NGreen: VariableName=[Rachis].Live.N
                VariableReference StructuralN: VariableName=[Rachis].NDemands.Structural
            Constant Zero: FixedValue=0
          Constant RetranslocateDMFunction: FixedValue=0
        DivideFunction NRetranslocationFactor
          MaximumFunction NRetranslocationAmount: same as Replacements.Sorghum.Rachis.RetranslocateAvailableN.RetranslocateFunction
        Constant SenescenceRate: FixedValue=0; Units=/d
        LinearInterpolationFunction ExpansionStress: XProperty=[Sorghum].Leaf.Fw
          XYPairs: X=[0, 0.6]; Y=[1, 1]
        Constant DetachmentRateFunction: FixedValue=0; Units=/d
        Constant MaintenanceRespirationFunction: FixedValue=0; Units=0-1
        Constant DMConversionEfficiency: FixedValue=1; Units=0-1
        BiomassRemoval BiomassRemovalDefaults: same as Replacements.Sorghum.Grain.BiomassRemovalDefaults
        Constant DMReallocationFactor: FixedValue=0
        Constant DMRetranslocationFactor: FixedValue=0
        Constant RemobilisationCost: FixedValue=0
        Constant CarbonConcentration: FixedValue=0.4
        BiomassDemand DMDemands
          MultiplyFunction Structural
            PhaseLookup DMDemandFunction
              PhaseLookupValue BetweenFIAndFlower: Start=FloralInitiation; End=Flowering
                MultiplyFunction
                  VariableReference DMRemainingAfterLeaf: VariableName=[Leaf].DMRemaining.Value()
                  VariableReference Stem2FlowerFrac: VariableName=[Stem].StemToFlowerFrac.Value()
              PhaseLookupValue BetweenFlagAndFlowering: Start=FlagLeaf; End=Flowering
                MultiplyFunction
                  VariableReference DMFixationSupply: VariableName=[Arbitrator].DM.TotalSupplyFunction.Value
                  VariableReference Stem2FlowerFrac: VariableName=[Stem].StemToFlowerFrac.Value()
            Constant StructuralFraction: FixedValue=1
          Constant Metabolic: FixedValue=0
          Constant Storage: FixedValue=0
        BiomassDemand NDemands
          MaximumFunction Structural
            Constant zero: FixedValue=0
            SubtractFunction
              MultiplyFunction required
                VariableReference MinNconc: VariableName=[Rachis].minimumNconc.Value()
                AddFunction
                  VariableReference dltDmGreen: VariableName=[Rachis].potentialDMAllocation.Structural
                  VariableReference dmGreen: VariableName=[Rachis].Live.Wt
                VariableReference NitrogenDemandSwitch: VariableName=[Rachis].nitrogenDemandSwitch.Value()
              VariableReference nGreen: VariableName=[Rachis].Live.N
          MaximumFunction Metabolic
            Constant zero: FixedValue=0
            SubtractFunction
              MultiplyFunction required
                VariableReference CritNconc: VariableName=[Rachis].criticalNConc.Value()
                AddFunction
                  VariableReference dltDmGreen: VariableName=[Rachis].potentialDMAllocation.Structural
                  VariableReference dmGreen: VariableName=[Rachis].Live.Wt
                VariableReference NitrogenDemandSwitch: VariableName=[Rachis].nitrogenDemandSwitch.Value()
              VariableReference nGreen: VariableName=[Rachis].Live.N
          StorageNDemandFunction Storage
            VariableReference NitrogenDemandSwitch: VariableName=[Rachis].nitrogenDemandSwitch.Value()
            VariableReference MaxNconc: VariableName=[Rachis].maximumNconc.Value()
        Constant MinimumNConc: FixedValue=0.003
        Constant CriticalNConc: FixedValue=0.01
        Constant MaximumNConc: FixedValue=0.008
        PhaseBasedSwitch NitrogenDemandSwitch: Start=Emergence; End=StartGrainFill
        RetranslocateNonStructural RetranslocateNitrogen
      GenericOrgan Stem
        MultiplyFunction InitialWtFunction
          Constant InitialPlantWt: FixedValue=0.1; Units=g/plant
          VariableReference Population: VariableName=[Plant].Population
        Constant initialNConcFunction: FixedValue=0.01
        Constant NReallocationFactor: FixedValue=0
        RetranslocateAvailableN RetranslocateNitrogen
          MaximumFunction RetranslocateFunction
            MinimumFunction
              MultiplyFunction availableDilnN
                DivideFunction
                  MultiplyFunction dltStemNConc
                    AddFunction
                      MultiplyFunction
                        Constant dilnNSlope: FixedValue=0.0062
                        MultiplyFunction stemNConcPct
                          DivideFunction divide
                            VariableReference nGreen: VariableName=[Stem].Live.N
                            AddFunction DMToday
                              VariableReference dltDmGreen: VariableName=[Stem].potentialDMAllocation.Structural
                              VariableReference dmGreen: VariableName=[Stem].Live.Wt
                          Constant Percentage: FixedValue=100
                      Constant dilnNInt: FixedValue=-0.001
                    VariableReference ThermalTime: VariableName=[Phenology].ThermalTime
                  Constant: FixedValue=100
                AddFunction DMToday
                  VariableReference dltDmGreen: VariableName=[Stem].potentialDMAllocation.Structural
                  VariableReference dmGreen: VariableName=[Stem].Live.Wt
              SubtractFunction
                VariableReference NGreen: VariableName=[Stem].Live.N
                MultiplyFunction
                  AddFunction DMToday
                    VariableReference dltDmGreen: VariableName=[Stem].potentialDMAllocation.Structural
                    VariableReference dmGreen: VariableName=[Stem].Live.Wt
                  VariableReference StructuralN: VariableName=[Stem].CriticalNconc.Value
            Constant Zero: FixedValue=0
          MaximumFunction RetranslocateDMFunction
            MultiplyFunction StemWtAvail
              SubtractFunction
                AddFunction DMToday
                  VariableReference dltDmGreen: VariableName=[Stem].potentialDMAllocation.Structural
                  VariableReference dmGreen: VariableName=[Stem].Live.Wt
                MultiplyFunction
                  OnEventFunction PlantMinDM: SetEvent=Flowering
                    Constant PreEventValue: FixedValue=0
                    Constant PostEventValue: FixedValue=0.3
                      MultiplyFunction PlantMinDM
                        DivideFunction dmPlantStem
                          VariableReference dmGreen: VariableName=[Stem].Live.Wt
                          VariableReference density: VariableName=[Plant].SowingData.Density
                        SubtractFunction
                          Constant One: FixedValue=1
                          Constant translocFrac: FixedValue=0.2
                  VariableReference density: VariableName=[Plant].SowingData.Density
              Constant retransRate: FixedValue=0.15
            Constant Zero: FixedValue=0
        DivideFunction NRetranslocationFactor
          MaximumFunction NRetranslocationAmount
            MinimumFunction
              MultiplyFunction availableDilnN: same as Replacements.Sorghum.Stem.RetranslocateNitrogen.RetranslocateFunction.MinimumFunction.availableDilnN
              SubtractFunction
                VariableReference NGreen: VariableName=[Stem].Live.N
                MultiplyFunction
                  AddFunction DMToday
                    VariableReference dltDmGreen: VariableName=[Stem].potentialDMAllocation.Structural
                    VariableReference dmGreen: VariableName=[Stem].Live.Wt
                  VariableReference StructuralN: VariableName=[Stem].MinimumNconc.Value
            Constant Zero: FixedValue=0
          VariableReference dmGreen: VariableName=[Stem].Live.Wt
        DivideFunction DMRetranslocationFactor
          MaximumFunction DMRetranslocationAmount: same as Replacements.Sorghum.Stem.RetranslocateNitrogen.RetranslocateDMFunction
          VariableReference dmGreen: VariableName=[Stem].Live.Wt
        Constant StemToFlowerFrac: FixedValue=0.3
        Constant SenescenceRate: FixedValue=0; Units=/d
        Constant DetachmentRateFunction: FixedValue=0; Units=/d
        Constant MaintenanceRespirationFunction: FixedValue=0; Units=0-1
        Constant DMConversionEfficiency: FixedValue=1; Units=0-1
        BiomassRemoval BiomassRemovalDefaults: same as Replacements.Sorghum.Grain.BiomassRemovalDefaults
        Constant DMReallocationFactor: FixedValue=0
        Constant RemobilisationCost: FixedValue=0
        Constant CarbonConcentration: FixedValue=0.4
        BiomassDemand DMDemands
          MultiplyFunction Structural
            MaximumFunction DMDemandFunction
              SubtractFunction DMDemandFunction
                VariableReference DMSupplyFunction: VariableName=[Leaf].DMSupplyFunction
                VariableReference LeafDemand: VariableName=[Leaf].DMDemand.Structural
                VariableReference RachisDemand: VariableName=[Rachis].DMDemand.Structural
                VariableReference GrainDemand: VariableName=[Grain].DMDemand.Structural
              Constant Zero: FixedValue=0
            Constant StructuralFraction: FixedValue=1
          Constant Metabolic: FixedValue=0
          Constant Storage: FixedValue=0
        BiomassDemand NDemands
          MaximumFunction Structural
            Constant zero: FixedValue=0
            SubtractFunction
              MultiplyFunction required
                VariableReference CriticalNconc: VariableName=[Stem].CriticalNConc
                AddFunction
                  VariableReference dltDmGreen: VariableName=[Stem].potentialDMAllocation.Structural
                  VariableReference dmGreen: VariableName=[Stem].Live.Wt
                VariableReference NitrogenDemandSwitch: VariableName=[Stem].nitrogenDemandSwitch.Value()
              VariableReference nGreen: VariableName=[Stem].Live.N
          MaximumFunction Metabolic
            Constant zero: FixedValue=0
            SubtractFunction
              MultiplyFunction required
                VariableReference MinimumNconc: VariableName=[Stem].MinimumNConc
                AddFunction
                  VariableReference dltDmGreen: VariableName=[Stem].potentialDMAllocation.Structural
                  VariableReference dmGreen: VariableName=[Stem].Live.Wt
                VariableReference NitrogenDemandSwitch: VariableName=[Stem].nitrogenDemandSwitch.Value()
              VariableReference nGreen: VariableName=[Stem].Live.N
              VariableReference structural: VariableName=[Stem].NDemands.Structural
          Constant Storage: FixedValue=0
        LinearInterpolationFunction CriticalNConc: XProperty=[Phenology].Stage
          XYPairs: X=[3, 5, 7, 10]; Y=[0.012, 0.012, 0.005, 0.0015]
        LinearInterpolationFunction MinimumNconc: XProperty=[Phenology].Stage
          XYPairs: X=[3, 5, 7, 10]; Y=[0.055, 0.016, 0.01, 0.005]
        LinearInterpolationFunction MaximumNconc: XProperty=[Phenology].Stage
          XYPairs: X=[3, 5, 7, 10]; Y=[0.055, 0.016, 0.01, 0.005]
        PhaseBasedSwitch NitrogenDemandSwitch: Start=Emergence; End=StartGrainFill
      AddFunction TotalPlantDemand
        VariableReference LeafDemand: VariableName=[Leaf].DMDemands.Structural.DMDemandFunction.Value()
        VariableReference StemDemand: VariableName=[Stem].DMDemands.Structural.DMDemandFunction.Value()
        VariableReference RachisDemand: VariableName=[Rachis].DMDemands.Structural.DMDemandFunction.Value()
        VariableReference GrainDemand: VariableName=[Grain].DMDemands.Structural.DMDemandFunction.Value()
      CompositeBiomass AboveGround: DMDOfStructural=0.6
        Propertys=[[Leaf].Live, [Leaf].Dead, [Stem].Live, [Stem].Dead, [Rachis].Live, [Rachis].Dead, [Grain].Live, [Grain].Dead]
      CompositeBiomass AboveGroundLive: Propertys=[[Leaf].Live, [Stem].Live, [Grain].Live, [Rachis].Live]; DMDOfStructural=0.6
        Memo
          The AboveGroundLive composite biomass object includes the Live pools of all organs occurring above the soil surface to allow output for total dry matter and Nutrient contents, including total structural, non-structural and metabolic pools.
      CompositeBiomass AboveGroundDead: Propertys=[[Leaf].Dead, [Stem].Dead, [Grain].Dead, [Rachis].Dead]; DMDOfStructural=0.6
        Memo
          The AboveGroundDead composite biomass object includes the Dead pools of all organs occurring above the soil surface to allow output for total dry matter and Nutrient contents, including total structural, non-structural and metabolic pools.
      CompositeBiomass BelowGround: Propertys=[[Root].Live, [Root].Dead]; DMDOfStructural=0.6
      CompositeBiomass Total: DMDOfStructural=0.6
        Propertys=[[Leaf].Live, [Leaf].Dead, [Stem].Live, [Stem].Dead, [Root].Live, [Root].Dead, [Rachis].Live, [Rachis].Dead, [Grain].Live, [Grain].Dead]
      CompositeBiomass TotalLive: DMDOfStructural=0.6
        Propertys=[[Leaf].Live, [Stem].Live, [Root].Live, [Rachis].Live, [Grain].Live]
      CompositeBiomass TotalDead: DMDOfStructural=0.6
        Propertys=[[Leaf].Dead, [Stem].Dead, [Root].Dead, [Rachis].Dead, [Grain].Dead]
      CultivarFolder Cultivars
        CultivarFolder Australia
          Cultivar Buster
          Cultivar M35-1: Command=[Phenology].TTEndJuvToInit.FixedValue = 200
          Cultivar CSH13r: Command=[Phenology].TTEndJuvToInit.FixedValue = 220
          Cultivar QL41xQL36: Command=[Phenology].TTEndJuvToInit.FixedValue = 220
          Cultivar ATx623xRTx430: Command=[Phenology].TTEndJuvToInit.FixedValue = 220
          Cultivar QL39xQL36: Command=[Phenology].TTEndJuvToInit.FixedValue = 220
          Cultivar A35xQL36: Command=[Phenology].TTEndJuvToInit.FixedValue = 220
    Report outputfile: EventNames=[Sorghum].Harvesting
      VariableNames:
        [Sorghum].Phenology.DaysAfterSowing as Das
        [Sorghum].Phenology.CurrentStageName as Stage
        [Sorghum].TotalLive.Wt as BiomassWt
        [Sorghum].Grain.Size * 1000 as GrainSize // FIXME!
        [Sorghum].Grain.NumberFunction as GrainNoFunc
        [Sorghum].Grain.Number as GrainNo
        [Sorghum].Leaf.LAI as LAI
        [Sorghum].Root.Live.Wt as RootGreenWt
        [Sorghum].Leaf.Live.Wt as LeafGreenWt
        [Sorghum].Stem.Live.Wt as StemGreenWt
        [Sorghum].Rachis.Live.Wt as RachisGreenWt
        [Sorghum].Grain.Live.Wt as GrainGreenWt
        [Sorghum].Total.N as BiomassN
        [Sorghum].TotalLive.N as biomass_n
        [Sorghum].Root.Live.N as RootGreenN
        [Sorghum].Leaf.Live.N as LeafGreenN
        [Sorghum].Stem.Live.N as StemGreenN
        [Sorghum].Rachis.Live.N as RachisGreenN
        [Sorghum].Grain.Live.N as GrainGreenN
        [Sorghum].Grain.Live.NConc as GrainGreenNConc
        //[Sorghum].Leaf.Number as LeafNo
        sum([Soil].SoilWater.ESW) as ESW
        sum([Soil].SoilNitrogen.NO3.kgha) as NO3
        [Sorghum].Leaf.SLN as SLN
        sum([Soil].SoilWater.SW) as sw
        // HI
        [Sorghum].Leaf.LAI / [Sorghum].Population * 10000 as GPLA
        [Sorghum].Leaf.LAIDead / [Sorghum].Population * 10000 as SPLA
        ([Sorghum].Leaf.LAIDead / [Sorghum].Population + [Sorghum].Leaf.LAI / [Sorghum].Population) * 10000 as TPLA // gpla + spla as per old apsim. this assumes paddock area = 1ha
        //[Sorghum].Leaf.LAITotal as TPLA // ??
        [Sorghum].Leaf.LAIDead as SPLA
        // Yield
        [Sorghum].AboveGround.Wt // g/m2 - Biomass (kg/ha) in old Apsim
        // Variables in old apsim:
        //
        //DaysAfterSowing as Das
        //Stage
        //GrainSize
        //GrainNo
        //MaxLAI as LaiAnth
        //RootGreenWt
        //LeafGreenWt
        //StemGreenWt
        //RachisGreenWt
        //GrainGreenWt
        //biomass_n
        //RootGreenN
        //LeafGreenN
        //StemGreenN
        //RachisGreenN
        //GrainGreenN
        //GrainGreenNConc
        //LeafNo
        //ESW
        //no3() as NO3
        //SLN
        //sw()
        //HI
        //TPLA
        //SPLA
        //Yield
        //Biomass
  Folder Validation
    Folder Hermitage
      Folder HE1_8
        Folder HE1
          Memo
            TODO - Combine these into an experiment. Add a sensibility test (manager script) to ensure that the experiment generates the same results as the three individual simulations.
          Simulation Sorghum_HE1_T1
            Clock: StartDate=1996-12-01; EndDate=1997-06-11
            Summary SummaryFile
            Weather: FileName=Met\HE1996.met
            Zone paddock: Area=1; Slope=0
              Folder Manager folder
                Manager Sow SkipRow on a fixed date
                  Date = 1997-01-09
                  Density = 10
                  Depth = 30
                  Cultivar = QL41xQL36
                  RowSpacing = 0.5
                  RowConfiguration = solid
                  Ftn = 0
```csharp
using System;
using Models.Core;
using Models.PMF;

using APSIM.Shared.Utilities;

namespace Models
{
	[Serializable]
	public class Script : Model
	{
		[Description("Enter sowing date (dd/mm/yyyy) : ")]
		public DateTime Date { get; set; }

		[Description("Enter sowing density  (plants/m2) : ")]
		public double Density { get; set; }

		[Description("Enter sowing depth  (mm) : ")]
		public double Depth { get; set; }

		[Description("Enter cultivar : ")]
		[Display(Type = DisplayType.CultivarName)]
		public string Cultivar { get; set; } // QL41xQL36

		[Description("Enter row spacing (m) : ")]
		public double RowSpacing { get; set; }

		[Description("Enter skip row configuration : ")]
		public RowConfigurationType RowConfiguration { get; set; }

		[Description("Enter Fertile Tiller No. : ")]
		public double Ftn { get; set; }

		public enum RowConfigurationType 
		{
			solid, single, _double /*replaces double*/
		}

		[Link]
		private Zone paddock;

		[Link]
		private Clock clock;

		[Link]
		private IPlant crop;

		[EventSubscribe("DoManagement")]
		private void OnDoManagement(object sender, EventArgs e)
		{
			if (clock.Today == Date /* && isFallow */)
			{
				double population = Density * paddock.Area;
				crop.Sow(Cultivar, population, Depth, RowSpacing, budNumber: Ftn, rowConfig: (double)RowConfiguration + 1);
				/*
            	if (paddock_is_fallow() = 1 and today = date('[date]')) then
              		[crop] sow plants =[density], sowing_depth = [depth], cultivar = [cultivar], row_spacing = [row_spacing], skip = [RowConfiguration], tiller_no_fertile = [ftn] ()
            	endif
				*/
			}
		}
	}
}
```
                Manager Harvesting rule
```csharp
using System;
using Models.Core;
using Models.PMF;

namespace Models
{
	[Serializable]

	public class Script : Model
	{
		[Link]
		private Clock clock;

		[Link]
		private IPlant crop;

		[EventSubscribe("DoManagement")]
		private void OnDoCalculations(object sender, EventArgs e)
		{
			if (crop.IsReadyForHarvesting)
			{
				crop.Harvest();
				crop.EndCrop();
			}
			/*
				

           if [crop].StageName = 'harvest_ripe' or [crop].plant_status = 'dead' then
              [crop]  harvest
              [crop]  end_crop
           endif

            
			*/
		}
	}
}
```
              Irrigation
              Fertiliser
              Operations
                1997-01-09  [Irrigation].Apply(52);
                1997-01-16  [Irrigation].Apply(36);
                1997-01-21  [Irrigation].Apply(18);
                1997-01-29  [Irrigation].Apply(20);
                1997-02-07  [Irrigation].Apply(14);
                1997-03-13  [Irrigation].Apply(30);
                1997-03-21  [Irrigation].Apply(45);
                1997-04-10  [Irrigation].Apply(27);
                1997-04-17  [Irrigation].Apply(42);
                1997-05-02  [Irrigation].Apply(27);
                1996-12-20  [Fertiliser].Apply(33, Fertiliser.Types.NO3N, 50);
                1996-12-23  [Fertiliser].Apply(0, Fertiliser.Types.NO3N, 50);
                1996-12-23  [Fertiliser].Apply(119, Fertiliser.Types.NO3N, 50);
                1997-02-12  [Fertiliser].Apply(59, Fertiliser.Types.NO3N, 50);
                1997-03-21  [Fertiliser].Apply(59, Fertiliser.Types.NO3N, 50);
              Soil: SoilType=HMM; Site=HRS; NearestTown=Unknown; Region=SE Queensland; NaturalVegetation=Unknown; Latitude=0; Longitude=0
                Water
                  Thickness  BD    AirDry  LL15   DUL   SAT
                  100        1.34  0.08    0.226  0.42  0.45
                  100        1.34  0.19    0.226  0.42  0.45
                  200        1.33  0.23    0.258  0.46  0.48
                  200        1.38  0.26    0.27   0.46  0.47
                  200        1.4   0.26    0.268  0.43  0.45
                  200        1.55  0.28    0.304  0.4   0.41
                  200        1.59  0.25    0.335  0.37  0.38
                  200        1.63  0.28    0.33   0.33  0.37
                  200        1.66  0.3     0.32   0.32  0.37
                  200        1.68  0.31    0.33   0.33  0.36
                  SoilCrop SorghumSoil
                    LL=[0.226, 0.226, 0.258, 0.27, 0.268, 0.304, 0.335, 0.33, 0.32, 0.33]
                    KL=[0.07, 0.07, 0.07, 0.07, 0.06, 0.06, 0.06, 0.05, 0.05, 0.04]
                    XF=[1, 1, 1, 1, 1, 1, 1, 1, 1, 1]
                SoilWater: SummerDate=1-Nov; SummerU=1.5; SummerCona=6.5; WinterDate=1-Apr; WinterU=1.5; WinterCona=6.5; DiffusConst=40; DiffusSlope=16; Salb=0.2; CN2Bare=85; CNRed=20; CNCov=0.8; max_pond=0; Thickness=[100, 100, 200, 200, 200, 200, 200, 200, 200, 200]; SWCON=[0.3, 0.3, 0.3, 0.3, 0.3, 0.3, 0.3, 0.3, 0.3, 0.3]; ResidueInterception=0
                SoilNitrogen: fom_types=[default, manure, mucuna, lablab, shemp, stable]; fract_carb=[0.2, 0.3, 0.54, 0.57, 0.45, 0]; fract_cell=[0.7, 0.3, 0.37, 0.37, 0.47, 0.1]; fract_lign=[0.1, 0.4, 0.09, 0.06, 0.08, 0.9]
                  SoilNitrogenNO3 NO3
                  SoilNitrogenNH4 NH4
                  SoilNitrogenUrea Urea
                  SoilNitrogenPlantAvailableNO3 PlantAvailableNO3
                  SoilNitrogenPlantAvailableNH4 PlantAvailableNH4
                SoilOrganicMatter: RootCN=50; EnrACoeff=7.4; EnrBCoeff=0.2; OCUnits=Total
                  Thickness  OC    SoilCN  FBiom  FInert  RootWt
                  100        1.19  12.5    0.05   0.45    260.587
                  100        0.59  12.5    0.02   0.6     220.582
                  200        0.45  12.5    0.01   0.75    158.054
                  200        0.3   12.5    0.01   0.9     113.251
                  200        0.2   12.5    0.01   0.9     81.1478
                  200        0.16  12.5    0.01   0.9     58.1449
                  200        0.17  12.5    0.01   0.9     41.6626
                  200        0.17  12.5    0.05   0.9     29.8526
                  200        0.17  12.5    0.02   0.9     21.3903
                  200        0.17  12.5    0.01   0.9     15.3268
                Analysis: Thickness=[100, 100, 200, 200, 200, 200, 200, 200, 200, 200]; PH=[6.3, 6.4, 6.5, 6.6, 6.6, 6.5, 6.5, 6.5, 6.5, 6.5]; PHUnits=Water; BoronUnits=0
                Sample Initial Water: Thickness=[100, 100, 200, 200, 200, 200, 200, 200, 200, 200]; NO3Units=ppm; NH4Units=ppm; SWUnits=Volumetric; OCUnits=Total; PHUnits=Water
                  SW=[0.235, 0.252, 0.27, 0.3, 0.268, 0.304, 0.335, 0.33, 0.32, 0.33]
                Sample Initial Nitrogen: NO3Units=ppm; NH4Units=ppm; SWUnits=Volumetric; OCUnits=Total; PHUnits=Water
                  Thickness  NO3    NH4
                  100        10.4   0.1
                  100        1.633  0.1
                  200        1.233  0.1
                  200        0.9    0.1
                  200        1.1    0.1
                  200        1.467  0.1
                  200        3.633  0.1
                  200        5.667  0.1
                  200        5.8    0.1
                  200        7.267  0.1
                CERESSoilTemperature
              Plant Sorghum: CropType=name; IsEnding=false; DaysAfterEnding=0
              Report outputfile: EventNames=[Clock].DoReport
                VariableNames:
                  [Sorghum].Phenology.DaysAfterSowing as Das
                  [Sorghum].Phenology.CurrentStageName as Stage
                  [Sorghum].AboveGround.Wt as BiomassWt
                  [Sorghum].Grain.Size as GrainSize
                  [Sorghum].Grain.NumberFunction as GrainNoFunc
                  [Sorghum].Grain.Number as GrainNo
                  [Sorghum].Leaf.LAI as LAI
                  [Sorghum].Root.Live.Wt as RootGreenWt
                  [Sorghum].Leaf.Live.Wt as LeafGreenWt
                  [Sorghum].Stem.Live.Wt as StemGreenWt
                  [Sorghum].Rachis.Live.Wt as RachisGreenWt
                  [Sorghum].Grain.Live.Wt as GrainGreenWt
                  // biomass_n?
                  [Sorghum].Root.Live.N as RootGreenN
                  [Sorghum].Leaf.Live.N as LeafGreenN
                  [Sorghum].Stem.Live.N as StemGreenN
                  [Sorghum].Rachis.Live.N as RachisGreenN
                  [Sorghum].Grain.Live.N as GrainGreenN
                  [Sorghum].Grain.Live.NConc as GrainGreenNConc
                  //[Sorghum].Leaf.Number as LeafNo
                  sum([HRS].SoilWater.ESW) as ESW
                  sum([HRS].SoilNitrogen.NO3.kgha) as NO3
                  [Sorghum].Leaf.SLN as SLN
                  sum([HRS].SoilWater.SW) as sw
                  // HI
                  [Sorghum].Leaf.LAITotal as TPLA // ??
                  [Sorghum].Leaf.LAIDead as SPLA
                  // Yield
                  [Sorghum].AboveGround.Wt // g/m2 - Biomass (kg/ha) in old Apsim
                  // Variables in old apsim:
                  //
                  //DaysAfterSowing as Das
                  //Stage
                  //Biomass units g/m^2 as BiomassWt
                  //GrainSize
                  //GrainNo
                  //MaxLAI as LaiAnth
                  //RootGreenWt
                  //LeafGreenWt
                  //StemGreenWt
                  //RachisGreenWt
                  //GrainGreenWt
                  //biomass_n
                  //RootGreenN
                  //LeafGreenN
                  //StemGreenN
                  //RachisGreenN
                  //GrainGreenN
                  //GrainGreenNConc
                  //LeafNo
                  //ESW
                  //no3() as NO3
                  //SLN
                  //sw()
                  //HI
                  //TPLA
                  //SPLA
                  //Yield
                  //Biomass
            SurfaceOrganicMatter: InitialResidueName=wheat_stubble; InitialResidueType=wheat; InitialResidueMass=0; InitialStandingFraction=0; InitialCPR=0; InitialCNR=80; FractionFaecesAdded=0.5
            SoilArbitrator
          Simulation Sorghum_HE1_T2
            Clock: StartDate=1996-12-01; EndDate=1997-06-30
            Summary SummaryFile
            Weather: FileName=Met\HE1996.met
            Zone paddock: Area=1; Slope=0
              Folder Manager folder
                Manager Sow SkipRow on a fixed date
                  Date = 1997-01-09
                  Density = 10
                  Depth = 30
                  Cultivar = Buster
                  RowSpacing = 0.5
                  RowConfiguration = solid
                  Ftn = 0.2
                  script: same as in Validation.Hermitage.HE1_8.HE1.Sorghum_HE1_T1.paddock.Manager folder.Sow SkipRow on a fixed date
                Manager Harvesting rule: same as Validation.Hermitage.HE1_8.HE1.Sorghum_HE1_T1.paddock.Manager folder.Harvesting rule
              Irrigation
              Fertiliser
              Operations: same as Validation.Hermitage.HE1_8.HE1.Sorghum_HE1_T1.paddock.Operations
              Plant Sorghum: CropType=name; IsEnding=false; DaysAfterEnding=0
              Report outputfile: VariableNames=Biomass; EventNames=[Clock].DoReport
              Soil: SoilType=HMM; LocalName=HRS; Site=HRS; NearestTown=Unknown; Region=SE Queensland; NaturalVegetation=Unknown; Latitude=0; Longitude=0
                Water: same as Validation.Hermitage.HE1_8.HE1.Sorghum_HE1_T1.paddock.Soil.Water
                SoilWater: same as Validation.Hermitage.HE1_8.HE1.Sorghum_HE1_T1.paddock.Soil.SoilWater
                SoilNitrogen: same as Validation.Hermitage.HE1_8.HE1.Sorghum_HE1_T1.paddock.Soil.SoilNitrogen
                SoilOrganicMatter: same as Validation.Hermitage.HE1_8.HE1.Sorghum_HE1_T1.paddock.Soil.SoilOrganicMatter
                Analysis: same as Validation.Hermitage.HE1_8.HE1.Sorghum_HE1_T1.paddock.Soil.Analysis
                Sample Initial Water: Thickness=[100, 100, 200, 200, 200, 200, 200, 200, 200, 200]; NO3Units=ppm; NH4Units=ppm; SWUnits=Volumetric; OCUnits=Total; PHUnits=Water
                  SW=[0.235, 0.252, 0.27, 0.3, 0.268, 0.304, 0.335, 0.33, 0.32, 0.33]
                Sample Initial Nitrogen: same as Validation.Hermitage.HE1_8.HE1.Sorghum_HE1_T1.paddock.Soil.Initial Nitrogen
                CERESSoilTemperature
              MicroClimate: a_interception=0; b_interception=0; c_interception=0; d_interception=0; soil_albedo=0; SoilHeatFluxFraction=0; NightInterceptionFraction=0; ReferenceHeight=0
            SurfaceOrganicMatter: InitialResidueName=wheat_stubble; InitialResidueType=wheat; InitialResidueMass=0; InitialStandingFraction=0; InitialCPR=0; InitialCNR=80; FractionFaecesAdded=0.5
            SoilArbitrator
          Simulation Sorghum_HE1_T3
            Clock: StartDate=1996-12-01; EndDate=1997-06-30
            Summary SummaryFile
            Weather: FileName=Met\HE1996.met
            Zone paddock: Area=1; Slope=0
              Folder Manager folder
                Manager Sow SkipRow on a fixed date
                  Date = 1997-01-09
                  Density = 10
                  Depth = 30
                  Cultivar = M35-1
                  RowSpacing = 0.5
                  RowConfiguration = solid
                  Ftn = 0
                  script: same as in Validation.Hermitage.HE1_8.HE1.Sorghum_HE1_T1.paddock.Manager folder.Sow SkipRow on a fixed date
                Manager Harvesting rule
```csharp
using System;
using Models.Core;
using Models.PMF;

namespace Models
{
	[Serializable]

	public class Script : Model
	{
		[Link]
		private Clock clock;

		[Link]
		public IPlant crop { get; set; }

		[EventSubscribe("DoManagement")]
		private void OnDoCalculations(object sender, EventArgs e)
		{
			if (crop.IsReadyForHarvesting)
			{
				crop.Harvest();
				crop.EndCrop();
			}
			/*
				

           if [crop].StageName = 'harvest_ripe' or [crop].plant_status = 'dead' then
              [crop]  harvest
              [crop]  end_crop
           endif

            
			*/
		}
	}
}
```
              Operations: same as Validation.Hermitage.HE1_8.HE1.Sorghum_HE1_T1.paddock.Operations
              Plant Sorghum: CropType=name; IsEnding=false; DaysAfterEnding=0
              Soil: same as Validation.Hermitage.HE1_8.HE1.Sorghum_HE1_T1.paddock.Soil
              Report outputfile: VariableNames=Biomass; EventNames=[Clock].DoReport
              MicroClimate: a_interception=0; b_interception=0; c_interception=0; d_interception=0; soil_albedo=0; SoilHeatFluxFraction=0; NightInterceptionFraction=0; ReferenceHeight=0
              Irrigation
              Fertiliser
            SurfaceOrganicMatter: InitialResidueName=wheat_stubble; InitialResidueType=wheat; InitialResidueMass=0; InitialStandingFraction=0; InitialCPR=0; InitialCNR=80; FractionFaecesAdded=0.5
            SoilArbitrator
        Folder HE2
          Simulation Sorghum_HE2_T1
            Clock: StartDate=1996-12-01; EndDate=1997-06-30
            Summary SummaryFile
            Weather: FileName=Met\HE1996.met
            Zone paddock: Area=1; Slope=0
              Folder Manager folder: same as Validation.Hermitage.HE1_8.HE1.Sorghum_HE1_T1.paddock.Manager folder
              Operations
                1997-01-09  [Irrigation].Apply(54);
                1997-01-16  [Irrigation].Apply(37);
                1997-01-21  [Irrigation].Apply(19);
                1997-01-29  [Irrigation].Apply(20);
                1997-02-07  [Irrigation].Apply(14);
                1997-03-13  [Irrigation].Apply(30);
                1997-03-21  [Irrigation].Apply(46);
                1997-04-10  [Irrigation].Apply(24);
                1997-04-17  [Irrigation].Apply(41);
                1997-05-02  [Irrigation].Apply(25);
                1996-12-20  [Fertiliser].Apply(0, Fertiliser.Types.NO3N, 50);
                1996-12-23  [Fertiliser].Apply(0, Fertiliser.Types.NO3N, 50);
                1996-12-23  [Fertiliser].Apply(10, Fertiliser.Types.NO3N, 50);
              Irrigation
              Fertiliser
              Soil: SoilType=HMM; LocalName=HRS; Site=HRS; NearestTown=Unknown; Region=SE Queensland; NaturalVegetation=Unknown; Latitude=0; Longitude=0
                Water
                  Thickness  BD    AirDry  LL15   DUL   SAT
                  100        1.34  0.08    0.226  0.42  0.45
                  100        1.34  0.19    0.226  0.42  0.45
                  200        1.33  0.23    0.258  0.46  0.47
                  200        1.38  0.26    0.27   0.46  0.47
                  200        1.4   0.26    0.268  0.43  0.45
                  200        1.55  0.28    0.304  0.4   0.41
                  200        1.59  0.25    0.335  0.37  0.38
                  200        1.63  0.28    0.33   0.33  0.37
                  200        1.66  0.3     0.32   0.32  0.37
                  200        1.68  0.31    0.33   0.33  0.36
                  SoilCrop SorghumSoil
                    LL=[0.226, 0.226, 0.258, 0.27, 0.268, 0.304, 0.335, 0.33, 0.32, 0.33]
                    KL=[0.07, 0.07, 0.07, 0.07, 0.06, 0.06, 0.06, 0.05, 0.05, 0.04]
                    XF=[1, 1, 1, 1, 1, 1, 1, 1, 1, 1]
                SoilWater: same as Validation.Hermitage.HE1_8.HE1.Sorghum_HE1_T1.paddock.Soil.SoilWater
                SoilNitrogen: same as Validation.Hermitage.HE1_8.HE1.Sorghum_HE1_T1.paddock.Soil.SoilNitrogen
                SoilOrganicMatter: same as Validation.Hermitage.HE1_8.HE1.Sorghum_HE1_T1.paddock.Soil.SoilOrganicMatter
                Analysis: same as Validation.Hermitage.HE1_8.HE1.Sorghum_HE1_T1.paddock.Soil.Analysis
                Sample Initial Water: Thickness=[100, 100, 200, 200, 200, 200, 200, 200, 200, 200]; NO3Units=ppm; NH4Units=ppm; SWUnits=Volumetric; OCUnits=Total; PHUnits=Water
                  SW=[0.235, 0.252, 0.27, 0.3, 0.268, 0.304, 0.335, 0.33, 0.32, 0.33]
                Sample Initial Nitrogen: NO3Units=ppm; NH4Units=ppm; SWUnits=Volumetric; OCUnits=Total; PHUnits=Water
                  Thickness  NO3        NH4
                  100        0.0999983  0.1
                  100        0.0259996  0.1
                  200        0.0499991  0.1
                  200        0.0579706  0.1
                  200        0.394272   0.1
                  200        0.187095   0.1
                  200        0.511991   0.1
                  200        0.761987   0.1
                  200        0.718988   0.1
                  200        0.699988   0.1
                CERESSoilTemperature
              Plant Sorghum: CropType=name; IsEnding=false; DaysAfterEnding=0
              Report outputfile: EventNames=[Clock].DoReport
                VariableNames:
                  DaysAfterSowing as Das
                  Stage
                  Biomass units g/m^2 as BiomassWt
                  GrainSize
                  GrainNo
                  MaxLAI as LaiAnth
                  RootGreenWt
                  LeafGreenWt
                  StemGreenWt
                  RachisGreenWt
                  GrainGreenWt
                  biomass_n
                  RootGreenN
                  LeafGreenN
                  StemGreenN
                  RachisGreenN
                  GrainGreenN
                  GrainGreenNConc
                  LeafNo
                  ESW
                  no3() as NO3
                  SLN
                  sw()
                  HI
                  TPLA
                  SPLA
                  Yield
                  Biomass
              MicroClimate: a_interception=0; b_interception=0; c_interception=0; d_interception=0; soil_albedo=0; SoilHeatFluxFraction=0; NightInterceptionFraction=0; ReferenceHeight=0
            SurfaceOrganicMatter: InitialResidueName=wheat_stubble; InitialResidueType=wheat; InitialResidueMass=0; InitialStandingFraction=0; InitialCPR=0; InitialCNR=80; FractionFaecesAdded=0.5
            SoilArbitrator
          Simulation Sorghum_HE2_T2
            Clock: StartDate=1996-12-01; EndDate=1997-06-30
            Summary SummaryFile
            Weather: FileName=Met\HE1996.met
            Zone paddock: Area=1; Slope=0
              Folder Manager folder
                Manager Sow SkipRow on a fixed date
                  Date = 1997-01-09
                  Density = 10
                  Depth = 30
                  Cultivar = Buster
                  RowSpacing = 0.5
                  RowConfiguration = solid
                  Ftn = 0
                  script: same as in Validation.Hermitage.HE1_8.HE1.Sorghum_HE1_T1.paddock.Manager folder.Sow SkipRow on a fixed date
                Manager Harvesting rule: same as Validation.Hermitage.HE1_8.HE1.Sorghum_HE1_T1.paddock.Manager folder.Harvesting rule
              Operations
                1997-01-09  [Irrigation].Apply(54);
              Irrigation
              Fertiliser
              Plant Sorghum: CropType=name; IsEnding=false; DaysAfterEnding=0
              Soil: same as Validation.Hermitage.HE1_8.HE2.Sorghum_HE2_T1.paddock.Soil
              Report outputfile: VariableNames=Biomass; EventNames=[Clock].DoReport
              MicroClimate: a_interception=0; b_interception=0; c_interception=0; d_interception=0; soil_albedo=0; SoilHeatFluxFraction=0; NightInterceptionFraction=0; ReferenceHeight=0
            SurfaceOrganicMatter: InitialResidueName=wheat_stubble; InitialResidueType=wheat; InitialResidueMass=0; InitialStandingFraction=0; InitialCPR=0; InitialCNR=80; FractionFaecesAdded=0.5
            SoilArbitrator
          Simulation Sorghum_HE2_T3
            Clock: StartDate=1996-12-01; EndDate=1997-06-30
            Summary SummaryFile
            Weather: FileName=Met\HE1996.met
            Zone paddock: Area=1; Slope=0
              Folder Manager folder
                Manager Sow SkipRow on a fixed date: same as Validation.Hermitage.HE1_8.HE1.Sorghum_HE1_T3.paddock.Manager folder.Sow SkipRow on a fixed date
                Manager Harvesting rule: same as Validation.Hermitage.HE1_8.HE1.Sorghum_HE1_T1.paddock.Manager folder.Harvesting rule
              Operations
                1997-01-09  [Irrigation].Apply(54);
              Irrigation
              Fertiliser
              Plant Sorghum: CropType=name; IsEnding=false; DaysAfterEnding=0
              Soil: same as Validation.Hermitage.HE1_8.HE2.Sorghum_HE2_T1.paddock.Soil
              Report outputfile: VariableNames=Biomass; EventNames=[Clock].DoReport
              MicroClimate: a_interception=0; b_interception=0; c_interception=0; d_interception=0; soil_albedo=0; SoilHeatFluxFraction=0; NightInterceptionFraction=0; ReferenceHeight=0
            SurfaceOrganicMatter: InitialResidueName=wheat_stubble; InitialResidueType=wheat; InitialResidueMass=0; InitialStandingFraction=0; InitialCPR=0; InitialCNR=80; FractionFaecesAdded=0.5
            SoilArbitrator
        Folder HE3
          Simulation Sorghum_HE3_T1
            Clock: StartDate=1997-01-09; EndDate=1997-06-30
            Summary SummaryFile
            Weather: FileName=Met\HE1996.met
            Zone paddock: Area=1; Slope=0
              Folder Manager folder
                Manager Sow SkipRow on a fixed date
                  Date = 1997-01-09
                  Density = 10
                  Depth = 15
                  Cultivar = QL41xQL36
                  RowSpacing = 0.5
                  RowConfiguration = solid
                  Ftn = 0
                  script: same as in Validation.Hermitage.HE1_8.HE1.Sorghum_HE1_T1.paddock.Manager folder.Sow SkipRow on a fixed date
                Manager Harvesting rule: same as Validation.Hermitage.HE1_8.HE1.Sorghum_HE1_T1.paddock.Manager folder.Harvesting rule
              Operations
                1996-12-23  [Irrigation].Apply(69);
                1996-12-27  [Irrigation].Apply(9);
                1997-01-09  [Irrigation].Apply(33);
                1997-01-16  [Irrigation].Apply(28);
                1997-01-31  [Irrigation].Apply(19);
                1996-12-20  [Fertiliser].Apply(33, Fertiliser.Types.NO3N, 50);
                1996-12-23  [Fertiliser].Apply(0, Fertiliser.Types.NO3N, 50);
                1996-12-23  [Fertiliser].Apply(119, Fertiliser.Types.NO3N, 50);
              Fertiliser
              Irrigation
              Soil: SoilType=HMM; LocalName=HRS; Site=HRS; NearestTown=Unknown; Region=SE Queensland; NaturalVegetation=Unknown; Latitude=0; Longitude=0
                Water
                  Thickness  BD    AirDry  LL15   DUL   SAT
                  100        1.34  0.08    0.226  0.42  0.45
                  100        1.34  0.19    0.226  0.42  0.45
                  200        1.33  0.23    0.258  0.46  0.48
                  200        1.38  0.26    0.27   0.46  0.47
                  200        1.4   0.26    0.268  0.43  0.45
                  200        1.55  0.28    0.304  0.4   0.41
                  200        1.59  0.32    0.335  0.37  0.38
                  200        1.63  0.32    0.33   0.33  0.37
                  200        1.66  0.32    0.32   0.32  0.37
                  200        1.68  0.33    0.33   0.33  0.36
                  SoilCrop SorghumSoil
                    LL=[0.226, 0.226, 0.258, 0.27, 0.268, 0.304, 0.335, 0.33, 0.32, 0.33]
                    KL=[0.07, 0.07, 0.07, 0.07, 0.06, 0.06, 0.06, 0.05, 0.05, 0.04]
                    XF=[1, 1, 1, 1, 1, 1, 1, 1, 1, 1]
                SoilWater: same as Validation.Hermitage.HE1_8.HE1.Sorghum_HE1_T1.paddock.Soil.SoilWater
                SoilNitrogen: same as Validation.Hermitage.HE1_8.HE1.Sorghum_HE1_T1.paddock.Soil.SoilNitrogen
                SoilOrganicMatter: same as Validation.Hermitage.HE1_8.HE1.Sorghum_HE1_T1.paddock.Soil.SoilOrganicMatter
                Analysis: same as Validation.Hermitage.HE1_8.HE1.Sorghum_HE1_T1.paddock.Soil.Analysis
                Sample Initial Water: Thickness=[100, 100, 200, 200, 200, 200, 200, 200, 200, 200]; NO3Units=ppm; NH4Units=ppm; SWUnits=Volumetric; OCUnits=Total; PHUnits=Water
                  SW=[0.217, 0.357, 0.375, 0.401, 0.349, 0.351, 0.359, 0.33, 0.322, 0.347]
                Sample Initial Nitrogen: NO3Units=ppm; NH4Units=ppm; SWUnits=Volumetric; OCUnits=Total; PHUnits=Water
                  Thickness  NO3     NH4
                  100        12.233  0.1
                  100        1.867   0.1
                  200        1.4     0.1
                  200        0.867   0.1
                  200        0.9     0.1
                  200        2.833   0.1
                  200        3.833   0.1
                  200        3.9     0.1
                  200        4.233   0.1
                  200        3.767   0.1
                CERESSoilTemperature
              Plant Sorghum: CropType=name; IsEnding=false; DaysAfterEnding=0
              Report outputfile: same as Validation.Hermitage.HE1_8.HE2.Sorghum_HE2_T1.paddock.outputfile
            SurfaceOrganicMatter: InitialResidueName=wheat_stubble; InitialResidueType=wheat; InitialResidueMass=0; InitialStandingFraction=0; InitialCPR=0; InitialCNR=80; FractionFaecesAdded=0.5
            SoilArbitrator
          Simulation Sorghum_HE3_T2
            Clock: StartDate=1997-01-09; EndDate=1997-06-30
            Summary SummaryFile
            Weather: FileName=Met\HE1996.met
            Zone paddock: Area=1; Slope=0
              Folder Manager folder
                Manager Sow SkipRow on a fixed date
                  Date = 1997-01-09
                  Density = 10
                  Depth = 15
                  Cultivar = Buster
                  RowSpacing = 0.5
                  RowConfiguration = solid
                  Ftn = 0
                  script: same as in Validation.Hermitage.HE1_8.HE1.Sorghum_HE1_T1.paddock.Manager folder.Sow SkipRow on a fixed date
                Manager Harvesting rule: same as Validation.Hermitage.HE1_8.HE1.Sorghum_HE1_T1.paddock.Manager folder.Harvesting rule
              Operations: same as Validation.Hermitage.HE1_8.HE3.Sorghum_HE3_T1.paddock.Operations
              Fertiliser
              Irrigation
              Plant Sorghum: CropType=name; IsEnding=false; DaysAfterEnding=0
              Soil: same as Validation.Hermitage.HE1_8.HE3.Sorghum_HE3_T1.paddock.Soil
              Report outputfile: VariableNames=Biomass; EventNames=[Clock].DoReport
            SurfaceOrganicMatter: InitialResidueName=wheat_stubble; InitialResidueType=wheat; InitialResidueMass=0; InitialStandingFraction=0; InitialCPR=0; InitialCNR=80; FractionFaecesAdded=0.5
            SoilArbitrator
          Simulation Sorghum_HE3_T3
            Clock: StartDate=1997-01-09; EndDate=1997-06-30
            Summary SummaryFile
            Weather: FileName=Met\HE1996.met
            Zone paddock: Area=1; Slope=0
              Folder Manager folder
                Manager Sow SkipRow on a fixed date
                  Date = 1997-01-09
                  Density = 10
                  Depth = 15
                  Cultivar = M35-1
                  RowSpacing = 0.5
                  RowConfiguration = solid
                  Ftn = 0
                  script: same as in Validation.Hermitage.HE1_8.HE1.Sorghum_HE1_T1.paddock.Manager folder.Sow SkipRow on a fixed date
                Manager Harvesting rule: same as Validation.Hermitage.HE1_8.HE1.Sorghum_HE1_T1.paddock.Manager folder.Harvesting rule
              Operations: same as Validation.Hermitage.HE1_8.HE3.Sorghum_HE3_T1.paddock.Operations
              Fertiliser
              Irrigation
              Plant Sorghum: CropType=name; IsEnding=false; DaysAfterEnding=0
              Soil: same as Validation.Hermitage.HE1_8.HE3.Sorghum_HE3_T1.paddock.Soil
              Report outputfile: VariableNames=Biomass; EventNames=[Clock].DoReport
            SurfaceOrganicMatter: InitialResidueName=wheat_stubble; InitialResidueType=wheat; InitialResidueMass=0; InitialStandingFraction=0; InitialCPR=0; InitialCNR=80; FractionFaecesAdded=0.5
            SoilArbitrator
        Folder HE4
          Simulation Sorghum_HE4_T1
            Clock: StartDate=1996-12-01; EndDate=1997-06-11
            Summary SummaryFile
            Weather: FileName=Met\HE1996RS.met
            Zone paddock: Area=1; Slope=0
              Folder Manager folder: same as Validation.Hermitage.HE1_8.HE3.Sorghum_HE3_T1.paddock.Manager folder
              Operations
                1996-12-23  [Irrigation].Apply(69);
                1996-12-27  [Irrigation].Apply(9);
                1997-01-09  [Irrigation].Apply(33);
                1997-01-16  [Irrigation].Apply(28);
                1997-01-31  [Irrigation].Apply(19);
                1996-12-20  [Fertiliser].Apply(0, Fertiliser.Types.NO3N, 50);
                1996-12-23  [Fertiliser].Apply(10, Fertiliser.Types.NO3N, 50);
                1997-12-23  [Fertiliser].Apply(0, Fertiliser.Types.NO3N, 50);
              Fertiliser
              Irrigation
              Soil: SoilType=HMM; LocalName=HRS; Site=HRS; NearestTown=Unknown; Region=SE Queensland; NaturalVegetation=Unknown; Latitude=0; Longitude=0
                Water: same as Validation.Hermitage.HE1_8.HE1.Sorghum_HE1_T1.paddock.Soil.Water
                SoilWater: same as Validation.Hermitage.HE1_8.HE1.Sorghum_HE1_T1.paddock.Soil.SoilWater
                SoilNitrogen: same as Validation.Hermitage.HE1_8.HE1.Sorghum_HE1_T1.paddock.Soil.SoilNitrogen
                SoilOrganicMatter: same as Validation.Hermitage.HE1_8.HE1.Sorghum_HE1_T1.paddock.Soil.SoilOrganicMatter
                Analysis: same as Validation.Hermitage.HE1_8.HE1.Sorghum_HE1_T1.paddock.Soil.Analysis
                InitialWater Initial Water: PercentMethod=0; FractionFull=0.6
                Sample Initial Nitrogen: NO3Units=ppm; NH4Units=ppm; SWUnits=Volumetric; OCUnits=Total; PHUnits=Water
                  Thickness  NO3      NH4
                  100        18.4607  0.468732
                  100        2.89869  0.468732
                  200        2.18866  0.468732
                  200        1.59756  0.468732
                  200        1.95258  0.468732
                  200        2.60403  0.468732
                  200        6.44883  0.468732
                  200        10.0593  0.468732
                  200        10.2954  0.468732
                  200        12.8994  0.468732
                CERESSoilTemperature
              Plant Sorghum: CropType=name; IsEnding=false; DaysAfterEnding=0
              Report outputfile: same as Validation.Hermitage.HE1_8.HE2.Sorghum_HE2_T1.paddock.outputfile
            SurfaceOrganicMatter: InitialResidueName=wheat_stubble; InitialResidueType=wheat; InitialResidueMass=0; InitialStandingFraction=0; InitialCPR=0; InitialCNR=80; FractionFaecesAdded=0.5
            SoilArbitrator
          Simulation Sorghum_HE4_T2
            Clock: StartDate=1996-12-01; EndDate=1997-06-30
            Summary SummaryFile
            Weather: FileName=Met\HE1996RS.met
            Zone paddock: Area=1; Slope=0
              Folder Manager folder: same as Validation.Hermitage.HE1_8.HE1.Sorghum_HE1_T2.paddock.Manager folder
              Operations: same as Validation.Hermitage.HE1_8.HE4.Sorghum_HE4_T1.paddock.Operations
              Fertiliser
              Irrigation
              Plant Sorghum: CropType=name; IsEnding=false; DaysAfterEnding=0
              Soil: same as Validation.Hermitage.HE1_8.HE4.Sorghum_HE4_T1.paddock.Soil
              Report outputfile: VariableNames=Biomass; EventNames=[Clock].DoReport
            SurfaceOrganicMatter: InitialResidueName=wheat_stubble; InitialResidueType=wheat; InitialResidueMass=0; InitialStandingFraction=0; InitialCPR=0; InitialCNR=80; FractionFaecesAdded=0.5
            SoilArbitrator
          Simulation Sorghum_HE4_T3
            Clock: StartDate=1996-12-01; EndDate=1997-06-30
            Summary SummaryFile
            Weather: FileName=Met\HE1996RS.met
            Zone paddock: Area=1; Slope=0
              Folder Manager folder: same as Validation.Hermitage.HE1_8.HE2.Sorghum_HE2_T3.paddock.Manager folder
              Operations: same as Validation.Hermitage.HE1_8.HE4.Sorghum_HE4_T1.paddock.Operations
              Fertiliser
              Irrigation
              Plant Sorghum: CropType=name; IsEnding=false; DaysAfterEnding=0
              Soil: SoilType=HMM; Site=HRS; NearestTown=Unknown; Region=SE Queensland; NaturalVegetation=Unknown; Latitude=0; Longitude=0
                Water: same as Validation.Hermitage.HE1_8.HE1.Sorghum_HE1_T1.paddock.Soil.Water
                SoilWater: same as Validation.Hermitage.HE1_8.HE1.Sorghum_HE1_T1.paddock.Soil.SoilWater
                SoilNitrogen: same as Validation.Hermitage.HE1_8.HE1.Sorghum_HE1_T1.paddock.Soil.SoilNitrogen
                SoilOrganicMatter: same as Validation.Hermitage.HE1_8.HE1.Sorghum_HE1_T1.paddock.Soil.SoilOrganicMatter
                Analysis: same as Validation.Hermitage.HE1_8.HE1.Sorghum_HE1_T1.paddock.Soil.Analysis
                InitialWater Initial Water: PercentMethod=0; FractionFull=0.6
                Sample Initial Nitrogen: same as Validation.Hermitage.HE1_8.HE4.Sorghum_HE4_T1.paddock.Soil.Initial Nitrogen
                CERESSoilTemperature
              Report outputfile: VariableNames=Biomass; EventNames=[Clock].DoReport
            SurfaceOrganicMatter: InitialResidueName=wheat_stubble; InitialResidueType=wheat; InitialResidueMass=0; InitialStandingFraction=0; InitialCPR=0; InitialCNR=80; FractionFaecesAdded=0.5
            SoilArbitrator
        Folder HE5
          Simulation Sorghum_HE5_T1
            Clock: StartDate=1997-11-18; EndDate=1998-04-15
            Summary SummaryFile
            Weather: FileName=Met\HE1997.met
            Zone paddock: Area=1; Slope=0
              Folder Manager folder
                Manager Sow SkipRow on a fixed date
                  Date = 1997-11-27
                  Density = 10
                  Depth = 30
                  Cultivar = Buster
                  RowSpacing = 0.5
                  RowConfiguration = solid
                  Ftn = 0.1
                  script: same as in Validation.Hermitage.HE1_8.HE1.Sorghum_HE1_T1.paddock.Manager folder.Sow SkipRow on a fixed date
                Manager Harvesting rule: same as Validation.Hermitage.HE1_8.HE1.Sorghum_HE1_T1.paddock.Manager folder.Harvesting rule
              Operations
                1997-11-28  [Irrigation].Apply(16);
                1997-12-02  [Irrigation].Apply(25);
                1997-12-04  [Irrigation].Apply(13);
                1997-12-08  [Irrigation].Apply(21);
                1997-12-18  [Irrigation].Apply(28);
                1998-01-06  [Irrigation].Apply(26);
                1998-01-12  [Irrigation].Apply(46);
                1998-01-27  [Irrigation].Apply(25);
                1998-02-20  [Irrigation].Apply(26);
                1998-02-27  [Irrigation].Apply(55);
                1998-03-13  [Irrigation].Apply(22);
                1998-03-18  [Irrigation].Apply(39);
                1998-03-20  [Irrigation].Apply(21);
                1997-11-26  [Fertiliser].Apply(3, Fertiliser.Types.NO3N, 50);
                1998-02-20  [Fertiliser].Apply(59, Fertiliser.Types.NO3N, 50);
              Fertiliser
              Irrigation
              Soil: SoilType=HMM; Site=HRS; NearestTown=Unknown; Region=SE Queensland; NaturalVegetation=Unknown; Latitude=0; Longitude=0
                Water: same as Validation.Hermitage.HE1_8.HE1.Sorghum_HE1_T1.paddock.Soil.Water
                SoilWater: same as Validation.Hermitage.HE1_8.HE1.Sorghum_HE1_T1.paddock.Soil.SoilWater
                SoilNitrogen: same as Validation.Hermitage.HE1_8.HE1.Sorghum_HE1_T1.paddock.Soil.SoilNitrogen
                SoilOrganicMatter: same as Validation.Hermitage.HE1_8.HE1.Sorghum_HE1_T1.paddock.Soil.SoilOrganicMatter
                Analysis: same as Validation.Hermitage.HE1_8.HE1.Sorghum_HE1_T1.paddock.Soil.Analysis
                Sample Initial Water: Thickness=[100, 100, 200, 200, 200, 200, 200, 200, 200, 200]; NO3Units=ppm; NH4Units=ppm; SWUnits=Volumetric; OCUnits=Total; PHUnits=Water
                  SW=[0.217, 0.357, 0.375, 0.401, 0.349, 0.351, 0.359, 0.33, 0.322, 0.347]
                Sample Initial Nitrogen: NO3Units=ppm; NH4Units=ppm; SWUnits=Volumetric; OCUnits=Total; PHUnits=Water
                  Thickness  NO3     NH4
                  100        8.421   0.1
                  100        8.054   0.1
                  200        7.001   0.1
                  200        3.824   0.1
                  200        2.759   0.1
                  200        3.429   0.1
                  200        8.668   0.1
                  200        11.576  0.1
                  200        8.816   0.1
                  200        11.758  0.1
                CERESSoilTemperature
              Plant Sorghum: CropType=name; IsEnding=false; DaysAfterEnding=0
              Report outputfile: same as Validation.Hermitage.HE1_8.HE2.Sorghum_HE2_T1.paddock.outputfile
            SurfaceOrganicMatter: InitialResidueName=wheat_stubble; InitialResidueType=wheat; InitialResidueMass=0; InitialStandingFraction=0; InitialCPR=0; InitialCNR=80; FractionFaecesAdded=0.5
            SoilArbitrator
          Simulation Sorghum_HE5_T2
            Clock: StartDate=1997-11-18; EndDate=1998-04-15
            Summary SummaryFile
            Weather: FileName=Met\HE1997.met
            Zone paddock: Area=1; Slope=0
              Folder Manager folder
                Manager Sow SkipRow on a fixed date
                  Date = 1997-11-27
                  Density = 10
                  Depth = 30
                  Cultivar = M35-1
                  RowSpacing = 0.5
                  RowConfiguration = solid
                  Ftn = 0.2
                  script: same as in Validation.Hermitage.HE1_8.HE1.Sorghum_HE1_T1.paddock.Manager folder.Sow SkipRow on a fixed date
                Manager Harvesting rule: same as Validation.Hermitage.HE1_8.HE1.Sorghum_HE1_T1.paddock.Manager folder.Harvesting rule
              Operations: same as Validation.Hermitage.HE1_8.HE5.Sorghum_HE5_T1.paddock.Operations
              Fertiliser
              Irrigation
              Plant Sorghum: CropType=name; IsEnding=false; DaysAfterEnding=0
              Soil: SoilType=HMM; LocalName=HRS; Site=HRS; NearestTown=Unknown; Region=SE Queensland; NaturalVegetation=Unknown; Latitude=0; Longitude=0
                Water: same as Validation.Hermitage.HE1_8.HE1.Sorghum_HE1_T1.paddock.Soil.Water
                SoilWater: same as Validation.Hermitage.HE1_8.HE1.Sorghum_HE1_T1.paddock.Soil.SoilWater
                SoilNitrogen: same as Validation.Hermitage.HE1_8.HE1.Sorghum_HE1_T1.paddock.Soil.SoilNitrogen
                SoilOrganicMatter: same as Validation.Hermitage.HE1_8.HE1.Sorghum_HE1_T1.paddock.Soil.SoilOrganicMatter
                Analysis: same as Validation.Hermitage.HE1_8.HE1.Sorghum_HE1_T1.paddock.Soil.Analysis
                Sample Initial Water: Thickness=[100, 100, 200, 200, 200, 200, 200, 200, 200, 200]; NO3Units=ppm; NH4Units=ppm; SWUnits=Volumetric; OCUnits=Total; PHUnits=Water
                  SW=[0.217, 0.357, 0.375, 0.401, 0.349, 0.351, 0.359, 0.33, 0.322, 0.347]
                Sample Initial Nitrogen: same as Validation.Hermitage.HE1_8.HE5.Sorghum_HE5_T1.paddock.Soil.Initial Nitrogen
                CERESSoilTemperature
              Report outputfile: VariableNames=Biomass; EventNames=[Clock].DoReport
            SurfaceOrganicMatter: InitialResidueName=wheat_stubble; InitialResidueType=wheat; InitialResidueMass=0; InitialStandingFraction=0; InitialCPR=0; InitialCNR=80; FractionFaecesAdded=0.5
            SoilArbitrator
          Simulation Sorghum_HE5_T3
            Clock: StartDate=1997-11-18; EndDate=1998-04-15
            Summary SummaryFile
            Weather: FileName=Met\HE1997.met
            Zone paddock: Area=1; Slope=0
              Folder Manager folder
                Manager Sow SkipRow on a fixed date
                  Date = 1997-11-27
                  Density = 10
                  Depth = 30
                  Cultivar = CSH13r
                  RowSpacing = 0.5
                  RowConfiguration = solid
                  Ftn = 0
                  script: same as in Validation.Hermitage.HE1_8.HE1.Sorghum_HE1_T1.paddock.Manager folder.Sow SkipRow on a fixed date
                Manager Harvesting rule: same as Validation.Hermitage.HE1_8.HE1.Sorghum_HE1_T1.paddock.Manager folder.Harvesting rule
              Operations
                1997-11-28  [Irrigation].Apply(16);
                1997-12-02  [Irrigation].Apply(25);
                1997-12-04  [Irrigation].Apply(13);
                1997-12-08  [Irrigation].Apply(21);
                1997-12-18  [Irrigation].Apply(28);
                1998-01-06  [Irrigation].Apply(26);
                1998-01-12  [Irrigation].Apply(46);
                1998-01-27  [Irrigation].Apply(25);
                1998-02-20  [Irrigation].Apply(26);
                1998-02-27  [Irrigation].Apply(55);
                1998-03-13  [Irrigation].Apply(22);
                1998-03-18  [Irrigation].Apply(39);
                1998-03-20  [Irrigation].Apply(21);
                1997-11-26  [Fertiliser].Apply(0, Fertiliser.Types.NO3N, 50);
                1997-11-26  [Fertiliser].Apply(33, Fertiliser.Types.NO3N, 50);
                1998-02-20  [Fertiliser].Apply(59, Fertiliser.Types.NO3N, 50);
              Fertiliser
              Irrigation
              Plant Sorghum: CropType=name; IsEnding=false; DaysAfterEnding=0
              Soil: same as Validation.Hermitage.HE1_8.HE5.Sorghum_HE5_T1.paddock.Soil
              Report outputfile: VariableNames=Biomass; EventNames=[Clock].DoReport
            SurfaceOrganicMatter: InitialResidueName=wheat_stubble; InitialResidueType=wheat; InitialResidueMass=0; InitialStandingFraction=0; InitialCPR=0; InitialCNR=80; FractionFaecesAdded=0.5
            SoilArbitrator
        Folder HE6
          Simulation Sorghum_HE6_T1
            Clock: StartDate=1997-11-18; EndDate=1998-04-15
            Summary SummaryFile
            Weather: FileName=Met\HE1997.met
            Zone paddock: Area=1; Slope=0
              Folder Manager folder
                Manager Sow SkipRow on a fixed date
                  Date = 1997-11-27
                  Density = 10
                  Depth = 30
                  Cultivar = Buster
                  RowSpacing = 0.5
                  RowConfiguration = solid
                  Ftn = 0
                  script: same as in Validation.Hermitage.HE1_8.HE1.Sorghum_HE1_T1.paddock.Manager folder.Sow SkipRow on a fixed date
                Manager Harvesting rule: same as Validation.Hermitage.HE1_8.HE1.Sorghum_HE1_T1.paddock.Manager folder.Harvesting rule
              Operations
                1997-11-28  [Irrigation].Apply(16);
                1997-12-02  [Irrigation].Apply(24);
                1997-12-04  [Irrigation].Apply(13);
                1997-12-08  [Irrigation].Apply(21);
                1997-12-18  [Irrigation].Apply(28);
                1998-01-06  [Irrigation].Apply(26);
                1998-01-12  [Irrigation].Apply(47);
                1998-01-27  [Irrigation].Apply(25);
                1998-02-20  [Irrigation].Apply(20);
                1998-02-27  [Irrigation].Apply(38);
                1998-03-13  [Irrigation].Apply(22);
                1998-03-18  [Irrigation].Apply(40);
                1997-11-26  [Fertiliser].Apply(10, Fertiliser.Types.NO3N, 50);
              Soil: SoilType=HMM; Site=HRS; NearestTown=Unknown; Region=SE Queensland; NaturalVegetation=Unknown; Latitude=0; Longitude=0
                Water: same as Validation.Hermitage.HE1_8.HE1.Sorghum_HE1_T1.paddock.Soil.Water
                SoilWater: same as Validation.Hermitage.HE1_8.HE1.Sorghum_HE1_T1.paddock.Soil.SoilWater
                SoilNitrogen: same as Validation.Hermitage.HE1_8.HE1.Sorghum_HE1_T1.paddock.Soil.SoilNitrogen
                SoilOrganicMatter: same as Validation.Hermitage.HE1_8.HE1.Sorghum_HE1_T1.paddock.Soil.SoilOrganicMatter
                Analysis: same as Validation.Hermitage.HE1_8.HE1.Sorghum_HE1_T1.paddock.Soil.Analysis
                Sample Initial Water: Thickness=[100, 100, 200, 200, 200, 200, 200, 200, 200, 200]; NO3Units=ppm; NH4Units=ppm; SWUnits=Volumetric; OCUnits=Total; PHUnits=Water
                  SW=[0.217, 0.357, 0.375, 0.401, 0.349, 0.351, 0.359, 0.33, 0.322, 0.347]
                Sample Initial Nitrogen: NO3Units=ppm; NH4Units=ppm; SWUnits=Volumetric; OCUnits=Total; PHUnits=Water
                  Thickness  NO3    NH4
                  100        1.493  0.1
                  100        1.633  0.1
                  200        1.233  0.1
                  200        0.9    0.1
                  200        1.1    0.1
                  200        1.467  0.1
                  200        2.516  0.1
                  200        3.067  0.1
                  200        3.012  0.1
                  200        2.976  0.1
                CERESSoilTemperature
              Plant Sorghum: CropType=name; IsEnding=false; DaysAfterEnding=0
              Report outputfile: same as Validation.Hermitage.HE1_8.HE2.Sorghum_HE2_T1.paddock.outputfile
              Fertiliser
              Irrigation
            SurfaceOrganicMatter: InitialResidueName=wheat_stubble; InitialResidueType=wheat; InitialResidueMass=0; InitialStandingFraction=0; InitialCPR=0; InitialCNR=80; FractionFaecesAdded=0.5
            SoilArbitrator
          Simulation Sorghum_HE6_T3
            Clock: StartDate=1997-11-18; EndDate=1998-04-15
            Summary SummaryFile
            Weather: FileName=Met\HE1997.met
            Zone paddock: Area=1; Slope=0
              Folder Manager folder: same as Validation.Hermitage.HE1_8.HE5.Sorghum_HE5_T3.paddock.Manager folder
              Operations: same as Validation.Hermitage.HE1_8.HE6.Sorghum_HE6_T1.paddock.Operations
              Plant Sorghum: CropType=name; IsEnding=false; DaysAfterEnding=0
              Soil: same as Validation.Hermitage.HE1_8.HE6.Sorghum_HE6_T1.paddock.Soil
              Report outputfile: VariableNames=Biomass; EventNames=[Clock].DoReport
              Fertiliser
              Irrigation
            SurfaceOrganicMatter: InitialResidueName=wheat_stubble; InitialResidueType=wheat; InitialResidueMass=0; InitialStandingFraction=0; InitialCPR=0; InitialCNR=80; FractionFaecesAdded=0.5
            SoilArbitrator
        Folder HE7
          Simulation Sorghum_HE7_T1
            Clock: StartDate=1997-11-25; EndDate=1998-04-15
            Summary SummaryFile
            Weather: FileName=Met\HE1997RS.met
            Zone paddock: Area=1; Slope=0
              Folder Manager folder
                Manager Sow SkipRow on a fixed date
                  Date = 1997-11-27
                  Density = 10
                  Depth = 15
                  Cultivar = Buster
                  RowSpacing = 0.5
                  RowConfiguration = solid
                  Ftn = 0
                  script: same as in Validation.Hermitage.HE1_8.HE1.Sorghum_HE1_T1.paddock.Manager folder.Sow SkipRow on a fixed date
                Manager Harvesting rule: same as Validation.Hermitage.HE1_8.HE1.Sorghum_HE1_T1.paddock.Manager folder.Harvesting rule
              Operations
                1997-11-28  [Irrigation].Apply(65);
                1997-12-16  [Irrigation].Apply(90);
                1997-11-26  [Fertiliser].Apply(3, Fertiliser.Types.NO3N, 50);
                1997-11-26  [Fertiliser].Apply(119, Fertiliser.Types.NO3N, 50);
              Soil: SoilType=HMM; Site=HRS; NearestTown=Unknown; Region=SE Queensland; NaturalVegetation=Unknown; Latitude=0; Longitude=0
                Water: same as Validation.Hermitage.HE1_8.HE3.Sorghum_HE3_T1.paddock.Soil.Water
                SoilWater: same as Validation.Hermitage.HE1_8.HE1.Sorghum_HE1_T1.paddock.Soil.SoilWater
                SoilNitrogen: same as Validation.Hermitage.HE1_8.HE1.Sorghum_HE1_T1.paddock.Soil.SoilNitrogen
                SoilOrganicMatter: same as Validation.Hermitage.HE1_8.HE1.Sorghum_HE1_T1.paddock.Soil.SoilOrganicMatter
                Analysis: same as Validation.Hermitage.HE1_8.HE1.Sorghum_HE1_T1.paddock.Soil.Analysis
                Sample Initial nitrogen: NO3Units=ppm; NH4Units=ppm; SWUnits=Volumetric; OCUnits=Total; PHUnits=Water
                  Thickness  NO3     NH4
                  100        25.798  0.1
                  100        6.921   0.1
                  200        9.285   0.1
                  200        2.823   0.1
                  200        2.286   0.1
                  200        3.196   0.1
                  200        3.695   0.1
                  200        4.41    0.1
                  200        2.743   0.1
                  200        4.891   0.1
                Sample Initial water: Thickness=[100, 100, 200, 200, 200, 200, 200, 200, 200, 200]; NO3Units=ppm; NH4Units=ppm; SWUnits=Volumetric; OCUnits=Total; PHUnits=Water
                  SW=[0.307, 0.326, 0.444, 0.429, 0.363, 0.351, 0.336, 0.343, 0.352, 0.347]
                CERESSoilTemperature
              Plant Sorghum: CropType=name; IsEnding=false; DaysAfterEnding=0
              Report outputfile: same as Validation.Hermitage.HE1_8.HE2.Sorghum_HE2_T1.paddock.outputfile
              Fertiliser
              Irrigation
            SurfaceOrganicMatter: InitialResidueName=wheat_stubble; InitialResidueType=wheat; InitialResidueMass=0; InitialStandingFraction=0; InitialCPR=0; InitialCNR=80; FractionFaecesAdded=0.5
            SoilArbitrator
          Simulation Sorghum_HE7_T2
            Clock: StartDate=1997-11-25; EndDate=1998-04-15
            Summary SummaryFile
            Weather: FileName=Met\HE1997RS.met
            Zone paddock: Area=1; Slope=0
              Folder Manager folder
                Manager Sow SkipRow on a fixed date
                  Date = 1997-11-27
                  Density = 10
                  Depth = 15
                  Cultivar = M35-1
                  RowSpacing = 0.5
                  RowConfiguration = solid
                  Ftn = 0
                  script: same as in Validation.Hermitage.HE1_8.HE1.Sorghum_HE1_T1.paddock.Manager folder.Sow SkipRow on a fixed date
                Manager Harvesting rule: same as Validation.Hermitage.HE1_8.HE1.Sorghum_HE1_T1.paddock.Manager folder.Harvesting rule
              Operations
                1997-11-28  [Irrigation].Apply(65);
                1997-12-16  [Irrigation].Apply(90);
                1997-11-26  [Fertiliser].Apply(0, Fertiliser.Types.NO3N, 50);
                1997-11-26  [Fertiliser].Apply(33, Fertiliser.Types.NO3N, 50);
                1997-11-26  [Fertiliser].Apply(119, Fertiliser.Types.NO3N, 50);
              Plant Sorghum: CropType=name; IsEnding=false; DaysAfterEnding=0
              Soil: same as Validation.Hermitage.HE1_8.HE7.Sorghum_HE7_T1.paddock.Soil
              Report outputfile: VariableNames=Biomass; EventNames=[Clock].DoReport
              Fertiliser
              Irrigation
            SurfaceOrganicMatter: InitialResidueName=wheat_stubble; InitialResidueType=wheat; InitialResidueMass=0; InitialStandingFraction=0; InitialCPR=0; InitialCNR=80; FractionFaecesAdded=0.5
            SoilArbitrator
          Simulation Sorghum_HE7_T3
            Clock: StartDate=1997-11-25; EndDate=1998-04-15
            Summary SummaryFile
            Weather: FileName=Met\HE1997RS.met
            Zone paddock: Area=1; Slope=0
              Folder Manager folder
                Manager Sow SkipRow on a fixed date
                  Date = 1997-11-27
                  Density = 10
                  Depth = 15
                  Cultivar = CSH13r
                  RowSpacing = 0.5
                  RowConfiguration = solid
                  Ftn = 0
                  script: same as in Validation.Hermitage.HE1_8.HE1.Sorghum_HE1_T1.paddock.Manager folder.Sow SkipRow on a fixed date
                Manager Harvesting rule: same as Validation.Hermitage.HE1_8.HE1.Sorghum_HE1_T1.paddock.Manager folder.Harvesting rule
              Operations: same as Validation.Hermitage.HE1_8.HE7.Sorghum_HE7_T2.paddock.Operations
              Plant Sorghum: CropType=name; IsEnding=false; DaysAfterEnding=0
              Soil: same as Validation.Hermitage.HE1_8.HE7.Sorghum_HE7_T1.paddock.Soil
              Report outputfile: VariableNames=Biomass; EventNames=[Clock].DoReport
              Fertiliser
              Irrigation
            SurfaceOrganicMatter: InitialResidueName=wheat_stubble; InitialResidueType=wheat; InitialResidueMass=0; InitialStandingFraction=0; InitialCPR=0; InitialCNR=80; FractionFaecesAdded=0.5
            SoilArbitrator
        Folder HE8
          Simulation Sorghum_HE8_T1
            Clock: StartDate=1997-11-25; EndDate=1998-04-15
            Summary SummaryFile
            Weather: FileName=Met\HE1997RS.met
            Zone paddock: Area=1; Slope=0
              Folder Manager folder: same as Validation.Hermitage.HE1_8.HE7.Sorghum_HE7_T1.paddock.Manager folder
              Operations
                1997-11-28  [Irrigation].Apply(65);
                1997-12-16  [Irrigation].Apply(90);
                1997-11-26  [Fertiliser].Apply(3, Fertiliser.Types.NO3N, 50);
                1997-11-26  [Fertiliser].Apply(10, Fertiliser.Types.NO3N, 50);
              Soil: SoilType=HMM; Site=HRS; NearestTown=Unknown; Region=SE Queensland; NaturalVegetation=Unknown; Latitude=0; Longitude=0
                Water: same as Validation.Hermitage.HE1_8.HE3.Sorghum_HE3_T1.paddock.Soil.Water
                SoilWater: same as Validation.Hermitage.HE1_8.HE1.Sorghum_HE1_T1.paddock.Soil.SoilWater
                SoilNitrogen: same as Validation.Hermitage.HE1_8.HE1.Sorghum_HE1_T1.paddock.Soil.SoilNitrogen
                SoilOrganicMatter: same as Validation.Hermitage.HE1_8.HE1.Sorghum_HE1_T1.paddock.Soil.SoilOrganicMatter
                Analysis: same as Validation.Hermitage.HE1_8.HE1.Sorghum_HE1_T1.paddock.Soil.Analysis
                Sample Initial nitrogen: same as Validation.Hermitage.HE1_8.HE7.Sorghum_HE7_T1.paddock.Soil.Initial nitrogen
                Sample Initial water: Thickness=[100, 100, 200, 200, 200, 200, 200, 200, 200, 200]; NO3Units=ppm; NH4Units=ppm; SWUnits=Volumetric; OCUnits=Total; PHUnits=Water
                  SW=[0.294, 0.381, 0.367, 0.306, 0.29, 0.319, 0.33, 0.343, 0.337, 0.344]
                CERESSoilTemperature
              Plant Sorghum: CropType=name; IsEnding=false; DaysAfterEnding=0
              Report outputfile: same as Validation.Hermitage.HE1_8.HE2.Sorghum_HE2_T1.paddock.outputfile
              Fertiliser
              Irrigation
            SurfaceOrganicMatter: InitialResidueName=wheat_stubble; InitialResidueType=wheat; InitialResidueMass=0; InitialStandingFraction=0; InitialCPR=0; InitialCNR=80; FractionFaecesAdded=0.5
            SoilArbitrator
          Simulation Sorghum_HE8_T2
            Clock: StartDate=1997-11-25; EndDate=1998-04-15
            Summary SummaryFile
            Weather: FileName=Met\HE1997RS.met
            Zone paddock: Area=1; Slope=0
              Folder Manager folder: same as Validation.Hermitage.HE1_8.HE7.Sorghum_HE7_T2.paddock.Manager folder
              Operations
                1997-11-28  [Irrigation].Apply(65);
                1997-12-16  [Irrigation].Apply(90);
                1997-11-26  [Fertiliser].Apply(0, Fertiliser.Types.NO3N, 50);
                1997-11-26  [Fertiliser].Apply(33, Fertiliser.Types.NO3N, 50);
                1997-11-26  [Fertiliser].Apply(10, Fertiliser.Types.NO3N, 50);
              Plant Sorghum: CropType=name; IsEnding=false; DaysAfterEnding=0
              Soil: same as Validation.Hermitage.HE1_8.HE8.Sorghum_HE8_T1.paddock.Soil
              Report outputfile: VariableNames=Biomass; EventNames=[Clock].DoReport
              Fertiliser
              Irrigation
            SurfaceOrganicMatter: InitialResidueName=wheat_stubble; InitialResidueType=wheat; InitialResidueMass=0; InitialStandingFraction=0; InitialCPR=0; InitialCNR=80; FractionFaecesAdded=0.5
            SoilArbitrator
          Simulation Sorghum_HE8_T3
            Clock: StartDate=1997-11-25; EndDate=1998-04-15
            Summary SummaryFile
            Weather: FileName=Met\HE1997RS.met
            Zone paddock: Area=1; Slope=0
              Folder Manager folder: same as Validation.Hermitage.HE1_8.HE7.Sorghum_HE7_T3.paddock.Manager folder
              Operations: same as Validation.Hermitage.HE1_8.HE8.Sorghum_HE8_T2.paddock.Operations
              Plant Sorghum: CropType=name; IsEnding=false; DaysAfterEnding=0
              Soil: same as Validation.Hermitage.HE1_8.HE8.Sorghum_HE8_T1.paddock.Soil
              Report outputfile: VariableNames=Biomass; EventNames=[Clock].DoReport
              Fertiliser
              Irrigation
            SurfaceOrganicMatter: InitialResidueName=wheat_stubble; InitialResidueType=wheat; InitialResidueMass=0; InitialStandingFraction=0; InitialCPR=0; InitialCNR=80; FractionFaecesAdded=0.5
            SoilArbitrator
    Folder Icrisat
      Folder BW
        Folder BW5
          Simulation Sorghum_BW5_GxE_T1
            Clock: StartDate=1996-09-26; EndDate=1997-02-20
            Summary SummaryFile
            Weather: FileName=Met\BW5_GxE.met
            Zone paddock: Area=1; Slope=0
              Folder Manager folder
                Manager Sow SkipRow on a fixed date
                  Date = 1996-10-10
                  Density = 10
                  Depth = 30
                  Cultivar = M35-1
                  RowSpacing = 0.5
                  RowConfiguration = solid
                  Ftn = 0
```csharp
using System;
using Models.Core;
using Models.PMF;

using APSIM.Shared.Utilities;

namespace Models
{
	[Serializable]
	public class Script : Model
	{
		[Description("Enter sowing date (dd/mm/yyyy) : ")]
		public DateTime Date { get; set; }

		[Description("Enter sowing density  (plants/m2) : ")]
		public double Density { get; set; }

		[Description("Enter sowing depth  (mm) : ")]
		public double Depth { get; set; }

		[Description("Enter cultivar : ")]
		[Display(Type = DisplayType.CultivarName)]
		public string Cultivar { get; set; } // QL41xQL36

		[Description("Enter row spacing (m) : ")]
		public double RowSpacing { get; set; }

		[Description("Enter skip row configuration : ")]
		public RowConfigurationType RowConfiguration { get; set; }

		[Description("Enter Fertile Tiller No. : ")]
		public double Ftn { get; set; }

		public enum RowConfigurationType 
		{
			solid, single, _double /*replaces double*/
		}

		[Link]
		private Zone paddock;

		[Link]
		private Clock clock;

		[Link]
		private IPlant crop;

		[EventSubscribe("DoManagement")]
		private void OnDoManagement(object sender, EventArgs e)
		{
			if (clock.Today == Date /* && isFallow */)
			{
				double population = Density * paddock.Area;
				crop.Sow(Cultivar, population, Depth, RowSpacing, budNumber: Ftn, rowConfig: (double)RowConfiguration + 1);
				/*
	            if (paddock_is_fallow() = 1 and today = date('[date]')) then
              		[crop] sow plants =[density], sowing_depth = [depth], cultivar = [cultivar], row_spacing = [row_spacing], skip = [RowConfiguration], tiller_no_fertile = [ftn] ()
            	endif
            	if (paddock_is_fallow() = 0) then
               		!outputfile do_output
            	endif
				*/
			}
		}
	}
}
```
                Manager Harvesting rule: same as Validation.Hermitage.HE1_8.HE1.Sorghum_HE1_T1.paddock.Manager folder.Harvesting rule
              Operations
                1996-11-21  [Irrigation].Apply(29);
                1996-12-02  [Irrigation].Apply(45);
                1996-12-11  [Irrigation].Apply(45);
                1997-01-08  [Irrigation].Apply(65);
                1997-01-09  [Irrigation].Apply(50);
                1996-09-27  [Fertiliser].Apply(10, Fertiliser.Types.NO3N, 50);
                1996-10-09  [Fertiliser].Apply(13, Fertiliser.Types.NO3N, 50);
                1996-10-16  [Fertiliser].Apply(99, Fertiliser.Types.NO3N, 50);
                1996-11-11  [Fertiliser].Apply(59, Fertiliser.Types.NO3N, 50);
                1996-12-11  [Fertiliser].Apply(59, Fertiliser.Types.NO3N, 50);
              Soil: SoilType=BW5; LocalName=ICRISAT; Site=ICRISAT; NearestTown=Unknown; Region=Hyderabad; NaturalVegetation=Unknown; Latitude=0; Longitude=0
                Water
                  Thickness  BD    AirDry  LL15  DUL   SAT
                  150        1.32  0.1     0.21  0.42  0.44
                  150        1.49  0.21    0.22  0.39  0.41
                  150        1.54  0.23    0.24  0.36  0.38
                  150        1.54  0.23    0.24  0.36  0.38
                  150        1.49  0.22    0.23  0.39  0.41
                  150        1.47  0.22    0.23  0.42  0.44
                  150        1.38  0.22    0.23  0.43  0.45
                  150        1.37  0.21    0.22  0.43  0.45
                  150        1.33  0.22    0.22  0.45  0.47
                  150        1.35  0.22    0.22  0.43  0.45
                  150        1.35  0.22    0.22  0.43  0.45
                  150        1.33  0.22    0.22  0.45  0.47
                  150        1.33  0.22    0.22  0.45  0.47
                  SoilCrop SorghumSoil
                    LL=[0.21, 0.22, 0.24, 0.24, 0.23, 0.23, 0.23, 0.22, 0.22, 0.22, 0.22, 0.22, 0.22]
                    KL=[0.07, 0.07, 0.07, 0.07, 0.07, 0.07, 0.07, 0.07, 0.07, 0.04, 0.04, 0.04, 0.04]
                    XF=[1, 1, 1, 1, 1, 1, 1, 1, 1, 1, 1, 1, 1]
                SoilWater: SummerDate=1-Nov; SummerU=6; SummerCona=3.5; WinterDate=1-Apr; WinterU=6; WinterCona=3.5; DiffusConst=40; DiffusSlope=16; Salb=0.11; CN2Bare=85; CNRed=0.8; CNCov=0.2; max_pond=0; ResidueInterception=0
                  Thickness=[150, 150, 150, 150, 150, 150, 150, 150, 150, 150, 150, 150, 150]
                  SWCON=[0.16, 0.11, 0.14, 0.14, 0.11, 0.11, 0.1, 0.1, 0.1, 0.12, 0.12, 0.1, 0.1]
                SoilNitrogen: same as Validation.Hermitage.HE1_8.HE1.Sorghum_HE1_T1.paddock.Soil.SoilNitrogen
                SoilOrganicMatter: RootCN=45; EnrACoeff=7.4; EnrBCoeff=0.2; OCUnits=Total
                  Thickness  OC    SoilCN  FBiom  FInert  RootWt
                  150        0.45  14.5    0.05   0.39    216.875
                  150        0.32  14.5    0.02   0.47    172.182
                  150        0.29  14.5    0.01   0.52    136.699
                  150        0.23  14.5    0.01   0.62    108.529
                  150        0.27  14.5    0.01   0.74    86.1633
                  150        0.3   14.5    0.01   0.83    68.407
                  150        0.23  14.5    0.01   0.93    54.3098
                  150        0.22  14.5    0.01   0.93    43.1178
                  150        0.19  14.5    0.01   0.93    34.2322
                  150        0.12  14.5    0.01   0.93    27.1777
                  150        0.12  14.5    0.01   0.93    21.577
                  150        0.14  14.5    0.01   0.93    17.1305
                  150        0.14  14.5    0.01   0.93    13.6003
                Analysis: PHUnits=Water; BoronUnits=0
                  Thickness=[150, 150, 150, 150, 150, 150, 150, 150, 150, 150, 150, 150, 150]
                  PH=[8.35, 8.52, 8.8, 8.95, 9, 9, 9, 9, 8.92, 8.97, 8.97, 8.82, 8.82]
                Sample Initial Water: NO3Units=ppm; NH4Units=ppm; SWUnits=Volumetric; OCUnits=Total; PHUnits=Water
                  Thickness=[150, 150, 150, 150, 150, 150, 150, 150, 150, 150, 150, 150, 150]
                  SW=[0.281, 0.338, 0.353, 0.36, 0.39, 0.407, 0.43, 0.43, 0.45, 0.43, 0.43, 0.45, 0.45]
                Sample Initial Nitrogen: NO3Units=ppm; NH4Units=ppm; SWUnits=Volumetric; OCUnits=Total; PHUnits=Water
                  Thickness  NO3  NH4
                  150        6.1  0.1
                  150        5.6  0.1
                  150        4    0.1
                  150        3.3  0.1
                  150        3.2  0.1
                  150        3.7  0.1
                  150        5    0.1
                  150        3    0.1
                  150        3    0.1
                  150        2    0.1
                  150        2    0.1
                  150        2    0.1
                  150        2    0.1
                CERESSoilTemperature
              Plant Sorghum: CropType=name; IsEnding=false; DaysAfterEnding=0
              Report outputfile: same as Validation.Hermitage.HE1_8.HE2.Sorghum_HE2_T1.paddock.outputfile
              Fertiliser
              Irrigation
            SurfaceOrganicMatter: InitialResidueName=wheat_stubble; InitialResidueType=wheat; InitialResidueMass=0; InitialStandingFraction=0; InitialCPR=0; InitialCNR=80; FractionFaecesAdded=0.5
            SoilArbitrator
          Simulation Sorghum_BW5_GxE_T2
            Clock: StartDate=1996-09-26; EndDate=1997-02-20
            Summary SummaryFile
            Weather: FileName=Met\BW5_GxE.met
            Zone paddock: Area=1; Slope=0
              Folder Manager folder
                Manager Sow SkipRow on a fixed date
                  Date = 1996-10-10
                  Density = 10
                  Depth = 30
                  Cultivar = CSH13r
                  RowSpacing = 0.5
                  RowConfiguration = solid
                  Ftn = 0
                  script: same as in Validation.Icrisat.BW.BW5.Sorghum_BW5_GxE_T1.paddock.Manager folder.Sow SkipRow on a fixed date
                Manager Harvesting rule: same as Validation.Hermitage.HE1_8.HE1.Sorghum_HE1_T1.paddock.Manager folder.Harvesting rule
              Operations: same as Validation.Icrisat.BW.BW5.Sorghum_BW5_GxE_T1.paddock.Operations
              Soil: SoilType=BW5; Site=ICRISAT; NearestTown=Unknown; Region=Hyderabad; NaturalVegetation=Unknown; Latitude=0; Longitude=0
                Water: same as Validation.Icrisat.BW.BW5.Sorghum_BW5_GxE_T1.paddock.Soil.Water
                SoilWater: same as Validation.Icrisat.BW.BW5.Sorghum_BW5_GxE_T1.paddock.Soil.SoilWater
                SoilNitrogen: same as Validation.Hermitage.HE1_8.HE1.Sorghum_HE1_T1.paddock.Soil.SoilNitrogen
                SoilOrganicMatter: same as Validation.Icrisat.BW.BW5.Sorghum_BW5_GxE_T1.paddock.Soil.SoilOrganicMatter
                Analysis: same as Validation.Icrisat.BW.BW5.Sorghum_BW5_GxE_T1.paddock.Soil.Analysis
                Sample Initial Water: same as Validation.Icrisat.BW.BW5.Sorghum_BW5_GxE_T1.paddock.Soil.Initial Water
                Sample Initial Nitrogen: same as Validation.Icrisat.BW.BW5.Sorghum_BW5_GxE_T1.paddock.Soil.Initial Nitrogen
                CERESSoilTemperature
              Plant Sorghum: CropType=name; IsEnding=false; DaysAfterEnding=0
              Report outputfile: VariableNames=Biomass; EventNames=[Clock].DoReport
              Fertiliser
              Irrigation
            SurfaceOrganicMatter: InitialResidueName=wheat_stubble; InitialResidueType=wheat; InitialResidueMass=0; InitialStandingFraction=0; InitialCPR=0; InitialCNR=80; FractionFaecesAdded=0.5
            SoilArbitrator
          Simulation Sorghum_BW5_GxE_T3
            Clock: StartDate=1996-09-26; EndDate=1997-02-20
            Summary SummaryFile
            Weather: FileName=Met\BW5_GxE.met
            Zone paddock: Area=1; Slope=0
              Folder Manager folder
                Manager Sow SkipRow on a fixed date
                  Date = 1996-10-10
                  Density = 10
                  Depth = 30
                  Cultivar = ATx623xRTx430
                  RowSpacing = 0.5
                  RowConfiguration = solid
                  Ftn = 0
                  script: same as in Validation.Icrisat.BW.BW5.Sorghum_BW5_GxE_T1.paddock.Manager folder.Sow SkipRow on a fixed date
                Manager Harvesting rule: same as Validation.Hermitage.HE1_8.HE1.Sorghum_HE1_T1.paddock.Manager folder.Harvesting rule
              Operations: same as Validation.Icrisat.BW.BW5.Sorghum_BW5_GxE_T1.paddock.Operations
              Soil: same as Validation.Icrisat.BW.BW5.Sorghum_BW5_GxE_T2.paddock.Soil
              Plant Sorghum: CropType=name; IsEnding=false; DaysAfterEnding=0
              Report outputfile: VariableNames=Biomass; EventNames=[Clock].DoReport
              Fertiliser
              Irrigation
            SurfaceOrganicMatter: InitialResidueName=wheat_stubble; InitialResidueType=wheat; InitialResidueMass=0; InitialStandingFraction=0; InitialCPR=0; InitialCNR=80; FractionFaecesAdded=0.5
            SoilArbitrator
          Simulation Sorghum_BW5_GxE_T4
            Clock: StartDate=1996-09-26; EndDate=1997-02-20
            Summary SummaryFile
            Weather: FileName=Met\BW5_GxE.met
            Zone paddock: Area=1; Slope=0
              Folder Manager folder
                Manager Sow SkipRow on a fixed date
                  Date = 1996-10-10
                  Density = 10
                  Depth = 30
                  Cultivar = QL41xQL36
                  RowSpacing = 0.5
                  RowConfiguration = solid
                  Ftn = 0
                  script: same as in Validation.Icrisat.BW.BW5.Sorghum_BW5_GxE_T1.paddock.Manager folder.Sow SkipRow on a fixed date
                Manager Harvesting rule: same as Validation.Hermitage.HE1_8.HE1.Sorghum_HE1_T1.paddock.Manager folder.Harvesting rule
              Operations: same as Validation.Icrisat.BW.BW5.Sorghum_BW5_GxE_T1.paddock.Operations
              Soil: same as Validation.Icrisat.BW.BW5.Sorghum_BW5_GxE_T2.paddock.Soil
              Plant Sorghum: CropType=name; IsEnding=false; DaysAfterEnding=0
              Report outputfile: VariableNames=Biomass; EventNames=[Clock].DoReport
              Fertiliser
              Irrigation
            SurfaceOrganicMatter: InitialResidueName=wheat_stubble; InitialResidueType=wheat; InitialResidueMass=0; InitialStandingFraction=0; InitialCPR=0; InitialCNR=80; FractionFaecesAdded=0.5
            SoilArbitrator
          Simulation Sorghum_BW5_GxE_T5
            Clock: StartDate=1996-09-26; EndDate=1997-02-20
            Summary SummaryFile
            Weather: FileName=Met\BW5_GxE.met
            Zone paddock: Area=1; Slope=0
              Folder Manager folder: same as Validation.Icrisat.BW.BW5.Sorghum_BW5_GxE_T1.paddock.Manager folder
              Operations
                1996-09-27  [Fertiliser].Apply(10, Fertiliser.Types.NO3N, 50);
                1996-10-09  [Fertiliser].Apply(13, Fertiliser.Types.NO3N, 50);
                1996-10-16  [Fertiliser].Apply(99, Fertiliser.Types.NO3N, 50);
              Soil: same as Validation.Icrisat.BW.BW5.Sorghum_BW5_GxE_T2.paddock.Soil
              Plant Sorghum: CropType=name; IsEnding=false; DaysAfterEnding=0
              Report outputfile: VariableNames=Biomass; EventNames=[Clock].DoReport
              Fertiliser
              Irrigation
            SurfaceOrganicMatter: InitialResidueName=wheat_stubble; InitialResidueType=wheat; InitialResidueMass=0; InitialStandingFraction=0; InitialCPR=0; InitialCNR=80; FractionFaecesAdded=0.5
            SoilArbitrator
          Simulation Sorghum_BW5_GxE_T6
            Clock: StartDate=1996-09-26; EndDate=1997-02-20
            Summary SummaryFile
            Weather: FileName=Met\BW5_GxE.met
            Zone paddock: Area=1; Slope=0
              Folder Manager folder: same as Validation.Icrisat.BW.BW5.Sorghum_BW5_GxE_T2.paddock.Manager folder
              Operations: same as Validation.Icrisat.BW.BW5.Sorghum_BW5_GxE_T5.paddock.Operations
              Soil: same as Validation.Icrisat.BW.BW5.Sorghum_BW5_GxE_T2.paddock.Soil
              Plant Sorghum: CropType=name; IsEnding=false; DaysAfterEnding=0
              Report outputfile: VariableNames=Biomass; EventNames=[Clock].DoReport
              Fertiliser
              Irrigation
            SurfaceOrganicMatter: InitialResidueName=wheat_stubble; InitialResidueType=wheat; InitialResidueMass=0; InitialStandingFraction=0; InitialCPR=0; InitialCNR=80; FractionFaecesAdded=0.5
            SoilArbitrator
          Simulation Sorghum_BW5_GxE_T7
            Clock: StartDate=1996-09-26; EndDate=1997-02-20
            Summary SummaryFile
            Weather: FileName=Met\BW5_GxE.met
            Zone paddock: Area=1; Slope=0
              Folder Manager folder: same as Validation.Icrisat.BW.BW5.Sorghum_BW5_GxE_T3.paddock.Manager folder
              Operations: same as Validation.Icrisat.BW.BW5.Sorghum_BW5_GxE_T5.paddock.Operations
              Soil: same as Validation.Icrisat.BW.BW5.Sorghum_BW5_GxE_T2.paddock.Soil
              Plant Sorghum: CropType=name; IsEnding=false; DaysAfterEnding=0
              Report outputfile: VariableNames=Biomass; EventNames=[Clock].DoReport
              Fertiliser
              Irrigation
            SurfaceOrganicMatter: InitialResidueName=wheat_stubble; InitialResidueType=wheat; InitialResidueMass=0; InitialStandingFraction=0; InitialCPR=0; InitialCNR=80; FractionFaecesAdded=0.5
            SoilArbitrator
          Simulation Sorghum_BW5_GxE_T8
            Clock: StartDate=1996-09-26; EndDate=1997-02-20
            Summary SummaryFile
            Weather: FileName=Met\BW5_GxE.met
            Zone paddock: Area=1; Slope=0
              Folder Manager folder: same as Validation.Icrisat.BW.BW5.Sorghum_BW5_GxE_T4.paddock.Manager folder
              Operations: same as Validation.Icrisat.BW.BW5.Sorghum_BW5_GxE_T5.paddock.Operations
              Soil: same as Validation.Icrisat.BW.BW5.Sorghum_BW5_GxE_T2.paddock.Soil
              Plant Sorghum: CropType=name; IsEnding=false; DaysAfterEnding=0
              Report outputfile: VariableNames=Biomass; EventNames=[Clock].DoReport
              Fertiliser
              Irrigation
            SurfaceOrganicMatter: InitialResidueName=wheat_stubble; InitialResidueType=wheat; InitialResidueMass=0; InitialStandingFraction=0; InitialCPR=0; InitialCNR=80; FractionFaecesAdded=0.5
            SoilArbitrator
          Simulation Sorghum_BW5_GxE_T9
            Clock: StartDate=1996-09-26; EndDate=1997-02-20
            Summary SummaryFile
            Weather: FileName=Met\BW5_GxE.met
            Zone paddock: Area=1; Slope=0
              Folder Manager folder: same as Validation.Icrisat.BW.BW5.Sorghum_BW5_GxE_T1.paddock.Manager folder
              Operations
                1996-09-27  [Fertiliser].Apply(10, Fertiliser.Types.NO3N, 50);
              Soil: same as Validation.Icrisat.BW.BW5.Sorghum_BW5_GxE_T2.paddock.Soil
              Plant Sorghum: CropType=name; IsEnding=false; DaysAfterEnding=0
              Report outputfile: VariableNames=Biomass; EventNames=[Clock].DoReport
              Fertiliser
              Irrigation
            SurfaceOrganicMatter: InitialResidueName=wheat_stubble; InitialResidueType=wheat; InitialResidueMass=0; InitialStandingFraction=0; InitialCPR=0; InitialCNR=80; FractionFaecesAdded=0.5
            SoilArbitrator
          Simulation Sorghum_BW5_GxE_T10
            Clock: StartDate=1996-09-26; EndDate=1997-02-20
            Summary SummaryFile
            Weather: FileName=Met\BW5_GxE.met
            Zone paddock: Area=1; Slope=0
              Folder Manager folder: same as Validation.Icrisat.BW.BW5.Sorghum_BW5_GxE_T2.paddock.Manager folder
              Operations
                1996-09-27  [Fertiliser].Apply(10, Fertiliser.Types.NO3N, 50);
              Soil: same as Validation.Icrisat.BW.BW5.Sorghum_BW5_GxE_T2.paddock.Soil
              Plant Sorghum: CropType=name; IsEnding=false; DaysAfterEnding=0
              Report outputfile: VariableNames=Biomass; EventNames=[Clock].DoReport
              Fertiliser
              Irrigation
            SurfaceOrganicMatter: InitialResidueName=wheat_stubble; InitialResidueType=wheat; InitialResidueMass=0; InitialStandingFraction=0; InitialCPR=0; InitialCNR=80; FractionFaecesAdded=0.5
            SoilArbitrator
          Simulation Sorghum_BW5_GxE_T11
            Clock: StartDate=1996-09-26; EndDate=1997-02-20
            Summary SummaryFile
            Weather: FileName=Met\BW5_GxE.met
            Zone paddock: Area=1; Slope=0
              Folder Manager folder: same as Validation.Icrisat.BW.BW5.Sorghum_BW5_GxE_T3.paddock.Manager folder
              Operations
                1996-09-27  [Fertiliser].Apply(10, Fertiliser.Types.NO3N, 50);
              Soil: same as Validation.Icrisat.BW.BW5.Sorghum_BW5_GxE_T2.paddock.Soil
              Plant Sorghum: CropType=name; IsEnding=false; DaysAfterEnding=0
              Report outputfile: VariableNames=Biomass; EventNames=[Clock].DoReport
              Fertiliser
              Irrigation
            SurfaceOrganicMatter: InitialResidueName=wheat_stubble; InitialResidueType=wheat; InitialResidueMass=0; InitialStandingFraction=0; InitialCPR=0; InitialCNR=80; FractionFaecesAdded=0.5
            SoilArbitrator
          Simulation Sorghum_BW5_GxE_T12
            Clock: StartDate=1996-09-26; EndDate=1997-02-20
            Summary SummaryFile
            Weather: FileName=Met\BW5_GxE.met
            Zone paddock: Area=1; Slope=0
              Folder Manager folder: same as Validation.Icrisat.BW.BW5.Sorghum_BW5_GxE_T4.paddock.Manager folder
              Operations
                1996-09-27  [Fertiliser].Apply(10, Fertiliser.Types.NO3N, 50);
              Soil: same as Validation.Icrisat.BW.BW5.Sorghum_BW5_GxE_T2.paddock.Soil
              Plant Sorghum: CropType=name; IsEnding=false; DaysAfterEnding=0
              Report outputfile: VariableNames=Biomass; EventNames=[Clock].DoReport
              Fertiliser
              Irrigation
            SurfaceOrganicMatter: InitialResidueName=wheat_stubble; InitialResidueType=wheat; InitialResidueMass=0; InitialStandingFraction=0; InitialCPR=0; InitialCNR=80; FractionFaecesAdded=0.5
            SoilArbitrator
        Folder BW8
          Simulation Sorghum_BW8_GxE_T1
            Clock: StartDate=1996-09-26; EndDate=1997-02-20
            Summary SummaryFile
            Weather: FileName=Met\BW8_GxE.met
            Zone paddock: Area=1; Slope=0
              Folder Manager folder
                Manager Sow SkipRow on a fixed date
                  Date = 1996-10-07
                  Density = 10
                  Depth = 0.5
                  Cultivar = M35-1
                  RowSpacing = 0.5
                  RowConfiguration = solid
                  Ftn = 0
                  script: same as in Validation.Hermitage.HE1_8.HE1.Sorghum_HE1_T1.paddock.Manager folder.Sow SkipRow on a fixed date
                Manager Harvesting rule: same as Validation.Hermitage.HE1_8.HE1.Sorghum_HE1_T1.paddock.Manager folder.Harvesting rule
              Operations
                1996-11-19  [Irrigation].Apply(28);
                1996-11-28  [Irrigation].Apply(58);
                1996-12-10  [Irrigation].Apply(49);
                1996-12-24  [Irrigation].Apply(57);
                1997-01-07  [Irrigation].Apply(67);
                1996-09-25  [Fertiliser].Apply(20, Fertiliser.Types.NO3N, 50);
                1996-10-17  [Fertiliser].Apply(99, Fertiliser.Types.NO3N, 50);
                1996-11-06  [Fertiliser].Apply(59, Fertiliser.Types.NO3N, 50);
                1996-12-10  [Fertiliser].Apply(59, Fertiliser.Types.NO3N, 50);
              Report outputfile: same as Validation.Hermitage.HE1_8.HE2.Sorghum_HE2_T1.paddock.outputfile
              Soil: SoilType=BW8; Site=ICRISAT; NearestTown=Unknown; Region=Hyderabad; NaturalVegetation=Unknown; Latitude=0; Longitude=0
                Water
                  Thickness  BD    AirDry  LL15  DUL   SAT
                  150        1.49  0.12    0.16  0.32  0.43
                  150        1.41  0.15    0.19  0.35  0.46
                  150        1.41  0.15    0.19  0.35  0.46
                  150        1.56  0.1     0.14  0.28  0.41
                  150        1.49  0.11    0.15  0.31  0.43
                  150        1.52  0.13    0.17  0.33  0.42
                  150        1.61  0.09    0.13  0.26  0.39
                  150        1.68  0.08    0.12  0.22  0.36
                  150        1.63  0.09    0.13  0.24  0.38
                  300        1.62  0.09    0.13  0.24  0.38
                  300        1.62  0.09    0.13  0.24  0.38
                  SoilCrop SorghumSoil
                    LL=[0.16, 0.19, 0.19, 0.14, 0.15, 0.17, 0.13, 0.12, 0.13, 0.13, 0.13]
                    KL=[0.07, 0.07, 0.07, 0.07, 0.07, 0.07, 0.07, 0.07, 0.07, 0.04, 0.04]
                    XF=[1, 1, 1, 1, 1, 1, 1, 1, 1, 1, 1]
                SoilWater: SummerDate=1-Nov; SummerU=6; SummerCona=3.5; WinterDate=1-Apr; WinterU=6; WinterCona=3.5; DiffusConst=40; DiffusSlope=16; Salb=0.11; CN2Bare=85; CNRed=0.8; CNCov=0.2; max_pond=0; Thickness=[150, 150, 150, 150, 150, 150, 150, 150, 150, 300, 300]; ResidueInterception=0
                  SWCON=[0.16, 0.11, 0.14, 0.14, 0.11, 0.11, 0.1, 0.1, 0.1, 0.12, 0.1]
                SoilNitrogen: same as Validation.Hermitage.HE1_8.HE1.Sorghum_HE1_T1.paddock.Soil.SoilNitrogen
                SoilOrganicMatter: RootCN=45; EnrACoeff=7.4; EnrBCoeff=0.2; OCUnits=Total
                  Thickness  OC    SoilCN  FBiom  FInert  RootWt
                  150        0.49  14.5    0.05   0.39    226.93
                  150        0.45  14.5    0.02   0.47    180.165
                  150        0.28  14.5    0.01   0.52    143.037
                  150        0.18  14.5    0.01   0.62    113.56
                  150        0.14  14.5    0.01   0.74    90.158
                  150        0.11  14.5    0.01   0.83    71.5785
                  150        0.09  14.5    0.01   0.93    56.8278
                  150        0.07  14.5    0.01   0.93    45.1169
                  150        0.06  14.5    0.01   0.93    35.8193
                  300        0.05  14.5    0.01   0.93    22.5774
                  300        0.03  14.5    0.01   0.93    14.2308
                Analysis: Thickness=[150, 150, 150, 150, 150, 150, 150, 150, 150, 300, 300]; PH=[8.35, 8.52, 8.8, 8.95, 9, 9, 9, 9, 8.92, 8.97, 8.82]; PHUnits=Water; BoronUnits=0
                InitialWater Initial Water: PercentMethod=0; FractionFull=0.5
                Sample Initial Nitrogen: NO3Units=ppm; NH4Units=ppm; SWUnits=Volumetric; OCUnits=Total; PHUnits=Water
                  Thickness  NO3  NH4
                  150        9    0.1
                  150        11   0.1
                  150        8    0.1
                  150        6    0.1
                  150        4    0.1
                  150        3    0.1
                  150        3    0.1
                  150        3    0.1
                  150        6    0.1
                  300        4    0.1
                  300        5    0.1
                CERESSoilTemperature
              Plant Sorghum: CropType=name; IsEnding=false; DaysAfterEnding=0
              Fertiliser
              Irrigation
            SurfaceOrganicMatter: InitialResidueName=wheat_stubble; InitialResidueType=wheat; InitialResidueMass=0; InitialStandingFraction=0; InitialCPR=0; InitialCNR=80; FractionFaecesAdded=0.5
            SoilArbitrator
          Simulation Sorghum_BW8_GxE_T2
            Clock: StartDate=1996-09-26; EndDate=1997-02-20
            Summary SummaryFile
            Weather: FileName=Met\BW8_GxE.met
            Zone paddock: Area=1; Slope=0
              Folder Manager folder
                Manager Sow SkipRow on a fixed date
                  Date = 1996-10-07
                  Density = 10
                  Depth = 0.5
                  Cultivar = CSH13r
                  RowSpacing = 0.5
                  RowConfiguration = solid
                  Ftn = 0
                  script: same as in Validation.Hermitage.HE1_8.HE1.Sorghum_HE1_T1.paddock.Manager folder.Sow SkipRow on a fixed date
                Manager Harvesting rule: same as Validation.Hermitage.HE1_8.HE1.Sorghum_HE1_T1.paddock.Manager folder.Harvesting rule
              Operations: same as Validation.Icrisat.BW.BW8.Sorghum_BW8_GxE_T1.paddock.Operations
              Soil: same as Validation.Icrisat.BW.BW8.Sorghum_BW8_GxE_T1.paddock.Soil
              Plant Sorghum: CropType=name; IsEnding=false; DaysAfterEnding=0
              Report outputfile: VariableNames=Biomass; EventNames=[Clock].DoReport
              Fertiliser
              Irrigation
            SurfaceOrganicMatter: InitialResidueName=wheat_stubble; InitialResidueType=wheat; InitialResidueMass=0; InitialStandingFraction=0; InitialCPR=0; InitialCNR=80; FractionFaecesAdded=0.5
            SoilArbitrator
          Simulation Sorghum_BW8_GxE_T3
            Clock: StartDate=1996-09-26; EndDate=1997-02-20
            Summary SummaryFile
            Weather: FileName=Met\BW8_GxE.met
            Zone paddock: Area=1; Slope=0
              Folder Manager folder
                Manager Sow SkipRow on a fixed date
                  Date = 1996-10-07
                  Density = 10
                  Depth = 0.5
                  Cultivar = ATx623xRTx430
                  RowSpacing = 0.5
                  RowConfiguration = solid
                  Ftn = 0
                  script: same as in Validation.Hermitage.HE1_8.HE1.Sorghum_HE1_T1.paddock.Manager folder.Sow SkipRow on a fixed date
                Manager Harvesting rule: same as Validation.Hermitage.HE1_8.HE1.Sorghum_HE1_T1.paddock.Manager folder.Harvesting rule
              Operations: same as Validation.Icrisat.BW.BW8.Sorghum_BW8_GxE_T1.paddock.Operations
              Soil: same as Validation.Icrisat.BW.BW8.Sorghum_BW8_GxE_T1.paddock.Soil
              Plant Sorghum: CropType=name; IsEnding=false; DaysAfterEnding=0
              Report outputfile: VariableNames=Biomass; EventNames=[Clock].DoReport
              Fertiliser
              Irrigation
            SurfaceOrganicMatter: InitialResidueName=wheat_stubble; InitialResidueType=wheat; InitialResidueMass=0; InitialStandingFraction=0; InitialCPR=0; InitialCNR=80; FractionFaecesAdded=0.5
            SoilArbitrator
          Simulation Sorghum_BW8_GxE_T4
            Clock: StartDate=1996-09-26; EndDate=1997-02-20
            Summary SummaryFile
            Weather: FileName=Met\BW8_GxE.met
            Zone paddock: Area=1; Slope=0
              Folder Manager folder
                Manager Sow SkipRow on a fixed date
                  Date = 1996-10-07
                  Density = 10
                  Depth = 0.5
                  Cultivar = QL41xQL36
                  RowSpacing = 0.5
                  RowConfiguration = solid
                  Ftn = 0
                  script: same as in Validation.Hermitage.HE1_8.HE1.Sorghum_HE1_T1.paddock.Manager folder.Sow SkipRow on a fixed date
                Manager Harvesting rule: same as Validation.Hermitage.HE1_8.HE1.Sorghum_HE1_T1.paddock.Manager folder.Harvesting rule
              Operations: same as Validation.Icrisat.BW.BW8.Sorghum_BW8_GxE_T1.paddock.Operations
              Soil: same as Validation.Icrisat.BW.BW8.Sorghum_BW8_GxE_T1.paddock.Soil
              Plant Sorghum: CropType=name; IsEnding=false; DaysAfterEnding=0
              Report outputfile: VariableNames=Biomass; EventNames=[Clock].DoReport
              Fertiliser
              Irrigation
            SurfaceOrganicMatter: InitialResidueName=wheat_stubble; InitialResidueType=wheat; InitialResidueMass=0; InitialStandingFraction=0; InitialCPR=0; InitialCNR=80; FractionFaecesAdded=0.5
            SoilArbitrator
          Simulation Sorghum_BW8_GxE_T5
            Clock: StartDate=1996-09-26; EndDate=1997-02-20
            Summary SummaryFile
            Weather: FileName=Met\BW8_GxE.met
            Zone paddock: Area=1; Slope=0
              Folder Manager folder: same as Validation.Icrisat.BW.BW8.Sorghum_BW8_GxE_T1.paddock.Manager folder
              Operations
                1996-09-25  [Fertiliser].Apply(20, Fertiliser.Types.NO3N, 50);
                1996-10-17  [Fertiliser].Apply(99, Fertiliser.Types.NO3N, 50);
              Soil: same as Validation.Icrisat.BW.BW8.Sorghum_BW8_GxE_T1.paddock.Soil
              Plant Sorghum: CropType=name; IsEnding=false; DaysAfterEnding=0
              Report outputfile: VariableNames=Biomass; EventNames=[Clock].DoReport
              Fertiliser
              Irrigation
            SurfaceOrganicMatter: InitialResidueName=wheat_stubble; InitialResidueType=wheat; InitialResidueMass=0; InitialStandingFraction=0; InitialCPR=0; InitialCNR=80; FractionFaecesAdded=0.5
            SoilArbitrator
          Simulation Sorghum_BW8_GxE_T6
            Clock: StartDate=1996-09-26; EndDate=1997-02-20
            Summary SummaryFile
            Weather: FileName=Met\BW8_GxE.met
            Zone paddock: Area=1; Slope=0
              Folder Manager folder: same as Validation.Icrisat.BW.BW8.Sorghum_BW8_GxE_T2.paddock.Manager folder
              Manager Calculator
```csharp
using System;
using Models.Core;
using Models.PMF;
using Models.PMF;
namespace Models
{
	[Serializable]
	[System.Xml.Serialization.XmlInclude(typeof(Model))]
	public class Script : Model
	{
		[Link] Clock Clock;

		[EventSubscribe("Commencing")]
		private void OnSimulationCommencing(object sender, EventArgs e)
		{
			/*
				 head_wt = 0
root_n = 0
head_n = 0
leaf_n = 0
sd = 0
			*/
		}
		[EventSubscribe("DoCalculations")]
		private void OnDoCalculations(object sender, EventArgs e)
		{
			/*
				 [cr]head_wt = dw_green(4)[cr]root_n = n_green(1)[cr]head_n = n_green(4)[cr]leaf_n = n_green(2)[cr][cr]if (sw_demand > 0) then[cr]   sd = sw_supply / sw_demand[cr]else[cr]   sd = 1[cr]endif[cr][cr]if (sd > 1) then[cr]   sd = 1[cr]endif[cr]
			*/
		}
	}
}
```
              Operations
                1996-09-25  [Fertiliser].Apply(20, Fertiliser.Types.NO3N, 50);
                1996-10-17  [Fertiliser].Apply(99, Fertiliser.Types.NO3N, 50);
              Soil: same as Validation.Icrisat.BW.BW8.Sorghum_BW8_GxE_T1.paddock.Soil
              Plant Sorghum: CropType=name; IsEnding=false; DaysAfterEnding=0
              Report outputfile: VariableNames=Biomass; EventNames=[Clock].DoReport
              Fertiliser
              Irrigation
            SurfaceOrganicMatter: InitialResidueName=wheat_stubble; InitialResidueType=wheat; InitialResidueMass=0; InitialStandingFraction=0; InitialCPR=0; InitialCNR=80; FractionFaecesAdded=0.5
            SoilArbitrator
          Simulation Sorghum_BW8_GxE_T7
            Clock: StartDate=1996-09-26; EndDate=1997-02-20
            Summary SummaryFile
            Weather: FileName=Met\BW8_GxE.met
            Zone paddock: Area=1; Slope=0
              Folder Manager folder: same as Validation.Icrisat.BW.BW8.Sorghum_BW8_GxE_T3.paddock.Manager folder
              Operations
                1996-09-25  [Fertiliser].Apply(20, Fertiliser.Types.NO3N, 50);
                1996-10-17  [Fertiliser].Apply(99, Fertiliser.Types.NO3N, 50);
              Soil: same as Validation.Icrisat.BW.BW8.Sorghum_BW8_GxE_T1.paddock.Soil
              Plant Sorghum: CropType=name; IsEnding=false; DaysAfterEnding=0
              Report outputfile: VariableNames=Biomass; EventNames=[Clock].DoReport
              Fertiliser
              Irrigation
            SurfaceOrganicMatter: InitialResidueName=wheat_stubble; InitialResidueType=wheat; InitialResidueMass=0; InitialStandingFraction=0; InitialCPR=0; InitialCNR=80; FractionFaecesAdded=0.5
            SoilArbitrator
          Simulation Sorghum_BW8_GxE_T8
            Clock: StartDate=1996-09-26; EndDate=1997-02-20
            Summary SummaryFile
            Weather: FileName=Met\BW8_GxE.met
            Zone paddock: Area=1; Slope=0
              Folder Manager folder: same as Validation.Icrisat.BW.BW8.Sorghum_BW8_GxE_T4.paddock.Manager folder
              Operations
                1996-09-25  [Fertiliser].Apply(20, Fertiliser.Types.NO3N, 50);
                1996-10-17  [Fertiliser].Apply(99, Fertiliser.Types.NO3N, 50);
              Soil: same as Validation.Icrisat.BW.BW8.Sorghum_BW8_GxE_T1.paddock.Soil
              Plant Sorghum: CropType=name; IsEnding=false; DaysAfterEnding=0
              Report outputfile: VariableNames=Biomass; EventNames=[Clock].DoReport
              Fertiliser
              Irrigation
            SurfaceOrganicMatter: InitialResidueName=wheat_stubble; InitialResidueType=wheat; InitialResidueMass=0; InitialStandingFraction=0; InitialCPR=0; InitialCNR=80; FractionFaecesAdded=0.5
            SoilArbitrator
          Simulation Sorghum_BW8_GxE_T9
            Clock: StartDate=1996-09-26; EndDate=1997-02-20
            Summary SummaryFile
            Weather: FileName=Met\BW8_GxE.met
            Zone paddock: Area=1; Slope=0
              Folder Manager folder: same as Validation.Icrisat.BW.BW8.Sorghum_BW8_GxE_T1.paddock.Manager folder
              Operations
                1996-09-25  [Fertiliser].Apply(20, Fertiliser.Types.NO3N, 50);
              Soil: same as Validation.Icrisat.BW.BW8.Sorghum_BW8_GxE_T1.paddock.Soil
              Plant Sorghum: CropType=name; IsEnding=false; DaysAfterEnding=0
              Report outputfile: VariableNames=Biomass; EventNames=[Clock].DoReport
              Fertiliser
              Irrigation
            SurfaceOrganicMatter: InitialResidueName=wheat_stubble; InitialResidueType=wheat; InitialResidueMass=0; InitialStandingFraction=0; InitialCPR=0; InitialCNR=80; FractionFaecesAdded=0.5
            SoilArbitrator
          Simulation Sorghum_BW8_GxE_T10
            Clock: StartDate=1996-09-26; EndDate=1997-02-20
            Summary SummaryFile
            Weather: FileName=Met\BW8_GxE.met
            Zone paddock: Area=1; Slope=0
              Folder Manager folder: same as Validation.Icrisat.BW.BW8.Sorghum_BW8_GxE_T2.paddock.Manager folder
              Operations
                1996-09-25  [Fertiliser].Apply(20, Fertiliser.Types.NO3N, 50);
              Soil: same as Validation.Icrisat.BW.BW8.Sorghum_BW8_GxE_T1.paddock.Soil
              Plant Sorghum: CropType=name; IsEnding=false; DaysAfterEnding=0
              Report outputfile: VariableNames=Biomass; EventNames=[Clock].DoReport
              Fertiliser
              Irrigation
            SurfaceOrganicMatter: InitialResidueName=wheat_stubble; InitialResidueType=wheat; InitialResidueMass=0; InitialStandingFraction=0; InitialCPR=0; InitialCNR=80; FractionFaecesAdded=0.5
            SoilArbitrator
          Simulation Sorghum_BW8_GxE_T11
            Clock: StartDate=1996-09-26; EndDate=1997-02-20
            Summary SummaryFile
            Weather: FileName=Met\BW8_GxE.met
            Zone paddock: Area=1; Slope=0
              Folder Manager folder: same as Validation.Icrisat.BW.BW8.Sorghum_BW8_GxE_T3.paddock.Manager folder
              Operations
                1996-09-25  [Fertiliser].Apply(20, Fertiliser.Types.NO3N, 50);
              Soil: same as Validation.Icrisat.BW.BW8.Sorghum_BW8_GxE_T1.paddock.Soil
              Plant Sorghum: CropType=name; IsEnding=false; DaysAfterEnding=0
              Report outputfile: VariableNames=Biomass; EventNames=[Clock].DoReport
              Fertiliser
              Irrigation
            SurfaceOrganicMatter: InitialResidueName=wheat_stubble; InitialResidueType=wheat; InitialResidueMass=0; InitialStandingFraction=0; InitialCPR=0; InitialCNR=80; FractionFaecesAdded=0.5
            SoilArbitrator
          Simulation Sorghum_BW8_GxE_T12
            Clock: StartDate=1996-09-26; EndDate=1997-02-20
            Summary SummaryFile
            Weather: FileName=Met\BW8_GxE.met
            Zone paddock: Area=1; Slope=0
              Folder Manager folder: same as Validation.Icrisat.BW.BW8.Sorghum_BW8_GxE_T4.paddock.Manager folder
              Operations
                1996-09-25  [Fertiliser].Apply(20, Fertiliser.Types.NO3N, 50);
              Soil: same as Validation.Icrisat.BW.BW8.Sorghum_BW8_GxE_T1.paddock.Soil
              Plant Sorghum: CropType=name; IsEnding=false; DaysAfterEnding=0
              Report outputfile: VariableNames=Biomass; EventNames=[Clock].DoReport
              Fertiliser
              Irrigation
            SurfaceOrganicMatter: InitialResidueName=wheat_stubble; InitialResidueType=wheat; InitialResidueMass=0; InitialStandingFraction=0; InitialCPR=0; InitialCNR=80; FractionFaecesAdded=0.5
            SoilArbitrator
    Folder Lawes
      Folder LE
        Folder LE13
          Simulation Sorghum_LE13_Buster-I-N
            Clock: StartDate=1995-11-28; EndDate=1996-05-01
            Summary SummaryFile
            Weather: FileName=Met\LE13.met
            Zone paddock: Area=1; Slope=0
              Folder Manager folder
                Manager Sow SkipRow on a fixed date
                  Date = 1995-11-29
                  Density = 16
                  Depth = 20
                  Cultivar = Buster
                  RowSpacing = 0.5
                  RowConfiguration = solid
                  Ftn = 0
                  script: same as in Validation.Hermitage.HE1_8.HE1.Sorghum_HE1_T1.paddock.Manager folder.Sow SkipRow on a fixed date
                Manager Harvesting rule: same as Validation.Hermitage.HE1_8.HE1.Sorghum_HE1_T1.paddock.Manager folder.Harvesting rule
              Report outputfile: same as Validation.Hermitage.HE1_8.HE2.Sorghum_HE2_T1.paddock.outputfile
              Soil: SoilType=GLHSoil; Site=Cooper Lab; NearestTown=Unknown; Region=Gatton; NaturalVegetation=Unknown; Latitude=0; Longitude=0
                Water
                  Thickness  BD    AirDry  LL15  DUL   SAT
                  200        1.32  0.1     0.3   0.41  0.46
                  200        1.3   0.15    0.3   0.43  0.48
                  200        1.23  0.28    0.35  0.46  0.51
                  300        1.27  0.28    0.32  0.44  0.49
                  300        1.37  0.28    0.29  0.4   0.45
                  300        1.35  0.3     0.31  0.41  0.46
                  300        1.35  0.3     0.31  0.38  0.43
                  SoilCrop SorghumSoil: LL=[0.3, 0.3, 0.35, 0.32, 0.29, 0.31, 0.31]; KL=[0.08, 0.08, 0.08, 0.08, 0.06, 0.04, 0.02]; XF=[1, 1, 1, 1, 1, 1, 1]
                SoilWater: SummerDate=1-Nov; SummerU=6; SummerCona=3.5; WinterDate=1-Apr; WinterU=6; WinterCona=3.5; DiffusConst=88; DiffusSlope=35.4; Salb=0.13; CN2Bare=91; CNRed=20; CNCov=0.8; max_pond=0; Thickness=[200, 200, 200, 300, 300, 300, 300]; SWCON=[0.5, 0.5, 0.5, 0.5, 0.5, 0.5, 0.5]; ResidueInterception=0
                SoilNitrogen: same as Validation.Hermitage.HE1_8.HE1.Sorghum_HE1_T1.paddock.Soil.SoilNitrogen
                SoilOrganicMatter: RootCN=30; EnrACoeff=7.4; EnrBCoeff=0.2; OCUnits=Total
                  Thickness  OC    SoilCN  FBiom  FInert  RootWt
                  200        1.3   12.5    0.03   0.31    514.709
                  200        0.65  12.5    0.01   0.38    368.805
                  200        0.32  12.5    0      0.47    264.26
                  300        0.11  12.5    0      0.7     160.282
                  300        0.11  12.5    0      0.9     97.2159
                  300        0.11  12.5    0      0.95    58.9644
                  300        0.11  12.5    0      0.95    35.7637
                Analysis: Thickness=[200, 200, 200, 300, 300, 300, 300]; PH=[8.2, 8.7, 8.9, 8.1, 8, 8, 8]; PHUnits=Water; BoronUnits=0
                Sample Initial nitrogen: NO3Units=ppm; NH4Units=ppm; SWUnits=Volumetric; OCUnits=Total; PHUnits=Water
                  Thickness  NO3    NH4
                  200        9      0.1
                  200        2.48   0.1
                  200        2.79   0.1
                  300        1.28   0.1
                  300        2.98   0.1
                  300        2.965  0.1
                  300        1.387  0.1
                Sample Initial water: Thickness=[200, 200, 200, 300, 300, 300, 300]; SW=[0.385, 0.47, 0.467, 0.459, 0.394, 0.399, 0.38]; NO3Units=ppm; NH4Units=ppm; SWUnits=Volumetric; OCUnits=Total; PHUnits=Water
                CERESSoilTemperature
              Operations
                1995-11-29  [Irrigation].Apply(14);
                1995-12-01  [Irrigation].Apply(10);
                1995-12-03  [Irrigation].Apply(13);
                1995-12-05  [Irrigation].Apply(8);
                1996-02-07  [Irrigation].Apply(6);
                1995-11-28  [Fertiliser].Apply(0, Fertiliser.Types.NO3N, 50);
                1995-11-28  [Fertiliser].Apply(0, Fertiliser.Types.NO3N, 50);
              Plant Sorghum: CropType=name; IsEnding=false; DaysAfterEnding=0
              Fertiliser
              Irrigation
            SurfaceOrganicMatter: InitialResidueName=wheat_stubble; InitialResidueType=wheat; InitialResidueMass=0; InitialStandingFraction=0; InitialCPR=0; InitialCNR=80; FractionFaecesAdded=0.5
            SoilArbitrator
          Simulation Sorghum_LE13_Buster-I+N
            Clock: StartDate=1995-11-28; EndDate=1996-05-01
            Summary SummaryFile
            Weather: FileName=Met\LE13.met
            Zone paddock: Area=1; Slope=0
              Folder Manager folder
                Manager Sow SkipRow on a fixed date
                  Date = 1995-11-29
                  Density = 16
                  Depth = 20
                  Cultivar = Buster
                  RowSpacing = 0.5
                  RowConfiguration = solid
                  Ftn = 0.35
                  script: same as in Validation.Hermitage.HE1_8.HE1.Sorghum_HE1_T1.paddock.Manager folder.Sow SkipRow on a fixed date
                Manager Harvesting rule: same as Validation.Hermitage.HE1_8.HE1.Sorghum_HE1_T1.paddock.Manager folder.Harvesting rule
              Soil: SoilType=GLHSoil; Site=Cooper Lab; NearestTown=Unknown; Region=Gatton; NaturalVegetation=Unknown; Latitude=0; Longitude=0
                InitialWater Initial water: PercentMethod=0; FractionFull=1
                Water: same as Validation.Lawes.LE.LE13.Sorghum_LE13_Buster-I-N.paddock.Soil.Water
                SoilWater: same as Validation.Lawes.LE.LE13.Sorghum_LE13_Buster-I-N.paddock.Soil.SoilWater
                SoilNitrogen: same as Validation.Hermitage.HE1_8.HE1.Sorghum_HE1_T1.paddock.Soil.SoilNitrogen
                SoilOrganicMatter: same as Validation.Lawes.LE.LE13.Sorghum_LE13_Buster-I-N.paddock.Soil.SoilOrganicMatter
                Analysis: same as Validation.Lawes.LE.LE13.Sorghum_LE13_Buster-I-N.paddock.Soil.Analysis
                Sample Initial nitrogen: NO3Units=ppm; NH4Units=ppm; SWUnits=Volumetric; OCUnits=Total; PHUnits=Water
                  Thickness  NO3    NH4
                  200        9      0.1
                  200        2.48   0.1
                  200        2.79   0.1
                  300        1.28   0.1
                  300        2.98   0.1
                  300        2.965  0.1
                  300        1.387  0.1
                CERESSoilTemperature
              Operations
                1995-11-29  [Irrigation].Apply(14);
                1995-12-01  [Irrigation].Apply(10);
                1995-12-03  [Irrigation].Apply(13);
                1995-12-05  [Irrigation].Apply(8);
                1996-02-07  [Irrigation].Apply(6);
                1995-11-29  [Fertiliser].Apply(119, Fertiliser.Types.NO3N, 50);
                1995-12-28  [Fertiliser].Apply(59, Fertiliser.Types.NO3N, 50);
                1996-02-07  [Fertiliser].Apply(59, Fertiliser.Types.NO3N, 50);
                1995-11-28  [Fertiliser].Apply(0, Fertiliser.Types.NO3N, 50);
                1995-11-28  [Fertiliser].Apply(122, Fertiliser.Types.NO3N, 50);
              Plant Sorghum: CropType=name; IsEnding=false; DaysAfterEnding=0
              Report outputfile: VariableNames=Biomass; EventNames=[Clock].DoReport
              Fertiliser
              Irrigation
            SurfaceOrganicMatter: InitialResidueName=wheat_stubble; InitialResidueType=wheat; InitialResidueMass=0; InitialStandingFraction=0; InitialCPR=0; InitialCNR=80; FractionFaecesAdded=0.5
            SoilArbitrator
          Simulation Sorghum_LE13_Buster+I+N
            Clock: StartDate=1995-11-28; EndDate=1996-05-01
            Summary SummaryFile
            Weather: FileName=Met\LE13.met
            Zone paddock: Area=1; Slope=0
              Folder Manager folder
                Manager Sow SkipRow on a fixed date
                  Date = 1995-11-29
                  Density = 16
                  Depth = 20
                  Cultivar = Buster
                  RowSpacing = 0.5
                  RowConfiguration = solid
                  Ftn = 0.2
                  script: same as in Validation.Hermitage.HE1_8.HE1.Sorghum_HE1_T1.paddock.Manager folder.Sow SkipRow on a fixed date
                Manager Harvesting rule: same as Validation.Hermitage.HE1_8.HE1.Sorghum_HE1_T1.paddock.Manager folder.Harvesting rule
              Soil: same as Validation.Lawes.LE.LE13.Sorghum_LE13_Buster-I-N.paddock.Soil
              Operations
                1995-11-29  [Irrigation].Apply(14);
                1995-12-01  [Irrigation].Apply(10);
                1995-12-03  [Irrigation].Apply(13);
                1995-12-05  [Irrigation].Apply(8);
                1996-02-07  [Irrigation].Apply(6);
                1996-02-12  [Irrigation].Apply(33);
                1996-02-26  [Irrigation].Apply(20);
                1996-03-06  [Irrigation].Apply(18);
                1996-03-18  [Irrigation].Apply(25);
                1995-11-28  [Fertiliser].Apply(122, Fertiliser.Types.NO3N, 50);
                1995-12-28  [Fertiliser].Apply(59, Fertiliser.Types.NO3N, 50);
                1996-02-07  [Fertiliser].Apply(59, Fertiliser.Types.NO3N, 50);
                1995-11-28  [Fertiliser].Apply(0, Fertiliser.Types.NO3N, 50);
              Plant Sorghum: CropType=name; IsEnding=false; DaysAfterEnding=0
              Report outputfile: VariableNames=Biomass; EventNames=[Clock].DoReport
              Fertiliser
              Irrigation
            SurfaceOrganicMatter: InitialResidueName=wheat_stubble; InitialResidueType=wheat; InitialResidueMass=0; InitialStandingFraction=0; InitialCPR=0; InitialCNR=80; FractionFaecesAdded=0.5
            SoilArbitrator
          Simulation Sorghum_LE13_M35-1-I-N
            Clock: StartDate=1995-11-28; EndDate=1996-05-01
            Summary SummaryFile
            Weather: FileName=Met\LE13.met
            Zone paddock: Area=1; Slope=0
              Folder Manager folder
                Manager Sow SkipRow on a fixed date
                  Date = 1995-11-29
                  Density = 16
                  Depth = 20
                  Cultivar = M35-1
                  RowSpacing = 0.5
                  RowConfiguration = solid
                  Ftn = 0.2
                  script: same as in Validation.Hermitage.HE1_8.HE1.Sorghum_HE1_T1.paddock.Manager folder.Sow SkipRow on a fixed date
                Manager Harvesting rule: same as Validation.Hermitage.HE1_8.HE1.Sorghum_HE1_T1.paddock.Manager folder.Harvesting rule
              Soil: same as Validation.Lawes.LE.LE13.Sorghum_LE13_Buster-I-N.paddock.Soil
              Operations
                1995-11-29  [Irrigation].Apply(14);
                1995-12-01  [Irrigation].Apply(10);
                1995-12-03  [Irrigation].Apply(13);
                1995-12-05  [Irrigation].Apply(8);
                1996-02-07  [Irrigation].Apply(6);
                1995-11-28  [Fertiliser].Apply(0, Fertiliser.Types.NO3N, 50);
                1995-11-28  [Fertiliser].Apply(12, Fertiliser.Types.NO3N, 50);
              Plant Sorghum: CropType=name; IsEnding=false; DaysAfterEnding=0
              Report outputfile: VariableNames=Biomass; EventNames=[Clock].DoReport
              Fertiliser
              Irrigation
            SurfaceOrganicMatter: InitialResidueName=wheat_stubble; InitialResidueType=wheat; InitialResidueMass=0; InitialStandingFraction=0; InitialCPR=0; InitialCNR=80; FractionFaecesAdded=0.5
            SoilArbitrator
          Simulation Sorghum_LE13_M35-1-I+N
            Clock: StartDate=1995-11-28; EndDate=1996-05-01
            Summary SummaryFile
            Weather: FileName=Met\LE13.met
            Zone paddock: Area=1; Slope=0
              Folder Manager folder
                Manager Sow SkipRow on a fixed date
                  Date = 1995-11-29
                  Density = 16
                  Depth = 20
                  Cultivar = M35-1
                  RowSpacing = 0.5
                  RowConfiguration = solid
                  Ftn = 0
                  script: same as in Validation.Hermitage.HE1_8.HE1.Sorghum_HE1_T1.paddock.Manager folder.Sow SkipRow on a fixed date
                Manager Harvesting rule: same as Validation.Hermitage.HE1_8.HE1.Sorghum_HE1_T1.paddock.Manager folder.Harvesting rule
              Soil: same as Validation.Lawes.LE.LE13.Sorghum_LE13_Buster-I-N.paddock.Soil
              Operations: same as Validation.Lawes.LE.LE13.Sorghum_LE13_Buster-I+N.paddock.Operations
              Report outputfile: VariableNames=Biomass; EventNames=[Clock].DoReport
              Plant Sorghum: CropType=name; IsEnding=false; DaysAfterEnding=0
              Fertiliser
              Irrigation
            SurfaceOrganicMatter: InitialResidueName=wheat_stubble; InitialResidueType=wheat; InitialResidueMass=0; InitialStandingFraction=0; InitialCPR=0; InitialCNR=80; FractionFaecesAdded=0.5
            SoilArbitrator
          Simulation Sorghum_LE13_M35-1+I+N
            Clock: StartDate=1995-11-28; EndDate=1996-05-01
            Summary SummaryFile
            Weather: FileName=Met\LE13.met
            Zone paddock: Area=1; Slope=0
              Folder Manager folder: same as Validation.Lawes.LE.LE13.Sorghum_LE13_M35-1-I+N.paddock.Manager folder
              Soil: same as Validation.Lawes.LE.LE13.Sorghum_LE13_Buster-I-N.paddock.Soil
              Operations: same as Validation.Lawes.LE.LE13.Sorghum_LE13_Buster+I+N.paddock.Operations
              Plant Sorghum: CropType=name; IsEnding=false; DaysAfterEnding=0
              Report outputfile: VariableNames=Biomass; EventNames=[Clock].DoReport
              Fertiliser
              Irrigation
            SurfaceOrganicMatter: InitialResidueName=wheat_stubble; InitialResidueType=wheat; InitialResidueMass=0; InitialStandingFraction=0; InitialCPR=0; InitialCNR=80; FractionFaecesAdded=0.5
            SoilArbitrator
        Folder LE14
          Simulation Sorghum_LE14_Buster
            Clock: StartDate=1996-09-05; EndDate=1997-02-19
            Summary SummaryFile
            Weather: FileName=Met\LE14.met
            Zone paddock: Area=1; Slope=0
              Folder Manager folder
                Manager Sow SkipRow on a fixed date
                  Date = 1996-10-11
                  Density = 10
                  Depth = 20
                  Cultivar = Buster
                  RowSpacing = 0.5
                  RowConfiguration = solid
                  Ftn = 0.4
                  script: same as in Validation.Hermitage.HE1_8.HE1.Sorghum_HE1_T1.paddock.Manager folder.Sow SkipRow on a fixed date
                Manager Harvesting rule: same as Validation.Hermitage.HE1_8.HE1.Sorghum_HE1_T1.paddock.Manager folder.Harvesting rule
              Report outputfile: same as Validation.Hermitage.HE1_8.HE2.Sorghum_HE2_T1.paddock.outputfile
              Soil: SoilType=GLHSoil; Site=Cooper Lab; NearestTown=Unknown; Region=Gatton; NaturalVegetation=Unknown; Latitude=0; Longitude=0
                Water: same as Validation.Lawes.LE.LE13.Sorghum_LE13_Buster-I-N.paddock.Soil.Water
                SoilWater: same as Validation.Lawes.LE.LE13.Sorghum_LE13_Buster-I-N.paddock.Soil.SoilWater
                SoilNitrogen: same as Validation.Hermitage.HE1_8.HE1.Sorghum_HE1_T1.paddock.Soil.SoilNitrogen
                SoilOrganicMatter: same as Validation.Lawes.LE.LE13.Sorghum_LE13_Buster-I-N.paddock.Soil.SoilOrganicMatter
                Analysis: same as Validation.Lawes.LE.LE13.Sorghum_LE13_Buster-I-N.paddock.Soil.Analysis
                Sample Initial nitrogen: NO3Units=ppm; NH4Units=ppm; SWUnits=Volumetric; OCUnits=Total; PHUnits=Water
                  Thickness  NO3     NH4
                  200        11.624  0.1
                  200        5.732   0.1
                  200        2.974   0.1
                  300        1.645   0.1
                  300        1.902   0.1
                  300        2.246   0.1
                  300        1.942   0.1
                Sample Initial water: Thickness=[200, 200, 200, 300, 300, 300, 300]; SW=[0.385, 0.47, 0.467, 0.459, 0.394, 0.399, 0.38]; NO3Units=ppm; NH4Units=ppm; SWUnits=Volumetric; OCUnits=Total; PHUnits=Water
                CERESSoilTemperature
              Operations
                1996-09-06  [Fertiliser].Apply(0, Fertiliser.Types.NO3N, 50);
                1996-09-06  [Fertiliser].Apply(126, Fertiliser.Types.NO3N, 50);
                1996-09-16  [Fertiliser].Apply(105, Fertiliser.Types.NO3N, 50);
                1996-11-15  [Fertiliser].Apply(73, Fertiliser.Types.NO3N, 50);
                1996-12-31  [Fertiliser].Apply(59, Fertiliser.Types.NO3N, 50);
              Plant Sorghum: CropType=name; IsEnding=false; DaysAfterEnding=0
              Fertiliser
              Irrigation
            SurfaceOrganicMatter: InitialResidueName=wheat_stubble; InitialResidueType=wheat; InitialResidueMass=0; InitialStandingFraction=0; InitialCPR=0; InitialCNR=80; FractionFaecesAdded=0.5
            SoilArbitrator
          Simulation Sorghum_LE14_M35-1
            Clock: StartDate=1996-09-05; EndDate=1997-02-19
            Summary SummaryFile
            Weather: FileName=Met\LE14.met
            Zone paddock: Area=1; Slope=0
              Folder Manager folder
                Manager Sow SkipRow on a fixed date
                  Date = 1996-10-11
                  Density = 10
                  Depth = 20
                  Cultivar = M35-1
                  RowSpacing = 0.5
                  RowConfiguration = solid
                  Ftn = 0.1
                  script: same as in Validation.Hermitage.HE1_8.HE1.Sorghum_HE1_T1.paddock.Manager folder.Sow SkipRow on a fixed date
                Manager Harvesting rule: same as Validation.Hermitage.HE1_8.HE1.Sorghum_HE1_T1.paddock.Manager folder.Harvesting rule
              Soil: same as Validation.Lawes.LE.LE14.Sorghum_LE14_Buster.paddock.Soil
              Operations: same as Validation.Lawes.LE.LE14.Sorghum_LE14_Buster.paddock.Operations
              Plant Sorghum: CropType=name; IsEnding=false; DaysAfterEnding=0
              Fertiliser
              Irrigation
            SurfaceOrganicMatter: InitialResidueName=wheat_stubble; InitialResidueType=wheat; InitialResidueMass=0; InitialStandingFraction=0; InitialCPR=0; InitialCNR=80; FractionFaecesAdded=0.5
            SoilArbitrator
          Simulation Sorghum_LE14_QL41xQL36
            Clock: StartDate=1996-09-05; EndDate=1997-02-19
            Summary SummaryFile
            Weather: FileName=Met\LE14.met
            Zone paddock: Area=1; Slope=0
              Folder Manager folder
                Manager Sow SkipRow on a fixed date
                  Date = 1996-10-11
                  Density = 10
                  Depth = 20
                  Cultivar = QL41xQL36
                  RowSpacing = 0.5
                  RowConfiguration = solid
                  Ftn = 0.4
                  script: same as in Validation.Hermitage.HE1_8.HE1.Sorghum_HE1_T1.paddock.Manager folder.Sow SkipRow on a fixed date
                Manager Harvesting rule: same as Validation.Hermitage.HE1_8.HE1.Sorghum_HE1_T1.paddock.Manager folder.Harvesting rule
              Soil: same as Validation.Lawes.LE.LE14.Sorghum_LE14_Buster.paddock.Soil
              Operations: same as Validation.Lawes.LE.LE14.Sorghum_LE14_Buster.paddock.Operations
              Plant Sorghum: CropType=name; IsEnding=false; DaysAfterEnding=0
              Report outputfile: VariableNames=Biomass; EventNames=[Clock].DoReport
              Fertiliser
              Irrigation
            SurfaceOrganicMatter: InitialResidueName=wheat_stubble; InitialResidueType=wheat; InitialResidueMass=0; InitialStandingFraction=0; InitialCPR=0; InitialCNR=80; FractionFaecesAdded=0.5
            SoilArbitrator
        Folder LE15
          Simulation Sorghum_LE15_Buster
            Clock: StartDate=1996-09-05; EndDate=1997-05-08
            Summary SummaryFile
            Weather: FileName=Met\LE15.met
            Zone paddock: Area=1; Slope=0
              Folder Manager folder
                Manager Sow SkipRow on a fixed date
                  Date = 1997-01-06
                  Density = 10
                  Depth = 25
                  Cultivar = Buster
                  RowSpacing = 0.5
                  RowConfiguration = solid
                  Ftn = 0.5
                  script: same as in Validation.Hermitage.HE1_8.HE1.Sorghum_HE1_T1.paddock.Manager folder.Sow SkipRow on a fixed date
                Manager Harvesting rule: same as Validation.Hermitage.HE1_8.HE1.Sorghum_HE1_T1.paddock.Manager folder.Harvesting rule
              Soil: SoilType=GLHSoil; Site=Cooper Lab; NearestTown=Unknown; Region=Gatton; NaturalVegetation=Unknown; Latitude=0; Longitude=0
                Water: same as Validation.Lawes.LE.LE13.Sorghum_LE13_Buster-I-N.paddock.Soil.Water
                SoilWater: same as Validation.Lawes.LE.LE13.Sorghum_LE13_Buster-I-N.paddock.Soil.SoilWater
                SoilNitrogen: same as Validation.Hermitage.HE1_8.HE1.Sorghum_HE1_T1.paddock.Soil.SoilNitrogen
                SoilOrganicMatter: same as Validation.Lawes.LE.LE13.Sorghum_LE13_Buster-I-N.paddock.Soil.SoilOrganicMatter
                Analysis: same as Validation.Lawes.LE.LE13.Sorghum_LE13_Buster-I-N.paddock.Soil.Analysis
                Sample Initial nitrogen: NO3Units=ppm; NH4Units=ppm; SWUnits=Volumetric; OCUnits=Total; PHUnits=Water
                  Thickness  NO3     NH4
                  200        11.624  0.1
                  200        5.732   0.1
                  200        2.974   0.1
                  300        1.645   0.1
                  300        1.902   0.1
                  300        2.246   0.1
                  300        1.942   0.1
                Sample Initial water: Thickness=[200, 200, 200, 300, 300, 300, 300]; SW=[0.39, 0.47, 0.479, 0.422, 0.393, 0.379, 0.405]; NO3Units=ppm; NH4Units=ppm; SWUnits=Volumetric; OCUnits=Total; PHUnits=Water
                CERESSoilTemperature
              Operations
                1997-01-06  [Irrigation].Apply(31);
                1997-01-08  [Irrigation].Apply(14);
                1997-01-10  [Irrigation].Apply(14);
                1997-01-12  [Irrigation].Apply(14);
                1997-01-14  [Irrigation].Apply(11);
                1997-01-17  [Irrigation].Apply(14);
                1997-01-20  [Irrigation].Apply(7);
                1997-01-22  [Irrigation].Apply(8);
                1997-01-24  [Irrigation].Apply(17);
                1997-02-04  [Irrigation].Apply(8);
                1997-02-12  [Irrigation].Apply(24);
                1997-02-26  [Irrigation].Apply(29);
                1997-03-11  [Irrigation].Apply(22);
                1997-03-19  [Irrigation].Apply(27);
                1997-03-27  [Irrigation].Apply(25);
                1997-04-03  [Irrigation].Apply(20);
                1997-04-09  [Irrigation].Apply(32);
                1997-04-18  [Irrigation].Apply(35);
                1997-04-27  [Irrigation].Apply(22);
                1997-01-03  [Fertiliser].Apply(0, Fertiliser.Types.NO3N, 50);
                1997-01-03  [Fertiliser].Apply(45, Fertiliser.Types.NO3N, 50);
                1997-01-03  [Fertiliser].Apply(116, Fertiliser.Types.NO3N, 50);
                1997-02-04  [Fertiliser].Apply(59, Fertiliser.Types.NO3N, 50);
                1997-03-11  [Fertiliser].Apply(59, Fertiliser.Types.NO3N, 50);
              Plant Sorghum: CropType=name; IsEnding=false; DaysAfterEnding=0
              Report outputfile: same as Validation.Hermitage.HE1_8.HE2.Sorghum_HE2_T1.paddock.outputfile
              Fertiliser
              Irrigation
            SurfaceOrganicMatter: InitialResidueName=wheat_stubble; InitialResidueType=wheat; InitialResidueMass=0; InitialStandingFraction=0; InitialCPR=0; InitialCNR=80; FractionFaecesAdded=0.5
            SoilArbitrator
          Simulation Sorghum_LE15_M35-1
            Clock: StartDate=1996-09-05; EndDate=1997-05-08
            Summary SummaryFile
            Weather: FileName=Met\LE15.met
            Zone paddock: Area=1; Slope=0
              Folder Manager folder
                Manager Sow SkipRow on a fixed date
                  Date = 1997-01-06
                  Density = 10
                  Depth = 25
                  Cultivar = M35-1
                  RowSpacing = 0.5
                  RowConfiguration = solid
                  Ftn = 0
                  script: same as in Validation.Hermitage.HE1_8.HE1.Sorghum_HE1_T1.paddock.Manager folder.Sow SkipRow on a fixed date
                Manager Harvesting rule: same as Validation.Hermitage.HE1_8.HE1.Sorghum_HE1_T1.paddock.Manager folder.Harvesting rule
              Soil: same as Validation.Lawes.LE.LE15.Sorghum_LE15_Buster.paddock.Soil
              Operations: same as Validation.Lawes.LE.LE15.Sorghum_LE15_Buster.paddock.Operations
              Plant Sorghum: CropType=name; IsEnding=false; DaysAfterEnding=0
              Fertiliser
              Irrigation
            SurfaceOrganicMatter: InitialResidueName=wheat_stubble; InitialResidueType=wheat; InitialResidueMass=0; InitialStandingFraction=0; InitialCPR=0; InitialCNR=80; FractionFaecesAdded=0.5
            SoilArbitrator
          Simulation Sorghum_LE15_QL41xQL36
            Clock: StartDate=1996-09-05; EndDate=1997-05-08
            Summary SummaryFile
            Weather: FileName=Met\LE15.met
            Zone paddock: Area=1; Slope=0
              Folder Manager folder
                Manager Sow SkipRow on a fixed date
                  date = 6/01/1997
                  crop = Sorghum
                  density = 10
                  depth = 25
                  cultivar = QL41xQL36
                  row_spacing = 0.5
                  RowConfiguration = solid
                  ftn = 0.5
```csharp
using System;
using Models.Core;
using Models.PMF;
using Models.PMF;
namespace Models
{
	[Serializable]
	[System.Xml.Serialization.XmlInclude(typeof(Model))]
	public class Script : Model
	{
		[Link] Clock Clock;

		[Description("Enter sowing date (d/m/yyyy) : ")]
		public string date { get; set; }

		[Description("Enter name of crop to sow : ")]
		public string crop { get; set; }

		[Description("Enter sowing density  (plants/m2) : ")]
		public string density { get; set; }

		[Description("Enter sowing depth  (mm) : ")]
		public string depth { get; set; }

		[Description("Enter cultivar : ")]
		[Display(Type = DisplayType.CultivarName)]
		public string cultivar { get; set; }

		[Description("Enter row spacing (m) : ")]
		public string row_spacing { get; set; }

		[Description("Enter skip row configuration : ")]
		public RowConfigurationType RowConfiguration { get; set; }

		[Description("Enter Fertile Tiller No. : ")]
		public string ftn { get; set; }
		public enum RowConfigurationType 
		{
			solid, single, _double /*replaces double*/
		}

		[EventSubscribe("DoManagement")]
		private void OnDoManagement(object sender, EventArgs e)
		{
			/*
				
            if (paddock_is_fallow() = 1 and today = date('[date]')) then
              [crop] sow plants =[density], sowing_depth = [depth], cultivar = [cultivar], row_spacing = [row_spacing], skip = [RowConfiguration], tiller_no_fertile = [ftn] ()
            endif
          
			*/
		}
	}
}
```
                Manager Harvesting rule
                  crop = Sorghum
```csharp
using System;
using Models.Core;
using Models.PMF;
using Models.PMF;
namespace Models
{
	[Serializable]
	[System.Xml.Serialization.XmlInclude(typeof(Model))]
	public class Script : Model
	{
		[Link] Clock Clock;

		[Description("Enter name of crop to harvest when ripe : ")]
		public string crop { get; set; }

		[EventSubscribe("DoCalculations")]
		private void OnDoCalculations(object sender, EventArgs e)
		{
			/*
				

           if [crop].StageName = 'harvest_ripe' or [crop].plant_status = 'dead' then
              [crop]  harvest
              [crop]  end_crop
           endif
 
            
			*/
		}
	}
}
```
              Soil: same as Validation.Lawes.LE.LE15.Sorghum_LE15_Buster.paddock.Soil
              Operations: same as Validation.Lawes.LE.LE15.Sorghum_LE15_Buster.paddock.Operations
              Plant Sorghum: CropType=name; IsEnding=false; DaysAfterEnding=0
              Report outputfile: VariableNames=Biomass; EventNames=[Clock].DoReport
              Fertiliser
              Irrigation
            SurfaceOrganicMatter: InitialResidueName=wheat_stubble; InitialResidueType=wheat; InitialResidueMass=0; InitialStandingFraction=0; InitialCPR=0; InitialCNR=80; FractionFaecesAdded=0.5
            SoilArbitrator
        Folder LE17
          Simulation Sorghum_LE17_T1
            Clock: StartDate=1997-11-27; EndDate=1998-04-09
            Summary SummaryFile
            Weather: FileName=Met\LE17.met
            Zone paddock: Area=1; Slope=0
              Folder Manager folder
                Manager Sow SkipRow on a fixed date
                  Date = 1997-12-04
                  Density = 10
                  Depth = 25
                  Cultivar = Buster
                  RowSpacing = 0.5
                  RowConfiguration = solid
                  Ftn = 1
                  script: same as in Validation.Hermitage.HE1_8.HE1.Sorghum_HE1_T1.paddock.Manager folder.Sow SkipRow on a fixed date
                Manager Harvesting rule: same as Validation.Hermitage.HE1_8.HE1.Sorghum_HE1_T1.paddock.Manager folder.Harvesting rule
              Soil: SoilType=Gatton; Site=Gatton CSIRO; NearestTown=Unknown; Region=SE Queensland; NaturalVegetation=Unknown; Latitude=0; Longitude=0
                Water: same as Validation.Lawes.LE.LE13.Sorghum_LE13_Buster-I-N.paddock.Soil.Water
                SoilWater: same as Validation.Lawes.LE.LE13.Sorghum_LE13_Buster-I-N.paddock.Soil.SoilWater
                SoilNitrogen: same as Validation.Hermitage.HE1_8.HE1.Sorghum_HE1_T1.paddock.Soil.SoilNitrogen
                SoilOrganicMatter: same as Validation.Lawes.LE.LE13.Sorghum_LE13_Buster-I-N.paddock.Soil.SoilOrganicMatter
                Analysis: Thickness=[200, 200, 200, 300, 300, 300, 300]; PH=[7.7, 8.3, 8.4, 8.5, 8.5, 8.5, 8.6]; PHUnits=Water; BoronUnits=0
                Sample Initial nitrogen: NO3Units=ppm; NH4Units=ppm; SWUnits=Volumetric; OCUnits=Total; PHUnits=Water
                  Thickness  NO3      NH4
                  200        5.18718  0.1
                  200        2.41329  0.1
                  200        6.50018  0.1
                  300        6.34423  0.1
                  300        6.81417  0.1
                  300        6.70303  0.1
                  300        3.09205  0.1
                Sample Initial water: Thickness=[200, 200, 200, 300, 300, 300, 300]; SW=[0.34, 0.412, 0.439, 0.434, 0.405, 0.399, 0.389]; NO3Units=ppm; NH4Units=ppm; SWUnits=Volumetric; OCUnits=Total; PHUnits=Water
                CERESSoilTemperature
              Operations
                1997-12-04  [Irrigation].Apply(72);
                1997-12-17  [Irrigation].Apply(22);
                1997-12-29  [Irrigation].Apply(27);
                1998-01-06  [Irrigation].Apply(44);
                1998-01-19  [Irrigation].Apply(40);
                1998-02-10  [Irrigation].Apply(17);
                1998-03-05  [Irrigation].Apply(43);
                1998-03-18  [Irrigation].Apply(37);
                1997-12-03  [Fertiliser].Apply(0, Fertiliser.Types.NO3N, 50);
                1997-12-03  [Fertiliser].Apply(40, Fertiliser.Types.NO3N, 50);
                1997-12-04  [Fertiliser].Apply(147, Fertiliser.Types.NO3N, 50);
                1998-01-06  [Fertiliser].Apply(59, Fertiliser.Types.NO3N, 50);
                1998-02-10  [Fertiliser].Apply(59, Fertiliser.Types.NO3N, 50);
              Plant Sorghum: CropType=name; IsEnding=false; DaysAfterEnding=0
              Report outputfile: same as Validation.Hermitage.HE1_8.HE2.Sorghum_HE2_T1.paddock.outputfile
              Fertiliser
              Irrigation
            SurfaceOrganicMatter: InitialResidueName=wheat_stubble; InitialResidueType=wheat; InitialResidueMass=0; InitialStandingFraction=0; InitialCPR=0; InitialCNR=80; FractionFaecesAdded=0.5
            SoilArbitrator
          Simulation Sorghum_LE17_T2
            Clock: StartDate=1997-11-27; EndDate=1998-04-09
            Summary SummaryFile
            Weather: FileName=Met\LE17.met
            Zone paddock: Area=1; Slope=0
              Folder Manager folder
                Manager Sow SkipRow on a fixed date
                  Date = 1997-12-04
                  Density = 10
                  Depth = 25
                  Cultivar = M35-1
                  RowSpacing = 0.5
                  RowConfiguration = solid
                  Ftn = 1
                  script: same as in Validation.Hermitage.HE1_8.HE1.Sorghum_HE1_T1.paddock.Manager folder.Sow SkipRow on a fixed date
                Manager Harvesting rule: same as Validation.Hermitage.HE1_8.HE1.Sorghum_HE1_T1.paddock.Manager folder.Harvesting rule
              Soil: SoilType=Gatton; Site=Gatton CSIRO; NearestTown=Unknown; Region=SE Queensland; NaturalVegetation=Unknown; Latitude=0; Longitude=0
                Water: same as Validation.Lawes.LE.LE13.Sorghum_LE13_Buster-I-N.paddock.Soil.Water
                SoilWater: same as Validation.Lawes.LE.LE13.Sorghum_LE13_Buster-I-N.paddock.Soil.SoilWater
                SoilNitrogen: same as Validation.Hermitage.HE1_8.HE1.Sorghum_HE1_T1.paddock.Soil.SoilNitrogen
                SoilOrganicMatter: same as Validation.Lawes.LE.LE13.Sorghum_LE13_Buster-I-N.paddock.Soil.SoilOrganicMatter
                Analysis: same as Validation.Lawes.LE.LE17.Sorghum_LE17_T1.paddock.Soil.Analysis
                Sample Initial nitrogen: NO3Units=ppm; NH4Units=ppm; SWUnits=Volumetric; OCUnits=Total; PHUnits=Water
                  Thickness  NO3     NH4
                  200        17.363  0.1
                  200        8.078   0.1
                  200        21.758  0.1
                  300        21.236  0.1
                  300        22.809  0.1
                  300        22.437  0.1
                  300        10.35   0.1
                Sample Initial water: Thickness=[200, 200, 200, 300, 300, 300, 300]; SW=[0.34, 0.412, 0.439, 0.434, 0.405, 0.399, 0.389]; NO3Units=ppm; NH4Units=ppm; SWUnits=Volumetric; OCUnits=Total; PHUnits=Water
                CERESSoilTemperature
              Operations: same as Validation.Lawes.LE.LE17.Sorghum_LE17_T1.paddock.Operations
              Plant Sorghum: CropType=name; IsEnding=false; DaysAfterEnding=0
              Fertiliser
              Irrigation
            SurfaceOrganicMatter: InitialResidueName=wheat_stubble; InitialResidueType=wheat; InitialResidueMass=0; InitialStandingFraction=0; InitialCPR=0; InitialCNR=80; FractionFaecesAdded=0.5
            SoilArbitrator
          Simulation Sorghum_LE17_T3
            Clock: StartDate=1997-11-27; EndDate=1998-04-09
            Summary SummaryFile
            Weather: FileName=Met\LE17.met
            Zone paddock: Area=1; Slope=0
              Folder Manager folder
                Manager Sow SkipRow on a fixed date
                  Date = 1997-12-04
                  Density = 10
                  Depth = 25
                  Cultivar = CSH13r
                  RowSpacing = 0.5
                  RowConfiguration = solid
                  Ftn = 1
                  script: same as in Validation.Hermitage.HE1_8.HE1.Sorghum_HE1_T1.paddock.Manager folder.Sow SkipRow on a fixed date
                Manager Harvesting rule: same as Validation.Hermitage.HE1_8.HE1.Sorghum_HE1_T1.paddock.Manager folder.Harvesting rule
              Soil: same as Validation.Lawes.LE.LE17.Sorghum_LE17_T2.paddock.Soil
              Operations: same as Validation.Lawes.LE.LE17.Sorghum_LE17_T1.paddock.Operations
              Plant Sorghum: CropType=name; IsEnding=false; DaysAfterEnding=0
              Report outputfile: VariableNames=Biomass; EventNames=[Clock].DoReport
              Fertiliser
              Irrigation
            SurfaceOrganicMatter: InitialResidueName=wheat_stubble; InitialResidueType=wheat; InitialResidueMass=0; InitialStandingFraction=0; InitialCPR=0; InitialCNR=80; FractionFaecesAdded=0.5
            SoilArbitrator
        Folder LE19
          Simulation Sorghum_LE19_T1
            Clock: StartDate=1998-11-09; EndDate=1999-03-07
            Summary SummaryFile
            Weather: FileName=Met\LE19.met
            Zone paddock: Area=1; Slope=0
              Folder Manager folder
                Manager Sow SkipRow on a fixed date
                  Date = 1998-11-11
                  Density = 10
                  Depth = 30
                  Cultivar = Buster
                  RowSpacing = 0.5
                  RowConfiguration = solid
                  Ftn = 0
                  script: same as in Validation.Hermitage.HE1_8.HE1.Sorghum_HE1_T1.paddock.Manager folder.Sow SkipRow on a fixed date
                Manager Harvesting rule: same as Validation.Hermitage.HE1_8.HE1.Sorghum_HE1_T1.paddock.Manager folder.Harvesting rule
              Soil: SoilType=Gatton; Site=Gatton CSIRO; NearestTown=Unknown; Region=SE Queensland; NaturalVegetation=Unknown; Latitude=0; Longitude=0
                InitialWater Initial water: PercentMethod=0; FractionFull=100
                Water: same as Validation.Lawes.LE.LE13.Sorghum_LE13_Buster-I-N.paddock.Soil.Water
                SoilWater: same as Validation.Lawes.LE.LE13.Sorghum_LE13_Buster-I-N.paddock.Soil.SoilWater
                SoilNitrogen: same as Validation.Hermitage.HE1_8.HE1.Sorghum_HE1_T1.paddock.Soil.SoilNitrogen
                SoilOrganicMatter: same as Validation.Lawes.LE.LE13.Sorghum_LE13_Buster-I-N.paddock.Soil.SoilOrganicMatter
                Analysis: same as Validation.Lawes.LE.LE17.Sorghum_LE17_T1.paddock.Soil.Analysis
                Sample Initial nitrogen: NO3Units=ppm; NH4Units=ppm; SWUnits=Volumetric; OCUnits=Total; PHUnits=Water
                  Thickness  NO3    NH4
                  200        8.581  0.1
                  200        5.84   0.1
                  200        1.684  0.1
                  300        0.665  0.1
                  300        0.363  0.1
                  300        0.439  0.1
                  300        0.582  0.1
                CERESSoilTemperature
              Operations
              Plant Sorghum: CropType=name; IsEnding=false; DaysAfterEnding=0
              Report outputfile: same as Validation.Hermitage.HE1_8.HE2.Sorghum_HE2_T1.paddock.outputfile
              Fertiliser
              Irrigation
            SurfaceOrganicMatter: InitialResidueName=wheat_stubble; InitialResidueType=wheat; InitialResidueMass=0; InitialStandingFraction=0; InitialCPR=0; InitialCNR=80; FractionFaecesAdded=0.5
            SoilArbitrator
          Simulation Sorghum_LE19_T2
            Clock: StartDate=1998-11-09; EndDate=1999-03-07
            Summary SummaryFile
            Weather: FileName=Met\LE19.met
            Zone paddock: Area=1; Slope=0
              Folder Manager folder
                Manager Sow SkipRow on a fixed date
                  Date = 1998-11-11
                  Density = 10
                  Depth = 30
                  Cultivar = Buster
                  RowSpacing = 0.5
                  RowConfiguration = solid
                  Ftn = 0.2
                  script: same as in Validation.Hermitage.HE1_8.HE1.Sorghum_HE1_T1.paddock.Manager folder.Sow SkipRow on a fixed date
                Manager Harvesting rule: same as Validation.Hermitage.HE1_8.HE1.Sorghum_HE1_T1.paddock.Manager folder.Harvesting rule
              Soil: SoilType=Gatton; Site=Gatton CSIRO; NearestTown=Unknown; Region=SE Queensland; NaturalVegetation=Unknown; Latitude=0; Longitude=0
                Water: same as Validation.Lawes.LE.LE13.Sorghum_LE13_Buster-I-N.paddock.Soil.Water
                SoilWater: same as Validation.Lawes.LE.LE13.Sorghum_LE13_Buster-I-N.paddock.Soil.SoilWater
                SoilNitrogen: same as Validation.Hermitage.HE1_8.HE1.Sorghum_HE1_T1.paddock.Soil.SoilNitrogen
                SoilOrganicMatter: same as Validation.Lawes.LE.LE13.Sorghum_LE13_Buster-I-N.paddock.Soil.SoilOrganicMatter
                Analysis: same as Validation.Lawes.LE.LE17.Sorghum_LE17_T1.paddock.Soil.Analysis
                Sample Initial nitrogen: NO3Units=ppm; NH4Units=ppm; SWUnits=Volumetric; OCUnits=Total; PHUnits=Water
                  Thickness  NO3    NH4
                  200        8.581  0.1
                  200        5.84   0.1
                  200        1.684  0.1
                  300        0.665  0.1
                  300        0.363  0.1
                  300        0.439  0.1
                  300        0.582  0.1
                Sample Initial water: Thickness=[200, 200, 200, 300, 300, 300, 300]; SW=[0.293, 0.388, 0.371, 0.315, 0.307, 0.35, 0.374]; NO3Units=ppm; NH4Units=ppm; SWUnits=Volumetric; OCUnits=Total; PHUnits=Water
                CERESSoilTemperature
              Operations
                1998-11-11  [Fertiliser].Apply(55, Fertiliser.Types.NO3N, 50);
              Plant Sorghum: CropType=name; IsEnding=false; DaysAfterEnding=0
              Report outputfile: VariableNames=Biomass; EventNames=[Clock].DoReport
              Fertiliser
              Irrigation
            SurfaceOrganicMatter: InitialResidueName=wheat_stubble; InitialResidueType=wheat; InitialResidueMass=0; InitialStandingFraction=0; InitialCPR=0; InitialCNR=80; FractionFaecesAdded=0.5
            SoilArbitrator
          Simulation Sorghum_LE19_T3
            Clock: StartDate=1998-11-09; EndDate=1999-03-07
            Summary SummaryFile
            Weather: FileName=Met\LE19.met
            Zone paddock: Area=1; Slope=0
              Folder Manager folder
                Manager Sow SkipRow on a fixed date
                  Date = 1998-11-11
                  Density = 10
                  Depth = 30
                  Cultivar = Buster
                  RowSpacing = 0.5
                  RowConfiguration = solid
                  Ftn = 0.3
                  script: same as in Validation.Hermitage.HE1_8.HE1.Sorghum_HE1_T1.paddock.Manager folder.Sow SkipRow on a fixed date
                Manager Harvesting rule: same as Validation.Hermitage.HE1_8.HE1.Sorghum_HE1_T1.paddock.Manager folder.Harvesting rule
              Soil: same as Validation.Lawes.LE.LE19.Sorghum_LE19_T2.paddock.Soil
              Operations
                1998-11-11  [Fertiliser].Apply(55, Fertiliser.Types.NO3N, 50);
                1998-12-13  [Fertiliser].Apply(27, Fertiliser.Types.NO3N, 50);
                1999-01-14  [Fertiliser].Apply(27, Fertiliser.Types.NO3N, 50);
              Plant Sorghum: CropType=name; IsEnding=false; DaysAfterEnding=0
              Report outputfile: VariableNames=Biomass; EventNames=[Clock].DoReport
              Fertiliser
              Irrigation
            SurfaceOrganicMatter: InitialResidueName=wheat_stubble; InitialResidueType=wheat; InitialResidueMass=0; InitialStandingFraction=0; InitialCPR=0; InitialCNR=80; FractionFaecesAdded=0.5
            SoilArbitrator
          Simulation Sorghum_LE19_T4
            Clock: StartDate=1998-11-09; EndDate=1999-03-07
            Summary SummaryFile
            Weather: FileName=Met\LE19.met
            Zone paddock: Area=1; Slope=0
              Folder Manager folder
                Manager Sow SkipRow on a fixed date
                  Date = 1998-11-11
                  Density = 10
                  Depth = 30
                  Cultivar = Buster
                  RowSpacing = 0.5
                  RowConfiguration = solid
                  Ftn = 0.4
                  script: same as in Validation.Hermitage.HE1_8.HE1.Sorghum_HE1_T1.paddock.Manager folder.Sow SkipRow on a fixed date
                Manager Harvesting rule: same as Validation.Hermitage.HE1_8.HE1.Sorghum_HE1_T1.paddock.Manager folder.Harvesting rule
              Soil: same as Validation.Lawes.LE.LE19.Sorghum_LE19_T2.paddock.Soil
              Operations
                1998-11-11  [Fertiliser].Apply(55, Fertiliser.Types.NO3N, 50);
                1998-12-13  [Fertiliser].Apply(55, Fertiliser.Types.NO3N, 50);
                1999-01-14  [Fertiliser].Apply(55, Fertiliser.Types.NO3N, 50);
              Plant Sorghum: CropType=name; IsEnding=false; DaysAfterEnding=0
              Report outputfile: VariableNames=Biomass; EventNames=[Clock].DoReport
              Fertiliser
              Irrigation
            SurfaceOrganicMatter: InitialResidueName=wheat_stubble; InitialResidueType=wheat; InitialResidueMass=0; InitialStandingFraction=0; InitialCPR=0; InitialCNR=80; FractionFaecesAdded=0.5
            SoilArbitrator
          Simulation Sorghum_LE19_T5
            Clock: StartDate=1998-11-09; EndDate=1999-03-07
            Summary SummaryFile
            Weather: FileName=Met\LE19.met
            Zone paddock: Area=1; Slope=0
              Folder Manager folder
                Manager Sow SkipRow on a fixed date
                  Date = 1998-11-11
                  Density = 10
                  Depth = 30
                  Cultivar = CSH13r
                  RowSpacing = 0.5
                  RowConfiguration = solid
                  Ftn = 0
                  script: same as in Validation.Hermitage.HE1_8.HE1.Sorghum_HE1_T1.paddock.Manager folder.Sow SkipRow on a fixed date
                Manager Harvesting rule: same as Validation.Hermitage.HE1_8.HE1.Sorghum_HE1_T1.paddock.Manager folder.Harvesting rule
              Soil: same as Validation.Lawes.LE.LE19.Sorghum_LE19_T2.paddock.Soil
              Operations
              Plant Sorghum: CropType=name; IsEnding=false; DaysAfterEnding=0
              Fertiliser
              Irrigation
            SurfaceOrganicMatter: InitialResidueName=wheat_stubble; InitialResidueType=wheat; InitialResidueMass=0; InitialStandingFraction=0; InitialCPR=0; InitialCNR=80; FractionFaecesAdded=0.5
            SoilArbitrator
          Simulation Sorghum_LE19_T6
            Clock: StartDate=1998-11-09; EndDate=1999-03-10
            Summary SummaryFile
            Weather: FileName=Met\LE19.met
            Zone paddock: Area=1; Slope=0
              Folder Manager folder
                Manager Sow SkipRow on a fixed date
                  Date = 1998-11-11
                  Density = 10
                  Depth = 30
                  Cultivar = CSH13r
                  RowSpacing = 0.5
                  RowConfiguration = solid
                  Ftn = 0.2
                  script: same as in Validation.Hermitage.HE1_8.HE1.Sorghum_HE1_T1.paddock.Manager folder.Sow SkipRow on a fixed date
                Manager Harvesting rule: same as Validation.Hermitage.HE1_8.HE1.Sorghum_HE1_T1.paddock.Manager folder.Harvesting rule
              Soil: same as Validation.Lawes.LE.LE19.Sorghum_LE19_T2.paddock.Soil
              Operations
                1998-11-11  [Fertiliser].Apply(55, Fertiliser.Types.NO3N, 50);
              Plant Sorghum: CropType=name; IsEnding=false; DaysAfterEnding=0
              Report outputfile: VariableNames=Biomass; EventNames=[Clock].DoReport
              Fertiliser
              Irrigation
            SurfaceOrganicMatter: InitialResidueName=wheat_stubble; InitialResidueType=wheat; InitialResidueMass=0; InitialStandingFraction=0; InitialCPR=0; InitialCNR=80; FractionFaecesAdded=0.5
            SoilArbitrator
          Simulation Sorghum_LE19_T7
            Clock: StartDate=1998-11-09; EndDate=1999-03-10
            Summary SummaryFile
            Weather: FileName=Met\LE19.met
            Zone paddock: Area=1; Slope=0
              Folder Manager folder
                Manager Sow SkipRow on a fixed date
                  Date = 1998-11-11
                  Density = 10
                  Depth = 30
                  Cultivar = CSH13r
                  RowSpacing = 0.5
                  RowConfiguration = solid
                  Ftn = 0.3
                  script: same as in Validation.Hermitage.HE1_8.HE1.Sorghum_HE1_T1.paddock.Manager folder.Sow SkipRow on a fixed date
                Manager Harvesting rule: same as Validation.Hermitage.HE1_8.HE1.Sorghum_HE1_T1.paddock.Manager folder.Harvesting rule
              Soil: same as Validation.Lawes.LE.LE19.Sorghum_LE19_T2.paddock.Soil
              Operations
                1998-11-11  [Fertiliser].Apply(55, Fertiliser.Types.NO3N, 50);
                1998-12-17  [Fertiliser].Apply(27, Fertiliser.Types.NO3N, 50);
                1999-01-23  [Fertiliser].Apply(27, Fertiliser.Types.NO3N, 50);
              Report outputfile: VariableNames=Biomass; EventNames=[Clock].DoReport
              Plant Sorghum: CropType=name; IsEnding=false; DaysAfterEnding=0
              Fertiliser
              Irrigation
            SurfaceOrganicMatter: InitialResidueName=wheat_stubble; InitialResidueType=wheat; InitialResidueMass=0; InitialStandingFraction=0; InitialCPR=0; InitialCNR=80; FractionFaecesAdded=0.5
            SoilArbitrator
          Simulation Sorghum_LE19_T8
            Clock: StartDate=1998-11-09; EndDate=1999-03-10
            Summary SummaryFile
            Weather: FileName=Met\LE19.met
            Zone paddock: Area=1; Slope=0
              Folder Manager folder: same as Validation.Lawes.LE.LE19.Sorghum_LE19_T7.paddock.Manager folder
              Soil: same as Validation.Lawes.LE.LE19.Sorghum_LE19_T2.paddock.Soil
              Operations
                1998-11-11  [Fertiliser].Apply(55, Fertiliser.Types.NO3N, 50);
                1998-12-17  [Fertiliser].Apply(55, Fertiliser.Types.NO3N, 50);
                1999-01-23  [Fertiliser].Apply(55, Fertiliser.Types.NO3N, 50);
              Plant Sorghum: CropType=name; IsEnding=false; DaysAfterEnding=0
              Report outputfile: VariableNames=Biomass; EventNames=[Clock].DoReport
              Fertiliser
              Irrigation
            SurfaceOrganicMatter: InitialResidueName=wheat_stubble; InitialResidueType=wheat; InitialResidueMass=0; InitialStandingFraction=0; InitialCPR=0; InitialCNR=80; FractionFaecesAdded=0.5
            SoilArbitrator
          Experiment Sorghum_LE19
            Factors
              Factor Cv
                Specification=[Sow SkipRow on a fixed date].Script.Cultivar = Buster, CSH13r
              Factor FTN: Specification=[Sow SkipRow on a fixed date].Script.Ftn = 0, 0.2, 0.3, 0.4
            Simulation Sorghum_LE19_Base: same as Validation.Lawes.LE.LE19.Sorghum_LE19_T1
        Folder LE21
          Simulation Sorghum_Gatton_RUE_1
            Clock: StartDate=1999-11-22; EndDate=2000-04-03
            Summary SummaryFile
            Weather: FileName=Met\Gatton_RUE.met
            Zone paddock: Area=1; Slope=0
              Folder Manager folder
                Manager Sow SkipRow on a fixed date
                  Date = 1999-12-02
                  Density = 10
                  Depth = 40
                  Cultivar = CSH13r
                  RowSpacing = 0.5
                  RowConfiguration = solid
                  Ftn = 0
                  script: same as in Validation.Hermitage.HE1_8.HE1.Sorghum_HE1_T1.paddock.Manager folder.Sow SkipRow on a fixed date
                Manager Harvesting rule: same as Validation.Hermitage.HE1_8.HE1.Sorghum_HE1_T1.paddock.Manager folder.Harvesting rule
              Soil: SoilType=LawesBlackVertosol; Site=Gatton RS; NearestTown=Unknown; Region=Gatton; NaturalVegetation=Unknown; Latitude=0; Longitude=0
                InitialWater Initial water: PercentMethod=0; FractionFull=1
                Water
                  Thickness  BD    AirDry  LL15  DUL   SAT
                  150        1.32  0.1     0.26  0.41  0.46
                  150        1.3   0.15    0.26  0.43  0.48
                  300        1.23  0.25    0.26  0.46  0.51
                  300        1.27  0.26    0.26  0.44  0.49
                  300        1.37  0.25    0.25  0.4   0.45
                  300        1.35  0.28    0.28  0.41  0.46
                  300        1.35  0.31    0.31  0.38  0.43
                  SoilCrop SorghumSoil: LL=[0.26, 0.26, 0.26, 0.26, 0.25, 0.28, 0.31]; KL=[0.08, 0.08, 0.08, 0.08, 0.06, 0.04, 0.02]; XF=[1, 1, 1, 1, 1, 1, 1]
                SoilWater: SummerDate=1-Nov; SummerU=6; SummerCona=3.5; WinterDate=1-Apr; WinterU=6; WinterCona=3.5; DiffusConst=88; DiffusSlope=35.4; Salb=0.13; CN2Bare=91; CNRed=20; CNCov=0.8; max_pond=0; Thickness=[150, 150, 300, 300, 300, 300, 300]; SWCON=[0.5, 0.5, 0.5, 0.5, 0.5, 0.5, 0.5]; ResidueInterception=0
                SoilNitrogen: same as Validation.Hermitage.HE1_8.HE1.Sorghum_HE1_T1.paddock.Soil.SoilNitrogen
                SoilOrganicMatter: RootCN=30; EnrACoeff=7.4; EnrBCoeff=0.2; OCUnits=Total
                  Thickness  OC    SoilCN  FBiom  FInert  RootWt
                  150        1.3   12.5    0.03   0.31    520.694
                  150        0.65  12.5    0.01   0.38    405.517
                  300        0.32  12.5    0      0.47    245.958
                  300        0.11  12.5    0      0.7     149.181
                  300        0.11  12.5    0      0.9     90.483
                  300        0.11  12.5    0      0.95    54.8807
                  300        0.11  12.5    0      0.95    33.2868
                Analysis: Thickness=[150, 150, 300, 300, 300, 300, 300]; PH=[8.2, 8.7, 8.9, 8.1, 8, 8, 8]; PHUnits=Water; BoronUnits=0
                Sample Initial nitrogen: NO3Units=ppm; NH4Units=ppm; SWUnits=Volumetric; OCUnits=Total; PHUnits=Water
                  Thickness  NO3    NH4
                  150        9.202  0.1
                  150        4.403  0.1
                  300        2.239  0.1
                  300        1.237  0.1
                  300        1.266  0.1
                  300        1.77   0.1
                  300        2.064  0.1
                CERESSoilTemperature
              Operations
                1999-12-03  [Irrigation].Apply(17);
                1999-12-06  [Irrigation].Apply(20);
                1999-12-17  [Irrigation].Apply(20);
                2000-01-07  [Irrigation].Apply(10);
                2000-01-14  [Irrigation].Apply(48);
                2000-01-27  [Irrigation].Apply(21);
                2000-02-04  [Irrigation].Apply(17);
                2000-02-11  [Irrigation].Apply(30);
                2000-02-25  [Irrigation].Apply(41);
                2000-03-03  [Irrigation].Apply(15);
                1999-11-28  [Fertiliser].Apply(0, Fertiliser.Types.NO3N, 50);
                1999-11-27  [Fertiliser].Apply(0, Fertiliser.Types.NO3N, 50);
              Plant Sorghum: CropType=name; IsEnding=false; DaysAfterEnding=0
              Report outputfile: same as Validation.Hermitage.HE1_8.HE2.Sorghum_HE2_T1.paddock.outputfile
              Fertiliser
              Irrigation
            SurfaceOrganicMatter: InitialResidueName=wheat_stubble; InitialResidueType=wheat; InitialResidueMass=0; InitialStandingFraction=0; InitialCPR=0; InitialCNR=80; FractionFaecesAdded=0.5
            SoilArbitrator
          Simulation Sorghum_Gatton_RUE_2
            Clock: StartDate=1999-11-22; EndDate=2000-04-03
            Summary SummaryFile
            Weather: FileName=Met\Gatton_RUE.met
            Zone paddock: Area=1; Slope=0
              Folder Manager folder
                Manager Sow SkipRow on a fixed date
                  Date = 1999-12-02
                  Density = 10
                  Depth = 40
                  Cultivar = A35xQL36
                  RowSpacing = 0.5
                  RowConfiguration = solid
                  Ftn = 0
                  script: same as in Validation.Hermitage.HE1_8.HE1.Sorghum_HE1_T1.paddock.Manager folder.Sow SkipRow on a fixed date
                Manager Harvesting rule: same as Validation.Hermitage.HE1_8.HE1.Sorghum_HE1_T1.paddock.Manager folder.Harvesting rule
              Soil: same as Validation.Lawes.LE.LE21.Sorghum_Gatton_RUE_1.paddock.Soil
              Operations: same as Validation.Lawes.LE.LE21.Sorghum_Gatton_RUE_1.paddock.Operations
              Plant Sorghum: CropType=name; IsEnding=false; DaysAfterEnding=0
              Report outputfile: VariableNames=Biomass; EventNames=[Clock].DoReport
              Fertiliser
              Irrigation
            SurfaceOrganicMatter: InitialResidueName=wheat_stubble; InitialResidueType=wheat; InitialResidueMass=0; InitialStandingFraction=0; InitialCPR=0; InitialCNR=80; FractionFaecesAdded=0.5
            SoilArbitrator
          Simulation Sorghum_Gatton_RUE_3
            Clock: StartDate=1999-11-22; EndDate=2000-04-03
            Summary SummaryFile
            Weather: FileName=Met\Gatton_RUE.met
            Zone paddock: Area=1; Slope=0
              Folder Manager folder
                Manager Sow SkipRow on a fixed date
                  Date = 1999-12-02
                  Density = 10
                  Depth = 40
                  Cultivar = QL39xQL36
                  RowSpacing = 0.5
                  RowConfiguration = solid
                  Ftn = 0
                  script: same as in Validation.Hermitage.HE1_8.HE1.Sorghum_HE1_T1.paddock.Manager folder.Sow SkipRow on a fixed date
                Manager Harvesting rule: same as Validation.Hermitage.HE1_8.HE1.Sorghum_HE1_T1.paddock.Manager folder.Harvesting rule
              Soil: same as Validation.Lawes.LE.LE21.Sorghum_Gatton_RUE_1.paddock.Soil
              Operations: same as Validation.Lawes.LE.LE21.Sorghum_Gatton_RUE_1.paddock.Operations
              Plant Sorghum: CropType=name; IsEnding=false; DaysAfterEnding=0
              Report outputfile: VariableNames=Biomass; EventNames=[Clock].DoReport
              Fertiliser
              Irrigation
            SurfaceOrganicMatter: InitialResidueName=wheat_stubble; InitialResidueType=wheat; InitialResidueMass=0; InitialStandingFraction=0; InitialCPR=0; InitialCNR=80; FractionFaecesAdded=0.5
            SoilArbitrator
          Simulation Sorghum_Gatton_RUE_4
            Clock: StartDate=1999-11-22; EndDate=2000-04-03
            Summary SummaryFile
            Weather: FileName=Met\Gatton_RUE.met
            Zone paddock: Area=1; Slope=0
              Folder Manager folder: same as Validation.Lawes.LE.LE21.Sorghum_Gatton_RUE_1.paddock.Manager folder
              Soil: same as Validation.Lawes.LE.LE21.Sorghum_Gatton_RUE_1.paddock.Soil
              Operations
                1999-12-03  [Irrigation].Apply(17);
                1999-12-06  [Irrigation].Apply(20);
                1999-12-17  [Irrigation].Apply(20);
                2000-01-07  [Irrigation].Apply(10);
                2000-01-14  [Irrigation].Apply(48);
                2000-01-27  [Irrigation].Apply(21);
                2000-02-04  [Irrigation].Apply(17);
                2000-02-11  [Irrigation].Apply(30);
                2000-02-25  [Irrigation].Apply(41);
                2000-03-03  [Irrigation].Apply(15);
                1999-11-29  [Fertiliser].Apply(44, Fertiliser.Types.NO3N, 50);
                1999-11-28  [Fertiliser].Apply(0, Fertiliser.Types.NO3N, 50);
                1999-11-27  [Fertiliser].Apply(0, Fertiliser.Types.NO3N, 50);
              Plant Sorghum: CropType=name; IsEnding=false; DaysAfterEnding=0
              Report outputfile: VariableNames=Biomass; EventNames=[Clock].DoReport
              Fertiliser
              Irrigation
            SurfaceOrganicMatter: InitialResidueName=wheat_stubble; InitialResidueType=wheat; InitialResidueMass=0; InitialStandingFraction=0; InitialCPR=0; InitialCNR=80; FractionFaecesAdded=0.5
            SoilArbitrator
          Simulation Sorghum_Gatton_RUE_5
            Clock: StartDate=1999-11-22; EndDate=2000-04-03
            Summary SummaryFile
            Weather: FileName=Met\Gatton_RUE.met
            Zone paddock: Area=1; Slope=0
              Folder Manager folder: same as Validation.Lawes.LE.LE21.Sorghum_Gatton_RUE_2.paddock.Manager folder
              Soil: same as Validation.Lawes.LE.LE21.Sorghum_Gatton_RUE_1.paddock.Soil
              Operations
                1999-12-03  [Irrigation].Apply(17);
              Plant Sorghum: CropType=name; IsEnding=false; DaysAfterEnding=0
              Report outputfile: VariableNames=Biomass; EventNames=[Clock].DoReport
              Fertiliser
              Irrigation
            SurfaceOrganicMatter: InitialResidueName=wheat_stubble; InitialResidueType=wheat; InitialResidueMass=0; InitialStandingFraction=0; InitialCPR=0; InitialCNR=80; FractionFaecesAdded=0.5
            SoilArbitrator
          Simulation Sorghum_Gatton_RUE_6
            Clock: StartDate=1999-11-22; EndDate=2000-04-03
            Summary SummaryFile
            Weather: FileName=Met\Gatton_RUE.met
            Zone paddock: Area=1; Slope=0
              Folder Manager folder: same as Validation.Lawes.LE.LE21.Sorghum_Gatton_RUE_3.paddock.Manager folder
              Soil: same as Validation.Lawes.LE.LE21.Sorghum_Gatton_RUE_1.paddock.Soil
              Operations: same as Validation.Lawes.LE.LE21.Sorghum_Gatton_RUE_4.paddock.Operations
              Plant Sorghum: CropType=name; IsEnding=false; DaysAfterEnding=0
              Report outputfile: VariableNames=Biomass; EventNames=[Clock].DoReport
              Fertiliser
              Irrigation
            SurfaceOrganicMatter: InitialResidueName=wheat_stubble; InitialResidueType=wheat; InitialResidueMass=0; InitialStandingFraction=0; InitialCPR=0; InitialCNR=80; FractionFaecesAdded=0.5
            SoilArbitrator
          Simulation Sorghum_Gatton_RUE_7
            Clock: StartDate=1999-11-22; EndDate=2000-04-03
            Summary SummaryFile
            Weather: FileName=Met\Gatton_RUE.met
            Zone paddock: Area=1; Slope=0
              Folder Manager folder
                Manager Sow SkipRow on a fixed date
                  Date = 1999-12-02
                  Density = 10
                  Depth = 40
                  Cultivar = CSH13r
                  RowSpacing = 0.5
                  RowConfiguration = solid
                  Ftn = 0.9
                  script: same as in Validation.Hermitage.HE1_8.HE1.Sorghum_HE1_T1.paddock.Manager folder.Sow SkipRow on a fixed date
                Manager Harvesting rule: same as Validation.Hermitage.HE1_8.HE1.Sorghum_HE1_T1.paddock.Manager folder.Harvesting rule
              Soil: same as Validation.Lawes.LE.LE21.Sorghum_Gatton_RUE_1.paddock.Soil
              Operations
                1999-12-03  [Irrigation].Apply(17);
                1999-12-06  [Irrigation].Apply(20);
                1999-12-17  [Irrigation].Apply(20);
                2000-01-07  [Irrigation].Apply(10);
                2000-01-14  [Irrigation].Apply(48);
                2000-01-27  [Irrigation].Apply(21);
                2000-02-04  [Irrigation].Apply(17);
                2000-02-11  [Irrigation].Apply(30);
                2000-02-25  [Irrigation].Apply(41);
                2000-03-03  [Irrigation].Apply(15);
                1999-11-29  [Fertiliser].Apply(117, Fertiliser.Types.NO3N, 50);
                2000-01-07  [Fertiliser].Apply(119, Fertiliser.Types.NO3N, 50);
                2000-02-11  [Fertiliser].Apply(119, Fertiliser.Types.NO3N, 50);
                1999-11-28  [Fertiliser].Apply(0, Fertiliser.Types.NO3N, 50);
                1999-11-27  [Fertiliser].Apply(0, Fertiliser.Types.NO3N, 50);
              Plant Sorghum: CropType=name; IsEnding=false; DaysAfterEnding=0
              Report outputfile: VariableNames=Biomass; EventNames=[Clock].DoReport
              Fertiliser
              Irrigation
            SurfaceOrganicMatter: InitialResidueName=wheat_stubble; InitialResidueType=wheat; InitialResidueMass=0; InitialStandingFraction=0; InitialCPR=0; InitialCNR=80; FractionFaecesAdded=0.5
            SoilArbitrator
          Simulation Sorghum_Gatton_RUE_8
            Clock: StartDate=1999-11-22; EndDate=2000-04-03
            Summary SummaryFile
            Weather: FileName=Met\Gatton_RUE.met
            Zone paddock: Area=1; Slope=0
              Folder Manager folder
                Manager Sow SkipRow on a fixed date
                  Date = 1999-12-02
                  Density = 10
                  Depth = 40
                  Cultivar = A35xQL36
                  RowSpacing = 0.5
                  RowConfiguration = solid
                  Ftn = 0.2
                  script: same as in Validation.Hermitage.HE1_8.HE1.Sorghum_HE1_T1.paddock.Manager folder.Sow SkipRow on a fixed date
                Manager Harvesting rule: same as Validation.Hermitage.HE1_8.HE1.Sorghum_HE1_T1.paddock.Manager folder.Harvesting rule
              Soil: same as Validation.Lawes.LE.LE21.Sorghum_Gatton_RUE_1.paddock.Soil
              Operations
                1999-12-03  [Irrigation].Apply(17);
              Plant Sorghum: CropType=name; IsEnding=false; DaysAfterEnding=0
              Report outputfile: VariableNames=Biomass; EventNames=[Clock].DoReport
              Fertiliser
              Irrigation
            SurfaceOrganicMatter: InitialResidueName=wheat_stubble; InitialResidueType=wheat; InitialResidueMass=0; InitialStandingFraction=0; InitialCPR=0; InitialCNR=80; FractionFaecesAdded=0.5
            SoilArbitrator
          Simulation Sorghum_Gatton_RUE_9
            Clock: StartDate=1999-11-22; EndDate=2000-04-03
            Summary SummaryFile
            Weather: FileName=Met\Gatton_RUE.met
            Zone paddock: Area=1; Slope=0
              Folder Manager folder
                Manager Sow SkipRow on a fixed date
                  Date = 1999-12-02
                  Density = 10
                  Depth = 40
                  Cultivar = QL39xQL36
                  RowSpacing = 0.5
                  RowConfiguration = solid
                  Ftn = 0.9
                  script: same as in Validation.Hermitage.HE1_8.HE1.Sorghum_HE1_T1.paddock.Manager folder.Sow SkipRow on a fixed date
                Manager Harvesting rule: same as Validation.Hermitage.HE1_8.HE1.Sorghum_HE1_T1.paddock.Manager folder.Harvesting rule
              Soil: same as Validation.Lawes.LE.LE21.Sorghum_Gatton_RUE_1.paddock.Soil
              Operations: same as Validation.Lawes.LE.LE21.Sorghum_Gatton_RUE_7.paddock.Operations
              Plant Sorghum: CropType=name; IsEnding=false; DaysAfterEnding=0
              Report outputfile: VariableNames=Biomass; EventNames=[Clock].DoReport
              Fertiliser
              Irrigation
            SurfaceOrganicMatter: InitialResidueName=wheat_stubble; InitialResidueType=wheat; InitialResidueMass=0; InitialStandingFraction=0; InitialCPR=0; InitialCNR=80; FractionFaecesAdded=0.5
            SoilArbitrator
  Folder Sensibility
    Folder CO2AndTranspirationEfficiency
      Experiment CO2TE
        Memo
          This test examines the impact of a doubling of CO2 from historical (350ppm) on Transpiration Efficiency.  [Reyenga1999] suggest an increase of approximately 37% in Transpiration Efficiency over this range in CO2 concentration.
          In this test, a series of wheat crops are simulated for Dalby, Queensland, Australia.  Nitrogen limitation is removed.  The slope of plots of biomass production vs crop water use is used to quantify a gross seasonal TE.  The change in slope should approximate the response suggested by [Reyenga1999].
        Factors
          Factor CO2: Specification=[SetCO2]
            Manager 350ppm
              CO2 = 350
```csharp
using System;
using Models.Core;
using APSIM.Shared.Utilities;



using System.Collections.Generic;
using System.Text;
using Models.PMF;
using Models;
using System.Xml.Serialization;

namespace Models
{
    [Serializable] 
    [System.Xml.Serialization.XmlInclude(typeof(Model))]
    public class Script : Model
    {
        [Link] Weather Met;
        [Link] Clock Clock;
    
        [Description("CO2 conc")]
        public double CO2 { get; set; }
    
        
        [EventSubscribe("PreparingNewWeatherData")]
        private void OnPreparingNewWeatherData(object sender, EventArgs e)
        {
            Met.CO2 = CO2;        
        }
    }
}
```
            Manager 700ppm
              CO2 = 700
              script: same as in Sensibility.CO2AndTranspirationEfficiency.CO2TE.Factors.CO2.350ppm
        Simulation CO2TEBaseSimulation
          Clock: StartDate=1990-01-01; EndDate=2000-12-31
          Summary summaryfile
          Weather: FileName=%root%\Examples\WeatherFiles\Dalby.met
          SoilArbitrator Soil Arbitrator
          Zone Field: Area=1; Slope=0
            Fertiliser
            SurfaceOrganicMatter: InitialResidueName=wheat_stubble; InitialResidueType=wheat; InitialResidueMass=500; InitialStandingFraction=0; InitialCPR=0; InitialCNR=100; FractionFaecesAdded=0.5
            MicroClimate: a_interception=0; b_interception=1; c_interception=0; d_interception=0; soil_albedo=0.23; SoilHeatFluxFraction=0.4; NightInterceptionFraction=0.5; ReferenceHeight=2
            Report SensibilityReport: EventNames=[Sorghum].Harvesting
              VariableNames:
                [Clock].Today.Date
                [Sorghum].Grain.Wt
                [Sorghum].AboveGround.Wt
                Sum of [Sorghum].Leaf.Transpiration from [Sorghum].Sowing to [Sorghum].Harvesting as CropET
            Plant Sorghum: CropType=name; IsEnding=false; DaysAfterEnding=0
            Manager SetCO2
              CO2 = 0
```csharp
using System;
using Models.Core;
using APSIM.Shared.Utilities;



using System.Collections.Generic;
using System.Text;
using Models.PMF;
using Models;
using System.Xml.Serialization;

namespace Models
{
    [Serializable] 
    [System.Xml.Serialization.XmlInclude(typeof(Model))]
    public class Script : Model
    {
        [Link] Weather Met;
        [Link] Clock Clock;
        [Link] Zone zone;
    
        [Description("CO2 conc")]
        public double CO2 { get; set; }
    
        
        [EventSubscribe("PreparingNewWeatherData")]
        private void OnPreparingNewWeatherData(object sender, EventArgs e)
        {
            zone.Set("Weather.CO2", CO2);
        }
    }
}
```
            Manager SowingRule
              StartDate = 1-may
              EndDate = 10-jul
              MinESW = 100
              MinRain = 25
              RainDays = 7
              CultivarName = Buster
              SowingDepth = 30
              RowSpacing = 250
              Population = 120
```csharp
using System;
using Models.Core;
using Models.PMF;
using Models.Soils;
using Models.Soils.Nutrients;
using Models.Utilities;
using APSIM.Shared.Utilities;

namespace Models
{
    [Serializable]
    public class Script : Model
    {
        [Link] Clock Clock;
        [Link] Fertiliser Fertiliser;
        [Link] Summary Summary;
        [Link] Plant Sorghum;
        [Link] Soil Soil; 
        Accumulator accumulatedRain;
        
        [Description("Start of sowing window (d-mmm)")]
        public string StartDate { get; set;}
        [Description("End of sowing window (d-mmm)")]
        public string EndDate { get; set;}
        [Description("Minimum extractable soil water for sowing (mm)")]
        public double MinESW { get; set;}
        [Description("Accumulated rainfall required for sowing (mm)")]
        public double MinRain { get; set;}
        [Description("Duration of rainfall accumulation (d)")]
        public int RainDays { get; set;}
        [Description("Cultivar to be sown")]
        [Display(Type=DisplayType.CultivarName)]
        public string CultivarName { get; set;}
        [Description("Sowing depth (mm)")]
        public double SowingDepth { get; set;}        
        [Description("Row spacing (mm)")]
        public double RowSpacing { get; set;}    
        [Description("Plant population (/m2)")]
        public double Population { get; set;}    
        
        
        [EventSubscribe("Commencing")]
        private void OnSimulationCommencing(object sender, EventArgs e)
        {
            accumulatedRain = new Accumulator(this, "[Weather].Rain", RainDays);
        }
        

        [EventSubscribe("DoManagement")]
        private void OnDoManagement(object sender, EventArgs e)
        {
            accumulatedRain.Update();
            
            if (DateUtilities.WithinDates(StartDate,Clock.Today,EndDate) &&
                !Sorghum.IsAlive &&
                MathUtilities.Sum(Soil.SoilWater.ESW) > MinESW &&
                accumulatedRain.Sum > MinRain)
            {
               Sorghum.Sow(population:Population, cultivar:CultivarName, depth:SowingDepth, rowSpacing:RowSpacing);    
            }
        
        }
        
    }
}
```
            Manager Harvest
```csharp
using System;
using Models.Core;
using Models.PMF;
using Models.Soils;
using Models.Soils.Nutrients;
using Models.Utilities;
using APSIM.Shared.Utilities;

namespace Models
{
    [Serializable]
    public class Script : Model
    {
        [Link] Plant Sorghum;

        [EventSubscribe("DoManagement")]
        private void OnDoManagement(object sender, EventArgs e)
        {
            if (Sorghum.IsReadyForHarvesting)
            {
               Sorghum.Harvest();
               Sorghum.EndCrop();    
            }
        
        }
        
    }
}
```
            Manager SowingFertiliser
              Amount = 300
              CropName = Sorghum
```csharp
using System;
using Models.Core;
using Models.PMF;
namespace Models
{
    [Serializable]
    public class Script : Model
    {
        [Link] Clock Clock;
        [Link] Fertiliser Fertiliser;
        [Link] Summary Summary;
        
        
        [Description("Amount of fertiliser to be applied (kg/ha)")]
        public double Amount { get; set;}
        
        [Description("Crop to be fertilised")]
        public string CropName { get; set;}
        
        
        

        [EventSubscribe("Sowing")]
        private void OnSowing(object sender, EventArgs e)
        {
            Model crop = sender as Model;
            if (crop.Name.ToLower()==CropName.ToLower())
                Fertiliser.Apply(Amount: Amount, Type: Fertiliser.Types.NO3N);
        }
        
    }
}
```
            Soil: same as Validation.Hermitage.HE1_8.HE1.Sorghum_HE1_T1.paddock.Soil
    Experiment Bugesera
      Memo
        # Copied from maize validation set - this needs editing!

        Sorghum is grown in the Bugesera region of southern Rwanda in Central Africa.  The region has a bimodal rainfall distribution which allows two plantings per year.  For low input situations the maize yields should vary between 1 and 3 t/ha per crop.  Under fertilised conditions the yield should increase up to 5 t/ha per crop.
      Factors
        Factor NRate: Specification=[SowingFertiliser].Script.Amount = 0, 50
      Simulation Bugesera
        Clock: StartDate=2000-01-01; EndDate=2013-12-31
        Summary SummaryFile
        Weather: FileName=%root%\Tests\Validation\Maize\Bugesera.met
        Manager ClimateChange
          DeltaMaxT = 0
          DeltaRadiation = 0
          DeltaRain = 0
```csharp
using System;
using Models.Core;
using Models.PMF;
using Models.Soils;
using Models.Soils.Nutrients;
using Models.Utilities;
using APSIM.Shared.Utilities;

namespace Models
{
    [Serializable]
    public class Script : Model
    {
        [Link] Clock Clock;
        [Link] Weather Weather;
        [Link] Summary Summary;
        
        [Description("Change in Maximum Temperature (oC)")]
        public double DeltaMaxT { get; set; }
        [Description("Change in SolarRadiation (%)")]
        public double DeltaRadiation { get; set; }
        [Description("Change in Rainfall (%)")]
        public double DeltaRain { get; set; }
        
        [EventSubscribe("Commencing")]
        private void OnSimulationCommencing(object sender, EventArgs e)
        {
        }
        

        [EventSubscribe("PreparingNewWeatherData")]
        private void OnPreparingNewWeatherData(object sender, EventArgs e)
        {
            Weather.MaxT += DeltaMaxT;
            Weather.Radn *= (1.0 + DeltaRadiation / 100);
            Weather.Rain *= (1.0 + DeltaRain / 100);
        }
        
    }
}
```
        SoilArbitrator Soil Arbitrator
        Zone Field: Area=1; Slope=0
          Report BugeseraSensibility: EventNames=[Sorghum].Harvesting
            VariableNames:
              [Clock].Today
              [Sorghum].Phenology.CurrentStageName
              [Sorghum].AboveGround.Wt
              [Sorghum].AboveGround.N
              [Sorghum].Grain.Size
              [Sorghum].Grain.Number
              [Sorghum].Grain.Wt
              [Sorghum].Grain.N
              [Sorghum].Total.Wt
              [Sorghum].Phenology.FloweringDAS.Value() as FloweringDAS
              [Sorghum].Phenology.MaturityDAS.Value() as MaturityDAS
              [Sorghum].Phenology.DaysAfterSowing
              sum of [Weather].Rain from [Sorghum].Sowing to [Sorghum].Harvesting as InCropRain
              [Soil].SoilNitrogen.OC[1] as SurfaceOC
          Fertiliser
          SurfaceOrganicMatter: InitialResidueName=wheat_stubble; InitialResidueType=wheat; InitialResidueMass=500; InitialStandingFraction=0; InitialCPR=0; InitialCNR=100; FractionFaecesAdded=0.5
          MicroClimate: a_interception=0; b_interception=1; c_interception=0; d_interception=0; soil_albedo=0.3; SoilHeatFluxFraction=0.4; NightInterceptionFraction=0.5; ReferenceHeight=2
          Manager SowingFertiliser
            Amount = 0
            CropName = Sorghum
            script: same as in Sensibility.CO2AndTranspirationEfficiency.CO2TE.CO2TEBaseSimulation.Field.SowingFertiliser
          Manager SowingRuleA
            StartDate = 15-sep
            EndDate = 15-oct
            MinESW = 30
            MinRain = 30
            RainDays = 3
            CultivarName = Buster
            SowingDepth = 30
            RowSpacing = 750
            Population = 5.3
            MustSow = True
```csharp
using System;
using Models.Core;
using Models.PMF;
using Models.Soils;
using Models.Soils.Nutrients;
using Models.Utilities;
using APSIM.Shared.Utilities;

namespace Models
{
    [Serializable]
    public class Script : Model
    {
        [Link] Clock Clock;
        [Link] Fertiliser Fertiliser;
        [Link] Summary Summary;
        [Link] Plant sorghum;
        [Link] Soil Soil;
        Accumulator accumulatedRain;
        
        [Description("Start of sowing window (d-mmm)")]
        public string StartDate { get; set; }
        [Description("End of sowing window (d-mmm)")]
        public string EndDate { get; set; }
        [Description("Minimum extractable soil water for sowing (mm)")]
        public double MinESW { get; set; }
        [Description("Accumulated rainfall required for sowing (mm)")]
        public double MinRain { get; set; }
        [Description("Duration of rainfall accumulation (d)")]
        public int RainDays { get; set; }
        [Description("Cultivar to be sown")]
        [Display(Type = DisplayType.CultivarName)]
        public string CultivarName { get; set; }
        [Description("Sowing depth (mm)")]
        public double SowingDepth { get; set; }
        [Description("Row spacing (mm)")]
        public double RowSpacing { get; set; }
        [Description("Plant population (/m2)")]
        public double Population { get; set; }
        [Description("Must sow at end of window (T/F)")]
        public bool MustSow{ get; set; }
        
        
        [EventSubscribe("Commencing")]
        private void OnSimulationCommencing(object sender, EventArgs e)
        {
            accumulatedRain = new Accumulator(this, "[Weather].Rain", RainDays);
        }
        

        [EventSubscribe("DoManagement")]
        private void OnDoManagement(object sender, EventArgs e)
        {
            accumulatedRain.Update();
            
            if ((DateUtilities.WithinDates(StartDate, Clock.Today, EndDate) &&
                sorghum.IsAlive == false &&
                MathUtilities.Sum(Soil.SoilWater.ESW) > MinESW &&
                accumulatedRain.Sum > MinRain)
                || (DateUtilities.WithinDates(EndDate, Clock.Today, EndDate) && sorghum.IsAlive == false && MustSow == true))
            {
                sorghum.Sow(population: Population, cultivar: CultivarName, depth: SowingDepth, rowSpacing: RowSpacing);    
            }
        
        }
        
    }
}
```
          Manager SowingRuleB
            StartDate = 1-mar
            EndDate = 30-mar
            MinESW = 30
            MinRain = 30
            RainDays = 3
            CultivarName = Buster
            SowingDepth = 30
            RowSpacing = 750
            Population = 5.3
            MustSow = True
            script: same as in Sensibility.Bugesera.Bugesera.Field.SowingRuleA
          Manager Harvesting
            RemoveFraction = 1
```csharp
using System;
using Models.Core;
using System.Collections.Generic;
using System.Text;
using Models.Soils;
using Models.Soils.Nutrients;
using Models.PMF;
using Models.Surface;
using Models;
using System.Xml.Serialization;
using APSIM.Shared.Utilities;

namespace Models
{
    [Serializable] 
    public class Script : Model
    {
        [Link] Plant Maize;
        [Link] Zone zone;
        [Link] SurfaceOrganicMatter SOM;

        [Description("Fraction of resiudes to remove at harvest (0-1)")]
        public double RemoveFraction { get; set; }

    
        [EventSubscribe("DoManagement")]
        private void OnDoManagement(object sender, EventArgs e)
        {
            if (Maize.Phenology.CurrentPhaseName == "ReadyForHarvesting")
            {
                Maize.Harvest();
                Maize.EndCrop();
                if (RemoveFraction > 0)
                    SOM.Incorporate(RemoveFraction, 0.0);                
            }
        }
        
        [EventSubscribe("DoManagementCalculations")]
        private void OnDoManagementCalculations(object sender, EventArgs e)
        {
            
        }
    }
}
```
          Soil: same as Validation.Hermitage.HE1_8.HE1.Sorghum_HE1_T1.paddock.Soil
          Plant Sorghum: CropType=name; IsEnding=false; DaysAfterEnding=0
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