folder Hermitage: version=36; creator=Apsim 7.7-r0
  simulation Sorghum_HighWaterHighN
    clock
      start_date = 18/11/1997  # Select the start date of the simulation
      end_date = 15/04/1998  # Select the end date of the simulation
    summaryfile
    metfile met: filename=HE5.met
    area paddock
      outputfile: filename=Sorghum_HighWaterHighN.out; title=Sorghum_HighWaterHighN; events=My Variables Events
        variables My Variables
          variables: dd/mm/yyyy as date, stage
      folder Manager folder
        manager Sow SkipRow on a fixed date
          # Sowing criteria
          date = 27/11/1997  # Enter sowing date (d/m/yyyy)
          # Sowing parameters
          crop = Sorghum  # Enter name of crop to sow
          density = 10  # Enter sowing density (plants/m2)
          depth = 30  # Enter sowing depth (mm)
          cultivar = Buster  # Enter cultivar
          row_spacing = 0.5  # Enter row spacing (m)
          RowConfiguration = solid  # Enter skip row configuration
          ftn = 0.1  # Enter Fertile Tiller No.
          on start_of_day:
```
            if (paddock_is_fallow() = 1 and today = date('[date]')) then
              [crop] sow plants =[density], sowing_depth = [depth], cultivar = [cultivar], row_spacing = [row_spacing], skip = [RowConfiguration], tiller_no_fertile = [ftn] ()
            endif
            if (paddock_is_fallow() = 0) then
               outputfile do_output
            endif
```
        manager Harvesting rule
          # Harvesting criteria
          crop = Sorghum  # Enter name of crop to harvest when ripe
          on end_of_day:
```
           if [crop].StageName = 'harvest_ripe' or [crop].plant_status = 'dead' then
              [crop]  harvest
              [crop]  end_crop
           endif
```
      irrigation
        automatic_irrigation = off  # switch
        asw_depth = 600.0  # Depth to which ASW is calculated. (mm)
        crit_fr_asw = 0.5  # Fraction of ASW below which irrigation is applied (0-1.0)
        irrigation_efficiency = 1.0  # Efficiency of the irrigation. (0-1.0)
        default_no3_conc = 0.0  # Nitrate concentration (ppm N)
        default_nh4_conc = 0.0  # Ammonium concentration (ppm N)
        default_cl_conc = 0.0  # Chloride concentration (ppm Cl)
      fertiliser
      operations
        28/11/1997  Irrigation apply amount = 16
        2/12/1997  Irrigation apply amount = 25
        4/12/1997  Irrigation apply amount = 13
        8/12/1997  Irrigation apply amount = 21
        18/12/1997  Irrigation apply amount = 28
        6/01/1998  Irrigation apply amount = 26
        12/01/1998  Irrigation apply amount = 46
        27/01/1998  Irrigation apply amount = 25
        20/02/1998  Irrigation apply amount = 26
        27/02/1998  Irrigation apply amount = 55
        13/03/1998  Irrigation apply amount = 22
        18/03/1998  Irrigation apply amount = 39
        20/03/1998  Irrigation apply amount = 21
        26/11/1997  fertiliser apply amount = 3 (kg/ha), depth = 50 (mm), type = NO3_N ()
        20/02/1998  fertiliser apply amount = 59 (kg/ha), depth = 50 (mm), type = NO3_N ()
      Soil HRS: LocalName=HRS; Site=HRS; NearestTown=Unknown; Region=SE Queensland; NaturalVegetation=Unknown; Latitude=0; Longitude=0
        SoilType = HMM  # Soil description
        SoilWater: SummerCona=6.5; SummerU=1.5; SummerDate=1-Nov; WinterCona=6.5; WinterU=1.5; WinterDate=1-Apr; DiffusConst=40; DiffusSlope=16; Salb=0.2; CN2Bare=85; CNRed=20; CNCov=0.8; Thickness=[100, 100, 200, 200, 200, 200, 200, 200, 200, 200]
          SWCON=[0.300, 0.300, 0.300, 0.300, 0.300, 0.300, 0.300, 0.300, 0.300, 0.300]
        Water
          BD     AirDry  LL15   DUL    SAT    Thickness
          1.340  0.080   0.226  0.420  0.450  100
          1.340  0.190   0.226  0.420  0.450  100
          1.330  0.230   0.258  0.460  0.480  200
          1.380  0.260   0.270  0.460  0.470  200
          1.400  0.260   0.268  0.430  0.450  200
          1.550  0.280   0.304  0.400  0.410  200
          1.590  0.250   0.335  0.370  0.380  200
          1.630  0.280   0.330  0.330  0.370  200
          1.660  0.300   0.320  0.320  0.370  200
          1.680  0.310   0.330  0.330  0.360  200
          SoilCrop Sorghum
            LL=[0.226, 0.226, 0.258, 0.270, 0.268, 0.304, 0.335, 0.330, 0.320, 0.330]
            KL=[0.070, 0.070, 0.070, 0.070, 0.060, 0.060, 0.060, 0.050, 0.050, 0.040]
            XF=[1, 1, 1, 1, 1, 1, 1, 1, 1, 1]
        SoilOrganicMatter: RootCN=50; RootWt=1000; SoilCN=12.5; EnrACoeff=7.4; EnrBCoeff=0.2
          OC     FBiom  FInert  Thickness
          1.190  0.050  0.450   100
          0.590  0.020  0.600   100
          0.450  0.010  0.750   200
          0.300  0.010  0.900   200
          0.200  0.010  0.900   200
          0.160  0.010  0.900   200
          0.170  0.010  0.900   200
          0.170  0.050  0.900   200
          0.170  0.020  0.900   200
          0.170  0.010  0.900   200
        Analysis: Thickness=[100, 100, 200, 200, 200, 200, 200, 200, 200, 200]
          PH=[6.300, 6.400, 6.500, 6.600, 6.600, 6.500, 6.500, 6.500, 6.500, 6.500]
        Sample Initial Water: Thickness=[100, 100, 200, 200, 200, 200, 200, 200, 200, 200]
          SW=[0.217, 0.357, 0.375, 0.401, 0.349, 0.351, 0.359, 0.330, 0.322, 0.347]
        Sample Initial Nitrogen
          NO3     NH4    Thickness
          8.421   0.100  100
          8.054   0.100  100
          7.001   0.100  200
          3.824   0.100  200
          2.759   0.100  200
          3.429   0.100  200
          8.668   0.100  200
          11.576  0.100  200
          8.816   0.100  200
          11.758  0.100  200
      sorghum
  simulation Sorghum_HighWaterLowN
    clock
      start_date = 18/11/1997  # Select the start date of the simulation
      end_date = 15/04/1998  # Select the end date of the simulation
    summaryfile
    metfile met: filename=HE6.met
    area paddock
      outputfile: filename=Sorghum_HighWaterLowN.out; title=Sorghum_HighWaterLowN; events=My Variables Events
        variables My Variables
          variable:
            variable  # Date (dd/mm/yyyy)
            variable  # Days after Sowing
            variable  # Plant stage
            variable  # Biomass weight
            variable
            variable
            variable  # Weight of roots
            variable  # Weight of leaf
            variable  # Weight of stems
            variable  # Weight of heads
            variable  # Weight of grain
            variable  # N in total biomass
            variable  # N in roots
            variable  # N in leaves
            variable  # N in stems
            variable  # N in heads
            variable  # N in grain
            variable
            variable
            variable
            variable  # number
            variable  # Leaf area index
            variable
            variable  # Extractable Soil Water (mm)
            variable  # NO3 - layered (kg/ha)
            variable  # Specific leaf nitrogen
            variable  # Water stress
            variable
            variable
            variable
            variable
            variable
      folder Manager folder
        manager Sow SkipRow on a fixed date
          # Sowing criteria
          date = 27/11/1997  # Enter sowing date (d/m/yyyy)
          # Sowing parameters
          crop = Sorghum  # Enter name of crop to sow
          density = 10  # Enter sowing density (plants/m2)
          depth = 30  # Enter sowing depth (mm)
          cultivar = Buster  # Enter cultivar
          row_spacing = 0.5  # Enter row spacing (m)
          RowConfiguration = solid  # Enter skip row configuration
          ftn = 0  # Enter Fertile Tiller No.
          on start_of_day:
          script: same as in Sorghum_HighWaterHighN.paddock.Manager folder.Sow SkipRow on a fixed date
        manager Harvesting rule
          # Harvesting criteria
          crop = Sorghum  # Enter name of crop to harvest when ripe
          on end_of_day:
          script: same as in Sorghum_HighWaterHighN.paddock.Manager folder.Harvesting rule
      irrigation: same as Sorghum_HighWaterHighN.paddock.Irrigation
      fertiliser
      operations
        28/11/1997  Irrigation apply amount = 16
        2/12/1997  Irrigation apply amount = 24
        4/12/1997  Irrigation apply amount = 13
        8/12/1997  Irrigation apply amount = 21
        18/12/1997  Irrigation apply amount = 28
        6/01/1998  Irrigation apply amount = 26
        12/01/1998  Irrigation apply amount = 47
        27/01/1998  Irrigation apply amount = 25
        20/02/1998  Irrigation apply amount = 20
        27/02/1998  Irrigation apply amount = 38
        13/03/1998  Irrigation apply amount = 22
        18/03/1998  Irrigation apply amount = 40
        26/11/1997  fertiliser apply amount = 10 (kg/ha), depth = 50 (mm), type = NO3_N ()
      Soil HRS: LocalName=HRS; Site=HRS; Region=SE Queensland
        SoilType = HMM  # Soil description
        NearestTown = Unknown
        NaturalVegetation = Unknown
        SoilWater: same as Sorghum_HighWaterHighN.paddock.HRS.SoilWater
        Water: same as Sorghum_HighWaterHighN.paddock.HRS.Water
        SoilOrganicMatter: same as Sorghum_HighWaterHighN.paddock.HRS.SoilOrganicMatter
        Analysis: Thickness=[100, 100, 200, 200, 200, 200, 200, 200, 200, 200]
          PH=[6.300, 6.400, 6.500, 6.600, 6.600, 6.500, 6.500, 6.500, 6.500, 6.500]
        Sample Initial Water: Thickness=[100, 100, 200, 200, 200, 200, 200, 200, 200, 200]
          SW=[0.217, 0.357, 0.375, 0.401, 0.349, 0.351, 0.359, 0.330, 0.322, 0.347]
        Sample Initial Nitrogen
          NO3    NH4    Thickness
          1.493  0.100  100
          1.633  0.100  100
          1.233  0.100  200
          0.900  0.100  200
          1.100  0.100  200
          1.467  0.100  200
          2.516  0.100  200
          3.067  0.100  200
          3.012  0.100  200
          2.976  0.100  200
      sorghum
  simulation Sorghum_LowWaterHighN
    clock
      start_date = 25/11/1997  # Select the start date of the simulation
      end_date = 15/04/1998  # Select the end date of the simulation
    summaryfile
    metfile met: filename=HE7.met
    area paddock
      outputfile: filename=Sorghum_LowWaterHighN.out; title=Sorghum_LowWaterHighN; events=My Variables Events
        variables My Variables: same as Sorghum_HighWaterLowN.paddock.outputfile.My Variables
      folder Manager folder
        manager Sow SkipRow on a fixed date
          # Sowing criteria
          date = 27/11/1997  # Enter sowing date (d/m/yyyy)
          # Sowing parameters
          crop = Sorghum  # Enter name of crop to sow
          density = 10  # Enter sowing density (plants/m2)
          depth = 15  # Enter sowing depth (mm)
          cultivar = Buster  # Enter cultivar
          row_spacing = 0.5  # Enter row spacing (m)
          RowConfiguration = solid  # Enter skip row configuration
          ftn = 0  # Enter Fertile Tiller No.
          on start_of_day:
          script: same as in Sorghum_HighWaterHighN.paddock.Manager folder.Sow SkipRow on a fixed date
        manager Harvesting rule
          # Harvesting criteria
          crop = Sorghum  # Enter name of crop to harvest when ripe
          on end_of_day:
          script: same as in Sorghum_HighWaterHighN.paddock.Manager folder.Harvesting rule
      irrigation: same as Sorghum_HighWaterHighN.paddock.Irrigation
      fertiliser
      operations
        28/11/1997  Irrigation apply amount = 65
        16/12/1997  Irrigation apply amount = 90
        26/11/1997  fertiliser apply amount = 3 (kg/ha), depth = 50 (mm), type = NO3_N ()
        26/11/1997  fertiliser apply amount = 119 (kg/ha), depth = 50 (mm), type = NO3_N ()
      Soil HRS: LocalName=HRS; Site=HRS; Region=SE Queensland
        SoilType = HMM  # Soil description
        NearestTown = Unknown
        NaturalVegetation = Unknown
        SoilWater: same as Sorghum_HighWaterHighN.paddock.HRS.SoilWater
        Water
          BD     AirDry  LL15   DUL    SAT    Thickness
          1.340  0.080   0.226  0.420  0.450  100
          1.340  0.190   0.226  0.420  0.450  100
          1.330  0.230   0.258  0.460  0.480  200
          1.380  0.260   0.270  0.460  0.470  200
          1.400  0.260   0.268  0.430  0.450  200
          1.550  0.280   0.304  0.400  0.410  200
          1.590  0.320   0.335  0.370  0.380  200
          1.630  0.320   0.330  0.330  0.370  200
          1.660  0.320   0.320  0.320  0.370  200
          1.680  0.330   0.330  0.330  0.360  200
          SoilCrop Sorghum
            LL=[0.226, 0.226, 0.258, 0.270, 0.268, 0.304, 0.335, 0.330, 0.320, 0.330]
            KL=[0.070, 0.070, 0.070, 0.070, 0.060, 0.060, 0.060, 0.050, 0.050, 0.040]
            XF=[1, 1, 1, 1, 1, 1, 1, 1, 1, 1]
        SoilOrganicMatter: same as Sorghum_HighWaterHighN.paddock.HRS.SoilOrganicMatter
        Analysis: Thickness=[100, 100, 200, 200, 200, 200, 200, 200, 200, 200]
          PH=[6.300, 6.400, 6.500, 6.600, 6.600, 6.500, 6.500, 6.500, 6.500, 6.500]
        Sample Initial nitrogen
          NO3     NH4    Thickness
          25.798  0.100  100
          6.921   0.100  100
          9.285   0.100  200
          2.823   0.100  200
          2.286   0.100  200
          3.196   0.100  200
          3.695   0.100  200
          4.410   0.100  200
          2.743   0.100  200
          4.891   0.100  200
        Sample Initial water: Thickness=[100, 100, 200, 200, 200, 200, 200, 200, 200, 200]
          SW=[0.307, 0.326, 0.444, 0.429, 0.363, 0.351, 0.336, 0.343, 0.352, 0.347]
      sorghum
  simulation Sorghum_LowWaterLowN
    clock
      start_date = 25/11/1997  # Select the start date of the simulation
      end_date = 15/04/1998  # Select the end date of the simulation
    summaryfile
    metfile met: filename=HE8.met
    area paddock
      outputfile: filename=Sorghum_LowWaterLowN.out; title=Sorghum_LowWaterLowN; events=My Variables Events
        variables My Variables: same as Sorghum_HighWaterLowN.paddock.outputfile.My Variables
      folder Manager folder
        manager Sow SkipRow on a fixed date: same as Sorghum_LowWaterHighN.paddock.Manager folder.Sow SkipRow on a fixed date
        manager Harvesting rule
          # Harvesting criteria
          crop = Sorghum  # Enter name of crop to harvest when ripe
          on end_of_day:
          script: same as in Sorghum_HighWaterHighN.paddock.Manager folder.Harvesting rule
      irrigation: same as Sorghum_HighWaterHighN.paddock.Irrigation
      fertiliser
      operations
        28/11/1997  Irrigation apply amount = 65
        16/12/1997  Irrigation apply amount = 90
        26/11/1997  fertiliser apply amount = 3 (kg/ha), depth = 50 (mm), type = NO3_N ()
        26/11/1997  fertiliser apply amount = 10 (kg/ha), depth = 50 (mm), type = NO3_N ()
      Soil HRS: LocalName=HRS; Site=HRS; Region=SE Queensland
        SoilType = HMM  # Soil description
        NearestTown = Unknown
        NaturalVegetation = Unknown
        SoilWater: same as Sorghum_HighWaterHighN.paddock.HRS.SoilWater
        Water: same as Sorghum_LowWaterHighN.paddock.HRS.Water
        SoilOrganicMatter: same as Sorghum_HighWaterHighN.paddock.HRS.SoilOrganicMatter
        Analysis: Thickness=[100, 100, 200, 200, 200, 200, 200, 200, 200, 200]
          PH=[6.300, 6.400, 6.500, 6.600, 6.600, 6.500, 6.500, 6.500, 6.500, 6.500]
        Sample Initial nitrogen
          NO3     NH4    Thickness
          25.798  0.100  100
          6.921   0.100  100
          9.285   0.100  200
          2.823   0.100  200
          2.286   0.100  200
          3.196   0.100  200
          3.695   0.100  200
          4.410   0.100  200
          2.743   0.100  200
          4.891   0.100  200
        Sample Initial water: Thickness=[100, 100, 200, 200, 200, 200, 200, 200, 200, 200]
          SW=[0.294, 0.381, 0.367, 0.306, 0.290, 0.319, 0.330, 0.343, 0.337, 0.344]
      sorghum
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