Simulations: Version=24
  Replacements
    Report: EventNames=[Clock].DoReport
      VariableNames:
        [Clock].Today
        [Clock].Today.Year as Year
        [Clock].Today.DayOfYear as DOY
        [Clock].Today.Date as Date
        [Phenology].ThermalTime.Value() as TT
        [Sorghum].Phenology.DaysAfterSowing as Das
        [Sorghum].Phenology.Stage as Stage
        [Sorghum].AboveGroundLive.Wt as BiomassWt
        [Sorghum].Root.Live.Wt as RootGreenWt
        [Sorghum].Leaf.Live.Wt as LeafGreenWt
        [Sorghum].Stem.Live.Wt as StemGreenWt
        [Sorghum].Rachis.Live.Wt as RachisGreenWt
        [Sorghum].Grain.Live.Wt as GrainGrrenWt
        [Sorghum].Summariser.AboveGroundLive.N as Biomass
        [Sorghum].Root.Live.N as RootGrrenN
        [Sorghum].Stem.Live.N as StemGreenN
        [Sorghum].Rachis.Live.N as RachisGreenN
        [Sorghum].Grain.Live.N as GrainGreenN
        [Sorghum].Grain.Live.NConc as GrainGreenNConc
        [Sorghum].Grain.NumberFunction.Value() as GrainNo
        [Sorghum].Grain.Size as GrainSize
        [Sorghum].Structure.MainStemNodeNo as LeafNo
        [Sorghum].Phenology.LeafAppearance1.RemainingLeaves.Value()
        [Sorghum].Phenology.LeafAppearance2.RemainingLeaves.Value()
        [Sorghum].Phenology.LeafAppearance1._RemainingLeaves
        [Sorghum].Phenology.LeafAppearance2._RemainingLeaves
        sum([Soil].SoilWater.ESW) as ESW
        [Sorghum].Phenology.Juvenile.Target.Value()
        sum([Soil].SoilNitrogen.NO3) as NO3
        sum([Soil].SoilWater.SW) as sw
        [Sorghum].WaterSupplyDemandRatio as WaterSD
        [Sorghum].Leaf.Photosynthesis.FW.Value() as RUEStress
        [Phenology].Germinating.Target.Value()
        [Phenology].Emerging.Target.Value()
        [Phenology].Juvenile.Target.Value()
        [Phenology].JuvenileToFloralInit.Target.Value()
        [Phenology].FloralInitToFlagLeaf.Target.Value()
        [Phenology].FlagLeafToFlowering.Target.Value()
        [Phenology].FloweringToGrainFilling.Target.Value()
        [Phenology].GrainFilling.Target.Value()
        [Phenology].Maturing.Target.Value()
        [Phenology].MaturityToHarvestRipe.Target.Value()
        [Phenology].TTFromEmergence.Value()
        [Leaf].TPLA.Value()
        [Leaf].TPLA2.Value()
        [Leaf].TPLAMax.Value()
        [Leaf].TPLAToday.Value()
        [Leaf].Exponent.Value()
        [Leaf].TPLAInflection.Value()
        [Leaf].LAI as LAI
        [Phenology].TTEmergToFlagLeaf.Value()
        [Structure].FinalLeafNumber.Value()
        [Structure].MainStemNodeNo
        [Leaf].CoverGreen
        [Leaf].RadIntTot
        [Weather].Radn
        [Leaf].WaterDemand
        [Arbitrator].DM.TotalFixationSupply
        [Arbitrator].DM.TotalFixationSupply
        [Grain].FinalGrainNum.Value()
        [Leaf].LeafPartitioningCoefficient.Value()
        [Leaf].DMDemandFunction.Value()
        [Stem].DMDemandFunction.Value()
        [Rachis].DMDemandFunction.Value()
        [Grain].DMDemandFunction.Value()
        [Leaf].DMRemaining.Value()
        [Grain].PotGrainFillRate.Value()
    Plant Sorghum: CropType=Sorghum
      Memo TitlePage
        The APSIM Sorghum Model

        McLean, G., Brider, J., Doherty, A.

        The APSIM sorghum model has been developed using the Plant Modelling Framework (PMF) of Brown et al(2014).
        This new framework provides a library of plant organ and process submodels that can be coupled, at runtime, to construct a model in much the same way that models can be coupled to construct a simulation. This means that dynamic composition of lower level process and organ classes (e.g. photosynthesis, leaf) into larger constructions (e.g. sorghum, wheat, sorghum) can be achieved by the model developer without additional coding.
      OrganArbitrator Arbitrator
        PrioritythenRelativeAllocation NArbitrator
        RelativeAllocation DMArbitrator
      CompositeBiomass AboveGroundLive: Propertys=[[Leaf].Live, [Stem].Live, [Grain].Live, [Rachis].Live]
        Memo
          The AboveGroundLive composite biomass object includes the Live pools of all organs occurring above the soil surface to allow output for total dry matter and Nutrient contents, including total structural, non-structural and metabolic pools.
      CompositeBiomass AboveGroundDead: Propertys=[[Leaf].Dead, [Stem].Dead, [Grain].Dead, [Rachis].Dead]
        Memo
          The AboveGroundDead composite biomass object includes the Dead pools of all organs occurring above the soil surface to allow output for total dry matter and Nutrient contents, including total structural, non-structural and metabolic pools.
      AddFunction TotalPlantDemand
        VariableReference LeafDemand: VariableName=[Leaf].DMDemandFunction.Value()
        VariableReference StemDemand: VariableName=[Stem].DMDemandFunction.Value()
        VariableReference RachisDemand: VariableName=[Rachis].DMDemandFunction.Value()
        VariableReference GrainDemand: VariableName=[Grain].DMDemandFunction.Value()
      Phenology: DaysAfterSowing=0
        Memo
          The phenology model used in the APSIM sorghum model follows the approach used in earlier sorghum models(Jones and Kiniry (1986), Carberry and Arbrecht (1991), Carberry et al (1989).
          The model predicts development of primordia on the apex of the main stem and appearance of individual leaves to predict time to flag leaf.  Other stages use thermal time targets.
        MultiplyFunction ThermalTime
          PhaseLookup TT
            PhaseLookupValue TT: Start=Germination; End=Flowering
              AirTemperatureFunction ThermalTime
                XYPairs: X=[11, 30, 42]; Y=[0, 19, 0]
            PhaseLookupValue TTFM: Start=Flowering; End=Maturity
              AirTemperatureFunction ThermalTime
                XYPairs: X=[5.7, 23.5]; Y=[0, 17.8]
        GerminatingPhase Germinating: Start=Sowing; End=Germination
        EmergingPhase Emerging: Start=Germination; End=Emergence; ShootLag=15; ShootRate=0.6
          VariableReference ThermalTime: VariableName=[Phenology].ThermalTime.Value()
        GenericPhase Juvenile: Start=Emergence; End=EndJuvenile
          Constant Target: FixedValue=100
          VariableReference ThermalTime: VariableName=[Phenology].ThermalTime.Value()
        GenericPhase JuvenileToFloralInit: Start=EndJuvenile; End=FloralInitiation
          VariableReference ThermalTime: VariableName=[Phenology].ThermalTime.Value()
          VariableReference Target: VariableName=[Phenology].TTTargetPhotoSensitive.Value()
        GenericPhase FloralInitToFlagLeaf: Start=FloralInitiation; End=FlagLeaf
          VariableReference ThermalTime: VariableName=[Phenology].ThermalTime.Value()
          SubtractFunction Target
            VariableReference TTEmergToFlag: VariableName=[Phenology].TTEmergToFlagLeaf.Value()
            VariableReference TTJuvenile: VariableName=[Phenology].Juvenile.Target.Value()
            VariableReference TTJuvToFloralInit: VariableName=[Phenology].JuvenileToFloralInit.Target.Value()
        GenericPhase FlagLeafToFlowering: Start=FlagLeaf; End=Flowering
          Constant Target: FixedValue=170
          VariableReference ThermalTime: VariableName=[Phenology].ThermalTime.Value()
        GenericPhase FloweringToGrainFilling: Start=Flowering; End=StartGrainFill
          Constant Target: FixedValue=80
          VariableReference ThermalTime: VariableName=[Phenology].ThermalTime.Value()
        GenericPhase GrainFilling: Start=StartGrainFill; End=EndGrainFill
          VariableReference ThermalTime: VariableName=[Phenology].ThermalTime.Value()
          SubtractFunction Target
            VariableReference FlowerToMaturity: VariableName=[Phenology].TTFIowerToMaturity.Value()
            VariableReference FlowerToGrainFill: VariableName=[Phenology].FloweringToGrainFilling.Target.Value()
            VariableReference GrainFillToMaturity: VariableName=[Phenology].TTGrainFillToMaturity.Value()
        GenericPhase Maturing: Start=EndGrainFill; End=Maturity
          VariableReference ThermalTime: VariableName=[Phenology].ThermalTime.Value()
          VariableReference Target: VariableName=[Phenology].TTGrainFillToMaturity.Value()
        GenericPhase MaturityToHarvestRipe: Start=Maturity; End=HarvestRipe
          Constant Target: FixedValue=1
          VariableReference ThermalTime: VariableName=[Phenology].ThermalTime.Value()
        EndPhase ReadyForHarvesting: Start=HarvestRipe; End=Unused
          VariableReference ThermalTime: VariableName=[Phenology].ThermalTime.Value()
        PhotoperiodFunction Photoperiod: Twilight=-6; DayLength=0
        OnEventFunction FloweringDAS: SetEvent=Flowering; ReSetEvent=never
          Memo
            A function is used to provide flowering date as days after sowing(DAS).
          Constant PreEventValue: FixedValue=0
          VariableReference PostEventValue: VariableName=[Phenology].DaysAfterSowing
        OnEventFunction MaturityDAS: SetEvent=Maturity; ReSetEvent=never
          Memo
            A function is used to provide maturity date as days after sowing(DAS).
          Constant PreEventValue: FixedValue=0
          VariableReference PostEventValue: VariableName=[Phenology].DaysAfterSowing
        Constant TTFIowerToMaturity: FixedValue=761
        Constant TTEndJuvToInit: FixedValue=160
        MultiplyFunction TTGrainFillToMaturity
          VariableReference FlowerToMaturity: VariableName=[Phenology].TTFIowerToMaturity.Value()
          Constant Proportion: FixedValue=0.05
        OnEventFunction TTTargetPhotoSensitive: SetEvent=EndJuvenile; ReSetEvent=never
          VariableReference PreEventValue: VariableName=[Phenology].TTEndJuvToInit.Value()
          AddFunction PostEventValue
            LinearInterpolationFunction PhotoModifier: XProperty=[Phenology].Photoperiod.Value()
              XYPairs: X=[11.5, 13.5]; Y=[0, 23]
            VariableReference TTEndJuvToInit: VariableName=[Phenology].TTEndJuvToInit.Value()
        Constant FinalLeafNo: FixedValue=17.101
        Constant LeafNoAtEmergence: FixedValue=1
        Constant LeafNoRateChange: FixedValue=3.5
        AddFunction TTEmergToFlagLeaf
          MultiplyFunction LeafAppearingPhase1
            SubtractFunction NoLeavesRate1
              VariableReference FinalLeafNo: VariableName=[Phenology].FinalLeafNo.Value()
              VariableReference LeafNoAtEmergence: VariableName=[Phenology].LeafNoAtEmergence.Value()
              VariableReference LeafNoRateChange: VariableName=[Phenology].LeafNoRateChange.Value()
            Constant LeafAppearanceRate1: FixedValue=41
          MultiplyFunction LeafAppearingPhase2
            Constant LeafAppearanceRate2: FixedValue=20
            VariableReference LeafNoRateChange: VariableName=[Phenology].LeafNoRateChange.Value()
        AccumulateFunction TTFromEmergence: StartStageName=Emergence; EndStageName=Maturity; FractionRemovedOnCut=0; FractionRemovedOnHarvest=0; FractionRemovedOnGraze=0; FractionRemovedOnPrune=0
          VariableReference ThermalTime: VariableName=[Phenology].ThermalTime.Value()
        AccumulateFunction TTFMFromFlowering: StartStageName=Flowering; EndStageName=Maturity; FractionRemovedOnCut=0; FractionRemovedOnHarvest=0; FractionRemovedOnGraze=0; FractionRemovedOnPrune=0
          VariableReference ThermalTime: VariableName=[Phenology].ThermalTime.Value()
        AddFunction TTEmergToFloralInit
          VariableReference TTTargetJuvenille: VariableName=[Phenology].Juvenile.Target.Value()
          VariableReference TTTargetJuvToFI: VariableName=[Phenology].JuvenileToFloralInit.Target.Value()
      ReproductiveOrgan Grain: GrowthRespiration=0; MaintenanceRespiration=0
        Constant InitialGrainProportion: FixedValue=0.05
        Constant MaximumPotentialGrainSize: FixedValue=0.3
        Constant MinimumNConc: FixedValue=0.008
        PhaseLookup MaximumNConc
          PhaseLookupValue InitialPhase: Start=Flowering; End=StartGrainFill
            Constant InitialNconc: FixedValue=0.05
          PhaseLookupValue LinearPhase: Start=StartGrainFill; End=EndGrainFill
            Constant FinalNconc: FixedValue=0.013
        Constant WaterContent: FixedValue=0.12
        PhaseLookup NFillingRate
          PhaseLookupValue GrainFilling: Start=Flowering; End=EndGrainFill
            FillingRateFunction
              VariableReference NumberFunction: VariableName=[Grain].NumberFunction.Value()
              AddFunction FillingDuration
                VariableReference FloweringToGrainFilling: VariableName=[Phenology].FloweringToGrainFilling.Target.Value()
                VariableReference GrainFilling: VariableName=[Phenology].GrainFilling.Target.Value()
              VariableReference ThermalTime: VariableName=[Phenology].ThermalTime.Value()
              MultiplyFunction PotentialSizeIncrement
                Constant MaximumFinalNConc: FixedValue=0.013; Units=g/g
                VariableReference MaximumSize: VariableName=[Grain].MaximumPotentialGrainSize.Value()
        MultiplyFunction NumberFunction
          MinimumFunction
            VariableReference FinalGrainNum: VariableName=[Grain].FinalGrainNum.Value()
            MultiplyFunction
              VariableReference FinalGrainNum: VariableName=[Grain].FinalGrainNum.Value()
              DivideFunction
                VariableReference TTStartGrainToNow: VariableName=[Grain].TTStartGrainToNow.Value()
                Constant RampTT: FixedValue=100
          Constant TemperatureFactor: FixedValue=1
        OnEventFunction FinalGrainNum: SetEvent=StartGrainFill
          Constant PreEventValue: FixedValue=0
          DivideFunction PostEventValue
            DivideFunction GrowthRate
              SubtractFunction PlantGrowth
                AddFunction TotalPlantWt
                  VariableReference LiveWt: VariableName=[Sorghum].AboveGroundLive.Wt
                  VariableReference DeadWt: VariableName=[Sorghum].AboveGroundDead.Wt
                VariableReference GreenWtAtFI: VariableName=[Grain].GreenWtAtFI.Value()
              VariableReference DaysFIToStartGF: VariableName=[Grain].DaysFIToStartGrainFill.Value()
            Constant DMPerSeed: FixedValue=0.00083
        AccumulateFunction DaysFIToStartGrainFill: StartStageName=FloralInitiation; EndStageName=StartGrainFill; FractionRemovedOnCut=0; FractionRemovedOnHarvest=0; FractionRemovedOnGraze=0; FractionRemovedOnPrune=0
          Constant One: FixedValue=1
        OnEventFunction GreenWtAtFI: SetEvent=StartGrainFill
          Constant PreEventValue: FixedValue=0
          VariableReference PostEventValue: VariableName=[Sorghum].AboveGroundLive.Wt
        AccumulateFunction TTStartGrainToNow: StartStageName=StartGrainFill; EndStageName=Maturity; FractionRemovedOnCut=0; FractionRemovedOnHarvest=0; FractionRemovedOnGraze=0; FractionRemovedOnPrune=0
          VariableReference ThermalTime: VariableName=[Phenology].ThermalTime.Value()
        DivideFunction DMCaryopsis
          VariableReference DMFixationSupply: VariableName=[Arbitrator].DM.TotalFixationSupply
          VariableReference GrainNumber: VariableName=[Grain].NumberFunction.Value()
          VariableReference ThermalTime: VariableName=[Phenology].ThermalTime.Value()
        MinimumFunction PotGrainFillRate
          MultiplyFunction
            AddFunction
              MultiplyFunction
                VariableReference DMCaryopsis: VariableName=[Grain].DMCaryopsis.Value()
                Constant: FixedValue=0.4026
              Constant: FixedValue=3.19E-05
            Constant: FixedValue=1000
          Constant MaxGrainFillRate: FixedValue=0.09
        MultiplyFunction DMDemandFunction
          VariableReference GrainFillRate: VariableName=[Grain].PotGrainFillRate.Value()
          VariableReference ThermalTime: VariableName=[Phenology].ThermalTime.Value()
          VariableReference GrainNumber: VariableName=[Grain].NumberFunction.Value()
          Constant: FixedValue=0.001
        Constant DMDemandFunction33: FixedValue=0
        BiomassRemoval BiomassRemovalDefaults
          OrganBiomassRemovalType Harvest: FractionLiveToRemove=0.5; FractionDeadToRemove=0; FractionLiveToResidue=0.1; FractionDeadToResidue=0
          OrganBiomassRemovalType Cut: FractionLiveToRemove=0.8; FractionDeadToRemove=0; FractionLiveToResidue=0; FractionDeadToResidue=0
          OrganBiomassRemovalType Prune: FractionLiveToRemove=0; FractionDeadToRemove=0; FractionLiveToResidue=0.6; FractionDeadToResidue=0
          OrganBiomassRemovalType Graze: FractionLiveToRemove=0.6; FractionDeadToRemove=0; FractionLiveToResidue=0.2; FractionDeadToResidue=0
        Constant DMConversionEfficiency: FixedValue=1
        Constant RemobilisationCost: FixedValue=0
        Constant CarbonConcentration: FixedValue=0.4
        Live Biomass
        Dead Biomass
      Structure: Initialised=false; Germinated=false; Emerged=false; CohortToInitialise=0; TipToAppear=0; ApexNum=0
        Memo
          Though tillering is common in some sorghum varieties under certain agronomic conditions, no tillering is accounted for within this model.  Therefore all branching has been parameterised out of the current sorghum model.
        VariableReference ThermalTime: VariableName=[Phenology].ThermalTime.Value()
        LessThanFunction Phyllochron
          VariableReference CurrentLeafNum: VariableName=[Structure].LeafTipsAppeared
          SubtractFunction
            VariableReference FinalLeafNum: VariableName=[Structure].FinalLeafNumber.Value()
            Constant LeafNumRateChange: FixedValue=3.5
          Constant LeafAppRate1: FixedValue=41
          Constant LeafAppRate2: FixedValue=20
        HoldFunction FinalLeafNumber: WhenToHold=FloralInitiation
          AddFunction ValueToHold
            VariableReference LeafNumSeed: VariableName=[Structure].LeafNumSeed.Value()
            DivideFunction
              VariableReference TTEmergToFI: VariableName=[Phenology].TTEmergToFloralInit.Value()
              VariableReference LeafInitRate: VariableName=[Structure].LeafInitiationRate.Value()
        HeightFunction HeightModel
          LinearInterpolationFunction PotentialHeight: XProperty=[Phenology].Stage
            XYPairs: X=[3, 4, 5, 6]; Y=[20, 50, 60, 1700]
        Constant BranchingRate: FixedValue=0
        Constant ShadeInducedBranchMortality: FixedValue=0
        Constant DroughtInducedBranchMortality: FixedValue=0
        Constant LeafNumSeed: FixedValue=4
        Constant LeafInitiationRate: FixedValue=21.6
        Constant PlantMortality: FixedValue=0
        VariableReference MainStemPrimordiaInitiationRate: VariableName=[Structure].LeafInitiationRate.Value()
        Constant BranchMortality: FixedValue=0
        Constant StemSenescenceAge: FixedValue=0
      Root: GrowthRespiration=0; MaintenanceRespiration=0
        LinearInterpolationFunction KLModifier: XProperty=[Sorghum].Population
          Memo
            The parameter KL is is described by Meinke et al (1993) to combine elements of soil conductivity (K) with root length (L) in determining root water uptake.  Peake et al (2013) demonstrated that in sorghum KL varied with plant population through impacts on root length density.  Here we adjust KL linearly with plant population.
          XYPairs: X=[0, 10]; Y=[1, 1]
        Constant SoilWaterEffect: FixedValue=1
          Memo
            No effect of soil water content on root growth is currently captured in the model.
        Constant TemperatureEffect: FixedValue=1
          Memo
            No effect of temperature on root growth is currently captured in the model.
        Constant MaxDailyNUptake: FixedValue=20
          Memo
            Maximum daily N uptake is set to an arbitrarily high value.
        Constant SenescenceRate: FixedValue=0.005
          Memo
            Jones and Kiniry (1986) used a constant root senescence fraction in the CERES-Sorghum model.
        Constant StructuralFraction: FixedValue=1
        Constant MaximumNConc: FixedValue=0.01
        Constant MinimumNConc: FixedValue=0.01
        Constant MaximumRootDepth: FixedValue=1000000
        PhaseLookup RootFrontVelocity
          Memo
            Hammer et al (2009) used a constant extraction front velocity of 2.5cm per day in their analysis of historical sorghum yield trends in the US corn belt.
          PhaseLookupValue PreFlowering: Start=Germination; End=Flowering
            Constant Function: FixedValue=25
          PhaseLookupValue PostFlowering: Start=Flowering; End=Maturity
            Constant Function: FixedValue=0
        PhaseBasedSwitch NitrogenDemandSwitch: Start=Germination; End=Maturity
        LinearInterpolationFunction KNO3: XProperty=[Root].LengthDensity
          XYPairs: X=[0, 0.003]; Y=[0.03, 0.03]
        LinearInterpolationFunction NUptakeSWFactor: XProperty=[Root].RWC
          XYPairs: X=[0, 0.2, 1]; Y=[1, 1, 1]
        LinearInterpolationFunction KNH4: XProperty=[Root].LengthDensity
          XYPairs: X=[0, 0.003]; Y=[0.03, 0.03]
        MultiplyFunction DMDemandFunction1
          VariableReference PartitionFrac: VariableName=[Root].PartitionFraction.Value()
          VariableReference BiomassProduction: VariableName=[Leaf].DMSupplyFixation.Value()
        Constant InitialDM: FixedValue=0.2; Units=g/plant
        Constant SpecificRootLength: FixedValue=40; Units=m/g
        BiomassRemoval BiomassRemovalDefaults: same as Replacements.Sorghum.Grain.BiomassRemovalDefaults
        PartitionFractionDemandFunction DMDemandFunction
          LinearInterpolationFunction PartitionFraction: XProperty=[Phenology].Stage
            XYPairs: X=[-, 1, 2, 3, 4, 5, 6, 7]; Y=[-, 0, 1, 1, 0.33, 0.33, 0.087, 0]
        Constant DMConversionEfficiency: FixedValue=1
        Constant MaintenanceRespirationFunction: FixedValue=1
        Constant RemobilisationCost: FixedValue=0
        Constant CarbonConcentration: FixedValue=0.4
      SimpleLeaf Leaf: CohortsInitialised=false; R50=200; MicroClimatePresent=true; KDead=0.03
        zero: TipsAtEmergence, CohortsAtInitialisation, InitialisedCohortNo, AppearedCohortNo, PlantAppearedLeafNo, Albedo, Gsmax, LAI, Height, FRGR, PotentialEP, LAIDead
        RUEModel Photosynthesis
          WeightedTemperatureFunction FT: MaximumTemperatureWeighting=0.5
            XYPairs: X=[0, 8, 20, 35, 50]; Y=[0, 0, 1, 1, 0]
          RUECO2Function FCO2: PhotosyntheticPathway=C4
          VariableReference RadnInt: VariableName=[Leaf].RadIntTot
          Constant FVPD: FixedValue=1
          Constant FN: FixedValue=1
          Constant FW: FixedValue=1
          Constant RUE: FixedValue=1.25
        Constant StructuralFraction: FixedValue=1; Units=0-1
        MultiplyFunction InitialWtFunction
          Constant InitialPlantWt: FixedValue=0; Units=g/plant
          VariableReference Population: VariableName=[Plant].Population
        Constant LaiDeadFunction: FixedValue=0; Units=m^2/m^2
        MultiplyFunction ExtinctionCoefficientFunction
          LinearInterpolationFunction PotentialExtinctionCoeff: XProperty=[Sorghum].SowingData.RowSpacing
            XYPairs: X=[0.2, 0.5, 1]; Y=[0.7, 0.4, 0.4]
        LinearInterpolationFunction FrostFraction: XProperty=[Weather].MinT
          XYPairs: X=[-10, -9]; Y=[1, 0]
        MinimumFunction FRGRFunction
          VariableReference RUE_FT: VariableName=[Leaf].Photosynthesis.FT.Value()
          MinimumFunction Others
            VariableReference RUE_FN: VariableName=[Leaf].Photosynthesis.FN.Value()
            VariableReference RUE_FVPD: VariableName=[Leaf].Photosynthesis.FVPD.Value()
        VariableReference ThermalTime: VariableName=[Phenology].ThermalTime.Value()
        Constant FTN: FixedValue=0.1
        MultiplyFunction TPLAMax
          Constant cm2Tomm2: FixedValue=100
          PowerFunction: Exponent=1
            AddFunction
              VariableReference FTN: VariableName=[Leaf].FTN.Value()
              Constant One: FixedValue=1
            Constant TillerCoeff: FixedValue=0.66
          PowerFunction PowerFunction1: Exponent=1
            VariableReference FLN: VariableName=[Phenology].FinalLeafNo.Value()
            Constant MainStemCoeff: FixedValue=2.9
        Constant NConc: FixedValue=1000
        Constant HeightFunction: FixedValue=10
        LessThanFunction Exponent
          VariableReference TTFromEmergence: VariableName=[Phenology].TTFromEmergence.Value()
          Constant: FixedValue=80
          MultiplyFunction
            Constant TPLAProductionCoeff: FixedValue=0.018
            SubtractFunction
              Constant: FixedValue=80
              MultiplyFunction TPLAInflection
                Constant TPLAInlectionRatio: FixedValue=0.66
                VariableReference TTEmergToFlagLeaf: VariableName=[Phenology].TTEmergToFlagLeaf.Value()
          MultiplyFunction MultiplyFunction1
            Constant TPLAProductionCoeff: FixedValue=0.018
            SubtractFunction
              VariableReference TTFromEmergence: VariableName=[Phenology].TTFromEmergence.Value()
              MultiplyFunction TPLAInflection
                Constant TPLAInlectionRatio: FixedValue=0.66
                VariableReference TTEmergToFlagLeaf: VariableName=[Phenology].TTEmergToFlagLeaf.Value()
        MultiplyFunction TPLAInflection
          Constant TPLAInlectionRatio: FixedValue=0.66
          VariableReference TTEmergToFlagLeaf: VariableName=[Phenology].TTEmergToFlagLeaf.Value()
        MultiplyFunction LAIFunction
          Constant cm2tom2: FixedValue=1E-06
          VariableReference TPLA: VariableName=[Leaf].TPLA.Value()
          VariableReference Population: VariableName=[Sorghum].SowingData.Population
        LessThanFunction TPLA
          VariableReference TTFromEmergence: VariableName=[Phenology].TTFromEmergence.Value()
          Constant: FixedValue=80
          AddFunction
            Constant: FixedValue=200
            MultiplyFunction
              DivideFunction
                VariableReference TTFromEmergence: VariableName=[Phenology].TTFromEmergence.Value()
                Constant: FixedValue=80
              VariableReference TPLAToday: VariableName=[Leaf].TPLAToday.Value()
          VariableReference TPLAToday: VariableName=[Leaf].TPLAToday.Value()
        DivideFunction TPLAToday
          VariableReference TPLAMax: VariableName=[Leaf].TPLAMax.Value()
          AddFunction
            Constant: FixedValue=1
            ExponentialFunction ExpFunc: A=0; B=1; C=-1
              VariableReference Exponent: VariableName=[Leaf].Exponent.Value()
        DivideFunction LeafPartitioningCoefficient
          Constant One: FixedValue=1
          AddFunction
            Constant One: FixedValue=1
            MultiplyFunction
              VariableReference PartitionRate: VariableName=[Leaf].PartitionRate.Value()
              PowerFunction: Exponent=2
                VariableReference LeafNumber: VariableName=[Structure].LeafTipsAppeared
        Constant PartitionRate: FixedValue=0.006
        PhaseLookup DMDemandFunction
          PhaseLookupValue BetweenEmergenceAndFlag: Start=Emergence; End=FlagLeaf
            MultiplyFunction
              VariableReference LeafPartitionCoeff: VariableName=[Leaf].LeafPartitioningCoefficient.Value()
              VariableReference DMFixationSupply: VariableName=[Leaf].DMSupplyFixation.Value()
        SubtractFunction DMRemaining
          VariableReference DMFixationSupply: VariableName=[Leaf].DMSupplyFixation.Value()
          VariableReference LeafDMDemand: VariableName=[Leaf].DMDemandFunction.Value()
        Constant MinimumNConc: FixedValue=0
        Constant MaximumNConc: FixedValue=100
        Constant NReallocationFactor: FixedValue=0
        Constant SenescenceRate: FixedValue=0
        Constant DetachmentRateFunction: FixedValue=0
        TEWaterDemandFunction
          Constant SVPFrac: FixedValue=0.75
          Constant TranspirationEfficiencyCoefficient: FixedValue=0.009
          VariableReference Photosynthesis: VariableName=[Leaf].Photosynthesis.Value()
        MinimumFunction DMSupplyFixation
          VariableReference BiomTE: VariableName=[Leaf].BiomTE.Value()
          VariableReference BiomRUE: VariableName=[Leaf].Photosynthesis.Value()
        MultiplyFunction BiomTE
          DivideFunction TE
            VariableReference TECoeff
              VariableName=[Leaf].TEWaterDemandFunction.TranspirationEfficiencyCoefficient.Value()
            VariableReference VPD: VariableName=[Leaf].TEWaterDemandFunction.VPD
            Constant g2mm: FixedValue=0.001
          VariableReference WaterSupply: VariableName=[Arbitrator].WSupply
        Constant MaintenanceRespirationFunction: FixedValue=0; Units=0-1
        Constant DMConversionEfficiency: FixedValue=1; Units=0-1
        BiomassRemoval BiomassRemovalDefaults: same as Replacements.Sorghum.Grain.BiomassRemovalDefaults
        Constant NRetranslocationFactor: FixedValue=0
        Constant NitrogenDemandSwitch: FixedValue=1
        Constant DMReallocationFactor: FixedValue=0
        Constant DMRetranslocationFactor: FixedValue=0
        VariableReference CriticalNConc: VariableName=[Leaf].MinimumNConc.Value()
        Constant RemobilisationCost: FixedValue=0
        Constant CarbonConcentration: FixedValue=0.4
      GenericOrgan Rachis
        MultiplyFunction CobNumber
          VariableReference StemNumber: VariableName=[Structure].TotalStemPopn
          Constant CobsPerStem: FixedValue=1.1
        DivideFunction CobSize
          VariableReference CobMass: VariableName=[Rachis].Live.Wt
          VariableReference CobNumber: VariableName=[Rachis].CobNumber.Value()
        Constant NReallocationFactor: FixedValue=0
        Constant NRetranslocationFactor: FixedValue=0.1
        Constant MaximumNConc: FixedValue=0.008
        Constant StructuralFraction: FixedValue=1
        Constant SenescenceRate: FixedValue=0; Units=/d
        Constant MinimumNConc: FixedValue=0.003
        LinearInterpolationFunction ExpansionStress: XProperty=[Sorghum].WaterSupplyDemandRatio
          XYPairs: X=[0, 0.6]; Y=[1, 1]
        PhaseLookup DMDemandFunction
          PhaseLookupValue BetweenFIAndFlower: Start=FloralInitiation; End=Flowering
            MultiplyFunction
              VariableReference DMRemainingAfterLeaf: VariableName=[Leaf].DMRemaining.Value()
              VariableReference Stem2FlowerFrac: VariableName=[Stem].StemToFlowerFrac.Value()
          PhaseLookupValue BetweenFlagAndFlowering: Start=FlagLeaf; End=Flowering
            MultiplyFunction
              VariableReference DMFixationSupply: VariableName=[Arbitrator].DM.TotalFixationSupply
              VariableReference Stem2FlowerFrac: VariableName=[Stem].StemToFlowerFrac.Value()
        Constant InitialWtFunction: FixedValue=0; Units=g/m^2
        Constant DetachmentRateFunction: FixedValue=0; Units=/d
        Constant InitialWtFunction1: FixedValue=0; Units=g/m^2
        Constant MaintenanceRespirationFunction: FixedValue=0; Units=0-1
        Constant DMConversionEfficiency: FixedValue=1; Units=0-1
        BiomassRemoval BiomassRemovalDefaults: same as Replacements.Sorghum.Grain.BiomassRemovalDefaults
        Constant NitrogenDemandSwitch: FixedValue=1
        Constant DMReallocationFactor: FixedValue=0
        Constant DMRetranslocationFactor: FixedValue=0
        VariableReference CriticalNConc: VariableName=[Rachis].MinimumNConc.Value()
        Constant RemobilisationCost: FixedValue=0
        Constant CarbonConcentration: FixedValue=0.4
      GenericOrgan Stem
        LinearInterpolationFunction MaximumNConc: XProperty=[Structure].LeafTipsAppeared
          XYPairs: X=[1, 10, 11]; Y=[0.03, 0.03, 0.005]
        Constant MinimumNConc: FixedValue=0.006
        PhaseBasedSwitch NitrogenDemandSwitch: Start=Emergence; End=StartGrainFill
        Constant NReallocationFactor: FixedValue=0
        Constant NRetranslocationFactor: FixedValue=0.5
        Constant DMRetranslocationFactor: FixedValue=0.5
        Constant StemToFlowerFrac: FixedValue=0.3
        MaximumFunction DMDemandFunction
          SubtractFunction DMDemandFunction
            VariableReference DMFixationSupply: VariableName=[Arbitrator].DM.TotalFixationSupply
            VariableReference LeafDemand: VariableName=[Leaf].DMDemandFunction.Value()
            VariableReference RachisDemand: VariableName=[Rachis].DMDemandFunction.Value()
            VariableReference GrainDemand: VariableName=[Grain].DMDemandFunction.Value()
          Constant Zero: FixedValue=0
        Constant SenescenceRate: FixedValue=0; Units=/d
        Constant StructuralFraction: FixedValue=0.8
        Constant InitialWtFunction: FixedValue=0; Units=g/m^2
        Constant DetachmentRateFunction: FixedValue=0; Units=/d
        Constant MaintenanceRespirationFunction: FixedValue=0; Units=0-1
        Constant DMConversionEfficiency: FixedValue=1; Units=0-1
        BiomassRemoval BiomassRemovalDefaults: same as Replacements.Sorghum.Grain.BiomassRemovalDefaults
        Constant DMReallocationFactor: FixedValue=0
        VariableReference CriticalNConc: VariableName=[Stem].MinimumNConc.Value()
        Constant RemobilisationCost: FixedValue=0
        Constant CarbonConcentration: FixedValue=0.4
      Cultivar Buster
      Cultivar M35-1: Command=[Phenology].TTEndJuvToInit.FixedValue = 200
      Cultivar CSH13r: Command=[Phenology].TTEndJuvToInit.FixedValue = 220
      Cultivar QL41xQL36: Command=[Phenology].TTEndJuvToInit.FixedValue = 220
      Cultivar ATx623xRTx430: Command=[Phenology].TTEndJuvToInit.FixedValue = 220
      Cultivar QL39xQL36: Command=[Phenology].TTEndJuvToInit.FixedValue = 220
      Cultivar A35xQL36: Command=[Phenology].TTEndJuvToInit.FixedValue = 220
  DataStore
    ExcelInput Apsim79SorgModel: FileName=Apsim79SorgModel.xlsx; SheetNames=[Apsim79SorgModel]
    ExcelInput Apsim79HE1BusterNoTillers: FileName=BusterNoTillers.xlsx; SheetNames=[Apsim79HE1BusterNoTillers]
    PredictedObserved PredictedObservedApsim79: PredictedTableName=Report; ObservedTableName=Apsim79HE1BusterNoTillers; FieldNameUsedForMatch=Stage
  Folder Test
    Simulation Sorghum_HE1_BusterNoTillers
      Clock: StartDate=1996-12-01; EndDate=1997-06-30
      Summary summaryfile
      Weather: FileName=.\Met\HE1.met
      Zone paddock: Area=1; Slope=0
        Soil HRS: SoilType=HMM; Site=HRS; NearestTown=Unknown; Region=SE Queensland; NaturalVegetation=Unknown; Latitude=0; Longitude=0
          Water
            Thickness  BD    AirDry  LL15   DUL   SAT
            100        1.34  0.08    0.226  0.42  0.45
            100        1.34  0.19    0.226  0.42  0.45
            200        1.33  0.23    0.258  0.46  0.48
            200        1.38  0.26    0.27   0.46  0.47
            200        1.4   0.26    0.268  0.43  0.45
            200        1.55  0.28    0.304  0.4   0.41
            200        1.59  0.25    0.335  0.37  0.38
            200        1.63  0.28    0.33   0.33  0.37
            200        1.66  0.3     0.32   0.32  0.37
            200        1.68  0.31    0.33   0.33  0.36
            SoilCrop SorghumSoil
              LL=[0.226, 0.226, 0.258, 0.27, 0.268, 0.304, 0.335, 0.33, 0.32, 0.33]
              KL=[0.07, 0.07, 0.07, 0.07, 0.06, 0.06, 0.06, 0.05, 0.05, 0.04]
              XF=[1, 1, 1, 1, 1, 1, 1, 1, 1, 1]
          SoilWater: SummerDate=1-Nov; SummerU=1.5; SummerCona=6.5; WinterDate=1-Apr; WinterU=1.5; WinterCona=6.5; DiffusConst=40; DiffusSlope=16; Salb=0.2; CN2Bare=85; CNRed=20; CNCov=0.8; max_pond=0; Thickness=[100, 100, 200, 200, 200, 200, 200, 200, 200, 200]; SWCON=[0.3, 0.3, 0.3, 0.3, 0.3, 0.3, 0.3, 0.3, 0.3, 0.3]; residueinterception=0
          SoilNitrogen: fom_type=[default, manure, mucuna, lablab, shemp, stable]; fract_carb=[0.2, 0.3, 0.54, 0.57, 0.45, 0]; fract_cell=[0.7, 0.3, 0.37, 0.37, 0.47, 0.1]; fract_lign=[0.1, 0.4, 0.09, 0.06, 0.08, 0.9]
          SoilOrganicMatter: RootCN=50; RootWt=1000; SoilCN=12.5; EnrACoeff=7.4; EnrBCoeff=0.2; OCUnits=Total
            Thickness  OC    FBiom  FInert
            100        1.19  0.05   0.45
            100        0.59  0.02   0.6
            200        0.45  0.01   0.75
            200        0.3   0.01   0.9
            200        0.2   0.01   0.9
            200        0.16  0.01   0.9
            200        0.17  0.01   0.9
            200        0.17  0.05   0.9
            200        0.17  0.02   0.9
            200        0.17  0.01   0.9
          Analysis: Thickness=[100, 100, 200, 200, 200, 200, 200, 200, 200, 200]; PH=[6.3, 6.4, 6.5, 6.6, 6.6, 6.5, 6.5, 6.5, 6.5, 6.5]; PHUnits=Water; BoronUnits=HotWater
          Sample Initial Water: Thickness=[100, 100, 200, 200, 200, 200, 200, 200, 200, 200]; NO3Units=ppm; NH4Units=ppm; SWUnits=Volumetric; OCUnits=Total; PHUnits=Water
            SW=[0.235, 0.252, 0.27, 0.3, 0.268, 0.304, 0.335, 0.33, 0.32, 0.33]
          Sample Initial Nitrogen: NO3Units=ppm; NH4Units=ppm; SWUnits=Volumetric; OCUnits=Total; PHUnits=Water
            Thickness  NO3    NH4
            100        10.4   0.1
            100        1.633  0.1
            200        1.233  0.1
            200        0.9    0.1
            200        1.1    0.1
            200        1.467  0.1
            200        3.633  0.1
            200        5.667  0.1
            200        5.8    0.1
            200        7.267  0.1
          CERESSoilTemperature
        SurfaceOrganicMatter: PondActive=no; ReportAdditions=no; ReportRemovals=no; PoolName=wheat_stubble; type=wheat; mass=0; standing_fraction=0; cpr=0; cnr=80; CriticalResidueWeight=2000; OptimumDecompTemp=20; MaxCumulativeEOS=20; CNRatioDecompCoeff=0.277; CNRatioDecompThreshold=25; TotalLeachRain=25; MinRainToLeach=10; CriticalMinimumOrganicC=0.004; DefaultCPRatio=0; DefaultStandingFraction=0; StandingExtinctCoeff=0.5; FractionFaecesAdded=0.5
          Pools:
            {PoolName=wheat_stubble, ResidueType=wheat, Mass=0, CNRatio=80, CPRatio=0, StandingFraction=0}
          ResidueTypes ResidueTypesList: LoadFromResource=ResidueTypes
          TillageTypes TillageTypesList
        MicroClimate: a_interception=0; b_interception=1; c_interception=0; d_interception=0; soil_albedo=0.23; sun_angle=15; soil_heat_flux_fraction=0.4; night_interception_fraction=0.5; refheight=2; albedo=0.15; emissivity=0.96; RadIntTotal=0
        SoluteManager
        Folder Manager folder
          Manager Harvesting
```csharp
using System;
using Models.Core;
using System.Collections.Generic;
using System.Text;
using Models.Soils;
using Models.PMF;
using Models;
using System.Xml.Serialization;
using APSIM.Shared.Utilities;

namespace Models
{
    [Serializable] 
    public class Script : Model
    {
        [Link] Plant Sorghum;
        [Link] Zone zone;
                    
        
        [EventSubscribe("Commencing")]

        private void OnSimulationCommencing(object sender, EventArgs e)
            {
            }


        [EventSubscribe("DoManagement")]
        private void OnDoManagement(object sender, EventArgs e)
        {
            if (Sorghum.Phenology.CurrentPhaseName == "ReadyForHarvesting")
            {
                Sorghum.Harvest();
                Sorghum.EndCrop();
            }
        }

        [EventSubscribe("DoManagementCalculations")]
        private void OnDoManagementCalculations(object sender, EventArgs e)
        {

        }
    }
}
```
          Manager Sowing
            date = 9-jan
            crop = Sorghum
            density = 10
            depth = 30
            cultivar = Buster
            row_spacing = 0.5
            RowConfiguration = solid
            ftn = 0
```csharp
using System;
using Models.Core;
using Models.PMF;
using Models.PMF;
using Models.Utilities;
using APSIM.Shared.Utilities;
namespace Models
{
    [Serializable]
    [System.Xml.Serialization.XmlInclude(typeof(Model))]
    public class Script : Model
    {
        [Link] Clock Clock;
        [Link] Plant Sorghum;

        
        [Description("Enter sowing date(d - mmm) : ")]

        public string date { get; set; }

        [Description("Enter name of crop to sow : ")]
        public string crop { get; set; }

        [Description("Enter sowing density  (plants/m2) : ")]
        public double density { get; set; }

        [Description("Enter sowing depth  (mm) : ")]
        public double depth { get; set; }

        [Description("Enter cultivar : ")]
        [Display(DisplayType = DisplayAttribute.DisplayTypeEnum.CultivarName)]
        public string cultivar { get; set; }

        [Description("Enter row spacing (m) : ")]
        public double row_spacing { get; set; }

        [Description("Enter skip row configuration : ")]
        public RowConfigurationType RowConfiguration { get; set; }

        [Description("Enter Fertile Tiller No. : ")]
        public string ftn { get; set; }
        public enum RowConfigurationType
        {
            solid,
            single,
            /*replaces double*/
        }

        [EventSubscribe("DoManagement")]
        private void OnDoManagement(object sender, EventArgs e)
        {
            if (DateUtilities.WithinDates(date, Clock.Today, date) && !Sorghum.IsAlive)
            {
                Sorghum.Sow(population: density, cultivar: cultivar, depth: depth, rowSpacing: row_spacing);
            }

            /*
                
            if (paddock_is_fallow() = 1 and today = date('[date]')) then
              [crop] sow plants =[density], sowing_depth = [depth], cultivar = [cultivar], row_spacing = [row_spacing], skip = [RowConfiguration], tiller_no_fertile = [ftn] ()
            endif
            if (paddock_is_fallow() = 0) then
               outputfile do_output
            endif
          
            */
        }
    }
}
```
        Report
        Fertiliser
        Plant Sorghum
        Irrigation
        Operations
          1997-01-09  [Irrigation].Apply(52);
          1997-01-16  [Irrigation].Apply(36);
          1997-01-21  [Irrigation].Apply(18);
          1997-01-29  [Irrigation].Apply(20);
          1997-02-07  [Irrigation].Apply(14);
          1997-03-13  [Irrigation].Apply(30);
          1997-03-21  [Irrigation].Apply(45);
          1997-04-10  [Irrigation].Apply(27);
          1997-04-17  [Irrigation].Apply(42);
          1997-05-02  [Irrigation].Apply(27);
          1996-12-20  [Fertiliser].Apply(33, Fertiliser.Types.NO3N, 50);
          1996-12-23  [Fertiliser].Apply(0, Fertiliser.Types.NO3N, 50);
          1996-12-23  [Fertiliser].Apply(119, Fertiliser.Types.NO3N, 50);
          1997-02-12  [Fertiliser].Apply(59, Fertiliser.Types.NO3N, 50);
          1997-03-21  [Fertiliser].Apply(59, Fertiliser.Types.NO3N, 50);
      SoilArbitrator
  Folder Experiments
    Folder HE1
      Simulation Sorghum_HE1_T1
        Clock: StartDate=1996-12-01; EndDate=1997-06-11
        Summary summaryfile
        Weather: FileName=Met\HE1.met
        SoilArbitrator
        Zone paddock: Area=1; Slope=0
          Soil HRS: same as Test.Sorghum_HE1_BusterNoTillers.paddock.HRS
          SurfaceOrganicMatter: PoolName=wheat_stubble; type=wheat; mass=0; standing_fraction=0; cpr=0; cnr=80; CriticalResidueWeight=2000; OptimumDecompTemp=20; MaxCumulativeEOS=20; CNRatioDecompCoeff=0.277; CNRatioDecompThreshold=25; TotalLeachRain=25; MinRainToLeach=10; CriticalMinimumOrganicC=0.004; DefaultCPRatio=0; DefaultStandingFraction=0; StandingExtinctCoeff=0.5; FractionFaecesAdded=0.5
            Pools:
              {PoolName=wheat_stubble, ResidueType=wheat, Mass=0, CNRatio=80, CPRatio=0, StandingFraction=0}
            ResidueTypes ResidueTypesList: LoadFromResource=ResidueTypes
          MicroClimate: a_interception=0; b_interception=1; c_interception=0; d_interception=0; soil_albedo=0.23; sun_angle=15; soil_heat_flux_fraction=0.4; night_interception_fraction=0.5; refheight=2; albedo=0.15; emissivity=0.96; RadIntTotal=0
          SoluteManager
          Fertiliser
          Irrigation
          Operations: same as Test.Sorghum_HE1_BusterNoTillers.paddock.operations
          Plant Sorghum
          Report
          Folder Manager folder
            Manager Harvesting: same as Test.Sorghum_HE1_BusterNoTillers.paddock.Manager folder.Harvesting
            Manager Sowing
              date = 9-jan
              crop = Sorghum
              density = 10
              depth = 30
              cultivar = QL41xQL36
              row_spacing = 0.5
              RowConfiguration = solid
              ftn = 0
              script: same as in Test.Sorghum_HE1_BusterNoTillers.paddock.Manager folder.Sowing
      Simulation Sorghum_HE1_T2
        Clock: StartDate=1996-12-01; EndDate=1997-06-30
        Summary summaryfile
        Weather: FileName=.\Met\HE1.met
        Zone paddock: Area=1; Slope=0
          Soil HRS: same as Test.Sorghum_HE1_BusterNoTillers.paddock.HRS
          SurfaceOrganicMatter: same as Test.Sorghum_HE1_BusterNoTillers.paddock.SurfaceOrganicMatter
          MicroClimate: a_interception=0; b_interception=1; c_interception=0; d_interception=0; soil_albedo=0.23; sun_angle=15; soil_heat_flux_fraction=0.4; night_interception_fraction=0.5; refheight=2; albedo=0.15; emissivity=0.96; RadIntTotal=0
          SoluteManager
          Report
          Fertiliser
          Plant Sorghum
          Irrigation
          Operations: same as Test.Sorghum_HE1_BusterNoTillers.paddock.operations
          Folder Manager folder
            Manager Harvesting: same as Test.Sorghum_HE1_BusterNoTillers.paddock.Manager folder.Harvesting
            Manager Sowing
              date = 9-jan
              crop = Sorghum
              density = 10
              depth = 30
              cultivar = Buster
              row_spacing = 0.5
              RowConfiguration = solid
              ftn = 0.2
              script: same as in Test.Sorghum_HE1_BusterNoTillers.paddock.Manager folder.Sowing
        SoilArbitrator
      Simulation Sorghum_HE1_T3
        Clock: StartDate=1996-12-01; EndDate=1997-06-30
        Summary summaryfile
        Weather: FileName=.\Met\HE1.met
        Zone paddock: Area=1; Slope=0
          Operations: same as Test.Sorghum_HE1_BusterNoTillers.paddock.operations
          Soil HRS: same as Test.Sorghum_HE1_BusterNoTillers.paddock.HRS
          Plant Sorghum: CropType=Sorghum
          SurfaceOrganicMatter: same as Experiments.HE1.Sorghum_HE1_T1.paddock.SurfaceOrganicMatter
          MicroClimate: a_interception=0; b_interception=1; c_interception=0; d_interception=0; soil_albedo=0.23; sun_angle=15; soil_heat_flux_fraction=0.4; night_interception_fraction=0.5; refheight=2; albedo=0.15; emissivity=0.96; RadIntTotal=0
          SoluteManager
          Fertiliser
          Irrigation
          Folder Manager folder
            Manager Harvesting: same as Test.Sorghum_HE1_BusterNoTillers.paddock.Manager folder.Harvesting
            Manager Sowing
              date = 9-jan
              crop = Sorghum
              density = 10
              depth = 30
              cultivar = M35-1
              row_spacing = 0.5
              RowConfiguration = solid
              ftn = 0
              script: same as in Test.Sorghum_HE1_BusterNoTillers.paddock.Manager folder.Sowing
        SoilArbitrator
    Folder HE2
      Simulation Sorghum_HE2_T1
        Clock: StartDate=1996-12-01; EndDate=1997-06-30
        Summary summaryfile
        Weather: FileName=.\Met\HE2.met
        Zone paddock: Area=1; Slope=0
          Folder Manager folder
            Manager Sowing: same as Experiments.HE1.Sorghum_HE1_T1.paddock.Manager folder.Sowing
            Manager Harvesting: same as Test.Sorghum_HE1_BusterNoTillers.paddock.Manager folder.Harvesting
          Fertiliser
          Irrigation
          Operations
            1997-01-09  [Irrigation].Apply(54);
            1997-01-16  [Irrigation].Apply(37);
            1997-01-21  [Irrigation].Apply(19);
            1997-01-29  [Irrigation].Apply(20);
            1997-02-07  [Irrigation].Apply(14);
            1997-03-13  [Irrigation].Apply(30);
            1997-03-21  [Irrigation].Apply(46);
            1997-04-10  [Irrigation].Apply(24);
            1997-04-17  [Irrigation].Apply(41);
            1997-05-02  [Irrigation].Apply(25);
            1996-12-20  [Fertiliser].Apply(0, Fertiliser.Types.NO3N, 50);
            1996-12-23  [Fertiliser].Apply(0, Fertiliser.Types.NO3N, 50);
            1996-12-23  [Fertiliser].Apply(10, Fertiliser.Types.NO3N, 50);
          Soil HRS: SoilType=HMM; Site=HRS; NearestTown=Unknown; Region=SE Queensland; NaturalVegetation=Unknown; Latitude=0; Longitude=0
            Water
              Thickness  BD    AirDry  LL15   DUL   SAT
              100        1.34  0.08    0.226  0.42  0.45
              100        1.34  0.19    0.226  0.42  0.45
              200        1.33  0.23    0.258  0.46  0.47
              200        1.38  0.26    0.27   0.46  0.47
              200        1.4   0.26    0.268  0.43  0.45
              200        1.55  0.28    0.304  0.4   0.41
              200        1.59  0.25    0.335  0.37  0.38
              200        1.63  0.28    0.33   0.33  0.37
              200        1.66  0.3     0.32   0.32  0.37
              200        1.68  0.31    0.33   0.33  0.36
              SoilCrop SorghumSoil
                LL=[0.226, 0.226, 0.258, 0.27, 0.268, 0.304, 0.335, 0.33, 0.32, 0.33]
                KL=[0.07, 0.07, 0.07, 0.07, 0.06, 0.06, 0.06, 0.05, 0.05, 0.04]
                XF=[1, 1, 1, 1, 1, 1, 1, 1, 1, 1]
            SoilWater: same as Test.Sorghum_HE1_BusterNoTillers.paddock.HRS.SoilWater
            SoilNitrogen: fom_type=[default, manure, mucuna, lablab, shemp, stable]; fract_carb=[0.2, 0.3, 0.54, 0.57, 0.45, 0]; fract_cell=[0.7, 0.3, 0.37, 0.37, 0.47, 0.1]; fract_lign=[0.1, 0.4, 0.09, 0.06, 0.08, 0.9]
            SoilOrganicMatter: same as Test.Sorghum_HE1_BusterNoTillers.paddock.HRS.SoilOrganicMatter
            Analysis: Thickness=[100, 100, 200, 200, 200, 200, 200, 200, 200, 200]; PH=[6.3, 6.4, 6.5, 6.6, 6.6, 6.5, 6.5, 6.5, 6.5, 6.5]; PHUnits=Water; BoronUnits=HotWater
            Sample Initial Water: Thickness=[100, 100, 200, 200, 200, 200, 200, 200, 200, 200]; NO3Units=ppm; NH4Units=ppm; SWUnits=Volumetric; OCUnits=Total; PHUnits=Water
              SW=[0.235, 0.252, 0.27, 0.3, 0.268, 0.304, 0.335, 0.33, 0.32, 0.33]
            Sample Initial Nitrogen: NO3Units=ppm; NH4Units=ppm; SWUnits=Volumetric; OCUnits=Total; PHUnits=Water
              Thickness  NO3        NH4
              100        0.0999983  0.1
              100        0.0259996  0.1
              200        0.0499991  0.1
              200        0.0579706  0.1
              200        0.394272   0.1
              200        0.187095   0.1
              200        0.511991   0.1
              200        0.761987   0.1
              200        0.718988   0.1
              200        0.699988   0.1
            CERESSoilTemperature
          Plant sorghum: ResourceName=Sorghum; CropType=sorghum
          Report: VariableNames=biomass_n
          SurfaceOrganicMatter: same as Experiments.HE1.Sorghum_HE1_T1.paddock.SurfaceOrganicMatter
          MicroClimate: a_interception=0; b_interception=1; c_interception=0; d_interception=0; soil_albedo=0.23; sun_angle=15; soil_heat_flux_fraction=0.4; night_interception_fraction=0.5; refheight=2; albedo=0.15; emissivity=0.96; RadIntTotal=0
          SoluteManager
        SoilArbitrator
      Simulation Sorghum_HE2_T2
        Clock: StartDate=1996-12-01; EndDate=1997-06-30
        Summary summaryfile
        Weather: FileName=.\Met\HE2.met
        Zone paddock: Area=1; Slope=0
          Folder Manager folder
            Manager Sowing: same as Test.Sorghum_HE1_BusterNoTillers.paddock.Manager folder.Sowing
            Manager Harvesting: same as Test.Sorghum_HE1_BusterNoTillers.paddock.Manager folder.Harvesting
          Fertiliser
          Irrigation
          Operations
            1997-01-09  [Irrigation].Apply(54);
          Soil HRS: same as Experiments.HE2.Sorghum_HE2_T1.paddock.HRS
          Plant sorghum: ResourceName=Sorghum; CropType=sorghum
          Report: VariableNames=biomass_n
          SurfaceOrganicMatter: same as Experiments.HE1.Sorghum_HE1_T1.paddock.SurfaceOrganicMatter
          MicroClimate: a_interception=0; b_interception=1; c_interception=0; d_interception=0; soil_albedo=0.23; sun_angle=15; soil_heat_flux_fraction=0.4; night_interception_fraction=0.5; refheight=2; albedo=0.15; emissivity=0.96; RadIntTotal=0
          SoluteManager
        SoilArbitrator
      Simulation Sorghum_HE2_T3
        Clock: StartDate=1996-12-01; EndDate=1997-06-30
        Summary summaryfile
        Weather: FileName=.\Met\HE2.met
        Zone paddock: Area=1; Slope=0
          Folder Manager folder
            Manager Sowing: same as Experiments.HE1.Sorghum_HE1_T3.paddock.Manager folder.Sowing
            Manager Harvesting: same as Test.Sorghum_HE1_BusterNoTillers.paddock.Manager folder.Harvesting
          Fertiliser
          Irrigation
          Operations
            1997-01-09  [Irrigation].Apply(54);
          Soil HRS: same as Experiments.HE2.Sorghum_HE2_T1.paddock.HRS
          Plant sorghum: ResourceName=Sorghum; CropType=sorghum
          Report: VariableNames=biomass_n
          SurfaceOrganicMatter: same as Experiments.HE1.Sorghum_HE1_T1.paddock.SurfaceOrganicMatter
          MicroClimate: a_interception=0; b_interception=1; c_interception=0; d_interception=0; soil_albedo=0.23; sun_angle=15; soil_heat_flux_fraction=0.4; night_interception_fraction=0.5; refheight=2; albedo=0.15; emissivity=0.96; RadIntTotal=0
          SoluteManager
        SoilArbitrator
    Folder HE3
      Simulation Sorghum_HE3_T1
        Clock: StartDate=1997-01-09; EndDate=1997-06-30
        Summary summaryfile
        Weather: FileName=.\Met\HE3.met
        Zone paddock: Area=1; Slope=0
          Folder Manager folder
            Manager Sowing
              date = 9-jan
              crop = Sorghum
              density = 10
              depth = 15
              cultivar = QL41xQL36
              row_spacing = 0.5
              RowConfiguration = solid
              ftn = 0
              script: same as in Test.Sorghum_HE1_BusterNoTillers.paddock.Manager folder.Sowing
            Manager Harvesting
              script: same as in Test.Sorghum_HE1_BusterNoTillers.paddock.Manager folder.Harvesting
          Fertiliser
          Irrigation
          Operations
            1996-12-23  [Irrigation].Apply(69);
            1996-12-27  [Irrigation].Apply(9);
            1997-01-09  [Irrigation].Apply(33);
            1997-01-16  [Irrigation].Apply(28);
            1997-01-31  [Irrigation].Apply(19);
            1996-12-20  [Fertiliser].Apply(33, Fertiliser.Types.NO3N, 50);
            1996-12-23  [Fertiliser].Apply(0, Fertiliser.Types.NO3N, 50);
            1996-12-23  [Fertiliser].Apply(119, Fertiliser.Types.NO3N, 50);
          Soil HRS: SoilType=HMM; Site=HRS; NearestTown=Unknown; Region=SE Queensland; NaturalVegetation=Unknown; Latitude=0; Longitude=0
            Water
              Thickness  BD    AirDry  LL15   DUL   SAT
              100        1.34  0.08    0.226  0.42  0.45
              100        1.34  0.19    0.226  0.42  0.45
              200        1.33  0.23    0.258  0.46  0.48
              200        1.38  0.26    0.27   0.46  0.47
              200        1.4   0.26    0.268  0.43  0.45
              200        1.55  0.28    0.304  0.4   0.41
              200        1.59  0.32    0.335  0.37  0.38
              200        1.63  0.32    0.33   0.33  0.37
              200        1.66  0.32    0.32   0.32  0.37
              200        1.68  0.33    0.33   0.33  0.36
              SoilCrop SorghumSoil
                LL=[0.226, 0.226, 0.258, 0.27, 0.268, 0.304, 0.335, 0.33, 0.32, 0.33]
                KL=[0.07, 0.07, 0.07, 0.07, 0.06, 0.06, 0.06, 0.05, 0.05, 0.04]
                XF=[1, 1, 1, 1, 1, 1, 1, 1, 1, 1]
            SoilWater: same as Test.Sorghum_HE1_BusterNoTillers.paddock.HRS.SoilWater
            SoilNitrogen: fom_type=[default, manure, mucuna, lablab, shemp, stable]; fract_carb=[0.2, 0.3, 0.54, 0.57, 0.45, 0]; fract_cell=[0.7, 0.3, 0.37, 0.37, 0.47, 0.1]; fract_lign=[0.1, 0.4, 0.09, 0.06, 0.08, 0.9]
            SoilOrganicMatter: same as Test.Sorghum_HE1_BusterNoTillers.paddock.HRS.SoilOrganicMatter
            Analysis: Thickness=[100, 100, 200, 200, 200, 200, 200, 200, 200, 200]; PH=[6.3, 6.4, 6.5, 6.6, 6.6, 6.5, 6.5, 6.5, 6.5, 6.5]; PHUnits=Water; BoronUnits=HotWater
            Sample Initial Water: Thickness=[100, 100, 200, 200, 200, 200, 200, 200, 200, 200]; NO3Units=ppm; NH4Units=ppm; SWUnits=Volumetric; OCUnits=Total; PHUnits=Water
              SW=[0.217, 0.357, 0.375, 0.401, 0.349, 0.351, 0.359, 0.33, 0.322, 0.347]
            Sample Initial Nitrogen: NO3Units=ppm; NH4Units=ppm; SWUnits=Volumetric; OCUnits=Total; PHUnits=Water
              Thickness  NO3     NH4
              100        12.233  0.1
              100        1.867   0.1
              200        1.4     0.1
              200        0.867   0.1
              200        0.9     0.1
              200        2.833   0.1
              200        3.833   0.1
              200        3.9     0.1
              200        4.233   0.1
              200        3.767   0.1
            CERESSoilTemperature
          Plant sorghum: ResourceName=Sorghum; CropType=sorghum
          Report: VariableNames=biomass_n
          SurfaceOrganicMatter: same as Experiments.HE1.Sorghum_HE1_T1.paddock.SurfaceOrganicMatter
          MicroClimate: a_interception=0; b_interception=1; c_interception=0; d_interception=0; soil_albedo=0.23; sun_angle=15; soil_heat_flux_fraction=0.4; night_interception_fraction=0.5; refheight=2; albedo=0.15; emissivity=0.96; RadIntTotal=0
          SoluteManager
        SoilArbitrator
      Simulation Sorghum_HE3_T2
        Clock: StartDate=1997-01-09; EndDate=1997-06-30
        Summary summaryfile
        Weather: FileName=.\Met\HE3.met
        Zone paddock: Area=1; Slope=0
          Folder Manager folder
            Manager Sowing
              date = 9-jan
              crop = Sorghum
              density = 10
              depth = 15
              cultivar = Buster
              row_spacing = 0.5
              RowConfiguration = solid
              ftn = 0
              script: same as in Test.Sorghum_HE1_BusterNoTillers.paddock.Manager folder.Sowing
            Manager Harvesting: same as Test.Sorghum_HE1_BusterNoTillers.paddock.Manager folder.Harvesting
          Fertiliser
          Irrigation
          Operations: same as Experiments.HE3.Sorghum_HE3_T1.paddock.operations
          Soil HRS: same as Experiments.HE3.Sorghum_HE3_T1.paddock.HRS
          Plant sorghum: ResourceName=Sorghum; CropType=sorghum
          Report: VariableNames=biomass_n
          SurfaceOrganicMatter: same as Experiments.HE1.Sorghum_HE1_T1.paddock.SurfaceOrganicMatter
          MicroClimate: a_interception=0; b_interception=1; c_interception=0; d_interception=0; soil_albedo=0.23; sun_angle=15; soil_heat_flux_fraction=0.4; night_interception_fraction=0.5; refheight=2; albedo=0.15; emissivity=0.96; RadIntTotal=0
          SoluteManager
        SoilArbitrator
      Simulation Sorghum_HE3_T3
        Clock: StartDate=1997-01-09; EndDate=1997-06-30
        Summary summaryfile
        Weather: FileName=.\Met\HE3.met
        Zone paddock: Area=1; Slope=0
          Folder Manager folder
            Manager Sowing
              date = 9-jan
              crop = Sorghum
              density = 10
              depth = 15
              cultivar = M35-1
              row_spacing = 0.5
              RowConfiguration = solid
              ftn = 0
              script: same as in Test.Sorghum_HE1_BusterNoTillers.paddock.Manager folder.Sowing
            Manager Harvesting: same as Test.Sorghum_HE1_BusterNoTillers.paddock.Manager folder.Harvesting
          Fertiliser
          Irrigation
          Operations: same as Experiments.HE3.Sorghum_HE3_T1.paddock.operations
          Soil HRS: same as Experiments.HE3.Sorghum_HE3_T1.paddock.HRS
          Plant sorghum: ResourceName=Sorghum; CropType=sorghum
          Report: VariableNames=biomass_n
          SurfaceOrganicMatter: same as Experiments.HE1.Sorghum_HE1_T1.paddock.SurfaceOrganicMatter
          MicroClimate: a_interception=0; b_interception=1; c_interception=0; d_interception=0; soil_albedo=0.23; sun_angle=15; soil_heat_flux_fraction=0.4; night_interception_fraction=0.5; refheight=2; albedo=0.15; emissivity=0.96; RadIntTotal=0
          SoluteManager
        SoilArbitrator
    Folder HE4
      Simulation Sorghum_HE4_T1
        Clock: StartDate=1996-12-01; EndDate=1997-06-11
        Summary summaryfile
        Weather: FileName=.\Met\HE4.met
        Zone paddock: Area=1; Slope=0
          Folder Manager folder
            Manager Sowing: same as Experiments.HE3.Sorghum_HE3_T1.paddock.Manager folder.Sowing
            Manager Harvesting: same as Test.Sorghum_HE1_BusterNoTillers.paddock.Manager folder.Harvesting
          Fertiliser
          Irrigation
          Operations
            1997-12-23  [Fertiliser].Apply(0, Fertiliser.Types.NO3N, 50);
          Soil HRS: SoilType=HMM; Site=HRS; NearestTown=Unknown; Region=SE Queensland; NaturalVegetation=Unknown; Latitude=0; Longitude=0
            Water: same as Test.Sorghum_HE1_BusterNoTillers.paddock.HRS.Water
            SoilWater: same as Test.Sorghum_HE1_BusterNoTillers.paddock.HRS.SoilWater
            SoilNitrogen: fom_type=[default, manure, mucuna, lablab, shemp, stable]; fract_carb=[0.2, 0.3, 0.54, 0.57, 0.45, 0]; fract_cell=[0.7, 0.3, 0.37, 0.37, 0.47, 0.1]; fract_lign=[0.1, 0.4, 0.09, 0.06, 0.08, 0.9]
            SoilOrganicMatter: same as Test.Sorghum_HE1_BusterNoTillers.paddock.HRS.SoilOrganicMatter
            Analysis: Thickness=[100, 100, 200, 200, 200, 200, 200, 200, 200, 200]; PH=[6.3, 6.4, 6.5, 6.6, 6.6, 6.5, 6.5, 6.5, 6.5, 6.5]; PHUnits=Water; BoronUnits=HotWater
            InitialWater Initial Water: PercentMethod=FilledFromTop; FractionFull=0.6
            Sample Initial Nitrogen: NO3Units=ppm; NH4Units=ppm; SWUnits=Volumetric; OCUnits=Total; PHUnits=Water
              Thickness  NO3      NH4
              100        18.4607  0.468732
              100        2.89869  0.468732
              200        2.18866  0.468732
              200        1.59756  0.468732
              200        1.95258  0.468732
              200        2.60403  0.468732
              200        6.44883  0.468732
              200        10.0593  0.468732
              200        10.2954  0.468732
              200        12.8994  0.468732
            CERESSoilTemperature
          Plant sorghum: ResourceName=Sorghum; CropType=sorghum
          Report: VariableNames=biomass_n
          SurfaceOrganicMatter: same as Experiments.HE1.Sorghum_HE1_T1.paddock.SurfaceOrganicMatter
          MicroClimate: a_interception=0; b_interception=1; c_interception=0; d_interception=0; soil_albedo=0.23; sun_angle=15; soil_heat_flux_fraction=0.4; night_interception_fraction=0.5; refheight=2; albedo=0.15; emissivity=0.96; RadIntTotal=0
          SoluteManager
        SoilArbitrator
      Simulation Sorghum_HE4_T2
        Clock: StartDate=1996-12-01; EndDate=1997-06-30
        Summary summaryfile
        Weather: FileName=.\Met\HE4.met
        Zone paddock: Area=1; Slope=0
          Folder Manager folder
            Manager Sowing: same as Experiments.HE1.Sorghum_HE1_T2.paddock.Manager folder.Sowing
            Manager Harvesting: same as Test.Sorghum_HE1_BusterNoTillers.paddock.Manager folder.Harvesting
          Fertiliser
          Irrigation
          Operations
            1997-12-23  [Fertiliser].Apply(0, Fertiliser.Types.NO3N, 50);
          Soil HRS: same as Experiments.HE4.Sorghum_HE4_T1.paddock.HRS
          Plant sorghum: ResourceName=Sorghum; CropType=sorghum
          Report: VariableNames=biomass_n
          SurfaceOrganicMatter: same as Experiments.HE1.Sorghum_HE1_T1.paddock.SurfaceOrganicMatter
          MicroClimate: a_interception=0; b_interception=1; c_interception=0; d_interception=0; soil_albedo=0.23; sun_angle=15; soil_heat_flux_fraction=0.4; night_interception_fraction=0.5; refheight=2; albedo=0.15; emissivity=0.96; RadIntTotal=0
          SoluteManager
        SoilArbitrator
      Simulation Sorghum_HE4_T3
        Clock: StartDate=1996-12-01; EndDate=1997-06-30
        Summary summaryfile
        Weather: FileName=.\Met\HE4.met
        Zone paddock: Area=1; Slope=0
          Folder Manager folder: same as Experiments.HE2.Sorghum_HE2_T3.paddock.Manager folder
          Fertiliser
          Irrigation
          Operations
            1997-12-23  [Fertiliser].Apply(0, Fertiliser.Types.NO3N, 50);
          Soil HRS: same as Experiments.HE4.Sorghum_HE4_T1.paddock.HRS
          Plant sorghum: ResourceName=Sorghum; CropType=sorghum
          Report: VariableNames=biomass_n
          SurfaceOrganicMatter: same as Experiments.HE1.Sorghum_HE1_T1.paddock.SurfaceOrganicMatter
          MicroClimate: a_interception=0; b_interception=1; c_interception=0; d_interception=0; soil_albedo=0.23; sun_angle=15; soil_heat_flux_fraction=0.4; night_interception_fraction=0.5; refheight=2; albedo=0.15; emissivity=0.96; RadIntTotal=0
          SoluteManager
        SoilArbitrator
    Folder HE5
      Simulation Sorghum_HE5_T1
        Clock: StartDate=1997-11-18; EndDate=1998-04-15
        Summary summaryfile
        Weather: FileName=.\Met\HE5.met
        Zone paddock: Area=1; Slope=0
          Folder Manager folder
            Manager Sowing
              date = 27-nov
              crop = Sorghum
              density = 10
              depth = 30
              cultivar = Buster
              row_spacing = 0.5
              RowConfiguration = solid
              ftn = 0.1
              script: same as in Test.Sorghum_HE1_BusterNoTillers.paddock.Manager folder.Sowing
            Manager Harvesting: same as Test.Sorghum_HE1_BusterNoTillers.paddock.Manager folder.Harvesting
          Fertiliser
          Irrigation
          Operations
            1997-11-28  [Irrigation].Apply(16);
            1997-12-02  [Irrigation].Apply(25);
            1997-12-04  [Irrigation].Apply(13);
            1997-12-08  [Irrigation].Apply(21);
            1997-12-18  [Irrigation].Apply(28);
            1998-01-06  [Irrigation].Apply(26);
            1998-01-12  [Irrigation].Apply(46);
            1998-01-27  [Irrigation].Apply(25);
            1998-02-20  [Irrigation].Apply(26);
            1998-02-27  [Irrigation].Apply(55);
            1998-03-13  [Irrigation].Apply(22);
            1998-03-18  [Irrigation].Apply(39);
            1998-03-20  [Irrigation].Apply(21);
            1997-11-26  [Fertiliser].Apply(3, Fertiliser.Types.NO3N, 50);
            1998-02-20  [Fertiliser].Apply(59, Fertiliser.Types.NO3N, 50);
          Soil HRS: SoilType=HMM; Site=HRS; NearestTown=Unknown; Region=SE Queensland; NaturalVegetation=Unknown; Latitude=0; Longitude=0
            Water: same as Test.Sorghum_HE1_BusterNoTillers.paddock.HRS.Water
            SoilWater: same as Test.Sorghum_HE1_BusterNoTillers.paddock.HRS.SoilWater
            SoilNitrogen: fom_type=[default, manure, mucuna, lablab, shemp, stable]; fract_carb=[0.2, 0.3, 0.54, 0.57, 0.45, 0]; fract_cell=[0.7, 0.3, 0.37, 0.37, 0.47, 0.1]; fract_lign=[0.1, 0.4, 0.09, 0.06, 0.08, 0.9]
            SoilOrganicMatter: same as Test.Sorghum_HE1_BusterNoTillers.paddock.HRS.SoilOrganicMatter
            Analysis: Thickness=[100, 100, 200, 200, 200, 200, 200, 200, 200, 200]; PH=[6.3, 6.4, 6.5, 6.6, 6.6, 6.5, 6.5, 6.5, 6.5, 6.5]; PHUnits=Water; BoronUnits=HotWater
            Sample Initial Water: Thickness=[100, 100, 200, 200, 200, 200, 200, 200, 200, 200]; NO3Units=ppm; NH4Units=ppm; SWUnits=Volumetric; OCUnits=Total; PHUnits=Water
              SW=[0.217, 0.357, 0.375, 0.401, 0.349, 0.351, 0.359, 0.33, 0.322, 0.347]
            Sample Initial Nitrogen: NO3Units=ppm; NH4Units=ppm; SWUnits=Volumetric; OCUnits=Total; PHUnits=Water
              Thickness  NO3     NH4
              100        8.421   0.1
              100        8.054   0.1
              200        7.001   0.1
              200        3.824   0.1
              200        2.759   0.1
              200        3.429   0.1
              200        8.668   0.1
              200        11.576  0.1
              200        8.816   0.1
              200        11.758  0.1
            CERESSoilTemperature
          Plant sorghum: ResourceName=Sorghum; CropType=sorghum
          Report: VariableNames=biomass_n
          SurfaceOrganicMatter: same as Experiments.HE1.Sorghum_HE1_T1.paddock.SurfaceOrganicMatter
          MicroClimate: a_interception=0; b_interception=1; c_interception=0; d_interception=0; soil_albedo=0.23; sun_angle=15; soil_heat_flux_fraction=0.4; night_interception_fraction=0.5; refheight=2; albedo=0.15; emissivity=0.96; RadIntTotal=0
          SoluteManager
        SoilArbitrator
      Simulation Sorghum_HE5_T2
        Clock: StartDate=1997-11-18; EndDate=1998-04-15
        Summary summaryfile
        Weather: FileName=.\Met\HE5.met
        Zone paddock: Area=1; Slope=0
          Folder Manager folder
            Manager Sowing
              date = 27-nov
              crop = Sorghum
              density = 10
              depth = 30
              cultivar = M35-1
              row_spacing = 0.5
              RowConfiguration = solid
              ftn = 0.2
              script: same as in Test.Sorghum_HE1_BusterNoTillers.paddock.Manager folder.Sowing
            Manager Harvesting: same as Test.Sorghum_HE1_BusterNoTillers.paddock.Manager folder.Harvesting
          Fertiliser
          Irrigation
          Operations: same as Experiments.HE5.Sorghum_HE5_T1.paddock.operations
          Soil HRS: same as Experiments.HE5.Sorghum_HE5_T1.paddock.HRS
          Plant sorghum: ResourceName=Sorghum; CropType=sorghum
          Report: VariableNames=biomass_n
          SurfaceOrganicMatter: same as Experiments.HE1.Sorghum_HE1_T1.paddock.SurfaceOrganicMatter
          MicroClimate: a_interception=0; b_interception=1; c_interception=0; d_interception=0; soil_albedo=0.23; sun_angle=15; soil_heat_flux_fraction=0.4; night_interception_fraction=0.5; refheight=2; albedo=0.15; emissivity=0.96; RadIntTotal=0
          SoluteManager
        SoilArbitrator
      Simulation Sorghum_HE5_T3
        Clock: StartDate=1997-11-18; EndDate=1998-04-15
        Summary summaryfile
        Weather: FileName=.\Met\HE5.met
        Zone paddock: Area=1; Slope=0
          Folder Manager folder
            Manager Sowing
              date = 27-nov
              crop = Sorghum
              density = 10
              depth = 30
              cultivar = CSH13R
              row_spacing = 0.5
              RowConfiguration = solid
              ftn = 0
              script: same as in Test.Sorghum_HE1_BusterNoTillers.paddock.Manager folder.Sowing
            Manager Harvesting: same as Test.Sorghum_HE1_BusterNoTillers.paddock.Manager folder.Harvesting
          Fertiliser
          Irrigation
          Operations
            1997-11-28  [Irrigation].Apply(16);
            1997-12-02  [Irrigation].Apply(25);
            1997-12-04  [Irrigation].Apply(13);
            1997-12-08  [Irrigation].Apply(21);
            1997-12-18  [Irrigation].Apply(28);
            1998-01-06  [Irrigation].Apply(26);
            1998-01-12  [Irrigation].Apply(46);
            1998-01-27  [Irrigation].Apply(25);
            1998-02-20  [Irrigation].Apply(26);
            1998-02-27  [Irrigation].Apply(55);
            1998-03-13  [Irrigation].Apply(22);
            1998-03-18  [Irrigation].Apply(39);
            1998-03-20  [Irrigation].Apply(21);
            1997-11-26  [Fertiliser].Apply(0, Fertiliser.Types.NO3N, 50);
            1997-11-26  [Fertiliser].Apply(33, Fertiliser.Types.NO3N, 50);
            1998-02-20  [Fertiliser].Apply(59, Fertiliser.Types.NO3N, 50);
          Soil HRS: same as Experiments.HE5.Sorghum_HE5_T1.paddock.HRS
          Plant sorghum: ResourceName=Sorghum; CropType=sorghum
          Report: VariableNames=biomass_n
          SurfaceOrganicMatter: same as Experiments.HE1.Sorghum_HE1_T1.paddock.SurfaceOrganicMatter
          MicroClimate: a_interception=0; b_interception=1; c_interception=0; d_interception=0; soil_albedo=0.23; sun_angle=15; soil_heat_flux_fraction=0.4; night_interception_fraction=0.5; refheight=2; albedo=0.15; emissivity=0.96; RadIntTotal=0
          SoluteManager
        SoilArbitrator
    Folder HE6
      Simulation Sorghum_HE6_T1
        Clock: StartDate=1997-11-18; EndDate=1998-04-15
        Summary summaryfile
        Weather: FileName=.\Met\HE6.met
        Zone paddock: Area=1; Slope=0
          Folder Manager folder
            Manager Sowing
              date = 27-nov
              crop = Sorghum
              density = 10
              depth = 30
              cultivar = Buster
              row_spacing = 0.5
              RowConfiguration = solid
              ftn = 0
              script: same as in Test.Sorghum_HE1_BusterNoTillers.paddock.Manager folder.Sowing
            Manager Harvesting: same as Test.Sorghum_HE1_BusterNoTillers.paddock.Manager folder.Harvesting
          Fertiliser
          Irrigation
          Operations
            1997-11-28  [Irrigation].Apply(16);
            1997-12-02  [Irrigation].Apply(24);
            1997-12-04  [Irrigation].Apply(13);
            1997-12-08  [Irrigation].Apply(21);
            1997-12-18  [Irrigation].Apply(28);
            1998-01-06  [Irrigation].Apply(26);
            1998-01-12  [Irrigation].Apply(47);
            1998-01-27  [Irrigation].Apply(25);
            1998-02-20  [Irrigation].Apply(20);
            1998-02-27  [Irrigation].Apply(38);
            1998-03-13  [Irrigation].Apply(22);
            1998-03-18  [Irrigation].Apply(40);
            1997-11-26  [Fertiliser].Apply(10, Fertiliser.Types.NO3N, 50);
          Soil HRS: SoilType=HMM; Site=HRS; NearestTown=Unknown; Region=SE Queensland; NaturalVegetation=Unknown; Latitude=0; Longitude=0
            Water: same as Test.Sorghum_HE1_BusterNoTillers.paddock.HRS.Water
            SoilWater: same as Test.Sorghum_HE1_BusterNoTillers.paddock.HRS.SoilWater
            SoilNitrogen: fom_type=[default, manure, mucuna, lablab, shemp, stable]; fract_carb=[0.2, 0.3, 0.54, 0.57, 0.45, 0]; fract_cell=[0.7, 0.3, 0.37, 0.37, 0.47, 0.1]; fract_lign=[0.1, 0.4, 0.09, 0.06, 0.08, 0.9]
            SoilOrganicMatter: same as Test.Sorghum_HE1_BusterNoTillers.paddock.HRS.SoilOrganicMatter
            Analysis: Thickness=[100, 100, 200, 200, 200, 200, 200, 200, 200, 200]; PH=[6.3, 6.4, 6.5, 6.6, 6.6, 6.5, 6.5, 6.5, 6.5, 6.5]; PHUnits=Water; BoronUnits=HotWater
            Sample Initial Water: Thickness=[100, 100, 200, 200, 200, 200, 200, 200, 200, 200]; NO3Units=ppm; NH4Units=ppm; SWUnits=Volumetric; OCUnits=Total; PHUnits=Water
              SW=[0.217, 0.357, 0.375, 0.401, 0.349, 0.351, 0.359, 0.33, 0.322, 0.347]
            Sample Initial Nitrogen: NO3Units=ppm; NH4Units=ppm; SWUnits=Volumetric; OCUnits=Total; PHUnits=Water
              Thickness  NO3    NH4
              100        1.493  0.1
              100        1.633  0.1
              200        1.233  0.1
              200        0.9    0.1
              200        1.1    0.1
              200        1.467  0.1
              200        2.516  0.1
              200        3.067  0.1
              200        3.012  0.1
              200        2.976  0.1
            CERESSoilTemperature
          Plant sorghum: ResourceName=Sorghum; CropType=sorghum
          Report: VariableNames=biomass_n
          SurfaceOrganicMatter: same as Experiments.HE1.Sorghum_HE1_T1.paddock.SurfaceOrganicMatter
          MicroClimate: a_interception=0; b_interception=1; c_interception=0; d_interception=0; soil_albedo=0.23; sun_angle=15; soil_heat_flux_fraction=0.4; night_interception_fraction=0.5; refheight=2; albedo=0.15; emissivity=0.96; RadIntTotal=0
          SoluteManager
        SoilArbitrator
      Simulation Sorghum_HE6_T2
        Clock: StartDate=1997-11-18; EndDate=1998-04-15
        Summary summaryfile
        Weather: FileName=.\Met\HE6.met
        Zone paddock: Area=1; Slope=0
          Folder Manager folder
            Manager Sowing
              date = 27-nov
              crop = Sorghum
              density = 10
              depth = 30
              cultivar = M35-1
              row_spacing = 0.5
              RowConfiguration = solid
              ftn = 0
              script: same as in Test.Sorghum_HE1_BusterNoTillers.paddock.Manager folder.Sowing
            Manager Harvesting: same as Test.Sorghum_HE1_BusterNoTillers.paddock.Manager folder.Harvesting
          Fertiliser
          Irrigation
          Operations: same as Experiments.HE6.Sorghum_HE6_T1.paddock.operations
          Soil HRS: same as Experiments.HE6.Sorghum_HE6_T1.paddock.HRS
          Plant sorghum: ResourceName=Sorghum; CropType=sorghum
          Report: VariableNames=biomass_n
          SurfaceOrganicMatter: same as Experiments.HE1.Sorghum_HE1_T1.paddock.SurfaceOrganicMatter
          MicroClimate: a_interception=0; b_interception=1; c_interception=0; d_interception=0; soil_albedo=0.23; sun_angle=15; soil_heat_flux_fraction=0.4; night_interception_fraction=0.5; refheight=2; albedo=0.15; emissivity=0.96; RadIntTotal=0
          SoluteManager
        SoilArbitrator
      Simulation Sorghum_HE6_T3
        Clock: StartDate=1997-11-18; EndDate=1998-04-15
        Summary summaryfile
        Weather: FileName=.\Met\HE6.met
        Zone paddock: Area=1; Slope=0
          Folder Manager folder: same as Experiments.HE5.Sorghum_HE5_T3.paddock.Manager folder
          Fertiliser
          Irrigation
          Operations: same as Experiments.HE6.Sorghum_HE6_T1.paddock.operations
          Soil HRS: same as Experiments.HE6.Sorghum_HE6_T1.paddock.HRS
          Plant sorghum: ResourceName=Sorghum; CropType=sorghum
          Report: VariableNames=biomass_n
          SurfaceOrganicMatter: same as Experiments.HE1.Sorghum_HE1_T1.paddock.SurfaceOrganicMatter
          MicroClimate: a_interception=0; b_interception=1; c_interception=0; d_interception=0; soil_albedo=0.23; sun_angle=15; soil_heat_flux_fraction=0.4; night_interception_fraction=0.5; refheight=2; albedo=0.15; emissivity=0.96; RadIntTotal=0
          SoluteManager
        SoilArbitrator
    Folder HE7
      Simulation Sorghum_HE7_T1
        Clock: StartDate=1997-11-25; EndDate=1998-04-15
        Summary summaryfile
        Weather: FileName=.\Met\HE7.met
        Zone paddock: Area=1; Slope=0
          Folder Manager folder
            Manager Sowing
              date = 27-nov
              crop = Sorghum
              density = 10
              depth = 15
              cultivar = Buster
              row_spacing = 0.5
              RowConfiguration = solid
              ftn = 0
              script: same as in Test.Sorghum_HE1_BusterNoTillers.paddock.Manager folder.Sowing
            Manager Harvesting: same as Test.Sorghum_HE1_BusterNoTillers.paddock.Manager folder.Harvesting
          Fertiliser
          Irrigation
          Operations
            1997-11-28  [Irrigation].Apply(65);
            1997-12-16  [Irrigation].Apply(90);
            1997-11-26  [Fertiliser].Apply(3, Fertiliser.Types.NO3N, 50);
            1997-11-26  [Fertiliser].Apply(119, Fertiliser.Types.NO3N, 50);
          Soil HRS: SoilType=HMM; Site=HRS; NearestTown=Unknown; Region=SE Queensland; NaturalVegetation=Unknown; Latitude=0; Longitude=0
            Water: same as Experiments.HE3.Sorghum_HE3_T1.paddock.HRS.Water
            SoilWater: same as Test.Sorghum_HE1_BusterNoTillers.paddock.HRS.SoilWater
            SoilNitrogen: fom_type=[default, manure, mucuna, lablab, shemp, stable]; fract_carb=[0.2, 0.3, 0.54, 0.57, 0.45, 0]; fract_cell=[0.7, 0.3, 0.37, 0.37, 0.47, 0.1]; fract_lign=[0.1, 0.4, 0.09, 0.06, 0.08, 0.9]
            SoilOrganicMatter: same as Test.Sorghum_HE1_BusterNoTillers.paddock.HRS.SoilOrganicMatter
            Analysis: Thickness=[100, 100, 200, 200, 200, 200, 200, 200, 200, 200]; PH=[6.3, 6.4, 6.5, 6.6, 6.6, 6.5, 6.5, 6.5, 6.5, 6.5]; PHUnits=Water; BoronUnits=HotWater
            Sample Initial nitrogen: NO3Units=ppm; NH4Units=ppm; SWUnits=Volumetric; OCUnits=Total; PHUnits=Water
              Thickness  NO3     NH4
              100        25.798  0.1
              100        6.921   0.1
              200        9.285   0.1
              200        2.823   0.1
              200        2.286   0.1
              200        3.196   0.1
              200        3.695   0.1
              200        4.41    0.1
              200        2.743   0.1
              200        4.891   0.1
            Sample Initial water: Thickness=[100, 100, 200, 200, 200, 200, 200, 200, 200, 200]; NO3Units=ppm; NH4Units=ppm; SWUnits=Volumetric; OCUnits=Total; PHUnits=Water
              SW=[0.307, 0.326, 0.444, 0.429, 0.363, 0.351, 0.336, 0.343, 0.352, 0.347]
            CERESSoilTemperature
          Plant sorghum: ResourceName=Sorghum; CropType=sorghum
          Report: VariableNames=biomass_n
          SurfaceOrganicMatter: same as Experiments.HE1.Sorghum_HE1_T1.paddock.SurfaceOrganicMatter
          MicroClimate: a_interception=0; b_interception=1; c_interception=0; d_interception=0; soil_albedo=0.23; sun_angle=15; soil_heat_flux_fraction=0.4; night_interception_fraction=0.5; refheight=2; albedo=0.15; emissivity=0.96; RadIntTotal=0
          SoluteManager
        SoilArbitrator
      Simulation Sorghum_HE7_T2
        Clock: StartDate=1997-11-25; EndDate=1998-04-15
        Summary summaryfile
        Weather: FileName=.\Met\HE7.met
        Zone paddock: Area=1; Slope=0
          Folder Manager folder
            Manager Sowing
              date = 27-nov
              crop = Sorghum
              density = 10
              depth = 15
              cultivar = M35-1
              row_spacing = 0.5
              RowConfiguration = solid
              ftn = 0
              script: same as in Test.Sorghum_HE1_BusterNoTillers.paddock.Manager folder.Sowing
            Manager Harvesting: same as Test.Sorghum_HE1_BusterNoTillers.paddock.Manager folder.Harvesting
          Fertiliser
          Irrigation
          Operations
            1997-11-28  [Irrigation].Apply(65);
            1997-12-16  [Irrigation].Apply(90);
            1997-11-26  [Fertiliser].Apply(0, Fertiliser.Types.NO3N, 50);
            1997-11-26  [Fertiliser].Apply(33, Fertiliser.Types.NO3N, 50);
            1997-11-26  [Fertiliser].Apply(119, Fertiliser.Types.NO3N, 50);
          Soil HRS: SoilType=HMM; Site=HRS; NearestTown=Unknown; Region=SE Queensland; NaturalVegetation=Unknown; Latitude=0; Longitude=0
            Water: same as Experiments.HE3.Sorghum_HE3_T1.paddock.HRS.Water
            SoilWater: same as Test.Sorghum_HE1_BusterNoTillers.paddock.HRS.SoilWater
            SoilNitrogen: fom_type=[default, manure, mucuna, lablab, shemp, stable]; fract_carb=[0.2, 0.3, 0.54, 0.57, 0.45, 0]; fract_cell=[0.7, 0.3, 0.37, 0.37, 0.47, 0.1]; fract_lign=[0.1, 0.4, 0.09, 0.06, 0.08, 0.9]
            SoilOrganicMatter: same as Test.Sorghum_HE1_BusterNoTillers.paddock.HRS.SoilOrganicMatter
            Analysis: Thickness=[100, 100, 200, 200, 200, 200, 200, 200, 200, 200]; PH=[6.3, 6.4, 6.5, 6.6, 6.6, 6.5, 6.5, 6.5, 6.5, 6.5]; PHUnits=Water; BoronUnits=HotWater
            Sample Initial nitrogen: same as Experiments.HE7.Sorghum_HE7_T1.paddock.HRS.Initial nitrogen
            Sample Initial water: Thickness=[100, 100, 200, 200, 200, 200, 200, 200, 200, 200]; NO3Units=ppm; NH4Units=ppm; SWUnits=Volumetric; OCUnits=Total; PHUnits=Water
              SW=[0.323, 0.407, 0.388, 0.342, 0.341, 0.321, 0.324, 0.332, 0.339, 0.341]
            CERESSoilTemperature
          Plant sorghum: ResourceName=Sorghum; CropType=sorghum
          Report: VariableNames=biomass_n
          SurfaceOrganicMatter: same as Experiments.HE1.Sorghum_HE1_T1.paddock.SurfaceOrganicMatter
          MicroClimate: a_interception=0; b_interception=1; c_interception=0; d_interception=0; soil_albedo=0.23; sun_angle=15; soil_heat_flux_fraction=0.4; night_interception_fraction=0.5; refheight=2; albedo=0.15; emissivity=0.96; RadIntTotal=0
          SoluteManager
        SoilArbitrator
      Simulation Sorghum_HE7_T3
        Clock: StartDate=1997-11-25; EndDate=1998-04-15
        Summary summaryfile
        Weather: FileName=.\Met\HE7.met
        Zone paddock: Area=1; Slope=0
          Folder Manager folder
            Manager Sowing
              date = 27-nov
              crop = Sorghum
              density = 10
              depth = 15
              cultivar = CSH13R
              row_spacing = 0.5
              RowConfiguration = solid
              ftn = 0
              script: same as in Test.Sorghum_HE1_BusterNoTillers.paddock.Manager folder.Sowing
            Manager Harvesting: same as Test.Sorghum_HE1_BusterNoTillers.paddock.Manager folder.Harvesting
          Fertiliser
          Irrigation
          Operations: same as Experiments.HE7.Sorghum_HE7_T2.paddock.operations
          Soil HRS: SoilType=HMM; Site=HRS; NearestTown=Unknown; Region=SE Queensland; NaturalVegetation=Unknown; Latitude=0; Longitude=0
            Water: same as Experiments.HE3.Sorghum_HE3_T1.paddock.HRS.Water
            SoilWater: same as Test.Sorghum_HE1_BusterNoTillers.paddock.HRS.SoilWater
            SoilNitrogen: fom_type=[default, manure, mucuna, lablab, shemp, stable]; fract_carb=[0.2, 0.3, 0.54, 0.57, 0.45, 0]; fract_cell=[0.7, 0.3, 0.37, 0.37, 0.47, 0.1]; fract_lign=[0.1, 0.4, 0.09, 0.06, 0.08, 0.9]
            SoilOrganicMatter: same as Test.Sorghum_HE1_BusterNoTillers.paddock.HRS.SoilOrganicMatter
            Analysis: Thickness=[100, 100, 200, 200, 200, 200, 200, 200, 200, 200]; PH=[6.3, 6.4, 6.5, 6.6, 6.6, 6.5, 6.5, 6.5, 6.5, 6.5]; PHUnits=Water; BoronUnits=HotWater
            Sample Initial nitrogen: same as Experiments.HE7.Sorghum_HE7_T1.paddock.HRS.Initial nitrogen
            Sample Initial water: Thickness=[100, 100, 200, 200, 200, 200, 200, 200, 200, 200]; NO3Units=ppm; NH4Units=ppm; SWUnits=Volumetric; OCUnits=Total; PHUnits=Water
              SW=[0.307, 0.377, 0.385, 0.382, 0.376, 0.337, 0.346, 0.359, 0.348, 0.35]
            CERESSoilTemperature
          Plant sorghum: ResourceName=Sorghum; CropType=sorghum
          Report: VariableNames=biomass_n
          SurfaceOrganicMatter: same as Experiments.HE1.Sorghum_HE1_T1.paddock.SurfaceOrganicMatter
          MicroClimate: a_interception=0; b_interception=1; c_interception=0; d_interception=0; soil_albedo=0.23; sun_angle=15; soil_heat_flux_fraction=0.4; night_interception_fraction=0.5; refheight=2; albedo=0.15; emissivity=0.96; RadIntTotal=0
          SoluteManager
        SoilArbitrator
    Folder HE8
      Simulation Sorghum_HE8_T1
        Clock: StartDate=1997-11-25; EndDate=1998-04-15
        Summary summaryfile
        Weather: FileName=.\Met\HE8.met
        Zone paddock: Area=1; Slope=0
          Folder Manager folder: same as Experiments.HE7.Sorghum_HE7_T1.paddock.Manager folder
          Fertiliser
          Irrigation
          Operations
            1997-11-28  [Irrigation].Apply(65);
            1997-12-16  [Irrigation].Apply(90);
            1997-11-26  [Fertiliser].Apply(3, Fertiliser.Types.NO3N, 50);
            1997-11-26  [Fertiliser].Apply(10, Fertiliser.Types.NO3N, 50);
          Soil HRS: SoilType=HMM; Site=HRS; NearestTown=Unknown; Region=SE Queensland; NaturalVegetation=Unknown; Latitude=0; Longitude=0
            Water: same as Experiments.HE3.Sorghum_HE3_T1.paddock.HRS.Water
            SoilWater: same as Test.Sorghum_HE1_BusterNoTillers.paddock.HRS.SoilWater
            SoilNitrogen: fom_type=[default, manure, mucuna, lablab, shemp, stable]; fract_carb=[0.2, 0.3, 0.54, 0.57, 0.45, 0]; fract_cell=[0.7, 0.3, 0.37, 0.37, 0.47, 0.1]; fract_lign=[0.1, 0.4, 0.09, 0.06, 0.08, 0.9]
            SoilOrganicMatter: same as Test.Sorghum_HE1_BusterNoTillers.paddock.HRS.SoilOrganicMatter
            Analysis: Thickness=[100, 100, 200, 200, 200, 200, 200, 200, 200, 200]; PH=[6.3, 6.4, 6.5, 6.6, 6.6, 6.5, 6.5, 6.5, 6.5, 6.5]; PHUnits=Water; BoronUnits=HotWater
            Sample Initial nitrogen: same as Experiments.HE7.Sorghum_HE7_T1.paddock.HRS.Initial nitrogen
            Sample Initial water: Thickness=[100, 100, 200, 200, 200, 200, 200, 200, 200, 200]; NO3Units=ppm; NH4Units=ppm; SWUnits=Volumetric; OCUnits=Total; PHUnits=Water
              SW=[0.294, 0.381, 0.367, 0.306, 0.29, 0.319, 0.33, 0.343, 0.337, 0.344]
            CERESSoilTemperature
          Plant sorghum: ResourceName=Sorghum; CropType=sorghum
          Report: VariableNames=biomass_n
          SurfaceOrganicMatter: same as Experiments.HE1.Sorghum_HE1_T1.paddock.SurfaceOrganicMatter
          MicroClimate: a_interception=0; b_interception=1; c_interception=0; d_interception=0; soil_albedo=0.23; sun_angle=15; soil_heat_flux_fraction=0.4; night_interception_fraction=0.5; refheight=2; albedo=0.15; emissivity=0.96; RadIntTotal=0
          SoluteManager
        SoilArbitrator
      Simulation Sorghum_HE8_T2
        Clock: StartDate=1997-11-25; EndDate=1998-04-15
        Summary summaryfile
        Weather: FileName=.\Met\HE8.met
        Zone paddock: Area=1; Slope=0
          Folder Manager folder: same as Experiments.HE7.Sorghum_HE7_T2.paddock.Manager folder
          Fertiliser
          Irrigation
          Operations
            1997-11-28  [Irrigation].Apply(65);
            1997-12-16  [Irrigation].Apply(90);
            1997-11-26  [Fertiliser].Apply(0, Fertiliser.Types.NO3N, 50);
            1997-11-26  [Fertiliser].Apply(33, Fertiliser.Types.NO3N, 50);
            1997-11-26  [Fertiliser].Apply(10, Fertiliser.Types.NO3N, 50);
          Soil HRS: SoilType=HMM; Site=HRS; NearestTown=Unknown; Region=SE Queensland; NaturalVegetation=Unknown; Latitude=0; Longitude=0
            Water: same as Experiments.HE3.Sorghum_HE3_T1.paddock.HRS.Water
            SoilWater: same as Test.Sorghum_HE1_BusterNoTillers.paddock.HRS.SoilWater
            SoilNitrogen: fom_type=[default, manure, mucuna, lablab, shemp, stable]; fract_carb=[0.2, 0.3, 0.54, 0.57, 0.45, 0]; fract_cell=[0.7, 0.3, 0.37, 0.37, 0.47, 0.1]; fract_lign=[0.1, 0.4, 0.09, 0.06, 0.08, 0.9]
            SoilOrganicMatter: same as Test.Sorghum_HE1_BusterNoTillers.paddock.HRS.SoilOrganicMatter
            Analysis: Thickness=[100, 100, 200, 200, 200, 200, 200, 200, 200, 200]; PH=[6.3, 6.4, 6.5, 6.6, 6.6, 6.5, 6.5, 6.5, 6.5, 6.5]; PHUnits=Water; BoronUnits=HotWater
            Sample Initial nitrogen: same as Experiments.HE7.Sorghum_HE7_T1.paddock.HRS.Initial nitrogen
            Sample Initial water: Thickness=[100, 100, 200, 200, 200, 200, 200, 200, 200, 200]; NO3Units=ppm; NH4Units=ppm; SWUnits=Volumetric; OCUnits=Total; PHUnits=Water
              SW=[0.338, 0.364, 0.359, 0.376, 0.364, 0.351, 0.358, 0.351, 0.346, 0.343]
            CERESSoilTemperature
          Plant sorghum: ResourceName=Sorghum; CropType=sorghum
          Report: VariableNames=biomass_n
          SurfaceOrganicMatter: same as Experiments.HE1.Sorghum_HE1_T1.paddock.SurfaceOrganicMatter
          MicroClimate: a_interception=0; b_interception=1; c_interception=0; d_interception=0; soil_albedo=0.23; sun_angle=15; soil_heat_flux_fraction=0.4; night_interception_fraction=0.5; refheight=2; albedo=0.15; emissivity=0.96; RadIntTotal=0
          SoluteManager
        SoilArbitrator
      Simulation Sorghum_HE8_T3
        Clock: StartDate=1997-11-25; EndDate=1998-04-15
        Summary summaryfile
        Weather: FileName=.\Met\HE8.met
        Zone paddock: Area=1; Slope=0
          Folder Manager folder: same as Experiments.HE7.Sorghum_HE7_T3.paddock.Manager folder
          Fertiliser
          Irrigation
          Operations: same as Experiments.HE8.Sorghum_HE8_T2.paddock.operations
          Soil HRS: SoilType=HMM; Site=HRS; NearestTown=Unknown; Region=SE Queensland; NaturalVegetation=Unknown; Latitude=0; Longitude=0
            Water: same as Experiments.HE3.Sorghum_HE3_T1.paddock.HRS.Water
            SoilWater: same as Test.Sorghum_HE1_BusterNoTillers.paddock.HRS.SoilWater
            SoilNitrogen: fom_type=[default, manure, mucuna, lablab, shemp, stable]; fract_carb=[0.2, 0.3, 0.54, 0.57, 0.45, 0]; fract_cell=[0.7, 0.3, 0.37, 0.37, 0.47, 0.1]; fract_lign=[0.1, 0.4, 0.09, 0.06, 0.08, 0.9]
            SoilOrganicMatter: same as Test.Sorghum_HE1_BusterNoTillers.paddock.HRS.SoilOrganicMatter
            Analysis: Thickness=[100, 100, 200, 200, 200, 200, 200, 200, 200, 200]; PH=[6.3, 6.4, 6.5, 6.6, 6.6, 6.5, 6.5, 6.5, 6.5, 6.5]; PHUnits=Water; BoronUnits=HotWater
            Sample Initial nitrogen: same as Experiments.HE7.Sorghum_HE7_T1.paddock.HRS.Initial nitrogen
            Sample Initial water: Thickness=[100, 100, 200, 200, 200, 200, 200, 200, 200, 200]; NO3Units=ppm; NH4Units=ppm; SWUnits=Volumetric; OCUnits=Total; PHUnits=Water
              SW=[0.31, 0.387, 0.329, 0.308, 0.317, 0.33, 0.329, 0.348, 0.341, 0.345]
            CERESSoilTemperature
          Plant sorghum: ResourceName=Sorghum; CropType=sorghum
          Report: VariableNames=biomass_n
          SurfaceOrganicMatter: same as Experiments.HE1.Sorghum_HE1_T1.paddock.SurfaceOrganicMatter
          MicroClimate: a_interception=0; b_interception=1; c_interception=0; d_interception=0; soil_albedo=0.23; sun_angle=15; soil_heat_flux_fraction=0.4; night_interception_fraction=0.5; refheight=2; albedo=0.15; emissivity=0.96; RadIntTotal=0
          SoluteManager
        SoilArbitrator
    Folder LE13
      Simulation Sorghum_LE13_Buster-I-N
        Clock: StartDate=1995-11-28; EndDate=1996-05-01
        Summary summaryfile
        Weather: FileName=.\Met\LE13.met
        Zone paddock: Area=1; Slope=0
          Folder Manager folder
            Manager Sowing
              date = 29-nov
              crop = Sorghum
              density = 16
              depth = 20
              cultivar = Buster
              row_spacing = 0.5
              RowConfiguration = solid
              ftn = 0
              script: same as in Test.Sorghum_HE1_BusterNoTillers.paddock.Manager folder.Sowing
            Manager Harvesting: same as Test.Sorghum_HE1_BusterNoTillers.paddock.Manager folder.Harvesting
          Soil GLH Field: SoilType=GLHSoil; Site=Cooper Lab; NearestTown=Unknown; Region=Gatton; NaturalVegetation=Unknown; Latitude=0; Longitude=0
            Water
              Thickness  BD    AirDry  LL15  DUL   SAT
              200        1.32  0.1     0.3   0.41  0.46
              200        1.3   0.15    0.3   0.43  0.48
              200        1.23  0.28    0.35  0.46  0.51
              300        1.27  0.28    0.32  0.44  0.49
              300        1.37  0.28    0.29  0.4   0.45
              300        1.35  0.3     0.31  0.41  0.46
              300        1.35  0.3     0.31  0.38  0.43
              SoilCrop SorghumSoil: LL=[0.3, 0.3, 0.35, 0.32, 0.29, 0.31, 0.31]; KL=[0.08, 0.08, 0.08, 0.08, 0.06, 0.04, 0.02]; XF=[1, 1, 1, 1, 1, 1, 1]
            SoilWater: SummerDate=1-Nov; SummerU=6; SummerCona=3.5; WinterDate=1-Apr; WinterU=6; WinterCona=3.5; DiffusConst=88; DiffusSlope=35.4; Salb=0.13; CN2Bare=91; CNRed=20; CNCov=0.8; max_pond=0; Thickness=[200, 200, 200, 300, 300, 300, 300]; SWCON=[0.5, 0.5, 0.5, 0.5, 0.5, 0.5, 0.5]; residueinterception=0
            SoilNitrogen: fom_type=[default, manure, mucuna, lablab, shemp, stable]; fract_carb=[0.2, 0.3, 0.54, 0.57, 0.45, 0]; fract_cell=[0.7, 0.3, 0.37, 0.37, 0.47, 0.1]; fract_lign=[0.1, 0.4, 0.09, 0.06, 0.08, 0.9]
            SoilOrganicMatter: RootCN=30; RootWt=1500; SoilCN=12.5; EnrACoeff=7.4; EnrBCoeff=0.2; OCUnits=Total
              Thickness  OC    FBiom  FInert
              200        1.3   0.03   0.31
              200        0.65  0.01   0.38
              200        0.32  0      0.47
              300        0.11  0      0.7
              300        0.11  0      0.9
              300        0.11  0      0.95
              300        0.11  0      0.95
            Analysis: Thickness=[200, 200, 200, 300, 300, 300, 300]; PH=[8.2, 8.7, 8.9, 8.1, 8, 8, 8]; PHUnits=Water; BoronUnits=HotWater
            Sample Initial nitrogen: NO3Units=ppm; NH4Units=ppm; SWUnits=Volumetric; OCUnits=Total; PHUnits=Water
              Thickness  NO3    NH4
              200        9      0.1
              200        2.48   0.1
              200        2.79   0.1
              300        1.28   0.1
              300        2.98   0.1
              300        2.965  0.1
              300        1.387  0.1
            Sample Initial water: Thickness=[200, 200, 200, 300, 300, 300, 300]; SW=[0.385, 0.47, 0.467, 0.459, 0.394, 0.399, 0.38]; NO3Units=ppm; NH4Units=ppm; SWUnits=Volumetric; OCUnits=Total; PHUnits=Water
            CERESSoilTemperature
          Fertiliser
          Irrigation
          Operations
            1995-11-29  [Irrigation].Apply(14);
            1995-12-01  [Irrigation].Apply(10);
            1995-12-03  [Irrigation].Apply(13);
            1995-12-05  [Irrigation].Apply(8);
            1996-02-07  [Irrigation].Apply(6);
            1995-11-28  [Fertiliser].Apply(0, Fertiliser.Types.NO3N, 50);
            1995-11-28  [Fertiliser].Apply(0, Fertiliser.Types.NO3N, 50);
          Plant sorghum: ResourceName=Sorghum; CropType=sorghum
          Report: VariableNames=biomass_n
          SurfaceOrganicMatter: same as Experiments.HE1.Sorghum_HE1_T1.paddock.SurfaceOrganicMatter
          MicroClimate: a_interception=0; b_interception=1; c_interception=0; d_interception=0; soil_albedo=0.23; sun_angle=15; soil_heat_flux_fraction=0.4; night_interception_fraction=0.5; refheight=2; albedo=0.15; emissivity=0.96; RadIntTotal=0
          SoluteManager
        SoilArbitrator
      Simulation Sorghum_LE13_Buster-I+N
        Clock: StartDate=1995-11-28; EndDate=1996-05-01
        Summary summaryfile
        Weather: FileName=.\Met\LE13.met
        Zone paddock: Area=1; Slope=0
          Folder Manager folder
            Manager Sowing
              date = 29-nov
              crop = Sorghum
              density = 16
              depth = 20
              cultivar = Buster
              row_spacing = 0.5
              RowConfiguration = solid
              ftn = 0.35
              script: same as in Test.Sorghum_HE1_BusterNoTillers.paddock.Manager folder.Sowing
            Manager Harvesting: same as Test.Sorghum_HE1_BusterNoTillers.paddock.Manager folder.Harvesting
          Soil GLH Field: SoilType=GLHSoil; Site=Cooper Lab; NearestTown=Unknown; Region=Gatton; NaturalVegetation=Unknown; Latitude=0; Longitude=0
            InitialWater Initial water: PercentMethod=FilledFromTop; FractionFull=1
            Water: same as Experiments.LE13.Sorghum_LE13_Buster-I-N.paddock.GLH Field.Water
            SoilWater: same as Experiments.LE13.Sorghum_LE13_Buster-I-N.paddock.GLH Field.SoilWater
            SoilNitrogen: fom_type=[default, manure, mucuna, lablab, shemp, stable]; fract_carb=[0.2, 0.3, 0.54, 0.57, 0.45, 0]; fract_cell=[0.7, 0.3, 0.37, 0.37, 0.47, 0.1]; fract_lign=[0.1, 0.4, 0.09, 0.06, 0.08, 0.9]
            SoilOrganicMatter: same as Experiments.LE13.Sorghum_LE13_Buster-I-N.paddock.GLH Field.SoilOrganicMatter
            Analysis: Thickness=[200, 200, 200, 300, 300, 300, 300]; PH=[8.2, 8.7, 8.9, 8.1, 8, 8, 8]; PHUnits=Water; BoronUnits=HotWater
            Sample Initial nitrogen: NO3Units=ppm; NH4Units=ppm; SWUnits=Volumetric; OCUnits=Total; PHUnits=Water
              Thickness  NO3    NH4
              200        9      0.1
              200        2.48   0.1
              200        2.79   0.1
              300        1.28   0.1
              300        2.98   0.1
              300        2.965  0.1
              300        1.387  0.1
            CERESSoilTemperature
          Fertiliser
          Irrigation
          Operations
            1995-11-29  [Irrigation].Apply(14);
            1995-12-01  [Irrigation].Apply(10);
            1995-12-03  [Irrigation].Apply(13);
            1995-12-05  [Irrigation].Apply(8);
            1996-02-07  [Irrigation].Apply(6);
            1995-11-29  [Fertiliser].Apply(119, Fertiliser.Types.NO3N, 50);
            1995-12-28  [Fertiliser].Apply(59, Fertiliser.Types.NO3N, 50);
            1996-02-07  [Fertiliser].Apply(59, Fertiliser.Types.NO3N, 50);
            1995-11-28  [Fertiliser].Apply(0, Fertiliser.Types.NO3N, 50);
            1995-11-28  [Fertiliser].Apply(122, Fertiliser.Types.NO3N, 50);
          Plant sorghum: ResourceName=Sorghum; CropType=sorghum
          Report: VariableNames=biomass_n
          SurfaceOrganicMatter: same as Experiments.HE1.Sorghum_HE1_T1.paddock.SurfaceOrganicMatter
          MicroClimate: a_interception=0; b_interception=1; c_interception=0; d_interception=0; soil_albedo=0.23; sun_angle=15; soil_heat_flux_fraction=0.4; night_interception_fraction=0.5; refheight=2; albedo=0.15; emissivity=0.96; RadIntTotal=0
          SoluteManager
        SoilArbitrator
      Simulation Sorghum_LE13_Buster+I+N
        Clock: StartDate=1995-11-28; EndDate=1996-05-01
        Summary summaryfile
        Weather: FileName=.\Met\LE13.met
        Zone paddock: Area=1; Slope=0
          Folder Manager folder
            Manager Sowing
              date = 29-nov
              crop = Sorghum
              density = 16
              depth = 20
              cultivar = Buster
              row_spacing = 0.5
              RowConfiguration = solid
              ftn = 0.2
              script: same as in Test.Sorghum_HE1_BusterNoTillers.paddock.Manager folder.Sowing
            Manager Harvesting: same as Test.Sorghum_HE1_BusterNoTillers.paddock.Manager folder.Harvesting
          Soil GLH Field: same as Experiments.LE13.Sorghum_LE13_Buster-I-N.paddock.GLH Field
          Fertiliser
          Irrigation
          Operations
            1995-11-29  [Irrigation].Apply(14);
            1995-12-01  [Irrigation].Apply(10);
            1995-12-03  [Irrigation].Apply(13);
            1995-12-05  [Irrigation].Apply(8);
            1996-02-07  [Irrigation].Apply(6);
            1996-02-12  [Irrigation].Apply(33);
            1996-02-26  [Irrigation].Apply(20);
            1996-03-06  [Irrigation].Apply(18);
            1996-03-18  [Irrigation].Apply(25);
            1995-11-28  [Fertiliser].Apply(122, Fertiliser.Types.NO3N, 50);
            1995-12-28  [Fertiliser].Apply(59, Fertiliser.Types.NO3N, 50);
            1996-02-07  [Fertiliser].Apply(59, Fertiliser.Types.NO3N, 50);
            1995-11-28  [Fertiliser].Apply(0, Fertiliser.Types.NO3N, 50);
          Plant sorghum: ResourceName=Sorghum; CropType=sorghum
          Report: VariableNames=biomass_n
          SurfaceOrganicMatter: same as Experiments.HE1.Sorghum_HE1_T1.paddock.SurfaceOrganicMatter
          MicroClimate: a_interception=0; b_interception=1; c_interception=0; d_interception=0; soil_albedo=0.23; sun_angle=15; soil_heat_flux_fraction=0.4; night_interception_fraction=0.5; refheight=2; albedo=0.15; emissivity=0.96; RadIntTotal=0
          SoluteManager
        SoilArbitrator
      Simulation Sorghum_LE13_M35-1-I-N
        Clock: StartDate=1995-11-28; EndDate=1996-05-01
        Summary summaryfile
        Weather: FileName=.\Met\LE13.met
        Zone paddock: Area=1; Slope=0
          Folder Manager folder
            Manager Sowing
              date = 29-nov
              crop = Sorghum
              density = 16
              depth = 20
              cultivar = M35-1
              row_spacing = 0.5
              RowConfiguration = solid
              ftn = 0.2
              script: same as in Test.Sorghum_HE1_BusterNoTillers.paddock.Manager folder.Sowing
            Manager Harvesting: same as Test.Sorghum_HE1_BusterNoTillers.paddock.Manager folder.Harvesting
          Soil GLH Field: same as Experiments.LE13.Sorghum_LE13_Buster-I-N.paddock.GLH Field
          Fertiliser
          Irrigation
          Operations
            1995-11-29  [Irrigation].Apply(14);
            1995-12-01  [Irrigation].Apply(10);
            1995-12-03  [Irrigation].Apply(13);
            1995-12-05  [Irrigation].Apply(8);
            1996-02-07  [Irrigation].Apply(6);
            1995-11-28  [Fertiliser].Apply(0, Fertiliser.Types.NO3N, 50);
            1995-11-28  [Fertiliser].Apply(12, Fertiliser.Types.NO3N, 50);
          Plant sorghum: ResourceName=Sorghum; CropType=sorghum
          Report: VariableNames=biomass_n
          SurfaceOrganicMatter: same as Experiments.HE1.Sorghum_HE1_T1.paddock.SurfaceOrganicMatter
          MicroClimate: a_interception=0; b_interception=1; c_interception=0; d_interception=0; soil_albedo=0.23; sun_angle=15; soil_heat_flux_fraction=0.4; night_interception_fraction=0.5; refheight=2; albedo=0.15; emissivity=0.96; RadIntTotal=0
          SoluteManager
        SoilArbitrator
      Simulation Sorghum_LE13_M35-1-I+N
        Clock: StartDate=1995-11-28; EndDate=1996-05-01
        Summary summaryfile
        Weather: FileName=.\Met\LE13.met
        Zone paddock: Area=1; Slope=0
          Folder Manager folder
            Manager Sowing
              date = 29-nov
              crop = Sorghum
              density = 16
              depth = 20
              cultivar = M35-1
              row_spacing = 0.5
              RowConfiguration = solid
              ftn = 0
              script: same as in Test.Sorghum_HE1_BusterNoTillers.paddock.Manager folder.Sowing
            Manager Harvesting: same as Test.Sorghum_HE1_BusterNoTillers.paddock.Manager folder.Harvesting
          Soil GLH Field: same as Experiments.LE13.Sorghum_LE13_Buster-I-N.paddock.GLH Field
          Fertiliser
          Irrigation
          Operations: same as Experiments.LE13.Sorghum_LE13_Buster-I+N.paddock.operations
          Plant sorghum: ResourceName=Sorghum; CropType=sorghum
          Report: VariableNames=biomass_n
          SurfaceOrganicMatter: same as Experiments.HE1.Sorghum_HE1_T1.paddock.SurfaceOrganicMatter
          MicroClimate: a_interception=0; b_interception=1; c_interception=0; d_interception=0; soil_albedo=0.23; sun_angle=15; soil_heat_flux_fraction=0.4; night_interception_fraction=0.5; refheight=2; albedo=0.15; emissivity=0.96; RadIntTotal=0
          SoluteManager
        SoilArbitrator
      Simulation Sorghum_LE13_M35-1+I+N
        Clock: StartDate=1995-11-28; EndDate=1996-05-01
        Summary summaryfile
        Weather: FileName=.\Met\LE13.met
        Zone paddock: Area=1; Slope=0
          Folder Manager folder: same as Experiments.LE13.Sorghum_LE13_M35-1-I+N.paddock.Manager folder
          Soil GLH Field: same as Experiments.LE13.Sorghum_LE13_Buster-I-N.paddock.GLH Field
          Fertiliser
          Irrigation
          Operations: same as Experiments.LE13.Sorghum_LE13_Buster+I+N.paddock.operations
          Plant sorghum: ResourceName=Sorghum; CropType=sorghum
          Report: VariableNames=biomass_n
          SurfaceOrganicMatter: same as Experiments.HE1.Sorghum_HE1_T1.paddock.SurfaceOrganicMatter
          MicroClimate: a_interception=0; b_interception=1; c_interception=0; d_interception=0; soil_albedo=0.23; sun_angle=15; soil_heat_flux_fraction=0.4; night_interception_fraction=0.5; refheight=2; albedo=0.15; emissivity=0.96; RadIntTotal=0
          SoluteManager
        SoilArbitrator
    Folder LE14
      Simulation Sorghum_LE14_Buster
        Clock: StartDate=1996-09-05; EndDate=1997-02-19
        Summary summaryfile
        Weather: FileName=.\Met\LE14.met
        Zone paddock: Area=1; Slope=0
          Folder Manager folder
            Manager Sowing
              date = 11-oct
              crop = Sorghum
              density = 10
              depth = 20
              cultivar = Buster
              row_spacing = 0.5
              RowConfiguration = solid
              ftn = 0.4
              script: same as in Test.Sorghum_HE1_BusterNoTillers.paddock.Manager folder.Sowing
            Manager Harvesting: same as Test.Sorghum_HE1_BusterNoTillers.paddock.Manager folder.Harvesting
          Soil GLH Field: SoilType=GLHSoil; Site=Cooper Lab; NearestTown=Unknown; Region=Gatton; NaturalVegetation=Unknown; Latitude=0; Longitude=0
            Water: same as Experiments.LE13.Sorghum_LE13_Buster-I-N.paddock.GLH Field.Water
            SoilWater: same as Experiments.LE13.Sorghum_LE13_Buster-I-N.paddock.GLH Field.SoilWater
            SoilNitrogen: fom_type=[default, manure, mucuna, lablab, shemp, stable]; fract_carb=[0.2, 0.3, 0.54, 0.57, 0.45, 0]; fract_cell=[0.7, 0.3, 0.37, 0.37, 0.47, 0.1]; fract_lign=[0.1, 0.4, 0.09, 0.06, 0.08, 0.9]
            SoilOrganicMatter: same as Experiments.LE13.Sorghum_LE13_Buster-I-N.paddock.GLH Field.SoilOrganicMatter
            Analysis: Thickness=[200, 200, 200, 300, 300, 300, 300]; PH=[8.2, 8.7, 8.9, 8.1, 8, 8, 8]; PHUnits=Water; BoronUnits=HotWater
            Sample Initial nitrogen: NO3Units=ppm; NH4Units=ppm; SWUnits=Volumetric; OCUnits=Total; PHUnits=Water
              Thickness  NO3     NH4
              200        11.624  0.1
              200        5.732   0.1
              200        2.974   0.1
              300        1.645   0.1
              300        1.902   0.1
              300        2.246   0.1
              300        1.942   0.1
            Sample Initial water: Thickness=[200, 200, 200, 300, 300, 300, 300]; SW=[0.385, 0.47, 0.467, 0.459, 0.394, 0.399, 0.38]; NO3Units=ppm; NH4Units=ppm; SWUnits=Volumetric; OCUnits=Total; PHUnits=Water
            CERESSoilTemperature
          Fertiliser
          Irrigation
          Operations
            1996-09-06  [Fertiliser].Apply(0, Fertiliser.Types.NO3N, 50);
            1996-09-06  [Fertiliser].Apply(126, Fertiliser.Types.NO3N, 50);
            1996-09-16  [Fertiliser].Apply(105, Fertiliser.Types.NO3N, 50);
            1996-11-15  [Fertiliser].Apply(73, Fertiliser.Types.NO3N, 50);
            1996-12-31  [Fertiliser].Apply(59, Fertiliser.Types.NO3N, 50);
          Plant sorghum: ResourceName=Sorghum; CropType=sorghum
          Report: VariableNames=biomass_n
          SurfaceOrganicMatter: same as Experiments.HE1.Sorghum_HE1_T1.paddock.SurfaceOrganicMatter
          MicroClimate: a_interception=0; b_interception=1; c_interception=0; d_interception=0; soil_albedo=0.23; sun_angle=15; soil_heat_flux_fraction=0.4; night_interception_fraction=0.5; refheight=2; albedo=0.15; emissivity=0.96; RadIntTotal=0
          SoluteManager
        SoilArbitrator
      Simulation Sorghum_LE14_M35-1
        Clock: StartDate=1996-09-05; EndDate=1997-02-19
        Summary summaryfile
        Weather: FileName=.\Met\LE14.met
        Zone paddock: Area=1; Slope=0
          Folder Manager folder
            Manager Sowing
              date = 11-oct
              crop = Sorghum
              density = 10
              depth = 20
              cultivar = M35-1
              row_spacing = 0.5
              RowConfiguration = solid
              ftn = 0.1
              script: same as in Test.Sorghum_HE1_BusterNoTillers.paddock.Manager folder.Sowing
            Manager Harvesting: same as Test.Sorghum_HE1_BusterNoTillers.paddock.Manager folder.Harvesting
          Soil GLH Field: same as Experiments.LE14.Sorghum_LE14_Buster.paddock.GLH Field
          Fertiliser
          Irrigation
          Operations: same as Experiments.LE14.Sorghum_LE14_Buster.paddock.operations
          Plant sorghum: ResourceName=Sorghum; CropType=sorghum
          Report: VariableNames=biomass_n
          SurfaceOrganicMatter: same as Experiments.HE1.Sorghum_HE1_T1.paddock.SurfaceOrganicMatter
          MicroClimate: a_interception=0; b_interception=1; c_interception=0; d_interception=0; soil_albedo=0.23; sun_angle=15; soil_heat_flux_fraction=0.4; night_interception_fraction=0.5; refheight=2; albedo=0.15; emissivity=0.96; RadIntTotal=0
          SoluteManager
        SoilArbitrator
      Simulation Sorghum_LE14_QL41xQL36
        Clock: StartDate=1996-09-05; EndDate=1997-02-19
        Summary summaryfile
        Weather: FileName=.\Met\LE14.met
        Zone paddock: Area=1; Slope=0
          Folder Manager folder
            Manager Sowing
              date = 11-oct
              crop = Sorghum
              density = 10
              depth = 20
              cultivar = QL41xQL36
              row_spacing = 0.5
              RowConfiguration = solid
              ftn = 0.4
              script: same as in Test.Sorghum_HE1_BusterNoTillers.paddock.Manager folder.Sowing
            Manager Harvesting: same as Test.Sorghum_HE1_BusterNoTillers.paddock.Manager folder.Harvesting
          Soil GLH Field: same as Experiments.LE14.Sorghum_LE14_Buster.paddock.GLH Field
          Fertiliser
          Irrigation
          Operations: same as Experiments.LE14.Sorghum_LE14_Buster.paddock.operations
          Plant sorghum: ResourceName=Sorghum; CropType=sorghum
          Report: VariableNames=biomass_n
          SurfaceOrganicMatter: same as Experiments.HE1.Sorghum_HE1_T1.paddock.SurfaceOrganicMatter
          MicroClimate: a_interception=0; b_interception=1; c_interception=0; d_interception=0; soil_albedo=0.23; sun_angle=15; soil_heat_flux_fraction=0.4; night_interception_fraction=0.5; refheight=2; albedo=0.15; emissivity=0.96; RadIntTotal=0
          SoluteManager
        SoilArbitrator
    Folder LE15
      Simulation Sorghum_LE15_Buster
        Clock: StartDate=1996-09-05; EndDate=1997-05-08
        Summary summaryfile
        Weather: FileName=.\Met\LE15.met
        Zone paddock: Area=1; Slope=0
          Folder Manager folder
            Manager Sowing
              date = 6-jan
              crop = Sorghum
              density = 10
              depth = 25
              cultivar = Buster
              row_spacing = 0.5
              RowConfiguration = solid
              ftn = 0.5
              script: same as in Test.Sorghum_HE1_BusterNoTillers.paddock.Manager folder.Sowing
            Manager Harvesting: same as Test.Sorghum_HE1_BusterNoTillers.paddock.Manager folder.Harvesting
          Soil GLH Field: SoilType=GLHSoil; Site=Cooper Lab; NearestTown=Unknown; Region=Gatton; NaturalVegetation=Unknown; Latitude=0; Longitude=0
            Water: same as Experiments.LE13.Sorghum_LE13_Buster-I-N.paddock.GLH Field.Water
            SoilWater: same as Experiments.LE13.Sorghum_LE13_Buster-I-N.paddock.GLH Field.SoilWater
            SoilNitrogen: fom_type=[default, manure, mucuna, lablab, shemp, stable]; fract_carb=[0.2, 0.3, 0.54, 0.57, 0.45, 0]; fract_cell=[0.7, 0.3, 0.37, 0.37, 0.47, 0.1]; fract_lign=[0.1, 0.4, 0.09, 0.06, 0.08, 0.9]
            SoilOrganicMatter: same as Experiments.LE13.Sorghum_LE13_Buster-I-N.paddock.GLH Field.SoilOrganicMatter
            Analysis: Thickness=[200, 200, 200, 300, 300, 300, 300]; PH=[8.2, 8.7, 8.9, 8.1, 8, 8, 8]; PHUnits=Water; BoronUnits=HotWater
            Sample Initial nitrogen: NO3Units=ppm; NH4Units=ppm; SWUnits=Volumetric; OCUnits=Total; PHUnits=Water
              Thickness  NO3     NH4
              200        11.624  0.1
              200        5.732   0.1
              200        2.974   0.1
              300        1.645   0.1
              300        1.902   0.1
              300        2.246   0.1
              300        1.942   0.1
            Sample Initial water: Thickness=[200, 200, 200, 300, 300, 300, 300]; SW=[0.39, 0.47, 0.479, 0.422, 0.393, 0.379, 0.405]; NO3Units=ppm; NH4Units=ppm; SWUnits=Volumetric; OCUnits=Total; PHUnits=Water
            CERESSoilTemperature
          Fertiliser
          Irrigation
          Operations
            1997-03-11  [Fertiliser].Apply(59, Fertiliser.Types.NO3N, 50);
          Plant sorghum: ResourceName=Sorghum; CropType=sorghum
          Report: VariableNames=biomass_n
          SurfaceOrganicMatter: same as Experiments.HE1.Sorghum_HE1_T1.paddock.SurfaceOrganicMatter
          MicroClimate: a_interception=0; b_interception=1; c_interception=0; d_interception=0; soil_albedo=0.23; sun_angle=15; soil_heat_flux_fraction=0.4; night_interception_fraction=0.5; refheight=2; albedo=0.15; emissivity=0.96; RadIntTotal=0
          SoluteManager
        SoilArbitrator
      Simulation Sorghum_LE15_M35-1
        Clock: StartDate=1996-09-05; EndDate=1997-05-08
        Summary summaryfile
        Weather: FileName=.\Met\LE15.met
        Zone paddock: Area=1; Slope=0
          Folder Manager folder
            Manager Sowing
              date = 6-jan
              crop = Sorghum
              density = 10
              depth = 25
              cultivar = M35-1
              row_spacing = 0.5
              RowConfiguration = solid
              ftn = 0
              script: same as in Test.Sorghum_HE1_BusterNoTillers.paddock.Manager folder.Sowing
            Manager Harvesting: same as Test.Sorghum_HE1_BusterNoTillers.paddock.Manager folder.Harvesting
          Soil GLH Field: same as Experiments.LE15.Sorghum_LE15_Buster.paddock.GLH Field
          Fertiliser
          Irrigation
          Operations
            1997-03-11  [Fertiliser].Apply(59, Fertiliser.Types.NO3N, 50);
          Plant sorghum: ResourceName=Sorghum; CropType=sorghum
          Report: VariableNames=biomass_n
          SurfaceOrganicMatter: same as Experiments.HE1.Sorghum_HE1_T1.paddock.SurfaceOrganicMatter
          MicroClimate: a_interception=0; b_interception=1; c_interception=0; d_interception=0; soil_albedo=0.23; sun_angle=15; soil_heat_flux_fraction=0.4; night_interception_fraction=0.5; refheight=2; albedo=0.15; emissivity=0.96; RadIntTotal=0
          SoluteManager
        SoilArbitrator
      Simulation Sorghum_LE15_QL41xQL36
        Clock: StartDate=1996-09-05; EndDate=1997-05-08
        Summary summaryfile
        Weather: FileName=.\Met\LE15.met
        Zone paddock: Area=1; Slope=0
          Folder Manager folder
            Manager Sowing
              date = 6-jan
              crop = Sorghum
              density = 10
              depth = 25
              cultivar = QL41xQL36
              row_spacing = 0.5
              RowConfiguration = solid
              ftn = 0.5
              script: same as in Test.Sorghum_HE1_BusterNoTillers.paddock.Manager folder.Sowing
            Manager Harvesting: same as Test.Sorghum_HE1_BusterNoTillers.paddock.Manager folder.Harvesting
          Soil GLH Field: same as Experiments.LE15.Sorghum_LE15_Buster.paddock.GLH Field
          Fertiliser
          Irrigation
          Operations
            1997-03-11  [Fertiliser].Apply(59, Fertiliser.Types.NO3N, 50);
          Plant sorghum: ResourceName=Sorghum; CropType=sorghum
          Report: VariableNames=biomass_n
          SurfaceOrganicMatter: same as Experiments.HE1.Sorghum_HE1_T1.paddock.SurfaceOrganicMatter
          MicroClimate: a_interception=0; b_interception=1; c_interception=0; d_interception=0; soil_albedo=0.23; sun_angle=15; soil_heat_flux_fraction=0.4; night_interception_fraction=0.5; refheight=2; albedo=0.15; emissivity=0.96; RadIntTotal=0
          SoluteManager
        SoilArbitrator
    Folder LE17
      Simulation Sorghum_LE17_T1
        Clock: StartDate=1997-11-27; EndDate=1998-04-09
        Summary summaryfile
        Weather: FileName=.\Met\LE17.met
        Zone paddock: Area=1; Slope=0
          Folder Manager folder
            Manager Sowing
              date = 4-dec
              crop = Sorghum
              density = 10
              depth = 25
              cultivar = Buster
              row_spacing = 0.5
              RowConfiguration = solid
              ftn = 1
              script: same as in Test.Sorghum_HE1_BusterNoTillers.paddock.Manager folder.Sowing
            Manager Harvesting: same as Test.Sorghum_HE1_BusterNoTillers.paddock.Manager folder.Harvesting
          Soil CooperLab: SoilType=Gatton; Site=Gatton CSIRO; NearestTown=Unknown; Region=SE Queensland; NaturalVegetation=Unknown; Latitude=0; Longitude=0
            Water: same as Experiments.LE13.Sorghum_LE13_Buster-I-N.paddock.GLH Field.Water
            SoilWater: same as Experiments.LE13.Sorghum_LE13_Buster-I-N.paddock.GLH Field.SoilWater
            SoilNitrogen: fom_type=[default, manure, mucuna, lablab, shemp, stable]; fract_carb=[0.2, 0.3, 0.54, 0.57, 0.45, 0]; fract_cell=[0.7, 0.3, 0.37, 0.37, 0.47, 0.1]; fract_lign=[0.1, 0.4, 0.09, 0.06, 0.08, 0.9]
            SoilOrganicMatter: same as Experiments.LE13.Sorghum_LE13_Buster-I-N.paddock.GLH Field.SoilOrganicMatter
            Analysis: Thickness=[200, 200, 200, 300, 300, 300, 300]; PH=[7.7, 8.3, 8.4, 8.5, 8.5, 8.5, 8.6]; PHUnits=Water; BoronUnits=HotWater
            Sample Initial nitrogen: NO3Units=ppm; NH4Units=ppm; SWUnits=Volumetric; OCUnits=Total; PHUnits=Water
              Thickness  NO3      NH4
              200        5.18718  0.1
              200        2.41329  0.1
              200        6.50018  0.1
              300        6.34423  0.1
              300        6.81417  0.1
              300        6.70303  0.1
              300        3.09205  0.1
            Sample Initial water: Thickness=[200, 200, 200, 300, 300, 300, 300]; SW=[0.34, 0.412, 0.439, 0.434, 0.405, 0.399, 0.389]; NO3Units=ppm; NH4Units=ppm; SWUnits=Volumetric; OCUnits=Total; PHUnits=Water
            CERESSoilTemperature
          Fertiliser
          Irrigation
          Operations
            1997-12-04  [Irrigation].Apply(72);
            1997-12-17  [Irrigation].Apply(22);
            1997-12-29  [Irrigation].Apply(27);
            1998-01-06  [Irrigation].Apply(44);
            1998-01-19  [Irrigation].Apply(40);
            1998-02-10  [Irrigation].Apply(17);
            1998-03-05  [Irrigation].Apply(43);
            1998-03-18  [Irrigation].Apply(37);
            1997-12-03  [Fertiliser].Apply(0, Fertiliser.Types.NO3N, 50);
            1997-12-03  [Fertiliser].Apply(40, Fertiliser.Types.NO3N, 50);
            1997-12-04  [Fertiliser].Apply(147, Fertiliser.Types.NO3N, 50);
            1998-01-06  [Fertiliser].Apply(59, Fertiliser.Types.NO3N, 50);
            1998-02-10  [Fertiliser].Apply(59, Fertiliser.Types.NO3N, 50);
          Plant sorghum: ResourceName=Sorghum; CropType=sorghum
          Report: VariableNames=biomass_n
          SurfaceOrganicMatter: same as Experiments.HE1.Sorghum_HE1_T1.paddock.SurfaceOrganicMatter
          MicroClimate: a_interception=0; b_interception=1; c_interception=0; d_interception=0; soil_albedo=0.23; sun_angle=15; soil_heat_flux_fraction=0.4; night_interception_fraction=0.5; refheight=2; albedo=0.15; emissivity=0.96; RadIntTotal=0
          SoluteManager
        SoilArbitrator
      Simulation Sorghum_LE17_T2
        Clock: StartDate=1997-11-27; EndDate=1998-04-09
        Summary summaryfile
        Weather: FileName=.\Met\LE17.met
        Zone paddock: Area=1; Slope=0
          Folder Manager folder
            Manager Sowing
              date = 4-dec
              crop = Sorghum
              density = 10
              depth = 25
              cultivar = M35-1
              row_spacing = 0.5
              RowConfiguration = solid
              ftn = 1
              script: same as in Test.Sorghum_HE1_BusterNoTillers.paddock.Manager folder.Sowing
            Manager Harvesting: same as Test.Sorghum_HE1_BusterNoTillers.paddock.Manager folder.Harvesting
          Soil CooperLab: SoilType=Gatton; Site=Gatton CSIRO; NearestTown=Unknown; Region=SE Queensland; NaturalVegetation=Unknown; Latitude=0; Longitude=0
            Water: same as Experiments.LE13.Sorghum_LE13_Buster-I-N.paddock.GLH Field.Water
            SoilWater: same as Experiments.LE13.Sorghum_LE13_Buster-I-N.paddock.GLH Field.SoilWater
            SoilNitrogen: fom_type=[default, manure, mucuna, lablab, shemp, stable]; fract_carb=[0.2, 0.3, 0.54, 0.57, 0.45, 0]; fract_cell=[0.7, 0.3, 0.37, 0.37, 0.47, 0.1]; fract_lign=[0.1, 0.4, 0.09, 0.06, 0.08, 0.9]
            SoilOrganicMatter: same as Experiments.LE13.Sorghum_LE13_Buster-I-N.paddock.GLH Field.SoilOrganicMatter
            Analysis: Thickness=[200, 200, 200, 300, 300, 300, 300]; PH=[7.7, 8.3, 8.4, 8.5, 8.5, 8.5, 8.6]; PHUnits=Water; BoronUnits=HotWater
            Sample Initial nitrogen: NO3Units=ppm; NH4Units=ppm; SWUnits=Volumetric; OCUnits=Total; PHUnits=Water
              Thickness  NO3     NH4
              200        17.363  0.1
              200        8.078   0.1
              200        21.758  0.1
              300        21.236  0.1
              300        22.809  0.1
              300        22.437  0.1
              300        10.35   0.1
            Sample Initial water: Thickness=[200, 200, 200, 300, 300, 300, 300]; SW=[0.34, 0.412, 0.439, 0.434, 0.405, 0.399, 0.389]; NO3Units=ppm; NH4Units=ppm; SWUnits=Volumetric; OCUnits=Total; PHUnits=Water
            CERESSoilTemperature
          Fertiliser
          Irrigation
          Operations: same as Experiments.LE17.Sorghum_LE17_T1.paddock.operations
          Plant sorghum: ResourceName=Sorghum; CropType=sorghum
          Report: VariableNames=biomass_n
          SurfaceOrganicMatter: same as Experiments.HE1.Sorghum_HE1_T1.paddock.SurfaceOrganicMatter
          MicroClimate: a_interception=0; b_interception=1; c_interception=0; d_interception=0; soil_albedo=0.23; sun_angle=15; soil_heat_flux_fraction=0.4; night_interception_fraction=0.5; refheight=2; albedo=0.15; emissivity=0.96; RadIntTotal=0
          SoluteManager
        SoilArbitrator
      Simulation Sorghum_LE17_T3
        Clock: StartDate=1997-11-27; EndDate=1998-04-09
        Summary summaryfile
        Weather: FileName=.\Met\LE17.met
        Zone paddock: Area=1; Slope=0
          Folder Manager folder
            Manager Sowing
              date = 4-dec
              crop = Sorghum
              density = 10
              depth = 25
              cultivar = CSH13R
              row_spacing = 0.5
              RowConfiguration = solid
              ftn = 1
              script: same as in Test.Sorghum_HE1_BusterNoTillers.paddock.Manager folder.Sowing
            Manager Harvesting: same as Test.Sorghum_HE1_BusterNoTillers.paddock.Manager folder.Harvesting
          Soil CooperLab: same as Experiments.LE17.Sorghum_LE17_T2.paddock.CooperLab
          Fertiliser
          Irrigation
          Operations: same as Experiments.LE17.Sorghum_LE17_T1.paddock.operations
          Plant sorghum: ResourceName=Sorghum; CropType=sorghum
          Report: VariableNames=biomass_n
          SurfaceOrganicMatter: same as Experiments.HE1.Sorghum_HE1_T1.paddock.SurfaceOrganicMatter
          MicroClimate: a_interception=0; b_interception=1; c_interception=0; d_interception=0; soil_albedo=0.23; sun_angle=15; soil_heat_flux_fraction=0.4; night_interception_fraction=0.5; refheight=2; albedo=0.15; emissivity=0.96; RadIntTotal=0
          SoluteManager
        SoilArbitrator
    Folder LE19
      Simulation Sorghum_LE19_T1
        Clock: StartDate=1998-11-09; EndDate=1999-03-07
        Summary summaryfile
        Weather: FileName=.\Met\LE19.met
        Zone paddock: Area=1; Slope=0
          Folder Manager folder
            Manager Sowing
              date = 11-nov
              crop = Sorghum
              density = 10
              depth = 30
              cultivar = Buster
              row_spacing = 0.5
              RowConfiguration = solid
              ftn = 0
              script: same as in Test.Sorghum_HE1_BusterNoTillers.paddock.Manager folder.Sowing
            Manager Harvesting: same as Test.Sorghum_HE1_BusterNoTillers.paddock.Manager folder.Harvesting
          Soil CooperLab: SoilType=Gatton; Site=Gatton CSIRO; NearestTown=Unknown; Region=SE Queensland; NaturalVegetation=Unknown; Latitude=0; Longitude=0
            InitialWater Initial water: PercentMethod=FilledFromTop; FractionFull=100
            Water: same as Experiments.LE13.Sorghum_LE13_Buster-I-N.paddock.GLH Field.Water
            SoilWater: same as Experiments.LE13.Sorghum_LE13_Buster-I-N.paddock.GLH Field.SoilWater
            SoilNitrogen: fom_type=[default, manure, mucuna, lablab, shemp, stable]; fract_carb=[0.2, 0.3, 0.54, 0.57, 0.45, 0]; fract_cell=[0.7, 0.3, 0.37, 0.37, 0.47, 0.1]; fract_lign=[0.1, 0.4, 0.09, 0.06, 0.08, 0.9]
            SoilOrganicMatter: same as Experiments.LE13.Sorghum_LE13_Buster-I-N.paddock.GLH Field.SoilOrganicMatter
            Analysis: Thickness=[200, 200, 200, 300, 300, 300, 300]; PH=[7.7, 8.3, 8.4, 8.5, 8.5, 8.5, 8.6]; PHUnits=Water; BoronUnits=HotWater
            Sample Initial nitrogen: NO3Units=ppm; NH4Units=ppm; SWUnits=Volumetric; OCUnits=Total; PHUnits=Water
              Thickness  NO3    NH4
              200        8.581  0.1
              200        5.84   0.1
              200        1.684  0.1
              300        0.665  0.1
              300        0.363  0.1
              300        0.439  0.1
              300        0.582  0.1
            CERESSoilTemperature
          Fertiliser
          Irrigation
          Operations
          Plant sorghum: ResourceName=Sorghum; CropType=sorghum
          Report: VariableNames=biomass_n
          SurfaceOrganicMatter: same as Experiments.HE1.Sorghum_HE1_T1.paddock.SurfaceOrganicMatter
          MicroClimate: a_interception=0; b_interception=1; c_interception=0; d_interception=0; soil_albedo=0.23; sun_angle=15; soil_heat_flux_fraction=0.4; night_interception_fraction=0.5; refheight=2; albedo=0.15; emissivity=0.96; RadIntTotal=0
          SoluteManager
        SoilArbitrator
      Simulation Sorghum_LE19_T2
        Clock: StartDate=1998-11-09; EndDate=1999-03-07
        Summary summaryfile
        Weather: FileName=.\Met\LE19.met
        Zone paddock: Area=1; Slope=0
          Folder Manager folder
            Manager Sowing
              date = 11-nov
              crop = Sorghum
              density = 10
              depth = 30
              cultivar = Buster
              row_spacing = 0.5
              RowConfiguration = solid
              ftn = 0.2
              script: same as in Test.Sorghum_HE1_BusterNoTillers.paddock.Manager folder.Sowing
            Manager Harvesting: same as Test.Sorghum_HE1_BusterNoTillers.paddock.Manager folder.Harvesting
          Soil CooperLab: SoilType=Gatton; Site=Gatton CSIRO; NearestTown=Unknown; Region=SE Queensland; NaturalVegetation=Unknown; Latitude=0; Longitude=0
            Water: same as Experiments.LE13.Sorghum_LE13_Buster-I-N.paddock.GLH Field.Water
            SoilWater: same as Experiments.LE13.Sorghum_LE13_Buster-I-N.paddock.GLH Field.SoilWater
            SoilNitrogen: fom_type=[default, manure, mucuna, lablab, shemp, stable]; fract_carb=[0.2, 0.3, 0.54, 0.57, 0.45, 0]; fract_cell=[0.7, 0.3, 0.37, 0.37, 0.47, 0.1]; fract_lign=[0.1, 0.4, 0.09, 0.06, 0.08, 0.9]
            SoilOrganicMatter: same as Experiments.LE13.Sorghum_LE13_Buster-I-N.paddock.GLH Field.SoilOrganicMatter
            Analysis: Thickness=[200, 200, 200, 300, 300, 300, 300]; PH=[7.7, 8.3, 8.4, 8.5, 8.5, 8.5, 8.6]; PHUnits=Water; BoronUnits=HotWater
            Sample Initial nitrogen: NO3Units=ppm; NH4Units=ppm; SWUnits=Volumetric; OCUnits=Total; PHUnits=Water
              Thickness  NO3    NH4
              200        8.581  0.1
              200        5.84   0.1
              200        1.684  0.1
              300        0.665  0.1
              300        0.363  0.1
              300        0.439  0.1
              300        0.582  0.1
            Sample Initial water: Thickness=[200, 200, 200, 300, 300, 300, 300]; SW=[0.293, 0.388, 0.371, 0.315, 0.307, 0.35, 0.374]; NO3Units=ppm; NH4Units=ppm; SWUnits=Volumetric; OCUnits=Total; PHUnits=Water
            CERESSoilTemperature
          Fertiliser
          Irrigation
          Operations
            1998-11-11  [Fertiliser].Apply(55, Fertiliser.Types.NO3N, 50);
          Plant sorghum: ResourceName=Sorghum; CropType=sorghum
          Report: VariableNames=biomass_n
          SurfaceOrganicMatter: same as Experiments.HE1.Sorghum_HE1_T1.paddock.SurfaceOrganicMatter
          MicroClimate: a_interception=0; b_interception=1; c_interception=0; d_interception=0; soil_albedo=0.23; sun_angle=15; soil_heat_flux_fraction=0.4; night_interception_fraction=0.5; refheight=2; albedo=0.15; emissivity=0.96; RadIntTotal=0
          SoluteManager
        SoilArbitrator
      Simulation Sorghum_LE19_T3
        Clock: StartDate=1998-11-09; EndDate=1999-03-07
        Summary summaryfile
        Weather: FileName=.\Met\LE19.met
        Zone paddock: Area=1; Slope=0
          Folder Manager folder
            Manager Sowing
              date = 11-nov
              crop = Sorghum
              density = 10
              depth = 30
              cultivar = Buster
              row_spacing = 0.5
              RowConfiguration = solid
              ftn = 0.3
              script: same as in Test.Sorghum_HE1_BusterNoTillers.paddock.Manager folder.Sowing
            Manager Harvesting: same as Test.Sorghum_HE1_BusterNoTillers.paddock.Manager folder.Harvesting
          Soil CooperLab: same as Experiments.LE19.Sorghum_LE19_T2.paddock.CooperLab
          Fertiliser
          Irrigation
          Operations
            1998-11-11  [Fertiliser].Apply(55, Fertiliser.Types.NO3N, 50);
            1998-12-13  [Fertiliser].Apply(27, Fertiliser.Types.NO3N, 50);
            1999-01-14  [Fertiliser].Apply(27, Fertiliser.Types.NO3N, 50);
          Plant sorghum: ResourceName=Sorghum; CropType=sorghum
          Report: VariableNames=biomass_n
          SurfaceOrganicMatter: same as Experiments.HE1.Sorghum_HE1_T1.paddock.SurfaceOrganicMatter
          MicroClimate: a_interception=0; b_interception=1; c_interception=0; d_interception=0; soil_albedo=0.23; sun_angle=15; soil_heat_flux_fraction=0.4; night_interception_fraction=0.5; refheight=2; albedo=0.15; emissivity=0.96; RadIntTotal=0
          SoluteManager
        SoilArbitrator
      Simulation Sorghum_LE19_T4
        Clock: StartDate=1998-11-09; EndDate=1999-03-07
        Summary summaryfile
        Weather: FileName=.\Met\LE19.met
        Zone paddock: Area=1; Slope=0
          Folder Manager folder
            Manager Sowing
              date = 11-nov
              crop = Sorghum
              density = 10
              depth = 30
              cultivar = Buster
              row_spacing = 0.5
              RowConfiguration = solid
              ftn = 0.4
              script: same as in Test.Sorghum_HE1_BusterNoTillers.paddock.Manager folder.Sowing
            Manager Harvesting: same as Test.Sorghum_HE1_BusterNoTillers.paddock.Manager folder.Harvesting
          Soil CooperLab: same as Experiments.LE19.Sorghum_LE19_T2.paddock.CooperLab
          Fertiliser
          Irrigation
          Operations
            1998-11-11  [Fertiliser].Apply(55, Fertiliser.Types.NO3N, 50);
            1998-12-13  [Fertiliser].Apply(55, Fertiliser.Types.NO3N, 50);
            1999-01-14  [Fertiliser].Apply(55, Fertiliser.Types.NO3N, 50);
          Plant sorghum: ResourceName=Sorghum; CropType=sorghum
          Report: VariableNames=biomass_n
          SurfaceOrganicMatter: same as Experiments.HE1.Sorghum_HE1_T1.paddock.SurfaceOrganicMatter
          MicroClimate: a_interception=0; b_interception=1; c_interception=0; d_interception=0; soil_albedo=0.23; sun_angle=15; soil_heat_flux_fraction=0.4; night_interception_fraction=0.5; refheight=2; albedo=0.15; emissivity=0.96; RadIntTotal=0
          SoluteManager
        SoilArbitrator
      Simulation Sorghum_LE19_T5
        Clock: StartDate=1998-11-09; EndDate=1999-03-07
        Summary summaryfile
        Weather: FileName=.\Met\LE19.met
        Zone paddock: Area=1; Slope=0
          Folder Manager folder
            Manager Sowing
              date = 11-nov
              crop = Sorghum
              density = 10
              depth = 30
              cultivar = CSH13R
              row_spacing = 0.5
              RowConfiguration = solid
              ftn = 0
              script: same as in Test.Sorghum_HE1_BusterNoTillers.paddock.Manager folder.Sowing
            Manager Harvesting: same as Test.Sorghum_HE1_BusterNoTillers.paddock.Manager folder.Harvesting
          Soil CooperLab: same as Experiments.LE19.Sorghum_LE19_T2.paddock.CooperLab
          Fertiliser
          Irrigation
          Operations
          Plant sorghum: ResourceName=Sorghum; CropType=sorghum
          Report: VariableNames=biomass_n
          SurfaceOrganicMatter: same as Experiments.HE1.Sorghum_HE1_T1.paddock.SurfaceOrganicMatter
          MicroClimate: a_interception=0; b_interception=1; c_interception=0; d_interception=0; soil_albedo=0.23; sun_angle=15; soil_heat_flux_fraction=0.4; night_interception_fraction=0.5; refheight=2; albedo=0.15; emissivity=0.96; RadIntTotal=0
          SoluteManager
        SoilArbitrator
      Simulation Sorghum_LE19_T6
        Clock: StartDate=1998-11-09; EndDate=1999-03-07
        Summary summaryfile
        Weather: FileName=.\Met\LE19.met
        Zone paddock: Area=1; Slope=0
          Folder Manager folder
            Manager Sowing
              date = 11-nov
              crop = Sorghum
              density = 10
              depth = 30
              cultivar = CSH13R
              row_spacing = 0.5
              RowConfiguration = solid
              ftn = 0.2
              script: same as in Test.Sorghum_HE1_BusterNoTillers.paddock.Manager folder.Sowing
            Manager Harvesting: same as Test.Sorghum_HE1_BusterNoTillers.paddock.Manager folder.Harvesting
          Soil CooperLab: same as Experiments.LE19.Sorghum_LE19_T2.paddock.CooperLab
          Fertiliser
          Irrigation
          Operations
            1998-11-11  [Fertiliser].Apply(55, Fertiliser.Types.NO3N, 50);
          Plant sorghum: ResourceName=Sorghum; CropType=sorghum
          Report: VariableNames=biomass_n
          SurfaceOrganicMatter: same as Experiments.HE1.Sorghum_HE1_T1.paddock.SurfaceOrganicMatter
          MicroClimate: a_interception=0; b_interception=1; c_interception=0; d_interception=0; soil_albedo=0.23; sun_angle=15; soil_heat_flux_fraction=0.4; night_interception_fraction=0.5; refheight=2; albedo=0.15; emissivity=0.96; RadIntTotal=0
          SoluteManager
        SoilArbitrator
      Simulation Sorghum_LE19_T7
        Clock: StartDate=1998-11-09; EndDate=1999-03-07
        Summary summaryfile
        Weather: FileName=.\Met\LE19.met
        Zone paddock: Area=1; Slope=0
          Folder Manager folder
            Manager Sowing
              date = 11-nov
              crop = Sorghum
              density = 10
              depth = 30
              cultivar = CSH13R
              row_spacing = 0.5
              RowConfiguration = solid
              ftn = 0.3
              script: same as in Test.Sorghum_HE1_BusterNoTillers.paddock.Manager folder.Sowing
            Manager Harvesting: same as Test.Sorghum_HE1_BusterNoTillers.paddock.Manager folder.Harvesting
          Soil CooperLab: same as Experiments.LE19.Sorghum_LE19_T2.paddock.CooperLab
          Fertiliser
          Irrigation
          Operations
            1998-11-11  [Fertiliser].Apply(55, Fertiliser.Types.NO3N, 50);
            1998-12-17  [Fertiliser].Apply(27, Fertiliser.Types.NO3N, 50);
            1999-01-23  [Fertiliser].Apply(27, Fertiliser.Types.NO3N, 50);
          Plant sorghum: ResourceName=Sorghum; CropType=sorghum
          Report: VariableNames=biomass_n
          SurfaceOrganicMatter: same as Experiments.HE1.Sorghum_HE1_T1.paddock.SurfaceOrganicMatter
          MicroClimate: a_interception=0; b_interception=1; c_interception=0; d_interception=0; soil_albedo=0.23; sun_angle=15; soil_heat_flux_fraction=0.4; night_interception_fraction=0.5; refheight=2; albedo=0.15; emissivity=0.96; RadIntTotal=0
          SoluteManager
        SoilArbitrator
      Simulation Sorghum_LE19_T8
        Clock: StartDate=1998-11-09; EndDate=1999-03-07
        Summary summaryfile
        Weather: FileName=.\Met\LE19.met
        Zone paddock: Area=1; Slope=0
          Folder Manager folder: same as Experiments.LE19.Sorghum_LE19_T7.paddock.Manager folder
          Soil CooperLab: same as Experiments.LE19.Sorghum_LE19_T2.paddock.CooperLab
          Fertiliser
          Irrigation
          Operations
            1998-11-11  [Fertiliser].Apply(55, Fertiliser.Types.NO3N, 50);
            1998-12-17  [Fertiliser].Apply(55, Fertiliser.Types.NO3N, 50);
            1999-01-23  [Fertiliser].Apply(55, Fertiliser.Types.NO3N, 50);
          Plant sorghum: ResourceName=Sorghum; CropType=sorghum
          Report: VariableNames=biomass_n
          SurfaceOrganicMatter: same as Experiments.HE1.Sorghum_HE1_T1.paddock.SurfaceOrganicMatter
          MicroClimate: a_interception=0; b_interception=1; c_interception=0; d_interception=0; soil_albedo=0.23; sun_angle=15; soil_heat_flux_fraction=0.4; night_interception_fraction=0.5; refheight=2; albedo=0.15; emissivity=0.96; RadIntTotal=0
          SoluteManager
        SoilArbitrator
    Folder Gatton_RUE
      Simulation Sorghum_Gatton_RUE_1
        Clock: StartDate=1999-11-22; EndDate=2000-04-03
        Summary summaryfile
        Weather: FileName=.\Met\Gatton_RUE.met
        Zone paddock: Area=1; Slope=0
          Folder Manager folder
            Manager Sowing
              date = 2-dec
              crop = Sorghum
              density = 10
              depth = 40
              cultivar = CSH13R
              row_spacing = 0.5
              RowConfiguration = solid
              ftn = 0
              script: same as in Test.Sorghum_HE1_BusterNoTillers.paddock.Manager folder.Sowing
            Manager Harvesting: same as Test.Sorghum_HE1_BusterNoTillers.paddock.Manager folder.Harvesting
          Soil Ian's Paddock: SoilType=LawesBlackVertosol; Site=Gatton RS; NearestTown=Unknown; Region=Gatton; NaturalVegetation=Unknown; Latitude=0; Longitude=0
            InitialWater Initial water: PercentMethod=FilledFromTop; FractionFull=1
            Water
              Thickness  BD    AirDry  LL15  DUL   SAT
              150        1.32  0.1     0.26  0.41  0.46
              150        1.3   0.15    0.26  0.43  0.48
              300        1.23  0.25    0.26  0.46  0.51
              300        1.27  0.26    0.26  0.44  0.49
              300        1.37  0.25    0.25  0.4   0.45
              300        1.35  0.28    0.28  0.41  0.46
              300        1.35  0.31    0.31  0.38  0.43
              SoilCrop SorghumSoil: LL=[0.26, 0.26, 0.26, 0.26, 0.25, 0.28, 0.31]; KL=[0.08, 0.08, 0.08, 0.08, 0.06, 0.04, 0.02]; XF=[1, 1, 1, 1, 1, 1, 1]
            SoilWater: SummerDate=1-Nov; SummerU=6; SummerCona=3.5; WinterDate=1-Apr; WinterU=6; WinterCona=3.5; DiffusConst=88; DiffusSlope=35.4; Salb=0.13; CN2Bare=91; CNRed=20; CNCov=0.8; max_pond=0; Thickness=[150, 150, 300, 300, 300, 300, 300]; SWCON=[0.5, 0.5, 0.5, 0.5, 0.5, 0.5, 0.5]; residueinterception=0
            SoilNitrogen: fom_type=[default, manure, mucuna, lablab, shemp, stable]; fract_carb=[0.2, 0.3, 0.54, 0.57, 0.45, 0]; fract_cell=[0.7, 0.3, 0.37, 0.37, 0.47, 0.1]; fract_lign=[0.1, 0.4, 0.09, 0.06, 0.08, 0.9]
            SoilOrganicMatter: RootCN=30; RootWt=1500; SoilCN=12.5; EnrACoeff=7.4; EnrBCoeff=0.2; OCUnits=Total
              Thickness  OC    FBiom  FInert
              150        1.3   0.03   0.31
              150        0.65  0.01   0.38
              300        0.32  0      0.47
              300        0.11  0      0.7
              300        0.11  0      0.9
              300        0.11  0      0.95
              300        0.11  0      0.95
            Analysis: Thickness=[150, 150, 300, 300, 300, 300, 300]; PH=[8.2, 8.7, 8.9, 8.1, 8, 8, 8]; PHUnits=Water; BoronUnits=HotWater
            Sample Initial nitrogen: NO3Units=ppm; NH4Units=ppm; SWUnits=Volumetric; OCUnits=Total; PHUnits=Water
              Thickness  NO3    NH4
              150        9.202  0.1
              150        4.403  0.1
              300        2.239  0.1
              300        1.237  0.1
              300        1.266  0.1
              300        1.77   0.1
              300        2.064  0.1
            CERESSoilTemperature
          Fertiliser
          Irrigation
          Operations
            1999-12-03  [Irrigation].Apply(17);
            1999-12-06  [Irrigation].Apply(20);
            1999-12-17  [Irrigation].Apply(20);
            2000-01-07  [Irrigation].Apply(10);
            2000-01-14  [Irrigation].Apply(48);
            2000-01-27  [Irrigation].Apply(21);
            2000-02-04  [Irrigation].Apply(17);
            2000-02-11  [Irrigation].Apply(30);
            2000-02-25  [Irrigation].Apply(41);
            2000-03-03  [Irrigation].Apply(15);
            1999-11-28  [Fertiliser].Apply(0, Fertiliser.Types.NO3N, 50);
            1999-11-27  [Fertiliser].Apply(0, Fertiliser.Types.NO3N, 50);
          Plant sorghum: ResourceName=Sorghum; CropType=sorghum
          Report: VariableNames=biomass_n
          SurfaceOrganicMatter: same as Experiments.HE1.Sorghum_HE1_T1.paddock.SurfaceOrganicMatter
          MicroClimate: a_interception=0; b_interception=1; c_interception=0; d_interception=0; soil_albedo=0.23; sun_angle=15; soil_heat_flux_fraction=0.4; night_interception_fraction=0.5; refheight=2; albedo=0.15; emissivity=0.96; RadIntTotal=0
          SoluteManager
        SoilArbitrator
      Simulation Sorghum_Gatton_RUE_2
        Clock: StartDate=1999-11-22; EndDate=2000-04-03
        Summary summaryfile
        Weather: FileName=.\Met\Gatton_RUE.met
        Zone paddock: Area=1; Slope=0
          Folder Manager folder
            Manager Sowing
              date = 2-dec
              crop = Sorghum
              density = 10
              depth = 40
              cultivar = A35xQL36
              row_spacing = 0.5
              RowConfiguration = solid
              ftn = 0
              script: same as in Test.Sorghum_HE1_BusterNoTillers.paddock.Manager folder.Sowing
            Manager Harvesting: same as Test.Sorghum_HE1_BusterNoTillers.paddock.Manager folder.Harvesting
          Soil Ian's Paddock: same as Experiments.Gatton_RUE.Sorghum_Gatton_RUE_1.paddock.Ian's Paddock
          Fertiliser
          Irrigation
          Operations: same as Experiments.Gatton_RUE.Sorghum_Gatton_RUE_1.paddock.operations
          Plant sorghum: ResourceName=Sorghum; CropType=sorghum
          Report: VariableNames=biomass_n
          SurfaceOrganicMatter: same as Experiments.HE1.Sorghum_HE1_T1.paddock.SurfaceOrganicMatter
          MicroClimate: a_interception=0; b_interception=1; c_interception=0; d_interception=0; soil_albedo=0.23; sun_angle=15; soil_heat_flux_fraction=0.4; night_interception_fraction=0.5; refheight=2; albedo=0.15; emissivity=0.96; RadIntTotal=0
          SoluteManager
        SoilArbitrator
      Simulation Sorghum_Gatton_RUE_3
        Clock: StartDate=1999-11-22; EndDate=2000-04-03
        Summary summaryfile
        Weather: FileName=.\Met\Gatton_RUE.met
        Zone paddock: Area=1; Slope=0
          Folder Manager folder
            Manager Sowing
              date = 2-dec
              crop = Sorghum
              density = 10
              depth = 40
              cultivar = QL39xQL36
              row_spacing = 0.5
              RowConfiguration = solid
              ftn = 0
              script: same as in Test.Sorghum_HE1_BusterNoTillers.paddock.Manager folder.Sowing
            Manager Harvesting: same as Test.Sorghum_HE1_BusterNoTillers.paddock.Manager folder.Harvesting
          Soil Ian's Paddock: same as Experiments.Gatton_RUE.Sorghum_Gatton_RUE_1.paddock.Ian's Paddock
          Fertiliser
          Irrigation
          Operations: same as Experiments.Gatton_RUE.Sorghum_Gatton_RUE_1.paddock.operations
          Plant sorghum: ResourceName=Sorghum; CropType=sorghum
          Report: VariableNames=biomass_n
          SurfaceOrganicMatter: same as Experiments.HE1.Sorghum_HE1_T1.paddock.SurfaceOrganicMatter
          MicroClimate: a_interception=0; b_interception=1; c_interception=0; d_interception=0; soil_albedo=0.23; sun_angle=15; soil_heat_flux_fraction=0.4; night_interception_fraction=0.5; refheight=2; albedo=0.15; emissivity=0.96; RadIntTotal=0
          SoluteManager
        SoilArbitrator
      Simulation Sorghum_Gatton_RUE_4
        Clock: StartDate=1999-11-22; EndDate=2000-04-03
        Summary summaryfile
        Weather: FileName=.\Met\Gatton_RUE.met
        Zone paddock: Area=1; Slope=0
          Folder Manager folder: same as Experiments.Gatton_RUE.Sorghum_Gatton_RUE_1.paddock.Manager folder
          Soil Ian's Paddock: same as Experiments.Gatton_RUE.Sorghum_Gatton_RUE_1.paddock.Ian's Paddock
          Fertiliser
          Irrigation
          Operations
            1999-12-03  [Irrigation].Apply(17);
            1999-12-06  [Irrigation].Apply(20);
            1999-12-17  [Irrigation].Apply(20);
            2000-01-07  [Irrigation].Apply(10);
            2000-01-14  [Irrigation].Apply(48);
            2000-01-27  [Irrigation].Apply(21);
            2000-02-04  [Irrigation].Apply(17);
            2000-02-11  [Irrigation].Apply(30);
            2000-02-25  [Irrigation].Apply(41);
            2000-03-03  [Irrigation].Apply(15);
            1999-11-29  [Fertiliser].Apply(44, Fertiliser.Types.NO3N, 50);
            1999-11-28  [Fertiliser].Apply(0, Fertiliser.Types.NO3N, 50);
            1999-11-27  [Fertiliser].Apply(0, Fertiliser.Types.NO3N, 50);
          Plant sorghum: ResourceName=Sorghum; CropType=sorghum
          Report: VariableNames=biomass_n
          SurfaceOrganicMatter: same as Experiments.HE1.Sorghum_HE1_T1.paddock.SurfaceOrganicMatter
          MicroClimate: a_interception=0; b_interception=1; c_interception=0; d_interception=0; soil_albedo=0.23; sun_angle=15; soil_heat_flux_fraction=0.4; night_interception_fraction=0.5; refheight=2; albedo=0.15; emissivity=0.96; RadIntTotal=0
          SoluteManager
        SoilArbitrator
      Simulation Sorghum_Gatton_RUE_5
        Clock: StartDate=1999-11-22; EndDate=2000-04-03
        Summary summaryfile
        Weather: FileName=.\Met\Gatton_RUE.met
        Zone paddock: Area=1; Slope=0
          Folder Manager folder: same as Experiments.Gatton_RUE.Sorghum_Gatton_RUE_2.paddock.Manager folder
          Soil Ian's Paddock: same as Experiments.Gatton_RUE.Sorghum_Gatton_RUE_1.paddock.Ian's Paddock
          Fertiliser
          Irrigation
          Operations
            1999-12-03  [Irrigation].Apply(17);
          Plant sorghum: ResourceName=Sorghum; CropType=sorghum
          Report: VariableNames=biomass_n
          SurfaceOrganicMatter: same as Experiments.HE1.Sorghum_HE1_T1.paddock.SurfaceOrganicMatter
          MicroClimate: a_interception=0; b_interception=1; c_interception=0; d_interception=0; soil_albedo=0.23; sun_angle=15; soil_heat_flux_fraction=0.4; night_interception_fraction=0.5; refheight=2; albedo=0.15; emissivity=0.96; RadIntTotal=0
          SoluteManager
        SoilArbitrator
      Simulation Sorghum_Gatton_RUE_6
        Clock: StartDate=1999-11-22; EndDate=2000-04-03
        Summary summaryfile
        Weather: FileName=.\Met\Gatton_RUE.met
        Zone paddock: Area=1; Slope=0
          Folder Manager folder: same as Experiments.Gatton_RUE.Sorghum_Gatton_RUE_3.paddock.Manager folder
          Soil Ian's Paddock: same as Experiments.Gatton_RUE.Sorghum_Gatton_RUE_1.paddock.Ian's Paddock
          Fertiliser
          Irrigation
          Operations: same as Experiments.Gatton_RUE.Sorghum_Gatton_RUE_4.paddock.operations
          Plant sorghum: ResourceName=Sorghum; CropType=sorghum
          Report: VariableNames=biomass_n
          SurfaceOrganicMatter: same as Experiments.HE1.Sorghum_HE1_T1.paddock.SurfaceOrganicMatter
          MicroClimate: a_interception=0; b_interception=1; c_interception=0; d_interception=0; soil_albedo=0.23; sun_angle=15; soil_heat_flux_fraction=0.4; night_interception_fraction=0.5; refheight=2; albedo=0.15; emissivity=0.96; RadIntTotal=0
          SoluteManager
        SoilArbitrator
      Simulation Sorghum_Gatton_RUE_7
        Clock: StartDate=1999-11-22; EndDate=2000-04-03
        Summary summaryfile
        Weather: FileName=.\Met\Gatton_RUE.met
        Zone paddock: Area=1; Slope=0
          Folder Manager folder
            Manager Sowing
              date = 2-dec
              crop = Sorghum
              density = 10
              depth = 40
              cultivar = CSH13R
              row_spacing = 0.5
              RowConfiguration = solid
              ftn = 0.9
              script: same as in Test.Sorghum_HE1_BusterNoTillers.paddock.Manager folder.Sowing
            Manager Harvesting: same as Test.Sorghum_HE1_BusterNoTillers.paddock.Manager folder.Harvesting
          Soil Ian's Paddock: same as Experiments.Gatton_RUE.Sorghum_Gatton_RUE_1.paddock.Ian's Paddock
          Fertiliser
          Irrigation
          Operations
            1999-12-03  [Irrigation].Apply(17);
            1999-12-06  [Irrigation].Apply(20);
            1999-12-17  [Irrigation].Apply(20);
            2000-01-07  [Irrigation].Apply(10);
            2000-01-14  [Irrigation].Apply(48);
            2000-01-27  [Irrigation].Apply(21);
            2000-02-04  [Irrigation].Apply(17);
            2000-02-11  [Irrigation].Apply(30);
            2000-02-25  [Irrigation].Apply(41);
            2000-03-03  [Irrigation].Apply(15);
            1999-11-29  [Fertiliser].Apply(117, Fertiliser.Types.NO3N, 50);
            2000-01-07  [Fertiliser].Apply(119, Fertiliser.Types.NO3N, 50);
            2000-02-11  [Fertiliser].Apply(119, Fertiliser.Types.NO3N, 50);
            1999-11-28  [Fertiliser].Apply(0, Fertiliser.Types.NO3N, 50);
            1999-11-27  [Fertiliser].Apply(0, Fertiliser.Types.NO3N, 50);
          Plant sorghum: ResourceName=Sorghum; CropType=sorghum
          Report: VariableNames=biomass_n
          SurfaceOrganicMatter: same as Experiments.HE1.Sorghum_HE1_T1.paddock.SurfaceOrganicMatter
          MicroClimate: a_interception=0; b_interception=1; c_interception=0; d_interception=0; soil_albedo=0.23; sun_angle=15; soil_heat_flux_fraction=0.4; night_interception_fraction=0.5; refheight=2; albedo=0.15; emissivity=0.96; RadIntTotal=0
          SoluteManager
        SoilArbitrator
      Simulation Sorghum_Gatton_RUE_8
        Clock: StartDate=1999-11-22; EndDate=2000-04-03
        Summary summaryfile
        Weather: FileName=.\Met\Gatton_RUE.met
        Zone paddock: Area=1; Slope=0
          Folder Manager folder
            Manager Sowing
              date = 2-dec
              crop = Sorghum
              density = 10
              depth = 40
              cultivar = A35xQL36
              row_spacing = 0.5
              RowConfiguration = solid
              ftn = 0.2
              script: same as in Test.Sorghum_HE1_BusterNoTillers.paddock.Manager folder.Sowing
            Manager Harvesting: same as Test.Sorghum_HE1_BusterNoTillers.paddock.Manager folder.Harvesting
          Soil Ian's Paddock: same as Experiments.Gatton_RUE.Sorghum_Gatton_RUE_1.paddock.Ian's Paddock
          Fertiliser
          Irrigation
          Operations
            1999-12-03  [Irrigation].Apply(17);
          Plant sorghum: ResourceName=Sorghum; CropType=sorghum
          Report: VariableNames=biomass_n
          SurfaceOrganicMatter: same as Experiments.HE1.Sorghum_HE1_T1.paddock.SurfaceOrganicMatter
          MicroClimate: a_interception=0; b_interception=1; c_interception=0; d_interception=0; soil_albedo=0.23; sun_angle=15; soil_heat_flux_fraction=0.4; night_interception_fraction=0.5; refheight=2; albedo=0.15; emissivity=0.96; RadIntTotal=0
          SoluteManager
        SoilArbitrator
      Simulation Sorghum_Gatton_RUE_9
        Clock: StartDate=1999-11-22; EndDate=2000-04-03
        Summary summaryfile
        Weather: FileName=.\Met\Gatton_RUE.met
        Zone paddock: Area=1; Slope=0
          Folder Manager folder
            Manager Sowing
              date = 2-dec
              crop = Sorghum
              density = 10
              depth = 40
              cultivar = QL39xQL36
              row_spacing = 0.5
              RowConfiguration = solid
              ftn = 0.9
              script: same as in Test.Sorghum_HE1_BusterNoTillers.paddock.Manager folder.Sowing
            Manager Harvesting: same as Test.Sorghum_HE1_BusterNoTillers.paddock.Manager folder.Harvesting
          Soil Ian's Paddock: same as Experiments.Gatton_RUE.Sorghum_Gatton_RUE_1.paddock.Ian's Paddock
          Fertiliser
          Irrigation
          Operations: same as Experiments.Gatton_RUE.Sorghum_Gatton_RUE_7.paddock.operations
          Plant sorghum: ResourceName=Sorghum; CropType=sorghum
          Report: VariableNames=biomass_n
          SurfaceOrganicMatter: same as Experiments.HE1.Sorghum_HE1_T1.paddock.SurfaceOrganicMatter
          MicroClimate: a_interception=0; b_interception=1; c_interception=0; d_interception=0; soil_albedo=0.23; sun_angle=15; soil_heat_flux_fraction=0.4; night_interception_fraction=0.5; refheight=2; albedo=0.15; emissivity=0.96; RadIntTotal=0
          SoluteManager
        SoilArbitrator
    Folder BW5_GxE
      Simulation Sorghum_BW5_GxE_T1
        Clock: StartDate=1996-09-26; EndDate=1997-02-20
        Summary summaryfile
        Weather: FileName=.\Met\BW5_GxE.met
        Zone paddock: Area=1; Slope=0
          Folder Manager folder
            Manager Sowing
              date = 10-oct
              crop = Sorghum
              density = 10
              depth = 30
              cultivar = M35-1
              row_spacing = 0.5
              RowConfiguration = solid
              ftn = 0
              script: same as in Test.Sorghum_HE1_BusterNoTillers.paddock.Manager folder.Sowing
            Manager Harvesting: same as Test.Sorghum_HE1_BusterNoTillers.paddock.Manager folder.Harvesting
          Fertiliser
          Irrigation
          Operations
            1996-11-21  [Irrigation].Apply(29);
            1996-12-02  [Irrigation].Apply(45);
            1996-12-11  [Irrigation].Apply(45);
            1997-01-08  [Irrigation].Apply(65);
            1997-01-09  [Irrigation].Apply(50);
            1996-09-27  [Fertiliser].Apply(10, Fertiliser.Types.NO3N, 50);
            1996-10-09  [Fertiliser].Apply(13, Fertiliser.Types.NO3N, 50);
            1996-10-16  [Fertiliser].Apply(99, Fertiliser.Types.NO3N, 50);
            1996-11-11  [Fertiliser].Apply(59, Fertiliser.Types.NO3N, 50);
            1996-12-11  [Fertiliser].Apply(59, Fertiliser.Types.NO3N, 50);
          Soil IC_BW5: SoilType=BW5; Site=ICRISAT; NearestTown=Unknown; Region=Hyderabad; NaturalVegetation=Unknown; Latitude=0; Longitude=0
            Water
              Thickness  BD    AirDry  LL15  DUL   SAT
              150        1.32  0.1     0.21  0.42  0.44
              150        1.49  0.21    0.22  0.39  0.41
              150        1.54  0.23    0.24  0.36  0.38
              150        1.54  0.23    0.24  0.36  0.38
              150        1.49  0.22    0.23  0.39  0.41
              150        1.47  0.22    0.23  0.42  0.44
              150        1.38  0.22    0.23  0.43  0.45
              150        1.37  0.21    0.22  0.43  0.45
              150        1.33  0.22    0.22  0.45  0.47
              150        1.35  0.22    0.22  0.43  0.45
              150        1.35  0.22    0.22  0.43  0.45
              150        1.33  0.22    0.22  0.45  0.47
              150        1.33  0.22    0.22  0.45  0.47
              SoilCrop SorghumSoil
                LL=[0.21, 0.22, 0.24, 0.24, 0.23, 0.23, 0.23, 0.22, 0.22, 0.22, 0.22, 0.22, 0.22]
                KL=[0.07, 0.07, 0.07, 0.07, 0.07, 0.07, 0.07, 0.07, 0.07, 0.04, 0.04, 0.04, 0.04]
                XF=[1, 1, 1, 1, 1, 1, 1, 1, 1, 1, 1, 1, 1]
            SoilWater: SummerDate=1-Nov; SummerU=6; SummerCona=3.5; WinterDate=1-Apr; WinterU=6; WinterCona=3.5; DiffusConst=40; DiffusSlope=16; Salb=0.11; CN2Bare=85; CNRed=0.8; CNCov=0.2; max_pond=0; residueinterception=0
              Thickness=[150, 150, 150, 150, 150, 150, 150, 150, 150, 150, 150, 150, 150]
              SWCON=[0.16, 0.11, 0.14, 0.14, 0.11, 0.11, 0.1, 0.1, 0.1, 0.12, 0.12, 0.1, 0.1]
            SoilNitrogen: fom_type=[default, manure, mucuna, lablab, shemp, stable]; fract_carb=[0.2, 0.3, 0.54, 0.57, 0.45, 0]; fract_cell=[0.7, 0.3, 0.37, 0.37, 0.47, 0.1]; fract_lign=[0.1, 0.4, 0.09, 0.06, 0.08, 0.9]
            SoilOrganicMatter: RootCN=45; RootWt=1000; SoilCN=14.5; EnrACoeff=7.4; EnrBCoeff=0.2; OCUnits=Total
              Thickness  OC    FBiom  FInert
              150        0.45  0.05   0.39
              150        0.32  0.02   0.47
              150        0.29  0.01   0.52
              150        0.23  0.01   0.62
              150        0.27  0.01   0.74
              150        0.3   0.01   0.83
              150        0.23  0.01   0.93
              150        0.22  0.01   0.93
              150        0.19  0.01   0.93
              150        0.12  0.01   0.93
              150        0.12  0.01   0.93
              150        0.14  0.01   0.93
              150        0.14  0.01   0.93
            Analysis: PHUnits=Water; BoronUnits=HotWater
              Thickness=[150, 150, 150, 150, 150, 150, 150, 150, 150, 150, 150, 150, 150]
              PH=[8.35, 8.52, 8.8, 8.95, 9, 9, 9, 9, 8.92, 8.97, 8.97, 8.82, 8.82]
            Sample Initial Water: NO3Units=ppm; NH4Units=ppm; SWUnits=Volumetric; OCUnits=Total; PHUnits=Water
              Thickness=[150, 150, 150, 150, 150, 150, 150, 150, 150, 150, 150, 150, 150]
              SW=[0.281, 0.338, 0.353, 0.36, 0.39, 0.407, 0.43, 0.43, 0.45, 0.43, 0.43, 0.45, 0.45]
            Sample Initial Nitrogen: NO3Units=ppm; NH4Units=ppm; SWUnits=Volumetric; OCUnits=Total; PHUnits=Water
              Thickness  NO3  NH4
              150        6.1  0.1
              150        5.6  0.1
              150        4    0.1
              150        3.3  0.1
              150        3.2  0.1
              150        3.7  0.1
              150        5    0.1
              150        3    0.1
              150        3    0.1
              150        2    0.1
              150        2    0.1
              150        2    0.1
              150        2    0.1
            CERESSoilTemperature
          Plant sorghum: ResourceName=Sorghum; CropType=sorghum
          Report: VariableNames=biomass_n
          SurfaceOrganicMatter: same as Experiments.HE1.Sorghum_HE1_T1.paddock.SurfaceOrganicMatter
          MicroClimate: a_interception=0; b_interception=1; c_interception=0; d_interception=0; soil_albedo=0.23; sun_angle=15; soil_heat_flux_fraction=0.4; night_interception_fraction=0.5; refheight=2; albedo=0.15; emissivity=0.96; RadIntTotal=0
          SoluteManager
        SoilArbitrator
      Simulation Sorghum_BW5_GxE_T2
        Clock: StartDate=1996-09-26; EndDate=1997-02-20
        Summary summaryfile
        Weather: FileName=.\Met\BW5_GxE.met
        Zone paddock: Area=1; Slope=0
          Folder Manager folder
            Manager Sowing
              date = 10-oct
              crop = Sorghum
              density = 10
              depth = 30
              cultivar = CSH13R
              row_spacing = 0.5
              RowConfiguration = solid
              ftn = 0
              script: same as in Test.Sorghum_HE1_BusterNoTillers.paddock.Manager folder.Sowing
            Manager Harvesting: same as Test.Sorghum_HE1_BusterNoTillers.paddock.Manager folder.Harvesting
          Fertiliser
          Irrigation
          Operations: same as Experiments.BW5_GxE.Sorghum_BW5_GxE_T1.paddock.operations
          Soil IC_BW5: same as Experiments.BW5_GxE.Sorghum_BW5_GxE_T1.paddock.IC_BW5
          Plant sorghum: ResourceName=Sorghum; CropType=sorghum
          Report: VariableNames=biomass_n
          SurfaceOrganicMatter: same as Experiments.HE1.Sorghum_HE1_T1.paddock.SurfaceOrganicMatter
          MicroClimate: a_interception=0; b_interception=1; c_interception=0; d_interception=0; soil_albedo=0.23; sun_angle=15; soil_heat_flux_fraction=0.4; night_interception_fraction=0.5; refheight=2; albedo=0.15; emissivity=0.96; RadIntTotal=0
          SoluteManager
        SoilArbitrator
      Simulation Sorghum_BW5_GxE_T3
        Clock: StartDate=1996-09-26; EndDate=1997-02-20
        Summary summaryfile
        Weather: FileName=.\Met\BW5_GxE.met
        Zone paddock: Area=1; Slope=0
          Folder Manager folder
            Manager Sowing
              date = 10-oct
              crop = Sorghum
              density = 10
              depth = 30
              cultivar = ATX623xRTX430
              row_spacing = 0.5
              RowConfiguration = solid
              ftn = 0
              script: same as in Test.Sorghum_HE1_BusterNoTillers.paddock.Manager folder.Sowing
            Manager Harvesting: same as Test.Sorghum_HE1_BusterNoTillers.paddock.Manager folder.Harvesting
          Fertiliser
          Irrigation
          Operations: same as Experiments.BW5_GxE.Sorghum_BW5_GxE_T1.paddock.operations
          Soil IC_BW5: same as Experiments.BW5_GxE.Sorghum_BW5_GxE_T1.paddock.IC_BW5
          Plant sorghum: ResourceName=Sorghum; CropType=sorghum
          Report: VariableNames=biomass_n
          SurfaceOrganicMatter: same as Experiments.HE1.Sorghum_HE1_T1.paddock.SurfaceOrganicMatter
          MicroClimate: a_interception=0; b_interception=1; c_interception=0; d_interception=0; soil_albedo=0.23; sun_angle=15; soil_heat_flux_fraction=0.4; night_interception_fraction=0.5; refheight=2; albedo=0.15; emissivity=0.96; RadIntTotal=0
          SoluteManager
        SoilArbitrator
      Simulation Sorghum_BW5_GxE_T4
        Clock: StartDate=1996-09-26; EndDate=1997-02-20
        Summary summaryfile
        Weather: FileName=.\Met\BW5_GxE.met
        Zone paddock: Area=1; Slope=0
          Folder Manager folder
            Manager Sowing
              date = 10-oct
              crop = Sorghum
              density = 10
              depth = 30
              cultivar = QL41xQL36
              row_spacing = 0.5
              RowConfiguration = solid
              ftn = 0
              script: same as in Test.Sorghum_HE1_BusterNoTillers.paddock.Manager folder.Sowing
            Manager Harvesting: same as Test.Sorghum_HE1_BusterNoTillers.paddock.Manager folder.Harvesting
          Fertiliser
          Irrigation
          Operations: same as Experiments.BW5_GxE.Sorghum_BW5_GxE_T1.paddock.operations
          Soil IC_BW5: same as Experiments.BW5_GxE.Sorghum_BW5_GxE_T1.paddock.IC_BW5
          Plant sorghum: ResourceName=Sorghum; CropType=sorghum
          Report: VariableNames=biomass_n
          SurfaceOrganicMatter: same as Experiments.HE1.Sorghum_HE1_T1.paddock.SurfaceOrganicMatter
          MicroClimate: a_interception=0; b_interception=1; c_interception=0; d_interception=0; soil_albedo=0.23; sun_angle=15; soil_heat_flux_fraction=0.4; night_interception_fraction=0.5; refheight=2; albedo=0.15; emissivity=0.96; RadIntTotal=0
          SoluteManager
        SoilArbitrator
      Simulation Sorghum_BW5_GxE_T5
        Clock: StartDate=1996-09-26; EndDate=1997-02-20
        Summary summaryfile
        Weather: FileName=.\Met\BW5_GxE.met
        Zone paddock: Area=1; Slope=0
          Folder Manager folder: same as Experiments.BW5_GxE.Sorghum_BW5_GxE_T1.paddock.Manager folder
          Fertiliser
          Irrigation
          Operations
            1996-09-27  [Fertiliser].Apply(10, Fertiliser.Types.NO3N, 50);
            1996-10-09  [Fertiliser].Apply(13, Fertiliser.Types.NO3N, 50);
            1996-10-16  [Fertiliser].Apply(99, Fertiliser.Types.NO3N, 50);
          Soil IC_BW5: same as Experiments.BW5_GxE.Sorghum_BW5_GxE_T1.paddock.IC_BW5
          Plant sorghum: ResourceName=Sorghum; CropType=sorghum
          Report: VariableNames=biomass_n
          SurfaceOrganicMatter: same as Experiments.HE1.Sorghum_HE1_T1.paddock.SurfaceOrganicMatter
          MicroClimate: a_interception=0; b_interception=1; c_interception=0; d_interception=0; soil_albedo=0.23; sun_angle=15; soil_heat_flux_fraction=0.4; night_interception_fraction=0.5; refheight=2; albedo=0.15; emissivity=0.96; RadIntTotal=0
          SoluteManager
        SoilArbitrator
      Simulation Sorghum_BW5_GxE_T6
        Clock: StartDate=1996-09-26; EndDate=1997-02-20
        Summary summaryfile
        Weather: FileName=.\Met\BW5_GxE.met
        Zone paddock: Area=1; Slope=0
          Folder Manager folder: same as Experiments.BW5_GxE.Sorghum_BW5_GxE_T2.paddock.Manager folder
          Fertiliser
          Irrigation
          Operations
            1996-09-27  [Fertiliser].Apply(10, Fertiliser.Types.NO3N, 50);
            1996-10-09  [Fertiliser].Apply(13, Fertiliser.Types.NO3N, 50);
            1996-10-16  [Fertiliser].Apply(99, Fertiliser.Types.NO3N, 50);
          Soil IC_BW5: same as Experiments.BW5_GxE.Sorghum_BW5_GxE_T1.paddock.IC_BW5
          Plant sorghum: ResourceName=Sorghum; CropType=sorghum
          Report: VariableNames=biomass_n
          SurfaceOrganicMatter: same as Experiments.HE1.Sorghum_HE1_T1.paddock.SurfaceOrganicMatter
          MicroClimate: a_interception=0; b_interception=1; c_interception=0; d_interception=0; soil_albedo=0.23; sun_angle=15; soil_heat_flux_fraction=0.4; night_interception_fraction=0.5; refheight=2; albedo=0.15; emissivity=0.96; RadIntTotal=0
          SoluteManager
        SoilArbitrator
      Simulation Sorghum_BW5_GxE_T7
        Clock: StartDate=1996-09-26; EndDate=1997-02-20
        Summary summaryfile
        Weather: FileName=.\Met\BW5_GxE.met
        Zone paddock: Area=1; Slope=0
          Folder Manager folder: same as Experiments.BW5_GxE.Sorghum_BW5_GxE_T3.paddock.Manager folder
          Fertiliser
          Irrigation
          Operations
            1996-09-27  [Fertiliser].Apply(10, Fertiliser.Types.NO3N, 50);
            1996-10-09  [Fertiliser].Apply(13, Fertiliser.Types.NO3N, 50);
            1996-10-16  [Fertiliser].Apply(99, Fertiliser.Types.NO3N, 50);
          Soil IC_BW5: same as Experiments.BW5_GxE.Sorghum_BW5_GxE_T1.paddock.IC_BW5
          Plant sorghum: ResourceName=Sorghum; CropType=sorghum
          Report: VariableNames=biomass_n
          SurfaceOrganicMatter: same as Experiments.HE1.Sorghum_HE1_T1.paddock.SurfaceOrganicMatter
          MicroClimate: a_interception=0; b_interception=1; c_interception=0; d_interception=0; soil_albedo=0.23; sun_angle=15; soil_heat_flux_fraction=0.4; night_interception_fraction=0.5; refheight=2; albedo=0.15; emissivity=0.96; RadIntTotal=0
          SoluteManager
        SoilArbitrator
      Simulation Sorghum_BW5_GxE_T8
        Clock: StartDate=1996-09-26; EndDate=1997-02-20
        Summary summaryfile
        Weather: FileName=.\Met\BW5_GxE.met
        Zone paddock: Area=1; Slope=0
          Folder Manager folder: same as Experiments.BW5_GxE.Sorghum_BW5_GxE_T4.paddock.Manager folder
          Fertiliser
          Irrigation
          Operations
            1996-09-27  [Fertiliser].Apply(10, Fertiliser.Types.NO3N, 50);
            1996-10-09  [Fertiliser].Apply(13, Fertiliser.Types.NO3N, 50);
            1996-10-16  [Fertiliser].Apply(99, Fertiliser.Types.NO3N, 50);
          Soil IC_BW5: same as Experiments.BW5_GxE.Sorghum_BW5_GxE_T1.paddock.IC_BW5
          Plant sorghum: ResourceName=Sorghum; CropType=sorghum
          Report: VariableNames=biomass_n
          SurfaceOrganicMatter: same as Experiments.HE1.Sorghum_HE1_T1.paddock.SurfaceOrganicMatter
          MicroClimate: a_interception=0; b_interception=1; c_interception=0; d_interception=0; soil_albedo=0.23; sun_angle=15; soil_heat_flux_fraction=0.4; night_interception_fraction=0.5; refheight=2; albedo=0.15; emissivity=0.96; RadIntTotal=0
          SoluteManager
        SoilArbitrator
      Simulation Sorghum_BW5_GxE_T9
        Clock: StartDate=1996-09-26; EndDate=1997-02-20
        Summary summaryfile
        Weather: FileName=.\Met\BW5_GxE.met
        Zone paddock: Area=1; Slope=0
          Folder Manager folder: same as Experiments.BW5_GxE.Sorghum_BW5_GxE_T1.paddock.Manager folder
          Fertiliser
          Irrigation
          Operations
            1996-09-27  [Fertiliser].Apply(10, Fertiliser.Types.NO3N, 50);
          Soil IC_BW5: same as Experiments.BW5_GxE.Sorghum_BW5_GxE_T1.paddock.IC_BW5
          Plant sorghum: ResourceName=Sorghum; CropType=sorghum
          Report: VariableNames=biomass_n
          SurfaceOrganicMatter: same as Experiments.HE1.Sorghum_HE1_T1.paddock.SurfaceOrganicMatter
          MicroClimate: a_interception=0; b_interception=1; c_interception=0; d_interception=0; soil_albedo=0.23; sun_angle=15; soil_heat_flux_fraction=0.4; night_interception_fraction=0.5; refheight=2; albedo=0.15; emissivity=0.96; RadIntTotal=0
          SoluteManager
        SoilArbitrator
      Simulation Sorghum_BW5_GxE_T10
        Clock: StartDate=1996-09-26; EndDate=1997-02-20
        Summary summaryfile
        Weather: FileName=.\Met\BW5_GxE.met
        Zone paddock: Area=1; Slope=0
          Folder Manager folder: same as Experiments.BW5_GxE.Sorghum_BW5_GxE_T2.paddock.Manager folder
          Fertiliser
          Irrigation
          Operations
            1996-09-27  [Fertiliser].Apply(10, Fertiliser.Types.NO3N, 50);
          Soil IC_BW5: same as Experiments.BW5_GxE.Sorghum_BW5_GxE_T1.paddock.IC_BW5
          Plant sorghum: ResourceName=Sorghum; CropType=sorghum
          Report: VariableNames=biomass_n
          SurfaceOrganicMatter: same as Experiments.HE1.Sorghum_HE1_T1.paddock.SurfaceOrganicMatter
          MicroClimate: a_interception=0; b_interception=1; c_interception=0; d_interception=0; soil_albedo=0.23; sun_angle=15; soil_heat_flux_fraction=0.4; night_interception_fraction=0.5; refheight=2; albedo=0.15; emissivity=0.96; RadIntTotal=0
          SoluteManager
        SoilArbitrator
      Simulation Sorghum_BW5_GxE_T11
        Clock: StartDate=1996-09-26; EndDate=1997-02-20
        Summary summaryfile
        Weather: FileName=.\Met\BW5_GxE.met
        Zone paddock: Area=1; Slope=0
          Folder Manager folder: same as Experiments.BW5_GxE.Sorghum_BW5_GxE_T3.paddock.Manager folder
          Fertiliser
          Irrigation
          Operations
            1996-09-27  [Fertiliser].Apply(10, Fertiliser.Types.NO3N, 50);
          Soil IC_BW5: same as Experiments.BW5_GxE.Sorghum_BW5_GxE_T1.paddock.IC_BW5
          Plant sorghum: ResourceName=Sorghum; CropType=sorghum
          Report: VariableNames=biomass_n
          SurfaceOrganicMatter: same as Experiments.HE1.Sorghum_HE1_T1.paddock.SurfaceOrganicMatter
          MicroClimate: a_interception=0; b_interception=1; c_interception=0; d_interception=0; soil_albedo=0.23; sun_angle=15; soil_heat_flux_fraction=0.4; night_interception_fraction=0.5; refheight=2; albedo=0.15; emissivity=0.96; RadIntTotal=0
          SoluteManager
        SoilArbitrator
      Simulation Sorghum_BW5_GxE_T12
        Clock: StartDate=1996-09-26; EndDate=1997-02-20
        Summary summaryfile
        Weather: FileName=.\Met\BW5_GxE.met
        Zone paddock: Area=1; Slope=0
          Folder Manager folder: same as Experiments.BW5_GxE.Sorghum_BW5_GxE_T4.paddock.Manager folder
          Fertiliser
          Irrigation
          Operations
            1996-09-27  [Fertiliser].Apply(10, Fertiliser.Types.NO3N, 50);
          Soil IC_BW5: same as Experiments.BW5_GxE.Sorghum_BW5_GxE_T1.paddock.IC_BW5
          Plant sorghum: ResourceName=Sorghum; CropType=sorghum
          Report: VariableNames=biomass_n
          SurfaceOrganicMatter: same as Experiments.HE1.Sorghum_HE1_T1.paddock.SurfaceOrganicMatter
          MicroClimate: a_interception=0; b_interception=1; c_interception=0; d_interception=0; soil_albedo=0.23; sun_angle=15; soil_heat_flux_fraction=0.4; night_interception_fraction=0.5; refheight=2; albedo=0.15; emissivity=0.96; RadIntTotal=0
          SoluteManager
        SoilArbitrator
    Folder BW8_GxE
      Simulation Sorghum_BW8_GxE_T1
        Clock: StartDate=1996-09-26; EndDate=1997-02-20
        Summary summaryfile
        Weather: FileName=.\Met\BW8_GxE.met
        Zone paddock: Area=1; Slope=0
          Folder Manager folder
            Manager Sowing
              date = 7-oct
              crop = Sorghum
              density = 10
              depth = 0.5
              cultivar = M35-1
              row_spacing = 0.5
              RowConfiguration = solid
              ftn = 0
              script: same as in Test.Sorghum_HE1_BusterNoTillers.paddock.Manager folder.Sowing
            Manager Harvesting: same as Test.Sorghum_HE1_BusterNoTillers.paddock.Manager folder.Harvesting
          Fertiliser
          Irrigation
          Operations
            1996-11-19  [Irrigation].Apply(28);
            1996-11-28  [Irrigation].Apply(58);
            1996-12-10  [Irrigation].Apply(49);
            1996-12-24  [Irrigation].Apply(57);
            1997-01-07  [Irrigation].Apply(67);
            1996-09-25  [Fertiliser].Apply(20, Fertiliser.Types.NO3N, 50);
            1996-10-17  [Fertiliser].Apply(99, Fertiliser.Types.NO3N, 50);
            1996-11-06  [Fertiliser].Apply(59, Fertiliser.Types.NO3N, 50);
            1996-12-10  [Fertiliser].Apply(59, Fertiliser.Types.NO3N, 50);
          Plant sorghum: ResourceName=Sorghum; CropType=sorghum
          Soil IC_BW8: SoilType=BW8; Site=ICRISAT; NearestTown=Unknown; Region=Hyderabad; NaturalVegetation=Unknown; Latitude=0; Longitude=0
            Water
              Thickness  BD    AirDry  LL15  DUL   SAT
              150        1.49  0.12    0.16  0.32  0.43
              150        1.41  0.15    0.19  0.35  0.46
              150        1.41  0.15    0.19  0.35  0.46
              150        1.56  0.1     0.14  0.28  0.41
              150        1.49  0.11    0.15  0.31  0.43
              150        1.52  0.13    0.17  0.33  0.42
              150        1.61  0.09    0.13  0.26  0.39
              150        1.68  0.08    0.12  0.22  0.36
              150        1.63  0.09    0.13  0.24  0.38
              300        1.62  0.09    0.13  0.24  0.38
              300        1.62  0.09    0.13  0.24  0.38
              SoilCrop SorghumSoil
                LL=[0.16, 0.19, 0.19, 0.14, 0.15, 0.17, 0.13, 0.12, 0.13, 0.13, 0.13]
                KL=[0.07, 0.07, 0.07, 0.07, 0.07, 0.07, 0.07, 0.07, 0.07, 0.04, 0.04]
                XF=[1, 1, 1, 1, 1, 1, 1, 1, 1, 1, 1]
            SoilWater: SummerDate=1-Nov; SummerU=6; SummerCona=3.5; WinterDate=1-Apr; WinterU=6; WinterCona=3.5; DiffusConst=40; DiffusSlope=16; Salb=0.11; CN2Bare=85; CNRed=0.8; CNCov=0.2; max_pond=0; Thickness=[150, 150, 150, 150, 150, 150, 150, 150, 150, 300, 300]; residueinterception=0
              SWCON=[0.16, 0.11, 0.14, 0.14, 0.11, 0.11, 0.1, 0.1, 0.1, 0.12, 0.1]
            SoilNitrogen: fom_type=[default, manure, mucuna, lablab, shemp, stable]; fract_carb=[0.2, 0.3, 0.54, 0.57, 0.45, 0]; fract_cell=[0.7, 0.3, 0.37, 0.37, 0.47, 0.1]; fract_lign=[0.1, 0.4, 0.09, 0.06, 0.08, 0.9]
            SoilOrganicMatter: RootCN=45; RootWt=1000; SoilCN=14.5; EnrACoeff=7.4; EnrBCoeff=0.2; OCUnits=Total
              Thickness  OC    FBiom  FInert
              150        0.49  0.05   0.39
              150        0.45  0.02   0.47
              150        0.28  0.01   0.52
              150        0.18  0.01   0.62
              150        0.14  0.01   0.74
              150        0.11  0.01   0.83
              150        0.09  0.01   0.93
              150        0.07  0.01   0.93
              150        0.06  0.01   0.93
              300        0.05  0.01   0.93
              300        0.03  0.01   0.93
            Analysis: Thickness=[150, 150, 150, 150, 150, 150, 150, 150, 150, 300, 300]; PH=[8.35, 8.52, 8.8, 8.95, 9, 9, 9, 9, 8.92, 8.97, 8.82]; PHUnits=Water; BoronUnits=HotWater
            InitialWater Initial Water: PercentMethod=FilledFromTop; FractionFull=0.5
            Sample Initial Nitrogen: NO3Units=ppm; NH4Units=ppm; SWUnits=Volumetric; OCUnits=Total; PHUnits=Water
              Thickness  NO3  NH4
              150        9    0.1
              150        11   0.1
              150        8    0.1
              150        6    0.1
              150        4    0.1
              150        3    0.1
              150        3    0.1
              150        3    0.1
              150        6    0.1
              300        4    0.1
              300        5    0.1
            CERESSoilTemperature
          Report: VariableNames=biomass_n
          SurfaceOrganicMatter: same as Experiments.HE1.Sorghum_HE1_T1.paddock.SurfaceOrganicMatter
          MicroClimate: a_interception=0; b_interception=1; c_interception=0; d_interception=0; soil_albedo=0.23; sun_angle=15; soil_heat_flux_fraction=0.4; night_interception_fraction=0.5; refheight=2; albedo=0.15; emissivity=0.96; RadIntTotal=0
          SoluteManager
        SoilArbitrator
      Simulation Sorghum_BW8_GxE_T2
        Clock: StartDate=1996-09-26; EndDate=1997-02-20
        Summary summaryfile
        Weather: FileName=.\Met\BW8_GxE.met
        Zone paddock: Area=1; Slope=0
          Folder Manager folder
            Manager Sowing
              date = 7-oct
              crop = Sorghum
              density = 10
              depth = 0.5
              cultivar = CSH13R
              row_spacing = 0.5
              RowConfiguration = solid
              ftn = 0
              script: same as in Test.Sorghum_HE1_BusterNoTillers.paddock.Manager folder.Sowing
            Manager Harvesting: same as Test.Sorghum_HE1_BusterNoTillers.paddock.Manager folder.Harvesting
          Fertiliser
          Irrigation
          Operations: same as Experiments.BW8_GxE.Sorghum_BW8_GxE_T1.paddock.operations
          Plant sorghum: ResourceName=Sorghum; CropType=sorghum
          Soil IC_BW8: same as Experiments.BW8_GxE.Sorghum_BW8_GxE_T1.paddock.IC_BW8
          Report: VariableNames=biomass_n
          SurfaceOrganicMatter: same as Experiments.HE1.Sorghum_HE1_T1.paddock.SurfaceOrganicMatter
          MicroClimate: a_interception=0; b_interception=1; c_interception=0; d_interception=0; soil_albedo=0.23; sun_angle=15; soil_heat_flux_fraction=0.4; night_interception_fraction=0.5; refheight=2; albedo=0.15; emissivity=0.96; RadIntTotal=0
          SoluteManager
        SoilArbitrator
      Simulation Sorghum_BW8_GxE_T3
        Clock: StartDate=1996-09-26; EndDate=1997-02-20
        Summary summaryfile
        Weather: FileName=.\Met\BW8_GxE.met
        Zone paddock: Area=1; Slope=0
          Folder Manager folder
            Manager Sowing
              date = 7-oct
              crop = Sorghum
              density = 10
              depth = 0.5
              cultivar = ATX623xRTX430
              row_spacing = 0.5
              RowConfiguration = solid
              ftn = 0
              script: same as in Test.Sorghum_HE1_BusterNoTillers.paddock.Manager folder.Sowing
            Manager Harvesting: same as Test.Sorghum_HE1_BusterNoTillers.paddock.Manager folder.Harvesting
          Fertiliser
          Irrigation
          Operations: same as Experiments.BW8_GxE.Sorghum_BW8_GxE_T1.paddock.operations
          Plant sorghum: ResourceName=Sorghum; CropType=sorghum
          Soil IC_BW8: same as Experiments.BW8_GxE.Sorghum_BW8_GxE_T1.paddock.IC_BW8
          Report: VariableNames=biomass_n
          SurfaceOrganicMatter: same as Experiments.HE1.Sorghum_HE1_T1.paddock.SurfaceOrganicMatter
          MicroClimate: a_interception=0; b_interception=1; c_interception=0; d_interception=0; soil_albedo=0.23; sun_angle=15; soil_heat_flux_fraction=0.4; night_interception_fraction=0.5; refheight=2; albedo=0.15; emissivity=0.96; RadIntTotal=0
          SoluteManager
        SoilArbitrator
      Simulation Sorghum_BW8_GxE_T4
        Clock: StartDate=1996-09-26; EndDate=1997-02-20
        Summary summaryfile
        Weather: FileName=.\Met\BW8_GxE.met
        Zone paddock: Area=1; Slope=0
          Folder Manager folder
            Manager Sowing
              date = 7-oct
              crop = Sorghum
              density = 10
              depth = 0.5
              cultivar = QL41xQL36
              row_spacing = 0.5
              RowConfiguration = solid
              ftn = 0
              script: same as in Test.Sorghum_HE1_BusterNoTillers.paddock.Manager folder.Sowing
            Manager Harvesting: same as Test.Sorghum_HE1_BusterNoTillers.paddock.Manager folder.Harvesting
          Fertiliser
          Irrigation
          Operations: same as Experiments.BW8_GxE.Sorghum_BW8_GxE_T1.paddock.operations
          Plant sorghum: ResourceName=Sorghum; CropType=sorghum
          Soil IC_BW8: same as Experiments.BW8_GxE.Sorghum_BW8_GxE_T1.paddock.IC_BW8
          Report: VariableNames=biomass_n
          SurfaceOrganicMatter: same as Experiments.HE1.Sorghum_HE1_T1.paddock.SurfaceOrganicMatter
          MicroClimate: a_interception=0; b_interception=1; c_interception=0; d_interception=0; soil_albedo=0.23; sun_angle=15; soil_heat_flux_fraction=0.4; night_interception_fraction=0.5; refheight=2; albedo=0.15; emissivity=0.96; RadIntTotal=0
          SoluteManager
        SoilArbitrator
      Simulation Sorghum_BW8_GxE_T5
        Clock: StartDate=1996-09-26; EndDate=1997-02-20
        Summary summaryfile
        Weather: FileName=.\Met\BW8_GxE.met
        Zone paddock: Area=1; Slope=0
          Folder Manager folder: same as Experiments.BW8_GxE.Sorghum_BW8_GxE_T1.paddock.Manager folder
          Fertiliser
          Irrigation
          Operations
            1996-09-25  [Fertiliser].Apply(20, Fertiliser.Types.NO3N, 50);
            1996-10-17  [Fertiliser].Apply(99, Fertiliser.Types.NO3N, 50);
          Plant sorghum: ResourceName=Sorghum; CropType=sorghum
          Soil IC_BW8: same as Experiments.BW8_GxE.Sorghum_BW8_GxE_T1.paddock.IC_BW8
          Report: VariableNames=biomass_n
          SurfaceOrganicMatter: same as Experiments.HE1.Sorghum_HE1_T1.paddock.SurfaceOrganicMatter
          MicroClimate: a_interception=0; b_interception=1; c_interception=0; d_interception=0; soil_albedo=0.23; sun_angle=15; soil_heat_flux_fraction=0.4; night_interception_fraction=0.5; refheight=2; albedo=0.15; emissivity=0.96; RadIntTotal=0
          SoluteManager
        SoilArbitrator
      Simulation Sorghum_BW8_GxE_T7
        Clock: StartDate=1996-09-26; EndDate=1997-02-20
        Summary summaryfile
        Weather: FileName=.\Met\BW8_GxE.met
        Zone paddock: Area=1; Slope=0
          Folder Manager folder: same as Experiments.BW8_GxE.Sorghum_BW8_GxE_T3.paddock.Manager folder
          Fertiliser
          Irrigation
          Operations
            1996-09-25  [Fertiliser].Apply(20, Fertiliser.Types.NO3N, 50);
            1996-10-17  [Fertiliser].Apply(99, Fertiliser.Types.NO3N, 50);
          Plant sorghum: ResourceName=Sorghum; CropType=sorghum
          Soil IC_BW8: same as Experiments.BW8_GxE.Sorghum_BW8_GxE_T1.paddock.IC_BW8
          Report: VariableNames=biomass_n
          SurfaceOrganicMatter: same as Experiments.HE1.Sorghum_HE1_T1.paddock.SurfaceOrganicMatter
          MicroClimate: a_interception=0; b_interception=1; c_interception=0; d_interception=0; soil_albedo=0.23; sun_angle=15; soil_heat_flux_fraction=0.4; night_interception_fraction=0.5; refheight=2; albedo=0.15; emissivity=0.96; RadIntTotal=0
          SoluteManager
        SoilArbitrator
      Simulation Sorghum_BW8_GxE_T8
        Clock: StartDate=1996-09-26; EndDate=1997-02-20
        Summary summaryfile
        Weather: FileName=.\Met\BW8_GxE.met
        Zone paddock: Area=1; Slope=0
          Folder Manager folder: same as Experiments.BW8_GxE.Sorghum_BW8_GxE_T4.paddock.Manager folder
          Fertiliser
          Irrigation
          Operations
            1996-09-25  [Fertiliser].Apply(20, Fertiliser.Types.NO3N, 50);
            1996-10-17  [Fertiliser].Apply(99, Fertiliser.Types.NO3N, 50);
          Plant sorghum: ResourceName=Sorghum; CropType=sorghum
          Soil IC_BW8: same as Experiments.BW8_GxE.Sorghum_BW8_GxE_T1.paddock.IC_BW8
          Report: VariableNames=biomass_n
          SurfaceOrganicMatter: same as Experiments.HE1.Sorghum_HE1_T1.paddock.SurfaceOrganicMatter
          MicroClimate: a_interception=0; b_interception=1; c_interception=0; d_interception=0; soil_albedo=0.23; sun_angle=15; soil_heat_flux_fraction=0.4; night_interception_fraction=0.5; refheight=2; albedo=0.15; emissivity=0.96; RadIntTotal=0
          SoluteManager
        SoilArbitrator
      Simulation Sorghum_BW8_GxE_T9
        Clock: StartDate=1996-09-26; EndDate=1997-02-20
        Summary summaryfile
        Weather: FileName=.\Met\BW8_GxE.met
        Zone paddock: Area=1; Slope=0
          Folder Manager folder: same as Experiments.BW8_GxE.Sorghum_BW8_GxE_T1.paddock.Manager folder
          Fertiliser
          Irrigation
          Operations
            1996-09-25  [Fertiliser].Apply(20, Fertiliser.Types.NO3N, 50);
          Plant sorghum: ResourceName=Sorghum; CropType=sorghum
          Soil IC_BW8: same as Experiments.BW8_GxE.Sorghum_BW8_GxE_T1.paddock.IC_BW8
          Report: VariableNames=biomass_n
          SurfaceOrganicMatter: same as Experiments.HE1.Sorghum_HE1_T1.paddock.SurfaceOrganicMatter
          MicroClimate: a_interception=0; b_interception=1; c_interception=0; d_interception=0; soil_albedo=0.23; sun_angle=15; soil_heat_flux_fraction=0.4; night_interception_fraction=0.5; refheight=2; albedo=0.15; emissivity=0.96; RadIntTotal=0
          SoluteManager
        SoilArbitrator
      Simulation Sorghum_BW8_GxE_T10
        Clock: StartDate=1996-09-26; EndDate=1997-02-20
        Summary summaryfile
        Weather: FileName=.\Met\BW8_GxE.met
        Zone paddock: Area=1; Slope=0
          Folder Manager folder: same as Experiments.BW8_GxE.Sorghum_BW8_GxE_T2.paddock.Manager folder
          Fertiliser
          Irrigation
          Operations
            1996-09-25  [Fertiliser].Apply(20, Fertiliser.Types.NO3N, 50);
          Plant sorghum: ResourceName=Sorghum; CropType=sorghum
          Soil IC_BW8: same as Experiments.BW8_GxE.Sorghum_BW8_GxE_T1.paddock.IC_BW8
          Report: VariableNames=biomass_n
          SurfaceOrganicMatter: same as Experiments.HE1.Sorghum_HE1_T1.paddock.SurfaceOrganicMatter
          MicroClimate: a_interception=0; b_interception=1; c_interception=0; d_interception=0; soil_albedo=0.23; sun_angle=15; soil_heat_flux_fraction=0.4; night_interception_fraction=0.5; refheight=2; albedo=0.15; emissivity=0.96; RadIntTotal=0
          SoluteManager
        SoilArbitrator
      Simulation Sorghum_BW8_GxE_T11
        Clock: StartDate=1996-09-26; EndDate=1997-02-20
        Summary summaryfile
        Weather: FileName=.\Met\BW8_GxE.met
        Zone paddock: Area=1; Slope=0
          Folder Manager folder: same as Experiments.BW8_GxE.Sorghum_BW8_GxE_T3.paddock.Manager folder
          Fertiliser
          Irrigation
          Operations
            1996-09-25  [Fertiliser].Apply(20, Fertiliser.Types.NO3N, 50);
          Plant sorghum: ResourceName=Sorghum; CropType=sorghum
          Soil IC_BW8: same as Experiments.BW8_GxE.Sorghum_BW8_GxE_T1.paddock.IC_BW8
          Report: VariableNames=biomass_n
          SurfaceOrganicMatter: same as Experiments.HE1.Sorghum_HE1_T1.paddock.SurfaceOrganicMatter
          MicroClimate: a_interception=0; b_interception=1; c_interception=0; d_interception=0; soil_albedo=0.23; sun_angle=15; soil_heat_flux_fraction=0.4; night_interception_fraction=0.5; refheight=2; albedo=0.15; emissivity=0.96; RadIntTotal=0
          SoluteManager
        SoilArbitrator
      Simulation Sorghum_BW8_GxE_T12
        Clock: StartDate=1996-09-26; EndDate=1997-02-20
        Summary summaryfile
        Weather: FileName=.\Met\BW8_GxE.met
        Zone paddock: Area=1; Slope=0
          Folder Manager folder: same as Experiments.BW8_GxE.Sorghum_BW8_GxE_T4.paddock.Manager folder
          Fertiliser
          Irrigation
          Operations
            1996-09-25  [Fertiliser].Apply(20, Fertiliser.Types.NO3N, 50);
          Plant sorghum: ResourceName=Sorghum; CropType=sorghum
          Soil IC_BW8: same as Experiments.BW8_GxE.Sorghum_BW8_GxE_T1.paddock.IC_BW8
          Report: VariableNames=biomass_n
          SurfaceOrganicMatter: same as Experiments.HE1.Sorghum_HE1_T1.paddock.SurfaceOrganicMatter
          MicroClimate: a_interception=0; b_interception=1; c_interception=0; d_interception=0; soil_albedo=0.23; sun_angle=15; soil_heat_flux_fraction=0.4; night_interception_fraction=0.5; refheight=2; albedo=0.15; emissivity=0.96; RadIntTotal=0
          SoluteManager
        SoilArbitrator
  Folder ModelComparison
    Folder Summary
  Folder Validation
    Folder Summary
    Folder Detailed
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