Simulations: Version=100
  DataStore
    ExcelInput Observed: FileNames=[LUDF_Validate_Data.xlsx]; SheetNames=[PVtestSlurpExp]
    PredictedObserved: PredictedTableName=ValidationReport; ObservedTableName=ValidationReport; FieldNameUsedForMatch=Date
  Folder StockParameters
    Experiment
      Factors
        Factor PotIntake: Specification=[Friesian].IntakeC[2] = 0.025,0.035,0.050,0.060
      Simulation Base
        Clock: Start=2015-08-01; End=2017-06-30
        Weather: FileName=%root%\Examples\WeatherFiles\lincoln.met
        MicroClimate: a_interception=0; b_interception=1; c_interception=0; d_interception=0; soil_albedo=0.3; SoilHeatFluxFraction=0.4; MinimumHeightDiffForNewLayer=0; NightInterceptionFraction=0.5; ReferenceHeight=2
        Manager ChangeRuminantPRM (disabled)
          Dummy = Incr Pot Intake to 0.05
          FileName = RuminantLUDF.prm
```csharp
using System.Diagnostics;
using APSIM.Shared.Utilities;
using Models.GrazPlan;
using Models.Utilities;
using Models.Core;
using System.IO;
using System;

namespace Models
{
    [Serializable]
    public class Script : Model
    {
        [Link] Clock clock;
        [Link] Stock stock;
        [Link] Simulation simulation;

        [Description("A dummy (not used) string that can be outputted to identify a parameter set or similar:")]
        public string Dummy { get; set; }

        [Description("Name of the new ruminant parameter file - must enter 'None' for default values:")]
        public string FileName { get; set; }

        [EventSubscribe("StartOfSimulation")]
        private void OnStartOfSimulation(object sender, EventArgs e)
        {
            if (FileName.ToLower() != "none")
            {
               var fileName = Path.Combine(Path.GetDirectoryName(simulation.FileName), FileName);
               var xml = File.ReadAllText(fileName);
               stock.AllGenotypes.LoadPRMXml(xml);
         	}
        }
    }
}
```
        Manager ChangeLactatingCowNumber
          Genotype = Friesian
          Sex = Female
          Age = 48
          Weight = 480
          Pregnant = 0
          Lactating = 2
```csharp
using System.Diagnostics;
using APSIM.Shared.Utilities;
using Models.GrazPlan;
using Models.Utilities;
using Models.Core;
using System;

namespace Models
{

    [Serializable]
    public class Script : Model
    {
        [Link] Clock clock;
        [Link] Stock stock;
        [Link] Supplement supplement;
        [Link] ISummary summary;
        [Link] Simulation farm;

        public enum Genotypes
        {
            Friesian,
            Jersey,
            EternalKiwiCross
        }

        [Separator("Stock type info, the same type of stock are brought onto the paddock at each grazing")]

        [Description("Stock: genotype (e.g. Friesian, Jersey):")] 
        public Genotypes Genotype { get; set; }

        [Description("Stock: sex (Female, Male, Castrate):")] 
        public ReproductiveType Sex { get; set; }

        [Description("Stock: age (months):")] 
        public double Age { get; set; }

        [Description("Stock: weight (kg liveweight /head):")] 
        public double Weight { get; set; }

        [Description("Stock: fertility status (0 if non-pregnant or days since conception):")] 
        public int Pregnant { get; set; }

        [Description("Stock: lactation status (0 if non-lactating or days since parturition):")]
        public int Lactating { get; set; }

        public void ChangeStockNum(int NumCowsToChange, string NewLocation)
        {
            if (NumCowsToChange > 0)
            {
                StockBuy purchase = new StockBuy();
                purchase.Genotype = ReflectionUtilities.EnumToString(Genotype);
                purchase.Number = NumCowsToChange; //from the Operations file; positive is buy, negative is sell
                purchase.Sex = Sex;
                purchase.Age = Age;       // age in months
                purchase.Weight = Weight;  // liveweight in kg
                purchase.UseTag = 1;
                purchase.MatedTo = purchase.Genotype;
                purchase.Pregnant = Pregnant;  // days pregnant, 0 = non pregnant, 1 = pregnant
                purchase.Lactating = Lactating;  // 0 for dry, 1 for lactating

                stock.Buy(purchase);
                stock.Move(NewLocation);
            }

            if (NumCowsToChange <0)
            	stock.Sell(-(NumCowsToChange));
        }
    }
}
```
        Supplement: SpoilageTime=0
          Stores:
            Name         Stored   IsRoughage  DMContent  DMD   MEContent  CPConc  ProtDg  PConc   SConc   EEConc  ADIP2CP  AshAlk  MaxPassage
            fodder       0        true        0.85       0     0          0       0       0       0       0       0        0       0
            silage_11me  4500000  true        1          0.76  11         0.17    0.8     0.0032  0.0024  0.02    0.06     0.6     0
        Stock: RandSeed=9999
          Genotype Friesian: sEditor=Andrew Moore; sEditDate=30 Jan 2013; Animal=1; FDairyIntakePeak=0; SRWScalars=[1.2, 1.4]; MaxFleeceDiam=0; bDairyBreed=true; MortRate=[0, 5.53e-05, 5.53e-05]; MortAge=[0, 300, 365]; MortIntensity=0.3; MortCondConst=0.6; MortWtDiff=0.1; GrowthC=[0, 0.0115, 0.27, 0.4, 1.1]; IntakeLactC=[0, 0.85, 0.577, 0.9]; DgProtC=[0, 0.3, 0.25, 0.1, 0.007, 0.005, 0.35, 0.1, 0.1]; ProtC=[0, 0.05, 0.85, 5.5, 0.178, 0.92, 1, 0.6, 0.25, 0.9]; PregScale=[0, 1, 1.15, 0]; BirthWtScale=[0, 0.07, 0.055, 0]; PeakLactC=[0, 0.5, 0.62, 0]; WoolC=[0, 0, 0, 0, 0, 0, 0, 0, 0, 0, 0, 0, 0, 0, 0]; SulfC=[0, 0.07, 0.07, 0, 0.00114]; MethC=[0, 18.4, 0.013, 0.00752, 0.0237, 0.00336, 18.1, 25.29]; AshAlkC=[0, 0.34, 0.28, 1.1]; OvulationPeriod=21; Puberty=[183, 365]; DayLengthConst=[0, 0, 0, 0]; F2=[0, 0.7, 5, 0]; F3=[0, 5.89, 5.89, 0]; ToxaemiaSigs=[0, 0]; DystokiaSigs=[0, 0]; ExposureConsts=[0, 0, 0, 0]; SelfWeanPropn=0.05; MaxYoung=0; BreedSRW=550; PotFleeceWt=0; FleeceRatio=0; PeakMilk=27.5; ConceiveSigs=[[0, 0], [0.7, 5.89], [5, 5.89], [0, 0]]; FertWtDiff=0
            IntakeC=[0, 0.025, 1.7, 0.22, 60, 0.02, 25, 22, 81, 1.7, 0.6, 0.05, 0.15, 0.005, 0.002, 0.5, 1, 0.01, 20, 3, 1.5, 0.7]
            GrazeC=[0, 0.8, 0.17, 1.7, 0.00078, 0.6, 0.00074, 0.5, 150, 0.14, 0.28, 10.5, 0.8, 0.35, 1, 0, 0, 0.012, 1, 1, 11.5]
            EfficC=[0, 0.5, 0.02, 0.85, 0.7, 0.4, 0.02, 0.6, 0.133, 0.95, 0.84, 0.8, 0.7, 0.035, 0.33, 0.12, 0.043]
            MaintC=[0, 0.09, 0.36, 8e-05, 0.84, 0.23, 0.0025, 0.9, 5.2e-05, 0.16, 0.0152, 0.000526, 0.0161, 0.0422, 0.00011, 0.15, 0.0026, 5]
            PregC=[0, 285, 2.2, 1.77, 0.33, 1.8, 2.42, 1.16, 4.11, 343.5, 0.0164, 0.134, 6.22, 0.747]
            LactC=[0, 4, 30, 0.6, 0.105, 0.94, 3.1, 1.17, 0, 0, 0.04, 90, 0.42, 0.58, 0.0357, 0.032, 0.7, 0.01, 0.1, 1.6, 4, 0.0027, 0.004, 3, 0.6, 1.03]
            ChillC=[0, 0.09, 4.1, 1.6, 0.5, 0.7, 0.15, 0.481, 0.619, 1.1, 0.322, 39, 1.5, 5, 0.15, 10, 0.38]
            GainC=[0, 0.6, 0.7, 0.8, -6, 0.4, 0.9, 0.97, 27, 20.3, 2, 13.8, 0.072, 0.14, 0.008, 0.115, 1, 0.5, 1.09]
            PhosC=[0, 0.7, 0.95, 2e-05, 0.003, 4.4e-05, 0.0041, 0.001, 0, 0.00051, 3.7e-06, 0.00051, 3.7e-06, 0.0012, 0.004635, 0.22]
        Operations Stock operations
          2004-09-04  [ChangeLactatingCowNumber].Script.ChangeStockNum(390,Paddock)
          2004-09-11  [ChangeLactatingCowNumber].Script.ChangeStockNum(54,Paddock)
          2004-09-18  [ChangeLactatingCowNumber].Script.ChangeStockNum(46,Paddock)
          2004-09-25  [ChangeLactatingCowNumber].Script.ChangeStockNum(47,Paddock)
          2004-09-27  [ChangeLactatingCowNumber].Script.ChangeStockNum(18,Paddock)
          2004-10-04  [ChangeLactatingCowNumber].Script.ChangeStockNum(20,Paddock)
          2004-10-11  [ChangeLactatingCowNumber].Script.ChangeStockNum(23,Paddock)
          2004-10-18  [ChangeLactatingCowNumber].Script.ChangeStockNum(34,Paddock)
          2004-10-25  [ChangeLactatingCowNumber].Script.ChangeStockNum(8,Paddock)
          2004-10-28  [ChangeLactatingCowNumber].Script.ChangeStockNum(9,Paddock)
          2005-03-25  [ChangeLactatingCowNumber].Script.ChangeStockNum(-5,Paddock)
          2005-03-28  [ChangeLactatingCowNumber].Script.ChangeStockNum(-6,Paddock)
          2005-04-04  [ChangeLactatingCowNumber].Script.ChangeStockNum(-32,Paddock)
          2005-04-11  [ChangeLactatingCowNumber].Script.ChangeStockNum(2,Paddock)
          2005-04-18  [ChangeLactatingCowNumber].Script.ChangeStockNum(-9,Paddock)
          2005-04-25  [ChangeLactatingCowNumber].Script.ChangeStockNum(0,Paddock)
          2005-04-27  [ChangeLactatingCowNumber].Script.ChangeStockNum(-51,Paddock)
          2005-05-04  [ChangeLactatingCowNumber].Script.ChangeStockNum(-67,Paddock)
          2005-05-11  [ChangeLactatingCowNumber].Script.ChangeStockNum(-82,Paddock)
          2005-05-18  [ChangeLactatingCowNumber].Script.ChangeStockNum(2,Paddock)
          2005-05-19  [ChangeLactatingCowNumber].Script.ChangeStockNum(-401,Paddock)
          2005-08-04  [ChangeLactatingCowNumber].Script.ChangeStockNum(98,Paddock)
          2005-08-11  [ChangeLactatingCowNumber].Script.ChangeStockNum(90,Paddock)
          2005-08-18  [ChangeLactatingCowNumber].Script.ChangeStockNum(152,Paddock)
          2005-08-25  [ChangeLactatingCowNumber].Script.ChangeStockNum(44,Paddock)
          2005-08-28  [ChangeLactatingCowNumber].Script.ChangeStockNum(43,Paddock)
          2005-09-04  [ChangeLactatingCowNumber].Script.ChangeStockNum(22,Paddock)
          2005-09-11  [ChangeLactatingCowNumber].Script.ChangeStockNum(31,Paddock)
          2005-09-18  [ChangeLactatingCowNumber].Script.ChangeStockNum(44,Paddock)
          2005-09-25  [ChangeLactatingCowNumber].Script.ChangeStockNum(28,Paddock)
          2005-09-27  [ChangeLactatingCowNumber].Script.ChangeStockNum(33,Paddock)
          2005-10-04  [ChangeLactatingCowNumber].Script.ChangeStockNum(18,Paddock)
          2005-10-11  [ChangeLactatingCowNumber].Script.ChangeStockNum(17,Paddock)
          2005-10-18  [ChangeLactatingCowNumber].Script.ChangeStockNum(7,Paddock)
          2005-10-25  [ChangeLactatingCowNumber].Script.ChangeStockNum(6,Paddock)
          2005-10-28  [ChangeLactatingCowNumber].Script.ChangeStockNum(2,Paddock)
          2005-11-04  [ChangeLactatingCowNumber].Script.ChangeStockNum(7,Paddock)
          2005-11-11  [ChangeLactatingCowNumber].Script.ChangeStockNum(9,Paddock)
          2006-03-04  [ChangeLactatingCowNumber].Script.ChangeStockNum(-7,Paddock)
          2006-03-11  [ChangeLactatingCowNumber].Script.ChangeStockNum(-1,Paddock)
          2006-03-18  [ChangeLactatingCowNumber].Script.ChangeStockNum(-2,Paddock)
          2006-03-25  [ChangeLactatingCowNumber].Script.ChangeStockNum(-8,Paddock)
          2006-03-28  [ChangeLactatingCowNumber].Script.ChangeStockNum(-2,Paddock)
          2006-04-04  [ChangeLactatingCowNumber].Script.ChangeStockNum(-11,Paddock)
          2006-04-11  [ChangeLactatingCowNumber].Script.ChangeStockNum(-11,Paddock)
          2006-04-18  [ChangeLactatingCowNumber].Script.ChangeStockNum(-1,Paddock)
          2006-04-25  [ChangeLactatingCowNumber].Script.ChangeStockNum(-2,Paddock)
          2006-04-27  [ChangeLactatingCowNumber].Script.ChangeStockNum(0,Paddock)
          2006-05-04  [ChangeLactatingCowNumber].Script.ChangeStockNum(-41,Paddock)
          2006-05-11  [ChangeLactatingCowNumber].Script.ChangeStockNum(-37,Paddock)
          2006-05-18  [ChangeLactatingCowNumber].Script.ChangeStockNum(4,Paddock)
          2006-05-25  [ChangeLactatingCowNumber].Script.ChangeStockNum(-251,Paddock)
          2006-05-26  [ChangeLactatingCowNumber].Script.ChangeStockNum(-281,Paddock)
          2006-07-25  [ChangeLactatingCowNumber].Script.ChangeStockNum(26,Paddock)
          2006-07-28  [ChangeLactatingCowNumber].Script.ChangeStockNum(46,Paddock)
          2006-08-04  [ChangeLactatingCowNumber].Script.ChangeStockNum(45,Paddock)
          2006-08-11  [ChangeLactatingCowNumber].Script.ChangeStockNum(87,Paddock)
          2006-08-18  [ChangeLactatingCowNumber].Script.ChangeStockNum(124,Paddock)
          2006-08-25  [ChangeLactatingCowNumber].Script.ChangeStockNum(86,Paddock)
          2006-08-28  [ChangeLactatingCowNumber].Script.ChangeStockNum(44,Paddock)
          2006-09-04  [ChangeLactatingCowNumber].Script.ChangeStockNum(62,Paddock)
          2006-09-11  [ChangeLactatingCowNumber].Script.ChangeStockNum(41,Paddock)
          2006-09-18  [ChangeLactatingCowNumber].Script.ChangeStockNum(22,Paddock)
          2006-09-25  [ChangeLactatingCowNumber].Script.ChangeStockNum(26,Paddock)
          2006-09-27  [ChangeLactatingCowNumber].Script.ChangeStockNum(0,Paddock)
          2006-10-04  [ChangeLactatingCowNumber].Script.ChangeStockNum(20,Paddock)
          2006-10-11  [ChangeLactatingCowNumber].Script.ChangeStockNum(18,Paddock)
          2006-10-18  [ChangeLactatingCowNumber].Script.ChangeStockNum(-2,Paddock)
          2006-10-25  [ChangeLactatingCowNumber].Script.ChangeStockNum(11,Paddock)
          2006-10-28  [ChangeLactatingCowNumber].Script.ChangeStockNum(3,Paddock)
          2006-11-04  [ChangeLactatingCowNumber].Script.ChangeStockNum(0,Paddock)
          2006-11-11  [ChangeLactatingCowNumber].Script.ChangeStockNum(1,Paddock)
          2006-11-18  [ChangeLactatingCowNumber].Script.ChangeStockNum(3,Paddock)
          2006-11-25  [ChangeLactatingCowNumber].Script.ChangeStockNum(2,Paddock)
          2007-03-04  [ChangeLactatingCowNumber].Script.ChangeStockNum(-22,Paddock)
          2007-03-11  [ChangeLactatingCowNumber].Script.ChangeStockNum(-23,Paddock)
          2007-03-18  [ChangeLactatingCowNumber].Script.ChangeStockNum(-4,Paddock)
          2007-03-25  [ChangeLactatingCowNumber].Script.ChangeStockNum(-3,Paddock)
          2007-03-28  [ChangeLactatingCowNumber].Script.ChangeStockNum(-2,Paddock)
          2007-04-04  [ChangeLactatingCowNumber].Script.ChangeStockNum(-1,Paddock)
          2007-04-11  [ChangeLactatingCowNumber].Script.ChangeStockNum(-5,Paddock)
          2007-04-18  [ChangeLactatingCowNumber].Script.ChangeStockNum(0,Paddock)
          2007-04-25  [ChangeLactatingCowNumber].Script.ChangeStockNum(0,Paddock)
          2007-04-27  [ChangeLactatingCowNumber].Script.ChangeStockNum(3,Paddock)
          2007-05-04  [ChangeLactatingCowNumber].Script.ChangeStockNum(-94,Paddock)
          2007-05-11  [ChangeLactatingCowNumber].Script.ChangeStockNum(-10,Paddock)
          2007-05-18  [ChangeLactatingCowNumber].Script.ChangeStockNum(-18,Paddock)
          2007-05-25  [ChangeLactatingCowNumber].Script.ChangeStockNum(-25,Paddock)
          2007-05-26  [ChangeLactatingCowNumber].Script.ChangeStockNum(-461,Paddock)
          2007-07-28  [ChangeLactatingCowNumber].Script.ChangeStockNum(74,Paddock)
          2007-08-04  [ChangeLactatingCowNumber].Script.ChangeStockNum(39,Paddock)
          2007-08-11  [ChangeLactatingCowNumber].Script.ChangeStockNum(98,Paddock)
          2007-08-18  [ChangeLactatingCowNumber].Script.ChangeStockNum(106,Paddock)
          2007-08-25  [ChangeLactatingCowNumber].Script.ChangeStockNum(69,Paddock)
          2007-08-28  [ChangeLactatingCowNumber].Script.ChangeStockNum(47,Paddock)
          2007-09-04  [ChangeLactatingCowNumber].Script.ChangeStockNum(44,Paddock)
          2007-09-11  [ChangeLactatingCowNumber].Script.ChangeStockNum(36,Paddock)
          2007-09-18  [ChangeLactatingCowNumber].Script.ChangeStockNum(47,Paddock)
          2007-09-25  [ChangeLactatingCowNumber].Script.ChangeStockNum(25,Paddock)
          2007-09-29  [ChangeLactatingCowNumber].Script.ChangeStockNum(27,Paddock)
          2007-10-06  [ChangeLactatingCowNumber].Script.ChangeStockNum(16,Paddock)
          2007-10-13  [ChangeLactatingCowNumber].Script.ChangeStockNum(26,Paddock)
          2007-10-20  [ChangeLactatingCowNumber].Script.ChangeStockNum(14,Paddock)
          2007-10-27  [ChangeLactatingCowNumber].Script.ChangeStockNum(10,Paddock)
          2007-11-03  [ChangeLactatingCowNumber].Script.ChangeStockNum(1,Paddock)
          2007-11-10  [ChangeLactatingCowNumber].Script.ChangeStockNum(3,Paddock)
          2008-03-08  [ChangeLactatingCowNumber].Script.ChangeStockNum(-34,Paddock)
          2008-03-15  [ChangeLactatingCowNumber].Script.ChangeStockNum(0,Paddock)
          2008-03-22  [ChangeLactatingCowNumber].Script.ChangeStockNum(0,Paddock)
          2008-03-29  [ChangeLactatingCowNumber].Script.ChangeStockNum(-2,Paddock)
          2008-04-05  [ChangeLactatingCowNumber].Script.ChangeStockNum(-4,Paddock)
          2008-04-12  [ChangeLactatingCowNumber].Script.ChangeStockNum(3,Paddock)
          2008-04-19  [ChangeLactatingCowNumber].Script.ChangeStockNum(-1,Paddock)
          2008-04-26  [ChangeLactatingCowNumber].Script.ChangeStockNum(-2,Paddock)
          2008-05-03  [ChangeLactatingCowNumber].Script.ChangeStockNum(-38,Paddock)
          2008-05-10  [ChangeLactatingCowNumber].Script.ChangeStockNum(-210,Paddock)
          2008-05-17  [ChangeLactatingCowNumber].Script.ChangeStockNum(-24,Paddock)
          2008-05-18  [ChangeLactatingCowNumber].Script.ChangeStockNum(-370,Paddock)
          2008-08-02  [ChangeLactatingCowNumber].Script.ChangeStockNum(63,Paddock)
          2008-08-09  [ChangeLactatingCowNumber].Script.ChangeStockNum(54,Paddock)
          2008-08-16  [ChangeLactatingCowNumber].Script.ChangeStockNum(72,Paddock)
          2008-08-23  [ChangeLactatingCowNumber].Script.ChangeStockNum(121,Paddock)
          2008-08-30  [ChangeLactatingCowNumber].Script.ChangeStockNum(83,Paddock)
          2008-09-06  [ChangeLactatingCowNumber].Script.ChangeStockNum(47,Paddock)
          2008-09-13  [ChangeLactatingCowNumber].Script.ChangeStockNum(59,Paddock)
          2008-09-20  [ChangeLactatingCowNumber].Script.ChangeStockNum(59,Paddock)
          2008-09-27  [ChangeLactatingCowNumber].Script.ChangeStockNum(31,Paddock)
          2008-10-04  [ChangeLactatingCowNumber].Script.ChangeStockNum(31,Paddock)
          2008-10-11  [ChangeLactatingCowNumber].Script.ChangeStockNum(23,Paddock)
          2008-10-18  [ChangeLactatingCowNumber].Script.ChangeStockNum(11,Paddock)
          2008-10-25  [ChangeLactatingCowNumber].Script.ChangeStockNum(8,Paddock)
          2008-11-01  [ChangeLactatingCowNumber].Script.ChangeStockNum(2,Paddock)
          2008-11-08  [ChangeLactatingCowNumber].Script.ChangeStockNum(3,Paddock)
          2008-11-15  [ChangeLactatingCowNumber].Script.ChangeStockNum(10,Paddock)
          2009-02-21  [ChangeLactatingCowNumber].Script.ChangeStockNum(-30,Paddock)
          2009-02-28  [ChangeLactatingCowNumber].Script.ChangeStockNum(-5,Paddock)
          2009-03-07  [ChangeLactatingCowNumber].Script.ChangeStockNum(-9,Paddock)
          2009-03-14  [ChangeLactatingCowNumber].Script.ChangeStockNum(-5,Paddock)
          2009-03-21  [ChangeLactatingCowNumber].Script.ChangeStockNum(2,Paddock)
          2009-03-28  [ChangeLactatingCowNumber].Script.ChangeStockNum(-33,Paddock)
          2009-04-04  [ChangeLactatingCowNumber].Script.ChangeStockNum(-18,Paddock)
          2009-04-11  [ChangeLactatingCowNumber].Script.ChangeStockNum(-19,Paddock)
          2009-04-18  [ChangeLactatingCowNumber].Script.ChangeStockNum(-7,Paddock)
          2009-04-25  [ChangeLactatingCowNumber].Script.ChangeStockNum(-48,Paddock)
          2009-05-02  [ChangeLactatingCowNumber].Script.ChangeStockNum(-11,Paddock)
          2009-05-09  [ChangeLactatingCowNumber].Script.ChangeStockNum(-65,Paddock)
          2009-05-16  [ChangeLactatingCowNumber].Script.ChangeStockNum(-61,Paddock)
          2009-05-23  [ChangeLactatingCowNumber].Script.ChangeStockNum(-33,Paddock)
          2009-05-24  [ChangeLactatingCowNumber].Script.ChangeStockNum(-335,Paddock)
          2009-08-01  [ChangeLactatingCowNumber].Script.ChangeStockNum(90,Paddock)
          2009-08-08  [ChangeLactatingCowNumber].Script.ChangeStockNum(45,Paddock)
          2009-08-15  [ChangeLactatingCowNumber].Script.ChangeStockNum(70,Paddock)
          2009-08-22  [ChangeLactatingCowNumber].Script.ChangeStockNum(107,Paddock)
          2009-08-29  [ChangeLactatingCowNumber].Script.ChangeStockNum(118,Paddock)
          2009-09-05  [ChangeLactatingCowNumber].Script.ChangeStockNum(39,Paddock)
          2009-09-12  [ChangeLactatingCowNumber].Script.ChangeStockNum(74,Paddock)
          2009-09-19  [ChangeLactatingCowNumber].Script.ChangeStockNum(51,Paddock)
          2009-09-26  [ChangeLactatingCowNumber].Script.ChangeStockNum(19,Paddock)
          2009-10-03  [ChangeLactatingCowNumber].Script.ChangeStockNum(26,Paddock)
          2009-10-10  [ChangeLactatingCowNumber].Script.ChangeStockNum(9,Paddock)
          2009-10-17  [ChangeLactatingCowNumber].Script.ChangeStockNum(9,Paddock)
          2010-02-27  [ChangeLactatingCowNumber].Script.ChangeStockNum(-18,Paddock)
          2010-03-06  [ChangeLactatingCowNumber].Script.ChangeStockNum(-9,Paddock)
          2010-03-13  [ChangeLactatingCowNumber].Script.ChangeStockNum(0,Paddock)
          2010-03-20  [ChangeLactatingCowNumber].Script.ChangeStockNum(-11,Paddock)
          2010-03-27  [ChangeLactatingCowNumber].Script.ChangeStockNum(0,Paddock)
          2010-04-03  [ChangeLactatingCowNumber].Script.ChangeStockNum(-8,Paddock)
          2010-04-10  [ChangeLactatingCowNumber].Script.ChangeStockNum(-2,Paddock)
          2010-04-17  [ChangeLactatingCowNumber].Script.ChangeStockNum(-8,Paddock)
          2010-04-24  [ChangeLactatingCowNumber].Script.ChangeStockNum(-32,Paddock)
          2010-05-02  [ChangeLactatingCowNumber].Script.ChangeStockNum(-29,Paddock)
          2010-05-08  [ChangeLactatingCowNumber].Script.ChangeStockNum(0,Paddock)
          2010-05-15  [ChangeLactatingCowNumber].Script.ChangeStockNum(-128,Paddock)
          2010-05-22  [ChangeLactatingCowNumber].Script.ChangeStockNum(-78,Paddock)
          2010-05-23  [ChangeLactatingCowNumber].Script.ChangeStockNum(-334,Paddock)
          2010-07-31  [ChangeLactatingCowNumber].Script.ChangeStockNum(42,Paddock)
          2010-08-07  [ChangeLactatingCowNumber].Script.ChangeStockNum(33,Paddock)
          2010-08-14  [ChangeLactatingCowNumber].Script.ChangeStockNum(56,Paddock)
          2010-08-21  [ChangeLactatingCowNumber].Script.ChangeStockNum(129,Paddock)
          2010-08-28  [ChangeLactatingCowNumber].Script.ChangeStockNum(129,Paddock)
          2010-09-04  [ChangeLactatingCowNumber].Script.ChangeStockNum(84,Paddock)
          2010-09-11  [ChangeLactatingCowNumber].Script.ChangeStockNum(62,Paddock)
          2010-09-18  [ChangeLactatingCowNumber].Script.ChangeStockNum(39,Paddock)
          2010-09-25  [ChangeLactatingCowNumber].Script.ChangeStockNum(38,Paddock)
          2010-10-02  [ChangeLactatingCowNumber].Script.ChangeStockNum(12,Paddock)
          2010-10-09  [ChangeLactatingCowNumber].Script.ChangeStockNum(25,Paddock)
          2010-10-16  [ChangeLactatingCowNumber].Script.ChangeStockNum(13,Paddock)
          2011-04-02  [ChangeLactatingCowNumber].Script.ChangeStockNum(-5,Paddock)
          2011-04-09  [ChangeLactatingCowNumber].Script.ChangeStockNum(-23,Paddock)
          2011-04-16  [ChangeLactatingCowNumber].Script.ChangeStockNum(-19,Paddock)
          2011-04-23  [ChangeLactatingCowNumber].Script.ChangeStockNum(-15,Paddock)
          2011-04-30  [ChangeLactatingCowNumber].Script.ChangeStockNum(-42,Paddock)
          2011-05-07  [ChangeLactatingCowNumber].Script.ChangeStockNum(0,Paddock)
          2011-05-14  [ChangeLactatingCowNumber].Script.ChangeStockNum(-34,Paddock)
          2011-05-21  [ChangeLactatingCowNumber].Script.ChangeStockNum(-51,Paddock)
          2011-05-28  [ChangeLactatingCowNumber].Script.ChangeStockNum(-73,Paddock)
          2011-05-29  [ChangeLactatingCowNumber].Script.ChangeStockNum(-400,Paddock)
          2011-08-06  [ChangeLactatingCowNumber].Script.ChangeStockNum(112,Paddock)
          2011-08-13  [ChangeLactatingCowNumber].Script.ChangeStockNum(98,Paddock)
          2011-08-20  [ChangeLactatingCowNumber].Script.ChangeStockNum(106,Paddock)
          2011-08-27  [ChangeLactatingCowNumber].Script.ChangeStockNum(109,Paddock)
          2011-09-03  [ChangeLactatingCowNumber].Script.ChangeStockNum(40,Paddock)
          2011-09-10  [ChangeLactatingCowNumber].Script.ChangeStockNum(36,Paddock)
          2011-09-17  [ChangeLactatingCowNumber].Script.ChangeStockNum(29,Paddock)
          2011-09-24  [ChangeLactatingCowNumber].Script.ChangeStockNum(29,Paddock)
          2011-10-01  [ChangeLactatingCowNumber].Script.ChangeStockNum(28,Paddock)
          2011-10-08  [ChangeLactatingCowNumber].Script.ChangeStockNum(25,Paddock)
          2011-10-15  [ChangeLactatingCowNumber].Script.ChangeStockNum(18,Paddock)
          2012-03-31  [ChangeLactatingCowNumber].Script.ChangeStockNum(-8,Paddock)
          2012-04-07  [ChangeLactatingCowNumber].Script.ChangeStockNum(-6,Paddock)
          2012-04-14  [ChangeLactatingCowNumber].Script.ChangeStockNum(-1,Paddock)
          2012-04-21  [ChangeLactatingCowNumber].Script.ChangeStockNum(1,Paddock)
          2012-04-28  [ChangeLactatingCowNumber].Script.ChangeStockNum(-34,Paddock)
          2012-05-05  [ChangeLactatingCowNumber].Script.ChangeStockNum(-1,Paddock)
          2012-05-12  [ChangeLactatingCowNumber].Script.ChangeStockNum(-33,Paddock)
          2012-05-19  [ChangeLactatingCowNumber].Script.ChangeStockNum(-9,Paddock)
          2012-05-26  [ChangeLactatingCowNumber].Script.ChangeStockNum(-319,Paddock)
          2012-05-27  [ChangeLactatingCowNumber].Script.ChangeStockNum(-220,Paddock)
          2012-08-04  [ChangeLactatingCowNumber].Script.ChangeStockNum(102,Paddock)
          2012-08-11  [ChangeLactatingCowNumber].Script.ChangeStockNum(108,Paddock)
          2012-08-18  [ChangeLactatingCowNumber].Script.ChangeStockNum(128,Paddock)
          2012-08-25  [ChangeLactatingCowNumber].Script.ChangeStockNum(100,Paddock)
          2012-09-01  [ChangeLactatingCowNumber].Script.ChangeStockNum(54,Paddock)
          2012-09-08  [ChangeLactatingCowNumber].Script.ChangeStockNum(31,Paddock)
          2012-09-15  [ChangeLactatingCowNumber].Script.ChangeStockNum(20,Paddock)
          2012-09-22  [ChangeLactatingCowNumber].Script.ChangeStockNum(27,Paddock)
          2012-09-29  [ChangeLactatingCowNumber].Script.ChangeStockNum(36,Paddock)
          2012-10-06  [ChangeLactatingCowNumber].Script.ChangeStockNum(14,Paddock)
          2012-10-13  [ChangeLactatingCowNumber].Script.ChangeStockNum(3,Paddock)
          2012-10-20  [ChangeLactatingCowNumber].Script.ChangeStockNum(3,Paddock)
          2013-03-23  [ChangeLactatingCowNumber].Script.ChangeStockNum(-3,Paddock)
          2013-03-30  [ChangeLactatingCowNumber].Script.ChangeStockNum(-1,Paddock)
          2013-04-06  [ChangeLactatingCowNumber].Script.ChangeStockNum(-15,Paddock)
          2013-04-13  [ChangeLactatingCowNumber].Script.ChangeStockNum(-9,Paddock)
          2013-04-20  [ChangeLactatingCowNumber].Script.ChangeStockNum(-3,Paddock)
          2013-04-27  [ChangeLactatingCowNumber].Script.ChangeStockNum(-46,Paddock)
          2013-05-04  [ChangeLactatingCowNumber].Script.ChangeStockNum(-35,Paddock)
          2013-05-11  [ChangeLactatingCowNumber].Script.ChangeStockNum(-6,Paddock)
          2013-05-18  [ChangeLactatingCowNumber].Script.ChangeStockNum(-79,Paddock)
          2013-05-19  [ChangeLactatingCowNumber].Script.ChangeStockNum(-429,Paddock)
          2013-08-10  [ChangeLactatingCowNumber].Script.ChangeStockNum(173,Paddock)
          2013-08-17  [ChangeLactatingCowNumber].Script.ChangeStockNum(38,Paddock)
          2013-08-24  [ChangeLactatingCowNumber].Script.ChangeStockNum(170,Paddock)
          2013-08-31  [ChangeLactatingCowNumber].Script.ChangeStockNum(71,Paddock)
          2013-09-07  [ChangeLactatingCowNumber].Script.ChangeStockNum(58,Paddock)
          2013-09-14  [ChangeLactatingCowNumber].Script.ChangeStockNum(22,Paddock)
          2013-09-21  [ChangeLactatingCowNumber].Script.ChangeStockNum(37,Paddock)
          2013-09-28  [ChangeLactatingCowNumber].Script.ChangeStockNum(18,Paddock)
          2013-10-05  [ChangeLactatingCowNumber].Script.ChangeStockNum(27,Paddock)
          2013-10-12  [ChangeLactatingCowNumber].Script.ChangeStockNum(9,Paddock)
          2014-03-01  [ChangeLactatingCowNumber].Script.ChangeStockNum(-2,Paddock)
          2014-03-08  [ChangeLactatingCowNumber].Script.ChangeStockNum(-57,Paddock)
          2014-03-15  [ChangeLactatingCowNumber].Script.ChangeStockNum(-33,Paddock)
          2014-03-22  [ChangeLactatingCowNumber].Script.ChangeStockNum(-15,Paddock)
          2014-03-29  [ChangeLactatingCowNumber].Script.ChangeStockNum(-9,Paddock)
          2014-04-05  [ChangeLactatingCowNumber].Script.ChangeStockNum(-1,Paddock)
          2014-04-12  [ChangeLactatingCowNumber].Script.ChangeStockNum(-3,Paddock)
          2014-04-19  [ChangeLactatingCowNumber].Script.ChangeStockNum(-14,Paddock)
          2014-04-26  [ChangeLactatingCowNumber].Script.ChangeStockNum(-17,Paddock)
          2014-05-03  [ChangeLactatingCowNumber].Script.ChangeStockNum(-115,Paddock)
          2014-05-10  [ChangeLactatingCowNumber].Script.ChangeStockNum(-102,Paddock)
          2014-05-17  [ChangeLactatingCowNumber].Script.ChangeStockNum(4,Paddock)
          2014-05-18  [ChangeLactatingCowNumber].Script.ChangeStockNum(-259,Paddock)
          2014-08-09  [ChangeLactatingCowNumber].Script.ChangeStockNum(137,Paddock)
          2014-08-16  [ChangeLactatingCowNumber].Script.ChangeStockNum(109,Paddock)
          2014-08-23  [ChangeLactatingCowNumber].Script.ChangeStockNum(94,Paddock)
          2014-08-30  [ChangeLactatingCowNumber].Script.ChangeStockNum(61,Paddock)
          2014-09-06  [ChangeLactatingCowNumber].Script.ChangeStockNum(45,Paddock)
          2014-09-13  [ChangeLactatingCowNumber].Script.ChangeStockNum(49,Paddock)
          2014-09-20  [ChangeLactatingCowNumber].Script.ChangeStockNum(29,Paddock)
          2014-09-27  [ChangeLactatingCowNumber].Script.ChangeStockNum(12,Paddock)
          2014-10-04  [ChangeLactatingCowNumber].Script.ChangeStockNum(7,Paddock)
          2014-10-11  [ChangeLactatingCowNumber].Script.ChangeStockNum(11,Paddock)
          2014-10-18  [ChangeLactatingCowNumber].Script.ChangeStockNum(1,Paddock)
          2014-10-25  [ChangeLactatingCowNumber].Script.ChangeStockNum(3,Paddock)
          2015-02-21  [ChangeLactatingCowNumber].Script.ChangeStockNum(-10,Paddock)
          2015-02-28  [ChangeLactatingCowNumber].Script.ChangeStockNum(-75,Paddock)
          2015-03-07  [ChangeLactatingCowNumber].Script.ChangeStockNum(-5,Paddock)
          2015-03-14  [ChangeLactatingCowNumber].Script.ChangeStockNum(0,Paddock)
          2015-03-21  [ChangeLactatingCowNumber].Script.ChangeStockNum(1,Paddock)
          2015-03-28  [ChangeLactatingCowNumber].Script.ChangeStockNum(2,Paddock)
          2015-04-04  [ChangeLactatingCowNumber].Script.ChangeStockNum(-2,Paddock)
          2015-04-11  [ChangeLactatingCowNumber].Script.ChangeStockNum(0,Paddock)
          2015-04-18  [ChangeLactatingCowNumber].Script.ChangeStockNum(0,Paddock)
          2015-04-25  [ChangeLactatingCowNumber].Script.ChangeStockNum(-3,Paddock)
          2015-05-02  [ChangeLactatingCowNumber].Script.ChangeStockNum(2,Paddock)
          2015-05-09  [ChangeLactatingCowNumber].Script.ChangeStockNum(-35,Paddock)
          2015-05-16  [ChangeLactatingCowNumber].Script.ChangeStockNum(-31,Paddock)
          2015-05-23  [ChangeLactatingCowNumber].Script.ChangeStockNum(-76,Paddock)
          2015-05-28  [ChangeLactatingCowNumber].Script.ChangeStockNum(0,Paddock)
          2015-05-29  [ChangeLactatingCowNumber].Script.ChangeStockNum(-326,Paddock)
          2015-08-01  [ChangeLactatingCowNumber].Script.ChangeStockNum(69,Paddock)
          2015-08-08  [ChangeLactatingCowNumber].Script.ChangeStockNum(67,Paddock)
          2015-08-15  [ChangeLactatingCowNumber].Script.ChangeStockNum(81,Paddock)
          2015-08-22  [ChangeLactatingCowNumber].Script.ChangeStockNum(103,Paddock)
          2015-08-29  [ChangeLactatingCowNumber].Script.ChangeStockNum(86,Paddock)
          2015-09-05  [ChangeLactatingCowNumber].Script.ChangeStockNum(40,Paddock)
          2015-09-12  [ChangeLactatingCowNumber].Script.ChangeStockNum(30,Paddock)
          2015-09-19  [ChangeLactatingCowNumber].Script.ChangeStockNum(18,Paddock)
          2015-09-26  [ChangeLactatingCowNumber].Script.ChangeStockNum(29,Paddock)
          2015-10-03  [ChangeLactatingCowNumber].Script.ChangeStockNum(16,Paddock)
          2015-10-10  [ChangeLactatingCowNumber].Script.ChangeStockNum(6,Paddock)
          2015-10-17  [ChangeLactatingCowNumber].Script.ChangeStockNum(7,Paddock)
          2015-10-24  [ChangeLactatingCowNumber].Script.ChangeStockNum(-1,Paddock)
          2015-10-31  [ChangeLactatingCowNumber].Script.ChangeStockNum(4,Paddock)
          2016-03-26  [ChangeLactatingCowNumber].Script.ChangeStockNum(-10,Paddock)
          2016-04-02  [ChangeLactatingCowNumber].Script.ChangeStockNum(-4,Paddock)
          2016-04-09  [ChangeLactatingCowNumber].Script.ChangeStockNum(-3,Paddock)
          2016-04-16  [ChangeLactatingCowNumber].Script.ChangeStockNum(2,Paddock)
          2016-04-23  [ChangeLactatingCowNumber].Script.ChangeStockNum(-20,Paddock)
          2016-04-30  [ChangeLactatingCowNumber].Script.ChangeStockNum(0,Paddock)
          2016-05-07  [ChangeLactatingCowNumber].Script.ChangeStockNum(-115,Paddock)
          2016-05-14  [ChangeLactatingCowNumber].Script.ChangeStockNum(0,Paddock)
          2016-05-21  [ChangeLactatingCowNumber].Script.ChangeStockNum(0,Paddock)
          2016-05-22  [ChangeLactatingCowNumber].Script.ChangeStockNum(-405,Paddock)
          2016-07-30  [ChangeLactatingCowNumber].Script.ChangeStockNum(56,Paddock)
          2016-08-06  [ChangeLactatingCowNumber].Script.ChangeStockNum(63,Paddock)
          2016-08-13  [ChangeLactatingCowNumber].Script.ChangeStockNum(86,Paddock)
          2016-08-20  [ChangeLactatingCowNumber].Script.ChangeStockNum(110,Paddock)
          2016-08-27  [ChangeLactatingCowNumber].Script.ChangeStockNum(59,Paddock)
          2016-09-03  [ChangeLactatingCowNumber].Script.ChangeStockNum(45,Paddock)
          2016-09-10  [ChangeLactatingCowNumber].Script.ChangeStockNum(30,Paddock)
          2016-09-17  [ChangeLactatingCowNumber].Script.ChangeStockNum(35,Paddock)
          2016-09-24  [ChangeLactatingCowNumber].Script.ChangeStockNum(18,Paddock)
          2016-10-01  [ChangeLactatingCowNumber].Script.ChangeStockNum(29,Paddock)
          2016-10-08  [ChangeLactatingCowNumber].Script.ChangeStockNum(12,Paddock)
          2016-10-15  [ChangeLactatingCowNumber].Script.ChangeStockNum(11,Paddock)
          2016-10-22  [ChangeLactatingCowNumber].Script.ChangeStockNum(0,Paddock)
          2017-03-04  [ChangeLactatingCowNumber].Script.ChangeStockNum(12,Paddock)
          2017-03-11  [ChangeLactatingCowNumber].Script.ChangeStockNum(-28,Paddock)
          2017-03-18  [ChangeLactatingCowNumber].Script.ChangeStockNum(-1,Paddock)
          2017-03-25  [ChangeLactatingCowNumber].Script.ChangeStockNum(3,Paddock)
          2017-04-01  [ChangeLactatingCowNumber].Script.ChangeStockNum(1,Paddock)
          2017-04-08  [ChangeLactatingCowNumber].Script.ChangeStockNum(-1,Paddock)
          2017-04-15  [ChangeLactatingCowNumber].Script.ChangeStockNum(0,Paddock)
          2017-04-22  [ChangeLactatingCowNumber].Script.ChangeStockNum(-8,Paddock)
          2017-04-29  [ChangeLactatingCowNumber].Script.ChangeStockNum(-2,Paddock)
          2017-05-06  [ChangeLactatingCowNumber].Script.ChangeStockNum(-7,Paddock)
          2017-05-13  [ChangeLactatingCowNumber].Script.ChangeStockNum(-1,Paddock)
          2017-05-20  [ChangeLactatingCowNumber].Script.ChangeStockNum(-50,Paddock)
          2017-05-21  [ChangeLactatingCowNumber].Script.ChangeStockNum(-472,Paddock)
        Summary SummaryFile
        Zone Paddock: Area=1; Slope=0; AspectAngle=0; Altitude=50
          Manager SlurpPreGrazingSet
            SSheetFileName = LUDF_InputPasture.xlsx
            SSheetWorksheetName = InputPastureEtc
            GrazedArea = 0
            SupplementOffered = 0
```csharp
using System.Diagnostics;
using System.IO;
using System.Data;
using Models.PMF.Organs;
using Models.PMF;
using APSIM.Shared.Utilities;
using Models.GrazPlan;
using Models.Utilities;
using Models.Core;
using System;
    
namespace Models
{
    [Serializable]
    public class Script : Model
    {
        [Link] Clock clock;
        [Link] Plant slurp;
        [Link] Simulation simulation;
        [Link] Zone paddock;
        [Link] Stock stock;
        [Link] Supplement supplement;
        [Link] Summary summary;

        [NonSerialized]
        private DataView data;

        [NonSerialized]
        private SimpleLeaf slurpLeaf;

        [Separator("Slurp will be automatically 'sown' at the sart of the simulation")]

        [Description("EXCEL file name with the resetting data (must be .xlsx)")]
        [Display(Type=DisplayType.FileName)]
        public string SSheetFileName { get; set; }

        [Description ("Name of worksheet containing the data")]
        public string SSheetWorksheetName { get; set; }

        public double GrazedArea { get; set; }

        public double SupplementOffered { get; set; }

        [EventSubscribe("StartOfSimulation")]
        private void OnStartOfSimulation(object sender, EventArgs e)
        {
            var fullFileName = SSheetFileName;
            if (simulation != null && simulation.FileName != null)
                fullFileName = PathUtilities.GetAbsolutePath(SSheetFileName, simulation.FileName);

            if (!File.Exists(fullFileName))
                throw new Exception("Cannot find file: " + fullFileName);
            data = new DataView(ExcelUtilities.ReadExcelFileData(fullFileName, SSheetWorksheetName, headerRow:true));

            slurpLeaf = Apsim.Child(slurp, typeof(SimpleLeaf)) as SimpleLeaf;

            double wt = 300;
            slurpLeaf.Live.StructuralWt = wt;
            slurpLeaf.Live.StorageWt = 0;
            slurpLeaf.Live.StructuralN = wt * slurpLeaf.MinNconc;
            slurpLeaf.Live.StorageN = wt * slurpLeaf.MaxNconc - slurpLeaf.Live.StructuralN;

            supplement.SpoilageTime = 0.0; //days
        }

        [EventSubscribe("DoManagement")]
        private void OnDoManagement(object sender, EventArgs e)
        {
            double DM = 0.0;
            double digestibility = 0.0;


            // Find last area grazed 
            double oldGrazedArea = GrazedArea;
            data.RowFilter = "Date <=#" + clock.Today.ToString("yyyy-MM-dd") + "# and GrazedArea >0";
            if (data.Count > 0)
            {
                var mostRecentRow = data[data.Count-1];
                if (!Convert.IsDBNull(mostRecentRow["GrazedArea"]))
                    GrazedArea = Convert.ToDouble(mostRecentRow["GrazedArea"]); 
                if (GrazedArea != oldGrazedArea)
                {
                    paddock.Area = GrazedArea;
                }
            }

            // Find last DM value - This will be the most recent day.
            data.RowFilter = "Date <=#" + clock.Today.ToString("yyyy-MM-dd") + "# and PreGrazingCover >0";
            if (data.Count > 0)
            {
                var mostRecentRow = data[data.Count-1];

                if (!Convert.IsDBNull(mostRecentRow["PreGrazingCover"]))
                    DM = Convert.ToDouble(mostRecentRow["PreGrazingCover"]) / 10; // to g/m2
            }

            // Find last ME value - This will be the most recent day.
            data.RowFilter = "Date <=#" + clock.Today.ToString("yyyy-MM-dd") + "# and PastureMEConc >0";
            if (data.Count > 0)
            {
                var mostRecentRow = data[data.Count-1];

                if (!Convert.IsDBNull(mostRecentRow["PastureMEConc"]))
                    digestibility = Convert.ToDouble(mostRecentRow["PastureDigestibility"]);
            }
            if (digestibility == 0)
                digestibility = 0.84;

            if (DM > 0)
            {
                slurpLeaf.Live.StructuralWt = DM;
                slurpLeaf.Live.StorageWt = 0;
                slurpLeaf.Live.DMDOfStructural = digestibility;
                slurpLeaf.Live.StructuralN = DM * slurpLeaf.MinNconc;
                slurpLeaf.Live.StorageN = DM * slurpLeaf.MaxNconc - slurpLeaf.Live.StructuralN;
            }

            // Handle the supplements, find last supplemenet value - This will be the most recent day.
            SupplementOffered = 0.0;
            //data.RowFilter = "Date <=#" + clock.Today.ToString("yyyy-MM-dd") + "# and SupplementOffered >0";
            data.RowFilter = "Date <=#" + clock.Today.ToString("yyyy-MM-dd") + "#";  // I want to retain the 0 values this time as they are meaningful (not just blank)
            if (data.Count > 0)
            {
                var mostRecentRow = data[data.Count-1];

                if (!Convert.IsDBNull(mostRecentRow["SupplementOffered"]))
                    SupplementOffered = Convert.ToDouble(mostRecentRow["SupplementOffered"]); 
            }

            if (SupplementOffered > 0.0)
            {
                // don't need to buy - set up the store with sufficient before the simulation started
                //supplement.Buy(stock.NumberAll * supplementOffered, "Silage_11ME"); 
                supplement.Feed("Silage_11ME", stock.NumberAll * SupplementOffered, "Paddock", false);  //should be true but will through an error

                summary.WriteMessage(this, "Total supp offered = " + (stock.NumberAll * SupplementOffered).ToString());
                summary.WriteMessage(this, supplement.PaddAmounts[1].ToString());
            }
            // Columns in spreadsheet:
            // Date
            // Pasture_Growth_Rate    (kgDM/ha/day)
            // Pre_Cover  (kgDM/ha)
            // Post_Cover (kgDM/ha)
            // PastureOffered_Obs (kgDM/cow/d)
            // PastureOffered_ObsMJ (MJME/cow/d)
            // PastureOffered_Mlcalc (MJME/kgDM)
            // Milkers offered Grass Silage (kgDM/cow/d)
            // ME Silage Obs or Assumed (MJME/kgDM)
            // EstmSilageIntake_Obs (MJME)
            // EstmSilageIntake_Calc (MJME)
            // EstmTotalIntake_Obs (MJME)
            // EstmTotalIntake_Calc (MJME)
            // Pasture_ME (ME/kgDM)
            // Pasture_Protein (%)
            // Pasture_DM (%)
            // Pasture_WSC (%)
            // Pasture_NDF (%)
            // Digestability
        }
    }
}
```
          Plant Slurp
          SurfaceOrganicMatter: InitialResidueName=wheat_stubble; InitialResidueType=wheat; InitialResidueMass=0; InitialStandingFraction=0; InitialCPR=0; InitialCNR=100
          Soil: ASCOrder=Vertosol; ASCSubOrder=Black; SoilType=Clay; Site=Norwin; NearestTown=Norwin; Region=Darling Downs and Granite Belt; State=Queensland; Country=Australia; NaturalVegetation=Qld. Bluegrass, possible Qld. Blue gum; ApsoilNumber=900; Latitude=-27.581836; Longitude=151.320206; LocationAccuracy=+/- 20m
            DataSource=CSIRO Sustainable Ecosystems, Toowoomba; Characteriesd as part of the GRDC funded project"Doing it better, doing it smarter, managing soil water in Australian agriculture' 2011
            Comments=OC, CLL for all crops estimated-based on Bongeen Mywybilla Soil No1
            Physical
              Thickness  BD       AirDry    LL15      DUL       SAT       KS
              150        1.01056  0.13025   0.2605    0.521     0.588655  20
              150        1.07146  0.198689  0.248362  0.496723  0.565677  20
              300        1.09394  0.28      0.28      0.488438  0.557193  20
              300        1.15861  0.28      0.28      0.480297  0.532787  20
              300        1.17301  0.28      0.28      0.471584  0.527354  20
              300        1.16287  0.28      0.28      0.457071  0.53118   20
              300        1.1875   0.28      0.28      0.452332  0.521888  20
              SoilCrop SlurpSoil: LL=[0.261, 0.248, 0.28, 0.306, 0.36, 0.392, 0.446]; KL=[0.06, 0.06, 0.06, 0.04, 0.04, 0.02, 0.01]; XF=[1, 1, 1, 1, 1, 1, 1]
            WaterBalance SoilWater: SummerDate=1-Nov; SummerU=5; SummerCona=5; WinterDate=1-Apr; WinterU=5; WinterCona=5; DiffusConst=40; DiffusSlope=16; Salb=0.12; CN2Bare=73; CNRed=20; CNCov=0.8; Thickness=[150, 150, 300, 300, 300, 300, 300]; SWCON=[0.3, 0.3, 0.3, 0.3, 0.3, 0.3, 0.3]
            SoilNitrogen: fom_types=[default, manure, mucuna, lablab, shemp, stable]; fract_carb=[0.2, 0.3, 0.54, 0.57, 0.45, 0]; fract_cell=[0.7, 0.3, 0.37, 0.37, 0.47, 0.1]; fract_lign=[0.1, 0.4, 0.09, 0.06, 0.08, 0.9]
              SoilNitrogenNO3 NO3
              SoilNitrogenNH4 NH4
              SoilNitrogenUrea Urea
              SoilNitrogenPlantAvailableNO3 PlantAvailableNO3
              SoilNitrogenPlantAvailableNH4 PlantAvailableNH4
            Organic: FOMCNRatio=40
              Thickness  Carbon  SoilCNRatio  FBiom  FInert  FOM
              150        1.2     12           0.04   0.4     347.129
              150        0.96    12           0.02   0.6     270.344
              300        0.6     12           0.02   0.8     163.972
              300        0.3     12           0.02   1       99.4541
              300        0.18    12           0.01   1       60.322
              300        0.12    12           0.01   1       36.5871
              300        0.12    12           0.01   1       22.1912
            Chemical
              Thickness  NO3N  NH4N  PH
              150        1     0.1   8
              150        1     0.1   8
              300        1     0.1   8
              300        1     0.1   8
              300        1     0.1   8
              300        1     0.1   8
              300        1     0.1   8
            InitialWater: PercentMethod=1; FractionFull=1
            Sample InitialN: Thickness=[150, 150, 300, 300, 300, 300, 300]; SWUnits=Volumetric; OCUnits=Total; PHUnits=Water
            CERESSoilTemperature
          Report: EventNames=[Clock].EndOfDay
            VariableNames:
              [Clock].Today
              [Slurp].Leaf.Live.Wt
              [Slurp].Leaf.Live.N
              [Slurp].Leaf.LAI
              [Stock].NumberAll
              [Stock].WeightAll
              [Stock].IntakeAll.Weight
              [Paddock].Area
              [SlurpPreGrazingSet].Script.GrazedArea
              [Slurp].Leaf.MaximumNConc.FixedValue
        Report ValidationReport: EventNames=[Clock].EndOfDay
          VariableNames:
            //[ChangeRuminantPRM].Script.Dummy as Description
            //[ChangeRuminantPRM].Script.FileName as ParameterSet
            [Clock].Today as Date
            [Stock].NumberAll as CowNumberInMilk
            [Stock].WeightAll as CowWeight // kg
            [Stock].IntakeAll.Weight as CowIntake // kg DM /head /day
            [Stock].PastIntakeAll.Weight as CowPastureIntake // kg DM /head /day
            [Stock].SuppIntakeAll.Weight as CowSilageIntake // kg DM /head /day
            ([Stock].MilkWtAll * 0.04 * 0.80 + [Stock].MilkWtAll * 0.04) as MilkSolids // kg MS /head /day - 0.80 is the average Protein:Fat ratio from LUDF data, the NZ national average is 0.77 https://www.dairynz.co.nz/media/816845/WEB_Protein-to-fat-ratio.pdf
            [Paddock].Area as GrazedArea
            [Stock].CondScoreAll as ConditionScore1to5 // spurious
            [SlurpPreGrazingSet].Script.SupplementOffered
            //[SlurpPreGrazingSet].Script.SupplementOffered - [Stock].SuppIntakeAll.Weight * [Stock].NumberAll as SilageUneaten
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