Simulations: Version=80
  DataStore
    ExcelInput Observed: FileNames=[Observed.xlsx]
      SheetNames=[ObservedProfileWater, ObservedResidues, ObservedLayerWater]
    PredictedObserved SoilWaterContents: PredictedTableName=Report; ObservedTableName=ObservedProfileWater; FieldNameUsedForMatch=Clock.Today
      Tests: POName=SoilWaterContents
        AcceptedStats:
          {Name=MeasuredProfile, n=507, Slope=0.784681, Intercept=49.4962, SEslope=0.0195802, SEintercept=3.48567, R2=0.760781, RMSE=24.5562, NSE=0.679317, ME=12.3196, MAE=21.1431, RSR=0.56573}
        AcceptedStatsName=Name n Slope Intercept SEslope SEintercept R2 RMSE NSE ME MAE RSR
  Replacements
    Report ReportWaterLayers: EventNames=[Clock].DoReport
      VariableNames:
        [Clock].Today
        [Soil].OutputLayers.SWmm
        [Soil].OutputLayers.SW
    Report ReportWaterBalance: EventNames=[Clock].DoReport
      VariableNames:
        [Clock].Today
        [Soil].WEIRDO.Drainage
        [Soil].WEIRDO.Infiltration
        [Soil].WEIRDO.Runoff
        [Soil].WEIRDO.Es
        [Soil].WEIRDO.WaterExtraction
        [Soil].WEIRDO.pond
        sum([Soil].WEIRDO.SWmm) as ProfileWater
    Report ReportCrop: EventNames=[Clock].DoReport
      VariableNames:
        [Clock].Today
        [Slurp].Leaf.CoverTotal
        [Slurp].Leaf.LAI
        [Slurp].Leaf.Height
        [Slurp].Root.LengthDensity
        [Slurp].Leaf.PotentialEP
        [Slurp].Root.Depth
    Report ReportMetVariables: EventNames=[Clock].DoReport
      VariableNames:
        [Clock].Today
        [IWeather].MaxT
        [IWeather].MinT
        [IWeather].Radn
        [IWeather].Rain
        [IWeather].VP
        [IWeather].Wind
        [Soil].WEIRDO.Eo
        [Soil].WEIRDO.Eos
    Plant Slurp: CropType=Slurp; IsAlive=false; IsEnding=false; DaysAfterEnding=0
  Folder Validation
    Experiment LandP
      Memo
        In this test we run Slurp against a dataset of Soil water content measured over 3 years under lucerne with different irrigation treatments applied.  Slurp was able to reproduce the tempeoral patterns of the 4 different irrigation treatments with adequate accuracy.
      Factors
        Factor Irrigation
          CompositeFactor TwoPerWeek
            Specifications:
              [IrrigationEvents]
              [SetCropVariables].Script.Irrigation = High
            Operations IrrigationEvents
              2011-11-07  [Irrigation].Apply(amount:30.0, duration:60.0);
              2011-11-25  [Irrigation].Apply(amount:13.6, duration:60.0);
              2011-11-28  [Irrigation].Apply(amount:20.1, duration:60.0);
              2011-11-29  [Irrigation].Apply(amount:16.4, duration:60.0);
              2011-12-05  [Irrigation].Apply(amount:27.0, duration:60.0);
              2011-12-15  [Irrigation].Apply(amount:8.0, duration:60.0);
              2011-12-26  [Irrigation].Apply(amount:22.5, duration:60.0);
              2011-12-29  [Irrigation].Apply(amount:16.5, duration:60.0);
              2012-01-05  [Irrigation].Apply(amount:22.8, duration:60.0);
              2012-01-09  [Irrigation].Apply(amount:17.8, duration:60.0);
              2012-01-12  [Irrigation].Apply(amount:9.1, duration:60.0);
              2012-01-16  [Irrigation].Apply(amount:18.3, duration:60.0);
              2012-01-19  [Irrigation].Apply(amount:18.6, duration:60.0);
              2012-01-23  [Irrigation].Apply(amount:22.5, duration:60.0);
              2012-01-30  [Irrigation].Apply(amount:8.0, duration:60.0);
              2012-02-02  [Irrigation].Apply(amount:12.0, duration:60.0);
              2012-02-07  [Irrigation].Apply(amount:16.5, duration:60.0);
              2012-02-09  [Irrigation].Apply(amount:13.3, duration:60.0);
              2012-02-13  [Irrigation].Apply(amount:12.2, duration:60.0);
              2012-02-20  [Irrigation].Apply(amount:13.3, duration:60.0);
              2012-02-23  [Irrigation].Apply(amount:8.8, duration:60.0);
              2012-03-29  [Irrigation].Apply(amount:10.0, duration:60.0);
              2012-04-02  [Irrigation].Apply(amount:6.5, duration:60.0);
              2012-04-05  [Irrigation].Apply(amount:5.0, duration:60.0);
              2012-04-10  [Irrigation].Apply(amount:6.9, duration:60.0);
              2012-04-26  [Irrigation].Apply(amount:4.6, duration:60.0);
              2012-04-30  [Irrigation].Apply(amount:6.9, duration:60.0);
              2012-05-03  [Irrigation].Apply(amount:3.2, duration:60.0);
              2012-11-01  [Irrigation].Apply(amount:18.0, duration:60.0);
              2012-11-15  [Irrigation].Apply(amount:12.0, duration:60.0);
              2012-11-22  [Irrigation].Apply(amount:12.0, duration:60.0);
              2012-11-26  [Irrigation].Apply(amount:12.0, duration:60.0);
              2012-11-29  [Irrigation].Apply(amount:12.0, duration:60.0);
              2012-12-03  [Irrigation].Apply(amount:6.0, duration:60.0);
              2012-12-06  [Irrigation].Apply(amount:12.0, duration:60.0);
              2012-12-13  [Irrigation].Apply(amount:12.0, duration:60.0);
              2012-12-17  [Irrigation].Apply(amount:20.8, duration:60.0);
              2012-12-20  [Irrigation].Apply(amount:12.0, duration:60.0);
              2012-12-24  [Irrigation].Apply(amount:12.0, duration:60.0);
              2012-12-27  [Irrigation].Apply(amount:9.0, duration:60.0);
              2012-12-31  [Irrigation].Apply(amount:12.0, duration:60.0);
              2013-01-03  [Irrigation].Apply(amount:12.0, duration:60.0);
              2013-01-07  [Irrigation].Apply(amount:18.0, duration:60.0);
              2013-01-10  [Irrigation].Apply(amount:18.0, duration:60.0);
              2013-01-14  [Irrigation].Apply(amount:21.0, duration:60.0);
              2013-01-21  [Irrigation].Apply(amount:15.0, duration:60.0);
              2013-01-24  [Irrigation].Apply(amount:15.0, duration:60.0);
              2013-01-28  [Irrigation].Apply(amount:15.0, duration:60.0);
              2013-01-31  [Irrigation].Apply(amount:15.0, duration:60.0);
              2013-02-04  [Irrigation].Apply(amount:18.0, duration:60.0);
              2013-02-07  [Irrigation].Apply(amount:6.0, duration:60.0);
              2013-02-11  [Irrigation].Apply(amount:18.7, duration:60.0);
              2013-02-14  [Irrigation].Apply(amount:13.5, duration:60.0);
              2013-02-18  [Irrigation].Apply(amount:15.0, duration:60.0);
              2013-02-21  [Irrigation].Apply(amount:15.0, duration:60.0);
              2013-02-25  [Irrigation].Apply(amount:15.0, duration:60.0);
              2013-02-28  [Irrigation].Apply(amount:32.0, duration:60.0);
              2013-03-07  [Irrigation].Apply(amount:12.0, duration:60.0);
              2013-03-11  [Irrigation].Apply(amount:9.0, duration:60.0);
              2013-03-14  [Irrigation].Apply(amount:9.0, duration:60.0);
              2013-03-28  [Irrigation].Apply(amount:18.0, duration:60.0);
              2013-04-04  [Irrigation].Apply(amount:9.0, duration:60.0);
              2013-04-11  [Irrigation].Apply(amount:9.0, duration:60.0);
              2013-10-24  [Irrigation].Apply(amount:9.0, duration:60.0);
              2013-10-31  [Irrigation].Apply(amount:15.0, duration:60.0);
              2013-11-04  [Irrigation].Apply(amount:6.0, duration:60.0);
              2013-11-07  [Irrigation].Apply(amount:9.0, duration:60.0);
              2013-11-11  [Irrigation].Apply(amount:9.0, duration:60.0);
              2013-11-14  [Irrigation].Apply(amount:9.0, duration:60.0);
              2013-11-18  [Irrigation].Apply(amount:12.0, duration:60.0);
              2013-11-21  [Irrigation].Apply(amount:12.0, duration:60.0);
              2013-11-25  [Irrigation].Apply(amount:9.0, duration:60.0);
              2013-12-02  [Irrigation].Apply(amount:9.0, duration:60.0);
              2013-12-05  [Irrigation].Apply(amount:12.0, duration:60.0);
              2013-12-09  [Irrigation].Apply(amount:6.0, duration:60.0);
              2013-12-12  [Irrigation].Apply(amount:11.0, duration:60.0);
              2013-12-17  [Irrigation].Apply(amount:15.0, duration:60.0);
              2013-12-23  [Irrigation].Apply(amount:7.0, duration:60.0);
              2014-01-06  [Irrigation].Apply(amount:14.0, duration:60.0);
              2014-01-09  [Irrigation].Apply(amount:12.6, duration:60.0);
              2014-01-13  [Irrigation].Apply(amount:15.7, duration:60.0);
              2014-01-16  [Irrigation].Apply(amount:14.7, duration:60.0);
              2014-01-20  [Irrigation].Apply(amount:17.5, duration:60.0);
              2014-01-23  [Irrigation].Apply(amount:7.5, duration:60.0);
              2014-01-30  [Irrigation].Apply(amount:10.0, duration:60.0);
              2014-02-03  [Irrigation].Apply(amount:12.0, duration:60.0);
              2014-02-05  [Irrigation].Apply(amount:10.0, duration:60.0);
              2014-02-10  [Irrigation].Apply(amount:9.0, duration:60.0);
              2014-02-17  [Irrigation].Apply(amount:10.0, duration:60.0);
              2014-02-20  [Irrigation].Apply(amount:10.0, duration:60.0);
          CompositeFactor ThreeWeekly
            Specifications:
              [IrrigationEvents]
              [SetCropVariables].Script.Irrigation = Low
            Operations IrrigationEvents
              2011-11-07  [Irrigation].Apply(amount:30.0, duration:60.0);
              2011-11-29  [Irrigation].Apply(amount:47.6, duration:60.0);
              2011-12-15  [Irrigation].Apply(amount:34.9, duration:60.0);
              2011-12-29  [Irrigation].Apply(amount:41.8, duration:60.0);
              2012-01-12  [Irrigation].Apply(amount:49.8, duration:60.0);
              2012-01-26  [Irrigation].Apply(amount:36.8, duration:60.0);
              2012-02-09  [Irrigation].Apply(amount:49.6, duration:60.0);
              2012-02-23  [Irrigation].Apply(amount:34.3, duration:60.0);
              2012-04-05  [Irrigation].Apply(amount:21.4, duration:60.0);
              2012-05-03  [Irrigation].Apply(amount:23.7, duration:60.0);
              2012-11-01  [Irrigation].Apply(amount:18.0, duration:60.0);
              2012-11-22  [Irrigation].Apply(amount:12.0, duration:60.0);
              2012-12-13  [Irrigation].Apply(amount:27.0, duration:60.0);
              2013-01-03  [Irrigation].Apply(amount:42.0, duration:60.0);
              2013-01-24  [Irrigation].Apply(amount:45.0, duration:60.0);
              2013-02-14  [Irrigation].Apply(amount:90.6, duration:60.0);
              2013-02-28  [Irrigation].Apply(amount:20.0, duration:60.0);
              2013-03-07  [Irrigation].Apply(amount:30.0, duration:60.0);
              2013-03-28  [Irrigation].Apply(amount:18.0, duration:60.0);
              2013-04-18  [Irrigation].Apply(amount:15.0, duration:60.0);
              2013-10-24  [Irrigation].Apply(amount:12.0, duration:60.0);
              2013-11-14  [Irrigation].Apply(amount:33.0, duration:60.0);
              2013-12-05  [Irrigation].Apply(amount:36.0, duration:60.0);
              2014-01-16  [Irrigation].Apply(amount:44.7, duration:60.0);
              2014-02-05  [Irrigation].Apply(amount:33.5, duration:60.0);
              2014-02-27  [Irrigation].Apply(amount:32.0, duration:60.0);
          CompositeFactor None
            Specifications:
              [IrrigationEvents]
              [SetCropVariables].Script.Irrigation = Rain
            Operations IrrigationEvents
              2013-02-28  [Irrigation].Apply(amount:20.0, duration:60.0);
      Simulation LandPBase
        Weather: FileName=%root%\Examples\WeatherFiles\lincoln.met
        Clock: Start=2011-03-01; End=2014-05-01
        Summary
        SoilArbitrator Soil Arbitrator
        Zone Field: Area=1; Slope=0; AspectAngle=0; Altitude=50
          Soil Lismore: Latitude=0; Longitude=0
            WEIRDO: PrecipitationInterception=0; Salb=0.15; SubProfileConductance=20; WaterTableDepth=10; CalculateInfiltration=true; CalculateDrainage=true; ReportDetail=false; IncludeSorption=true; CalculateEvaporation=true; CalculateDiffusion=true; DiffusivityMultiplier=1; ExtractionMultiplier=10; ProfileWaterExtraction=0; TotalCover=0; ResidueWater=0; Hour=0; ReportLayer=0; TimeStep=0
              Thickness  LL15  DUL   SAT   CFlow  XFlow  PsiBub  MinRepellancyFactor  LowerRepellentWC  UpperRepellentWC  XF  BD
              75         0     0.3   0.57  0.07   3.9    -10     1                    0.5               0.8               1   1.2
              75         0     0.3   0.48  0.07   3.8    -10     1                    0.5               0.8               1   1.2
              150        0.04  0.3   0.48  0.07   3.7    -10     1                    0.5               0.8               1   1.2
              100        0.04  0.3   0.44  0.07   3.6    -10     1                    0.5               0.8               1   1.2
              200        0.04  0.13  0.4   0.07   3.9    -10     1                    0.5               0.8               1   1.2
              200        0.04  0.09  0.38  0.07   3.9    -10     1                    0.5               0.8               1   1.2
              200        0.04  0.1   0.37  0.07   3.9    -10     1                    0.5               0.8               1   1.2
              200        0.04  0.1   0.38  0.07   3.9    -10     1                    0.5               0.8               1   1.2
              200        0.04  0.12  0.39  0.07   3.9    -10     1                    0.5               0.8               1   1.2
              1000       0.04  0.11  0.4   0.07   3.9    -10     1                    0.5               0.8               1   1.2
            LayerStructure: Thickness=[25, 50, 75, 50, 50, 50, 50, 50, 50, 50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]
            MRSpline
            Evapotranspiration
            Chemical
              Thickness  NO3N     NH4N  PH
              100        180.833  0     6.6
              200        12.5     0     6.2
              300        1.38889  0     5.7
              300        1.38889  0     5.5
              300        0        0     5.5
              300        0        0     5.5
            SoilNitrogen: fom_types=[default, manure, mucuna, lablab, shemp, stable]; fract_carb=[0.2, 0.3, 0.54, 0.57, 0.45, 0]; fract_cell=[0.7, 0.3, 0.37, 0.37, 0.47, 0.1]; fract_lign=[0.1, 0.4, 0.09, 0.06, 0.08, 0.9]
              SoilNitrogenNO3 NO3
              SoilNitrogenNH4 NH4
              SoilNitrogenUrea Urea
              SoilNitrogenPlantAvailableNO3 PlantAvailableNO3
              SoilNitrogenPlantAvailableNH4 PlantAvailableNH4
            Organic: FOMCNRatio=30
              Thickness  Carbon  SoilCNRatio  FBiom  FInert  FOM
              100        1.82    11.5         0.025  0.3     1243.93
              200        1.47    11.5         0.025  0.4     833.832
              300        1.2     11.5         0.015  0.75    457.617
              300        1.03    11.5         0.01   0.9     251.145
              300        0.47    11.5         0.01   0.96    137.831
              300        0.47    11.5         0.01   0.96    75.6435
            Sample Initial nitrogen: Thickness=[100, 200, 300, 300, 300, 300]; SWUnits=Volumetric; OCUnits=Total; PHUnits=Water
            Sample Initial water: Thickness=[75, 75, 150, 100, 200, 200, 200, 200, 200, 1000]; SW=[0.37, 0.33, 0.32, 0.3, 0.15, 0.1, 0.1, 0.11, 0.12, 0.14]; SWUnits=Volumetric; OCUnits=Total; PHUnits=Water
            CERESSoilTemperature
            OutputLayers: Thickness=[150, 150, 100, 200, 200, 200, 200, 200, 200]
          Plant Slurp: CropType=Slurp; IsAlive=false; IsEnding=false; DaysAfterEnding=0
          MicroClimate: a_interception=0; b_interception=1; c_interception=0; d_interception=0; soil_albedo=0.23; SoilHeatFluxFraction=0.4; MinimumHeightDiffForNewLayer=0; NightInterceptionFraction=0.5; ReferenceHeight=2
          Irrigation
          Fertiliser
          SurfaceOrganicMatter surface organic matter: InitialResidueName=wheat; InitialResidueType=wheat; InitialResidueMass=2000; InitialStandingFraction=0; InitialCPR=0; InitialCNR=80; FractionFaecesAdded=1
          Operations IrrigationEvents
          Manager SlurpSowingRule
            CultivarName = Lucerne
            InitialRootDepth = 15
            SowingDate = 2011-03-14
            StopRootDate = 2012-07-14
            MaxG = 0.007
            R50 = 175
```csharp
using System;
using Models.Core;
using Models.PMF;
using APSIM.Shared.Utilities;
        
namespace Models
{
    [Serializable] 
    [System.Xml.Serialization.XmlInclude(typeof(Model))]
    public class Script : Model
    {
        [Link] Plant Slurp;
        [Link] Clock Clock;
        [Link] Zone zone;

        [Description("Cultivar")]
        public string CultivarName { get; set; }
        [Description("Initial Root Depth")]
        public double InitialRootDepth { get; set; }
        [Description("Sowing Date")]
        public DateTime SowingDate { get; set; }
        [Description("Stop Root Date")]
        public DateTime StopRootDate { get; set; }
        [Description("Maximum Stomatal Conductance")]
        public double MaxG { get; set; }
        [Description("Stomatal Radn response")]
        public double R50 { get; set; }
               
        [EventSubscribe("DoManagement")]
        private void OnDoManagement(object sender, EventArgs e)
        {
            if (Clock.Today.Date == SowingDate)
            {
                Slurp.Sow(cultivar: CultivarName, population: 1, depth: InitialRootDepth, rowSpacing: 150);
                object LeafPartFrac = 0.9;
                zone.Set("Slurp.Leaf.DMDemands.Structural.DMDemandFunction.PartitionFraction.FixedValue", LeafPartFrac);
                object RootPartFrac = 0.1;
                zone.Set("Slurp.Root.DMDemands.Structural.DMDemandFunction.PartitionFraction.FixedValue", RootPartFrac);
                object GMaxValue = MaxG;
                zone.Set("Slurp.Leaf.Gsmax350", GMaxValue); 
                object R50Value = R50; 
                zone.Set("Slurp.Leaf.R50", R50Value); 
            }
            //Potato.Sow(... Contains the following arguements:
            //Population  double  Optional  Seeds sowing/m2.  Default is zero
            //Cultivar    string  Required  "NameOfCultivar"
            //Depth       double  Optional  Depth (mm) seed sown.   Default is 100mm 
            //MaxCover    double  Optional  Proportion (0-1) of the ground row crop will cover.   Default is 1.0
            //BudNumber   double  Optional  Number of mainstems per seed sown.  Default is 1.0
            //RowSpacing  double  Optional  Spaceing (mm) between drill rows when crop is sown.  Default is 150mm
            //CropClass   string  Optional  Crop class to instantiate when crop is sown.  Default is "Plant"
            
            if (Clock.Today.Date == StopRootDate)
            {
                object LeafPartFrac = 0.4;
                zone.Set("Slurp.Leaf.DMDemands.Structural.DMDemandFunction.PartitionFraction.FixedValue", LeafPartFrac);
                object RootPartFrac = 0.6;
                zone.Set("Slurp.Root.DMDemands.Structural.DMDemandFunction.PartitionFraction.FixedValue", RootPartFrac);
            }
        }
    }
}
```
          Report ReportCrop: EventNames=[Clock].DoReport
          Manager SetCropVariables
            CoverFile = %root%\Tests\Validation\Slurp\ShallowSoilTest\CoverInterpolated.csv
            Ext_coef = 0.8
            MaximumHeight = 600
            Cover =
            Irrigation =
            Treatment =
            leaflai = 0
```csharp
using System;
using Models.Core;
using System.Collections.Generic;
using System.Text;
using Models.PMF;
using Models;
using System.Xml.Serialization;
using APSIM.Shared.Utilities;
using System.Data;

namespace Models
{
    [Serializable] 
    //[System.Xml.Serialization.XmlInclude(typeof(Model))]
    public class Script : Model
    {
        [Link] Plant SCRUM;
        [Link] Clock Clock;
        [Link] Zone zone;
        [Link] Simulation Simulation;
        
        [Description("File of Yields")]
        public string CoverFile { get; set; }
        [Description("Extinction coefficient")]
        public  double Ext_coef { get; set; }
        [Description("Maximum height of the crop at full cover")]
        public double MaximumHeight { get; set; }
        
        [XmlIgnore] private DataTable Covers { get; set; }

        public string Cover { get; set; }
        public string Irrigation { get; set; }
        public string Treatment { get; set; }
        
        private double CoverRead { get; set; }
        public double leaflai { get; private set; }
                
        [EventSubscribe("StartOfSimulation")]
        private void OnStartOfSimulation(object sender, EventArgs e)
        {
            
            Treatment = "Lucerne_" + Irrigation;
            
            string fullFileName = PathUtilities.GetAbsolutePath(CoverFile, Simulation.FileName);
            
            ApsimTextFile textFile = new ApsimTextFile();
            textFile.Open(fullFileName);
            Covers = textFile.ToTable();
            textFile.Close();
        }
        
        [EventSubscribe("StartOfDay")]
        private void OnStartOfDay(object sender, EventArgs e)
        {
            foreach (DataRow row in Covers.Rows)
            {
                DateTime TodayDate = Convert.ToDateTime(row["Date"]);
                if (TodayDate.Date == Clock.Today.Date)
                {
                    CoverRead = Convert.ToDouble(row[Treatment]);
                }
            }
        
            if ((bool)zone.Get("Slurp.IsAlive") == true)
            {
                //Only assign cover valuse if crop is emerged
                
                if (CoverRead == 1)
                    leaflai = Math.Log(0.01) / -Ext_coef;
                else
                {
                    if (CoverRead > 0)
                        leaflai = Math.Log(1 - CoverRead) / -Ext_coef;
                    else
                        leaflai = 0;
                }
                //Summary.WriteMessage(this, "LAI " + leaflai);
                object LAIResetValue = leaflai;
                zone.Set("Slurp.Leaf.Area.FixedValue", LAIResetValue);  
                object HeightResetValue = CoverRead * MaximumHeight;
                zone.Set("Slurp.Leaf.Tallness.FixedValue", HeightResetValue);  
            }
        }
    }
}
```
          Report ReportWaterLayers: EventNames=[Clock].DoReport
          Report ReportWaterBalance: EventNames=[Clock].DoReport
          Report
            VariableNames:
              [Clock].Today
              sum([Soil].SoilWater.SWmm) as MeasuredProfile
              [Soil].OutputLayers.SW
            EventNames:
              [Clock].DoReport
          Report ReporAllLayers: EventNames=[Clock].DoReport
            VariableNames:
              [Soil].WEIRDO.SW
              [Clock].Today
          Manager ClimateControl
            StartDate = 2011-10-18
            EndDate = 2011-10-20
```csharp
using System;
using Models.Core;
using APSIM.Shared.Utilities;



using System.Collections.Generic;
using System.Text;
using Models.PMF;
using Models;
using System.Xml.Serialization;

namespace Models
{
    [Serializable] 
    [System.Xml.Serialization.XmlInclude(typeof(Model))]
    public class Script : Model
    {
        [Link] Weather Met;
        [Link] Clock Clock;
    
        [Description("Start Date")]
        public DateTime StartDate { get; set; }
        
        [Description("End Date")]
        public DateTime EndDate { get; set; }
 
    
        [EventSubscribe("PreparingNewWeatherData")]
        private void OnPreparingNewWeatherData(object sender, EventArgs e)
        {
            if ((Clock.Today.Date >= StartDate) && (Clock.Today.Date <= EndDate))
                Met.Rain = 0;        
        }
    }
}
```
    Experiment Residues
      Factors
        Factor Cover
          CompositeFactor HarvesterWindrow
            Specifications:
              [SurfaceOrganicMatter]
              [InitialWater]
            SurfaceOrganicMatter: InitialResidueName=Barley; InitialResidueType=Barley; InitialResidueMass=7000; InitialStandingFraction=0; InitialCPR=0; InitialCNR=80; FractionFaecesAdded=1
            Sample InitialWater: Thickness=[50, 150, 200, 200, 200, 200, 200, 200]; SW=[0.22, 0.26, 0.16, 0.15, 0.18, 0.14, 0.14, 0.14]; SWUnits=Volumetric; OCUnits=Total; PHUnits=Water
          CompositeFactor BareSoil
            Specifications:
              [SurfaceOrganicMatter]
              [InitialWater]
            SurfaceOrganicMatter: InitialResidueName=Barley; InitialResidueType=Barley; InitialResidueMass=0; InitialStandingFraction=1; InitialCPR=0; InitialCNR=80; FractionFaecesAdded=1
            Sample InitialWater: Thickness=[50, 150, 200, 200, 200, 200, 200, 200]; SW=[0.22, 0.27, 0.16, 0.12, 0.18, 0.14, 0.14, 0.14]; SWUnits=Volumetric; OCUnits=Total; PHUnits=Water
      Simulation Base
        Weather: FileName=lincoln.met
        Clock: Start=2010-02-25; End=2010-08-11
        Summary
        Zone Field: Area=1; Slope=0; AspectAngle=0; Altitude=50
          Soil: ASCOrder=Vertosol; ASCSubOrder=Black; SoilType=Clay; Site=Norwin; NearestTown=Norwin; Region=Darling Downs and Granite Belt; State=Queensland; Country=Australia; NaturalVegetation=Qld. Bluegrass, possible Qld. Blue gum; ApsoilNumber=900; Latitude=-27.581836; Longitude=151.320206; LocationAccuracy=+/- 20m
            DataSource=CSIRO Sustainable Ecosystems, Toowoomba; Characteriesd as part of the GRDC funded project"Doing it better, doing it smarter, managing soil water in Australian agriculture' 2011
            Comments=OC, CLL for all crops estimated-based on Bongeen Mywybilla Soil No1
            WEIRDO: PrecipitationInterception=0; Salb=0.15; SubProfileConductance=20; WaterTableDepth=10; CalculateInfiltration=true; CalculateDrainage=true; ReportDetail=false; IncludeSorption=true; CalculateEvaporation=true; CalculateDiffusion=true; DiffusivityMultiplier=1; ExtractionMultiplier=0; ProfileWaterExtraction=0; TotalCover=0; ResidueWater=0; Hour=0; ReportLayer=0; TimeStep=0
              Thickness  LL15  DUL   SAT   CFlow  XFlow  PsiBub  MinRepellancyFactor  LowerRepellentWC  UpperRepellentWC  BD
              200        0.16  0.3   0.44  4      3.2    -30     0                    0.5               0.8               1
              200        0.15  0.28  0.46  12     3      -30     0                    0.5               0.8               1.2
              200        0.12  0.28  0.46  4      3.2    -30     1                    0.5               0.8               1.2
              200        0.18  0.36  0.42  0.006  3      -30     1                    0.5               0.8               1.2
              600        0.12  0.28  0.46  0.06   3.9    -20     1                    0.5               0.8               1.2
            Evapotranspiration
            MRSpline
            SoilNitrogen: same as Validation.LandP.LandPBase.Field.Lismore.SoilNitrogen
            Organic: FOMCNRatio=40
              Thickness  Carbon  SoilCNRatio  FBiom  FInert  FOM
              200        2.63    11           0.03   0.4     366.824
              200        1.25    11           0.02   0.7     238.964
              200        0.32    11           0.01   0.8     155.67
              200        0.21    11           0.01   0.9     101.41
              200        0.2     11           0.01   1       66.0622
              200        0.2     11           0.01   1       43.0355
              200        0.2     11           0.01   1       28.035
            Chemical
              Thickness  NO3N  NH4N  PH
              200        10    0.1   6
              200        10    0.1   6
              200        10    0.1   6
              200        10    0.1   6
              200        10    0.1   6
              200        10    0.1   6
              200        1     0.1   6
            Sample InitialN: Thickness=[150, 150, 300, 300, 300, 300, 300]; SWUnits=Volumetric; OCUnits=Total; PHUnits=Water
            Sample InitialWater: Thickness=[50, 150, 200, 200, 200, 200, 200, 200]; SW=[0.27, 0.27, 0.25, 0.3, 0.25, 0.25, 0.25, 0.25]; SWUnits=Volumetric; OCUnits=Total; PHUnits=Water
            LayerStructure
              Thickness=[25, 25, 50, 50, 50, 50, 50, 50, 50, 50, 50, 50, 50, 50, 50, 50, 50, 50, 50, 50, 50, 50, 50, 50, 50, 50, 50, 50, 50]
            OutputLayers: Thickness=[200, 200, 200, 200, 200, 200, 200]
            CERESSoilTemperature
          Irrigation
          Fertiliser
          SurfaceOrganicMatter: InitialResidueName=Barley; InitialResidueType=Barley; InitialResidueMass=2026; InitialStandingFraction=1; InitialCPR=0; InitialCNR=80; FractionFaecesAdded=1
          MicroClimate: a_interception=0; b_interception=1; c_interception=0; d_interception=0; soil_albedo=0.3; SoilHeatFluxFraction=0.4; MinimumHeightDiffForNewLayer=0; NightInterceptionFraction=0.5; ReferenceHeight=2
          Report
            VariableNames:
              [Clock].Today
              [SurfaceOrganicMatter].Cover
              [SurfaceOrganicMatter].Wt
              sum([Soil].SoilWater.SWmm[1:13]) as MeasuredProfile
              [Soil].OutputLayers.SWmm
              [Soil].OutputLayers.SW
              [Soil].WEIRDO.PoreWater
            EventNames:
              [Clock].DoReport
          Operations
            2010-03-05  [Irrigation].Apply(amount: 26.6,duration: 0.5);
            2010-03-08  [Irrigation].Apply(amount: 30.4,duration: 0.5);
            2010-03-09  [Irrigation].Apply(amount: 50,duration: 0.8);
          Manager ExtraVariables
```csharp
using Models.Interfaces;
using System;
using Models.Core;
using System.Collections.Generic;
using System.Text;
using Models.Soils;
using Models;
using System.Xml.Serialization;
using APSIM.Shared.Utilities;
using Models.Interfaces;

namespace Models
{
    [Serializable] 
    public class Script : Model
    {
        [Link] private Clock Clock;
        [Link] private Weather Met;
        [Link] private Fertiliser Fert;
        [Link] private Irrigation Irrig;
        [Link(ByName = true)]
        private ISolute Urea;
        [Link(ByName = true)]
        private ISolute NO3;
        [Link(ByName = true)]
        private ISolute NH4;
        [Link(ByName = true)]
        private SoilNitrogen SoilNitrogen;
        [Link] Soils.Soil Soil;
        [Link] Models.Surface.SurfaceOrganicMatter SOM;
                    
        [XmlIgnore] public bool InitialDay { get; set; }
        
        [XmlIgnore] public double AccumPlantN { get; set; }
        [XmlIgnore] public double AccumMineralisation { get; set; }
        [XmlIgnore] public double AccumDenit { get; set; }
        [XmlIgnore] public double AccumFert { get; set; }
        [XmlIgnore] public double AccumLeach { get; set; }
        [XmlIgnore] public double AccumDetach { get; set; }
        [XmlIgnore] public double DeltaSoilOMN { get; set; }
        [XmlIgnore] public double DeltaSurfaceOMN { get; set; }
        [XmlIgnore] public double DeltaSoilMineralN { get; set; }
        [XmlIgnore] public double SoilNitrogenContent { get; set; }
        
        [XmlIgnore] public double AccumEO { get; set; }
        [XmlIgnore] public double AccumEP { get; set; }
        [XmlIgnore] public double AccumES { get; set; }
        [XmlIgnore] public double AccumDrainage { get; set; }
        [XmlIgnore] public double AccumRunoff { get; set; }
        [XmlIgnore] public double AccumOutflowLat { get; set; }
        [XmlIgnore] public double AccumIrrigation { get; set; }
        [XmlIgnore] public double AccumRainfall { get; set; }
        [XmlIgnore] public double SoilWaterDeficit { get; set; }
        
        [XmlIgnore] public double AccumTtemerg { get; set; }
        
        [XmlIgnore] public double  InitialSoilOMN { get; set; }
        [XmlIgnore] public double  InitialSurfaceOMN { get; set; }
        [XmlIgnore] public double  InitialMineralN { get; set; }
        
        [XmlIgnore] public double SWC { get; set; }
        [XmlIgnore] public double DUL { get; set; }
        [XmlIgnore] public double OutFlowLat { get; set; }
        [XmlIgnore] public double SWDep60 { get; set; }
        [XmlIgnore] public double Flux1 { get; set; }
        [XmlIgnore] public double Flux3 { get; set; }
        
        [XmlIgnore] public double FomN { get; set; }
        [XmlIgnore] public double BiomN { get; set; }
        [XmlIgnore] public double HumN { get; set; }
        [XmlIgnore] public double OrganicN { get; set; }
        [XmlIgnore] public double NO3N { get; set; }
        [XmlIgnore] public double NH4N { get; set; }
        [XmlIgnore] public double UreaN { get; set; }
        [XmlIgnore] public double MineralN { get; set; }
        [XmlIgnore] public double DltNMinRes { get; set; }
        [XmlIgnore] public double DltNMinTot { get; set; }
        
        [EventSubscribe("Commencing")]
        private void OnSimulationCommencing(object sender, EventArgs e)
        {
            InitialDay = true;
        }
        
        [EventSubscribe("DoManagement")]
        private void OnDoManagement(object sender, EventArgs e)
        {
            //!!!!!! Nitrogen balance components !!!!!!
            //!!!!!!^^^^^^^^^^^^^^^^^^^^^^^^^^^^^!!!!!!
            FomN = MathUtilities.Sum(SoilNitrogen.FOMN);
            HumN = MathUtilities.Sum(SoilNitrogen.HumicN);
            BiomN = MathUtilities.Sum(SoilNitrogen.MicrobialN);
            OrganicN = FomN + HumN + BiomN;
            NO3N = MathUtilities.Sum(NO3.kgha);
            NH4N = MathUtilities.Sum(NH4.kgha);
            UreaN = MathUtilities.Sum(Urea.kgha);
            MineralN = NO3N + NH4N + UreaN; 
            DltNMinRes = MathUtilities.Sum(SoilNitrogen.dlt_n_min_res);
            DltNMinTot = MathUtilities.Sum(SoilNitrogen.MineralisedN);
            int layers = Soil.Thickness.Length;
            if (InitialDay == true)
            {
                InitialSurfaceOMN = SOM.N;
                InitialSoilOMN = OrganicN;
                InitialMineralN = MineralN;
                InitialDay = false;
            }
            AccumFert += Fert.NitrogenApplied;
            DeltaSurfaceOMN = SOM.N - InitialSurfaceOMN;
            AccumLeach = AccumLeach - Soil.SoilWater.LeachNH4 - Soil.SoilWater.LeachNO3 - Soil.SoilWater.LeachUrea; //Fails
            AccumMineralisation += MathUtilities.Sum(SoilNitrogen.MineralisedN);
            AccumDenit -= MathUtilities.Sum(SoilNitrogen.Denitrification);
            DeltaSoilOMN = OrganicN - InitialSoilOMN;
            DeltaSoilMineralN = MineralN - InitialMineralN;
            SoilNitrogenContent = MineralN;
            
            //!!!!!! Water balance components !!!!!!
            //!!!!!!^^^^^^^^^^^^^^^^^^^^^^^^^^!!!!!!

            AccumIrrigation += Irrig.IrrigationApplied; 
            AccumRainfall += Met.Rain;
            SWDep60 = 0;
            SWC = MathUtilities.Sum(Soil.SoilWater.SWmm);
            DUL = MathUtilities.Sum(Soil.DULmm);
            SoilWaterDeficit = (SWC - DUL);
            double OutFlowLat = MathUtilities.Sum(Soil.SoilWater.LateralOutflow);
            AccumOutflowLat -= OutFlowLat;
            SWDep60 = Soil.SoilWater.SWmm[0] + Soil.SoilWater.SWmm[1] + Soil.SoilWater.SWmm[2];
        }
        
        [EventSubscribe("DoManagementCalculations")]
        private void OnDoManagementCalculations(object sender, EventArgs e)
        {
            int layers = Soil.Thickness.Length;            
            AccumEO -= Soil.SoilWater.Eo;
            AccumES -= Soil.SoilWater.Es; 
            AccumDrainage -= Soil.SoilWater.Drainage;
            AccumRunoff -= Soil.SoilWater.Runoff;
        }
    }
}
```
          Report ReportWaterLayers: EventNames=[Clock].DoReport
          Report ReportWaterBalance: EventNames=[Clock].DoReport
          Report ReportMetVariables: EventNames=[Clock].DoReport
  Folder Sensibility
    Experiment Transpiration
      Factors
        Factor Texture
          CompositeFactor Silt: Specifications=[WEIRDO]
            WEIRDO: Thickness=[1400]; LL15=[0.15]; DUL=[0.3]; SAT=[0.44]; CFlow=[0.9]; XFlow=[3.5]; PsiBub=[-20]; MinRepellancyFactor=[0]; LowerRepellentWC=[0.5]; UpperRepellentWC=[0.8]; BD=[1]; PrecipitationInterception=0; Salb=0.15; SubProfileConductance=100; WaterTableDepth=10; CalculateInfiltration=true; CalculateDrainage=true; ReportDetail=false; IncludeSorption=true; CalculateEvaporation=false; CalculateDiffusion=true; DiffusivityMultiplier=1; ExtractionMultiplier=10; ProfileWaterExtraction=0; TotalCover=0; ResidueWater=0; Hour=0; ReportLayer=0; TimeStep=0
          CompositeFactor Sand: Specifications=[WEIRDO]
            WEIRDO: Thickness=[1400]; LL15=[0.15]; DUL=[0.3]; SAT=[0.44]; CFlow=[0.1]; XFlow=[4.1]; PsiBub=[-20]; MinRepellancyFactor=[0]; LowerRepellentWC=[0.5]; UpperRepellentWC=[0.8]; BD=[1]; PrecipitationInterception=0; Salb=0.15; SubProfileConductance=100; WaterTableDepth=10; CalculateInfiltration=true; CalculateDrainage=true; ReportDetail=false; IncludeSorption=true; CalculateEvaporation=false; CalculateDiffusion=true; DiffusivityMultiplier=1; ExtractionMultiplier=10; ProfileWaterExtraction=0; TotalCover=0; ResidueWater=0; Hour=0; ReportLayer=0; TimeStep=0
          CompositeFactor Loam: Specifications=[WEIRDO]
            WEIRDO: Thickness=[1400]; LL15=[0.15]; DUL=[0.3]; SAT=[0.44]; CFlow=[0.09]; XFlow=[3]; PsiBub=[-20]; MinRepellancyFactor=[0]; LowerRepellentWC=[0.5]; UpperRepellentWC=[0.8]; BD=[1]; PrecipitationInterception=0; Salb=0.15; SubProfileConductance=100; WaterTableDepth=10; CalculateInfiltration=true; CalculateDrainage=true; ReportDetail=false; IncludeSorption=true; CalculateEvaporation=false; CalculateDiffusion=true; DiffusivityMultiplier=1; ExtractionMultiplier=10; ProfileWaterExtraction=0; TotalCover=0; ResidueWater=0; Hour=0; ReportLayer=0; TimeStep=0
      Simulation BaseTranspiration
        Clock: Start=1998-09-01; End=1999-08-29
        Weather: FileName=lincoln.met
        Summary SummaryFile
        SoilArbitrator Soil Arbitrator
        Zone Field: Area=1; Slope=0; AspectAngle=0; Altitude=50
          Fertiliser
          SurfaceOrganicMatter: InitialResidueName=wheat_stubble; InitialResidueType=wheat; InitialResidueMass=0; InitialStandingFraction=0; InitialCPR=0; InitialCNR=100; FractionFaecesAdded=1
          MicroClimate: a_interception=0; b_interception=1; c_interception=0; d_interception=0; soil_albedo=0.3; SoilHeatFluxFraction=0.4; MinimumHeightDiffForNewLayer=0; NightInterceptionFraction=0.5; ReferenceHeight=2
          Irrigation
          Manager ClimateControl
```csharp
using System;
using Models.Core;
using APSIM.Shared.Utilities;



using System.Collections.Generic;
using System.Text;
using Models.PMF;
using Models;
using System.Xml.Serialization;

namespace Models
{
    [Serializable] 
    [System.Xml.Serialization.XmlInclude(typeof(Model))]
    public class Script : Model
    {
        [Link] Weather Met;
        [Link] Clock Clock;
    
        [EventSubscribe("PreparingNewWeatherData")]
        private void OnPreparingNewWeatherData(object sender, EventArgs e)
        {
            Met.Rain = 0;    
            Met.MaxT = 25;
            Met.MinT = 15;
            Met.Radn = 20;
            Met.VP = 10;
            Met.Wind = 5;
        }
    }
}
```
          Plant Slurp: CropType=Slurp; IsAlive=false; IsEnding=false; DaysAfterEnding=0
          Manager SlurpSowingRule
            CultivarName = Pasture
            InitialRootDepth = 20
            SowDate = 1-Oct
```csharp
using System;
using Models.Core;
using Models.PMF;
using APSIM.Shared.Utilities;
        
namespace Models
{
    [Serializable] 
    [System.Xml.Serialization.XmlInclude(typeof(Model))]
    public class Script : Model
    {
        [Link] Plant Slurp;
        [Link] Clock Clock;
        [Link] Zone zone;
        [Display(Type=DisplayType.CultivarName)]
        [Description("Cultivar")]
        public string CultivarName { get; set; }
        [Description("Initial Root Depth")]
        public double InitialRootDepth { get; set; }
        [Description("Sowing date (d-mmm)")]
        public string SowDate { get; set; }

               
        [EventSubscribe("DoManagement")]
        private void OnDoManagement(object sender, EventArgs e)
        {
            if (DateUtilities.WithinDates(SowDate, Clock.Today, SowDate))
            {
                Slurp.Sow(cultivar: CultivarName, population: 1, depth: InitialRootDepth, rowSpacing: 150);
                object LeafPartFrac = 0.2;
                zone.Set("Slurp.Leaf.DMDemands.Structural.DMDemandFunction.PartitionFraction.FixedValue", LeafPartFrac);
                object RootPartFrac = 0.8;
                zone.Set("Slurp.Root.DMDemands.Structural.DMDemandFunction.PartitionFraction.FixedValue", RootPartFrac);
            }
            //Potato.Sow(... Contains the following arguements:
            //Population  double  Optional  Seeds sowing/m2.  Default is zero
            //Cultivar    string  Required  "NameOfCultivar"
            //Depth       double  Optional  Depth (mm) seed sown.   Default is 100mm 
            //MaxCover    double  Optional  Proportion (0-1) of the ground row crop will cover.   Default is 1.0
            //BudNumber   double  Optional  Number of mainstems per seed sown.  Default is 1.0
            //RowSpacing  double  Optional  Spaceing (mm) between drill rows when crop is sown.  Default is 150mm
            //CropClass   string  Optional  Crop class to instantiate when crop is sown.  Default is "Plant"
        }
    }
}
```
          Soil: ASCOrder=Vertosol; ASCSubOrder=Black; SoilType=Clay; Site=Norwin; NearestTown=Norwin; Region=Darling Downs and Granite Belt; State=Queensland; Country=Australia; NaturalVegetation=Qld. Bluegrass, possible Qld. Blue gum; ApsoilNumber=900; Latitude=-27.581836; Longitude=151.320206; LocationAccuracy=+/- 20m
            DataSource=CSIRO Sustainable Ecosystems, Toowoomba; Characteriesd as part of the GRDC funded project"Doing it better, doing it smarter, managing soil water in Australian agriculture' 2011
            Comments=OC, CLL for all crops estimated-based on Bongeen Mywybilla Soil No1
            WEIRDO: PrecipitationInterception=0; Salb=0.15; SubProfileConductance=20; WaterTableDepth=10; CalculateInfiltration=true; CalculateDrainage=true; ReportDetail=false; IncludeSorption=true; CalculateEvaporation=false; CalculateDiffusion=false; DiffusivityMultiplier=2; ExtractionMultiplier=0; ProfileWaterExtraction=0; TotalCover=0; ResidueWater=0; Hour=0; ReportLayer=0; TimeStep=0
              Thickness  LL15  DUL   SAT   CFlow  XFlow  PsiBub  MinRepellancyFactor  LowerRepellentWC  UpperRepellentWC  XF  BD
              30         0.16  0.3   0.44  7e-11  3      -20     1                    0.2               0.8               1   1
              170        0.15  0.3   0.44  7e-11  3      -20     1                    0.2               0.8               1   1
              200        0.14  0.28  0.46  7e-11  3      -70     1                    0.2               0.8               1   1.2
              200        0.14  0.28  0.46  7e-11  3      -70     1                    0.2               0.8               1   1.2
              200        0.14  0.26  0.36  7e-11  3      -70     1                    0.2               0.8               1   1.3
              200        0.14  0.26  0.36  7e-11  3      -70     1                    0.2               0.8               1   1.4
              200        0.14  0.26  0.36  7e-11  3      -70     1                    0.2               0.8               1   1.5
              200        0.14  0.26  0.36  7e-11  3      -70     1                    0.2               0.8               1   1.6
            Evapotranspiration
            MRSpline
            SoilNitrogen: same as Validation.LandP.LandPBase.Field.Lismore.SoilNitrogen
            Organic: same as Validation.Residues.Base.Field.Soil.Organic
            Chemical
              Thickness  NO3N  NH4N  PH
              200        10    0.1   6
              200        10    0.1   6
              200        10    0.1   6
              200        10    0.1   6
              200        10    0.1   6
              200        10    0.1   6
              200        1     0.1   6
            Sample InitialN: Thickness=[150, 150, 300, 300, 300, 300, 300]; SWUnits=Volumetric; OCUnits=Total; PHUnits=Water
            Sample InitialWater: Thickness=[30, 170, 200, 200, 200, 200, 200, 200]; SW=[0.3, 0.3, 0.3, 0.3, 0.3, 0.3, 0.3, 0.3]; SWUnits=Volumetric; OCUnits=Total; PHUnits=Water
            LayerStructure
              Thickness=[25, 25, 50, 50, 50, 50, 50, 50, 50, 50, 50, 50, 50, 50, 50, 50, 50, 50, 50, 50, 50, 50, 50, 50, 50, 50, 50, 50, 50]
            OutputLayers: Thickness=[200, 200, 200, 200, 200, 200, 200]
            CERESSoilTemperature
          Report ReportWaterLayers: EventNames=[Clock].DoReport
          Report ReportWaterBalance: EventNames=[Clock].DoReport
          Report ReportCrop: EventNames=[Clock].DoReport
          Report
            VariableNames:
              [Clock].Today
              [Soil].WEIRDO.PoreWater
              [Soil].WEIRDO.Eos
            EventNames:
              [Clock].DoReport
          Report ReporAllLayers: EventNames=[Clock].DoReport
            VariableNames:
              [Soil].WEIRDO.SW
              [Clock].Today
    Experiment Diffusion
      Factors
        Permutation
          Factor WetLayer
            CompositeFactor WetTop: Specifications=[InitialWater]
              Sample WetTop: Thickness=[800, 800]; SW=[0.3, 0.15]; SWUnits=Volumetric; OCUnits=Total; PHUnits=Water
            CompositeFactor WetBot: Specifications=[InitialWater]
              Sample WetBot: Thickness=[800, 800]; SW=[0.15, 0.3]; SWUnits=Volumetric; OCUnits=Total; PHUnits=Water
          Factor Texture
            CompositeFactor Silt: Specifications=[WEIRDO]
              WEIRDO: Thickness=[1600]; LL15=[0.15]; DUL=[0.3]; SAT=[0.44]; CFlow=[0.9]; XFlow=[3.5]; PsiBub=[-20]; MinRepellancyFactor=[1]; LowerRepellentWC=[0.2]; UpperRepellentWC=[0.8]; BD=[1]; PrecipitationInterception=0; Salb=0.15; SubProfileConductance=100; WaterTableDepth=10; CalculateInfiltration=true; CalculateDrainage=true; ReportDetail=false; IncludeSorption=true; CalculateEvaporation=false; CalculateDiffusion=true; DiffusivityMultiplier=1; ExtractionMultiplier=0; ProfileWaterExtraction=0; TotalCover=0; ResidueWater=0; Hour=0; ReportLayer=0; TimeStep=0
            CompositeFactor Sand: Specifications=[WEIRDO]
              WEIRDO: Thickness=[1600]; LL15=[0.15]; DUL=[0.3]; SAT=[0.44]; CFlow=[0.1]; XFlow=[4.1]; PsiBub=[-20]; MinRepellancyFactor=[1]; LowerRepellentWC=[0.2]; UpperRepellentWC=[0.8]; BD=[1]; PrecipitationInterception=0; Salb=0.15; SubProfileConductance=100; WaterTableDepth=10; CalculateInfiltration=true; CalculateDrainage=true; ReportDetail=false; IncludeSorption=true; CalculateEvaporation=false; CalculateDiffusion=true; DiffusivityMultiplier=1; ExtractionMultiplier=0; ProfileWaterExtraction=0; TotalCover=0; ResidueWater=0; Hour=0; ReportLayer=0; TimeStep=0
            CompositeFactor Loam: Specifications=[WEIRDO]
              WEIRDO: Thickness=[1600]; LL15=[0.15]; DUL=[0.3]; SAT=[0.44]; CFlow=[0.09]; XFlow=[3]; PsiBub=[-20]; MinRepellancyFactor=[1]; LowerRepellentWC=[0.2]; UpperRepellentWC=[0.8]; BD=[1]; PrecipitationInterception=0; Salb=0.15; SubProfileConductance=100; WaterTableDepth=10; CalculateInfiltration=true; CalculateDrainage=true; ReportDetail=false; IncludeSorption=true; CalculateEvaporation=false; CalculateDiffusion=true; DiffusivityMultiplier=1; ExtractionMultiplier=0; ProfileWaterExtraction=0; TotalCover=0; ResidueWater=0; Hour=0; ReportLayer=0; TimeStep=0
      Simulation BaseDiffuse
        Clock: Start=1999-01-01; End=1999-12-31
        Weather: FileName=lincoln.met
        Summary SummaryFile
        Zone Field: Area=1; Slope=0; AspectAngle=0; Altitude=50
          Fertiliser
          SurfaceOrganicMatter: InitialResidueName=wheat_stubble; InitialResidueType=wheat; InitialResidueMass=0; InitialStandingFraction=0; InitialCPR=0; InitialCNR=100; FractionFaecesAdded=1
          MicroClimate: a_interception=0; b_interception=1; c_interception=0; d_interception=0; soil_albedo=0.3; SoilHeatFluxFraction=0.4; MinimumHeightDiffForNewLayer=0; NightInterceptionFraction=0.5; ReferenceHeight=2
          Irrigation
          Manager ClimateControl
```csharp
using System;
using Models.Core;
using APSIM.Shared.Utilities;



using System.Collections.Generic;
using System.Text;
using Models.PMF;
using Models;
using System.Xml.Serialization;

namespace Models
{
    [Serializable] 
    [System.Xml.Serialization.XmlInclude(typeof(Model))]
    public class Script : Model
    {
        [Link] Weather Met;
        [Link] Clock Clock;
    
        [EventSubscribe("PreparingNewWeatherData")]
        private void OnPreparingNewWeatherData(object sender, EventArgs e)
        {
            Met.Rain = 0;    
            Met.MaxT = 15;
            Met.MinT = 5;
            Met.Radn = 10;
            Met.VP = 5;
            Met.Wind = 1;
        }
    }
}
```
          Soil: ASCOrder=Vertosol; ASCSubOrder=Black; SoilType=Clay; Site=Norwin; NearestTown=Norwin; Region=Darling Downs and Granite Belt; State=Queensland; Country=Australia; NaturalVegetation=Qld. Bluegrass, possible Qld. Blue gum; ApsoilNumber=900; Latitude=-27.581836; Longitude=151.320206; LocationAccuracy=+/- 20m
            DataSource=CSIRO Sustainable Ecosystems, Toowoomba; Characteriesd as part of the GRDC funded project"Doing it better, doing it smarter, managing soil water in Australian agriculture' 2011
            Comments=OC, CLL for all crops estimated-based on Bongeen Mywybilla Soil No1
            WEIRDO: PrecipitationInterception=0; Salb=0.15; SubProfileConductance=20; WaterTableDepth=10; CalculateInfiltration=true; CalculateDrainage=true; ReportDetail=false; IncludeSorption=true; CalculateEvaporation=true; CalculateDiffusion=true; DiffusivityMultiplier=2; ExtractionMultiplier=0; ProfileWaterExtraction=0; TotalCover=0; ResidueWater=0; Hour=0; ReportLayer=0; TimeStep=0
            Evapotranspiration
            MRSpline
            SoilNitrogen: same as Validation.LandP.LandPBase.Field.Lismore.SoilNitrogen
            Organic: same as Validation.Residues.Base.Field.Soil.Organic
            Chemical
              Thickness  NO3N  NH4N  PH
              200        10    0.1   6
              200        10    0.1   6
              200        10    0.1   6
              200        10    0.1   6
              200        10    0.1   6
              200        10    0.1   6
              200        1     0.1   6
            Sample InitialN: Thickness=[150, 150, 300, 300, 300, 300, 300]; SWUnits=Volumetric; OCUnits=Total; PHUnits=Water
            Sample InitialWater: Thickness=[30, 170, 200, 200, 200, 200, 200, 200]; SW=[0.44, 0.44, 0.46, 0.46, 0.36, 0.36, 0.36, 0.36]; SWUnits=Volumetric; OCUnits=Total; PHUnits=Water
            OutputLayers: Thickness=[200, 200, 200, 200, 200, 200, 200, 200]
            LayerStructure: Thickness=[25, 25, 50, 50, 50, 50, 50, 50, 50, 50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]
            CERESSoilTemperature
          Report ReportWaterLayers: EventNames=[Clock].DoReport
          Report ReportWaterBalance: EventNames=[Clock].DoReport
          Report: EventNames=[Clock].DoReport
            VariableNames:
              [Clock].Today
              sum([Soil].OutputLayers.SWmm[1:4]) as TopWater
              sum([Soil].OutputLayers.SWmm[5:8]) as BotWater
    Experiment Drainage
      Factors
        Factor Texture
          CompositeFactor Silt: Specifications=[WEIRDO]
            WEIRDO: Thickness=[1400]; LL15=[0.15]; DUL=[0.3]; SAT=[0.44]; CFlow=[0.9]; XFlow=[3.5]; PsiBub=[-20]; MinRepellancyFactor=[1]; LowerRepellentWC=[0.2]; UpperRepellentWC=[0.8]; BD=[1]; PrecipitationInterception=0; Salb=0.15; SubProfileConductance=100; WaterTableDepth=10; CalculateInfiltration=true; CalculateDrainage=true; ReportDetail=false; IncludeSorption=true; CalculateEvaporation=false; CalculateDiffusion=false; DiffusivityMultiplier=1; ExtractionMultiplier=0; ProfileWaterExtraction=0; TotalCover=0; ResidueWater=0; Hour=0; ReportLayer=0; TimeStep=0
          CompositeFactor Sand: Specifications=[WEIRDO]
            WEIRDO: Thickness=[1400]; LL15=[0.15]; DUL=[0.3]; SAT=[0.44]; CFlow=[0.1]; XFlow=[4.1]; PsiBub=[-20]; MinRepellancyFactor=[1]; LowerRepellentWC=[0.2]; UpperRepellentWC=[0.8]; BD=[1]; PrecipitationInterception=0; Salb=0.15; SubProfileConductance=100; WaterTableDepth=10; CalculateInfiltration=true; CalculateDrainage=true; ReportDetail=false; IncludeSorption=true; CalculateEvaporation=false; CalculateDiffusion=false; DiffusivityMultiplier=1; ExtractionMultiplier=0; ProfileWaterExtraction=0; TotalCover=0; ResidueWater=0; Hour=0; ReportLayer=0; TimeStep=0
          CompositeFactor Loam: Specifications=[WEIRDO]
            WEIRDO: Thickness=[1400]; LL15=[0.15]; DUL=[0.3]; SAT=[0.44]; CFlow=[0.09]; XFlow=[3]; PsiBub=[-20]; MinRepellancyFactor=[1]; LowerRepellentWC=[0.2]; UpperRepellentWC=[0.8]; BD=[1]; PrecipitationInterception=0; Salb=0.15; SubProfileConductance=100; WaterTableDepth=10; CalculateInfiltration=true; CalculateDrainage=true; ReportDetail=false; IncludeSorption=true; CalculateEvaporation=false; CalculateDiffusion=false; DiffusivityMultiplier=1; ExtractionMultiplier=0; ProfileWaterExtraction=0; TotalCover=0; ResidueWater=0; Hour=0; ReportLayer=0; TimeStep=0
      Simulation BaseDrain
        Clock: Start=1999-01-01; End=1999-12-31
        Weather: FileName=lincoln.met
        Summary SummaryFile
        Zone Field: Area=1; Slope=0; AspectAngle=0; Altitude=50
          Fertiliser
          SurfaceOrganicMatter: InitialResidueName=wheat_stubble; InitialResidueType=wheat; InitialResidueMass=0; InitialStandingFraction=0; InitialCPR=0; InitialCNR=100; FractionFaecesAdded=1
          MicroClimate: a_interception=0; b_interception=1; c_interception=0; d_interception=0; soil_albedo=0.3; SoilHeatFluxFraction=0.4; MinimumHeightDiffForNewLayer=0; NightInterceptionFraction=0.5; ReferenceHeight=2
          Irrigation
          Manager ClimateControl: same as Sensibility.Diffusion.BaseDiffuse.Field.ClimateControl
          Soil: ASCOrder=Vertosol; ASCSubOrder=Black; SoilType=Clay; Site=Norwin; NearestTown=Norwin; Region=Darling Downs and Granite Belt; State=Queensland; Country=Australia; NaturalVegetation=Qld. Bluegrass, possible Qld. Blue gum; ApsoilNumber=900; Latitude=-27.581836; Longitude=151.320206; LocationAccuracy=+/- 20m
            DataSource=CSIRO Sustainable Ecosystems, Toowoomba; Characteriesd as part of the GRDC funded project"Doing it better, doing it smarter, managing soil water in Australian agriculture' 2011
            Comments=OC, CLL for all crops estimated-based on Bongeen Mywybilla Soil No1
            WEIRDO: PrecipitationInterception=0; Salb=0.15; SubProfileConductance=20; WaterTableDepth=10; CalculateInfiltration=false; CalculateDrainage=true; ReportDetail=false; IncludeSorption=true; CalculateEvaporation=false; CalculateDiffusion=false; DiffusivityMultiplier=2; ExtractionMultiplier=0; ProfileWaterExtraction=0; TotalCover=0; ResidueWater=0; Hour=0; ReportLayer=0; TimeStep=0
            Evapotranspiration
            MRSpline
            SoilNitrogen: same as Validation.LandP.LandPBase.Field.Lismore.SoilNitrogen
            Organic: same as Validation.Residues.Base.Field.Soil.Organic
            Chemical
              Thickness  NO3N  NH4N  PH
              200        10    0.1   6
              200        10    0.1   6
              200        10    0.1   6
              200        10    0.1   6
              200        10    0.1   6
              200        10    0.1   6
              200        1     0.1   6
            Sample InitialN: Thickness=[150, 150, 300, 300, 300, 300, 300]; SWUnits=Volumetric; OCUnits=Total; PHUnits=Water
            Sample InitialWater: Depth=[0-160]; Thickness=[1600]; SW=[0.44]; SWUnits=Volumetric; OCUnits=Total; PHUnits=Water
            OutputLayers: Thickness=[200, 200, 200, 200, 200, 200, 200]
            LayerStructure
              Thickness=[50, 50, 50, 50, 50, 50, 50, 50, 50, 50, 50, 50, 50, 50, 50, 50, 50, 50, 50, 50, 50, 50, 50, 50, 50, 50, 50, 50]
            CERESSoilTemperature
          Report ReportWaterLayers: EventNames=[Clock].DoReport
          Report ReportWaterBalance: EventNames=[Clock].DoReport
          Report ReporAllLayers: EventNames=[Clock].DoReport
            VariableNames:
              [Soil].WEIRDO.SW
              [Clock].Today
    Experiment Repellency
      Factors
        Factor Repellency
          CompositeFactor High: Specifications=[WEIRDO]
            WEIRDO: Thickness=[1400]; LL15=[0.15]; DUL=[0.3]; SAT=[0.44]; CFlow=[0.9]; XFlow=[3.5]; PsiBub=[-20]; MinRepellancyFactor=[0]; LowerRepellentWC=[0.5]; UpperRepellentWC=[0.8]; BD=[1]; PrecipitationInterception=0; Salb=0.15; SubProfileConductance=100; WaterTableDepth=10; CalculateInfiltration=true; CalculateDrainage=true; ReportDetail=false; IncludeSorption=true; CalculateEvaporation=false; CalculateDiffusion=false; DiffusivityMultiplier=1; ExtractionMultiplier=0; ProfileWaterExtraction=0; TotalCover=0; ResidueWater=0; Hour=0; ReportLayer=0; TimeStep=0
          CompositeFactor Moderate: Specifications=[WEIRDO]
            WEIRDO: Thickness=[1400]; LL15=[0.15]; DUL=[0.3]; SAT=[0.44]; CFlow=[0.9]; XFlow=[3.5]; PsiBub=[-20]; MinRepellancyFactor=[0.1]; LowerRepellentWC=[0.5]; UpperRepellentWC=[0.8]; BD=[1]; PrecipitationInterception=0; Salb=0.15; SubProfileConductance=100; WaterTableDepth=8; CalculateInfiltration=true; CalculateDrainage=true; ReportDetail=false; IncludeSorption=true; CalculateEvaporation=false; CalculateDiffusion=false; DiffusivityMultiplier=1; ExtractionMultiplier=0; ProfileWaterExtraction=0; TotalCover=0; ResidueWater=0; Hour=0; ReportLayer=0; TimeStep=0
          CompositeFactor None: Specifications=[WEIRDO]
            WEIRDO: Thickness=[1400]; LL15=[0.15]; DUL=[0.3]; SAT=[0.44]; CFlow=[0.9]; XFlow=[3.5]; PsiBub=[-20]; MinRepellancyFactor=[1]; LowerRepellentWC=[0.5]; UpperRepellentWC=[0.8]; BD=[1]; PrecipitationInterception=0; Salb=0.15; SubProfileConductance=100; WaterTableDepth=8; CalculateInfiltration=true; CalculateDrainage=true; ReportDetail=false; IncludeSorption=true; CalculateEvaporation=false; CalculateDiffusion=false; DiffusivityMultiplier=1; ExtractionMultiplier=0; ProfileWaterExtraction=0; TotalCover=0; ResidueWater=0; Hour=0; ReportLayer=0; TimeStep=0
      Simulation BaseRepell
        Clock: Start=1999-01-01; End=1999-08-30
        Weather: FileName=lincoln.met
        Summary SummaryFile
        Zone Field: Area=1; Slope=0; AspectAngle=0; Altitude=50
          Soil: ASCOrder=Vertosol; ASCSubOrder=Black; SoilType=Clay; Site=Norwin; NearestTown=Norwin; Region=Darling Downs and Granite Belt; State=Queensland; Country=Australia; NaturalVegetation=Qld. Bluegrass, possible Qld. Blue gum; ApsoilNumber=900; Latitude=-27.581836; Longitude=151.320206; LocationAccuracy=+/- 20m
            DataSource=CSIRO Sustainable Ecosystems, Toowoomba; Characteriesd as part of the GRDC funded project"Doing it better, doing it smarter, managing soil water in Australian agriculture' 2011
            Comments=OC, CLL for all crops estimated-based on Bongeen Mywybilla Soil No1
            WEIRDO: same as Sensibility.Diffusion.BaseDiffuse.Field.Soil.WEIRDO
            Evapotranspiration
            MRSpline
            SoilNitrogen: same as Validation.LandP.LandPBase.Field.Lismore.SoilNitrogen
            Organic: same as Validation.Residues.Base.Field.Soil.Organic
            Chemical
              Thickness  NO3N  NH4N  PH
              200        10    0.1   6
              200        10    0.1   6
              200        10    0.1   6
              200        10    0.1   6
              200        10    0.1   6
              200        10    0.1   6
              200        1     0.1   6
            Sample InitialN: Thickness=[150, 150, 300, 300, 300, 300, 300]; SWUnits=Volumetric; OCUnits=Total; PHUnits=Water
            Sample InitialWater: Depth=[0-160]; Thickness=[1600]; SW=[0.15]; SWUnits=Volumetric; OCUnits=Total; PHUnits=Water
            LayerStructure
              Thickness=[50, 50, 50, 50, 50, 50, 50, 50, 50, 50, 50, 50, 50, 50, 50, 50, 50, 50, 50, 50, 50, 50, 50, 50, 50, 50, 50, 50]
            OutputLayers: Thickness=[200, 200, 200, 200, 200, 200, 200]
            CERESSoilTemperature
          Fertiliser
          SurfaceOrganicMatter: InitialResidueName=wheat_stubble; InitialResidueType=wheat; InitialResidueMass=0; InitialStandingFraction=0; InitialCPR=0; InitialCNR=100; FractionFaecesAdded=1
          MicroClimate: a_interception=0; b_interception=1; c_interception=0; d_interception=0; soil_albedo=0.3; SoilHeatFluxFraction=0.4; MinimumHeightDiffForNewLayer=0; NightInterceptionFraction=0.5; ReferenceHeight=2
          Irrigation
          Manager ClimateControl
```csharp
using System;
using Models.Core;
using APSIM.Shared.Utilities;



using System.Collections.Generic;
using System.Text;
using Models.PMF;
using Models;
using System.Xml.Serialization;

namespace Models
{
    [Serializable] 
    [System.Xml.Serialization.XmlInclude(typeof(Model))]
    public class Script : Model
    {
        [Link] Weather Met;
        [Link] Clock Clock;
    
        [EventSubscribe("PreparingNewWeatherData")]
        private void OnPreparingNewWeatherData(object sender, EventArgs e)
        {
            Met.Rain = 0;    
            Met.MaxT = 0;
            Met.MinT = 0;
            Met.Radn = 0;
            Met.VP = 1;
            Met.Wind = 0;
        }
    }
}
```
          Manager Irrigate weekly
            IrrigateDate = 1-feb
            Amount = 30
            Depth = 0
            Efficiency = 1
            WillRunoff = False
            Duration = 0.5
            DaysSinceIrrigation = 0
```csharp
using System;
using Models.Core;
using Models.PMF;
using APSIM.Shared.Utilities;
namespace Models
{
    [Serializable]
    public class Script : Model
    {
        [Link] Clock Clock;
        [Link] Irrigation Irrigation;
        
        [Description("Date to irrigate")]
        public string IrrigateDate { get; set; }
        
        [Description("Amount of irrigation to be applied (mm)")]
        public double Amount { get; set; }
        
        [Description("Depth of irrigation (mm)")]
        public double Depth { get; set; }
        
        [Description("Efficiency of irrigation (0-1)")]
        public double Efficiency { get; set; }
        
        [Description("Will the irrigation runoff?")]
        public bool WillRunoff { get; set; }
        
        [Description("How may hours did it take to apply irrigation?")]
        public double Duration { get; set; }
        
        public int DaysSinceIrrigation { get; set; }
        [EventSubscribe("DoManagement")]
        private void OnDoManagement(object sender, EventArgs e)
        {
            DaysSinceIrrigation += 1;
            if (DaysSinceIrrigation >= 7)
            {
                Irrigation.Apply(amount: Amount, depth: Depth, efficiency: Efficiency, willRunoff: WillRunoff, duration: Duration);
                DaysSinceIrrigation = 0;
            }
        }
    }
}
```
          Report ReportWaterLayers: EventNames=[Clock].DoReport
          Report ReportWaterBalance: EventNames=[Clock].DoReport
          Report: EventNames=[Clock].DoReport
            VariableNames:
              [Clock].Today
              [WEIRDO].SW
          Report ReporAllLayers: EventNames=[Clock].DoReport
            VariableNames:
              [Soil].WEIRDO.SW
              [Clock].Today
    Experiment Rewetting
      Factors
        Factor Texture
          CompositeFactor Silt: Specifications=[WEIRDO]
            WEIRDO: Thickness=[1400]; LL15=[0.15]; DUL=[0.3]; SAT=[0.44]; CFlow=[0.9]; XFlow=[3.5]; PsiBub=[-20]; MinRepellancyFactor=[1]; LowerRepellentWC=[0.2]; UpperRepellentWC=[0.8]; BD=[1]; PrecipitationInterception=0; Salb=0.15; SubProfileConductance=100; WaterTableDepth=10; CalculateInfiltration=true; CalculateDrainage=true; ReportDetail=false; IncludeSorption=true; CalculateEvaporation=false; CalculateDiffusion=false; DiffusivityMultiplier=1; ExtractionMultiplier=10; ProfileWaterExtraction=0; TotalCover=0; ResidueWater=0; Hour=0; ReportLayer=0; TimeStep=0
          CompositeFactor Sand: Specifications=[WEIRDO]
            WEIRDO: Thickness=[1400]; LL15=[0.15]; DUL=[0.3]; SAT=[0.44]; CFlow=[0.1]; XFlow=[4.1]; PsiBub=[-20]; MinRepellancyFactor=[1]; LowerRepellentWC=[0.2]; UpperRepellentWC=[0.8]; BD=[1]; PrecipitationInterception=0; Salb=0.15; SubProfileConductance=100; WaterTableDepth=10; CalculateInfiltration=true; CalculateDrainage=true; ReportDetail=false; IncludeSorption=true; CalculateEvaporation=false; CalculateDiffusion=false; DiffusivityMultiplier=1; ExtractionMultiplier=10; ProfileWaterExtraction=0; TotalCover=0; ResidueWater=0; Hour=0; ReportLayer=0; TimeStep=0
          CompositeFactor Loam: Specifications=[WEIRDO]
            WEIRDO: Thickness=[1400]; LL15=[0.15]; DUL=[0.3]; SAT=[0.44]; CFlow=[0.09]; XFlow=[3]; PsiBub=[-20]; MinRepellancyFactor=[1]; LowerRepellentWC=[0.2]; UpperRepellentWC=[0.8]; BD=[1]; PrecipitationInterception=0; Salb=0.15; SubProfileConductance=100; WaterTableDepth=10; CalculateInfiltration=true; CalculateDrainage=true; ReportDetail=false; IncludeSorption=true; CalculateEvaporation=false; CalculateDiffusion=false; DiffusivityMultiplier=1; ExtractionMultiplier=10; ProfileWaterExtraction=0; TotalCover=0; ResidueWater=0; Hour=0; ReportLayer=0; TimeStep=0
      Simulation BaseRewet
        Clock: Start=1999-02-01; End=1999-03-01
        Weather: FileName=lincoln.met
        Summary SummaryFile
        Zone Field: Area=1; Slope=0; AspectAngle=0; Altitude=50
          Fertiliser
          SurfaceOrganicMatter: InitialResidueName=wheat_stubble; InitialResidueType=wheat; InitialResidueMass=0; InitialStandingFraction=0; InitialCPR=0; InitialCNR=100; FractionFaecesAdded=1
          MicroClimate: a_interception=0; b_interception=1; c_interception=0; d_interception=0; soil_albedo=0.3; SoilHeatFluxFraction=0.4; MinimumHeightDiffForNewLayer=0; NightInterceptionFraction=0.5; ReferenceHeight=2
          Irrigation
          Manager ClimateControl: same as Sensibility.Repellency.BaseRepell.Field.ClimateControl
          Manager Irrigate on a fixed date
            IrrigateDate = 15-feb
            Amount = 30
            Depth = 0
            Efficiency = 1
            WillRunoff = False
            Duration = 0.5
```csharp
using System;
using Models.Core;
using Models.PMF;
using APSIM.Shared.Utilities;
namespace Models
{
    [Serializable]
    public class Script : Model
    {
        [Link] Clock Clock;
        [Link] Irrigation Irrigation;
        
        [Description("Date to irrigate")]
        public string IrrigateDate { get; set; }
        
        [Description("Amount of irrigation to be applied (mm)")]
        public double Amount { get; set; }
        
        [Description("Depth of irrigation (mm)")]
        public double Depth { get; set; }
        
        [Description("Efficiency of irrigation (0-1)")]
        public double Efficiency { get; set; }
        
        [Description("Will the irrigation runoff?")]
        public bool WillRunoff { get; set; }
        
        [Description("How may hours did it take to apply irrigation?")]
        public double Duration { get; set; }
        
        
        [EventSubscribe("DoManagement")]
        private void OnDoManagement(object sender, EventArgs e)
        {
            if (DateUtilities.WithinDates(IrrigateDate, Clock.Today, IrrigateDate))
            {
                Irrigation.Apply(amount: Amount, depth: Depth, efficiency: Efficiency, willRunoff: WillRunoff, duration: Duration);
            }
        }
    }
}
```
          Soil: ASCOrder=Vertosol; ASCSubOrder=Black; SoilType=Clay; Site=Norwin; NearestTown=Norwin; Region=Darling Downs and Granite Belt; State=Queensland; Country=Australia; NaturalVegetation=Qld. Bluegrass, possible Qld. Blue gum; ApsoilNumber=900; Latitude=-27.581836; Longitude=151.320206; LocationAccuracy=+/- 20m
            DataSource=CSIRO Sustainable Ecosystems, Toowoomba; Characteriesd as part of the GRDC funded project"Doing it better, doing it smarter, managing soil water in Australian agriculture' 2011
            Comments=OC, CLL for all crops estimated-based on Bongeen Mywybilla Soil No1
            WEIRDO: PrecipitationInterception=0; Salb=0.15; SubProfileConductance=20; WaterTableDepth=10; CalculateInfiltration=true; CalculateDrainage=true; ReportDetail=false; IncludeSorption=true; CalculateEvaporation=true; CalculateDiffusion=true; DiffusivityMultiplier=2; ExtractionMultiplier=10; ProfileWaterExtraction=0; TotalCover=0; ResidueWater=0; Hour=0; ReportLayer=0; TimeStep=0
              Thickness  LL15  DUL   SAT   CFlow  XFlow  PsiBub  MinRepellancyFactor  LowerRepellentWC  UpperRepellentWC  BD
              30         0.16  0.3   0.44  7e-11  3      -20     1                    0.2               0.8               1
              170        0.15  0.3   0.44  7e-11  3      -20     1                    0.2               0.8               1
              200        0.14  0.28  0.46  7e-11  3      -70     1                    0.2               0.8               1.2
              200        0.14  0.28  0.46  7e-11  3      -70     1                    0.2               0.8               1.2
              200        0.14  0.26  0.36  7e-11  3      -70     1                    0.2               0.8               1.3
              200        0.14  0.26  0.36  7e-11  3      -70     1                    0.2               0.8               1.4
              200        0.14  0.26  0.36  7e-11  3      -70     1                    0.2               0.8               1.5
              200        0.14  0.26  0.36  7e-11  3      -70     1                    0.2               0.8               1.6
            Evapotranspiration
            MRSpline
            SoilNitrogen: same as Validation.LandP.LandPBase.Field.Lismore.SoilNitrogen
            Organic: same as Validation.Residues.Base.Field.Soil.Organic
            Chemical
              Thickness  NO3N  NH4N  PH
              200        10    0.1   6
              200        10    0.1   6
              200        10    0.1   6
              200        10    0.1   6
              200        10    0.1   6
              200        10    0.1   6
              200        1     0.1   6
            Sample InitialN: Thickness=[150, 150, 300, 300, 300, 300, 300]; SWUnits=Volumetric; OCUnits=Total; PHUnits=Water
            Sample InitialWater: Depth=[0-140]; Thickness=[1400]; SW=[0.15]; SWUnits=Volumetric; OCUnits=Total; PHUnits=Water
            LayerStructure
              Thickness=[50, 50, 50, 50, 50, 50, 50, 50, 50, 50, 50, 50, 50, 50, 50, 50, 50, 50, 50, 50, 50, 50, 50, 50, 50, 50, 50, 50]
            OutputLayers: Thickness=[200, 200, 200, 200, 200, 200, 200]
            CERESSoilTemperature
          Report ReportWaterLayers: EventNames=[Clock].DoReport
          Report ReportWaterBalance: EventNames=[Clock].DoReport
          Report: EventNames=[Clock].DoReport
            VariableNames:
              [Clock].Today
              [WEIRDO].SW
          Report ReporAllLayers: EventNames=[Clock].DoReport
            VariableNames:
              [Soil].WEIRDO.SW
              [Clock].Today
    Experiment Evaporation
      Factors
        Factor IntitialWater
          CompositeFactor Moist: Specifications=[InitialWater]
            Sample InitialWater: Depth=[0-140]; Thickness=[1400]; SW=[0.3]; SWUnits=Volumetric; OCUnits=Total; PHUnits=Water
          CompositeFactor Dryer: Specifications=[InitialWater]
            Sample InitialWater: Depth=[0-140]; Thickness=[1400]; SW=[0.24]; SWUnits=Volumetric; OCUnits=Total; PHUnits=Water
          CompositeFactor DryerStill: Specifications=[InitialWater]
            Sample InitialWater: Depth=[0-140]; Thickness=[1400]; SW=[0.18]; SWUnits=Volumetric; OCUnits=Total; PHUnits=Water
      Simulation BaseEvap
        Clock: Start=1999-01-01; End=1999-12-31
        Weather: FileName=lincoln.met
        Summary SummaryFile
        Zone Field: Area=1; Slope=0; AspectAngle=0; Altitude=50
          Fertiliser
          SurfaceOrganicMatter: InitialResidueName=wheat_stubble; InitialResidueType=wheat; InitialResidueMass=0; InitialStandingFraction=0; InitialCPR=0; InitialCNR=100; FractionFaecesAdded=1
          MicroClimate: a_interception=0; b_interception=1; c_interception=0; d_interception=0; soil_albedo=0.3; SoilHeatFluxFraction=0.4; MinimumHeightDiffForNewLayer=0; NightInterceptionFraction=0.5; ReferenceHeight=2
          Irrigation
          Manager ClimateControl
```csharp
using System;
using Models.Core;
using APSIM.Shared.Utilities;



using System.Collections.Generic;
using System.Text;
using Models.PMF;
using Models;
using System.Xml.Serialization;

namespace Models
{
    [Serializable] 
    [System.Xml.Serialization.XmlInclude(typeof(Model))]
    public class Script : Model
    {
        [Link] Weather Met;
        [Link] Clock Clock;
    
        [EventSubscribe("PreparingNewWeatherData")]
        private void OnPreparingNewWeatherData(object sender, EventArgs e)
        {
            Met.Rain = 0;    
            Met.MaxT = 15;
            Met.MinT = 5;
            Met.Radn = 7;
            Met.VP = .4;
            Met.Wind = 1;
        }
    }
}
```
          Soil: ASCOrder=Vertosol; ASCSubOrder=Black; SoilType=Clay; Site=Norwin; NearestTown=Norwin; Region=Darling Downs and Granite Belt; State=Queensland; Country=Australia; NaturalVegetation=Qld. Bluegrass, possible Qld. Blue gum; ApsoilNumber=900; Latitude=-27.581836; Longitude=151.320206; LocationAccuracy=+/- 20m
            DataSource=CSIRO Sustainable Ecosystems, Toowoomba; Characteriesd as part of the GRDC funded project"Doing it better, doing it smarter, managing soil water in Australian agriculture' 2011
            Comments=OC, CLL for all crops estimated-based on Bongeen Mywybilla Soil No1
            WEIRDO: Thickness=[1400]; LL15=[0.15]; DUL=[0.3]; SAT=[0.44]; CFlow=[0.9]; XFlow=[3.5]; PsiBub=[-20]; MinRepellancyFactor=[1]; LowerRepellentWC=[0.2]; UpperRepellentWC=[0.8]; BD=[1]; PrecipitationInterception=0; Salb=0.15; SubProfileConductance=20; WaterTableDepth=3; CalculateInfiltration=true; CalculateDrainage=true; ReportDetail=false; IncludeSorption=true; CalculateEvaporation=true; CalculateDiffusion=true; DiffusivityMultiplier=1; ExtractionMultiplier=0; ProfileWaterExtraction=0; TotalCover=0; ResidueWater=0; Hour=0; ReportLayer=0; TimeStep=0
            Evapotranspiration
            MRSpline
            SoilNitrogen: same as Validation.LandP.LandPBase.Field.Lismore.SoilNitrogen
            Organic: same as Validation.Residues.Base.Field.Soil.Organic
            Chemical
              Thickness  NO3N  NH4N  PH
              200        10    0.1   6
              200        10    0.1   6
              200        10    0.1   6
              200        10    0.1   6
              200        10    0.1   6
              200        10    0.1   6
              200        1     0.1   6
            Sample InitialN: Thickness=[150, 150, 300, 300, 300, 300, 300]; SWUnits=Volumetric; OCUnits=Total; PHUnits=Water
            Sample InitialWater: SWUnits=Volumetric; OCUnits=Total; PHUnits=Water
            LayerStructure
              Thickness=[25, 25, 50, 50, 50, 50, 50, 50, 50, 50, 50, 50, 50, 50, 50, 50, 50, 50, 50, 50, 50, 50, 50, 50, 50, 50, 50, 50, 50]
            OutputLayers: Thickness=[200, 200, 200, 200, 200, 200, 200]
            CERESSoilTemperature
          Report ReportWaterLayers: EventNames=[Clock].DoReport
          Report ReportWaterBalance: EventNames=[Clock].DoReport
          Report ReportMetVariables: EventNames=[Clock].DoReport
          Report ReporAllLayers: EventNames=[Clock].DoReport
            VariableNames:
              [Soil].WEIRDO.SW
              [Clock].Today
    Experiment Irrigation
      Factors
        Factor IrrigDuration
          Specification=[Irrigate on a fixed date].Script.Duration = 0.1,0.3,0.7,1,2,6
      Simulation BaseIrrigation
        Clock: Start=1999-01-01; End=1999-03-31
        Weather: FileName=lincoln.met
        Summary SummaryFile
        Zone Field: Area=1; Slope=0; AspectAngle=0; Altitude=50
          Report ReportWaterLayers: EventNames=[Clock].DoReport
          Report ReportWaterBalance: EventNames=[Clock].DoReport
          Fertiliser
          SurfaceOrganicMatter: InitialResidueName=wheat_stubble; InitialResidueType=wheat; InitialResidueMass=0; InitialStandingFraction=0; InitialCPR=0; InitialCNR=100; FractionFaecesAdded=1
          MicroClimate: a_interception=0; b_interception=1; c_interception=0; d_interception=0; soil_albedo=0.3; SoilHeatFluxFraction=0.4; MinimumHeightDiffForNewLayer=0; NightInterceptionFraction=0.5; ReferenceHeight=2
          Irrigation
          Manager Irrigate on a fixed date
            IrrigateDate = 1-feb
            Amount = 10
            Depth = 0
            Efficiency = 1
            WillRunoff = False
            Duration = 0.5
            script: same as in Sensibility.Rewetting.BaseRewet.Field.Irrigate on a fixed date
          Soil: ASCOrder=Vertosol; ASCSubOrder=Black; SoilType=Clay; Site=Norwin; NearestTown=Norwin; Region=Darling Downs and Granite Belt; State=Queensland; Country=Australia; NaturalVegetation=Qld. Bluegrass, possible Qld. Blue gum; ApsoilNumber=900; Latitude=-27.581836; Longitude=151.320206; LocationAccuracy=+/- 20m
            DataSource=CSIRO Sustainable Ecosystems, Toowoomba; Characteriesd as part of the GRDC funded project"Doing it better, doing it smarter, managing soil water in Australian agriculture' 2011
            Comments=OC, CLL for all crops estimated-based on Bongeen Mywybilla Soil No1
            WEIRDO: Thickness=[1400]; LL15=[0.15]; DUL=[0.3]; SAT=[0.44]; CFlow=[0.9]; XFlow=[3.5]; PsiBub=[-20]; MinRepellancyFactor=[0.1]; LowerRepellentWC=[0.5]; UpperRepellentWC=[0.8]; BD=[1]; PrecipitationInterception=0; Salb=0.15; SubProfileConductance=20; WaterTableDepth=10; CalculateInfiltration=true; CalculateDrainage=true; ReportDetail=false; IncludeSorption=true; CalculateEvaporation=false; CalculateDiffusion=false; DiffusivityMultiplier=1; ExtractionMultiplier=0; ProfileWaterExtraction=0; TotalCover=0; ResidueWater=0; Hour=0; ReportLayer=0; TimeStep=0
            Evapotranspiration
            MRSpline
            SoilNitrogen: same as Validation.LandP.LandPBase.Field.Lismore.SoilNitrogen
            Organic: same as Validation.Residues.Base.Field.Soil.Organic
            Chemical
              Thickness  NO3N  NH4N  PH
              200        10    0.1   6
              200        10    0.1   6
              200        10    0.1   6
              200        10    0.1   6
              200        10    0.1   6
              200        10    0.1   6
              200        1     0.1   6
            Sample InitialN: Thickness=[150, 150, 300, 300, 300, 300, 300]; SWUnits=Volumetric; OCUnits=Total; PHUnits=Water
            Sample InitialWater: Depth=[0-140]; Thickness=[1400]; SW=[0.2]; SWUnits=Volumetric; OCUnits=Total; PHUnits=Water
            LayerStructure
              Thickness=[25, 25, 50, 50, 50, 50, 50, 50, 50, 50, 50, 50, 50, 50, 50, 50, 50, 50, 50, 50, 50, 50, 50, 50, 50, 50, 50, 50, 50]
            OutputLayers: Thickness=[200, 200, 200, 200, 200, 200, 200]
            CERESSoilTemperature
          Manager ClimateControl: same as Sensibility.Repellency.BaseRepell.Field.ClimateControl
    Experiment Infiltration
      Factors
        Permutation
          Factor ItitialWater
            CompositeFactor Sat: Specifications=[InitialWater]
              Sample InitialWater: Depth=[0-140]; Thickness=[1400]; SW=[0.44]; SWUnits=Volumetric; OCUnits=Total; PHUnits=Water
            CompositeFactor LL: Specifications=[InitialWater]
              Sample InitialWater: Depth=[0-140]; Thickness=[1400]; SW=[0.15]; SWUnits=Volumetric; OCUnits=Total; PHUnits=Water
          Factor MacroPores
            CompositeFactor Many: Specifications=[WEIRDO]
              WEIRDO: Thickness=[1400]; LL15=[0.15]; DUL=[0.3]; SAT=[0.44]; CFlow=[0.9]; XFlow=[3.5]; PsiBub=[-20]; MinRepellancyFactor=[1]; LowerRepellentWC=[0.2]; UpperRepellentWC=[0.8]; BD=[1]; PrecipitationInterception=0; Salb=0.15; SubProfileConductance=20; WaterTableDepth=10; CalculateInfiltration=true; CalculateDrainage=true; ReportDetail=false; IncludeSorption=true; CalculateEvaporation=true; CalculateDiffusion=true; DiffusivityMultiplier=1; ExtractionMultiplier=10; ProfileWaterExtraction=0; TotalCover=0; ResidueWater=0; Hour=0; ReportLayer=0; TimeStep=0
            CompositeFactor Few: Specifications=[WEIRDO]
              WEIRDO: Thickness=[1400]; LL15=[0.15]; DUL=[0.4]; SAT=[0.44]; CFlow=[0.9]; XFlow=[3.5]; PsiBub=[-20]; MinRepellancyFactor=[1]; LowerRepellentWC=[0.2]; UpperRepellentWC=[0.8]; BD=[1]; PrecipitationInterception=0; Salb=0.15; SubProfileConductance=20; WaterTableDepth=10; CalculateInfiltration=true; CalculateDrainage=true; ReportDetail=false; IncludeSorption=true; CalculateEvaporation=true; CalculateDiffusion=true; DiffusivityMultiplier=1; ExtractionMultiplier=10; ProfileWaterExtraction=0; TotalCover=0; ResidueWater=0; Hour=0; ReportLayer=0; TimeStep=0
            CompositeFactor None: Specifications=[WEIRDO]
              WEIRDO: Thickness=[1400]; LL15=[0.15]; DUL=[0.44]; SAT=[0.44]; CFlow=[0.9]; XFlow=[3.5]; PsiBub=[-20]; MinRepellancyFactor=[1]; LowerRepellentWC=[0.2]; UpperRepellentWC=[0.8]; BD=[1]; PrecipitationInterception=0; Salb=0.15; SubProfileConductance=20; WaterTableDepth=10; CalculateInfiltration=true; CalculateDrainage=true; ReportDetail=false; IncludeSorption=true; CalculateEvaporation=true; CalculateDiffusion=true; DiffusivityMultiplier=1; ExtractionMultiplier=10; ProfileWaterExtraction=0; TotalCover=0; ResidueWater=0; Hour=0; ReportLayer=0; TimeStep=0
      Simulation BaseSoil
        Clock: Start=1999-01-01; End=1999-12-31
        Weather: FileName=lincoln.met
        Summary SummaryFile
        Zone Field: Area=1; Slope=0; AspectAngle=0; Altitude=50
          Soil: ASCOrder=Vertosol; ASCSubOrder=Black; SoilType=Clay; Site=Norwin; NearestTown=Norwin; Region=Darling Downs and Granite Belt; State=Queensland; Country=Australia; NaturalVegetation=Qld. Bluegrass, possible Qld. Blue gum; ApsoilNumber=900; Latitude=-27.581836; Longitude=151.320206; LocationAccuracy=+/- 20m
            DataSource=CSIRO Sustainable Ecosystems, Toowoomba; Characteriesd as part of the GRDC funded project"Doing it better, doing it smarter, managing soil water in Australian agriculture' 2011
            Comments=OC, CLL for all crops estimated-based on Bongeen Mywybilla Soil No1
            WEIRDO: PrecipitationInterception=0; Salb=0.15; SubProfileConductance=20; WaterTableDepth=10; CalculateInfiltration=true; CalculateDrainage=true; ReportDetail=false; IncludeSorption=true; CalculateEvaporation=false; CalculateDiffusion=false; DiffusivityMultiplier=2; ExtractionMultiplier=0; ProfileWaterExtraction=0; TotalCover=0; ResidueWater=0; Hour=0; ReportLayer=0; TimeStep=0
            Evapotranspiration
            MRSpline
            SoilNitrogen: same as Validation.LandP.LandPBase.Field.Lismore.SoilNitrogen
            Organic: same as Validation.Residues.Base.Field.Soil.Organic
            Chemical
              Thickness  NO3N  NH4N  PH
              200        10    0.1   6
              200        10    0.1   6
              200        10    0.1   6
              200        10    0.1   6
              200        10    0.1   6
              200        10    0.1   6
              200        1     0.1   6
            Sample InitialN: Thickness=[150, 150, 300, 300, 300, 300, 300]; SWUnits=Volumetric; OCUnits=Total; PHUnits=Water
            Sample InitialWater: SWUnits=Volumetric; OCUnits=Total; PHUnits=Water
            LayerStructure
              Thickness=[25, 25, 50, 50, 50, 50, 50, 50, 50, 50, 50, 50, 50, 50, 50, 50, 50, 50, 50, 50, 50, 50, 50, 50, 50, 50, 50, 50, 50]
            OutputLayers: Thickness=[200, 200, 200, 200, 200, 200, 200]
            CERESSoilTemperature
          Report ReportWaterLayers: EventNames=[Clock].DoReport
          Report ReportWaterBalance: EventNames=[Clock].DoReport
          Fertiliser
          SurfaceOrganicMatter: InitialResidueName=wheat_stubble; InitialResidueType=wheat; InitialResidueMass=0; InitialStandingFraction=0; InitialCPR=0; InitialCNR=100; FractionFaecesAdded=1
          MicroClimate: a_interception=0; b_interception=1; c_interception=0; d_interception=0; soil_albedo=0.3; SoilHeatFluxFraction=0.4; MinimumHeightDiffForNewLayer=0; NightInterceptionFraction=0.5; ReferenceHeight=2
          Irrigation
          Manager Irrigate on a fixed date
            IrrigateDate = 1-feb
            Amount = 50
            Depth = 0
            Efficiency = 1
            WillRunoff = False
            Duration = 2
            script: same as in Sensibility.Rewetting.BaseRewet.Field.Irrigate on a fixed date
    Experiment Layering
      Factors
        Factor Thickness
          CompositeFactor 50mm: Specifications=[LayerStructure]
            LayerStructure
              Thickness=[50, 50, 50, 50, 50, 50, 50, 50, 50, 50, 50, 50, 50, 50, 50, 50, 50, 50, 50, 50, 50, 50, 50, 50, 50, 50, 50, 50]
          CompositeFactor 100mm: Specifications=[LayerStructure]
            LayerStructure
              Thickness=[100, 100, 100, 100, 100, 100, 100, 100, 100, 100, 100, 100, 100, 100]
          CompositeFactor 200mm: Specifications=[LayerStructure]
            LayerStructure: Thickness=[200, 200, 200, 200, 200, 200, 200]
      Simulation BaseLayer
        Clock: Start=1999-01-01; End=1999-12-31
        Weather: FileName=lincoln.met
        Summary SummaryFile
        Zone Field: Area=1; Slope=0; AspectAngle=0; Altitude=50
          Fertiliser
          SurfaceOrganicMatter: InitialResidueName=wheat_stubble; InitialResidueType=wheat; InitialResidueMass=0; InitialStandingFraction=0; InitialCPR=0; InitialCNR=100; FractionFaecesAdded=1
          MicroClimate: a_interception=0; b_interception=1; c_interception=0; d_interception=0; soil_albedo=0.3; SoilHeatFluxFraction=0.4; MinimumHeightDiffForNewLayer=0; NightInterceptionFraction=0.5; ReferenceHeight=2
          Irrigation
          Manager ClimateControl: same as Sensibility.Diffusion.BaseDiffuse.Field.ClimateControl
          Soil: ASCOrder=Vertosol; ASCSubOrder=Black; SoilType=Clay; Site=Norwin; NearestTown=Norwin; Region=Darling Downs and Granite Belt; State=Queensland; Country=Australia; NaturalVegetation=Qld. Bluegrass, possible Qld. Blue gum; ApsoilNumber=900; Latitude=-27.581836; Longitude=151.320206; LocationAccuracy=+/- 20m
            DataSource=CSIRO Sustainable Ecosystems, Toowoomba; Characteriesd as part of the GRDC funded project"Doing it better, doing it smarter, managing soil water in Australian agriculture' 2011
            Comments=OC, CLL for all crops estimated-based on Bongeen Mywybilla Soil No1
            WEIRDO: PrecipitationInterception=0; Salb=0.15; SubProfileConductance=20; WaterTableDepth=10; CalculateInfiltration=true; CalculateDrainage=true; ReportDetail=false; IncludeSorption=true; CalculateEvaporation=true; CalculateDiffusion=true; DiffusivityMultiplier=1; ExtractionMultiplier=0; ProfileWaterExtraction=0; TotalCover=0; ResidueWater=0; Hour=0; ReportLayer=0; TimeStep=0
              Thickness  LL15  DUL   SAT   CFlow  XFlow  PsiBub  MinRepellancyFactor  LowerRepellentWC  UpperRepellentWC  BD
              200        0.15  0.3   0.44  0.6    3      -20     1                    0.2               0.8               1
              200        0.14  0.28  0.46  0.6    3      -20     1                    0.2               0.8               1.2
              200        0.14  0.28  0.46  0.6    3      -20     1                    0.2               0.8               1.2
              200        0.14  0.26  0.36  0.6    3      -20     1                    0.2               0.8               1.3
              200        0.14  0.26  0.36  0.6    3      -20     1                    0.2               0.8               1.4
              200        0.14  0.26  0.36  0.6    3      -20     1                    0.2               0.8               1.5
              200        0.14  0.26  0.36  0.6    3      -20     1                    0.2               0.8               1.6
            Evapotranspiration
            MRSpline
            SoilNitrogen: same as Validation.LandP.LandPBase.Field.Lismore.SoilNitrogen
            Organic: same as Validation.Residues.Base.Field.Soil.Organic
            Chemical
              Thickness  NO3N  NH4N  PH
              200        10    0.1   6
              200        10    0.1   6
              200        10    0.1   6
              200        10    0.1   6
              200        10    0.1   6
              200        10    0.1   6
              200        1     0.1   6
            Sample InitialN: Thickness=[150, 150, 300, 300, 300, 300]; SWUnits=Volumetric; OCUnits=Total; PHUnits=Water
            Sample InitialWater: Thickness=[200, 200, 200, 200, 200, 200, 200]; SW=[0.44, 0.46, 0.46, 0.36, 0.36, 0.36, 0.36]; SWUnits=Volumetric; OCUnits=Total; PHUnits=Water
            OutputLayers: Thickness=[200, 200, 200, 200, 200, 200, 200, 200]
            LayerStructure
            CERESSoilTemperature
          Report ReportWaterLayers: EventNames=[Clock].DoReport
          Report ReportWaterBalance: EventNames=[Clock].DoReport
          Report: EventNames=[Clock].DoReport
            VariableNames:
              [Clock].Today
              sum([Soil].OutputLayers.SWmm[1:4]) as TopWater
              sum([Soil].OutputLayers.SWmm[5:8]) as BotWater
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