Simulations: Version=2
  Replacements
    Plant Wheat: CropType=Wheat
      Memo TitlePage
        # The APSIM Wheat Model

        _Brown, H.E., Huth, N.I. and Holzworth, D.P._

        The APSIM wheat model has been developed using the Plant Modelling Framework (PMF) of [brown_plant_2014]. This new framework provides a library of plant organ and process submodels that can be coupled, at runtime, to construct a model in much the same way that models can be coupled to construct a simulation. This means that dynamic composition of lower level process and organ classes (e.g. photosynthesis, leaf) into larger constructions (e.g. maize, wheat, sorghum) can be achieved by the model developer without additional coding.

        The model consists of:

        * a phenology model to simulate development between growth phases
        * a structure model to simulate plant morphology
        * a collection of organs to simulate the various plant parts
        * an arbitrator to allocate resources (N, biomass) to the various plant organs
      OrganArbitrator Arbitrator: NArbitrationOption=RelativeAllocation; DMArbitrationOption=RelativeAllocation
      Phenology: DaysAfterSowing=0
        Memo
          Wheat exhibits a range of developmental responses to environment and these are strongly influences by genotype characteristics.
          Temperature effects development and it effects are captured by thermal time, incrasing development rates and decreasing phase durations as temperatures as temperatures increase.  However, wheat also exhibits vernalisation and photoperiod sensitivities in its Vegetative phase and further photoperiod sensitivity in the EarlyReproducivePhase.  Photoperiod responses are seen as a reduction in the length of a phase for a photoperiod sensitive genotype in response to a longer photoperiod.  Vernalisation responses are more complicated as they are driven by temperature but interact with photoperiod.  For vernalisation sensitive varieties (Winter types) exposure to cool temperatures or short photoperiods during the Vegetative phase will reduce the thermal time duration of the vegetative phase.

          This model draws on the Kirby Framework to capture these vernalisation and photoperiod responses.  This framework assumes that the timing of anthesis is a result of the timing of flag leaf and an additional thermal time passage from there to anthesis.  It also assumes the timing of flag leaf is a rusult of the Final Leaf Number which sets a target, and leaf appearance rate, which sets the rate of progress to this target.  Leaf appearance rate is a function of Thermal time and a genotype specific Phyllochron which changes with Haun stage as described by [Jamieson_LeafAppearance_1995].

          Final Leaf Number (FLN) is modeled as the sum of three numbers:

          FLN = MinLeafNumber + VernalLeaves + PhotoLeaves

          Where MinLeafNumber is the number of leaves that a wheat crop will produce when vernalisation is satisified early in the crops duration (before 2nd true leaf) and it is grown in a long photoperiod..  VernalLeaves are the number of leaves that are added due to vernalisation effects.  For insensitive varieties this will always be zero but this is potentially a larger number for sensitivie varieties and the number progresively decreases as the crop encounters more vernalisation.  PhotoLeaves are the number of leaves that are added to the minimum leaf number as a result of short day exposure.  For insensitive varieties this will be zero but is potential larger for more sensitivie varieties and decreases as day length increases.  More detailed explinations of the components of phenology are provided below.
        DivideFunction MeanTemp
          AddFunction
            VariableReference MaxT: VariableName=[Weather].MaxT
            VariableReference MinT: VariableName=[Weather].MinT
          Constant Two: Value=2
        AirTemperatureFunction ThermalTime
          XYPairs: X=[0, 26, 37]; Y=[0, 26, 0]
          Memo
            Thermal time determines the rate of developmental progress through many of the crops phases and is used by organs to determing potential growth rates.
        MultiplyFunction DailyVernalisation
          Memo
            Vernalisation responses are based on those described by [Brown_Anthesis_2013,].   Vernalisation is assumed to be related to the expression of the Vrn1 Gene.  Its experssion is accumulated daily and daily upregulation as a function of development (DeltaHaunStage) and a TempResponseProfile that declines exponentially from a maximum at 1oC to zero at 0oC and at 18oC.
          VariableReference DeltaHaunStage: VariableName=[Structure].DeltaHaunStage
          AirTemperatureFunction TempResponseProfile
            XYPairs
              X=[0, 1, 2, 3, 4, 5, 6, 7, 8, 9, 10, 11, 12, 13, 14, 15, 16, 17, 18, 19, 20, 30, 32]
              Y=[0, 1.20499, 1.03715, 0.892679, 0.768336, 0.661313, 0.569198, 0.489913, 0.421672, 0.362936, 0.312382, 0.26887, 0.231418, 0.1991837, 0.171439, 0.147559, 0.127005, 0.109314, 0.0940877, 0.080982, 0, 0, -0.5]
        PhotoperiodFunction Photoperiod: Twilight=-6; DayLength=0
        PhaseLookup PercievedPhotoPeriod
          PhaseLookupValue ApexBelowGround: Start=Germination; End=Emergence
            Constant: Value=0; Units=h
          PhaseLookupValue ApexAboveGround: Start=Emergence; End=HarvestRipe
            VariableReference Photoperiod: VariableName=[Phenology].Photoperiod.Value
        MinimumFunction Vrn1
          Memo
            Vrn1 accumulation begins when Vrn4 experssion is down regulated to zero and stop, assuming vernalisation saturation, at a value of 1
          Constant Saturation: Value=1; Units=Relative Experssion
          AccumulateFunction CurrentExpression: StartStageName=Germination; EndStageName=TerminalSpikelet
            LessThanFunction Vernalisation
              VariableReference If_Vrn4: VariableName=[Phenology].Vrn4.Value
              VariableReference IsLessThanLag: VariableName=[Phenology].VernLag.Value
              Constant Return_Zero: Value=0
              VariableReference elseReturn_Vernalisation: VariableName=[Phenology].DailyVernalisation.Value
        MinimumFunction Vrn4
          VariableReference MaxExpression: VariableName=[Phenology].VernLag.Value
          AccumulateFunction CurrentExpression: StartStageName=Germination; EndStageName=TerminalSpikelet
            VariableReference VernalisationConditioning: VariableName=[Phenology].DailyVernalisation.Value
        GerminatingPhase Germinating: Start=Sowing; End=Germination
        EmergingPhase Emerging: Start=Germination; End=Emergence; ShootLag=40; ShootRate=1.5
          VariableReference ThermalTime: VariableName=[Phenology].ThermalTime.Value
        GenericPhase Vegetative: Start=Emergence; End=TerminalSpikelet
          Memo
            The duration of the vegetative phase is set by a target Haun Stage for the occurance of Terminal Spikelet and the rate of leaf appearance.
          VariableReference ThermalTime: VariableName=[Phenology].ThermalTime.Value
          MultiplyFunction Target
            VariableReference Phyllochron: VariableName=[Structure].MeanPhyllochron.Value
            VariableReference HSTS: VariableName=[Structure].HaunStageTerminalSpikelet.Value
          Memo Memo1
            HSTS decreases as vernalisation is accumulated and as photoperiod extends, capturing the effect of these responses on the duration of the Vegetative phase
        LeafAppearancePhase StemElongation: Start=TerminalSpikelet; End=FlagLeaf
          Memo
            The Final leaf number is fixed at Terminal Spikelet and leaves contune to appear at a rate set by thermal time and phyllochron until flag leaf liguale appears and this phase is completed.
          VariableReference ThermalTime: VariableName=[Phenology].ThermalTime.Value
        GenericPhase EarlyReproductive: Start=FlagLeaf; End=Flowering
          VariableReference ThermalTime: VariableName=[Phenology].ThermalTime.Value
          MultiplyFunction Target
            VariableReference Phyllochron
              VariableName=[Structure].MainStemNodeAppearanceRate.BasePhyllochron.Value
            AddFunction Phyllochrons
              VariableReference LongDayBase: VariableName=[Phenology].EarlyReproductiveLongDayBase.Value
              MultiplyFunction IncreaseDueToShortPhotoPeriod
                LinearInterpolationFunction PhotoPeriodResponse: XProperty=[Phenology].Photoperiod.Value
                  XYPairs: X=[11, 16]; Y=[1, 0]
                VariableReference PpSensitivity: VariableName=[Phenology].EarlyReproductivePpSensitivity.Value
        GenericPhase GrainDevelopment: Start=Flowering; End=StartGrainFill
          Constant Target: Value=120
          VariableReference ThermalTime: VariableName=[Phenology].ThermalTime.Value
        GenericPhase GrainFilling: Start=StartGrainFill; End=EndGrainFill
          Constant Target: Value=545
          VariableReference ThermalTime: VariableName=[Phenology].ThermalTime.Value
        GenericPhase Maturing: Start=EndGrainFill; End=Maturity
          Constant Target: Value=35
          VariableReference ThermalTime: VariableName=[Phenology].ThermalTime.Value
        GenericPhase Ripening: Start=Maturity; End=HarvestRipe
          Constant Target: Value=300
          VariableReference ThermalTime: VariableName=[Phenology].ThermalTime.Value
        EndPhase ReadyForHarvesting: Start=HarvestRipe; End=Unused
          VariableReference ThermalTime: VariableName=[Phenology].ThermalTime.Value
        ZadokPMF Zadok
        OnEventFunction FlagLeafDAS: SetEvent=FlagLeaf; ReSetEvent=never
          Memo
            A function is used to provide flowering date as days after sowing(DAS).
          Constant PreEventValue: Value=0
          VariableReference PostEventValue: VariableName=[Phenology].DaysAfterSowing
        OnEventFunction FloweringDAS: SetEvent=Flowering; ReSetEvent=never
          Memo
            A function is used to provide flowering date as days after sowing(DAS).
          Constant PreEventValue: Value=0
          VariableReference PostEventValue: VariableName=[Phenology].DaysAfterSowing
        OnEventFunction MaturityDAS: SetEvent=Maturity; ReSetEvent=never
          Memo
            A function is used to provide maturity date as days after sowing(DAS).
          Constant PreEventValue: Value=0
          VariableReference PostEventValue: VariableName=[Phenology].DaysAfterSowing
        Constant MinimumLeafNumber: Value=7; Units=Leaves
          Memo
            Number of leaves the plant will produce when fully vernalised early and grown in long photoperiod
        Constant VrnSensitivity: Value=0; Units=Leaves
          Memo
            The difference between Inherent earlyness leaf number and the number of leaves produced when the plant is unvernalisaed and grown in long photoperiod
        Constant PpSensitivity: Value=3; Units=Leaves
          Memo
            The reduction in leaf number going from 8 to 16 h Pp
        Constant VernLag: Value=1; Units=Unitless
          Memo
            The amount of vernalising temperature required before vernalisation response will be evident.  Value of relative to the amount offl vernalisation temperature required from the end of the lag until vernalisation saturation.  A value of 0 means there is no lag, a value of 1 means the lag is the same (in vernal time) as the vernalisation requirement and a value of 2 means the lag is twice as long as the vernalisation response phase
        Constant EarlyReproductivePpSensitivity: Value=0
          Memo
            The phyllochrons duration for the plant to go from flag leaf ligual appearance at 16 h Pp compared to the phyllochron duration for the same phase at 8 h Pp.
        Constant EarlyReproductiveLongDayBase: Value=2.5
          Memo
            The phyllochrons duration for the plant to go from flag leaf ligual appearance at 16 h Pp.
      Structure: Initialised=false; Germinated=false; Emerged=false
        VariableReference ThermalTime: VariableName=[Phenology].ThermalTime.Value
        MultiplyFunction MainStemNodeAppearanceRate
          LinearInterpolationFunction LeafStageFactor: XProperty=[Leaf].AppearedCohortNo
            XYPairs: X=[0, 2, 3, 7, 8, 11, 12]; Y=[0.75, 0.75, 1, 1, 1.4, 1.4, 1.4]
          Constant BasePhyllochron: Value=120
          Memo Rational
            Based on [Jamieson_SIRIUS_1998] where leaf appearace could be described by a base phyllochron determined between leaves 2 and 7 and a phyllochron that was 70% of base phyllochron for leaves < 2 and 130% of base phyllochron for leaves > 7
          LinearInterpolationFunction PhotoPeriodEffect: XProperty=[Phenology].Photoperiod.Value
            XYPairs: X=[8, 12, 14]; Y=[1.6, 1, 1]
        MultiplyFunction BranchingRate
          PhaseLookup PotentialBranchingRate
            PhaseLookupValue Vegetative: Start=Emergence; End=TerminalSpikelet
              LinearInterpolationFunction PotentialBranchingRate: XProperty=[Structure].LeafTipsAppeared
                XYPairs: X=[1, 2, 3, 4, 5, 6, 7, 8]; Y=[0, 0, 1, 2, 4, 7, 12, 20]
            PhaseLookupValue Reproductive: Start=TerminalSpikelet; End=HarvestRipe
              Constant Zero: Value=0
          MinimumFunction StressFactors
            LinearInterpolationFunction WSC: XProperty=[Stem].PercentWSC.Value
              XYPairs: X=[0.2, 0.27]; Y=[1, 1]
            LinearInterpolationFunction Nitrogen: XProperty=[Arbitrator].FN
              XYPairs: X=[0.5, 2, 3]; Y=[0, 1, 1]
            LinearInterpolationFunction Cover: XProperty=[Leaf].CoverTotal
              XYPairs: X=[0, 0.1, 0.25]; Y=[1, 1, 0]
            LinearInterpolationFunction Growth: XProperty=[Structure].MeanTillerGrowthRate.Value
              XYPairs: X=[0, 0.001, 0.005]; Y=[1, 1, 1]
            LinearInterpolationFunction PhotoPeriodEffect: XProperty=[Phenology].Photoperiod.Value
              XYPairs: X=[11.99, 12, 14]; Y=[1, 1, 1]
            LinearInterpolationFunction TemperatuerEffect: XProperty=[Phenology].MeanTemp.Value
              XYPairs: X=[4, 10, 14]; Y=[1, 1, 1]
        PhaseLookup BranchMortality
          PhaseLookupValue MortalityPhase: Start=FlagLeaf; End=Flowering
            MultiplyFunction Mortality
              LinearInterpolationFunction MortalityPerDegDay: XProperty=[Structure].MeanTillerGrowthRate.Value
                XYPairs: X=[0, 0.005, 0.005]; Y=[0.002, 0, 0]
              VariableReference ThermalTime: VariableName=[Phenology].ThermalTime.Value
        HeightFunction HeightModel
          LinearInterpolationFunction PotentialHeight: XProperty=[Phenology].Stage
            XYPairs: X=[3, 4, 5, 6, 7]; Y=[10, 200, 1000, 1100, 1200]
          LinearInterpolationFunction WaterStress: XProperty=[Wheat].WaterSupplyDemandRatio
            XYPairs: X=[0.3, 1]; Y=[0, 1]
        MovingAverageFunction MeanTillerGrowthRate: NumberOfDays=5; InitialValue=0
          DivideFunction TillerGrowthRate
            VariableReference DailyGrowth: VariableName=[Arbitrator].DMSupply
            VariableReference ThermalTime: VariableName=[Phenology].ThermalTime.Value
            VariableReference StemPopulation: VariableName=[Structure].TotalStemPopn
        MovingAverageFunction MeanPhyllochron: NumberOfDays=300; InitialValue=80
          VariableReference Phyllochron: VariableName=[Structure].MainStemNodeAppearanceRate.Value
        HoldFunction MainStemFinalNodeNumber: WhenToHold=TerminalSpikelet
          AddFunction ValueToHold
            VariableReference MinLeafNumber: VariableName=[Phenology].MinimumLeafNumber.Value
            MultiplyFunction VernalLeaves
              VariableReference UnVernalisedLeaves: VariableName=[Phenology].VrnSensitivity.Value
              SubtractFunction VernalisationReductionFactor
                Constant One: Value=1
                VariableReference RelativeVrn1Expression: VariableName=[Phenology].Vrn1.Value
            MultiplyFunction PhotoPLeaves
              VariableReference ShortPpLeaves: VariableName=[Phenology].PpSensitivity.Value
              LinearInterpolationFunction PhotoPeriodReductionFactor: XProperty=[Phenology].Photoperiod.Value
                XYPairs: X=[10, 16]; Y=[1, 0]
        DivideFunction HaunStageTerminalSpikelet
          SubtractFunction FLNlessIntercept
            VariableReference FinalLeafNumber: VariableName=[Structure].MainStemFinalNodeNumber.Value
            Constant Intercept: Value=2.85
          Constant Slope: Value=1.1
        AddFunction HaunStage
          VariableReference AppearedLeaves: VariableName=[Leaf].ExpandedCohortNo
          VariableReference ProportionOfExpandingLeaf: VariableName=[Leaf].NextExpandingLeafProportion
      ReproductiveOrgan Grain: GrowthRespiration=0; MaintenanceRespiration=0; RipeStage=Ripe
        Biomass Live
        Biomass Dead
        Constant MaxNConcDailyGrowth: Value=0.03
        Constant WaterContent: Value=0.12
        Constant MinimumNConc: Value=0.006
        Constant MaximumNConc: Value=0.03
        Constant MaximumPotentialGrainSize: Value=0.043; Units=g
        PhaseBasedSwitch NitrogenDemandSwitch: Start=Germination; End=Maturity
        AccumulateFunction AccumThermalTime: StartStageName=Flowering; EndStageName=Maturity
          VariableReference DailyThermalTimeValue: VariableName=[Phenology].ThermalTime.Value
        AirTemperatureFunction FillingRate
          XYPairs: X=[0, 26, 30, 35]; Y=[0, 0.0015, 0.0015, 0.0015]
        PhaseLookup DMDemandFunction
          PhaseLookupValue InitialPhase: Start=Flowering; End=StartGrainFill
            FillingRateFunction
              VariableReference NumberFunction: VariableName=[Grain].NumberFunction.Value
              VariableReference FillingDuration: VariableName=[Phenology].GrainDevelopment.Target.Value
              VariableReference ThermalTime: VariableName=[Phenology].ThermalTime.Value
              MultiplyFunction PotentialSizeIncrement
                VariableReference InitialProportion: VariableName=[Grain].InitialGrainProportion.Value
                VariableReference MaximumSize: VariableName=[Grain].MaximumPotentialGrainSize.Value
          PhaseLookupValue LinearPhase: Start=StartGrainFill; End=EndGrainFill
            FillingRateFunction
              VariableReference NumberFunction: VariableName=[Grain].NumberFunction.Value
              VariableReference FillingDuration: VariableName=[Phenology].GrainFilling.Target.Value
              VariableReference ThermalTime: VariableName=[Phenology].ThermalTime.Value
              MultiplyFunction PotentialSizeIncrement
                SubtractFunction ProportionLinearPhase
                  Constant One: Value=1
                  VariableReference InitialProportion: VariableName=[Grain].InitialGrainProportion.Value
                VariableReference MaximumSize: VariableName=[Grain].MaximumPotentialGrainSize.Value
        ExpressionFunction Protein
          Expression=([Grain].Live.N + [Grain].Dead.N)/([Grain].Live.Wt + [Grain].Dead.Wt) * 100 * 5.71
        DivideFunction GrowthRateGrainDevelopment
          AccumulateFunction GrowthGrainDevelopment: StartStageName=FlagLeaf; EndStageName=StartGrainFill
            VariableReference DailyBiomassProduction: VariableName=[Arbitrator].DMSupply
          AccumulateFunction DaysGrainDevelopment: StartStageName=FlagLeaf; EndStageName=StartGrainFill
            Constant LenthOfADay: Value=1; Units=days/day
        Constant InitialGrainProportion: Value=0.05
        PhaseLookup NFillingRate
          PhaseLookupValue GrainFilling: Start=Flowering; End=EndGrainFill
            FillingRateFunction
              VariableReference NumberFunction: VariableName=[Grain].NumberFunction.Value
              AddFunction FillingDuration
                VariableReference FloweringToGrainFilling: VariableName=[Phenology].GrainDevelopment.Target.Value
                VariableReference GrainFilling: VariableName=[Phenology].GrainFilling.Target.Value
              VariableReference ThermalTime: VariableName=[Phenology].ThermalTime.Value
              MultiplyFunction PotentialSizeIncrement
                Constant MaximumFinalNConc: Value=0.026; Units=g/g
                VariableReference MaximumSize: VariableName=[Grain].MaximumPotentialGrainSize.Value
        BiomassRemoval BiomassRemovalDefaults
          OrganBiomassRemovalType Harvest: FractionLiveToRemove=1; FractionDeadToRemove=0; FractionLiveToResidue=0; FractionDeadToResidue=0
          OrganBiomassRemovalType Cut: FractionLiveToRemove=1; FractionDeadToRemove=0; FractionLiveToResidue=0; FractionDeadToResidue=0
          OrganBiomassRemovalType Prune: FractionLiveToRemove=0; FractionDeadToRemove=0; FractionLiveToResidue=0.8; FractionDeadToResidue=0
          OrganBiomassRemovalType Graze: FractionLiveToRemove=0.6; FractionDeadToRemove=0; FractionLiveToResidue=0.2; FractionDeadToResidue=0
          OrganBiomassRemovalType Thin: FractionLiveToRemove=0; FractionDeadToRemove=0; FractionLiveToResidue=0.05; FractionDeadToResidue=0
        HoldFunction NumberFunction: WhenToHold=Flowering
          MultiplyFunction ValueToHold
            Constant GrainsPerGramOfStem: Value=22; Units=grains
            VariableReference StemMass: VariableName=[StemPlusSpike].Wt
              VariableReference StemMass: VariableName=[StemPlusSpike].Wt
      Root: GrowthRespiration=0; MaintenanceRespiration=0
        CompositeBiomass Live: Propertys=[[Root].LayerLive]
        CompositeBiomass Dead: Propertys=[[Root].LayerDead]
        LinearInterpolationFunction KLModifier: XProperty=[Leaf].LAI
          XYPairs: X=[0, 3]; Y=[1, 1]
        Constant SoilWaterEffect: Value=1
        Constant MaxDailyNUptake: Value=20
        Constant SenescenceRate: Value=0.005
        Constant StructuralFraction: Value=1
        Constant MaximumRootDepth: Value=1000000
        PhaseLookup PartitionFraction
          PhaseLookupValue PreEmergence: Start=Germination; End=Emergence
            Constant Value: Value=0
          PhaseLookupValue PreFlowering: Start=Emergence; End=Flowering
            Constant Value: Value=0.2
          PhaseLookupValue PostFlowering: Start=Flowering; End=EndGrainFill
            Constant Value: Value=0.2
        Constant MaximumNConc: Value=0.01
        Constant MinimumNConc: Value=0.01
        PhaseLookup RootFrontVelocity
          PhaseLookupValue PreEmergence: Start=Germination; End=Emergence
            Constant Value: Value=5
          PhaseLookupValue PostEmergence: Start=Emergence; End=Maturity
            Constant Value: Value=20
        PhaseBasedSwitch NitrogenDemandSwitch: Start=Germination; End=Maturity
        BiomassRemoval BiomassRemovalDefaults
          OrganBiomassRemovalType Harvest: FractionLiveToRemove=0; FractionDeadToRemove=0; FractionLiveToResidue=0.2; FractionDeadToResidue=0
          OrganBiomassRemovalType Cut: FractionLiveToRemove=0; FractionDeadToRemove=0; FractionLiveToResidue=0.3; FractionDeadToResidue=0
          OrganBiomassRemovalType Prune: FractionLiveToRemove=0; FractionDeadToRemove=0; FractionLiveToResidue=0.1; FractionDeadToResidue=0
          OrganBiomassRemovalType Graze: FractionLiveToRemove=0; FractionDeadToRemove=0; FractionLiveToResidue=0.15; FractionDeadToResidue=0
          OrganBiomassRemovalType Thin: FractionLiveToRemove=0; FractionDeadToRemove=0; FractionLiveToResidue=0.05; FractionDeadToResidue=0
        LinearInterpolationFunction KNO3: XProperty=[Root].RootLengthDenisty
          XYPairs: X=[0, 0.004]; Y=[0.002, 0.02]
        LinearInterpolationFunction KNH4: XProperty=[Root].RootLengthDenisty
          XYPairs: X=[0, 0.004]; Y=[0.001, 0.01]
        LinearInterpolationFunction NUptakeSWFactor: XProperty=[Root].RWC
          XYPairs: X=[0, 0.2, 1]; Y=[1, 1, 1]
        Constant InitialDM: Value=0.2; Units=g/plant
        Constant SpecificRootLength: Value=40; Units=m/g
      Leaf: MaxCover=1; Albedo=0.2; Gsmax=0.015; R50=150; KDead=0.3; MaximumMainStemLeafNumber=30
        zero: GrowthRespiration, MaintenanceRespiration, CurrentExpandingLeaf, StartFractionExpanded, FractionNextleafExpanded, DeadNodesYesterday, FRGR, PotentialEP, FudgeToGetETDemandRight, DMConversionEfficiency, TipsAtEmergence, CohortsAtInitialisation
        LeafCohort InitialLeaves[1]: DeltaWaterConstrainedArea=0; DeltaCarbonConstrainedArea=0; Rank=1; Area=200; MaintenanceRespiration=0
        LeafCohort InitialLeaves[2]: DeltaWaterConstrainedArea=0; DeltaCarbonConstrainedArea=0; Rank=2; Area=0; MaintenanceRespiration=0
        CompositeBiomass Live: Propertys=[[Leaf].CohortLive]
        CompositeBiomass Dead: Propertys=[[Leaf].CohortDead]
        ArrayBiomass CohortArrayLive: Propertys=[[Leaf].Live]; ArraySize=[Leaf].MaxNodeNo
        ArrayBiomass CohortArrayDead: Propertys=[[Leaf].Dead]; ArraySize=[Leaf].MaxNodeNo
        LeafCohortParameters CohortParameters
          Constant CellDivisionStress: Value=1
          Constant DroughtInducedSenAcceleration: Value=1
          Constant NReallocationFactor: Value=1
          Constant NRetranslocationFactor: Value=0.03
          Constant DMReallocationFactor: Value=0
          Constant DMRetranslocationFactor: Value=0
          MinimumFunction CellDivisionStress
            LinearInterpolationFunction WaterStressFactor: XProperty=[Wheat].WaterSupplyDemandRatio
              XYPairs: X=[0.5, 1]; Y=[0.1, 1]
            LinearInterpolationFunction NitrogenStressFactor: XProperty=[Wheat].Leaf.Fn
              XYPairs: X=[0, 0.5, 1]; Y=[0.1, 0.1, 1]
          MinimumFunction ExpansionStress
            LinearInterpolationFunction WaterStress: XProperty=[Wheat].WaterSupplyDemandRatio
              XYPairs: X=[0.1, 1.1, 1.3]; Y=[0, 1, 1]
            LinearInterpolationFunction TemperatuerEffect: XProperty=[Phenology].MeanTemp.Value
              XYPairs: X=[0, 12, 14]; Y=[0, 1, 1]
          MultiplyFunction MaxArea
            Constant AreaLargestLeaves: Value=2600; Units=mm^2
            LinearInterpolationFunction AgeFactor: XProperty=[Phenology].Stage
              XYPairs: X=[3, 3.45, 4]; Y=[0.1, 0.5, 1]
          MultiplyFunction GrowthDuration
            Constant Multiplier: Value=1.3
            VariableReference Phyllochron: VariableName=[Structure].MainStemNodeAppearanceRate.Value
          PhaseLookup LagDuration
            PhaseLookupValue VegetativeGrowth: Start=Emergence; End=TerminalSpikelet
              MultiplyFunction LagDuration
                VariableReference Phyllochron: VariableName=[Structure].MainStemNodeAppearanceRate.Value
                LinearInterpolationFunction AgeFactor: XProperty=[Phenology].Stage
                  XYPairs: X=[3, 4]; Y=[5, 7]
            PhaseLookupValue StemElongation: Start=TerminalSpikelet; End=FlagLeaf
              SubtractFunction LagDuration
                AddFunction ThermalTimeToRipe
                  VariableReference EarlyReproductive: VariableName=[Phenology].EarlyReproductive.Target.Value
                  VariableReference GrainDevelopment: VariableName=[Phenology].GrainDevelopment.Target.Value
                  VariableReference GrainFilling: VariableName=[Phenology].GrainFilling.Target.Value
                  VariableReference Maturing: VariableName=[Phenology].Maturing.Target.Value
                  VariableReference Ripening: VariableName=[Phenology].Ripening.Target.Value
                ExpressionFunction SenescenceDuration: Expression=[Leaf].CohortParameters.SenescenceDuration.Value
          AddFunction LagDurationX
            MultiplyFunction ShortestDuration
              Constant Multiplier: Value=2
              VariableReference Phyllochron: VariableName=[Structure].MainStemNodeAppearanceRate.Value
            MultiplyFunction
              LinearInterpolationFunction AgeFactor: XProperty=[Phenology].Stage
                XYPairs: X=[3, 5]; Y=[0, 1]
              ExpressionFunction LongestDuration
                Expression=[Phenology].EarlyReproductive.Target.Value+[Phenology].GrainDevelopment.Target.Value + [Phenology].GrainFilling.Target.Value +200
          MultiplyFunction SenescenceDuration
            Constant Multiplier: Value=3
            VariableReference Phyllochron: VariableName=[Structure].MainStemNodeAppearanceRate.Value
          Constant DetachmentLagDuration: Value=1000000
          Constant DetachmentDuration: Value=1000000
          Constant RelativeBranchLeafSize: Value=1
          LinearInterpolationFunction MaximumNConc: XProperty=[Phenology].Stage
            XYPairs: X=[3, 4, 6]; Y=[0.08, 0.05, 0.02]
          LinearInterpolationFunction CriticalNConc: XProperty=[Phenology].Stage
            XYPairs: X=[3, 4, 6]; Y=[0.07, 0.04, 0.015]
          LinearInterpolationFunction MinimumNConc: XProperty=[Phenology].Stage
            XYPairs: X=[3, 4]; Y=[0.01, 0.005]
          AddFunction DroughtInducedSenAcceleration
            Constant One: Value=1
            MultiplyFunction Stress
              Constant StressResponseCoefficient: Value=1
              LinearInterpolationFunction StressFactor: XProperty=[Wheat].WaterSupplyDemandRatio
                XYPairs: X=[0, 0.5]; Y=[1, 0]
          LinearInterpolationFunction SpecificLeafAreaMax: XProperty=[Phenology].Stage
            XYPairs: X=[3, 4]; Y=[18000, 30000]
          LinearInterpolationFunction SpecificLeafAreaMin: XProperty=[Leaf].Fn
            XYPairs: X=[0.4, 1]; Y=[10000, 18000]
          Constant InitialNConc: Value=0
          Constant StructuralFraction: Value=0.5
          Constant NonStructuralFraction: Value=0
          Constant LeafSizeShapeParameter: Value=0.3
          Constant SenessingLeafRelativeSize: Value=1; Units=0-1
          MultiplyFunction ShadeInducedSenescenceRate
            LinearInterpolationFunction RatePerDegDay: XProperty=[Leaf].CohortCurrentRankCoverAbove
              XYPairs: X=[0.99, 1]; Y=[0, 0]
              Memo
                1% per degree day means it takes one phyllochron for a shaded leaf to fully sceness
            VariableReference ThermalTime: VariableName=[Phenology].ThermalTime.Value
          Constant MaintenanceRespirationFunction: Value=0
        RUEModel Photosynthesis
          Constant RUE: Value=1.5
          WeightedTemperatureFunction FT: MaximumTemperatureWeighting=0.75
            XYPairs: X=[0, 15, 25, 35]; Y=[0, 1, 1, 0]
          LinearInterpolationFunction FVPD: XProperty=[Leaf].Photosynthesis.VPD
            XYPairs: X=[0, 10, 50]; Y=[1, 1, 1]
          LinearInterpolationFunction FN: XProperty=[Leaf].Fn
            XYPairs: X=[0, 1, 1.5]; Y=[0, 1, 1]
          LinearInterpolationFunction FW: XProperty=[Leaf].Fw
            XYPairs: X=[0, 1, 1]; Y=[0, 1, 1]
          RUECO2Function FCO2: PhotosyntheticPathway=C3
          VariableReference RadnInt: VariableName=[Leaf].RadIntTot
        LinearInterpolationFunction FrostFraction: XProperty=[Weather].MinT
          XYPairs: X=[-1, 0]; Y=[0, 0]
        VariableReference ThermalTime: VariableName=[Phenology].ThermalTime.Value
        MinimumFunction FRGRFunction
          VariableReference RUE_FT: VariableName=[Leaf].Photosynthesis.FT.Value
          MinimumFunction Others
            VariableReference RUE_FN: VariableName=[Leaf].Photosynthesis.FN.Value
            VariableReference RUE_FVPD: VariableName=[Leaf].Photosynthesis.FVPD.Value
        BiomassRemoval BiomassRemovalDefaults
          OrganBiomassRemovalType Harvest: FractionLiveToRemove=0; FractionDeadToRemove=0; FractionLiveToResidue=0.3; FractionDeadToResidue=0.3
          OrganBiomassRemovalType Cut: FractionLiveToRemove=0.8; FractionDeadToRemove=0.8; FractionLiveToResidue=0; FractionDeadToResidue=0
          OrganBiomassRemovalType Prune: FractionLiveToRemove=0; FractionDeadToRemove=0; FractionLiveToResidue=0.6; FractionDeadToResidue=0.6
          OrganBiomassRemovalType Graze: FractionLiveToRemove=0.6; FractionDeadToRemove=0.6; FractionLiveToResidue=0.1; FractionDeadToResidue=0.1
          OrganBiomassRemovalType Thin: FractionLiveToRemove=0; FractionDeadToRemove=0; FractionLiveToResidue=0.05; FractionDeadToResidue=0.05
        Constant ExtinctionCoeff: Value=0.5
        Constant StructuralFraction: Value=0.5
      GenericOrgan Spike: GrowthRespiration=0
        PopulationBasedDemandFunction DMDemandFunction
          VariableReference ThermalTime: VariableName=[Phenology].ThermalTime.Value
          Constant ExpansionStress: Value=1
          VariableReference OrganPopulation: VariableName=[Spike].HeadNumber.Value
          Constant StartStage: Value=5
          Constant MaximumOrganWt: Value=0.5
          AddFunction GrowthDuration
            VariableReference EarlyReproductive: VariableName=[Phenology].EarlyReproductive.Target.Value
            VariableReference GrainDevelopment: VariableName=[Phenology].GrainDevelopment.Target.Value
        Biomass Live
        Biomass Dead
        Constant NReallocationFactor: Value=0
        Constant NRetranslocationFactor: Value=0.1
        Constant MaximumNConc: Value=0.01
        Constant SenescenceRate: Value=0; Units=/d
        Constant MinimumNConc: Value=0.003
        MultiplyFunction HeadNumber
          Constant FertileTillers: Value=1
          VariableReference StemPopulation: VariableName=[Structure].TotalStemPopn
        BiomassRemoval BiomassRemovalDefaults
          OrganBiomassRemovalType Harvest: FractionLiveToRemove=0.5; FractionDeadToRemove=0; FractionLiveToResidue=0.1; FractionDeadToResidue=0
          OrganBiomassRemovalType Cut: FractionLiveToRemove=0.8; FractionDeadToRemove=0; FractionLiveToResidue=0; FractionDeadToResidue=0
          OrganBiomassRemovalType Prune: FractionLiveToRemove=0; FractionDeadToRemove=0; FractionLiveToResidue=0.6; FractionDeadToResidue=0
          OrganBiomassRemovalType Graze: FractionLiveToRemove=0.6; FractionDeadToRemove=0; FractionLiveToResidue=0.2; FractionDeadToResidue=0
          OrganBiomassRemovalType Thin: FractionLiveToRemove=0; FractionDeadToRemove=0; FractionLiveToResidue=0.05; FractionDeadToResidue=0
        PhaseBasedSwitch NitrogenDemandSwitch: Start=Emergence; End=StartGrainFill
        PhaseLookup DMRetranslocationFactor
          PhaseLookupValue VegetativeGrowth: Start=Emergence; End=StartGrainFill
            Constant DMRetranslocationFactor: Value=0
          PhaseLookupValue ReproductiveGrowth: Start=StartGrainFill; End=EndGrainFill
            Constant DMRetranslocationFactor: Value=0.5
        Constant InitialWtFunction: Value=0; Units=g/m^2
        Constant StructuralFraction: Value=1; Units=g/g
        Constant DetachmentRateFunction: Value=0; Units=/d
        Constant MaintenanceRespirationFunction: Value=0; Units=0-1
        Constant DMConversionEfficiency: Value=1; Units=0-1
      GenericOrgan Stem: GrowthRespiration=0
        Biomass Live
        Biomass Dead
        Constant SenescenceRate: Value=0; Units=/d
        LinearInterpolationFunction MaximumNConc: XProperty=[Phenology].Stage
          XYPairs: X=[3, 4, 5, 6]; Y=[0.07, 0.04, 0.015, 0.012]
        LinearInterpolationFunction MinimumNConc: XProperty=[Phenology].Stage
          XYPairs: X=[3, 4, 6]; Y=[0.0025, 0.0025, 0.0025]
        PhaseBasedSwitch NitrogenDemandSwitch: Start=Emergence; End=StartGrainFill
        Constant NReallocationFactor: Value=0
        PhaseLookup NRetranslocationFactor
          PhaseLookupValue VegetativeGrowth: Start=Sowing; End=Flowering
            Constant Fraction: Value=0
          PhaseLookupValue ReproductiveGrowth: Start=Flowering; End=HarvestRipe
            Constant Fraction: Value=0.5
        PhaseLookup DMRetranslocationFactor: same as Replacements.Wheat.Spike.DMRetranslocationFactor
        PartitionFractionDemandFunction DMDemandFunction
          PhaseLookup PartitionFraction
            PhaseLookupValue PreStemElongation: Start=Emergence; End=TerminalSpikelet
              Constant StemFraction: Value=0.4
            PhaseLookupValue StemElongation: Start=TerminalSpikelet; End=FlagLeaf
              Constant StemFraction: Value=0.6
            PhaseLookupValue EarEmergence: Start=FlagLeaf; End=Flowering
              Constant StemFraction: Value=0.6
        BiomassRemoval BiomassRemovalDefaults: same as Replacements.Wheat.Spike.BiomassRemovalDefaults
        DivideFunction PercentWSC
          VariableReference WSC: VariableName=[Stem].Live.NonStructuralWt
          VariableReference StemWt: VariableName=[Stem].Live.Wt
        Constant InitialWtFunction: Value=0; Units=g/m^2
        Constant StructuralFraction: Value=1; Units=g/g
        Constant DetachmentRateFunction: Value=0; Units=/d
        Constant MaintenanceRespirationFunction: Value=0; Units=0-1
        Constant DMConversionEfficiency: Value=1; Units=0-1
      CompositeBiomass AboveGround
        Propertys=[[Leaf].Live, [Leaf].Dead, [Stem].Live, [Stem].Dead, [Spike].Live, [Spike].Dead, [Grain].Live, [Grain].Dead]
      CompositeBiomass AboveGroundLive: Propertys=[[Leaf].Live, [Stem].Live, [Spike].Live, [Grain].Live]
      CompositeBiomass AboveGroundDead: Propertys=[[Leaf].Dead, [Stem].Dead, [Spike].Dead, [Grain].Dead]
      CompositeBiomass BelowGround: Propertys=[[Root].Live, [Root].Dead]
      CompositeBiomass Total
        Propertys=[[Leaf].Live, [Leaf].Dead, [Stem].Live, [Stem].Dead, [Root].Live, [Root].Dead, [Spike].Live, [Spike].Dead, [Grain].Live, [Grain].Dead]
      CompositeBiomass TotalLive
        Propertys=[[Leaf].Live, [Stem].Live, [Root].Live, [Spike].Live, [Grain].Live]
      CompositeBiomass TotalDead
        Propertys=[[Leaf].Dead, [Stem].Dead, [Root].Dead, [Spike].Dead, [Grain].Dead]
      CompositeBiomass Ear: Propertys=[[Spike].Live, [Grain].Live, [Spike].Dead, [Grain].Dead]
        Memo
          The Ear composite biomass object includes the Live and dead pools of all organs within the Ear to allow output for total dry matter and Nutrient contents, including total structural, non-structural and metabolic pools.
      CompositeBiomass StemPlusSpike: Propertys=[[Stem].Live, [Spike].Live, [Stem].Dead, [Spike].Dead]
      CultivarFolder Cultivars
        CultivarFolder New Zealand
          Cultivar Alberic
            Command:
              [Phenology].MinimumLeafNumber.Value = 9
              [Phenology].VrnSensitivity.Value = 7
              [Phenology].PpSensitivity.Value = 3
          Cultivar Amarok
            Command:
              [Phenology].MinimumLeafNumber.Value = 9
              [Phenology].VrnSensitivity.Value = 10
              [Phenology].PpSensitivity.Value = 6
              [Phenology].EarlyReproductivePpSensitivity.Value = 5
              [Structure].MainStemNodeAppearanceRate.BasePhyllochron.Value = 80
          Cultivar Aspiring
            Command:
              [Phenology].MinimumLeafNumber.Value = 9
              [Phenology].VrnSensitivity.Value = 7
              [Phenology].PpSensitivity.Value = 3
          Cultivar BattenWinter
            Command:
              [Phenology].MinimumLeafNumber.Value = 8
              [Phenology].VrnSensitivity.Value = 8
              [Phenology].PpSensitivity.Value = 5
              [Phenology].EarlyReproductivePpSensitivity.Value = 3
              [Structure].MainStemNodeAppearanceRate.BasePhyllochron.Value = 100
              [Leaf].ExtinctionCoeff.Value = 0.7
          Cultivar BattenSpring
            Command:
              [Phenology].MinimumLeafNumber.Value = 7
              [Phenology].VrnSensitivity.Value = 0
              [Phenology].PpSensitivity.Value = 5
              [Phenology].EarlyReproductivePpSensitivity.Value = 3
              [Structure].MainStemNodeAppearanceRate.BasePhyllochron.Value = 100
              [Leaf].ExtinctionCoeff.Value = 0.7
          Cultivar Centaur
            Command:
              [Phenology].MinimumLeafNumber.Value = 9
              [Phenology].VrnSensitivity.Value = 7
              [Phenology].PpSensitivity.Value = 3
          Cultivar Claire
            Command:
              [Phenology].MinimumLeafNumber.Value = 8
              [Phenology].VrnSensitivity.Value = 8
              [Phenology].PpSensitivity.Value = 8
              [Phenology].EarlyReproductivePpSensitivity.Value = 3
              [Structure].MainStemNodeAppearanceRate.BasePhyllochron.Value = 100
          Cultivar Conquest
            Command:
              [Phenology].MinimumLeafNumber.Value = 7
              [Phenology].VrnSensitivity.Value = 0
              [Phenology].PpSensitivity.Value = 3
              [Structure].MainStemNodeAppearanceRate.BasePhyllochron.Value = 100
          Cultivar Einstein
            Command:
              [Phenology].MinimumLeafNumber.Value = 9
              [Phenology].VrnSensitivity.Value = 7
              [Phenology].PpSensitivity.Value = 3
          Cultivar Exceed
            Command:
              [Phenology].MinimumLeafNumber.Value = 9
              [Phenology].VrnSensitivity.Value = 7
              [Phenology].PpSensitivity.Value = 3
          Cultivar Majestic
            Command:
              [Phenology].MinimumLeafNumber.Value = 9
              [Phenology].VrnSensitivity.Value = 7
              [Phenology].PpSensitivity.Value = 3
          Cultivar Option
            Command:
              [Phenology].MinimumLeafNumber.Value = 9
              [Phenology].VrnSensitivity.Value = 7
              [Phenology].PpSensitivity.Value = 3
          Cultivar Otane
            Command:
              [Phenology].MinimumLeafNumber.Value = 6
              [Phenology].VrnSensitivity.Value = 0
              [Phenology].PpSensitivity.Value = 4
              [Phenology].EarlyReproductivePpSensitivity.Value = 2
              [Structure].MainStemNodeAppearanceRate.BasePhyllochron.Value = 100
          Cultivar Pennant
            Command:
              [Phenology].MinimumLeafNumber.Value = 9
              [Phenology].VrnSensitivity.Value = 7
              [Phenology].PpSensitivity.Value = 3
          Cultivar Regency
            Command:
              [Phenology].MinimumLeafNumber.Value = 9
              [Phenology].VrnSensitivity.Value = 7
              [Phenology].PpSensitivity.Value = 3
          Cultivar Richmond
            Command:
              [Phenology].MinimumLeafNumber.Value = 9
              [Phenology].VrnSensitivity.Value = 7
              [Phenology].PpSensitivity.Value = 3
          Cultivar Robigus
            Command:
              [Phenology].MinimumLeafNumber.Value = 9
              [Phenology].VrnSensitivity.Value = 7
              [Phenology].PpSensitivity.Value = 3
          Cultivar Rongotea
            Command:
              [Phenology].MinimumLeafNumber.Value = 7
              [Phenology].VrnSensitivity.Value = 0
              [Phenology].PpSensitivity.Value = 2
              [Phenology].EarlyReproductivePpSensitivity.Value = 3
              [Structure].MainStemNodeAppearanceRate.BasePhyllochron.Value = 100
          Cultivar Rubric
            Command:
              [Phenology].MinimumLeafNumber.Value = 9
              [Phenology].VrnSensitivity.Value = 7
              [Phenology].PpSensitivity.Value = 3
          Cultivar Sage
            Command:
              [Phenology].MinimumLeafNumber.Value = 9
              [Phenology].VrnSensitivity.Value = 7
              [Phenology].PpSensitivity.Value = 3
          Cultivar Saracen
            Command:
              [Phenology].MinimumLeafNumber.Value = 9
              [Phenology].VrnSensitivity.Value = 7
              [Phenology].PpSensitivity.Value = 3
          Cultivar Savannah
            Command:
              [Phenology].MinimumLeafNumber.Value = 9
              [Phenology].VrnSensitivity.Value = 7
              [Phenology].PpSensitivity.Value = 3
          Cultivar Solstice
            Command:
              [Phenology].MinimumLeafNumber.Value = 9
              [Phenology].VrnSensitivity.Value = 7
              [Phenology].PpSensitivity.Value = 3
          Cultivar Tanker
            Command:
              [Phenology].MinimumLeafNumber.Value = 9
              [Phenology].VrnSensitivity.Value = 7
              [Phenology].PpSensitivity.Value = 3
          Cultivar Tribute
            Command:
              [Phenology].MinimumLeafNumber.Value = 9
              [Phenology].VrnSensitivity.Value = 7
              [Phenology].PpSensitivity.Value = 3
          Cultivar Wakanui
            Command:
              [Phenology].MinimumLeafNumber.Value = 8
              [Phenology].VrnSensitivity.Value = 10
              [Phenology].PpSensitivity.Value = 0
              [Phenology].EarlyReproductiveLongDayBase.Value = 4
              [Structure].MainStemNodeAppearanceRate.BasePhyllochron.Value = 100
              [Phenology].DailyVernalisation.TempResponseProfile.XYPairs.X = 0,1,8
              [Phenology].DailyVernalisation.TempResponseProfile.XYPairs.Y = 0,1.204,0
              [Leaf].ExtinctionCoeff.Value = 0.7
              [Grain].NumberFunction.ValueToHold.GrainsPerGramOfStem.Value = 17
              [Leaf].CohortParameters.MaxArea.AreaLargestLeaves.Value = 3000
          Cultivar Weston
            Command:
              [Phenology].MinimumLeafNumber.Value = 9
              [Phenology].VrnSensitivity.Value = 7
              [Phenology].PpSensitivity.Value = 3
        CultivarFolder Australia
          Cultivar Axe
            Command:
              [Phenology].MinimumLeafNumber.Value = 5
              [Phenology].VrnSensitivity.Value = 0
              [Phenology].PpSensitivity.Value = 4
              [Structure].MainStemNodeAppearanceRate.BasePhyllochron.Value = 100
          Cultivar Bolac
            Command:
              [Phenology].MinimumLeafNumber.Value = 8
              [Phenology].VrnSensitivity.Value = 0
              [Phenology].PpSensitivity.Value = 4
          Cultivar Derrimut
            Command:
              [Phenology].MinimumLeafNumber.Value = 8
              [Phenology].VrnSensitivity.Value = 0
              [Phenology].PpSensitivity.Value = 4
          Cultivar EGAGregory
            Command:
              [Phenology].MinimumLeafNumber.Value = 6
              [Phenology].VrnSensitivity.Value = 1
              [Phenology].PpSensitivity.Value = 4
              [Structure].MainStemNodeAppearanceRate.BasePhyllochron.Value = 100
          Cultivar GattonHartog
            Command:
              [Phenology].MinimumLeafNumber.Value = 8
              [Phenology].VrnSensitivity.Value = 0
              [Phenology].PpSensitivity.Value = 4
          Cultivar Gamenya
            Command:
              [Phenology].MinimumLeafNumber.Value = 5
              [Phenology].VrnSensitivity.Value = 0
              [Phenology].PpSensitivity.Value = 5
              [Structure].MainStemNodeAppearanceRate.BasePhyllochron.Value = 100
              [Grain].NumberFunction.ValueToHold.GrainsPerGramOfStem.Value = 20
          Cultivar Gladius
            Command:
              [Phenology].MinimumLeafNumber.Value = 8
              [Phenology].VrnSensitivity.Value = 0
              [Phenology].PpSensitivity.Value = 4
          Cultivar Gutha
            Command:
              [Phenology].MinimumLeafNumber.Value = 7
              [Phenology].VrnSensitivity.Value = 0
              [Phenology].PpSensitivity.Value = 4
              [Structure].MainStemNodeAppearanceRate.BasePhyllochron.Value = 100
          Cultivar H45
            Command:
              [Phenology].MinimumLeafNumber.Value = 6
              [Phenology].VrnSensitivity.Value = 0
              [Phenology].PpSensitivity.Value = 4
              [Structure].MainStemNodeAppearanceRate.BasePhyllochron.Value = 100
          Cultivar H46
            Command:
              [Phenology].MinimumLeafNumber.Value = 8
              [Phenology].VrnSensitivity.Value = 0
              [Phenology].PpSensitivity.Value = 4
          Cultivar Hartog
            Command:
              [Phenology].MinimumLeafNumber.Value = 7
              [Phenology].VrnSensitivity.Value = 0
              [Phenology].PpSensitivity.Value = 4
              [Structure].MainStemNodeAppearanceRate.BasePhyllochron.Value = 100
          Cultivar Janz
            Command:
              [Phenology].MinimumLeafNumber.Value = 6
              [Phenology].VrnSensitivity.Value = 1
              [Phenology].PpSensitivity.Value = 4
              [Structure].MainStemNodeAppearanceRate.BasePhyllochron.Value = 100
          Cultivar Kelallac
            Command:
              [Phenology].MinimumLeafNumber.Value = 8
              [Phenology].VrnSensitivity.Value = 0
              [Phenology].PpSensitivity.Value = 4
          Cultivar Kennedy
            Command:
              [Phenology].MinimumLeafNumber.Value = 8
              [Phenology].VrnSensitivity.Value = 0
              [Phenology].PpSensitivity.Value = 4
          Cultivar Lang
            Command:
              [Phenology].MinimumLeafNumber.Value = 6
              [Phenology].VrnSensitivity.Value = 0
              [Phenology].PpSensitivity.Value = 5
              [Structure].MainStemNodeAppearanceRate.BasePhyllochron.Value = 100
          Cultivar Livingston
            Command:
              [Phenology].MinimumLeafNumber.Value = 5
              [Phenology].VrnSensitivity.Value = 0
              [Phenology].PpSensitivity.Value = 4
              [Structure].MainStemNodeAppearanceRate.BasePhyllochron.Value = 100
          Cultivar Lorikeet
            Command:
              [Phenology].MinimumLeafNumber.Value = 8
              [Phenology].VrnSensitivity.Value = 0
              [Phenology].PpSensitivity.Value = 4
          Cultivar MacKellar
            Command:
              [Phenology].MinimumLeafNumber.Value = 7
              [Phenology].VrnSensitivity.Value = 5
              [Phenology].PpSensitivity.Value = 5
              [Phenology].EarlyReproductiveLongDayBase.Value = 3.5
              [Structure].MainStemNodeAppearanceRate.BasePhyllochron.Value = 100
          Cultivar Matong
            Command:
              [Phenology].MinimumLeafNumber.Value = 7
              [Phenology].VrnSensitivity.Value = 1
              [Phenology].PpSensitivity.Value = 4
              [Structure].MainStemNodeAppearanceRate.BasePhyllochron.Value = 100
          Cultivar McCubbin
            Command:
              [Phenology].MinimumLeafNumber.Value = 8
              [Phenology].VrnSensitivity.Value = 0
              [Phenology].PpSensitivity.Value = 5
              [Structure].MainStemNodeAppearanceRate.BasePhyllochron.Value = 90
          Cultivar Mercury
            Command:
              [Phenology].MinimumLeafNumber.Value = 6
              [Phenology].VrnSensitivity.Value = 0
              [Phenology].PpSensitivity.Value = 4
              [Structure].MainStemNodeAppearanceRate.BasePhyllochron.Value = 100
          Cultivar Ruby
            Command:
              [Phenology].MinimumLeafNumber.Value = 8
              [Phenology].VrnSensitivity.Value = 0
              [Phenology].PpSensitivity.Value = 4
          Cultivar Spear
            Command:
              [Phenology].MinimumLeafNumber.Value = 7
              [Phenology].VrnSensitivity.Value = 0
              [Phenology].PpSensitivity.Value = 4
              [Structure].MainStemNodeAppearanceRate.BasePhyllochron.Value = 100
              [Grain].NumberFunction.ValueToHold.GrainsPerGramOfStem.Value = 20
          Cultivar Sunco
            Command:
              [Phenology].MinimumLeafNumber.Value = 6.5
              [Phenology].VrnSensitivity.Value = 0
              [Phenology].PpSensitivity.Value = 3.5
              [Phenology].EarlyReproductivePpSensitivity.Value = 4
              [Structure].MainStemNodeAppearanceRate.BasePhyllochron.Value = 100
          Cultivar Suntop
            Command:
              [Phenology].Vernalisation.VernSens = 1.5
              [Phenology].Vernalisation.PhotopSens = 3.0
          Cultivar Ventura
            Command:
              [Phenology].MinimumLeafNumber.Value = 8
              [Phenology].VrnSensitivity.Value = 0
              [Phenology].PpSensitivity.Value = 4
          Cultivar Wedgetail
            Command:
              [Phenology].MinimumLeafNumber.Value = 8
              [Phenology].VrnSensitivity.Value = 0
              [Phenology].PpSensitivity.Value = 4
          Cultivar Wilgoyne
            Command:
              [Phenology].MinimumLeafNumber.Value = 5
              [Phenology].VrnSensitivity.Value = 0
              [Phenology].PpSensitivity.Value = 4
              [Structure].MainStemNodeAppearanceRate.BasePhyllochron.Value = 100
              [Grain].NumberFunction.ValueToHold.GrainsPerGramOfStem.Value = 20
          Cultivar Wyalkatchem
            Command:
              [Phenology].MinimumLeafNumber.Value = 8
              [Phenology].VrnSensitivity.Value = 0
              [Phenology].PpSensitivity.Value = 4
          Cultivar Yitpi
            Command:
              [Phenology].MinimumLeafNumber.Value = 8
              [Phenology].VrnSensitivity.Value = 0
              [Phenology].PpSensitivity.Value = 5
              [Phenology].EarlyReproductiveLongDayBase.Value = 2.5
              [Phenology].EarlyReproductivePpSensitivity.Value = 5
              [Structure].MainStemNodeAppearanceRate.BasePhyllochron.Value = 80
          Cultivar Young
            Command:
              [Phenology].MinimumLeafNumber.Value = 8
              [Phenology].VrnSensitivity.Value = 0
              [Phenology].PpSensitivity.Value = 4
        CultivarFolder Turkey
          Cultivar Konya
            Command:
              [Phenology].MinimumLeafNumber.Value = 6
              [Phenology].VrnSensitivity.Value = 0
              [Phenology].PpSensitivity.Value = 4
              [Structure].MainStemNodeAppearanceRate.BasePhyllochron.Value = 100
              [Grain].NumberFunction.ValueToHold.GrainsPerGramOfStem.Value = 17
              [Grain].MaximumPotentialGrainSize.Value = 0.050
        CultivarFolder China
          Cultivar Keyu13
            Command:
              [Phenology].MinimumLeafNumber.Value = 9
              [Phenology].VrnSensitivity.Value = 7
              [Phenology].PpSensitivity.Value = 3
        CultivarFolder USA
          Cultivar Yecora
            Command:
              [Phenology].MinimumLeafNumber.Value = 6
              [Phenology].VrnSensitivity.Value = 0
              [Phenology].PpSensitivity.Value = 4
              [Structure].MainStemNodeAppearanceRate.BasePhyllochron.Value = 90
              [Leaf].CohortParameters.MaxArea.AreaLargestLeaves.Value = 4000
        CultivarFolder Europe
          Cultivar Dekan
            Command:
              [Phenology].MinimumLeafNumber.Value = 9
              [Phenology].VrnSensitivity.Value = 7
              [Phenology].PpSensitivity.Value = 3
              [Phenology].EarlyReproductivePpSensitivity.Value = 3
              [Structure].MainStemNodeAppearanceRate.BasePhyllochron.Value = 100
              [Leaf].ExtinctionCoeff.Value = 0.8
          Cultivar Rosario
            Command:
              [Phenology].MinimumLeafNumber.Value = 9
              [Phenology].VrnSensitivity.Value = 7
              [Phenology].PpSensitivity.Value = 3
              [Phenology].EarlyReproductivePpSensitivity.Value = 3
              [Structure].MainStemNodeAppearanceRate.BasePhyllochron.Value = 100
              [Leaf].ExtinctionCoeff.Value = 0.8
          Cultivar Ararat
            Command:
              [Phenology].MinimumLeafNumber.Value = 9
              [Phenology].VrnSensitivity.Value = 7
              [Phenology].PpSensitivity.Value = 3
              [Phenology].EarlyReproductivePpSensitivity.Value = 3
              [Structure].MainStemNodeAppearanceRate.BasePhyllochron.Value = 100
              [Leaf].ExtinctionCoeff.Value = 0.8
        CultivarFolder Africa
          Cultivar HAR1685
            Command:
              [Phenology].MinimumLeafNumber.Value = 7
              [Phenology].VrnSensitivity.Value = 0
              [Phenology].PpSensitivity.Value = 3
              [Structure].MainStemNodeAppearanceRate.BasePhyllochron.Value = 100
              [Grain].NumberFunction.ValueToHold.GrainsPerGramOfStem.Value = 17
              [Phenology].GrainFilling.Target.Value = 350
        CultivarFolder Iran
          Cultivar Gorgan
            Command:
              [Phenology].MinimumLeafNumber.Value = 7
              [Phenology].VrnSensitivity.Value = 0
              [Phenology].PpSensitivity.Value = 4
              [Structure].MainStemNodeAppearanceRate.BasePhyllochron.Value = 100
  Simulation Wheat
    Clock: StartDate=1999-01-01; EndDate=2000-12-31
    Summary SummaryFile
    Weather: FileName=%root%\Examples\WeatherFiles\Dalby.met
    SoilArbitrator Soil Arbitrator
    Zone Field: Area=1; Slope=0
      Fertiliser
      Soil: ASCOrder=Vertosol; ASCSubOrder=Black; SoilType=Clay; Site=Norwin; NearestTown=Norwin; Region=Darling Downs and Granite Belt; State=Queensland; Country=Australia; NaturalVegetation=Qld. Bluegrass, possible Qld. Blue gum; ApsoilNumber=900; Latitude=-27.581836; Longitude=151.320206; Area=0; LocationAccuracy=+/- 20m
        DataSource=CSIRO Sustainable Ecosystems, Toowoomba; Characteriesd as part of the GRDC funded project"Doing it better, doing it smarter, managing soil water in Australian agriculture' 2011
        Comments=OC, CLL for all crops estimated-based on Bongeen Mywybilla Soil No1
        Water
          Thickness  BD       AirDry    LL15      DUL       SAT       KS
          150        1.01056  0.13025   0.2605    0.521     0.588655  20
          150        1.07146  0.198689  0.248362  0.496723  0.565677  20
          300        1.09394  0.28      0.28      0.488438  0.557193  20
          300        1.15861  0.28      0.28      0.480297  0.532787  20
          300        1.17301  0.28      0.28      0.471584  0.527354  20
          300        1.16287  0.28      0.28      0.457071  0.53118   20
          300        1.1875   0.28      0.28      0.452332  0.521888  20
          SoilCrop WheatSoil: LL=[0.261, 0.248, 0.28, 0.306, 0.36, 0.392, 0.446]; KL=[0.06, 0.06, 0.06, 0.04, 0.04, 0.02, 0.01]; XF=[1, 1, 1, 1, 1, 1, 1]
        SoilWater: SummerDate=1-Nov; SummerU=5; SummerCona=5; WinterDate=1-Apr; WinterU=5; WinterCona=5; DiffusConst=40; DiffusSlope=16; Salb=0.12; CN2Bare=73; CNRed=20; CNCov=0.8; max_pond=0; Thickness=[150, 150, 300, 300, 300, 300, 300]; SWCON=[0.3, 0.3, 0.3, 0.3, 0.3, 0.3, 0.3]; residueinterception=0
        SoilNitrogen: fom_type=[default, manure, mucuna, lablab, shemp, stable]; fract_carb=[0.2, 0.3, 0.54, 0.57, 0.45, 0]; fract_cell=[0.7, 0.3, 0.37, 0.37, 0.47, 0.1]; fract_lign=[0.1, 0.4, 0.09, 0.06, 0.08, 0.9]; wfpsN2N2O_x=[22, 88]; wfpsN2N2O_y=[0.1, 1]
        SoilOrganicMatter: RootCN=40; RootWt=1000; SoilCN=12; EnrACoeff=7.4; EnrBCoeff=0.2; OCUnits=Total
          Thickness  OC    FBiom  FInert
          150        1.2   0.04   0.4
          150        0.96  0.02   0.6
          300        0.6   0.02   0.8
          300        0.3   0.02   1
          300        0.18  0.01   1
          300        0.12  0.01   1
          300        0.12  0.01   1
        Analysis: Thickness=[150, 150, 300, 300, 300, 300, 300]; PH=[8, 8, 8, 8, 8, 8, 8]; PHUnits=Water; BoronUnits=HotWater
        InitialWater: PercentMethod=EvenlyDistributed; FractionFull=1
        Sample InitialN: NO3Units=ppm; NH4Units=ppm; SWUnits=Volumetric; OCUnits=Total; PHUnits=Water
          Thickness  NO3  NH4
          150        1    0.1
          150        1    0.1
          300        1    0.1
          300        1    0.1
          300        1    0.1
          300        1    0.1
          300        1    0.1
      SurfaceOrganicMatter: PoolName=wheat_stubble; type=wheat; mass=500; standing_fraction=0; cnr=100; CriticalResidueWeight=2000; OptimumDecompTemp=20; MaxCumulativeEOS=20; CNRatioDecompCoeff=0.277; CNRatioDecompThreshold=25; TotalLeachRain=25; MinRainToLeach=10; CriticalMinimumOrganicC=0.004; DefaultCPRatio=0; DefaultStandingFraction=0; StandingExtinctCoeff=0.5; FractionFaecesAdded=0.5
        Pools:
          {PoolName=wheat_stubble, ResidueType=wheat, Mass=500, CNRatio=100, StandingFraction=0}
        ResidueTypes: LoadFromResource=ResidueTypes
      MicroClimate: a_interception=0; b_interception=1; c_interception=0; d_interception=0; soil_albedo=0.3; air_pressure=1010; soil_emissivity=0.96; sun_angle=15; soil_heat_flux_fraction=0.4; night_interception_fraction=0.5; windspeed_default=3; refheight=2; albedo=0.15; emissivity=0.96; gsmax=0.01; r50=200; RadIntTotal=0
      Manager SowingFertiliser
        Amount = 160
        CropName = wheat
```csharp
using System;
using Models.Core;
using Models.PMF;
namespace Models
{
	[Serializable]
	public class Script : Model
	{
		[Link] Clock Clock;
		[Link] Fertiliser Fertiliser;
		[Link] Summary Summary;
		
		
		[Description("Amount of fertiliser to be applied (kg/ha)")]
		public double Amount { get; set; }
		
		[Description("Crop to be fertilised")]
		public string CropName { get; set; }
		
		
		

		[EventSubscribe("Sowing")]
		private void OnSowing(object sender, EventArgs e)
		{
			Model crop = sender as Model;
			if (crop.Name.ToLower() == CropName.ToLower())
				Fertiliser.Apply(Amount: Amount, Type: Fertiliser.Types.NO3N);
		}
		
	}
}
```
      Report DailyReport: EventNames=[Clock].DoReport
        VariableNames:
          [Clock].Today
          [Wheat].Leaf.Live.Wt
          [Wheat].Stem.Wt
          [Wheat].Spike.Wt
          [Wheat].Grain.Wt
          [Wheat].Leaf.GrowthRespiration
          [Wheat].Stem.GrowthRespiration
          [Wheat].Spike.GrowthRespiration
          [Wheat].Grain.GrowthRespiration
          [Wheat].Leaf.MaintenanceRespiration
          [Wheat].Stem.MaintenanceRespiration
          [Wheat].Spike.MaintenanceRespiration
          [Wheat].Grain.MaintenanceRespiration
          [Wheat].Leaf.MaintenanceRespiration +[Wheat].Stem.MaintenanceRespiration +[Wheat].Spike.MaintenanceRespiration + [Wheat].Grain.MaintenanceRespiration as MaintenanceRespiration
          [Wheat].Leaf.GrowthRespiration +[Wheat].Stem.GrowthRespiration +[Wheat].Spike.GrowthRespiration + [Wheat].Grain.GrowthRespiration as GrowthRespiration
          [Wheat].Arbitrator.DMSupply as GrossPhotosynthesis
          [Wheat].Arbitrator.DMSupply - ([Wheat].Leaf.MaintenanceRespiration +[Wheat].Stem.MaintenanceRespiration +[Wheat].Spike.MaintenanceRespiration + [Wheat].Grain.MaintenanceRespiration ) - ([Wheat].Leaf.GrowthRespiration +[Wheat].Stem.GrowthRespiration +[Wheat].Spike.GrowthRespiration + [Wheat].Grain.GrowthRespiration) as NetPhotosynthesis
      Plant Wheat: CropType=Wheat
      Manager SowAndHarvest
        Cultivar = Otane
```csharp
using System;
using Models.Core;
using Models.PMF;
using APSIM.Shared.Utilities;
using System.Xml.Serialization;
        
namespace Models
{
	[Serializable] 
	[System.Xml.Serialization.XmlInclude(typeof(Model))]
	public class Script : Model
	{
		[Link] Plant Wheat;
		[Link] Clock Clock;
		[Link] Simulation sim;
		[Link] Summary Summary;
		
		[Description("Cultivar")]
		public string Cultivar { get; set; }
		
		[XmlIgnore] public bool Sown { get; set; }
		[XmlIgnore] public bool Harvested { get; set; }
		[XmlIgnore] public bool EndSet { get; set; }
		
		[EventSubscribe("Commencing")]
		private void OnSimulationCommencing(object sender, EventArgs e)
		{
			Sown = false;
			Harvested = false;
			EndSet = false;
		}
		
		[EventSubscribe("DoManagement")]
		private void OnDoManagement(object sender, EventArgs e)
		{
			if (Sown == false)
			{
				Wheat.Sow(population: 200, cultivar: Cultivar, depth: 15, rowSpacing: 150, budNumber: 1);
				Sown = true;
			}
			
			if (Wheat.Phenology.CurrentPhaseName == "ReadyForHarvesting")
			{
				Wheat.Harvest();
				Wheat.EndCrop();
				Harvested = true;
				Summary.WriteMessage(this, "Flowering reached so setting end date to stop simulation");
			}
			
			if ((Harvested == true) && (EndSet == false))
			{
				sim.Set("Clock.EndDate", Clock.Today.AddDays(1));
				EndSet = true;
			}
		}
	}
}
```
  DataStore
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