Simulations: Version=2
  Simulation: Area=0; Slope=0
    Weather: FileName=Harwood.met
    Clock: StartDate=1993-09-21; EndDate=1995-09-29
    Summary summaryfile
    Zone WholeFarm: Area=1; Slope=0
      Folder Resources
        FoodStore HomeFoodStore
          FoodStoreType Wheat: DryMatter=50; DMD=50; Nitrogen=20; StartingAge=0; StartingAmount=100
          FoodStoreType Rice: DryMatter=50; DMD=50; Nitrogen=20; StartingAge=0; StartingAmount=100
          FoodStoreType Nuts: DryMatter=50; DMD=50; Nitrogen=20; StartingAge=0; StartingAmount=100
        Fodder
          FodderType Lucerne: IsForage=true; IsSupplement=false; DryMatter=50; DMD=50; Nitrogen=20; StartingAge=0; StartingAmount=100
          FodderType Maize: IsForage=false; IsSupplement=true; DryMatter=50; DMD=50; Nitrogen=20; StartingAge=0; StartingAmount=100
          FodderType CutGrass: IsForage=true; IsSupplement=false; DryMatter=50; DMD=50; Nitrogen=20; StartingAge=0; StartingAmount=100
          FodderType BoughtSupplement: IsForage=false; IsSupplement=true; DryMatter=50; DMD=50; Nitrogen=20; StartingAge=0; StartingAmount=100
        Land
          LandType Field1: LandArea=10; UnusablePortion=0; BundedPortion=0; SoilType=1; NDecline=1000
        Pasture
          PastureType IrrigatedPasture: DryMatter=50; DMD=50; Nitrogen=20; StartingAmount=100
        Folder Labour
          LabourFamily Family
            LabourFamilyPerson Father: InitialAge=0; Gender=M; MaxLabourSupply=[0, 0, 0, 0, 0, 5, 0, 0, 0, 0, 0, 0]; DoesNonFarmLabour=true; DefaultNonFarmPayRate=0
              ColumnNames=[Jan, Feb, March, April, May, June, July, Aug, Sep, Oct, Nov, Dec]
            LabourFamilyPerson Mother: InitialAge=0; Gender=M; MaxLabourSupply=[0, 0, 0, 0, 0, 5, 0, 0, 0, 0, 0, 0]; DoesNonFarmLabour=true; DefaultNonFarmPayRate=0
              ColumnNames=[Jan, Feb, March, April, May, June, July, Aug, Sep, Oct, Nov, Dec]
            LabourFamilyPerson TeenageBoy: InitialAge=0; Gender=M; MaxLabourSupply=[0, 0, 0, 0, 0, 5, 0, 0, 0, 0, 0, 0]; DoesNonFarmLabour=true; DefaultNonFarmPayRate=0
              ColumnNames=[Jan, Feb, March, April, May, June, July, Aug, Sep, Oct, Nov, Dec]
          LabourHired Hired
            LabourHiredPerson AdultMale1: InitialAge=0; Gender=M; MaxLabourSupply=[0, 0, 0, 0, 0, 5, 0, 0, 0, 0, 0, 0]; HiredInPayRate=0
              ColumnNames=[Jan, Feb, March, April, May, June, July, Aug, Sep, Oct, Nov, Dec]
            LabourHiredPerson AdultMale2: InitialAge=0; Gender=M; MaxLabourSupply=[0, 0, 0, 0, 0, 5, 0, 0, 0, 0, 0, 0]; HiredInPayRate=0
              ColumnNames=[Jan, Feb, March, April, May, June, July, Aug, Sep, Oct, Nov, Dec]
            LabourHiredPerson AdultMale3: InitialAge=0; Gender=M; MaxLabourSupply=[0, 0, 0, 0, 0, 5, 0, 0, 0, 0, 0, 0]; HiredInPayRate=0
              ColumnNames=[Jan, Feb, March, April, May, June, July, Aug, Sep, Oct, Nov, Dec]
        Folder Animals
          Ruminant Ruminants
            RuminantType BosIndicus: StartingNumber=10; StartingWeight=200
      Folder Activities
      Report: EventNames=[Clock].DoReport
        VariableNames:
          [Clock].Today
          [Clock].Today.Year as year
          [Clock].Today.DayOfYear as day
  DataStore
