Simulations: Version=8
  DataStore
  Simulation BankTest
    Clock: StartDate=1995-01-01; EndDate=2009-12-31
    Summary summaryfile
    WholeFarm CLEM: Area=1; Slope=0; ClimateRegion=0; EcologicalIndicatorsCalculationMonth=9
      ResourcesHolder Resources
        Finance Finances
          FinanceType General account: OpeningBalance=10000000; EnforceWithdrawalLimit=false; WithdrawalLimit=0; InterestRateCharged=7.5; InterestRatePaid=2
          FinanceType Overheads account: OpeningBalance=900000; EnforceWithdrawalLimit=false; WithdrawalLimit=0; InterestRateCharged=7.5; InterestRatePaid=2
      ActivitiesHolder Activities
        FinanceActivityCalculateInterest Bank interest: OnPartialResourcesAvailableAction=ReportErrorAndStop
        ActivityFolder Pay January expenses: OnPartialResourcesAvailableAction=ReportErrorAndStop
          ActivityTimerInterval Perform every January
          FinanceActivityPayExpense Pay electricity: OnPartialResourcesAvailableAction=UseResourcesAvailable; Amount=150; AccountName=General account; IsOverhead=false
          FinanceActivityPayExpense Pay internet: OnPartialResourcesAvailableAction=UseResourcesAvailable; Amount=1200; AccountName=General account; IsOverhead=false
        FinanceActivityPayExpense Pay mechanic: OnPartialResourcesAvailableAction=UseResourcesAvailable; MonthDue=7; Amount=999; AccountName=Overheads account; IsOverhead=true
        ActivityFolder Cash flow: OnPartialResourcesAvailableAction=ReportErrorAndStop
          FinanceActivityPayExpense General farm maintenance: OnPartialResourcesAvailableAction=ReportErrorAndStop; PaymentInterval=1; Amount=3333.33; AccountName=General account; IsOverhead=false
          FinanceActivityPayExpense Fuel costs: OnPartialResourcesAvailableAction=ReportErrorAndStop; PaymentInterval=1; Amount=2500; AccountName=General account; IsOverhead=false
          FinanceActivityPayExpense Pest control: OnPartialResourcesAvailableAction=ReportErrorAndStop; MonthDue=12; Amount=5000; AccountName=General account; IsOverhead=false
          FinanceActivityPayExpense Contractors: OnPartialResourcesAvailableAction=ReportErrorAndStop; MonthDue=10; Amount=30000; AccountName=General account; IsOverhead=false
          FinanceActivityPayExpense Administration: OnPartialResourcesAvailableAction=ReportErrorAndStop; PaymentInterval=1; Amount=1666.67; AccountName=General account; IsOverhead=false
          FinanceActivityPayExpense Rates and Fees: OnPartialResourcesAvailableAction=ReportErrorAndStop; MonthDue=7; Amount=15000; AccountName=General account; IsOverhead=false
          FinanceActivityPayExpense Insurance: OnPartialResourcesAvailableAction=ReportErrorAndStop; MonthDue=12; Amount=20000; AccountName=General account; IsOverhead=false
          FinanceActivityPayExpense Electricity: OnPartialResourcesAvailableAction=ReportErrorAndStop; PaymentInterval=3; Amount=2000; AccountName=General account; IsOverhead=false
          FinanceActivityPayExpense Living costs: OnPartialResourcesAvailableAction=ReportErrorAndStop; PaymentInterval=6; MonthDue=6; Amount=1000; AccountName=General account; IsOverhead=false
      Folder Reports
        Report FinancesLedger: EventNames=[Resources].Finances.TransactionOccurred
          VariableNames:
            [Clock].Today as Date
            [Resources].Finances.LastTransaction.Credit as Credit
            [Resources].Finances.LastTransaction.Debit as Debit
            [Resources].Finances.LastTransaction.ResourceType as Resource
            [Resources].Finances.LastTransaction.Activity as Activity
            [Resources].Finances.LastTransaction.Reason as Reason
        Report ActivityLedger: EventNames=[Activities].ActivityPerformed
          VariableNames:
            [Clock].Today as Date
            [Activities].LastActivityPerformed.Name as Name
            [Activities].LastActivityPerformed.Status.ToString() as Status
