Simulations: Version=6
  Simulation WF_IATExample_IndiaICRISAT_v1
    FileAPSIMCrop File APSIM Crop: FileName=C:\Temp\WholeFarm\Crop_Inputs.prn
    FileAPSIMForage File APSIM Forage: FileName=C:\Temp\WholeFarm\Forage_Inputs.prn
    Clock: StartDate=1993-09-21; EndDate=1995-09-29
    Summary summaryfile
    WholeFarm WF_IATExample_IndiaICRISAT_v1: Area=1; Slope=0; RandomSeed=0; ClimateRegion=0; EcologicalIndicatorsCalculationInterval=12; EcologicalIndicatorsCalculationMonth=6
      ResourcesHolder Resources
        Land: UnitOfArea=Hectares
          LandType Land1 interbund: LandArea=1.8; UnusablePortion=0; SoilType=1
          LandType Land1 bund: LandArea=0.2; UnusablePortion=0; SoilType=1
          LandType Land2 interbund: LandArea=1.425; UnusablePortion=0; SoilType=1
          LandType Land2 bund: LandArea=0.075; UnusablePortion=0; SoilType=1
          LandType Common land: LandArea=0.075; UnusablePortion=0; SoilType=1
        Labour: AllowAging=true
          LabourType Elderly male: InitialAge=72; Gender=Male; MaxLabourSupply=[10, 10, 10, 10, 10, 10, 10, 10, 10, 10, 10, 20]; Individuals=1
          LabourType Elderly female: InitialAge=68; Gender=Female; MaxLabourSupply=[10, 10, 10, 10, 10, 10, 10, 10, 10, 10, 10, 20]; Individuals=1
          LabourType Adult male: InitialAge=42; Gender=Male; MaxLabourSupply=[15, 15, 15, 15, 15, 20, 20, 20, 20, 20, 20, 28]; Individuals=1
          LabourType Adult female: InitialAge=31; Gender=Female; MaxLabourSupply=[12, 12, 12, 12, 12, 18, 18, 18, 18, 18, 18, 25]; Individuals=1
          LabourType Teenage male: InitialAge=13; Gender=Male; MaxLabourSupply=[15, 15, 15, 15, 15, 10, 10, 10, 10, 10, 10, 20]; Individuals=1
          LabourType Child female: InitialAge=31; Gender=Female; MaxLabourSupply=[5, 5, 5, 5, 5, 5, 5, 5, 5, 5, 5, 5]; Individuals=1
        HumanFoodStore
          HumanFoodStoreType Cotton: DryMatter=50; DMD=50; Nitrogen=20; CurrentStoreNitrogen=0; StartingAge=0; StartingAmount=100
          HumanFoodStoreType Maize: DryMatter=50; DMD=50; Nitrogen=20; CurrentStoreNitrogen=0; StartingAge=0; StartingAmount=100
          HumanFoodStoreType SorghumGrain: DryMatter=50; DMD=50; Nitrogen=20; CurrentStoreNitrogen=0; StartingAge=0; StartingAmount=100
          HumanFoodStoreType Milk: DryMatter=50; DMD=50; Nitrogen=20; CurrentStoreNitrogen=0; StartingAge=0; StartingAmount=100
        AnimalFoodStore
          AnimalFoodStoreType Maize residue: DryMatter=91; DMD=52; Nitrogen=1.66; CurrentStoreNitrogen=0; StartingAmount=100
          AnimalFoodStoreType SorghumGrain: DryMatter=91; DMD=52; Nitrogen=1.66; CurrentStoreNitrogen=0; StartingAmount=100
          AnimalFoodStoreType Maize: DryMatter=89; DMD=55; Nitrogen=2; CurrentStoreNitrogen=0; StartingAmount=100
          AnimalFoodStoreType Maize bran: DryMatter=89; DMD=55; Nitrogen=2; CurrentStoreNitrogen=0; StartingAmount=100
          AnimalFoodStoreType Cotton: DryMatter=91; DMD=52; Nitrogen=1.66; CurrentStoreNitrogen=0; StartingAmount=100
          AnimalFoodStoreType Millet bran: DryMatter=91; DMD=60; Nitrogen=2.5; CurrentStoreNitrogen=0; StartingAmount=100
            Transmutation Purchase: AmountPerUnitPurchase=1000
              TransmutationCost Money: ResourceName=Finances; ResourceTypeName=General account; CostPerUnit=100
          AnimalFoodStoreType Native: DryMatter=91; DMD=52; Nitrogen=1.66; CurrentStoreNitrogen=0; StartingAmount=100
        ProductStore
          ProductStoreType Cotton fibre: StartingAmount=0
        RuminantHerd Ruminants
          RuminantType Buffalo: Breed=Buffalo; EMaintCoefficient=0.35; EMaintIntercept=0.503; EGrowthCoefficient=1.16; EGrowthIntercept=-0.308; ELactationCoefficient=0.35; ELactationIntercept=0.42; Kme=1; GrowthEnergyIntercept1=6.7; GrowthEnergyIntercept2=20.3; GrowthEfficiency=1; SRWFemale=400; SRWMaleMultiplier=1.2; SRWBirth=0.07; AgeGrowthRateCoefficient=0.0115; SRWGrowthScalar=0.32; IntakeCoefficient=0.024; IntakeIntercept=1.7; ProteinCoefficient=90; GreenDietMax=98; GreenDietCoefficient=0.08; GreenDietZero=8; StrictFeedingLimits=false; MilkIntakeCoefficient=0.1206; MilkIntakeIntercept=3.8146; MilkIntakeMaximum=20; MilkLWTFodderSubstitutionProportion=0.2; MaxJuvenileIntake=0.03; ProportionalDiscountDueToMilk=0.3; MaximumSizeOfIndividual=1.2; MortalityBase=1; MortalityCoefficient=2.5; MortalityIntercept=0.05; MortalityExponent=3; JuvenileMortalityCoefficient=5.453; JuvenileMortalityMaximum=10; JuvenileMortalityExponent=-3.188; MilkCurveSuckling=0.6; MilkCurveNonSuckling=0.11; MilkPeakYield=14; MilkOffsetDay=4; MilkPeakDay=42; InterParturitionIntervalIntercept=10.847; InterParturitionIntervalCoefficient=-0.7994; GestationLength=12; MinimumAge1stMating=30; MinimumSize1stMating=50; CriticalCowWeight=50; ConceptionRateCoefficent=[-9.3353]; ConceptionRateIntercept=[6.754]; ConceptionRateAsymptote=[81.54]; PrenatalMortality=7.9; MaximumConceptionUncontrolledBreeding=90
            zero: EMaintExponent, BaseAnimalEquivalent, IntakeTropicalQuality, IntakeCoefficientQuality, IntakeCoefficientBiomass, ProportionOfMaxWeightToSurvive, LactatingPotentialModifierConstantA, LactatingPotentialModifierConstantB, LactatingPotentialModifierConstantC, WoolCoefficient, CashmereCoefficient, MilkingDays, TwinRate, MaximumMaleMatingsPerDay, MethaneProductionIntercept, MethaneProductionCoefficient
            RuminantInitialCohorts Initial cohorts
              RuminantTypeCohort WeanerF: Gender=Female; StartingAge=54; StartingNumber=1; StartingWeight=500; StartingWeightSD=0; Suckling=false
              RuminantTypeCohort Female3_4: Gender=Female; StartingAge=42; StartingNumber=2; StartingWeight=350; StartingWeightSD=0; Suckling=false
          RuminantType Cows: Breed=India_IND; EMaintCoefficient=0.35; EMaintIntercept=0.503; EGrowthCoefficient=1.16; EGrowthIntercept=-0.308; ELactationCoefficient=0.35; ELactationIntercept=0.42; Kme=1; SRWFemale=400; SRWBirth=0.07; AgeGrowthRateCoefficient=0.0115; SRWGrowthScalar=0.32; IntakeCoefficient=0.024; IntakeIntercept=1.7; ProteinCoefficient=90; StrictFeedingLimits=false; MortalityBase=1; JuvenileMortalityCoefficient=5.453; JuvenileMortalityMaximum=10; JuvenileMortalityExponent=-3.188; MilkCurveSuckling=0.6; MilkCurveNonSuckling=0.11; MilkPeakYield=9; MilkOffsetDay=4; MilkPeakDay=30; InterParturitionIntervalIntercept=10.8471; InterParturitionIntervalCoefficient=-0.7994; GestationLength=9; MinimumAge1stMating=24; MinimumSize1stMating=50; CriticalCowWeight=50; ConceptionRateCoefficent=[-9.3353]; ConceptionRateIntercept=[6.754]; ConceptionRateAsymptote=[81.54]
            zero: EMaintExponent, GrowthEnergyIntercept1, GrowthEnergyIntercept2, GrowthEfficiency, SRWMaleMultiplier, BaseAnimalEquivalent, GreenDietMax, GreenDietCoefficient, GreenDietZero, IntakeTropicalQuality, IntakeCoefficientQuality, IntakeCoefficientBiomass, MilkIntakeCoefficient, MilkIntakeIntercept, MilkIntakeMaximum, MilkLWTFodderSubstitutionProportion, MaxJuvenileIntake, ProportionalDiscountDueToMilk, ProportionOfMaxWeightToSurvive, LactatingPotentialModifierConstantA, LactatingPotentialModifierConstantB, LactatingPotentialModifierConstantC, MaximumSizeOfIndividual, MortalityCoefficient, MortalityIntercept, MortalityExponent, WoolCoefficient, CashmereCoefficient, MilkingDays, TwinRate, MaximumMaleMatingsPerDay, PrenatalMortality, MaximumConceptionUncontrolledBreeding, MethaneProductionIntercept, MethaneProductionCoefficient
            RuminantInitialCohorts Initial cohorts
              RuminantTypeCohort WeanerF: Gender=Female; StartingAge=9; StartingNumber=1; StartingWeight=100; StartingWeightSD=0; Suckling=false
              RuminantTypeCohort Female3_4: Gender=Female; StartingAge=42; StartingNumber=1; StartingWeight=270; StartingWeightSD=0; Suckling=false
          RuminantType Goats: Breed=Goats; EMaintCoefficient=0.45; EMaintIntercept=0.55; EGrowthCoefficient=1.9; EGrowthIntercept=-0.28; ELactationCoefficient=0.35; ELactationIntercept=0.42; Kme=1.2; GrowthEnergyIntercept1=6.7; GrowthEnergyIntercept2=20.3; GrowthEfficiency=1; SRWFemale=45; SRWMaleMultiplier=1.2; SRWBirth=0.05; AgeGrowthRateCoefficient=0.0115; SRWGrowthScalar=0.32; IntakeCoefficient=0.033; IntakeIntercept=1.9; ProteinCoefficient=90; GreenDietMax=98; GreenDietCoefficient=0.08; GreenDietZero=8; StrictFeedingLimits=false; MilkIntakeCoefficient=0.1206; MilkIntakeIntercept=3.8146; MilkIntakeMaximum=3; MilkLWTFodderSubstitutionProportion=0.2; MaxJuvenileIntake=0.03; ProportionalDiscountDueToMilk=0.3; LactatingPotentialModifierConstantC=1.2; MaximumSizeOfIndividual=1.2; MortalityBase=3; MortalityCoefficient=2.5; MortalityIntercept=0.05; MortalityExponent=3; JuvenileMortalityCoefficient=8.9788; JuvenileMortalityMaximum=10; JuvenileMortalityExponent=-2.902; WoolCoefficient=0.0015; CashmereCoefficient=0.0019; MilkCurveSuckling=0.6; MilkCurveNonSuckling=0.11; MilkPeakYield=1.5; MilkOffsetDay=4; MilkPeakDay=30; InterParturitionIntervalIntercept=6.1787; InterParturitionIntervalCoefficient=-1.127; GestationLength=5; MinimumAge1stMating=12; MinimumSize1stMating=60; TwinRate=30; CriticalCowWeight=0.04; ConceptionRateCoefficent=[-4.4231]; ConceptionRateIntercept=[3.1733]; ConceptionRateAsymptote=[110.544]; PrenatalMortality=7.9; MaximumConceptionUncontrolledBreeding=90
            zero: EMaintExponent, BaseAnimalEquivalent, IntakeTropicalQuality, IntakeCoefficientQuality, IntakeCoefficientBiomass, ProportionOfMaxWeightToSurvive, LactatingPotentialModifierConstantA, LactatingPotentialModifierConstantB, MilkingDays, MaximumMaleMatingsPerDay, MethaneProductionIntercept, MethaneProductionCoefficient
            RuminantInitialCohorts Initial cohorts
              RuminantTypeCohort WeanerM: Gender=Male; StartingAge=2; StartingNumber=5; StartingWeight=9; StartingWeightSD=0; Suckling=false
              RuminantTypeCohort Female2_3: Gender=Female; StartingAge=30; StartingNumber=4; StartingWeight=35; StartingWeightSD=0; Suckling=false
        Finance Finances
          FinanceType General account: OpeningBalance=10000; WithdrawalLimit=0; InterestRateCharged=0; InterestRatePaid=0
      ActivitiesHolder Activities
        ActivityFolder Cash flow: OnPartialResourcesAvailableAction=ReportErrorAndStop
          FinanceActivityPayOverhead General farm maintenance: OnPartialResourcesAvailableAction=SkipActivity; PaymentInterval=1; MonthDue=1; Amount=200; AccountName=General account
          FinanceActivityPayOverhead Machinery maintenance: OnPartialResourcesAvailableAction=SkipActivity; PaymentInterval=1; MonthDue=1; Amount=500; AccountName=General account
          FinanceActivityPayOverhead Electricity: OnPartialResourcesAvailableAction=SkipActivity; PaymentInterval=3; MonthDue=1; Amount=1000; AccountName=General account
          FinanceActivityPayOverhead Living costs: OnPartialResourcesAvailableAction=SkipActivity; PaymentInterval=6; MonthDue=6; Amount=5000; AccountName=General account
        ActivityFolder Manage crops: OnPartialResourcesAvailableAction=ReportErrorAndStop
          IATGrowCrop Grow cotton: OnPartialResourcesAvailableAction=ReportErrorAndStop; Region=1; LandTypeNameToUse=Land1 interbund; FeedTypeName=Cotton; ResidueKept=0; UnitsOfArea=Hectares; AreaRequested=1.54
          IATGrowCrop Grow sorghum: OnPartialResourcesAvailableAction=ReportErrorAndStop; Region=1; LandTypeNameToUse=Land1 interbund; FeedTypeName=SorghumGrain; ResidueKept=0; UnitsOfArea=Hectares; AreaRequested=0.26
          IATGrowCrop Grow maize: OnPartialResourcesAvailableAction=ReportErrorAndStop; Region=1; LandTypeNameToUse=Land2 interbund; FeedTypeName=Maize; ResidueKept=0; UnitsOfArea=Hectares; AreaRequested=1.425
        ActivityFolder Manage pasture: OnPartialResourcesAvailableAction=ReportErrorAndStop
          IATGrowForage Grow native pasture: OnPartialResourcesAvailableAction=UseResourcesAvailable; Region=1; LandTypeNameToUse=Common land; FeedTypeName=Native; ResidueKept=0; UnitsOfArea=Hectares; AreaRequested=200
        ActivityFolder Manage ruminants: OnPartialResourcesAvailableAction=ReportErrorAndStop
          RuminantActivityManage Manage Buffalos: OnPartialResourcesAvailableAction=ReportErrorAndStop; HerdName=Buffalo; MaximumBreedersKept=5; MaximumBreederAge=150; MaximumSiresKept=0; MaximumBullAge=96; AllowSireReplacement=false; MaleSellingAge=0; MaleSellingWeight=0; ManagementMonth=10; MonthlyManagement=true; WeaningAge=1; WeaningWeight=35; MinimumPastureBeforeRestock=0; SellFemalesLikeMales=false
            RuminantActivityFeed Feed Buffalo_MaizeResidue: OnPartialResourcesAvailableAction=UseResourcesAvailable; FeedTypeName=Maize residue; ProportionTramplingWastage=0; FeedStyle=ProportionOfPotentialIntake
              RuminantFeedGroup Buffalo: MonthlyValues=[1, 1, 1, 1, 1, 1, 1, 1, 1, 1, 1, 1]
                RuminantFilter Filter[HerdName=Buffalo]: Parameter=HerdName; Operator=Equal; Value=Buffalo
              LabourFilterGroupSpecified Labour details: UnitType=perHead; UnitSize=300; LabourPerUnit=0.5
                LabourFilter Filter[Name=Joe B]: Parameter=Name; Operator=Equal; Value=Joe B
            RuminantActivityFeed Feed Buffalo_MaizeBranSupp: OnPartialResourcesAvailableAction=UseResourcesAvailable; FeedTypeName=Maize; ProportionTramplingWastage=0; FeedStyle=ProportionOfPotentialIntake
              RuminantFeedGroup Buffalo: MonthlyValues=[1, 1, 1, 1, 1, 1, 1, 1, 1, 1, 1, 1]
                RuminantFilter Filter[HerdName=Cows]: Parameter=HerdName; Operator=Equal; Value=Cows
            RuminantActivityMilking Milking Buffalos: OnPartialResourcesAvailableAction=ReportErrorAndStop; HerdName=Cows
              LabourFilterGroupSpecified Labour details: UnitType=perHead; UnitSize=300; LabourPerUnit=0.5
                LabourFilter Filter[Name=Joe B]: Parameter=Name; Operator=Equal; Value=Joe B
          RuminantActivityManage Manage Cows: OnPartialResourcesAvailableAction=ReportErrorAndStop; HerdName=Cows; MaximumBreedersKept=5; MaximumBreederAge=150; MaximumSiresKept=0; MaximumBullAge=96; AllowSireReplacement=false; MaleSellingAge=0; MaleSellingWeight=0; ManagementMonth=10; MonthlyManagement=false; WeaningAge=9; WeaningWeight=250; MinimumPastureBeforeRestock=0; SellFemalesLikeMales=false
            RuminantActivityFeed Feed Cows_GrainPool1: OnPartialResourcesAvailableAction=UseResourcesAvailable; FeedTypeName=Maize; ProportionTramplingWastage=0; FeedStyle=ProportionOfPotentialIntake
              RuminantFeedGroup Cows: MonthlyValues=[1, 1, 1, 1, 1, 1, 1, 1, 1, 1, 1, 1]
                RuminantFilter Filter[HerdName=Cows]: Parameter=HerdName; Operator=Equal; Value=Cows
              LabourFilterGroupSpecified Labour details: UnitType=perHead; UnitSize=300; LabourPerUnit=0.5
                LabourFilter Filter[Name=Joe B]: Parameter=Name; Operator=Equal; Value=Joe B
            RuminantActivityFeed Feed Cows_MilletBranSupp: OnPartialResourcesAvailableAction=UseResourcesAvailable; FeedTypeName=Millet bran; ProportionTramplingWastage=0; FeedStyle=ProportionOfPotentialIntake
              RuminantFeedGroup Cows: MonthlyValues=[1, 1, 1, 1, 1, 1, 1, 1, 1, 1, 1, 1]
                RuminantFilter Filter[HerdName=Cows]: Parameter=HerdName; Operator=Equal; Value=Cows
            RuminantActivityMilking Milking Cows: same as WF_IATExample_IndiaICRISAT_v1.WF_IATExample_IndiaICRISAT_v1.Activities.Manage ruminants.Manage Buffalos.Milking Buffalos
          RuminantActivityManage Manage Goats: OnPartialResourcesAvailableAction=ReportErrorAndStop; HerdName=Buffalo; MaximumBreedersKept=60; MaximumBreederAge=120; MaximumSiresKept=5; MaximumBullAge=96; AllowSireReplacement=false; MaleSellingAge=0; MaleSellingWeight=0; ManagementMonth=10; MonthlyManagement=false; WeaningAge=9; WeaningWeight=250; MinimumPastureBeforeRestock=0; SellFemalesLikeMales=false
            RuminantActivityFeed Feed Goats_GrainPool1: OnPartialResourcesAvailableAction=UseResourcesAvailable; FeedTypeName=Maize; ProportionTramplingWastage=0; FeedStyle=ProportionOfPotentialIntake
              RuminantFeedGroup Buffalo: MonthlyValues=[1, 1, 1, 1, 1, 1, 1, 1, 1, 1, 1, 1]
                RuminantFilter Filter[HerdName=Goats]: Parameter=HerdName; Operator=Equal; Value=Goats
              LabourFilterGroupSpecified Labour details: UnitType=perHead; UnitSize=300; LabourPerUnit=0.5
                LabourFilter Filter[Name=Joe B]: Parameter=Name; Operator=Equal; Value=Joe B
            RuminantActivityFeed Feed Goats_MaizeGrainSupp: OnPartialResourcesAvailableAction=UseResourcesAvailable; FeedTypeName=Maize; ProportionTramplingWastage=0; FeedStyle=ProportionOfPotentialIntake
              RuminantFeedGroup Goats: MonthlyValues=[1, 1, 1, 1, 1, 1, 1, 1, 1, 1, 1, 1]
                RuminantFilter Filter[HerdName=Cows]: Parameter=HerdName; Operator=Equal; Value=Cows
          RuminantActivityGrow Grow all Ruminants: OnPartialResourcesAvailableAction=ReportErrorAndStop; EnergyGross=18.4
          SummariseRuminantHerd SummariseHerd
      Folder Reports
        Report HerdLedger: EventNames=[Resources].Ruminants.TransactionOccurred
          VariableNames:
            [Clock].Today
            [Resources].Ruminants.LastTransaction.ExtraInformation.ID as UId
            [Resources].Ruminants.LastTransaction.ExtraInformation.Breed as Breed
            [Resources].Ruminants.LastTransaction.ExtraInformation.HerdName as Herd
            [Resources].Ruminants.LastTransaction.ExtraInformation.GenderAsString as Sex
            [Resources].Ruminants.LastTransaction.ExtraInformation.Age as Age
            [Resources].Ruminants.LastTransaction.ExtraInformation.Weight as Weight
            [Resources].Ruminants.LastTransaction.ExtraInformation.SaleFlagAsString as Reason
            [Resources].Ruminants.LastTransaction.ExtraInformation.PopulationChangeDirection as Change
        Report HerdSummary
          VariableNames:
            [Clock].Today
            [Activities].Manage ruminants.SummariseHerd.ReportDetails.Breed as Breed
            [Activities].Manage ruminants.SummariseHerd.ReportDetails.Herd as Herd
            [Activities].Manage ruminants.SummariseHerd.ReportDetails.Age as AgeGroup
            [Activities].Manage ruminants.SummariseHerd.ReportDetails.Sex as Sex
            [Activities].Manage ruminants.SummariseHerd.ReportDetails.Number as Num
            [Activities].Manage ruminants.SummariseHerd.ReportDetails.AverageWeight as AvgWt
            [Activities].Manage ruminants.SummariseHerd.ReportDetails.AverageWeightGain as AvgWtGn
            [Activities].Manage ruminants.SummariseHerd.ReportDetails.AverageIntake as AvgIntake
            [Activities].Manage ruminants.SummariseHerd.ReportDetails.AdultEquivalents as AE
            [Activities].Manage ruminants.SummariseHerd.ReportDetails.NumberPregnant as NoPregnant
            [Activities].Manage ruminants.SummariseHerd.ReportDetails.NumberOfBirths as Births
          EventNames=[Activities].Manage ruminants.SummariseHerd.OnReportItemGenerated
        Report FinancesLedger: EventNames=[Resources].Finances.TransactionOccurred
          VariableNames:
            [Clock].Today as Date
            [Resources].Finances.LastTransaction.Credit as Credit
            [Resources].Finances.LastTransaction.Debit as Debit
            [Resources].Finances.LastTransaction.ResourceType as Resource
            [Resources].Finances.LastTransaction.Activity as Activity
            [Resources].Finances.LastTransaction.Reason as Reason
        Report LandLedger: EventNames=[Resources].Land.TransactionOccurred
          VariableNames:
            [Clock].Today as Date
            [Resources].Land.LastTransaction.Credit as Credit
            [Resources].Land.LastTransaction.Debit as Debit
            [Resources].Land.LastTransaction.ResourceType as Resource
            [Resources].Land.LastTransaction.Activity as Activity
            [Resources].Land.LastTransaction.Reason as Reason
        Report AnimalFoodLedger: EventNames=[Resources].AnimalFoodStore.TransactionOccurred
          VariableNames:
            [Clock].Today as Date
            [Resources].AnimalFoodStore.LastTransaction.Credit as Credit
            [Resources].AnimalFoodStore.LastTransaction.Debit as Debit
            [Resources].AnimalFoodStore.LastTransaction.ResourceType as Resource
            [Resources].AnimalFoodStore.LastTransaction.Activity as Activity
        Report LabourLedger: EventNames=[Resources].Labour.TransactionOccurred
          VariableNames:
            [Clock].Today as Date
            [Resources].Labour.LastTransaction.Credit as Credit
            [Resources].Labour.LastTransaction.Debit as Debit
            [Resources].Labour.LastTransaction.ResourceType as Resource
            [Resources].Labour.LastTransaction.Activity as Activity
        Report ResourceShortfallLedger: EventNames=[Activities].ResourceShortfallOccurred
          VariableNames:
            [Clock].Today as Date
            [Activities].LastShortfallResourceRequest.ResourceTypeName as Type
            [Activities].LastShortfallResourceRequest.Resource.Name as Resource
            [Activities].LastShortfallResourceRequest.ActivityModel.Name as Activity
            [Activities].LastShortfallResourceRequest.Required as Required
            [Activities].LastShortfallResourceRequest.Available as Available
  DataStore
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