Simulations
  DataStore
  Simulation Test1
    Clock: StartDate=2000-07-01; EndDate=2001-06-30
    WeatherFile: FileName=..\WeatherFiles\Ruakura.met
    Manager SetCO2
      ambientCO2 = 380
```csharp
using System;
using Models.Core;
using Models.PMF;
namespace Models
{
	[Serializable]
	public class Script : Model
	{      
	[Link] WeatherFile MetData;
	[Link] Clock Clock;
	
	[Description("Ambient CO2 concentration (ppm):")]
	public double ambientCO2 {get; set;} //= 350;
	
	public override void OnSimulationCommencing()
	{
		MetData.CO2 = ambientCO2;
	}
	}
}
```
    Summary
    Zone Field: Area=0; Slope=0
      Manager FertiliserRule
        ApplicationAmount = 500
        FertType = NO3N
        ApplicationDate = 2003-12-30
```csharp
        using System;
        using Models.Core;
        using Models.PMF;
        namespace Models
        {
            [Serializable]
            public class Script : Model
            {      
               [Link] Fertiliser Fertiliser;
               [Link] Clock Clock;

               [Description("Amount (kg/ha) of fertiliser to apply")]
               public double ApplicationAmount {get; set;} //= 500;
               [Description("Type of fertiliser to apply")]
               public Fertiliser.Types FertType {get; set;}//= "NO3_N";
               [Description("Date of fertiliser application")]
               public DateTime ApplicationDate {get; set;} //= new DateTime(2003, 12, 30, 0, 0, 0);

               [EventSubscribe("DoManagement")]
               private void OnDoManagement(object sender, EventArgs e)
               {
               if (Clock.Today.Date.Equals(ApplicationDate))
                    Fertiliser.Apply(Amount:ApplicationAmount,Type:FertType);
			      //Fertiliser.Apply(Amount:a, Type:"b", Depth:c)
			      //a is a double and can be represented by a variable name or a number representing the amount (kg/ha) of fertiliser to apply
			      //b is a string and can be represented by a variable name or text string (in quotes eg "UreaN") representing the type of fertiliser to apply
			      //c is an optional double and can be represented by a variable name or a number representing the depth (mm) to which fertiliser is applied
			      //if c is omitted a default depth of 0 is used (fertiliser is applied to the surface by defalt)
			   }
            }
        }
```
      Manager IrrigationRule
        ApplicationAmount = 100
        ApplicationDate = 2003-12-20
```csharp
        using System;
        using Models.Core;
        using Models.PMF;
        namespace Models
        {
            [Serializable]
            public class Script : Model
            {      
               [Link] Irrigation Irrigation;
               [Link] Clock Clock;
			
			   [Description("Amount of water to apply")]
               public double ApplicationAmount {get; set;} 
               [Description("Date irrigation is applied")]
               public DateTime ApplicationDate {get; set;}
			   
			   [EventSubscribe("DoManagement")]
               private void OnDoManagement(object sender, EventArgs e)
               {
				if (Clock.Today.Date.Equals(ApplicationDate))
                    Irrigation.Apply(amount:ApplicationAmount);
                  //Irrigation.Apply(Amount:a, Depth:b, Efficiency:c, willRunoff:"d");
                  //a is a double and can be represented by a variable name or a number representing the amount (mm) of irrigation to apply
			      //b is an optional double and can be represented by a variable name or a number representing the depth (mm) at which irrigation is applied
			      //if b is omitted a default value of 0 is used (irrigation is applied to the surface by defalt)
			      //c is an optional double and can be represented by a varialbe name or a number representing the efficiency (0-1) with which irrigation is applied
			      //if c is omitted a default of 1 is used (irrigation efficiency is 100% by defalt)
			      //d is a optional boolen and can be represented by text strings "true" or "false" determining if irrigation water will runoff or not
			      //if d is omitted a default of false is used (irrigation won't run off by defalt)
			   }
            }
        }
```
      Manager CutRotation
        DaysAfterCut = 12
        CutRotationDate = 1900-01-01
        CutInterval = 21
        PastureAmount = 1500
```csharp
using System;
using Models.Core;
using Models.PMF;
namespace Models
{
	[Serializable]
	public class Script : Model
	{      
		[Link] Clock Clock;
		[Link] AgPasture AgPasture;
		
		[Description("Date to begin rotation:")]
		public DateTime CutRotationDate {get; set;}
		[Description("Rotation interval (days):")]
		public int CutInterval {get; set;} //= 500;
		[Description("Residual amount of pasture (kg/ha):")]
		public double PastureAmount {get; set;} //= 500;
		
		private bool RotationAllowed = false;
		public int DaysAfterCut { get; set; }
		
		public override void OnSimulationCommencing()
		{
		DaysAfterCut = 1000;
		}
		
		[EventSubscribe("DoManagement")]
		private void OnDoManagement(object sender, EventArgs e)
		{
			if (Clock.Today.Date >= CutRotationDate)
			{
				if (DaysAfterCut >= CutInterval)
				{
					AgPasture.Graze(type:"SetResidueAmount",amount:PastureAmount);
					DaysAfterCut = 0;
				}
				else
				{
					DaysAfterCut += 1;
				}
			}
		}
	}
}
```
      MicroClimate: air_pressure=1010; soil_emissivity=0.96; sun_angle=15; soil_heat_flux_fraction=0.4; night_interception_fraction=0.5; windspeed_default=3; refheight=2; albedo=0.293662; emissivity=0.96; gsmax=0.01; r50=200; a_interception=0; b_interception=0; c_interception=0; d_interception=0; soil_albedo=0.23
      Irrigation
      Fertiliser
      SurfaceOrganicMatter: _standing_fraction=[0]; c_fract=0.4; report_additions=no; report_removals=no; PoolName=AgPasture; type=grass; mass=1000; standing_fraction=0; cnr=40; crit_residue_wt=2000; opt_temp=20; cum_eos_max=20; cnrf_coeff=0.277; cnrf_optcn=25; leach_rain_tot=25; min_rain_to_leach=10; crit_min_surfom_orgC=0.004; default_cpr=0; standing_extinct_coeff=0.5; fractionFaecesAdded=0.5
        ResidueTypes: LoadFromResource=ResidueTypes
        TillageTypes TillageTypesList
      Soil: SoilType=NZ_Sedimentary; Site=Winchmore; NearestTown=Ashburton; Region=Canterbury; Country=New Zealand; Latitude=-48.48; Longitude=0
        Analysis: Thickness=[150, 150, 200, 150, 250, 300, 300]; PH=[5.9, 5.9, 5.9, 5.9, 5.9, 5.9, 5.9]; PHUnits=Water; BoronUnits=HotWater
        Water
          Thickness  BD    AirDry  LL15   DUL    SAT    KS
          150        1.3   0.075   0.15   0.36   0.45   5000
          150        1.33  0.12    0.133  0.33   0.428  5000
          200        1.01  0.075   0.075  0.24   0.3    5000
          150        0.54  0.02    0.02   0.08   0.172  10000
          250        0.31  0.01    0.01   0.035  0.11   17500
          300        0.31  0.01    0.01   0.03   0.11   20000
          300        0.31  0.01    0.01   0.03   0.11   20000
          SoilCrop ryegrass_clover: LL=[0.15, 0.13, 0.08, 0.02, 0.01, 0.01, 0.01]; KL=[0.08, 0.08, 0.07, 0.04, 0.01, 0, 0]; XF=[1, 1, 1, 1, 1, 0, 0]
          SoilCrop agpasture: LL=[0.15, 0.13, 0.08, 0.02, 0.01, 0.01, 0.01]; KL=[0.08, 0.08, 0.07, 0.04, 0.01, 0, 0]; XF=[1, 1, 1, 1, 1, 0, 0]
          SoilCrop ryegrass: LL=[0.15, 0.13, 0.08, 0.02, 0.01, 0.01, 0.01]; KL=[0.1, 0.1, 0.1, 0.02, 0, 0, 0]; XF=[1, 1, 1, 1, 0, 0, 0]
          SoilCrop clover: LL=[0.15, 0.13, 0.08, 0.02, 0.01, 0.01, 0.01]; KL=[0.1, 0.1, 0.1, 0.02, 0, 0, 0]; XF=[1, 1, 1, 1, 0, 0, 0]
          SoilCrop maize: LL=[0.15, 0.13, 0.08, 0.02, 0.01, 0.01, 0.01]; KL=[0.06, 0.06, 0.06, 0.06, 0.06, 0.06, 0.06]; XF=[1, 1, 1, 1, 1, 1, 1]
          SoilCrop cotton: LL=[0.14, 0.14, 0.03, 0.02, 0.02, 0.02, 0.02]; KL=[0.1, 0.1, 0.1, 0.1, 0.09, 0.07, 0.05]; XF=[1, 1, 1, 1, 1, 1, 1]
          SoilCrop sorghum: LL=[0.14, 0.14, 0.03, 0.02, 0.02, 0.02, 0.02]; KL=[0.07, 0.07, 0.07, 0.05, 0.05, 0.04, 0.03]; XF=[1, 1, 1, 1, 1, 1, 0.9]
          SoilCrop slurp: LL=[0.14, 0.14, 0.03, 0.02, 0.02, 0.02, 0.02]; KL=[0.06, 0.06, 0.06, 0.06, 0.06, 0.06, 0.06]; XF=[1, 1, 1, 1, 1, 1, 1]
        SoilWater: min_crit_temp=5; max_crit_temp=35; max_albedo=0.23; A_to_evap_fact=0.44; canopy_eos_coef=1.7; sw_top_crit=0.9; sumes1_max=100; sumes2_max=25; solute_flow_eff=[1]; solute_flux_eff=[1]; gravity_gradient=2E-05; specific_bd=2.65; hydrol_effective_depth=450; immobile_solutes=[nh4]; canopy_fact=[1, 1, 0, 0]; canopy_fact_height=[0, 600, 1800, 30000]; canopy_fact_default=0.5; act_evap_method=ritchie; irrigation_will_runoff=false; irrigation_layer=0; SummerCona=3.5; SummerU=6; SummerDate=1-Nov; WinterCona=2; WinterU=2; WinterDate=1-apr; DiffusConst=88; DiffusSlope=35; Salb=0.13; slope=0; discharge_width=0; catchment_area=0; max_pond=0; CN2Bare=73; CNRed=20; CNCov=0.8
          Thickness  SWCON  KLAT
          150        0.5    0
          150        0.52   0
          200        0.55   0
          150        0.6    0
          250        0.65   0
          300        0.65   0
          300        0.65   0
          mobile_solutes=[no3, urea, cl, br, org_n, org_c_pool1, org_c_pool2, org_c_pool3]
        SoilNitrogen: fom_type=[default, manure, mucuna, lablab, shemp, stable]; fract_carb=[0.2, 0.3, 0.54, 0.57, 0.45, 0]; fract_cell=[0.7, 0.3, 0.37, 0.37, 0.47, 0.1]; fract_lign=[0.1, 0.4, 0.09, 0.06, 0.08, 0.9]; wfpsN2N2O_x=[22, 88]; wfpsN2N2O_y=[0.1, 1]
          oc=[3.75704, 2.48443, 1.24428, 0.499544, 0.250321, 0.150326, 0.1002]
        SoilOrganicMatter: RootCN=40; RootWt=800; SoilCN=11.3; EnrACoeff=7.4; EnrBCoeff=0.2; OCUnits=Total
          Thickness  OC    FBiom  FInert
          150        3.8   0.04   0.3
          150        2.5   0.02   0.5
          200        1.25  0.02   0.6
          150        0.5   0.01   0.8
          250        0.25  0.01   1
          300        0.15  0      1
          300        0.1   0      1
        InitialWater Initial water: PercentMethod=EvenlyDistributed; FractionFull=0.99
        Sample Initial nitrogen: NO3Units=ppm; NH4Units=ppm; SWUnits=Volumetric; OCUnits=Total; PHUnits=Water
          Thickness  NO3      NH4
          150        7.61905  0.1
          150        7.27008  0.1
          200        3.87147  0.1
          150        3.84025  0.1
          250        2.1      0.1
          300        1.2      0.1
          300        1.2      0.1
          999999     -        -
      AgPasture: alt_N_uptake=no; SwardName=AgPasture; NumSpecies=1; WaterUptakeSource=calc; SpeciesName=[Ryegrass]; SpeciesNType=[grass]; SpeciesCType=[C3]; InitialDMShoot=[2000]; InitialDMRoot=[500]; MinimumGreenWt=[300]; InitialRootDepth=[750]
      Report: EventNames=[Clock].DoReport
        VariableNames:
          [Clock].Today
          [AgPasture].SwardName
          [AgPasture].SpeciesName
          [AgPasture].TotalPlantWt
          [AgPasture].AboveGroundWt
          [AgPasture].StandingPlantWt
          [AgPasture].BelowGroundWt
          [AgPasture].HarvestableWt
          [AgPasture].SpeciesTotalWt
          [AgPasture].SpeciesAboveGroundWt
          [AgPasture].HarvestWt
          [AgPasture].SpeciesHarvestWt
          [AgPasture].LAI_total
          [AgPasture].LAI_green
          [AgPasture].LAI_dead
          [AgPasture].PlantPotentialGrowthWt
          [AgPasture].PlantGrowthNoNLimit
          [AgPasture].PlantGrowthWt
          [AgPasture].HerbageGrowthWt
          [AgPasture].LitterDepositionWt
          [AgPasture].RootSenescenceWt
          [AgPasture].WaterDemand
          [AgPasture].WaterSupply
          [AgPasture].WaterUptake
          [AgPasture].TotalPlantN
          [AgPasture].NitrogenDemand
          [AgPasture].PlantFixedN
          [AgPasture].NitrogenUptake
          [AgPasture].LitterDepositionN
          [AgPasture].RootSenescenceN
          [SurfaceOrganicMatter].surfaceom_wt
          [Soil].SoilWater.drain
          [Soil].SoilWater.es as evaporation
          Evaluate sum([Soil].SoilNitrogen.no3) as TotalNO3
          [AgPasture].GLFtemp
          [AgPasture].GLFwater
          [AgPasture].GLFn
          [AgPasture].GLFnConcentration
          [AgPasture].GLFrgr
          [Agpasture].GPP
          [Agpasture].NitrogenSupply
          [Soil].SoilWater.sw_dep
          [CutRotation].Script.DaysAfterCut
    Input Observed
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