Simulations: Area=0
  Simulation GympieIrrigatedFertilised: Area=0
    WeatherFile: FileName=toolara8797.met; MaxT=28; MinT=17; Rain=0; Radn=25; vp=18; wind=3; CO2=350
    Clock: StartDate=1987-02-04; EndDate=1997-02-04
    Summary
    Zone Plantation: Area=0
      Soil: Latitude=0; Longitude=0
        InitialWater Initial water: FractionFull=0.8; PercentMethod=EvenlyDistributed
        Water
          Thickness  BD    AirDry  LL15  DUL   SAT
          100        1.5   0.01    0.05  0.16  0.29
          300        1.6   0.01    0.05  0.15  0.29
          600        1.68  0.01    0.05  0.14  0.29
          1000       1.75  0.02    0.05  0.13  0.29
          1000       1.7   0.05    0.05  0.12  0.29
          1000       1.7   0.05    0.05  0.12  0.29
          1000       1.7   0.05    0.05  0.12  0.29
          1000       1.7   0.05    0.05  0.12  0.29
          SoilCrop Eucalyptus: LL=[0.1, 0.1, 0.1, 0.1, 0.1, 0.1, 0.1, 0.1]; KL=[0.07, 0.07, 0.05, 0.02, 0.02, 0.02, 0.01, 0.01]; XF=[1, 1, 1, 1, 1, 1, 1, 1]
        SoilWater: min_crit_temp=5; max_crit_temp=35; max_albedo=0.23; A_to_evap_fact=0.44; canopy_eos_coef=1.7; sw_top_crit=0.9; sumes1_max=100; sumes2_max=25; solute_flow_eff=[1]; solute_flux_eff=[1]; gravity_gradient=2E-05; specific_bd=2.65; hydrol_effective_depth=450; immobile_solutes=[nh4]; canopy_fact=[1, 1, 0, 0]; canopy_fact_height=[0, 600, 1800, 30000]; canopy_fact_default=0.5; act_evap_method=ritchie; irrigation_will_runoff=false; irrigation_layer=1; SummerCona=3.5; SummerU=4; SummerDate=1-Nov; WinterCona=3.5; WinterU=4; WinterDate=1-Apr; DiffusConst=88; DiffusSlope=35.4; Salb=0.13; slope=0; discharge_width=0; catchment_area=0; max_pond=0; CN2Bare=65; CNRed=20; CNCov=0.8
          mobile_solutes  Thickness  SWCON  KLAT
          no3             100        0.9    0
          urea            300        0.9    0
          cl              600        0.9    0
          br              1000       0.6    0
          org_n           1000       0.6    0
          org_c_pool1     1000       0.6    0
          org_c_pool2     1000       0.6    0
          org_c_pool3     1000       0.6    0
        SoilNitrogen: fom_type=[default, manure, mucuna, lablab, shemp, stable]; fract_carb=[0.2, 0.3, 0.54, 0.57, 0.45, 0]; fract_cell=[0.7, 0.3, 0.37, 0.37, 0.47, 0.1]; fract_lign=[0.1, 0.4, 0.09, 0.06, 0.08, 0.9]; wfpsN2N2O_x=[22, 88]; wfpsN2N2O_y=[0.1, 1]
        SoilOrganicMatter: RootCN=60; RootWt=1; SoilCN=14.5; EnrACoeff=7.4; EnrBCoeff=0.2; OCUnits=Total
          Thickness  OC    FBiom  FInert
          100        2     0.02   0.5
          300        1     0.02   0.5
          600        0.5   0.01   0.85
          1000       0.2   0.01   0.5
          1000       0.12  0.01   0.9
          1000       0.1   0.01   0.99
          1000       0.1   0.01   0.99
          1000       0.1   0.01   0.99
        Analysis: Thickness=[100, 300, 600, 1000, 1000, 1000, 1000, 1000]; PH=[5.8, 5.7, 5.7, 5.9, 5.7, 5.7, 5.7, 5.7]; PHUnits=Water; BoronUnits=HotWater
        Sample Initial nitrogen: NO3Units=ppm; NH4Units=ppm; SWUnits=Volumetric; OCUnits=Total; PHUnits=Water
          Thickness  NO3   NH4
          100        0.1   0.01
          300        0.1   0.01
          600        0.1   0.01
          1000       0.01  0.01
          1000       0.01  0.01
          1000       0.01  0.01
          1000       0.01  0.01
          1000       0.01  0.01
      Irrigation
      Fertiliser
      SurfaceOrganicMatter: crit_residue_wt=2000; opt_temp=20; cum_eos_max=20; cnrf_coeff=0.277; cnrf_optcn=25; c_fract=0.4; leach_rain_tot=25; min_rain_to_leach=10; crit_min_surfom_orgC=0.004; default_cpr=0; default_standing_fraction=0; standing_extinct_coeff=0.5; fractionFaecesAdded=0.5; PoolName=Wheat; type=Wheat; mass=2000; standing_fraction=0; cnr=80
        TillageTypes
      MicroClimate: air_pressure=1010; soil_emissivity=0.96; sun_angle=15; soil_heat_flux_fraction=0.4; night_interception_fraction=0.5; windspeed_default=3; refheight=2; albedo=0.293662; emissivity=0.96; gsmax=0.01; r50=200; a_interception=0; b_interception=1; c_interception=0; d_interception=0; soil_albedo=0.13
      Plant Eucalyptus: LocalCanopyData={height=0, depth=0, lai=0, lai_tot=0, cover=0, cover_tot=0}; CropType=Eucalyptus
        Cultivars
          Cultivar RussetBurbank
        AccumulateFunction Age: StartStageName=Planting; EndStageName=Old
          Constant day: Value=0.00273973
        Phenology
          StageBasedInterpolation StageCode: Stages=[Planting, EndJuvenile, Maturity, Old]; Codes=[1, 2, 3, 4]; Proportional=true
          Constant ThermalTime: Value=1
          GenericPhase Juvenile: Start=Planting; End=EndJuvenile
            Constant ThermalTime: Value=1
            Constant Target: Value=365
          GenericPhase Mature: Start=EndJuvenile; End=Maturity
            Constant ThermalTime: Value=1
            Constant Target: Value=1825
          GenericPhase Declining: Start=Maturity; End=Old
            Constant ThermalTime: Value=1
            Constant Target: Value=27010
          EndPhase Old: Start=Old; End=Unused
            Constant ThermalTime: Value=1
        Arbitrator: NArbitrationOption=RelativeAllocation; DMArbitrationOption=RelativeAllocation
        Summariser
          CompositeBiomass AboveGround: Propertys=[[Leaf].Live, [Leaf].Dead, [Stem].Live, [Stem].Dead]
          CompositeBiomass BelowGround: Propertys=[[Root].Live, [Root].Dead]
          CompositeBiomass Total
            Propertys=[[Leaf].Live, [Leaf].Dead, [Stem].Live, [Stem].Dead, [Root].Live, [Root].Dead]
          CompositeBiomass TotalLive: Propertys=[[Leaf].Live, [Stem].Live, [Root].Live]
          DivideFunction IndividualTreeLiveWt
            VariableReference Population: VariableName=[Eucalyptus].Summariser.TotalLive.Wt
            VariableReference Population: VariableName=[Eucalyptus].Population
          CompositeBiomass TotalDead: Propertys=[[Leaf].Dead, [Stem].Dead, [Root].Dead]
        TreeCanopy Leaf: _Height=0; _LAI=2.87621; _LAIDead=0; _Frgr=0; K=0.5; KDead=0; DeltaBiomass=16.5235; WaterAllocation=0; Frgr=0; LAI=2.87621; LAIDead=0; Height=0
          Biomass Live
          Biomass Dead
          Constant MinimumNConc: Value=0.015
          Constant MaximumNConc: Value=0.03
          MultiplyFunction InitialWtFunction
            Constant InitialLeafMass: Value=3
            VariableReference Population: VariableName=[Eucalyptus].Population
          MultiplyFunction LAIFunction
            LinearInterpolationFunction SpecificLeafArea: XProperty=[Phenology].StageCode.Value
              XYPairs: X=[0, 1, 1.5, 2, 2.04]; Y=[0.016, 0.013, 0.011, 0.01, 0.008]
            VariableReference LeafMass: VariableName=[Leaf].Live.Wt
          PhaseBasedSwitch NitrogenDemandSwitch: Start=Planting; End=Old
          Constant DetachmentRateFunction: Value=1
          PhaseLookup SenescenceRateFunction
            PhaseLookupValue Juvenile Foliage: Start=Planting; End=EndJuvenile
              Constant: Value=0.0003
            PhaseLookupValue MatureFoliage: Start=EndJuvenile; End=Old
              Constant: Value=0.00274
          PartitionFractionDemandFunction DMDemandFunction
            LinearInterpolationFunction PartitionFraction: XProperty=[Summariser].IndividualTreeLiveWt.Value
              XYPairs: X=[0, 1000]; Y=[0.48, 0.16]
          RUEModel Photosynthesis
            Constant RUE: Value=1.3
            RUECO2Function FCO2: PhotosyntheticPathway=C3
            LinearInterpolationFunction FN: XProperty=[Leaf].Fn
              XYPairs: X=[0, 1, 1.5]; Y=[1, 1, 1]
            WeightedTemperatureFunction FT: MaximumTemperatureWeighting=0.5
              XYPairs: X=[5, 20, 25, 35]; Y=[0, 1, 1, 0]
            LinearInterpolationFunction FW: XProperty=[Leaf].Fw
              XYPairs: X=[0, 1.5]; Y=[0, 1]
            LinearInterpolationFunction FVPD: XProperty=[Photosynthesis].VPD
              XYPairs: X=[0, 10, 50]; Y=[1, 1, 1]
        Root: InitialDM=5; SpecificRootLength=100000; KNO3=0.02; KNH4=0
          CompositeBiomass Live: Propertys=[[Root].LayerLive]
          CompositeBiomass Dead: Propertys=[[Root].LayerDead]
          PhaseBasedSwitch NitrogenDemandSwitch: Start=Planting; End=Old
          AirTemperatureFunction TemperatureEffect
            Memo
              Assume no temperature effect on root front velocity.
            XYPairs: X=[0, 26, 35]; Y=[1, 1, 1]
          Constant RootFrontVelocity: Value=10
          Constant SenescenceRate: Value=0.005
          PhaseLookup PartitionFraction
            PhaseLookupValue: Start=Planting; End=Old
              Constant: Value=0.2
          Constant MaximumNConc: Value=0.0041
          Constant MaxDailyNUptake: Value=6
          Constant MinimumNConc: Value=0.004
          LinearInterpolationFunction KLModifier: XProperty=[Leaf].LAI
            XYPairs: X=[0, 3]; Y=[1, 1]
        GenericAboveGroundOrgan Stem
          Constant NReallocationFactor: Value=0
          Constant NRetranslocationFactor: Value=0.05
          PhaseBasedSwitch NitrogenDemandSwitch: Start=Planting; End=Old
          Constant DMRetranslocationFactor: Value=0
          Constant StructuralFraction: Value=1
          PartitionFractionDemandFunction DMDemandFunction
            Constant PartitionFraction: Value=0.2
          Constant MaximumNConc: Value=0.0015
          Constant MinimumNConc: Value=0.0014
          Constant DetachmentRateFunction: Value=0
          Biomass Live
          Biomass Dead
      Manager TreeSowingRule
        RowSpace = 3
        RowWidth = 3
        CultivarName = RussetBurbank
        SowingDate = 1987-02-04
```csharp
        using System;
        using Models.Core;
        using Models.PMF;
        namespace Models
        {
           [Serializable] 
           [System.Xml.Serialization.XmlInclude(typeof(Model))]
            public class Script : Model
            {      
               [Link] Plant Plant;
               [Link] Clock Clock;

               [Description("Spacing (m) between plants within rows")]
               public double RowSpace { get; set; }
               [Description("Spacing (m) between rows")]
               public double RowWidth { get; set; }

               [Description("Cultivar")]
               public string CultivarName { get; set; }
               [Description("Sowing Date")]
               public DateTime SowingDate { get; set; }

               [EventSubscribe("StartOfDay")]
               private void OnStartOfDay(object sender, EventArgs e)
               {
				double PlantPopulation = 1/(RowWidth*RowSpace);

				if (Clock.Today.Date == SowingDate)
                    Plant.Sow(Population:PlantPopulation, Cultivar:CultivarName);
                //Plant.Sow(... Contains the following arguements:
                //Population  double  Required  Seeds sowing/m2
                //Cultivar    string  Required  "NameOfCultivar"
                //Depth       double  Optional  Depth (mm) seed sown.   Default is 100mm 
                //MaxCover    double  Optional  Proportion (0-1) of the ground row crop will cover.   Default is 1.0
                //BudNumber   double  Optional  Number of mainstems per seed sown.  Default is 1.0
                //RowSpacing  double  Optional  Spaceing (mm) between drill rows when crop is sown.  Default is 150mm
                //CropClass   string  Optional  Crop class to instantiate when crop is sown.  Default is "Plant"
			   }
            }
        }
```
      Operations FertiliserOperations
        1987-02-09  Fertiliser.Apply(192, Fertiliser.Types.UreaN, 0);
        1987-05-20  Fertiliser.Apply(192, Fertiliser.Types.UreaN, 0);
        1987-08-28  Fertiliser.Apply(96, Fertiliser.Types.UreaN, 0);
        1987-12-06  Fertiliser.Apply(256, Fertiliser.Types.UreaN, 0);
        1988-02-29  Fertiliser.Apply(256, Fertiliser.Types.UreaN, 0);
        1988-07-18  Fertiliser.Apply(128, Fertiliser.Types.UreaN, 0);
        1988-10-26  Fertiliser.Apply(192, Fertiliser.Types.UreaN, 0);
        1989-06-09  Fertiliser.Apply(128, Fertiliser.Types.UreaN, 0);
        1989-10-27  Fertiliser.Apply(96, Fertiliser.Types.UreaN, 0);
      Operations IrrigationOperations
        1986-01-08  Irrigation.Apply(amount: 0);
        1986-01-15  Irrigation.Apply(amount: 0);
        1986-01-22  Irrigation.Apply(amount: 0);
        1986-01-29  Irrigation.Apply(amount: 0);
        1986-02-08  Irrigation.Apply(amount: 0);
        1986-02-15  Irrigation.Apply(amount: 0);
        1986-02-22  Irrigation.Apply(amount: 0);
        1986-03-01  Irrigation.Apply(amount: 0);
        1986-03-08  Irrigation.Apply(amount: 0);
        1986-03-15  Irrigation.Apply(amount: 0);
        1986-03-22  Irrigation.Apply(amount: 0);
        1986-03-29  Irrigation.Apply(amount: 0);
        1986-04-08  Irrigation.Apply(amount: 0);
        1986-04-15  Irrigation.Apply(amount: 0);
        1986-04-22  Irrigation.Apply(amount: 0);
        1986-04-29  Irrigation.Apply(amount: 0);
        1986-05-08  Irrigation.Apply(amount: 0);
        1986-05-15  Irrigation.Apply(amount: 0);
        1986-05-22  Irrigation.Apply(amount: 0);
        1986-05-29  Irrigation.Apply(amount: 0);
        1986-06-08  Irrigation.Apply(amount: 0);
        1986-06-15  Irrigation.Apply(amount: 0);
        1986-06-22  Irrigation.Apply(amount: 0);
        1986-06-29  Irrigation.Apply(amount: 0);
        1986-07-08  Irrigation.Apply(amount: 0);
        1986-07-15  Irrigation.Apply(amount: 0);
        1986-07-22  Irrigation.Apply(amount: 0);
        1986-07-29  Irrigation.Apply(amount: 0);
        1986-08-08  Irrigation.Apply(amount: 0);
        1986-08-15  Irrigation.Apply(amount: 0);
        1986-08-22  Irrigation.Apply(amount: 0);
        1986-08-29  Irrigation.Apply(amount: 0);
        1986-09-08  Irrigation.Apply(amount: 0);
        1986-09-15  Irrigation.Apply(amount: 0);
        1986-09-22  Irrigation.Apply(amount: 0);
        1986-09-29  Irrigation.Apply(amount: 0);
        1986-10-08  Irrigation.Apply(amount: 0);
        1986-10-15  Irrigation.Apply(amount: 0);
        1986-10-22  Irrigation.Apply(amount: 0);
        1986-10-29  Irrigation.Apply(amount: 0);
        1986-11-08  Irrigation.Apply(amount: 0);
        1986-11-15  Irrigation.Apply(amount: 0);
        1986-11-22  Irrigation.Apply(amount: 0);
        1986-11-29  Irrigation.Apply(amount: 0);
        1986-12-08  Irrigation.Apply(amount: 0);
        1986-12-15  Irrigation.Apply(amount: 0);
        1986-12-22  Irrigation.Apply(amount: 0);
        1986-12-29  Irrigation.Apply(amount: 0);
        1987-01-08  Irrigation.Apply(amount: 0);
        1987-01-15  Irrigation.Apply(amount: 0);
        1987-01-22  Irrigation.Apply(amount: 0);
        1987-01-29  Irrigation.Apply(amount: 0);
        1987-02-08  Irrigation.Apply(amount: 2.2533);
        1987-02-15  Irrigation.Apply(amount: 2.2533);
        1987-02-22  Irrigation.Apply(amount: 2.2533);
        1987-03-01  Irrigation.Apply(amount: 2.2533);
        1987-03-08  Irrigation.Apply(amount: 25.5633);
        1987-03-15  Irrigation.Apply(amount: 25.5633);
        1987-03-22  Irrigation.Apply(amount: 25.5633);
        1987-03-29  Irrigation.Apply(amount: 25.5633);
        1987-04-08  Irrigation.Apply(amount: 21.5229);
        1987-04-15  Irrigation.Apply(amount: 21.5229);
        1987-04-22  Irrigation.Apply(amount: 21.5229);
        1987-04-29  Irrigation.Apply(amount: 21.5229);
        1987-05-08  Irrigation.Apply(amount: 13.6752);
        1987-05-15  Irrigation.Apply(amount: 13.6752);
        1987-05-22  Irrigation.Apply(amount: 13.6752);
        1987-05-29  Irrigation.Apply(amount: 13.6752);
        1987-06-08  Irrigation.Apply(amount: 0);
        1987-06-15  Irrigation.Apply(amount: 0);
        1987-06-22  Irrigation.Apply(amount: 0);
        1987-06-29  Irrigation.Apply(amount: 0);
        1987-07-08  Irrigation.Apply(amount: 17.6379);
        1987-07-15  Irrigation.Apply(amount: 17.6379);
        1987-07-22  Irrigation.Apply(amount: 17.6379);
        1987-07-29  Irrigation.Apply(amount: 17.6379);
        1987-08-08  Irrigation.Apply(amount: 7.77);
        1987-08-15  Irrigation.Apply(amount: 7.77);
        1987-08-22  Irrigation.Apply(amount: 7.77);
        1987-08-29  Irrigation.Apply(amount: 7.77);
        1987-09-08  Irrigation.Apply(amount: 16.58895);
        1987-09-15  Irrigation.Apply(amount: 16.58895);
        1987-09-22  Irrigation.Apply(amount: 16.58895);
        1987-09-29  Irrigation.Apply(amount: 16.58895);
        1987-10-08  Irrigation.Apply(amount: 15.8508);
        1987-10-15  Irrigation.Apply(amount: 15.8508);
        1987-10-22  Irrigation.Apply(amount: 15.8508);
        1987-10-29  Irrigation.Apply(amount: 15.8508);
        1987-11-08  Irrigation.Apply(amount: 20.47395);
        1987-11-15  Irrigation.Apply(amount: 20.47395);
        1987-11-22  Irrigation.Apply(amount: 20.47395);
        1987-11-29  Irrigation.Apply(amount: 20.47395);
        1987-12-08  Irrigation.Apply(amount: 19.425);
        1987-12-15  Irrigation.Apply(amount: 19.425);
        1987-12-22  Irrigation.Apply(amount: 19.425);
        1987-12-29  Irrigation.Apply(amount: 19.425);
        1988-01-08  Irrigation.Apply(amount: 15.6954);
        1988-01-15  Irrigation.Apply(amount: 15.6954);
        1988-01-22  Irrigation.Apply(amount: 15.6954);
        1988-01-29  Irrigation.Apply(amount: 15.6954);
        1988-02-08  Irrigation.Apply(amount: 39.0054);
        1988-02-15  Irrigation.Apply(amount: 39.0054);
        1988-02-22  Irrigation.Apply(amount: 39.0054);
        1988-02-29  Irrigation.Apply(amount: 39.0054);
        1988-03-08  Irrigation.Apply(amount: 42.56018);
        1988-03-15  Irrigation.Apply(amount: 42.56018);
        1988-03-22  Irrigation.Apply(amount: 42.56018);
        1988-03-29  Irrigation.Apply(amount: 42.56018);
        1988-04-08  Irrigation.Apply(amount: 0);
        1988-04-15  Irrigation.Apply(amount: 0);
        1988-04-22  Irrigation.Apply(amount: 0);
        1988-04-29  Irrigation.Apply(amount: 0);
        1988-05-08  Irrigation.Apply(amount: 0);
        1988-05-15  Irrigation.Apply(amount: 0);
        1988-05-22  Irrigation.Apply(amount: 0);
        1988-05-29  Irrigation.Apply(amount: 0);
        1988-06-08  Irrigation.Apply(amount: 0);
        1988-06-15  Irrigation.Apply(amount: 0);
        1988-06-22  Irrigation.Apply(amount: 0);
        1988-06-29  Irrigation.Apply(amount: 0);
        1988-07-08  Irrigation.Apply(amount: 0);
        1988-07-15  Irrigation.Apply(amount: 0);
        1988-07-22  Irrigation.Apply(amount: 0);
        1988-07-29  Irrigation.Apply(amount: 0);
        1988-08-08  Irrigation.Apply(amount: 7.77);
        1988-08-15  Irrigation.Apply(amount: 7.77);
        1988-08-22  Irrigation.Apply(amount: 7.77);
        1988-08-29  Irrigation.Apply(amount: 7.77);
        1988-09-08  Irrigation.Apply(amount: 9.965025);
        1988-09-15  Irrigation.Apply(amount: 9.965025);
        1988-09-22  Irrigation.Apply(amount: 9.965025);
        1988-09-29  Irrigation.Apply(amount: 9.965025);
        1988-10-08  Irrigation.Apply(amount: 40.404);
        1988-10-15  Irrigation.Apply(amount: 40.404);
        1988-10-22  Irrigation.Apply(amount: 40.404);
        1988-10-29  Irrigation.Apply(amount: 40.404);
        1988-11-08  Irrigation.Apply(amount: 49.55318);
        1988-11-15  Irrigation.Apply(amount: 49.55318);
        1988-11-22  Irrigation.Apply(amount: 49.55318);
        1988-11-29  Irrigation.Apply(amount: 49.55318);
        1988-12-08  Irrigation.Apply(amount: 12.91763);
        1988-12-15  Irrigation.Apply(amount: 12.91763);
        1988-12-22  Irrigation.Apply(amount: 12.91763);
        1988-12-29  Irrigation.Apply(amount: 12.91763);
        1989-01-08  Irrigation.Apply(amount: 11.8881);
        1989-01-15  Irrigation.Apply(amount: 11.8881);
        1989-01-22  Irrigation.Apply(amount: 11.8881);
        1989-01-29  Irrigation.Apply(amount: 11.8881);
        1989-02-08  Irrigation.Apply(amount: 15.9285);
        1989-02-15  Irrigation.Apply(amount: 15.9285);
        1989-02-22  Irrigation.Apply(amount: 15.9285);
        1989-03-01  Irrigation.Apply(amount: 15.9285);
        1989-03-08  Irrigation.Apply(amount: 23.7762);
        1989-03-15  Irrigation.Apply(amount: 23.7762);
        1989-03-22  Irrigation.Apply(amount: 23.7762);
        1989-03-29  Irrigation.Apply(amount: 23.7762);
        1989-04-08  Irrigation.Apply(amount: 0);
        1989-04-15  Irrigation.Apply(amount: 0);
        1989-04-22  Irrigation.Apply(amount: 0);
        1989-04-29  Irrigation.Apply(amount: 0);
        1989-05-08  Irrigation.Apply(amount: 0);
        1989-05-15  Irrigation.Apply(amount: 0);
        1989-05-22  Irrigation.Apply(amount: 0);
        1989-05-29  Irrigation.Apply(amount: 0);
        1989-06-08  Irrigation.Apply(amount: 0);
        1989-06-15  Irrigation.Apply(amount: 0);
        1989-06-22  Irrigation.Apply(amount: 0);
        1989-06-29  Irrigation.Apply(amount: 0);
        1989-07-08  Irrigation.Apply(amount: 0.2331);
        1989-07-15  Irrigation.Apply(amount: 0.2331);
        1989-07-22  Irrigation.Apply(amount: 0.2331);
        1989-07-29  Irrigation.Apply(amount: 0.2331);
        1989-08-08  Irrigation.Apply(amount: 12.91763);
        1989-08-15  Irrigation.Apply(amount: 12.91763);
        1989-08-22  Irrigation.Apply(amount: 12.91763);
        1989-08-29  Irrigation.Apply(amount: 12.91763);
        1989-09-08  Irrigation.Apply(amount: 51.70935);
        1989-09-15  Irrigation.Apply(amount: 51.70935);
        1989-09-22  Irrigation.Apply(amount: 51.70935);
        1989-09-29  Irrigation.Apply(amount: 51.70935);
        1989-10-08  Irrigation.Apply(amount: 61.4607);
        1989-10-15  Irrigation.Apply(amount: 61.4607);
        1989-10-22  Irrigation.Apply(amount: 61.4607);
        1989-10-29  Irrigation.Apply(amount: 61.4607);
        1989-11-08  Irrigation.Apply(amount: 31.21598);
        1989-11-15  Irrigation.Apply(amount: 31.21598);
        1989-11-22  Irrigation.Apply(amount: 31.21598);
        1989-11-29  Irrigation.Apply(amount: 31.21598);
        1989-12-08  Irrigation.Apply(amount: 13.73348);
        1989-12-15  Irrigation.Apply(amount: 13.73348);
        1989-12-22  Irrigation.Apply(amount: 13.73348);
        1989-12-29  Irrigation.Apply(amount: 13.73348);
        1990-01-08  Irrigation.Apply(amount: 69.50265);
        1990-01-15  Irrigation.Apply(amount: 69.50265);
        1990-01-22  Irrigation.Apply(amount: 69.50265);
        1990-01-29  Irrigation.Apply(amount: 69.50265);
        1990-02-08  Irrigation.Apply(amount: 77.19495);
        1990-02-15  Irrigation.Apply(amount: 77.19495);
        1990-02-22  Irrigation.Apply(amount: 77.19495);
        1990-03-01  Irrigation.Apply(amount: 77.19495);
        1990-03-08  Irrigation.Apply(amount: 30.6915);
        1990-03-15  Irrigation.Apply(amount: 30.6915);
        1990-03-22  Irrigation.Apply(amount: 30.6915);
        1990-03-29  Irrigation.Apply(amount: 30.6915);
        1990-04-08  Irrigation.Apply(amount: 0);
        1990-04-15  Irrigation.Apply(amount: 0);
        1990-04-22  Irrigation.Apply(amount: 0);
        1990-04-29  Irrigation.Apply(amount: 0);
        1990-05-08  Irrigation.Apply(amount: 0);
        1990-05-15  Irrigation.Apply(amount: 0);
        1990-05-22  Irrigation.Apply(amount: 0);
        1990-05-29  Irrigation.Apply(amount: 0);
        1990-06-08  Irrigation.Apply(amount: 0);
        1990-06-15  Irrigation.Apply(amount: 0);
        1990-06-22  Irrigation.Apply(amount: 0);
        1990-06-29  Irrigation.Apply(amount: 0);
        1990-07-08  Irrigation.Apply(amount: 0);
        1990-07-15  Irrigation.Apply(amount: 0);
        1990-07-22  Irrigation.Apply(amount: 0);
        1990-07-29  Irrigation.Apply(amount: 0);
        1990-08-08  Irrigation.Apply(amount: 24.82515);
        1990-08-15  Irrigation.Apply(amount: 24.82515);
        1990-08-22  Irrigation.Apply(amount: 24.82515);
        1990-08-29  Irrigation.Apply(amount: 24.82515);
        1990-09-08  Irrigation.Apply(amount: 59.9844);
        1990-09-15  Irrigation.Apply(amount: 59.9844);
        1990-09-22  Irrigation.Apply(amount: 59.9844);
        1990-09-29  Irrigation.Apply(amount: 59.9844);
        1990-10-08  Irrigation.Apply(amount: 60.70313);
        1990-10-15  Irrigation.Apply(amount: 60.70313);
        1990-10-22  Irrigation.Apply(amount: 60.70313);
        1990-10-29  Irrigation.Apply(amount: 60.70313);
        1990-11-08  Irrigation.Apply(amount: 42.22995);
        1990-11-15  Irrigation.Apply(amount: 42.22995);
        1990-11-22  Irrigation.Apply(amount: 42.22995);
        1990-11-29  Irrigation.Apply(amount: 42.22995);
        1990-12-08  Irrigation.Apply(amount: 61.0722);
        1990-12-15  Irrigation.Apply(amount: 61.0722);
        1990-12-22  Irrigation.Apply(amount: 61.0722);
        1990-12-29  Irrigation.Apply(amount: 61.0722);
        1991-01-08  Irrigation.Apply(amount: 16.02563);
        1991-01-15  Irrigation.Apply(amount: 16.02563);
        1991-01-22  Irrigation.Apply(amount: 16.02563);
        1991-01-29  Irrigation.Apply(amount: 16.02563);
        1991-02-08  Irrigation.Apply(amount: 10.29525);
        1991-02-15  Irrigation.Apply(amount: 10.29525);
        1991-02-22  Irrigation.Apply(amount: 10.29525);
        1991-03-01  Irrigation.Apply(amount: 10.29525);
        1991-03-08  Irrigation.Apply(amount: 23.73735);
        1991-03-15  Irrigation.Apply(amount: 23.73735);
        1991-03-22  Irrigation.Apply(amount: 23.73735);
        1991-03-29  Irrigation.Apply(amount: 23.73735);
        1991-04-08  Irrigation.Apply(amount: 15.54);
        1991-04-15  Irrigation.Apply(amount: 15.54);
        1991-04-22  Irrigation.Apply(amount: 15.54);
        1991-04-29  Irrigation.Apply(amount: 15.54);
        1991-05-08  Irrigation.Apply(amount: 15.9285);
        1991-05-15  Irrigation.Apply(amount: 15.9285);
        1991-05-22  Irrigation.Apply(amount: 15.9285);
        1991-05-29  Irrigation.Apply(amount: 15.9285);
        1991-06-08  Irrigation.Apply(amount: 0);
        1991-06-15  Irrigation.Apply(amount: 0);
        1991-06-22  Irrigation.Apply(amount: 0);
        1991-06-29  Irrigation.Apply(amount: 0);
        1991-07-08  Irrigation.Apply(amount: 0);
        1991-07-15  Irrigation.Apply(amount: 0);
        1991-07-22  Irrigation.Apply(amount: 0);
        1991-07-29  Irrigation.Apply(amount: 0);
        1991-08-08  Irrigation.Apply(amount: 16.51125);
        1991-08-15  Irrigation.Apply(amount: 16.51125);
        1991-08-22  Irrigation.Apply(amount: 16.51125);
        1991-08-29  Irrigation.Apply(amount: 16.51125);
        1991-09-08  Irrigation.Apply(amount: 61.63553);
        1991-09-15  Irrigation.Apply(amount: 61.63553);
        1991-09-22  Irrigation.Apply(amount: 61.63553);
        1991-09-29  Irrigation.Apply(amount: 61.63553);
        1991-10-08  Irrigation.Apply(amount: 31.7016);
        1991-10-15  Irrigation.Apply(amount: 31.7016);
        1991-10-22  Irrigation.Apply(amount: 31.7016);
        1991-10-29  Irrigation.Apply(amount: 31.7016);
        1991-11-08  Irrigation.Apply(amount: 29.04038);
        1991-11-15  Irrigation.Apply(amount: 29.04038);
        1991-11-22  Irrigation.Apply(amount: 29.04038);
        1991-11-29  Irrigation.Apply(amount: 29.04038);
        1991-12-08  Irrigation.Apply(amount: 31.08);
        1991-12-15  Irrigation.Apply(amount: 31.08);
        1991-12-22  Irrigation.Apply(amount: 31.08);
        1991-12-29  Irrigation.Apply(amount: 31.08);
        1992-01-08  Irrigation.Apply(amount: 46.7754);
        1992-01-15  Irrigation.Apply(amount: 46.7754);
        1992-01-22  Irrigation.Apply(amount: 46.7754);
        1992-01-29  Irrigation.Apply(amount: 46.7754);
        1992-02-08  Irrigation.Apply(amount: 7.7);
        1992-02-15  Irrigation.Apply(amount: 7.7);
        1992-02-22  Irrigation.Apply(amount: 7.7);
        1992-02-29  Irrigation.Apply(amount: 7.7);
        1992-03-08  Irrigation.Apply(amount: 0);
        1992-03-15  Irrigation.Apply(amount: 0);
        1992-03-22  Irrigation.Apply(amount: 0);
        1992-03-29  Irrigation.Apply(amount: 0);
        1992-04-08  Irrigation.Apply(amount: 0);
        1992-04-15  Irrigation.Apply(amount: 0);
        1992-04-22  Irrigation.Apply(amount: 0);
        1992-04-29  Irrigation.Apply(amount: 0);
        1992-05-08  Irrigation.Apply(amount: 0);
        1992-05-15  Irrigation.Apply(amount: 0);
        1992-05-22  Irrigation.Apply(amount: 0);
        1992-05-29  Irrigation.Apply(amount: 0);
        1992-06-08  Irrigation.Apply(amount: 0);
        1992-06-15  Irrigation.Apply(amount: 0);
        1992-06-22  Irrigation.Apply(amount: 0);
        1992-06-29  Irrigation.Apply(amount: 0);
        1992-07-08  Irrigation.Apply(amount: 6.41);
        1992-07-15  Irrigation.Apply(amount: 6.41);
        1992-07-22  Irrigation.Apply(amount: 6.41);
        1992-07-29  Irrigation.Apply(amount: 6.41);
        1992-08-08  Irrigation.Apply(amount: 34.965);
        1992-08-15  Irrigation.Apply(amount: 34.965);
        1992-08-22  Irrigation.Apply(amount: 34.965);
        1992-08-29  Irrigation.Apply(amount: 34.965);
        1992-09-08  Irrigation.Apply(amount: 3.885);
        1992-09-15  Irrigation.Apply(amount: 3.885);
        1992-09-22  Irrigation.Apply(amount: 3.885);
        1992-09-29  Irrigation.Apply(amount: 3.885);
        1992-10-08  Irrigation.Apply(amount: 41.35583);
        1992-10-15  Irrigation.Apply(amount: 41.35583);
        1992-10-22  Irrigation.Apply(amount: 41.35583);
        1992-10-29  Irrigation.Apply(amount: 41.35583);
        1992-11-08  Irrigation.Apply(amount: 3.69075);
        1992-11-15  Irrigation.Apply(amount: 3.69075);
        1992-11-22  Irrigation.Apply(amount: 3.69075);
        1992-11-29  Irrigation.Apply(amount: 3.69075);
        1992-12-08  Irrigation.Apply(amount: 0);
        1992-12-15  Irrigation.Apply(amount: 0);
        1992-12-22  Irrigation.Apply(amount: 0);
        1992-12-29  Irrigation.Apply(amount: 0);
        1993-01-08  Irrigation.Apply(amount: 11.79098);
        1993-01-15  Irrigation.Apply(amount: 11.79098);
        1993-01-22  Irrigation.Apply(amount: 11.79098);
        1993-01-29  Irrigation.Apply(amount: 11.79098);
        1993-02-08  Irrigation.Apply(amount: 26.37915);
        1993-02-15  Irrigation.Apply(amount: 26.37915);
        1993-02-22  Irrigation.Apply(amount: 26.37915);
        1993-03-01  Irrigation.Apply(amount: 26.37915);
        1993-03-08  Irrigation.Apply(amount: 9.51825);
        1993-03-15  Irrigation.Apply(amount: 9.51825);
        1993-03-22  Irrigation.Apply(amount: 9.51825);
        1993-03-29  Irrigation.Apply(amount: 9.51825);
        1993-04-08  Irrigation.Apply(amount: 47.64953);
        1993-04-15  Irrigation.Apply(amount: 47.64953);
        1993-04-22  Irrigation.Apply(amount: 47.64953);
        1993-04-29  Irrigation.Apply(amount: 47.64953);
        1993-05-08  Irrigation.Apply(amount: 0);
        1993-05-15  Irrigation.Apply(amount: 0);
        1993-05-22  Irrigation.Apply(amount: 0);
        1993-05-29  Irrigation.Apply(amount: 0);
        1993-06-08  Irrigation.Apply(amount: 20.70705);
        1993-06-15  Irrigation.Apply(amount: 20.70705);
        1993-06-22  Irrigation.Apply(amount: 20.70705);
        1993-06-29  Irrigation.Apply(amount: 20.70705);
        1993-07-08  Irrigation.Apply(amount: 17.19113);
        1993-07-15  Irrigation.Apply(amount: 17.19113);
        1993-07-22  Irrigation.Apply(amount: 17.19113);
        1993-07-29  Irrigation.Apply(amount: 17.19113);
        1993-08-08  Irrigation.Apply(amount: 30.56625);
        1993-08-15  Irrigation.Apply(amount: 30.56625);
        1993-08-22  Irrigation.Apply(amount: 30.56625);
        1993-08-29  Irrigation.Apply(amount: 30.56625);
        1993-09-08  Irrigation.Apply(amount: 7.724925);
        1993-09-15  Irrigation.Apply(amount: 7.724925);
        1993-09-22  Irrigation.Apply(amount: 7.724925);
        1993-09-29  Irrigation.Apply(amount: 7.724925);
        1993-10-08  Irrigation.Apply(amount: 30.381);
        1993-10-15  Irrigation.Apply(amount: 30.381);
        1993-10-22  Irrigation.Apply(amount: 30.381);
        1993-10-29  Irrigation.Apply(amount: 30.381);
        1993-11-08  Irrigation.Apply(amount: 0);
        1993-11-15  Irrigation.Apply(amount: 0);
        1993-11-22  Irrigation.Apply(amount: 0);
        1993-11-29  Irrigation.Apply(amount: 0);
        1993-12-08  Irrigation.Apply(amount: 10.50368);
        1993-12-15  Irrigation.Apply(amount: 10.50368);
        1993-12-22  Irrigation.Apply(amount: 10.50368);
        1993-12-29  Irrigation.Apply(amount: 10.50368);
        1994-01-08  Irrigation.Apply(amount: 15.38898);
        1994-01-15  Irrigation.Apply(amount: 15.38898);
        1994-01-22  Irrigation.Apply(amount: 15.38898);
        1994-01-29  Irrigation.Apply(amount: 15.38898);
        1994-02-08  Irrigation.Apply(amount: 0);
        1994-02-15  Irrigation.Apply(amount: 0);
        1994-02-22  Irrigation.Apply(amount: 0);
        1994-03-01  Irrigation.Apply(amount: 0);
        1994-03-08  Irrigation.Apply(amount: 7.7805);
        1994-03-15  Irrigation.Apply(amount: 7.7805);
        1994-03-22  Irrigation.Apply(amount: 7.7805);
        1994-03-29  Irrigation.Apply(amount: 7.7805);
      Report: Events=[Clock].EndOfDay; AutoCreateCSV=false
        Variables:
          [Clock].Today
          [Eucalyptus].Phenology.CurrentPhaseName
          [Eucalyptus].Phenology.StageCode.Value
          [Eucalyptus].Root.NSupplyUptake
          [Soil].SoilWater.eo
          [Soil].SoilWater.es
          [Soil].SoilWater.drain
          [Soil].SoilWater.runoff
          [Soil].SoilWater.pond
          [Eucalyptus].Summariser.AboveGround.Wt
          [Eucalyptus].Summariser.BelowGround.Wt
          [Eucalyptus].Summariser.Total.Wt
          [Eucalyptus].Leaf.Dead.Wt
          [Eucalyptus].Leaf.Live.Wt
          [Eucalyptus].Stem.Dead.Wt
          [Eucalyptus].Stem.Live.Wt
          [Eucalyptus].Root.Dead.Wt
          [Eucalyptus].Root.Live.Wt
          [Eucalyptus].Summariser.AboveGround.N
          [Eucalyptus].Summariser.BelowGround.N
          [Eucalyptus].Summariser.Total.N
          [Eucalyptus].Summariser.TotalLive.N
          [Eucalyptus].Summariser.TotalDead.N
          [Eucalyptus].Leaf.Dead.N
          [Eucalyptus].Leaf.Live.N
          [Eucalyptus].Stem.Dead.N
          [Eucalyptus].Stem.Live.N
          [Eucalyptus].Root.Live.N
          [Eucalyptus].Root.Dead.N
          [Eucalyptus].Leaf.Live.NConc
          [Eucalyptus].Leaf.Dead.NConc
          [Eucalyptus].Stem.Live.NConc
          [Eucalyptus].Root.Live.NConc
          [Eucalyptus].Root.WaterSupply
          [Eucalyptus].Root.WaterUptake
          [Eucalyptus].Leaf.Transpiration
          [Eucalyptus].Leaf.WaterDemand
          [Eucalyptus].Root.Depth
          [Eucalyptus].Leaf.CoverGreen
          [Eucalyptus].Leaf.CoverTotal
          [Eucalyptus].Leaf.CoverDead
          [Eucalyptus].Leaf.LAI
          [Eucalyptus].Leaf.LAIDead
          [Eucalyptus].Leaf.Fn
          [Eucalyptus].Leaf.Fw
          [Eucalyptus].Leaf.Photosynthesis.FT.Value
          [Eucalyptus].Leaf.Photosynthesis.FVPD.Value
          [Eucalyptus].Stem.MinimumNConc.Value
          [Eucalyptus].Root.MinimumNConc.Value
          [Eucalyptus].Stem.MaximumNConc.Value
          [Eucalyptus].Root.MaximumNConc.Value
          [Eucalyptus].Summariser.TotalLive.Wt
          [Eucalyptus].Stem.Live.StructuralWt
          [Eucalyptus].Stem.Live.NonStructuralWt
          [Eucalyptus].Leaf.SpecificArea
          [Eucalyptus].Summariser.TotalDead.Wt
          [Soil].SoilWater.sw_dep
          [Soil].SoilNitrogen.no3
          [Eucalyptus].Arbitrator.NDemand
          [Eucalyptus].Leaf.LAIFunction.SpecificLeafArea.Value
          [Eucalyptus].Summariser.IndividualTreeLiveWt.Value
          [Eucalyptus].Age.Value
    Input
  DataStore
    Input
      FileNames=[Tests\Egrandis\CoffsHarbourValidationData.txt, Tests\Egrandis\EucalyptusValidationData.txt]
  Tests
  Simulation CoffsHarbour: Area=0
    WeatherFile: FileName=coffs.met; MaxT=25; MinT=19.5; Rain=18; Radn=18; vp=22.6663; wind=3; CO2=350
    Clock: StartDate=1953-04-01; EndDate=1983-12-31
    Summary
    Zone Plantation: Area=0
      Soil: same as GympieIrrigatedFertilised.Plantation.Soil
      Irrigation
      Fertiliser
      SurfaceOrganicMatter: same as GympieIrrigatedFertilised.Plantation.SurfaceOrganicMatter
      MicroClimate: same as GympieIrrigatedFertilised.Plantation.MicroClimate
      Plant Eucalyptus: LocalCanopyData={height=0, depth=0, lai=0, lai_tot=0, cover=0, cover_tot=0}; CropType=Eucalyptus
        Cultivars
          Cultivar RussetBurbank
        AccumulateFunction Age: StartStageName=Planting; EndStageName=Old
          Constant day: Value=0.00273973
        Phenology: same as GympieIrrigatedFertilised.Plantation.Eucalyptus.Phenology
        Arbitrator: NArbitrationOption=RelativeAllocation; DMArbitrationOption=RelativeAllocation
        Summariser: same as GympieIrrigatedFertilised.Plantation.Eucalyptus.Summariser
        TreeCanopy Leaf: _Height=0; _LAI=1.38272; _LAIDead=0; _Frgr=0; K=0.5; KDead=0; DeltaBiomass=7.78604; WaterAllocation=0; Frgr=0; LAI=1.38272; LAIDead=0; Height=0
          Biomass Live
          Biomass Dead
          Constant MinimumNConc: Value=0.015
          Constant MaximumNConc: Value=0.03
          MultiplyFunction InitialWtFunction
            Constant InitialLeafMass: Value=3
            VariableReference Population: VariableName=[Eucalyptus].Population
          MultiplyFunction LAIFunction: same as GympieIrrigatedFertilised.Plantation.Eucalyptus.Leaf.LAIFunction
          PhaseBasedSwitch NitrogenDemandSwitch: Start=Planting; End=Old
          Constant DetachmentRateFunction: Value=1
          PhaseLookup SenescenceRateFunction: same as GympieIrrigatedFertilised.Plantation.Eucalyptus.Leaf.SenescenceRateFunction
          PartitionFractionDemandFunction DMDemandFunction
            LinearInterpolationFunction PartitionFraction: XProperty=[Summariser].IndividualTreeLiveWt.Value
              XYPairs: X=[0, 1000]; Y=[0.48, 0.16]
          RUEModel Photosynthesis: same as GympieIrrigatedFertilised.Plantation.Eucalyptus.Leaf.Photosynthesis
        Root: same as GympieIrrigatedFertilised.Plantation.Eucalyptus.Root
        GenericAboveGroundOrgan Stem: same as GympieIrrigatedFertilised.Plantation.Eucalyptus.Stem
      Manager TreeSowingRule
        RowSpace = 3
        RowWidth = 3
        CultivarName = RussetBurbank
        SowingDate = 1953-04-01
        script: same as in GympieIrrigatedFertilised.Plantation.TreeSowingRule
      Operations FertiliserOperations: same as GympieIrrigatedFertilised.Plantation.FertiliserOperations
      Operations IrrigationOperations: same as GympieIrrigatedFertilised.Plantation.IrrigationOperations
      Report: same as GympieIrrigatedFertilised.Plantation.Report
    Input
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