Simulations: Area=0
  Experiment
    Factors
      Factor SowDate: Paths=[SowingRule].Script.SowingDate
        FactorValue 2003-11-01
        FactorValue 2003-12-20
      Factor Fertiliser: Paths=[FertiliserRule].Script.ApplicationAmount
        FactorValue 0
        FactorValue 20
        FactorValue 60
        FactorValue 80
        FactorValue 100
    Simulation Base: Area=0
      WeatherFile: FileName=..\WeatherFiles\lincoln.met; MaxT=0; MinT=0; Rain=0; Radn=0; vp=0; CO2=350
      Clock: StartDate=2003-10-20; EndDate=2004-05-23
      Summary
      Zone Field: Area=0
        Irrigation
        Fertiliser
          Definitions:
            Name   FractionNO3  FractionNH4  FractionUrea
            UreaN  0            0            1
            NO3N   1            0            0
        Report: Events=[Clock].EndOfDay; AutoCreateCSV=false
          Variables:
            [Clock].Today
            [FertiliserRule].Script.ApplicationAmount
            [SowingRule].Script.SowingDate.Year
            [SowingRule].Script.SowingDate.DayOfYear
        Soil: SoilType=Black Vertosol; LocalName=Waco; Site=Jimbour; NearestTown=Jimbour, Q 4352; Region=South East Queensland; NaturalVegetation=Grassland, mainly Qld bluegrass; Latitude=0; Longitude=0
          Water
            Thickness  BD    AirDry  LL15  DUL   SAT
            150        1.02  0.15    0.29  0.54  0.59
            150        1.03  0.26    0.29  0.53  0.58
            300        1.02  0.29    0.29  0.54  0.59
            300        1.02  0.29    0.29  0.54  0.58
            300        1.06  0.3     0.3   0.52  0.57
            300        1.11  0.31    0.31  0.5   0.55
            300        1.12  0.32    0.32  0.5   0.55
            300        1.15  0.33    0.33  0.48  0.53
            300        1.18  0.34    0.34  0.47  0.52
            300        1.2   0.35    0.35  0.46  0.51
            300        1.25  0.36    0.36  0.44  0.49
            SoilCrop WheatSoilCrop
              LL=[0.29, 0.29, 0.32, 0.38, 0.39, 0.39, 0.41, 0.48, 0.47, 0.46, 0.44]
              KL=[0.1, 0.1, 0.08, 0.06, 0.04, 0.02, 0.01, 0, 0, 0, 0]
              XF=[1, 1, 1, 1, 1, 1, 1, 0, 0, 0, 0]
            SoilCrop BarleySoilCrop
              LL=[0.29, 0.29, 0.36, 0.43, 0.51, 0.5, 0.5, 0.48, 0.47, 0.46, 0.44]
              KL=[0.1, 0.1, 0.08, 0.06, 0.04, 0.02, 0.01, 0, 0, 0, 0]
              XF=[1, 1, 1, 1, 1, 1, 1, 0, 0, 0, 0]
            SoilCrop PotatoSoilCrop
              LL=[0.29, 0.29, 0.36, 0.43, 0.51, 0.5, 0.5, 0.48, 0.47, 0.46, 0.44]
              KL=[0.1, 0.1, 0.08, 0.06, 0.04, 0.02, 0.01, 0, 0, 0, 0]
              XF=[1, 1, 1, 1, 1, 1, 1, 0, 0, 0, 0]
          SoilWater: min_crit_temp=5; max_crit_temp=35; max_albedo=0.23; A_to_evap_fact=0.44; canopy_eos_coef=1.7; sw_top_crit=0.9; sumes1_max=100; sumes2_max=25; solute_flow_eff=[1]; solute_flux_eff=[1]; gravity_gradient=2E-05; specific_bd=2.65; hydrol_effective_depth=450; immobile_solutes=[nh4]; canopy_fact=[1, 1, 0, 0]; canopy_fact_height=[0, 600, 1800, 30000]; canopy_fact_default=0.5; act_evap_method=ritchie; irrigation_will_runoff=false; irrigation_layer=1; SummerCona=3; SummerU=6; SummerDate=1-Nov; WinterCona=3; WinterU=6; WinterDate=1-Apr; DiffusConst=40; DiffusSlope=16; Salb=0.13; slope=0; discharge_width=0; catchment_area=0; max_pond=0; CN2Bare=73; CNRed=20; CNCov=0.8
            Thickness  SWCON  KLAT
            150        0.3    0
            150        0.3    0
            300        0.3    0
            300        0.3    0
            300        0.3    0
            300        0.3    0
            300        0.3    0
            300        0.3    0
            300        0.3    0
            300        0.3    0
            300        0.3    0
            mobile_solutes=[no3, urea, cl, br, org_n, org_c_pool1, org_c_pool2, org_c_pool3]
          SoilNitrogen: fom_type=[default, manure, mucuna, lablab, shemp, stable]; fract_carb=[0.2, 0.3, 0.54, 0.57, 0.45, 0]; fract_cell=[0.7, 0.3, 0.37, 0.37, 0.47, 0.1]; fract_lign=[0.1, 0.4, 0.09, 0.06, 0.08, 0.9]
          SoilOrganicMatter: RootCN=40; RootWt=200; SoilCN=12.5; EnrACoeff=7.4; EnrBCoeff=0.2; OCUnits=Total
            Thickness  OC    FBiom  FInert
            150        1.04  0.025  0.4
            150        0.89  0.02   0.6
            300        0.89  0.015  0.8
            300        0.89  0.01   0.9
            300        0.77  0.01   0.95
            300        0.45  0.01   0.95
            300        0.27  0.01   0.95
            300        0.22  0.01   0.95
            300        0.16  0.01   0.95
            300        0.13  0.01   0.95
            300        0.12  0.01   0.95
          Analysis: PHUnits=Water; BoronUnits=HotWater
            Thickness  EC    PH
            150        0.2   8.4
            150        0.25  8.8
            300        0.31  9
            300        0.4   9.2
            300        0.59  9.2
            300        0.84  9.1
            300        0.93  9
            300        1.01  9
            300        1.06  8.9
            300        1.05  8.9
            300        1.01  8.9
          InitialWater Initial water: FractionFull=1; PercentMethod=FilledFromTop
          Sample: NO3Units=ppm; NH4Units=ppm; SWUnits=Volumetric; OCUnits=Total; PHUnits=Water
            Thickness  NO3    NH4
            150        6.503  0.599004
            150        2.101  0.100001
            300        2.101  0.100001
            300        1.701  0.100001
            300        1.701  0.100001
            300        1.701  0.100001
            300        1.701  0.100001
            300        1.701  0.100001
            300        1.701  0.100001
            300        1.701  0.100001
            300        1.701  0.100001
        SurfaceOrganicMatter: crit_residue_wt=2000; opt_temp=20; cum_eos_max=20; cnrf_coeff=0.277; cnrf_optcn=25; c_fract=0.4; leach_rain_tot=25; min_rain_to_leach=10; crit_min_surfom_orgC=0.004; default_cpr=0; default_standing_fraction=0; standing_extinct_coeff=0.5; fractionFaecesAdded=0.5; PoolName=Potato; type=Potato; mass=1000; standing_fraction=0; cnr=80
          ResidueTypes:
            Name         fom_type       fraction_C  po4ppm  nh4ppm  no3ppm  specific_area  cf_contrib  pot_decomp_rate  fr_c             fr_n             fr_p
            ResidueType  wheat          0.4         0       0       0       0.0005         1           0.1              [0.2, 0.7, 0.1]  [0.2, 0.7, 0.1]  [0.2, 0.7, 0.1]
            ResidueType  lucerne        0.4         0       0       0       0.0002         1           0.1              [0.2, 0.7, 0.1]  [0.2, 0.7, 0.1]  [0.2, 0.7, 0.1]
            ResidueType  barley         0.4         0       0       0       0.0005         1           0.1              [0.2, 0.7, 0.1]  [0.2, 0.7, 0.1]  [0.2, 0.7, 0.1]
            ResidueType  tithonia       0.4         0       0       0       0.0005         1           0.1              [0.2, 0.7, 0.1]  [0.2, 0.7, 0.1]  [0.2, 0.7, 0.1]
            ResidueType  bambatsi       0.4         0       0       0       0.0005         1           0.1              [0.2, 0.7, 0.1]  [0.2, 0.7, 0.1]  [0.2, 0.7, 0.1]
            ResidueType  barley         0.4         0       0       0       0.0005         1           0.1              [0.2, 0.7, 0.1]  [0.2, 0.7, 0.1]  [0.2, 0.7, 0.1]
            ResidueType  broccoli       0.4         0       0       0       0.0004         1           0.1              [0.2, 0.7, 0.1]  [0.2, 0.7, 0.1]  [0.2, 0.7, 0.1]
            ResidueType  butterflypea   0.4         0       0       0       0.0004         1           0.1              [0.2, 0.7, 0.1]  [0.2, 0.7, 0.1]  [0.2, 0.7, 0.1]
            ResidueType  camaldulensis  0.4         0       0       0       0.0002         1           0.1              [0.2, 0.7, 0.1]  [0.2, 0.7, 0.1]  [0.2, 0.7, 0.1]
            ResidueType  canola         0.4         0       0       0       0.0002         1           0.1              [0.2, 0.7, 0.1]  [0.2, 0.7, 0.1]  [0.2, 0.7, 0.1]
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          TillageTypes
        MicroClimate: air_pressure=1010; soil_emissivity=0.96; sun_angle=15; soil_heat_flux_fraction=0.4; night_interception_fraction=0.5; windspeed_default=3; refheight=2; albedo=0.293662; emissivity=0.96; gsmax=0.01; r50=200; a_interception=0; b_interception=1; c_interception=0; d_interception=0; soil_albedo=0.3
          ComponentData Potato: Type=Potato; Albedo=0.26; Emissivity=0.96; Gsmax=0.011; R50=200
        Manager SowingRule
          RowSpace = 280
          RowWidth = 770
          PlantingDepth = 150
          StemNumberPerSeedTuber = 2.2
          CultivarName = RussetBurbank
          SowingDate = 2003-11-10
```csharp
        using System;
        using Models.Core;
        using Models.PMF;
        namespace Models
        {
           
           [Serializable] 
           [System.Xml.Serialization.XmlInclude(typeof(Model))]
            public class Script : Model
            {      
               [Description("Sowing Date")]
               public DateTime SowingDate { get; set; }//= new DateTime(2003, 11, 10, 0, 0, 0);

            }
        }
```
        Manager FertiliserRule
          ApplicationAmount = 500
          FertType = NO3N
          ApplicationDate = 2003-12-30
```csharp
        using System;
        using Models.Core;
        using Models.PMF;
        namespace Models
        {
            [Serializable]
            public class Script : Model
            {      
               [Link] Fertiliser Fertiliser;
               [Link] Clock Clock;

               [Description("Amount (kg/ha) of fertiliser to apply")]
               public double ApplicationAmount {get; set;} //= 500;
               [Description("Type of fertiliser to apply")]
               public Fertiliser.Types FertType {get; set;}//= "NO3_N";
               [Description("Date of fertiliser application")]
               public DateTime ApplicationDate {get; set;} //= new DateTime(2003, 12, 30, 0, 0, 0);

               [EventSubscribe("StartOfDay")]
               private void OnStartOfDay(object sender, EventArgs e)
               {
               if (Clock.Today.Date.Equals(ApplicationDate))
                    Fertiliser.Apply(Amount:ApplicationAmount,Type:FertType);
			      //Fertiliser.Apply(Amount:a, Type:"b", Depth:c)
			      //a is a double and can be represented by a variable name or a number representing the amount (kg/ha) of fertiliser to apply
			      //b is a string and can be represented by a variable name or text string (in quotes eg "UreaN") representing the type of fertiliser to apply
			      //c is an optional double and can be represented by a variable name or a number representing the depth (mm) to which fertiliser is applied
			      //if c is omitted a default depth of 0 is used (fertiliser is applied to the surface by defalt)
			   }
            }
        }
```
  Experiment RangeExperiment
    Factors
      Factor Fertiliser: Paths=[FertiliserRule].Script.ApplicationAmount
        FactorValue 0 to 100 step 20
    Simulation Base2: Area=0
      WeatherFile: FileName=..\WeatherFiles\lincoln.met; MaxT=0; MinT=0; Rain=0; Radn=0; vp=0; CO2=350
      Clock: StartDate=2003-10-20; EndDate=2004-05-23
      Summary
      Zone Field: Area=0
        Irrigation
        Fertiliser
          Definitions:
            Name   FractionNO3  FractionNH4  FractionUrea
            UreaN  0            0            1
            NO3N   1            0            0
        Report: Events=[Clock].EndOfDay; AutoCreateCSV=false
          Variables:
            [Clock].Today
            [FertiliserRule].Script.ApplicationAmount
        Soil: same as Experiment.Base.Field.Soil
        SurfaceOrganicMatter: same as Experiment.Base.Field.SurfaceOrganicMatter
        Manager FertiliserRule: same as Experiment.Base.Field.FertiliserRule
  Experiment OperationsExpt
    Factors
      Factor Operations: Paths=[FertiliserRule]
        FactorValue 0N
          Operations FertiliserRule
            2003-11-15  Fertiliser.Apply(0, Fertiliser.Types.NO3N, 0);
        FactorValue 50N
          Operations FertiliserRule
            2003-11-15  Fertiliser.Apply(50, Fertiliser.Types.NO3N, 0);
    Simulation Base3: Area=0
      WeatherFile: FileName=..\WeatherFiles\lincoln.met; MaxT=0; MinT=0; Rain=0; Radn=0; vp=0; CO2=350
      Clock: StartDate=2003-11-15; EndDate=2003-11-15
      Summary
      Zone Field: Area=0
        Irrigation
        Fertiliser
          Definitions:
            Name   FractionNO3  FractionNH4  FractionUrea
            UreaN  0            0            1
            NO3N   1            0            0
        Report: Events=[Clock].EndOfDay; AutoCreateCSV=false
          Variables:
            [Clock].Today
            [Fertiliser].NitrogenApplied
        Soil: same as Experiment.Base.Field.Soil
        SurfaceOrganicMatter: same as Experiment.Base.Field.SurfaceOrganicMatter
        MicroClimate: same as Experiment.Base.Field.MicroClimate
        Operations FertiliserRule
          2003-11-15  Fertiliser.Apply(10, Fertiliser.Types.NO3N, 0);
  Experiment Compound
    Factors
      Factor Location
        Paths:
          [Clock].StartDate
          [Clock].EndDate
          [WeatherFile]
        FactorValue Dalby
          FactorValue 1988-01-01
          FactorValue 1988-12-31
          WeatherFile: FileName=..\WeatherFiles\Dalby.met; MaxT=0; MinT=0; Rain=0; Radn=0; vp=0; CO2=350
        FactorValue Goondiwindi
          FactorValue 1940-01-01
          FactorValue 1940-12-31
          WeatherFile: FileName=..\WeatherFiles\Goond.met; MaxT=0; MinT=0; Rain=0; Radn=0; vp=0; CO2=350
    Simulation Base3: Area=0
      WeatherFile: FileName=..\WeatherFiles\lincoln.met; MaxT=0; MinT=0; Rain=0; Radn=0; vp=0; CO2=350
      Clock: StartDate=2003-10-20; EndDate=2004-05-23
      Summary
      Zone Field: Area=0
        Irrigation
        Fertiliser
          Definitions:
            Name   FractionNO3  FractionNH4  FractionUrea
            UreaN  0            0            1
            NO3N   1            0            0
        Report: Variables=[Clock].Today.Year; Events=[Clock].EndOfDay; AutoCreateCSV=false
        Soil: same as Experiment.Base.Field.Soil
        SurfaceOrganicMatter: same as Experiment.Base.Field.SurfaceOrganicMatter
        MicroClimate: same as Experiment.Base.Field.MicroClimate
        Operations FertiliserRule
          2003-11-15  Fertiliser.Apply(10, Fertiliser.Types.UreaN, 0);
  DataStore
  Tests
    Test:
      {SimulationName=ExperimentSowDate2003-11-01Fertiliser0, TableName=Report, Type=EqualTo, ColumnNames=SowingRule.Script.SowingDate.DayOfYear, Parameters=305}
      {SimulationName=ExperimentSowDate2003-11-01Fertiliser0, TableName=Report, Type=EqualTo, ColumnNames=FertiliserRule.Script.ApplicationAmount, Parameters=0}
      {SimulationName=ExperimentSowDate2003-12-20Fertiliser0, TableName=Report, Type=EqualTo, ColumnNames=SowingRule.Script.SowingDate.DayOfYear, Parameters=354}
      {SimulationName=ExperimentSowDate2003-12-20Fertiliser0, TableName=Report, Type=EqualTo, ColumnNames=FertiliserRule.Script.ApplicationAmount, Parameters=0}
      {SimulationName=ExperimentSowDate2003-11-01Fertiliser20, TableName=Report, Type=EqualTo, ColumnNames=SowingRule.Script.SowingDate.DayOfYear, Parameters=305}
      {SimulationName=ExperimentSowDate2003-11-01Fertiliser20, TableName=Report, Type=EqualTo, ColumnNames=FertiliserRule.Script.ApplicationAmount, Parameters=20}
      {SimulationName=ExperimentSowDate2003-12-20Fertiliser20, TableName=Report, Type=EqualTo, ColumnNames=SowingRule.Script.SowingDate.DayOfYear, Parameters=354}
      {SimulationName=ExperimentSowDate2003-12-20Fertiliser20, TableName=Report, Type=EqualTo, ColumnNames=FertiliserRule.Script.ApplicationAmount, Parameters=20}
      {SimulationName=ExperimentSowDate2003-11-01Fertiliser60, TableName=Report, Type=EqualTo, ColumnNames=SowingRule.Script.SowingDate.DayOfYear, Parameters=305}
      {SimulationName=ExperimentSowDate2003-11-01Fertiliser60, TableName=Report, Type=EqualTo, ColumnNames=FertiliserRule.Script.ApplicationAmount, Parameters=60}
      {SimulationName=ExperimentSowDate2003-12-20Fertiliser60, TableName=Report, Type=EqualTo, ColumnNames=SowingRule.Script.SowingDate.DayOfYear, Parameters=354}
      {SimulationName=ExperimentSowDate2003-12-20Fertiliser60, TableName=Report, Type=EqualTo, ColumnNames=FertiliserRule.Script.ApplicationAmount, Parameters=60}
      {SimulationName=ExperimentSowDate2003-11-01Fertiliser80, TableName=Report, Type=EqualTo, ColumnNames=SowingRule.Script.SowingDate.DayOfYear, Parameters=305}
      {SimulationName=ExperimentSowDate2003-11-01Fertiliser80, TableName=Report, Type=EqualTo, ColumnNames=FertiliserRule.Script.ApplicationAmount, Parameters=80}
      {SimulationName=ExperimentSowDate2003-12-20Fertiliser80, TableName=Report, Type=EqualTo, ColumnNames=SowingRule.Script.SowingDate.DayOfYear, Parameters=354}
      {SimulationName=ExperimentSowDate2003-12-20Fertiliser80, TableName=Report, Type=EqualTo, ColumnNames=FertiliserRule.Script.ApplicationAmount, Parameters=80}
      {SimulationName=ExperimentSowDate2003-11-01Fertiliser100, TableName=Report, Type=EqualTo, ColumnNames=SowingRule.Script.SowingDate.DayOfYear, Parameters=305}
      {SimulationName=ExperimentSowDate2003-11-01Fertiliser100, TableName=Report, Type=EqualTo, ColumnNames=FertiliserRule.Script.ApplicationAmount, Parameters=100}
      {SimulationName=ExperimentSowDate2003-12-20Fertiliser100, TableName=Report, Type=EqualTo, ColumnNames=SowingRule.Script.SowingDate.DayOfYear, Parameters=354}
      {SimulationName=ExperimentSowDate2003-12-20Fertiliser100, TableName=Report, Type=EqualTo, ColumnNames=FertiliserRule.Script.ApplicationAmount, Parameters=100}
      {SimulationName=RangeExperimentFertiliser0, TableName=Report, Type=EqualTo, ColumnNames=FertiliserRule.Script.ApplicationAmount, Parameters=0}
      {SimulationName=RangeExperimentFertiliser20, TableName=Report, Type=EqualTo, ColumnNames=FertiliserRule.Script.ApplicationAmount, Parameters=20}
      {SimulationName=RangeExperimentFertiliser40, TableName=Report, Type=EqualTo, ColumnNames=FertiliserRule.Script.ApplicationAmount, Parameters=40}
      {SimulationName=RangeExperimentFertiliser60, TableName=Report, Type=EqualTo, ColumnNames=FertiliserRule.Script.ApplicationAmount, Parameters=60}
      {SimulationName=RangeExperimentFertiliser80, TableName=Report, Type=EqualTo, ColumnNames=FertiliserRule.Script.ApplicationAmount, Parameters=80}
      {SimulationName=RangeExperimentFertiliser100, TableName=Report, Type=EqualTo, ColumnNames=FertiliserRule.Script.ApplicationAmount, Parameters=100}
      {SimulationName=OperationsExptOperations0N, TableName=Report, Type=EqualTo, ColumnNames=Fertiliser.NitrogenApplied, Parameters=0}
      {SimulationName=OperationsExptOperations50N, TableName=Report, Type=EqualTo, ColumnNames=Fertiliser.NitrogenApplied, Parameters=50}
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