Simulations: Area=0
  Simulation OilPalm: Area=0
    WeatherFile: FileName=..\Potato\lincoln.met
    Clock: StartDate=2003-10-20; EndDate=2004-05-23
    Summary
    Zone Field: Area=0
      Report: Events=[Clock].EndOfDay
        Variables:
          [Clock].Today
          [WeatherFile].MaxT
          [SoilWater].sw_dep
          [SoilWater].sw
          [SoilNitrogen].no3
          [OilPalm].BunchMass
      Soil: SoilType=Black Vertosol; LocalName=Waco; Site=Jimbour; NearestTown=Jimbour, Q 4352; Region=South East Queensland; NaturalVegetation=Grassland, mainly Qld bluegrass; Latitude=0; Longitude=0
        Water
          Thickness  BD    AirDry  LL15  DUL   SAT
          150        1.02  0.15    0.29  0.54  0.59
          150        1.03  0.26    0.29  0.53  0.58
          300        1.02  0.29    0.29  0.54  0.59
          300        1.02  0.29    0.29  0.54  0.58
          300        1.06  0.3     0.3   0.52  0.57
          300        1.11  0.31    0.31  0.5   0.55
          300        1.12  0.32    0.32  0.5   0.55
          300        1.15  0.33    0.33  0.48  0.53
          300        1.18  0.34    0.34  0.47  0.52
          300        1.2   0.35    0.35  0.46  0.51
          300        1.25  0.36    0.36  0.44  0.49
          SoilCrop WheatSoilCrop
            LL=[0.29, 0.29, 0.32, 0.38, 0.39, 0.39, 0.41, 0.48, 0.47, 0.46, 0.44]
            KL=[0.1, 0.1, 0.08, 0.06, 0.04, 0.02, 0.01, 0, 0, 0, 0]
            XF=[1, 1, 1, 1, 1, 1, 1, 0, 0, 0, 0]
          SoilCrop BarleySoilCrop
            LL=[0.29, 0.29, 0.36, 0.43, 0.51, 0.5, 0.5, 0.48, 0.47, 0.46, 0.44]
            KL=[0.1, 0.1, 0.08, 0.06, 0.04, 0.02, 0.01, 0, 0, 0, 0]
            XF=[1, 1, 1, 1, 1, 1, 1, 0, 0, 0, 0]
          SoilCrop OilPalmSoilCrop
            LL=[0.29, 0.29, 0.36, 0.43, 0.51, 0.5, 0.5, 0.48, 0.47, 0.46, 0.44]
            KL=[0.1, 0.1, 0.08, 0.06, 0.04, 0.02, 0.01, 0, 0, 0, 0]
            XF=[1, 1, 1, 1, 1, 1, 1, 0, 0, 0, 0]
        SoilWater: min_crit_temp=5; max_crit_temp=35; max_albedo=0.23; A_to_evap_fact=0.44; canopy_eos_coef=1.7; sw_top_crit=0.9; sumes1_max=100; sumes2_max=25; solute_flow_eff=[1]; solute_flux_eff=[1]; gravity_gradient=2E-05; specific_bd=2.65; hydrol_effective_depth=450; immobile_solutes=[nh4]; canopy_fact=[1, 1, 0, 0]; canopy_fact_height=[0, 600, 1800, 30000]; canopy_fact_default=0.5; act_evap_method=ritchie; irrigation_will_runoff=false; irrigation_layer=1; SummerCona=3; SummerU=6; SummerDate=1-Nov; WinterCona=3; WinterU=6; WinterDate=1-Apr; DiffusConst=40; DiffusSlope=16; Salb=0.13; slope=0; discharge_width=0; catchment_area=0; max_pond=0; CN2Bare=73; CNRed=20; CNCov=0.8
          Thickness  SWCON  KLAT
          150        0.3    0
          150        0.3    0
          300        0.3    0
          300        0.3    0
          300        0.3    0
          300        0.3    0
          300        0.3    0
          300        0.3    0
          300        0.3    0
          300        0.3    0
          300        0.3    0
          mobile_solutes=[no3, urea, cl, br, org_n, org_c_pool1, org_c_pool2, org_c_pool3]
        SoilNitrogen: NPartitionApproach=BasedOnLayerConcentration; wnmm_n_alpha=0.002; wnmm_dn_alpha=0.5; nemis_dn_km=22; nemis_dn_pot=7.194; cent_n_soilt_ave=15; cent_n_maxt_ave=25; cent_n_wfps_ave=0.7; cent_n_max_rate=0.1; ini_FOMtype=default; fom_type=[default, manure, mucuna, lablab, shemp, stable]; fract_carb=[0.2, 0.3, 0.54, 0.57, 0.45, 0]; fract_cell=[0.7, 0.3, 0.37, 0.37, 0.47, 0.1]; fract_lign=[0.1, 0.4, 0.09, 0.06, 0.08, 0.9]; ef_res=0.4; fr_res_biom=0.9; min_depth=100; rd_carb=[0.2, 0.1]; rd_cell=[0.05, 0.25]; rd_lign=[0.0095, 0.003]; ef_fom=0.4; fr_fom_biom=0.9; cnrf_coeff=0.693; cnrf_optcn=25; rd_biom=[0.0081, 0.004]; ef_biom=0.4; fr_biom_biom=0.6; rd_hum=[0.00015, 7E-05]; ef_hum=0.4; opt_temp=[32, 32]; wfmin_index=[0, 0.5, 1, 2]; wfmin_values=[0, 1, 1, 0.5]; soiltype=standard; allow_simpleSoilTemp=no; profile_reduction=no; use_organic_solutes=no; c_in_fom=0.4; minPatchArea=1; mcn=8; root_depth=3000; root_cn_pool=[40, 40, 40]
          zero: n2o_approach, ureappm_min, nh4ppm_min, no3ppm_min, fom_min, oc2om_factor, ini_pH, WarningThreshold, FatalThreshold, potHydrol_min, potHydrol_parmA, potHydrol_parmB, potHydrol_parmC, potHydrol_parmD, nitrification_pot, nh4_at_half_pot, dnit_rate_coeff, dnit_nitrf_loss, dnit_k1, dnit_wf_power, actC_parmB, actC_parmA, N2N2O_parmA, N2N2O_parmB
        SoilOrganicMatter: RootCN=40; RootWt=200; SoilCN=12.5; EnrACoeff=7.4; EnrBCoeff=0.2; OCUnits=Total
          Thickness  OC    FBiom  FInert
          150        1.04  0.025  0.4
          150        0.89  0.02   0.6
          300        0.89  0.015  0.8
          300        0.89  0.01   0.9
          300        0.77  0.01   0.95
          300        0.45  0.01   0.95
          300        0.27  0.01   0.95
          300        0.22  0.01   0.95
          300        0.16  0.01   0.95
          300        0.13  0.01   0.95
          300        0.12  0.01   0.95
        Analysis: PHUnits=Water; BoronUnits=HotWater
          Thickness  EC    PH
          150        0.2   8.4
          150        0.25  8.8
          300        0.31  9
          300        0.4   9.2
          300        0.59  9.2
          300        0.84  9.1
          300        0.93  9
          300        1.01  9
          300        1.06  8.9
          300        1.05  8.9
          300        1.01  8.9
        InitialWater Initial water: FractionFull=1; PercentMethod=FilledFromTop
        Sample: NO3Units=kgha; NH4Units=kgha; SWUnits=Volumetric; OCUnits=Total; PHUnits=Water
          Thickness  NO3   NH4
          100        40    0.1
          200        30    0.1
          300        14    0.1
          300        14    0.1
          300        1.38  0.1
          300        1.38  0.1
      SurfaceOrganicMatter: crit_residue_wt=2000; opt_temp=20; cum_eos_max=20; cnrf_coeff=0.277; cnrf_optcn=25; c_fract=0.4; leach_rain_tot=25; min_rain_to_leach=10; crit_min_surfom_orgC=0.004; default_cpr=0; default_standing_fraction=0; standing_extinct_coeff=0.5; fractionFaecesAdded=0.5; PoolName=OilPalm; type=OilPalm; mass=1000; standing_fraction=0; cnr=80
        ResidueTypes:
          {Name=OilPalm, fraction_C=0.08, po4ppm=10, nh4ppm=10, no3ppm=10, specific_area=0.0001, cf_contrib=1, pot_decomp_rate=0.1, fr_c=[0.3, 0.3, 0.4], fr_n=[0.3, 0.3, 0.4], fr_p=[0.3, 0.3, 0.4]}
        TillageTypes
      OilPalm
        Constant cover_tot: Value=0.9
        Constant height: Value=10000
        VariableReference UnderstoryCoverMax: Value=[OilPalm.UnderstoryCoverGreen]
        VariableReference UnderstoryLegumeFraction: Value=[OilPalm.UnderstoryLegumeFraction]
        Constant InterceptionFraction: Value=0.0
        Constant InitialRootDepth: Value=300
        Constant MaximumRootDepth: Value=5000
        Constant KNO3: Value=0.02
        Constant RootFraction: Value=0.1
        Constant RootNConcentration: Value=0.39
        Constant RootSenescenceRate: Value=0.001
        Constant InitialFrondNumber: Value=5
        AirTemperatureFunction RelativeDevelopmentalRate
          XYPairs: X=[13, 32, 35, 46]; Y=[0, 1.0, 1.0, 0]
        LinearInterpolationFunction FrondAppRate: XProperty=[OilPalm].Age; Memo=Frond Appearance Rate comes from PalmSim
          XYPairs: X=[0, 2, 5, 10, 15]; Y=[5.25, 5.25, 7.725, 10.1, 10.1]
        Constant ExpandingFronds: Value=5
        Constant FrondMaximumNConcentration: Value=1.15
        Constant FrondCriticalNConcentration: Value=1.1
        Constant FrondMinimumNConcentration: Value=0.5
        SplineInterpolationFunction FrondMaxArea: XProperty=[OilPalm].Age
          Memo:
            Gives the size of individual leaves when they are fully
            						expanded (mm2) NOTE: Used during expansion and so is 17 leaves (>1y) before you measure it.
          XYPairs: X=[0, 2, 4.5, 8.5, 14]; Y=[0.1, 1.0, 7, 12, 14]
        LinearInterpolationFunction BunchSizeMax: XProperty=[OilPalm].Age
          XYPairs: X=[0, 2, 6, 10, 14]; Y=[53, 265, 7000, 11600, 12750]
        LinearInterpolationFunction HarvestFrondNumber: XProperty=[OilPalm].Age
          XYPairs: X=[0, 6, 10]; Y=[50, 40, 33]
        LinearInterpolationFunction FemaleFlowerFraction: XProperty=[OilPalm].Age
          Memo=NOTE: X axis is age at gender determination - not harvest as often appears in data summaries
          XYPairs: X=[0, 4, 6, 8, 10]; Y=[0.8, 0.8, 0.8, 0.8, 0.8]
        LinearInterpolationFunction FFFStressImpact: XProperty=[OilPalm].CarbonStress
          XYPairs: X=[0.0, 1.0]; Y=[0.06, 0.0]
        LinearInterpolationFunction StemToFrondFraction: XProperty=[OilPalm].Age
          XYPairs: X=[0, 4, 7, 12]; Y=[0.0, 0.15, 0.25, 0.25]
        LinearInterpolationFunction StemNConcentration: XProperty=[OilPalm].Age
          Memo=Stem N concentration taken from FERTILIZER RECOMMENDATION SYSTEMS FOR OIL PALM: ESTIMATING THE FERTILIZER RATES by Goh, K.J.
          XYPairs: X=[0, 8.5]; Y=[1.37, 0.351]
        Constant BunchOilConversionFactor: Value=1.55
        Constant RipeBunchWaterContent: Value=0.47; Memo=Henson 2003 used 42.86%
        Constant BunchNConcentration: Value=0.603
          Memo=Stem N concentration taken from FERTILIZER RECOMMENDATION SYSTEMS FOR OIL PALM: ESTIMATING THE FERTILIZER RATES by Goh, K.J.
        LinearInterpolationFunction SpecificLeafArea: XProperty=[OilPalm].Age; XYPairs={X=[1, 5, 13], Y=[0.003, 0.003, 0.003]}
          Memo=This controls the effect of water stress on leaf area expansion
        LinearInterpolationFunction SpecificLeafAreaMax: XProperty=[OilPalm].Age; XYPairs={X=[1, 5, 13], Y=[0.0035, 0.0035, 0.0035]}
        LinearInterpolationFunction FlowerAbortionFraction: XProperty=[OilPalm].CarbonStress; XYPairs={X=[0.0, 1.0], Y=[0.15, 0.0]}
        LinearInterpolationFunction BunchFailureFraction: XProperty=[OilPalm].CarbonStress; XYPairs={X=[0.0, 1.0], Y=[0.15, 0.0]}
        LinearInterpolationFunction DirectExtinctionCoeff: XProperty=[OilPalm].Population; XYPairs={X=[0.0056, 0.0186], Y=[0.175, 0.35]}
          Memo:
            Extinction coefficient is derived from data found in
            					Breure CJ (1988) The effect of different planting densities
            					on yield trends in oil palm. Experimental Agriculture
            					24:37-52. Extinction coefficient at age 14 is assumed to vary
            					from 0.2 at 56 palms/ha to 0.4 at 186 palms/ha. These values
            					span the range of the data measured from the density
            					trial.
        LinearInterpolationFunction DiffuseExtinctionCoeff: XProperty=[OilPalm].Population; XYPairs={X=[0.0056, 0.0186], Y=[0.225, 0.45]}
          Memo=Diffuse K value is 33% higher for diffuse light as calculated using data from OPSIM paper (fig 1)
        Constant RUE: Value=1.22
          Memo=Assume RUE = 1.35 for clear sky and sky is usually 30% diffuse and so = 1.35 * (1-0.33*(1-0.66))
        Constant RootFrontVelocity: Value=30.0
          Memo=From Carr, M.K.V.(2011) The water relations and irrigation requirements of oil palm (elaeis guineensis): a review. Experimental Agriculture 47(4):629-652.
      Manager OilPalmSowingRule
        RowSpace = 280
        RowWidth = 770
        PlantingDepth = 120
        StemNumberPerSeedTuber = 2.2
        CultivarName = RussetBurbank
        SowingDate = 2003-10-20
```csharp
				
        using System;
        using Models.Core;
		using Models.PMF.OilPalm;
        namespace Models
        {
           [Serializable] 
           [System.Xml.Serialization.XmlInclude(typeof(Model))]
            public class Script : Model
            {      
               [Link] Clock Clock;
               [Link] OilPalm oilPalm;
			   
               [Description("Spacing (mm) between plants within rows")]
               public double RowSpace { get; set; }
               [Description("Spacing (mm) between rows")]
               public double RowWidth { get; set; }
               [Description("Depth (mm) tubers are planted")]
               public double PlantingDepth { get; set; }
               [Description("Cultivar")]
               public string CultivarName { get; set; }
               [Description("Sowing Date")]
               public DateTime SowingDate { get; set; }

               [EventSubscribe("StartOfDay")]
               private void OnStartOfDay(object sender, EventArgs e)
               {
				double PlantPopulation = 1/((RowWidth/1000)*(RowSpace/1000));

				if (Clock.Today.Date == SowingDate)
                    oilPalm.Sow(Population:PlantPopulation, Cultivar:CultivarName, Depth:PlantingDepth);
                //Plant.Sow(... Contains the following arguements:
                //Population  double  Required  Seeds sowing/m2
                //Cultivar    string  Required  "NameOfCultivar"
                //Depth       double  Optional  Depth (mm) seed sown.   Default is 100mm 
                //MaxCover    double  Optional  Proportion (0-1) of the ground row crop will cover.   Default is 1.0
                //BudNumber   double  Optional  Number of mainstems per seed sown.  Default is 1.0
                //RowSpacing  double  Optional  Spaceing (mm) between drill rows when crop is sown.  Default is 150mm
                //CropClass   string  Optional  Crop class to instantiate when crop is sown.  Default is "Plant"
			   }
            }
        }
```
  DataStore
  Tests
    Test:
      SimulationName  TableName  Type       ColumnNames          Parameters
      OilPalm         Report     Tolerance  SoilWater.sw_dep(1)  1,1
      OilPalm         Report     Tolerance  SoilNitrogen.no3(1)  1,1
      OilPalm         Report     Tolerance  OilPalm.BunchMass    1,1
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