Simulations
  Memo
    Add information about the trial.
  Folder Sangara
    Experiment Sangara
      Factors
        Factor Operations: Paths=[operations]
          FactorValue N0
            Operations
              1996-04-01  Fertiliser.Apply(1.9, Fertiliser.Types.NH4NO3N, 10);
              1996-06-01  Fertiliser.Apply(3.8, Fertiliser.Types.NH4NO3N, 10);
              1996-09-01  Fertiliser.Apply(3.8, Fertiliser.Types.NH4NO3N, 10);
              1996-12-01  Fertiliser.Apply(3.8, Fertiliser.Types.NH4NO3N, 10);
              1997-03-01  Fertiliser.Apply(5.7, Fertiliser.Types.NH4NO3N, 10);
              1997-07-01  Fertiliser.Apply(11.8, Fertiliser.Types.NH4NO3N, 10);
              1997-11-01  Fertiliser.Apply(11.8, Fertiliser.Types.NH4NO3N, 10);
              1998-03-01  Fertiliser.Apply(16.5, Fertiliser.Types.NH4NO3N, 10);
              1998-07-01  Fertiliser.Apply(23.6, Fertiliser.Types.NH4NO3N, 10);
              1998-11-01  Fertiliser.Apply(23.6, Fertiliser.Types.NH4NO3N, 10);
              1999-03-01  Fertiliser.Apply(33.1, Fertiliser.Types.NH4NO3N, 10);
              1999-07-01  Fertiliser.Apply(37.8, Fertiliser.Types.NH4NO3N, 10);
              1999-11-01  Fertiliser.Apply(37.8, Fertiliser.Types.NH4NO3N, 10);
              2000-03-01  Fertiliser.Apply(42.5, Fertiliser.Types.NH4NO3N, 10);
              2000-07-01  Fertiliser.Apply(47.3, Fertiliser.Types.NH4NO3N, 10);
              2000-11-01  Fertiliser.Apply(47.3, Fertiliser.Types.NH4NO3N, 10);
          FactorValue N1
            Operations
              1996-04-01  Fertiliser.Apply(1.9, Fertiliser.Types.NH4NO3N, 10);
              1996-06-01  Fertiliser.Apply(3.8, Fertiliser.Types.NH4NO3N, 10);
              1996-09-01  Fertiliser.Apply(3.8, Fertiliser.Types.NH4NO3N, 10);
              1996-12-01  Fertiliser.Apply(3.8, Fertiliser.Types.NH4NO3N, 10);
              1997-03-01  Fertiliser.Apply(5.7, Fertiliser.Types.NH4NO3N, 10);
              1997-07-01  Fertiliser.Apply(11.8, Fertiliser.Types.NH4NO3N, 10);
              1997-11-01  Fertiliser.Apply(11.8, Fertiliser.Types.NH4NO3N, 10);
              1998-03-01  Fertiliser.Apply(16.5, Fertiliser.Types.NH4NO3N, 10);
              1998-07-01  Fertiliser.Apply(23.6, Fertiliser.Types.NH4NO3N, 10);
              1998-11-01  Fertiliser.Apply(23.6, Fertiliser.Types.NH4NO3N, 10);
              1999-03-01  Fertiliser.Apply(33.1, Fertiliser.Types.NH4NO3N, 10);
              1999-07-01  Fertiliser.Apply(37.8, Fertiliser.Types.NH4NO3N, 10);
              1999-11-01  Fertiliser.Apply(37.8, Fertiliser.Types.NH4NO3N, 10);
              2000-03-01  Fertiliser.Apply(42.5, Fertiliser.Types.NH4NO3N, 10);
              2000-07-01  Fertiliser.Apply(47.3, Fertiliser.Types.NH4NO3N, 10);
              2000-11-01  Fertiliser.Apply(47.3, Fertiliser.Types.NH4NO3N, 10);
              2001-03-01  Fertiliser.Apply(57, Fertiliser.Types.UreaN, 10);
              2002-03-01  Fertiliser.Apply(57, Fertiliser.Types.UreaN, 10);
              2003-03-01  Fertiliser.Apply(57, Fertiliser.Types.UreaN, 10);
              2004-03-01  Fertiliser.Apply(57, Fertiliser.Types.UreaN, 10);
              2005-03-01  Fertiliser.Apply(57, Fertiliser.Types.UreaN, 10);
              2006-03-01  Fertiliser.Apply(57, Fertiliser.Types.UreaN, 10);
              2007-03-01  Fertiliser.Apply(57, Fertiliser.Types.UreaN, 10);
              2008-03-01  Fertiliser.Apply(57, Fertiliser.Types.UreaN, 10);
              2009-03-01  Fertiliser.Apply(57, Fertiliser.Types.UreaN, 10);
              2010-03-01  Fertiliser.Apply(57, Fertiliser.Types.UreaN, 10);
          FactorValue N2
            Operations
              1996-04-01  Fertiliser.Apply(1.9, Fertiliser.Types.NH4NO3N, 10);
              1996-06-01  Fertiliser.Apply(3.8, Fertiliser.Types.NH4NO3N, 10);
              1996-09-01  Fertiliser.Apply(3.8, Fertiliser.Types.NH4NO3N, 10);
              1996-12-01  Fertiliser.Apply(3.8, Fertiliser.Types.NH4NO3N, 10);
              1997-03-01  Fertiliser.Apply(5.7, Fertiliser.Types.NH4NO3N, 10);
              1997-07-01  Fertiliser.Apply(11.8, Fertiliser.Types.NH4NO3N, 10);
              1997-11-01  Fertiliser.Apply(11.8, Fertiliser.Types.NH4NO3N, 10);
              1998-03-01  Fertiliser.Apply(16.5, Fertiliser.Types.NH4NO3N, 10);
              1998-07-01  Fertiliser.Apply(23.6, Fertiliser.Types.NH4NO3N, 10);
              1998-11-01  Fertiliser.Apply(23.6, Fertiliser.Types.NH4NO3N, 10);
              1999-03-01  Fertiliser.Apply(33.1, Fertiliser.Types.NH4NO3N, 10);
              1999-07-01  Fertiliser.Apply(37.8, Fertiliser.Types.NH4NO3N, 10);
              1999-11-01  Fertiliser.Apply(37.8, Fertiliser.Types.NH4NO3N, 10);
              2000-03-01  Fertiliser.Apply(42.5, Fertiliser.Types.NH4NO3N, 10);
              2000-07-01  Fertiliser.Apply(47.3, Fertiliser.Types.NH4NO3N, 10);
              2000-11-01  Fertiliser.Apply(47.3, Fertiliser.Types.NH4NO3N, 10);
              2001-03-01  Fertiliser.Apply(113, Fertiliser.Types.UreaN, 10);
              2002-03-01  Fertiliser.Apply(113, Fertiliser.Types.UreaN, 10);
              2003-03-01  Fertiliser.Apply(113, Fertiliser.Types.UreaN, 10);
              2004-03-01  Fertiliser.Apply(113, Fertiliser.Types.UreaN, 10);
              2005-03-01  Fertiliser.Apply(113, Fertiliser.Types.UreaN, 10);
              2006-03-01  Fertiliser.Apply(113, Fertiliser.Types.UreaN, 10);
              2007-03-01  Fertiliser.Apply(113, Fertiliser.Types.UreaN, 10);
              2008-03-01  Fertiliser.Apply(113, Fertiliser.Types.UreaN, 10);
              2009-03-01  Fertiliser.Apply(113, Fertiliser.Types.UreaN, 10);
              2010-03-01  Fertiliser.Apply(113, Fertiliser.Types.UreaN, 10);
          FactorValue N3
            Operations
              1996-04-01  Fertiliser.Apply(1.9, Fertiliser.Types.NH4NO3N, 10);
              1996-06-01  Fertiliser.Apply(3.8, Fertiliser.Types.NH4NO3N, 10);
              1996-09-01  Fertiliser.Apply(3.8, Fertiliser.Types.NH4NO3N, 10);
              1996-12-01  Fertiliser.Apply(3.8, Fertiliser.Types.NH4NO3N, 10);
              1997-03-01  Fertiliser.Apply(5.7, Fertiliser.Types.NH4NO3N, 10);
              1997-07-01  Fertiliser.Apply(11.8, Fertiliser.Types.NH4NO3N, 10);
              1997-11-01  Fertiliser.Apply(11.8, Fertiliser.Types.NH4NO3N, 10);
              1998-03-01  Fertiliser.Apply(16.5, Fertiliser.Types.NH4NO3N, 10);
              1998-07-01  Fertiliser.Apply(23.6, Fertiliser.Types.NH4NO3N, 10);
              1998-11-01  Fertiliser.Apply(23.6, Fertiliser.Types.NH4NO3N, 10);
              1999-03-01  Fertiliser.Apply(33.1, Fertiliser.Types.NH4NO3N, 10);
              1999-07-01  Fertiliser.Apply(37.8, Fertiliser.Types.NH4NO3N, 10);
              1999-11-01  Fertiliser.Apply(37.8, Fertiliser.Types.NH4NO3N, 10);
              2000-03-01  Fertiliser.Apply(42.5, Fertiliser.Types.NH4NO3N, 10);
              2000-07-01  Fertiliser.Apply(47.3, Fertiliser.Types.NH4NO3N, 10);
              2000-11-01  Fertiliser.Apply(47.3, Fertiliser.Types.NH4NO3N, 10);
              2001-03-01  Fertiliser.Apply(227, Fertiliser.Types.UreaN, 10);
              2002-03-01  Fertiliser.Apply(227, Fertiliser.Types.UreaN, 10);
              2003-03-01  Fertiliser.Apply(227, Fertiliser.Types.UreaN, 10);
              2004-03-01  Fertiliser.Apply(227, Fertiliser.Types.UreaN, 10);
              2005-03-01  Fertiliser.Apply(227, Fertiliser.Types.UreaN, 10);
              2006-03-01  Fertiliser.Apply(227, Fertiliser.Types.UreaN, 10);
              2007-03-01  Fertiliser.Apply(227, Fertiliser.Types.UreaN, 10);
              2008-03-01  Fertiliser.Apply(227, Fertiliser.Types.UreaN, 10);
              2009-03-01  Fertiliser.Apply(227, Fertiliser.Types.UreaN, 10);
              2010-03-01  Fertiliser.Apply(227, Fertiliser.Types.UreaN, 10);
      Simulation Base324
        WeatherFile: FileName=..\WeatherFiles\Popondetta.met
        Clock: StartDate=1996-03-01; EndDate=2010-09-29
        Summary
        Zone Field: Area=1; Slope=0
          Fertiliser
          SurfaceOrganicMatter SurfaceOM: crit_residue_wt=2000; opt_temp=20; cum_eos_max=20; cnrf_coeff=0.277; cnrf_optcn=25; c_fract=0.4; leach_rain_tot=25; min_rain_to_leach=10; crit_min_surfom_orgC=0.004; default_cpr=0; default_standing_fraction=0; standing_extinct_coeff=0.5; fractionFaecesAdded=0.5; PoolName=oilpalm oilpalmstem; type=oilpalm oilpalmstem; mass=24000 63000; standing_fraction=0 0; cnr=39 145
          Soil: SoilType=Higaturu Series; Site=Sangara Estate; NearestTown=Popondetta; Region=Oro Province; Latitude=0; Longitude=0
            Water
              Thickness  BD    AirDry  LL15   DUL    SAT
              100        1.22  0.127   0.38   0.48   0.53
              200        1.22  0.127   0.38   0.48   0.53
              300        1.43  0.1     0.3    0.4    0.45
              300        1.14  0.137   0.41   0.51   0.56
              300        1.15  0.135   0.406  0.506  0.556
              300        1.15  0.135   0.406  0.506  0.556
              500        1.43  0.1     0.3    0.4    0.45
              500        1.43  0.1     0.3    0.4    0.45
              500        1.43  0.1     0.3    0.4    0.45
              500        1.43  0.1     0.3    0.4    0.45
              500        1.43  0.1     0.3    0.4    0.45
              1000       1.43  0.1     0.3    0.4    0.45
              SoilCrop OilPalm
                LL=[0.38, 0.38, 0.3, 0.41, 0.406, 0.406, 0.3, 0.3, 0.3, 0.3, 0.3, 0.3]
                KL=[0.06, 0.04, 0.03, 0.02, 0.02, 0.02, 0.01, 0.01, 0.01, 0, 0, 0]
                XF=[1, 1, 1, 1, 1, 1, 1, 1, 1, 0, 0, 0]
            SoilWater: min_crit_temp=5; max_crit_temp=35; max_albedo=0.23; A_to_evap_fact=0.44; canopy_eos_coef=1.7; sw_top_crit=0.9; sumes1_max=100; sumes2_max=25; solute_flow_eff=[1]; solute_flux_eff=[1]; gravity_gradient=2E-05; specific_bd=2.65; hydrol_effective_depth=450; immobile_solutes=[nh4]; canopy_fact=[1, 1, 0, 0]; canopy_fact_height=[0, 600, 1800, 30000]; canopy_fact_default=0.5; act_evap_method=ritchie; irrigation_will_runoff=false; irrigation_layer=0; SummerCona=5; SummerU=5; SummerDate=1-Nov; WinterCona=5; WinterU=5; WinterDate=1-Apr; DiffusConst=88; DiffusSlope=35.4; Salb=0.18; slope=0; discharge_width=0; catchment_area=0; max_pond=0; CN2Bare=68; CNRed=20; CNCov=0.8
              Thickness  SWCON  KLAT
              100        0.7    0
              200        0.7    0
              300        0.7    0
              300        0.7    0
              300        0.7    0
              300        0.7    0
              500        0.7    0
              500        0.7    0
              500        0.7    0
              500        0.7    0
              500        0.7    0
              1000       0.7    0
              mobile_solutes=[no3, urea, cl, br, org_n, org_c_pool1, org_c_pool2, org_c_pool3]
            SoilNitrogen: fom_type=[default, manure, mucuna, lablab, shemp, stable]; fract_carb=[0.2, 0.3, 0.54, 0.57, 0.45, 0]; fract_cell=[0.7, 0.3, 0.37, 0.37, 0.47, 0.1]; fract_lign=[0.1, 0.4, 0.09, 0.06, 0.08, 0.9]; wfpsN2N2O_x=[22, 88]; wfpsN2N2O_y=[0.1, 1]
              oc=[2.63165, 0.720717, 0.495425, 0.40466, 0.40462, 0.404312, 0.402023, 0.401934, 0.401792, 0.398337, 0.398343, 0.398341]
            SoilOrganicMatter: RootCN=30; RootWt=3000; SoilCN=12; EnrACoeff=7.4; EnrBCoeff=0.2; OCUnits=Total
              Thickness  OC    FBiom  FInert
              100        2.1   0.04   0.24
              100        1.06  0.03   0.47
              100        0.65  0.015  0.77
              300        0.5   0.01   0.95
              300        0.4   0.01   0.99
              600        0.4   0.01   0.99
              500        0.4   0.01   0.99
              500        0.4   0.01   0.99
              500        0.4   0.01   0.99
              500        0.4   0.01   0.99
              500        0.4   0.01   0.99
              1000       0.4   0.01   0.99
            Analysis: PHUnits=Water; BoronUnits=HotWater
              Thickness=[100, 200, 300, 300, 300, 300, 500, 500, 500, 500, 500, 1000]
              PH=[6.3, 6.4, 6.7, 6.8, 6.8, 6.8, 6.8, 6.8, 6.8, 6.8, 6.8, 6.8]
            InitialWater Initial water: PercentMethod=EvenlyDistributed; FractionFull=1
            Sample Initial nitrogen: NO3Units=ppm; NH4Units=ppm; SWUnits=Volumetric; OCUnits=Total; PHUnits=Water
              Thickness  NO3  NH4
              100        5    0
              200        5    0
              300        1    0
              300        1    0
              300        1    0
              300        0    0
              500        0    0
              500        0    0
              500        0    0
              500        0    0
              500        0    0
              1000       0    0
          Report AnnualOutput
            VariableNames:
              [Clock].Today
              [OilPalm].Age
              [Calculations].Script.AnnualFronds
              [Calculations].Script.AnnualBunches
              [Calculations].Script.AnnualYield
              [Calculations].Script.AnnualBunchSize
          Report MonthlyOutput
            VariableNames:
              [Clock].Today.Year
              [Clock].Today
              [Clock].Today.Month
              [OilPalm].Age
              [SurfaceOM].surfaceom_n
              [SurfaceOM].surfaceom_wt
              [OilPalm].CumulativeFrondNumber
              [Calculations].Script.MonthlyPalmBunches
              [Calculations].Script.MonthlyPalmYield
              [Calculations].Script.MonthlyPalmBunchSize
              [OilPalm].LAI
              [OilPalm].StemMass
              [Calculations].Script.surfaceom_wt_oilpalmstem
              [Calculations].Script.surfaceom_wt_oilpalmunderstory
              [Calculations].Script.MonthlyDenit
              [Calculations].Script.MonthlyN2O
              [Calculations].Script.MonthlyLeach
              [Calculations].Script.MonthlyFixation
              [Calculations].Script.SurfaceNO3
              [Calculations].Script.RootZoneNO3
              [Calculations].Script.MonthlyN2
              [Calculations].Script.SoilCtpha
              [Calculations].Script.NitTot
          MicroClimate: air_pressure=1010; soil_emissivity=0.96; sun_angle=15; soil_heat_flux_fraction=0.4; night_interception_fraction=0.5; windspeed_default=3; refheight=2; albedo=0.15; emissivity=0.96; gsmax=0.01; r50=200; a_interception=0; b_interception=1; c_interception=0; d_interception=0; soil_albedo=0.23
            MicroClimate: air_pressure=1010; soil_emissivity=0.96; sun_angle=15; soil_heat_flux_fraction=0.4; night_interception_fraction=0.5; windspeed_default=3; refheight=2; albedo=0.15; emissivity=0.96; gsmax=0.01; r50=200; a_interception=0; b_interception=1; c_interception=0; d_interception=0; soil_albedo=0.23
          OilPalm: plant_status=out; height=0; cover_tot=0.9; UnderstoryLegumeFraction=1; UnderstoryCoverGreen=0.0897166; UnderstoryRootDepth=300; UnderstoryPEP=0.0854105; UnderstoryEP=0.0854105; UnderstoryFW=1; UnderstoryDltDM=0.4264; UnderstoryCoverMax=0.4; InterceptionFraction=0; PEP=0; EP=0; FW=0; Fn=0; DefoliationFraction=0
            SowingData={Cultivar=Dami, Population=0.0135, Depth=200, RowSpacing=150, MaxCover=1, BudNumber=1, CropClass=Plant, SkipRow=0, SkipPlant=0}
            Constant cover_tot: Value=0.9
            Constant height: Value=10000
            VariableReference UnderstoryCoverMax
            VariableReference UnderstoryLegumeFraction
            Constant InterceptionFraction: Value=0
            Constant InitialRootDepth: Value=300
            Constant MaximumRootDepth: Value=5000
            Constant KNO3: Value=0.02
            Constant RootFraction: Value=0.1
            Constant RootNConcentration: Value=0.39
            Constant RootSenescenceRate: Value=0.001
            Constant InitialFrondNumber: Value=5
            AirTemperatureFunction RelativeDevelopmentalRate
              XYPairs: X=[13, 32, 35, 46]; Y=[0, 1, 1, 0]
            LinearInterpolationFunction FrondAppRate: XProperty=[OilPalm].Age
              XYPairs: X=[0, 2, 5, 10, 15]; Y=[5.25, 5.25, 7.725, 10.1, 10.1]
            Constant ExpandingFronds: Value=5
            Constant FrondMaximumNConcentration: Value=1.15
            Constant FrondCriticalNConcentration: Value=1.1
            Constant FrondMinimumNConcentration: Value=0.5
            SplineInterpolationFunction FrondMaxArea: XProperty=[OilPalm].Age
              XYPairs: X=[0, 2, 4.5, 8.5, 14]; Y=[0.1, 1, 7, 12, 14]
            LinearInterpolationFunction BunchSizeMax: XProperty=[OilPalm].Age
              XYPairs: X=[0, 2, 6, 10, 14]; Y=[53, 265, 7000, 11600, 12750]
            LinearInterpolationFunction HarvestFrondNumber: XProperty=[OilPalm].Age
              XYPairs: X=[0, 6, 10]; Y=[50, 40, 33]
            LinearInterpolationFunction FemaleFlowerFraction: XProperty=[OilPalm].Age
              XYPairs: X=[0, 4, 6, 8, 10]; Y=[0.8, 0.8, 0.8, 0.8, 0.8]
            LinearInterpolationFunction FFFStressImpact: XProperty=[OilPalm].CarbonStress
              XYPairs: X=[0, 1]; Y=[0.06, 0]
            LinearInterpolationFunction StemToFrondFraction: XProperty=[OilPalm].Age
              XYPairs: X=[0, 4, 7, 12]; Y=[0, 0.15, 0.25, 0.25]
            LinearInterpolationFunction StemNConcentration: XProperty=[OilPalm].Age
              XYPairs: X=[0, 8.5]; Y=[1.37, 0.351]
            Constant BunchOilConversionFactor: Value=1.55
            Constant RipeBunchWaterContent: Value=0.47
            Constant BunchNConcentration: Value=0.603
            LinearInterpolationFunction SpecificLeafArea: XProperty=[OilPalm].Age
              XYPairs: X=[1, 5, 13]; Y=[0.003, 0.003, 0.003]
            LinearInterpolationFunction SpecificLeafAreaMax: XProperty=[OilPalm].Age
              XYPairs: X=[1, 5, 13]; Y=[0.0035, 0.0035, 0.0035]
            LinearInterpolationFunction FlowerAbortionFraction: XProperty=[OilPalm].CarbonStress
              XYPairs: X=[0, 1]; Y=[0.15, 0]
            LinearInterpolationFunction BunchFailureFraction: XProperty=[OilPalm].CarbonStress
              XYPairs: X=[0, 1]; Y=[0.15, 0]
            LinearInterpolationFunction DirectExtinctionCoeff: XProperty=[OilPalm].Population
              XYPairs: X=[0.0056, 0.0186]; Y=[0.175, 0.35]
            LinearInterpolationFunction DiffuseExtinctionCoeff: XProperty=[OilPalm].Population
              XYPairs: X=[0.0056, 0.0186]; Y=[0.225, 0.45]
            Constant RUE: Value=1.22
            Constant RootFrontVelocity: Value=30
          Operations: same as Sangara.Sangara.Factors.Operations.N0.operations
          Irrigation
          Manager Palm Management
            sowing_date = 1996-03-01
            population = 135
            cultivar = Dami
            sowing_depth = 200
            Plant_population = 0
```csharp
using System;
using Models.Core;
using Models.PMF;
using Models.PMF.OilPalm;
namespace Models
{
	[Serializable]
	[System.Xml.Serialization.XmlInclude(typeof(Model))]
	public class Script : Model
	{
		[Link] Clock Clock;
		[Link] OilPalm oilPalm;
		[Link] Summary Summary;
		
		[Description("Sowing date")]
		public DateTime sowing_date {get; set;}
		
		[Description("Plant population /ha")]
		public double population {get; set;}


		[Description("Cultivar")]
		public string cultivar {get; set;}

		[Description("Sowing depth (mm)")]
		public double sowing_depth {get; set;}
		
		public double Plant_population {get;set;}
		
		private byte HarvestCounter = 1;

		public override void OnSimulationCommencing()
		{
		    Plant_population = 0;
		}
		
		[EventSubscribe("DoManagement")]
		private void OnDoManagement(object sender, EventArgs e)
		{	
			if (Clock.Today.Date == sowing_date)
			{
			    oilPalm.Sow(Population: population / 10000, Cultivar:cultivar, Depth:sowing_depth);
			}
			
			if (HarvestCounter == 14)
			{
				oilPalm.Harvest();
				HarvestCounter = 1;
			}
			
			HarvestCounter++;
		}
	}
}
```
          Manager Calculations
            Offset = 449
            AnnualFronds = 21
            AnnualBunches = 13.1687
            BunchOffset = 196.154
            AnnualYield = 6.05789
            AnnualBunchSize = 3.40756
            YieldOffset = 25308.9
            MonthlyPalmYield = 2.15513
            MonthlyPalmBunches = 0.108886
            MonthlyPalmBunchSize = 19.7926
            MonthlyDenit = 0.293073
            MonthlyN2O = 0.0555647
            MonthlyN2 = 0.237508
            MonthlyFixation = 1.49956
            SurfaceNO3 = 21.2077
            RootZoneNO3 = 30.0561
            MonthlyLeach = 0
            SoilCtpha = 313.053
            surfaceom_wt_oilpalmstem = 1.12886e-10
            surfaceom_wt_oilpalmunderstory = 0
            OilPalmYield = 0
            TotalNO3 = 36.7903
            NitTot = 26213.5
```csharp
using System;
using Models.Core;
using Models.PMF;
using Models.PMF.OilPalm;
using Models.Soils;
using Models.SurfaceOM;

namespace Models
{
	[Serializable]
	[System.Xml.Serialization.XmlInclude(typeof(Model))]
	public class Script : Model
	{
		[Link] Clock Clock;
		[Link] OilPalm oilPalm;
		[Link] Soil Soil;
		[Link] SurfaceOrganicMatter SurfaceOM;
		[Link] Summary Summary;
		
		public double Offset {get; set;}
		public double AnnualFronds {get; set;}
		public double AnnualBunches {get; set;}
		public double BunchOffset {get; set;}
		public double AnnualYield {get; set;}
		public double AnnualBunchSize {get; set;}
		public double YieldOffset {get; set;}
		public double MonthlyPalmYield {get; set;}
		public double MonthlyPalmBunches {get; set;}
		public double MonthlyPalmBunchSize {get; set;}
		public double MonthlyDenit {get; set;}
		public double MonthlyN2O {get; set;}
		public double MonthlyN2 {get; set;}
		public double MonthlyFixation {get; set;}
		public double SurfaceNO3 {get; set;}
		public double RootZoneNO3 {get; set;}
		public double MonthlyLeach {get; set;}
		public double SoilCtpha {get; set;}
		public double surfaceom_wt_oilpalmstem {get; set;}
		public double surfaceom_wt_oilpalmunderstory {get; set;}
	    public double OilPalmYield {get; set;}
	    public double TotalNO3 {get; set;}
	    public double NitTot {get;set;}
		
		public override void OnSimulationCommencing()
		{	
			Offset = 0;
			OilPalmYield = 0;
			AnnualFronds = 0;
			AnnualBunches = 0;
			AnnualBunchSize = 0;
			BunchOffset = 0;
			AnnualYield = 0;
			YieldOffset = 0;
			MonthlyPalmYield = 0;
			MonthlyPalmBunches = 0;
			MonthlyPalmBunchSize = 0;
			MonthlyDenit = 0;
			MonthlyN2O = 0;
			MonthlyN2 = 0;
			MonthlyFixation = 0;
			SurfaceNO3 = 0;
			RootZoneNO3 = 0;
			MonthlyLeach = 0;
			SoilCtpha = 0;
			surfaceom_wt_oilpalmstem = 0;
			surfaceom_wt_oilpalmunderstory = 0;	
			NitTot=0;
		}
		
		[EventSubscribe("DoDailyInitialisation")]
		private void OnDoDailyInitialisation(object sender, EventArgs e)
		{			
			if (Clock.Today.Day == 1)
			{
			   MonthlyPalmYield = 0;
			   MonthlyPalmBunches = 0;
			   MonthlyPalmBunchSize = 0;
			   MonthlyDenit = 0;
			   MonthlyN2O = 0;
			   MonthlyN2 = 0;
			   MonthlyFixation = 0;
			   MonthlyLeach = 0;
			}
		}
		
	   [EventSubscribe("DoHarvest")]
	   private void OnDoHarvest(object sender, EventArgs e)
	   {
	   	   AnnualYield += oilPalm.HarvestFFB;
	   }
		
       [EventSubscribe("DoManagement")]
       private void OnDoManagement(object sender, EventArgs e)
		{

			if (oilPalm.IsCropInGround)
			{
				if (Clock.Today.DayOfYear == 1)
				{
				   Offset = oilPalm.CumulativeFrondNumber;
				   BunchOffset = oilPalm.CumulativeBunchNumber;
				   YieldOffset = oilPalm.CumulativeYield;
				   AnnualYield = 0;
				   AnnualBunchSize = 0;
				}
				
				if ((Clock.Today.Year % 4 == 0 && Clock.Today.DayOfYear == 366) || (Clock.Today.Year % 4 != 0 && Clock.Today.DayOfYear == 365))
				{
					AnnualFronds = oilPalm.CumulativeFrondNumber - Offset;		
					AnnualBunches = oilPalm.CumulativeBunchNumber - BunchOffset;
				}
			}

			MonthlyDenit = MonthlyDenit + Utility.Math.Sum(Soil.SoilNitrogen.dnit);
			MonthlyN2O = MonthlyN2O + Utility.Math.Sum(Soil.SoilNitrogen.n2o_atm);
			MonthlyN2 = MonthlyDenit - MonthlyN2O;
			SurfaceNO3  = Soil.SoilNitrogen.no3[0] + Soil.SoilNitrogen.no3[1] + Soil.SoilNitrogen.no3[2];
			RootZoneNO3 = Soil.SoilNitrogen.no3[0] + Soil.SoilNitrogen.no3[1] + Soil.SoilNitrogen.no3[2]
			            + Soil.SoilNitrogen.no3[3] + Soil.SoilNitrogen.no3[4] + Soil.SoilNitrogen.no3[4]
			            + Soil.SoilNitrogen.no3[6] + Soil.SoilNitrogen.no3[7] + Soil.SoilNitrogen.no3[8];
			MonthlyFixation = MonthlyFixation + oilPalm.UnderstoryNFixation;
			MonthlyLeach = MonthlyLeach + Soil.SoilWater.LeachNO3;
			SoilCtpha = Utility.Math.Sum(Soil.SoilNitrogen.carbon_tot) / 1000;
			surfaceom_wt_oilpalmstem = SurfaceOM.GetWeightFromPool("oilpalmstem");
			TotalNO3 = Utility.Math.Sum(Soil.SoilNitrogen.no3);
			NitTot = Utility.Math.Sum(Soil.SoilNitrogen.nit_tot);
		}
		
		[EventSubscribe("Harvesting")]
		private void OnHarvesting(object sender, EventArgs e)
		{
			MonthlyPalmYield = MonthlyPalmYield + oilPalm.HarvestBunchSize * oilPalm.HarvestBunches / 1000;
			MonthlyPalmBunches = MonthlyPalmBunches + oilPalm.HarvestBunches;
			if (MonthlyPalmBunches > 0)
			   MonthlyPalmBunchSize = MonthlyPalmYield / MonthlyPalmBunches;
			else
			   MonthlyPalmBunchSize = 0;
			   
			AnnualYield += oilPalm.HarvestFFB;
			if (AnnualBunches > 0)
				AnnualBunchSize = AnnualYield * 1000 / AnnualBunches / (oilPalm.Population * 10000);
		}
	}
}
```
          Manager ReportMonthly
```csharp
using System;
using Models.Core;
using Models.PMF;
using Models.PMF.OilPalm;
namespace Models
{
	[Serializable]
	[System.Xml.Serialization.XmlInclude(typeof(Model))]
	public class Script : Model
	{
		[Link] Clock Clock;
		[Link] Report MonthlyOutput;
			
		[EventSubscribe("DoReport")]
		private void OnDoReport(object sender, EventArgs e)
		{
			// Add Trunk from previous plantation
			//surface organic matter' add_surfaceom type=OilPalm, name=trunk, mass=63000, cnr=133, cpr=200
			
			if (Clock.Today.Day == 1)
			{
				MonthlyOutput.DoReport();
			}
		}
	}
}
```
            Manager Calculations
              Offset = 449
              AnnualFronds = 21
              AnnualBunches = 13.1687
              BunchOffset = 196.154
              AnnualYield = 0
              YieldOffset = 25308.9
              MonthlyPalmYield = 2.15513
              MonthlyPalmBunches = 0.108886
              MonthlyPalmBunchSize = 19.7926
              MonthlyDenit = 0.293073
              MonthlyN2O = 0.0555647
              MonthlyN2 = 0.237508
              MonthlyFixation = 1.49956
              SurfaceNO3 = 21.2077
              RootZoneNO3 = 30.0561
              MonthlyLeach = 0
              SoilCtpha = 313.053
              surfaceom_wt_oilpalmstem = 1.12886e-10
              OilPalmYield = 0
              TotalNO3 = 36.7903
```csharp
using System;
using Models.Core;
using Models.PMF;
using Models.PMF.OilPalm;
using Models.Soils;
using Models.SurfaceOM;

namespace Models
{
	[Serializable]
	[System.Xml.Serialization.XmlInclude(typeof(Model))]
	public class Script : Model
	{
		[Link] Clock Clock;
		[Link] OilPalm oilPalm;
		[Link] Soil Soil;
		[Link] SurfaceOrganicMatter SurfaceOM;
		[Link] Summary Summary;
		
		public double Offset {get; set;}
		public double AnnualFronds {get; set;}
		public double AnnualBunches {get; set;}
		public double BunchOffset {get; set;}
		public double AnnualYield {get; set;}
		public double YieldOffset {get; set;}
		public double MonthlyPalmYield {get; set;}
		public double MonthlyPalmBunches {get; set;}
		public double MonthlyPalmBunchSize {get; set;}
		public double MonthlyDenit {get; set;}
		public double MonthlyN2O {get; set;}
		public double MonthlyN2 {get; set;}
		public double MonthlyFixation {get; set;}
		public double SurfaceNO3 {get; set;}
		public double RootZoneNO3 {get; set;}
		public double MonthlyLeach {get; set;}
		public double SoilCtpha {get; set;}
		public double surfaceom_wt_oilpalmstem {get; set;}
	    public double OilPalmYield {get; set;}
	    public double TotalNO3 {get; set;}
		
		public override void OnSimulationCommencing()
		{	
			Offset = 0;
			OilPalmYield = 0;
			AnnualFronds = 0;
			AnnualBunches = 0;
			BunchOffset = 0;
			AnnualYield = 0;
			YieldOffset = 0;
			MonthlyPalmYield = 0;
			MonthlyPalmBunches = 0;
			MonthlyPalmBunchSize = 0;
			MonthlyDenit = 0;
			MonthlyN2O = 0;
			MonthlyN2 = 0;
			MonthlyFixation = 0;
			SurfaceNO3 = 0;
			RootZoneNO3 = 0;
			MonthlyLeach = 0;
			SoilCtpha = 0;
			surfaceom_wt_oilpalmstem = 0;
		}
		
		[EventSubscribe("DoDailyInitialisation")]
		private void OnDoDailyInitialisation(object sender, EventArgs e)
		{			
			if (Clock.Today.Day == 1)
			{
			   MonthlyPalmYield = 0;
			   MonthlyPalmBunches = 0;
			   MonthlyPalmBunchSize = 0;
			   MonthlyDenit = 0;
			   MonthlyN2O = 0;
			   MonthlyN2 = 0;
			   MonthlyFixation = 0;
			   MonthlyLeach = 0;
			}
		}
		
	   [EventSubscribe("DoHarvest")]
	   private void OnDoHarvest(object sender, EventArgs e)
	   {
	   	   Summary.WriteMessage(this.FullPath, "Harverst event.");
	   	   AnnualYield += oilPalm.HarvestFFB;
	   }
		
       [EventSubscribe("DoManagement")]
       private void OnDoManagement(object sender, EventArgs e)
		{

			if (oilPalm.IsCropInGround)
			{
			    // Note that using Convert.ToDateTime(string) will use current regional settings
			    // which may be different to the script authors. This is why we specify DMY as
			    // seperate integers.
				if (Clock.Today.DayOfYear == 1)
				{
				   Offset = oilPalm.CumulativeFrondNumber;
				   BunchOffset = oilPalm.CumulativeBunchNumber;
				   YieldOffset = oilPalm.CumulativeYield;				   
                  // AnnualYield = oilPalm.CumulativeYield - YieldOffset;
				}
				
				if ((Clock.Today.Year % 4 == 0 && Clock.Today.DayOfYear == 366) || (Clock.Today.Year % 4 != 0 && Clock.Today.DayOfYear == 365))
				{
					AnnualFronds = oilPalm.CumulativeFrondNumber - Offset;		
					AnnualBunches = oilPalm.CumulativeBunchNumber - BunchOffset;
				}
			}

			MonthlyDenit = MonthlyDenit + Utility.Math.Sum(Soil.SoilNitrogen.dnit);
			MonthlyN2O = MonthlyN2O + Utility.Math.Sum(Soil.SoilNitrogen.n2o_atm);
			MonthlyN2 = MonthlyDenit - MonthlyN2O;
			SurfaceNO3  = Soil.SoilNitrogen.no3[0] + Soil.SoilNitrogen.no3[1] + Soil.SoilNitrogen.no3[2];
			RootZoneNO3 = Soil.SoilNitrogen.no3[0] + Soil.SoilNitrogen.no3[1] + Soil.SoilNitrogen.no3[2]
			            + Soil.SoilNitrogen.no3[3] + Soil.SoilNitrogen.no3[4] + Soil.SoilNitrogen.no3[4]
			            + Soil.SoilNitrogen.no3[6] + Soil.SoilNitrogen.no3[7] + Soil.SoilNitrogen.no3[8];
			MonthlyFixation = MonthlyFixation + oilPalm.UnderstoryNFixation;
			MonthlyLeach = MonthlyLeach + Soil.SoilWater.LeachNO3;
			SoilCtpha = Utility.Math.Sum(Soil.SoilNitrogen.carbon_tot) / 1000;
			surfaceom_wt_oilpalmstem = SurfaceOM.GetWeightFromPool("oilpalmstem");
			TotalNO3 = Utility.Math.Sum(Soil.SoilNitrogen.no3);

		}
		[EventSubscribe("Harvesting")]
		private void OnHarvesting(object sender, EventArgs e)
		{
			MonthlyPalmYield = MonthlyPalmYield + oilPalm.HarvestBunchSize * oilPalm.HarvestBunches / 1000;
			MonthlyPalmBunches = MonthlyPalmBunches + oilPalm.HarvestBunches;
			if (MonthlyPalmBunches > 0)
			   MonthlyPalmBunchSize = MonthlyPalmYield / MonthlyPalmBunches;
			else
			   MonthlyPalmBunchSize = 0;
		}
	}
}
```
          Manager ReportAnnually
```csharp
using System;
using Models.Core;
using Models.PMF;
using Models.PMF.OilPalm;
namespace Models
{
	[Serializable]
	[System.Xml.Serialization.XmlInclude(typeof(Model))]
	public class Script : Model
	{
		[Link] Clock Clock;
		[Link] Report AnnualOutput;
				
		[EventSubscribe("DoReport")]
		private void OnDoReport(object sender, EventArgs e)
		{
			// Add Trunk from previous plantation
			//surface organic matter' add_surfaceom type=OilPalm, name=trunk, mass=63000, cnr=133, cpr=200
			
			if ((Clock.Today.Year % 4 == 0 && Clock.Today.DayOfYear == 366) || (Clock.Today.Year % 4 != 0 && Clock.Today.DayOfYear == 365))
			{
				AnnualOutput.DoReport();
			}
		}
	}
}
```
          Report daily: EventNames=[Clock].DoReport
            VariableNames:
              [Clock].Today.Year
              [Clock].Today
              [Clock].Today.Month
              [OilPalm].Age
              [SurfaceOM].surfaceom_n
              [SurfaceOM].surfaceom_wt
              [OilPalm].CumulativeFrondNumber
              [Calculations].Script.MonthlyPalmBunches
              [Calculations].Script.MonthlyPalmYield
              [Calculations].Script.MonthlyPalmBunchSize
              [OilPalm].LAI
              [OilPalm].StemMass
              [Calculations].Script.surfaceom_wt_oilpalmstem
              [Calculations].Script.surfaceom_wt_oilpalmunderstory
              [Calculations].Script.MonthlyDenit
              [Calculations].Script.MonthlyN2O
              [Calculations].Script.MonthlyLeach
              [Calculations].Script.MonthlyFixation
              [Calculations].Script.SurfaceNO3
              [Calculations].Script.RootZoneNO3
              [Calculations].Script.MonthlyN2
              [Calculations].Script.SoilCtpha
              [Calculations].Script.NitTot
  Folder Sagarai
    Experiment Sagarai
      Factors
        Factor Operations: Paths=[operations]
          FactorValue N0
            Operations
              1991-03-01  Fertiliser.Apply(42, Fertiliser.Types.UreaN, 10);
              1991-09-01  Fertiliser.Apply(42, Fertiliser.Types.UreaN, 10);
              1992-03-01  Fertiliser.Apply(42, Fertiliser.Types.UreaN, 10);
              1992-09-01  Fertiliser.Apply(42, Fertiliser.Types.UreaN, 10);
              1993-03-01  Fertiliser.Apply(42, Fertiliser.Types.UreaN, 10);
              1993-09-01  Fertiliser.Apply(42, Fertiliser.Types.UreaN, 10);
          FactorValue N1
            Operations
              1991-01-02  Fertiliser.Apply(17.8, Fertiliser.Types.NH4N, 10);
              1991-01-02  Fertiliser.Apply(17.8, Fertiliser.Types.NH4N, 10);
              1991-01-02  Fertiliser.Apply(17.8, Fertiliser.Types.NH4N, 10);
              1992-01-02  Fertiliser.Apply(17.8, Fertiliser.Types.NH4N, 10);
              1992-01-02  Fertiliser.Apply(17.8, Fertiliser.Types.NH4N, 10);
              1992-01-02  Fertiliser.Apply(17.8, Fertiliser.Types.NH4N, 10);
              1993-01-02  Fertiliser.Apply(17.8, Fertiliser.Types.NH4N, 10);
              1993-01-02  Fertiliser.Apply(17.8, Fertiliser.Types.NH4N, 10);
              1993-01-02  Fertiliser.Apply(17.8, Fertiliser.Types.NH4N, 10);
              1994-01-02  Fertiliser.Apply(17.8, Fertiliser.Types.NH4N, 10);
              1994-01-02  Fertiliser.Apply(17.8, Fertiliser.Types.NH4N, 10);
              1994-01-02  Fertiliser.Apply(17.8, Fertiliser.Types.NH4N, 10);
              1995-01-02  Fertiliser.Apply(17.8, Fertiliser.Types.NH4N, 10);
              1995-01-02  Fertiliser.Apply(17.8, Fertiliser.Types.NH4N, 10);
              1995-01-02  Fertiliser.Apply(17.8, Fertiliser.Types.NH4N, 10);
              1996-01-02  Fertiliser.Apply(17.8, Fertiliser.Types.NH4N, 10);
              1996-01-02  Fertiliser.Apply(17.8, Fertiliser.Types.NH4N, 10);
              1996-01-02  Fertiliser.Apply(17.8, Fertiliser.Types.NH4N, 10);
              1997-01-02  Fertiliser.Apply(17.8, Fertiliser.Types.NH4N, 10);
              1997-01-02  Fertiliser.Apply(17.8, Fertiliser.Types.NH4N, 10);
              1997-01-02  Fertiliser.Apply(17.8, Fertiliser.Types.NH4N, 10);
              1998-01-02  Fertiliser.Apply(17.8, Fertiliser.Types.NH4N, 10);
              1998-01-02  Fertiliser.Apply(17.8, Fertiliser.Types.NH4N, 10);
              1998-01-02  Fertiliser.Apply(17.8, Fertiliser.Types.NH4N, 10);
              1999-01-02  Fertiliser.Apply(17.8, Fertiliser.Types.NH4N, 10);
              1999-01-02  Fertiliser.Apply(17.8, Fertiliser.Types.NH4N, 10);
              1999-01-02  Fertiliser.Apply(17.8, Fertiliser.Types.NH4N, 10);
              2000-01-02  Fertiliser.Apply(17.8, Fertiliser.Types.NH4N, 10);
              2000-01-02  Fertiliser.Apply(17.8, Fertiliser.Types.NH4N, 10);
              2000-01-02  Fertiliser.Apply(17.8, Fertiliser.Types.NH4N, 10);
              2001-01-02  Fertiliser.Apply(17.8, Fertiliser.Types.NH4N, 10);
              2001-01-02  Fertiliser.Apply(17.8, Fertiliser.Types.NH4N, 10);
              2001-01-02  Fertiliser.Apply(17.8, Fertiliser.Types.NH4N, 10);
              2002-01-02  Fertiliser.Apply(17.8, Fertiliser.Types.NH4N, 10);
              2002-01-02  Fertiliser.Apply(17.8, Fertiliser.Types.NH4N, 10);
              2002-01-02  Fertiliser.Apply(17.8, Fertiliser.Types.NH4N, 10);
              2003-01-02  Fertiliser.Apply(17.8, Fertiliser.Types.NH4N, 10);
              2003-01-02  Fertiliser.Apply(17.8, Fertiliser.Types.NH4N, 10);
              2003-01-02  Fertiliser.Apply(17.8, Fertiliser.Types.NH4N, 10);
              2004-01-02  Fertiliser.Apply(17.8, Fertiliser.Types.NH4N, 10);
              2004-01-02  Fertiliser.Apply(17.8, Fertiliser.Types.NH4N, 10);
              2004-01-02  Fertiliser.Apply(17.8, Fertiliser.Types.NH4N, 10);
              2005-01-02  Fertiliser.Apply(17.8, Fertiliser.Types.NH4N, 10);
              2005-01-02  Fertiliser.Apply(17.8, Fertiliser.Types.NH4N, 10);
              2005-01-02  Fertiliser.Apply(17.8, Fertiliser.Types.NH4N, 10);
              2006-01-02  Fertiliser.Apply(17.8, Fertiliser.Types.NH4N, 10);
              2006-01-02  Fertiliser.Apply(17.8, Fertiliser.Types.NH4N, 10);
              2006-01-02  Fertiliser.Apply(17.8, Fertiliser.Types.NH4N, 10);
              2007-01-02  Fertiliser.Apply(17.8, Fertiliser.Types.NH4N, 10);
              2007-01-02  Fertiliser.Apply(17.8, Fertiliser.Types.NH4N, 10);
              2007-01-02  Fertiliser.Apply(17.8, Fertiliser.Types.NH4N, 10);
              2008-01-02  Fertiliser.Apply(17.8, Fertiliser.Types.NH4N, 10);
              2008-01-02  Fertiliser.Apply(17.8, Fertiliser.Types.NH4N, 10);
              2008-01-02  Fertiliser.Apply(17.8, Fertiliser.Types.NH4N, 10);
          FactorValue N2
            Operations
              1991-01-02  Fertiliser.Apply(35.6, Fertiliser.Types.NH4N, 10);
              1991-01-02  Fertiliser.Apply(35.6, Fertiliser.Types.NH4N, 10);
              1991-01-02  Fertiliser.Apply(35.6, Fertiliser.Types.NH4N, 10);
              1992-01-02  Fertiliser.Apply(35.6, Fertiliser.Types.NH4N, 10);
              1992-01-02  Fertiliser.Apply(35.6, Fertiliser.Types.NH4N, 10);
              1992-01-02  Fertiliser.Apply(35.6, Fertiliser.Types.NH4N, 10);
              1993-01-02  Fertiliser.Apply(35.6, Fertiliser.Types.NH4N, 10);
              1993-01-02  Fertiliser.Apply(35.6, Fertiliser.Types.NH4N, 10);
              1993-01-02  Fertiliser.Apply(35.6, Fertiliser.Types.NH4N, 10);
              1994-01-02  Fertiliser.Apply(35.6, Fertiliser.Types.NH4N, 10);
              1994-01-02  Fertiliser.Apply(35.6, Fertiliser.Types.NH4N, 10);
              1994-01-02  Fertiliser.Apply(35.6, Fertiliser.Types.NH4N, 10);
              1995-01-02  Fertiliser.Apply(35.6, Fertiliser.Types.NH4N, 10);
              1995-01-02  Fertiliser.Apply(35.6, Fertiliser.Types.NH4N, 10);
              1995-01-02  Fertiliser.Apply(35.6, Fertiliser.Types.NH4N, 10);
              1996-01-02  Fertiliser.Apply(35.6, Fertiliser.Types.NH4N, 10);
              1996-01-02  Fertiliser.Apply(35.6, Fertiliser.Types.NH4N, 10);
              1996-01-02  Fertiliser.Apply(35.6, Fertiliser.Types.NH4N, 10);
              1997-01-02  Fertiliser.Apply(35.6, Fertiliser.Types.NH4N, 10);
              1997-01-02  Fertiliser.Apply(35.6, Fertiliser.Types.NH4N, 10);
              1997-01-02  Fertiliser.Apply(35.6, Fertiliser.Types.NH4N, 10);
              1998-01-02  Fertiliser.Apply(35.6, Fertiliser.Types.NH4N, 10);
              1998-01-02  Fertiliser.Apply(35.6, Fertiliser.Types.NH4N, 10);
              1998-01-02  Fertiliser.Apply(35.6, Fertiliser.Types.NH4N, 10);
              1999-01-02  Fertiliser.Apply(35.6, Fertiliser.Types.NH4N, 10);
              1999-01-02  Fertiliser.Apply(35.6, Fertiliser.Types.NH4N, 10);
              1999-01-02  Fertiliser.Apply(35.6, Fertiliser.Types.NH4N, 10);
              2000-01-02  Fertiliser.Apply(35.6, Fertiliser.Types.NH4N, 10);
              2000-01-02  Fertiliser.Apply(35.6, Fertiliser.Types.NH4N, 10);
              2000-01-02  Fertiliser.Apply(35.6, Fertiliser.Types.NH4N, 10);
              2001-01-02  Fertiliser.Apply(35.6, Fertiliser.Types.NH4N, 10);
              2001-01-02  Fertiliser.Apply(35.6, Fertiliser.Types.NH4N, 10);
              2001-01-02  Fertiliser.Apply(35.6, Fertiliser.Types.NH4N, 10);
              2002-01-02  Fertiliser.Apply(35.6, Fertiliser.Types.NH4N, 10);
              2002-01-02  Fertiliser.Apply(35.6, Fertiliser.Types.NH4N, 10);
              2002-01-02  Fertiliser.Apply(35.6, Fertiliser.Types.NH4N, 10);
              2003-01-02  Fertiliser.Apply(35.6, Fertiliser.Types.NH4N, 10);
              2003-01-02  Fertiliser.Apply(35.6, Fertiliser.Types.NH4N, 10);
              2003-01-02  Fertiliser.Apply(35.6, Fertiliser.Types.NH4N, 10);
              2004-01-02  Fertiliser.Apply(35.6, Fertiliser.Types.NH4N, 10);
              2004-01-02  Fertiliser.Apply(35.6, Fertiliser.Types.NH4N, 10);
              2004-01-02  Fertiliser.Apply(35.6, Fertiliser.Types.NH4N, 10);
              2005-01-02  Fertiliser.Apply(35.6, Fertiliser.Types.NH4N, 10);
              2005-01-02  Fertiliser.Apply(35.6, Fertiliser.Types.NH4N, 10);
              2005-01-02  Fertiliser.Apply(35.6, Fertiliser.Types.NH4N, 10);
              2006-01-02  Fertiliser.Apply(35.6, Fertiliser.Types.NH4N, 10);
              2006-01-02  Fertiliser.Apply(35.6, Fertiliser.Types.NH4N, 10);
              2006-01-02  Fertiliser.Apply(35.6, Fertiliser.Types.NH4N, 10);
              2007-01-02  Fertiliser.Apply(35.6, Fertiliser.Types.NH4N, 10);
              2007-01-02  Fertiliser.Apply(35.6, Fertiliser.Types.NH4N, 10);
              2007-01-02  Fertiliser.Apply(35.6, Fertiliser.Types.NH4N, 10);
              2008-01-02  Fertiliser.Apply(35.6, Fertiliser.Types.NH4N, 10);
              2008-01-02  Fertiliser.Apply(35.6, Fertiliser.Types.NH4N, 10);
              2008-01-02  Fertiliser.Apply(35.6, Fertiliser.Types.NH4N, 10);
          FactorValue N3
            Operations
              1991-01-02  Fertiliser.Apply(53.3, Fertiliser.Types.NH4N, 10);
              1991-01-02  Fertiliser.Apply(53.3, Fertiliser.Types.NH4N, 10);
              1991-01-02  Fertiliser.Apply(53.3, Fertiliser.Types.NH4N, 10);
              1992-01-02  Fertiliser.Apply(53.3, Fertiliser.Types.NH4N, 10);
              1992-01-02  Fertiliser.Apply(53.3, Fertiliser.Types.NH4N, 10);
              1992-01-02  Fertiliser.Apply(53.3, Fertiliser.Types.NH4N, 10);
              1993-01-02  Fertiliser.Apply(53.3, Fertiliser.Types.NH4N, 10);
              1993-01-02  Fertiliser.Apply(53.3, Fertiliser.Types.NH4N, 10);
              1993-01-02  Fertiliser.Apply(53.3, Fertiliser.Types.NH4N, 10);
              1994-01-02  Fertiliser.Apply(53.3, Fertiliser.Types.NH4N, 10);
              1994-01-02  Fertiliser.Apply(53.3, Fertiliser.Types.NH4N, 10);
              1994-01-02  Fertiliser.Apply(53.3, Fertiliser.Types.NH4N, 10);
              1995-01-02  Fertiliser.Apply(53.3, Fertiliser.Types.NH4N, 10);
              1995-01-02  Fertiliser.Apply(53.3, Fertiliser.Types.NH4N, 10);
              1995-01-02  Fertiliser.Apply(53.3, Fertiliser.Types.NH4N, 10);
              1996-01-02  Fertiliser.Apply(53.3, Fertiliser.Types.NH4N, 10);
              1996-01-02  Fertiliser.Apply(53.3, Fertiliser.Types.NH4N, 10);
              1996-01-02  Fertiliser.Apply(53.3, Fertiliser.Types.NH4N, 10);
              1997-01-02  Fertiliser.Apply(53.3, Fertiliser.Types.NH4N, 10);
              1997-01-02  Fertiliser.Apply(53.3, Fertiliser.Types.NH4N, 10);
              1997-01-02  Fertiliser.Apply(53.3, Fertiliser.Types.NH4N, 10);
              1998-01-02  Fertiliser.Apply(53.3, Fertiliser.Types.NH4N, 10);
              1998-01-02  Fertiliser.Apply(53.3, Fertiliser.Types.NH4N, 10);
              1998-01-02  Fertiliser.Apply(53.3, Fertiliser.Types.NH4N, 10);
              1999-01-02  Fertiliser.Apply(53.3, Fertiliser.Types.NH4N, 10);
              1999-01-02  Fertiliser.Apply(53.3, Fertiliser.Types.NH4N, 10);
              1999-01-02  Fertiliser.Apply(53.3, Fertiliser.Types.NH4N, 10);
              2000-01-02  Fertiliser.Apply(53.3, Fertiliser.Types.NH4N, 10);
              2000-01-02  Fertiliser.Apply(53.3, Fertiliser.Types.NH4N, 10);
              2000-01-02  Fertiliser.Apply(53.3, Fertiliser.Types.NH4N, 10);
              2001-01-02  Fertiliser.Apply(53.3, Fertiliser.Types.NH4N, 10);
              2001-01-02  Fertiliser.Apply(53.3, Fertiliser.Types.NH4N, 10);
              2001-01-02  Fertiliser.Apply(53.3, Fertiliser.Types.NH4N, 10);
              2002-01-02  Fertiliser.Apply(53.3, Fertiliser.Types.NH4N, 10);
              2002-01-02  Fertiliser.Apply(53.3, Fertiliser.Types.NH4N, 10);
              2002-01-02  Fertiliser.Apply(53.3, Fertiliser.Types.NH4N, 10);
              2003-01-02  Fertiliser.Apply(53.3, Fertiliser.Types.NH4N, 10);
              2003-01-02  Fertiliser.Apply(53.3, Fertiliser.Types.NH4N, 10);
              2003-01-02  Fertiliser.Apply(53.3, Fertiliser.Types.NH4N, 10);
              2004-01-02  Fertiliser.Apply(53.3, Fertiliser.Types.NH4N, 10);
              2004-01-02  Fertiliser.Apply(53.3, Fertiliser.Types.NH4N, 10);
              2004-01-02  Fertiliser.Apply(53.3, Fertiliser.Types.NH4N, 10);
              2005-01-02  Fertiliser.Apply(53.3, Fertiliser.Types.NH4N, 10);
              2005-01-02  Fertiliser.Apply(53.3, Fertiliser.Types.NH4N, 10);
              2005-01-02  Fertiliser.Apply(53.3, Fertiliser.Types.NH4N, 10);
              2006-01-02  Fertiliser.Apply(53.3, Fertiliser.Types.NH4N, 10);
              2006-01-02  Fertiliser.Apply(53.3, Fertiliser.Types.NH4N, 10);
              2006-01-02  Fertiliser.Apply(53.3, Fertiliser.Types.NH4N, 10);
              2007-01-02  Fertiliser.Apply(53.3, Fertiliser.Types.NH4N, 10);
              2007-01-02  Fertiliser.Apply(53.3, Fertiliser.Types.NH4N, 10);
              2007-01-02  Fertiliser.Apply(53.3, Fertiliser.Types.NH4N, 10);
              2008-01-02  Fertiliser.Apply(53.3, Fertiliser.Types.NH4N, 10);
              2008-01-02  Fertiliser.Apply(53.3, Fertiliser.Types.NH4N, 10);
              2008-01-02  Fertiliser.Apply(53.3, Fertiliser.Types.NH4N, 10);
      Simulation Base504
        WeatherFile: FileName=..\WeatherFiles\Sagarai.met
        Clock: StartDate=1991-03-01; EndDate=2008-12-31
        Summary
        Zone Field: Area=1; Slope=0
          Fertiliser
          SurfaceOrganicMatter SurfaceOM: same as Sangara.Sangara.Base324.Field.SurfaceOM
          Soil: SoilType=Alluvial Clay; Site=Sagarai Estate; NearestTown=Alotau; Region=Milne Bay Province; Latitude=0; Longitude=0
            Water
              Thickness  BD    AirDry  LL15  DUL   SAT
              100        0.89  0.13    0.43  0.63  0.66
              200        0.99  0.13    0.43  0.58  0.62
              300        0.99  0.13    0.42  0.58  0.62
              300        1.13  0.13    0.44  0.54  0.57
              300        1.13  0.13    0.44  0.54  0.57
              300        1.13  0.13    0.44  0.54  0.57
              500        1.13  0.13    0.44  0.54  0.57
              500        1.13  0.13    0.44  0.54  0.57
              500        1.13  0.13    0.44  0.54  0.57
              SoilCrop OilPalm: LL=[0.43, 0.43, 0.42, 0.44, 0.44, 0.44, 0.44, 0.44, 0.44]; KL=[0.03, 0.02, 0.015, 0.01, 0.01, 0.01, 0.01, 0.01, 0.01]; XF=[1, 1, 1, 1, 1, 1, 1, 1, 0]
            SoilWater: min_crit_temp=5; max_crit_temp=35; max_albedo=0.23; A_to_evap_fact=0.44; canopy_eos_coef=1.7; sw_top_crit=0.9; sumes1_max=100; sumes2_max=25; solute_flow_eff=[1]; solute_flux_eff=[1]; gravity_gradient=2E-05; specific_bd=2.65; hydrol_effective_depth=450; immobile_solutes=[nh4]; canopy_fact=[1, 1, 0, 0]; canopy_fact_height=[0, 600, 1800, 30000]; canopy_fact_default=0.5; act_evap_method=ritchie; irrigation_will_runoff=false; irrigation_layer=0; SummerCona=5; SummerU=5; SummerDate=1-Nov; WinterCona=5; WinterU=5; WinterDate=1-Apr; DiffusConst=40; DiffusSlope=16; Salb=0.18; slope=0; discharge_width=0; catchment_area=0; max_pond=0; CN2Bare=75; CNRed=20; CNCov=0.8; Thickness=[100, 200, 300, 300, 300, 3800]; SWCON=[0.55, 0.55, 0.55, 0.55, 0.55, 0.55]; KLAT=[0, 0, 0, 0, 0, 0, 0, 0, 0]
              mobile_solutes=[no3, urea, cl, br, org_n, org_c_pool1, org_c_pool2, org_c_pool3]
            SoilNitrogen: fom_type=[default, manure, mucuna, lablab, shemp, stable]; fract_carb=[0.2, 0.3, 0.54, 0.57, 0.45, 0]; fract_cell=[0.7, 0.3, 0.37, 0.37, 0.47, 0.1]; fract_lign=[0.1, 0.4, 0.09, 0.06, 0.08, 0.9]; wfpsN2N2O_x=[22, 88]; wfpsN2N2O_y=[0.1, 1]
              oc=[4.47413, 2.53868, 1.7333, 0.949261, 0.883456, 0.736231, 0.57415, 0.490354, 0.483233]
            SoilOrganicMatter: RootCN=30; RootWt=3000; SoilCN=12; EnrACoeff=7.4; EnrBCoeff=0.2; OCUnits=Total
              Thickness  OC         FBiom  FInert
              200        4.12501    0.08   0.32
              200        2.94865    0.06   0.44
              200        1.43929    0.04   0.9
              200        0.999028   0.02   0.99
              200        0.835933   0.02   0.99
              200        0.900267   0.02   0.99
              200        0.738828   0.02   0.99
              200        0.7157782  0.02   0.99
              200        0.5792     0.02   0.99
              200        0.484944   0.02   0.99
              1000       0.485      0.02   0.99
            Analysis: Thickness=[200, 200, 200, 200, 200, 200, 200, 200, 200, 200, 1000]; PHUnits=Water; BoronUnits=HotWater
              PH=[6.61912, 6.905, 6.05353, 6.75754, 6.37397, 6.90088, 6.90139, 6.87045, 7.00166, 7.08576, 7.08576]
            InitialWater Initial water: PercentMethod=EvenlyDistributed; FractionFull=1
            Sample Initial nitrogen: NO3Units=kgha; NH4Units=ppm; SWUnits=Volumetric; OCUnits=Total; PHUnits=Water
              Thickness  NO3  NH4
              100        217  0
              200        30   0
              300        5    0
              300        5    0
              300        0    0
              300        0    0
          Report AnnualOutput
            VariableNames:
              [Clock].Today
              [OilPalm].Age
              [Calculations].Script.AnnualFronds
              [Calculations].Script.AnnualBunches
              [Calculations].Script.AnnualYield
              [Calculations].Script.AnnualBunchSize
          Report MonthlyOutput
            VariableNames:
              [Clock].Today.Year
              [Clock].Today
              [Clock].Today.Month
              [OilPalm].Age
              [Calculations].Script.MonthlyPalmBunches
              [Calculations].Script.MonthlyPalmYield
              [Calculations].Script.MonthlyPalmBunchSize
              [OilPalm].LAI
              [OilPalm].StemMass
              [Soil].SoilNitrogen.oc
              [Soil].SoilNitrogen.carbon_tot
              [Soil].SoilNitrogen.nit_tot
              [Calculations].Script.surfaceom_wt_oilpalmstem
              [Calculations].Script.MonthlyDenit
              [Calculations].Script.MonthlyN2O
              [Soil].NO3
              [Calculations].Script.MonthlyLeach
              [Calculations].Script.MonthlyFixation
              [Calculations].Script.SurfaceNO3
              [Calculations].Script.RootZoneNO3
              [Calculations].Script.MonthlyN2
              [Calculations].Script.SoilCtpha
          MicroClimate: same as Sangara.Sangara.Base324.Field.MicroClimate.MicroClimate
          Operations: same as Sagarai.Sagarai.Factors.Operations.N0.operations
          OilPalm: plant_status=out; cover_tot=0.9; UnderstoryLegumeFraction=1; UnderstoryRootDepth=500; UnderstoryFW=1; UnderstoryCoverMax=0.4
            zero: height, UnderstoryCoverGreen, UnderstoryPEP, UnderstoryEP, UnderstoryDltDM, InterceptionFraction, PEP, EP, FW, Fn, DefoliationFraction
            SowingData={Cultivar=Dami, Population=0.0127, Depth=200, RowSpacing=150, MaxCover=1, BudNumber=1, CropClass=Plant, SkipRow=0, SkipPlant=0}
            Constant cover_tot: Value=0.9
            Constant height: Value=10000
            VariableReference UnderstoryCoverMax
            VariableReference UnderstoryLegumeFraction
            Constant InterceptionFraction: Value=0
            Constant InitialRootDepth: Value=300
            Constant MaximumRootDepth: Value=5000
            Constant KNO3: Value=0.02
            Constant RootFraction: Value=0.1
            Constant RootNConcentration: Value=0.39
            Constant RootSenescenceRate: Value=0.001
            Constant InitialFrondNumber: Value=5
            AirTemperatureFunction RelativeDevelopmentalRate
              XYPairs: X=[13, 32, 35, 46]; Y=[0, 1, 1, 0]
            LinearInterpolationFunction FrondAppRate: XProperty=[OilPalm].Age
              XYPairs: X=[0, 2, 5, 10, 15]; Y=[5.25, 5.25, 7.725, 10.1, 10.1]
            Constant ExpandingFronds: Value=5
            Constant FrondMaximumNConcentration: Value=1.15
            Constant FrondCriticalNConcentration: Value=1.1
            Constant FrondMinimumNConcentration: Value=0.5
            SplineInterpolationFunction FrondMaxArea: XProperty=[OilPalm].Age
              XYPairs: X=[0, 2, 4.5, 8.5, 14]; Y=[0.1, 1, 7, 12, 14]
            LinearInterpolationFunction BunchSizeMax: XProperty=[OilPalm].Age
              XYPairs: X=[0, 2, 6, 10, 14]; Y=[53, 265, 7000, 11600, 12750]
            LinearInterpolationFunction HarvestFrondNumber: XProperty=[OilPalm].Age
              XYPairs: X=[0, 6, 10]; Y=[50, 40, 33]
            LinearInterpolationFunction FemaleFlowerFraction: XProperty=[OilPalm].Age
              XYPairs: X=[0, 4, 6, 8, 10]; Y=[0.8, 0.8, 0.8, 0.8, 0.8]
            LinearInterpolationFunction FFFStressImpact: XProperty=[OilPalm].CarbonStress
              XYPairs: X=[0, 1]; Y=[0.06, 0]
            LinearInterpolationFunction StemToFrondFraction: XProperty=[OilPalm].Age
              XYPairs: X=[0, 4, 7, 12]; Y=[0, 0.15, 0.25, 0.25]
            LinearInterpolationFunction StemNConcentration: XProperty=[OilPalm].Age
              XYPairs: X=[0, 8.5]; Y=[1.37, 0.351]
            Constant BunchOilConversionFactor: Value=1.55
            Constant RipeBunchWaterContent: Value=0.47
            Constant BunchNConcentration: Value=0.603
            LinearInterpolationFunction SpecificLeafArea: XProperty=[OilPalm].Age
              XYPairs: X=[1, 5, 13]; Y=[0.003, 0.003, 0.003]
            LinearInterpolationFunction SpecificLeafAreaMax: XProperty=[OilPalm].Age
              XYPairs: X=[1, 5, 13]; Y=[0.0035, 0.0035, 0.0035]
            LinearInterpolationFunction FlowerAbortionFraction: XProperty=[OilPalm].CarbonStress
              XYPairs: X=[0, 1]; Y=[0.15, 0]
            LinearInterpolationFunction BunchFailureFraction: XProperty=[OilPalm].CarbonStress
              XYPairs: X=[0, 1]; Y=[0.15, 0]
            LinearInterpolationFunction DirectExtinctionCoeff: XProperty=[OilPalm].Population
              XYPairs: X=[0.0056, 0.0186]; Y=[0.175, 0.35]
            LinearInterpolationFunction DiffuseExtinctionCoeff: XProperty=[OilPalm].Population
              XYPairs: X=[0.0056, 0.0186]; Y=[0.225, 0.45]
            Constant RUE: Value=1.22
            Constant RootFrontVelocity: Value=30
          Irrigation
          Manager ReportMonthly
            script: same as in Sangara.Sangara.Base324.Field.ReportMonthly
          Manager ReportAnnually
            script: same as in Sangara.Sangara.Base324.Field.ReportAnnually
          Manager Palm Management
            sowing_date = 1991-03-01
            population = 127
            cultivar = Dami
            sowing_depth = 200
            Plant_population = 0
```csharp
using System;
using Models.Core;
using Models.PMF;
using Models.PMF.OilPalm;
namespace Models
{
	[Serializable]
	[System.Xml.Serialization.XmlInclude(typeof(Model))]
	public class Script : Model
	{
		[Link] Clock Clock;
		[Link] OilPalm oilPalm;
		[Link] Summary Summary;
		
		[Description("Sowing date")]
		public DateTime sowing_date {get; set;}
		
		[Description("Plant population /ha")]
		public double population {get; set;}


		[Description("Cultivar")]
		public string cultivar {get; set;}

		[Description("Sowing depth (mm)")]
		public double sowing_depth {get; set;}
		
		public double Plant_population {get;set;}
		
		private byte HarvestCounter = 1;

		public override void OnSimulationCommencing()
		{
		    Plant_population = 0;
		}
		
		[EventSubscribe("DoManagement")]
		private void OnDoManagement(object sender, EventArgs e)
		{
			// Add Trunk from previous plantation
			//surface organic matter' add_surfaceom type=OilPalm, name=trunk, mass=63000, cnr=133, cpr=200
			
			if (Clock.Today.Date == sowing_date)
			{
			    oilPalm.Sow(Population: population / 10000, Cultivar:cultivar, Depth:sowing_depth);
			}
			
			if (HarvestCounter == 14)
			{
				oilPalm.Harvest();
				HarvestCounter = 1;
			}
			
			HarvestCounter++;
		}
	}
}
```
          Manager Calculations
            Offset = 317
            AnnualFronds = 9
            AnnualBunches = 2.57515
            BunchOffset = 137.704
            AnnualYield = 3.11363
            AnnualBunchSize = 32496.3
            YieldOffset = 6551.12
            MonthlyPalmYield = 4.70342
            MonthlyPalmBunches = 0.8
            MonthlyPalmBunchSize = 5.87927
            MonthlyDenit = 0.0373018
            MonthlyN2O = 0.00681742
            MonthlyN2 = 0.0304844
            MonthlyFixation = 0
            SurfaceNO3 = 3.94205
            RootZoneNO3 = 5.39252
            MonthlyLeach = 0.00267348
            SoilCtpha = 6.59449
            surfaceom_wt_oilpalmstem = 4.28234e-10
            OilPalmYield = 0
            TotalNO3 = 5.42843
```csharp
using System;
using Models.Core;
using Models.PMF;
using Models.PMF.OilPalm;
using Models.Soils;
using Models.SurfaceOM;

namespace Models
{
	[Serializable]
	[System.Xml.Serialization.XmlInclude(typeof(Model))]
	public class Script : Model
	{
		[Link] Clock Clock;
		[Link] OilPalm oilPalm;
		[Link] Soil Soil;
		[Link] SurfaceOrganicMatter SurfaceOM;
		[Link] Summary Summary;
		
		public double Offset {get; set;}
		public double AnnualFronds {get; set;}
		public double AnnualBunches {get; set;}
		public double BunchOffset {get; set;}
		public double AnnualYield {get; set;}
		public double AnnualBunchSize {get; set;}
		public double YieldOffset {get; set;}
		public double MonthlyPalmYield {get; set;}
		public double MonthlyPalmBunches {get; set;}
		public double MonthlyPalmBunchSize {get; set;}
		public double MonthlyDenit {get; set;}
		public double MonthlyN2O {get; set;}
		public double MonthlyN2 {get; set;}
		public double MonthlyFixation {get; set;}
		public double SurfaceNO3 {get; set;}
		public double RootZoneNO3 {get; set;}
		public double MonthlyLeach {get; set;}
		public double SoilCtpha {get; set;}
		public double surfaceom_wt_oilpalmstem {get; set;}
	    public double OilPalmYield {get; set;}
	    public double TotalNO3 {get; set;}
		
		public override void OnSimulationCommencing()
		{	
			Offset = 0;
			OilPalmYield = 0;
			AnnualFronds = 0;
			AnnualBunches = 0;
			AnnualBunchSize = 0;
			BunchOffset = 0;
			AnnualYield = 0;
			YieldOffset = 0;
			MonthlyPalmYield = 0;
			MonthlyPalmBunches = 0;
			MonthlyPalmBunchSize = 0;
			MonthlyDenit = 0;
			MonthlyN2O = 0;
			MonthlyN2 = 0;
			MonthlyFixation = 0;
			SurfaceNO3 = 0;
			RootZoneNO3 = 0;
			MonthlyLeach = 0;
			SoilCtpha = 0;
			surfaceom_wt_oilpalmstem = 0;
		}
		
		[EventSubscribe("DoDailyInitialisation")]
		private void OnDoDailyInitialisation(object sender, EventArgs e)
		{			
			if (Clock.Today.Day == 1)
			{
			   MonthlyPalmYield = 0;
			   MonthlyPalmBunches = 0;
			   MonthlyPalmBunchSize = 0;
			   MonthlyDenit = 0;
			   MonthlyN2O = 0;
			   MonthlyN2 = 0;
			   MonthlyFixation = 0;
			   MonthlyLeach = 0;
			}
		}
		
	   [EventSubscribe("DoHarvest")]
	   private void OnDoHarvest(object sender, EventArgs e)
	   {
	   	   AnnualYield += oilPalm.HarvestFFB;
	   }
		
       [EventSubscribe("DoManagementCalculations")]
       private void DoManagementCalculations(object sender, EventArgs e)
		{

			if (oilPalm.IsCropInGround)
			{
				if (Clock.Today.DayOfYear == 1)
				{
				   Offset = oilPalm.CumulativeFrondNumber;
				   BunchOffset = oilPalm.CumulativeBunchNumber;
				   YieldOffset = oilPalm.CumulativeYield;
				   AnnualYield = 0;
				   AnnualBunchSize = 0;
				}
				
				if ((Clock.Today.Year % 4 == 0 && Clock.Today.DayOfYear == 366) || (Clock.Today.Year % 4 != 0 && Clock.Today.DayOfYear == 365))
				{
					AnnualFronds = oilPalm.CumulativeFrondNumber - Offset;		
					//AnnualBunches = oilPalm.CumulativeBunchNumber - BunchOffset;
				}
			}

			MonthlyDenit = MonthlyDenit + Utility.Math.Sum(Soil.SoilNitrogen.dnit);
			MonthlyN2O = MonthlyN2O + Utility.Math.Sum(Soil.SoilNitrogen.n2o_atm);
			MonthlyN2 = MonthlyDenit - MonthlyN2O;
			SurfaceNO3  = Soil.SoilNitrogen.no3[0] + Soil.SoilNitrogen.no3[1] + Soil.SoilNitrogen.no3[2];
			RootZoneNO3 = Soil.SoilNitrogen.no3[0] + Soil.SoilNitrogen.no3[1] + Soil.SoilNitrogen.no3[2]
			            + Soil.SoilNitrogen.no3[3] + Soil.SoilNitrogen.no3[4] + Soil.SoilNitrogen.no3[4]
			            + Soil.SoilNitrogen.no3[6] + Soil.SoilNitrogen.no3[7] + Soil.SoilNitrogen.no3[8];
			MonthlyFixation = MonthlyFixation + oilPalm.UnderstoryNFixation;
			MonthlyLeach = MonthlyLeach + Soil.SoilWater.LeachNO3;
			SoilCtpha = Utility.Math.Sum(Soil.SoilNitrogen.carbon_tot) / 1000;
			surfaceom_wt_oilpalmstem = SurfaceOM.GetWeightFromPool("oilpalmstem");
			TotalNO3 = Utility.Math.Sum(Soil.SoilNitrogen.no3);

		}
		
		[EventSubscribe("Harvesting")]
		private void OnHarvesting(object sender, EventArgs e)
		{
			MonthlyPalmYield = MonthlyPalmYield + oilPalm.HarvestBunchSize * oilPalm.HarvestBunches / 1000;
			MonthlyPalmBunches = MonthlyPalmBunches + oilPalm.HarvestBunches;
			if (MonthlyPalmBunches > 0)
			   MonthlyPalmBunchSize = MonthlyPalmYield / MonthlyPalmBunches;
			else
			   MonthlyPalmBunchSize = 0;
			   
			AnnualYield += oilPalm.HarvestFFB;
			AnnualBunches += oilPalm.CumulativeBunchNumber - BunchOffset;
						if (AnnualBunches > 0)
				AnnualBunchSize = AnnualYield * 1000 / AnnualBunches / (oilPalm.Population * 10000);
		}
	}
}
```
  Folder Hargy
    Experiment Hargy
      Factors
        Factor Operations: Paths=[operations]
          FactorValue N0
            Operations
              1998-04-01  Fertiliser.Apply(36.7, Fertiliser.Types.UreaN, 10);
              1998-06-01  Fertiliser.Apply(36.7, Fertiliser.Types.UreaN, 10);
              1998-08-01  Fertiliser.Apply(36.7, Fertiliser.Types.UreaN, 10);
              1999-04-01  Fertiliser.Apply(36.7, Fertiliser.Types.UreaN, 10);
              1999-06-01  Fertiliser.Apply(36.7, Fertiliser.Types.UreaN, 10);
              1999-08-01  Fertiliser.Apply(36.7, Fertiliser.Types.UreaN, 10);
              2000-04-01  Fertiliser.Apply(36.7, Fertiliser.Types.UreaN, 10);
              2000-06-01  Fertiliser.Apply(36.7, Fertiliser.Types.UreaN, 10);
              2000-08-01  Fertiliser.Apply(36.7, Fertiliser.Types.UreaN, 10);
              2001-04-01  Fertiliser.Apply(36.7, Fertiliser.Types.UreaN, 10);
              2001-06-01  Fertiliser.Apply(36.7, Fertiliser.Types.UreaN, 10);
              2001-08-01  Fertiliser.Apply(36.7, Fertiliser.Types.UreaN, 10);
          FactorValue N1
            Operations
              1998-04-01  Fertiliser.Apply(36.7, Fertiliser.Types.UreaN, 10);
              1998-06-01  Fertiliser.Apply(36.7, Fertiliser.Types.UreaN, 10);
              1998-08-01  Fertiliser.Apply(36.7, Fertiliser.Types.UreaN, 10);
              1999-04-01  Fertiliser.Apply(36.7, Fertiliser.Types.UreaN, 10);
              1999-06-01  Fertiliser.Apply(36.7, Fertiliser.Types.UreaN, 10);
              1999-08-01  Fertiliser.Apply(36.7, Fertiliser.Types.UreaN, 10);
              2000-04-01  Fertiliser.Apply(36.7, Fertiliser.Types.UreaN, 10);
              2000-06-01  Fertiliser.Apply(36.7, Fertiliser.Types.UreaN, 10);
              2000-08-01  Fertiliser.Apply(36.7, Fertiliser.Types.UreaN, 10);
              2001-04-01  Fertiliser.Apply(36.7, Fertiliser.Types.UreaN, 10);
              2001-06-01  Fertiliser.Apply(36.7, Fertiliser.Types.UreaN, 10);
              2001-08-01  Fertiliser.Apply(36.7, Fertiliser.Types.UreaN, 10);
              2000-06-01  Fertiliser.Apply(70, Fertiliser.Types.NH4NO3N, 10);
              2000-12-01  Fertiliser.Apply(70, Fertiliser.Types.NH4NO3N, 10);
              2001-06-01  Fertiliser.Apply(70, Fertiliser.Types.NH4NO3N, 10);
              2001-12-01  Fertiliser.Apply(70, Fertiliser.Types.NH4NO3N, 10);
              2002-06-01  Fertiliser.Apply(70, Fertiliser.Types.NH4NO3N, 10);
              2002-12-01  Fertiliser.Apply(70, Fertiliser.Types.NH4NO3N, 10);
              2003-06-01  Fertiliser.Apply(70, Fertiliser.Types.NH4NO3N, 10);
              2003-12-01  Fertiliser.Apply(70, Fertiliser.Types.NH4NO3N, 10);
              2004-06-01  Fertiliser.Apply(70, Fertiliser.Types.NH4NO3N, 10);
              2004-12-01  Fertiliser.Apply(70, Fertiliser.Types.NH4NO3N, 10);
              2005-06-01  Fertiliser.Apply(70, Fertiliser.Types.NH4NO3N, 10);
              2005-12-01  Fertiliser.Apply(70, Fertiliser.Types.NH4NO3N, 10);
              2006-06-01  Fertiliser.Apply(70, Fertiliser.Types.NH4NO3N, 10);
              2006-12-01  Fertiliser.Apply(70, Fertiliser.Types.NH4NO3N, 10);
              2007-06-01  Fertiliser.Apply(70, Fertiliser.Types.NH4NO3N, 10);
              2007-12-01  Fertiliser.Apply(70, Fertiliser.Types.NH4NO3N, 10);
              2008-06-01  Fertiliser.Apply(70, Fertiliser.Types.NH4NO3N, 10);
              2008-12-01  Fertiliser.Apply(70, Fertiliser.Types.NH4NO3N, 10);
              2009-06-01  Fertiliser.Apply(70, Fertiliser.Types.NH4NO3N, 10);
              2009-12-01  Fertiliser.Apply(70, Fertiliser.Types.NH4NO3N, 10);
          FactorValue N2
            Operations
              1998-04-01  Fertiliser.Apply(36.7, Fertiliser.Types.UreaN, 10);
              1998-06-01  Fertiliser.Apply(36.7, Fertiliser.Types.UreaN, 10);
              1998-08-01  Fertiliser.Apply(36.7, Fertiliser.Types.UreaN, 10);
              1999-04-01  Fertiliser.Apply(36.7, Fertiliser.Types.UreaN, 10);
              1999-06-01  Fertiliser.Apply(36.7, Fertiliser.Types.UreaN, 10);
              1999-08-01  Fertiliser.Apply(36.7, Fertiliser.Types.UreaN, 10);
              2000-04-01  Fertiliser.Apply(36.7, Fertiliser.Types.UreaN, 10);
              2000-06-01  Fertiliser.Apply(36.7, Fertiliser.Types.UreaN, 10);
              2000-08-01  Fertiliser.Apply(36.7, Fertiliser.Types.UreaN, 10);
              2001-04-01  Fertiliser.Apply(36.7, Fertiliser.Types.UreaN, 10);
              2001-06-01  Fertiliser.Apply(36.7, Fertiliser.Types.UreaN, 10);
              2001-08-01  Fertiliser.Apply(36.7, Fertiliser.Types.UreaN, 10);
              2000-06-01  Fertiliser.Apply(140, Fertiliser.Types.NH4NO3N, 10);
              2000-12-01  Fertiliser.Apply(140, Fertiliser.Types.NH4NO3N, 10);
              2001-06-01  Fertiliser.Apply(140, Fertiliser.Types.NH4NO3N, 10);
              2001-12-01  Fertiliser.Apply(140, Fertiliser.Types.NH4NO3N, 10);
              2002-06-01  Fertiliser.Apply(140, Fertiliser.Types.NH4NO3N, 10);
              2002-12-01  Fertiliser.Apply(140, Fertiliser.Types.NH4NO3N, 10);
              2003-06-01  Fertiliser.Apply(140, Fertiliser.Types.NH4NO3N, 10);
              2003-12-01  Fertiliser.Apply(140, Fertiliser.Types.NH4NO3N, 10);
              2004-06-01  Fertiliser.Apply(140, Fertiliser.Types.NH4NO3N, 10);
              2004-12-01  Fertiliser.Apply(140, Fertiliser.Types.NH4NO3N, 10);
              2005-06-01  Fertiliser.Apply(140, Fertiliser.Types.NH4NO3N, 10);
              2005-12-01  Fertiliser.Apply(140, Fertiliser.Types.NH4NO3N, 10);
              2006-06-01  Fertiliser.Apply(140, Fertiliser.Types.NH4NO3N, 10);
              2006-12-01  Fertiliser.Apply(140, Fertiliser.Types.NH4NO3N, 10);
              2007-06-01  Fertiliser.Apply(140, Fertiliser.Types.NH4NO3N, 10);
              2007-12-01  Fertiliser.Apply(140, Fertiliser.Types.NH4NO3N, 10);
              2008-06-01  Fertiliser.Apply(140, Fertiliser.Types.NH4NO3N, 10);
              2008-12-01  Fertiliser.Apply(140, Fertiliser.Types.NH4NO3N, 10);
              2009-06-01  Fertiliser.Apply(140, Fertiliser.Types.NH4NO3N, 10);
              2009-12-01  Fertiliser.Apply(140, Fertiliser.Types.NH4NO3N, 10);
      Simulation Base212
        WeatherFile: FileName=..\WeatherFiles\Hargy.met
        Clock: StartDate=1996-02-01; EndDate=2009-12-31
        Summary
        Zone Field: Area=1; Slope=0
          Fertiliser
          SurfaceOrganicMatter SurfaceOM: same as Sangara.Sangara.Base324.Field.SurfaceOM
          Soil: SoilType=Volcanic Ash; Site=Hargy Estate; NearestTown=Bialla; Region=West New Britain Province; Latitude=0; Longitude=0
            Water
              Thickness  BD    AirDry  LL15  DUL   SAT
              100        0.7   0.05    0.3   0.54  0.68
              200        0.75  0.05    0.4   0.61  0.68
              300        1.2   0.05    0.23  0.43  0.51
              300        1.2   0.05    0.23  0.43  0.51
              300        1.2   0.05    0.23  0.43  0.51
              800        1.2   0.05    0.23  0.43  0.51
              500        1.2   0.05    0.23  0.43  0.51
              500        1.2   0.05    0.23  0.43  0.51
              500        1.2   0.05    0.23  0.43  0.51
              500        1.2   0.05    0.23  0.43  0.51
              SoilCrop OilPalm
                LL=[0.3, 0.4, 0.23, 0.23, 0.23, 0.23, 0.23, 0.23, 0.23, 0.23]
                KL=[0.04, 0.04, 0.02, 0.02, 0.01, 0.01, 0.01, 0.01, 0.01, 0.01]
                XF=[1, 1, 1, 1, 1, 1, 1, 1, 1, 1]
            SoilWater: min_crit_temp=5; max_crit_temp=35; max_albedo=0.23; A_to_evap_fact=0.44; canopy_eos_coef=1.7; sw_top_crit=0.9; sumes1_max=100; sumes2_max=25; solute_flow_eff=[1]; solute_flux_eff=[1]; gravity_gradient=2E-05; specific_bd=2.65; hydrol_effective_depth=450; immobile_solutes=[nh4]; canopy_fact=[1, 1, 0, 0]; canopy_fact_height=[0, 600, 1800, 30000]; canopy_fact_default=0.5; act_evap_method=ritchie; irrigation_will_runoff=false; irrigation_layer=0; SummerCona=5; SummerU=5; SummerDate=1-Nov; WinterCona=5; WinterU=5; WinterDate=1-Apr; DiffusConst=88; DiffusSlope=35.4; Salb=0.18; slope=0; discharge_width=0; catchment_area=0; max_pond=0; CN2Bare=68; CNRed=20; CNCov=0.8; Thickness=[100, 200, 300, 300, 300, 300]; SWCON=[0.8, 0.8, 0.8, 0.8, 0.8, 0.8]; KLAT=[0, 0, 0, 0, 0, 0, 0, 0, 0, 0]
              mobile_solutes=[no3, urea, cl, br, org_n, org_c_pool1, org_c_pool2, org_c_pool3]
            SoilNitrogen: fom_type=[default, manure, mucuna, lablab, shemp, stable]; fract_carb=[0.2, 0.3, 0.54, 0.57, 0.45, 0]; fract_cell=[0.7, 0.3, 0.37, 0.37, 0.47, 0.1]; fract_lign=[0.1, 0.4, 0.09, 0.06, 0.08, 0.9]; wfpsN2N2O_x=[22, 88]; wfpsN2N2O_y=[0.1, 1]
              oc=[5.38873, 3.49361, 2.49012, 2.30747, 2.19642, 2.19686, 2.20044, 2.20051, 2.20033, 2.20007]
            SoilOrganicMatter: RootCN=30; RootWt=3000; SoilCN=10; EnrACoeff=7.4; EnrBCoeff=0.2; OCUnits=Total
              Thickness  OC   FBiom  FInert
              200        5.3  0.08   0.4
              200        3    0.03   0.75
              400        2.4  0.015  0.95
              3200       2.2  0.01   0.99
            Analysis: Thickness=[100, 100, 100, 300, 300, 600]; PH=[6.3, 6.4, 6.7, 6.8, 6.8, 6.8]; PHUnits=Water; BoronUnits=HotWater
            InitialWater Initial water: PercentMethod=EvenlyDistributed; FractionFull=1
            Sample Initial nitrogen: NO3Units=kgha; NH4Units=ppm; SWUnits=Volumetric; OCUnits=Total; PHUnits=Water
              Thickness  NO3  NH4
              100        217  0
              200        30   0
              300        5    0
              300        5    0
              300        0    0
              300        0    0
          Report AnnualOutput
            VariableNames:
              [Clock].Today
              [OilPalm].Age
              [Calculations].Script.AnnualFronds
              [Calculations].Script.AnnualBunches
              [Calculations].Script.AnnualYield
              [Calculations].Script.AnnualBunchSize
          Report MonthlyOutput: same as Sagarai.Sagarai.Base504.Field.MonthlyOutput
          MicroClimate: same as Sangara.Sangara.Base324.Field.MicroClimate.MicroClimate
          Irrigation
          Operations: same as Hargy.Hargy.Factors.Operations.N0.operations
          OilPalm: plant_status=out; cover_tot=0.9; UnderstoryLegumeFraction=1; UnderstoryRootDepth=300; UnderstoryFW=1; UnderstoryCoverMax=0.4
            zero: height, UnderstoryCoverGreen, UnderstoryPEP, UnderstoryEP, UnderstoryDltDM, InterceptionFraction, PEP, EP, FW, Fn, DefoliationFraction
            SowingData={Cultivar=Dami, Population=0.014, Depth=200, RowSpacing=150, MaxCover=1, BudNumber=1, CropClass=Plant, SkipRow=0, SkipPlant=0}
            Constant cover_tot: Value=0.9
            Constant height: Value=10000
            VariableReference UnderstoryCoverMax
            VariableReference UnderstoryLegumeFraction
            Constant InterceptionFraction: Value=0
            Constant InitialRootDepth: Value=300
            Constant MaximumRootDepth: Value=5000
            Constant KNO3: Value=0.02
            Constant RootFraction: Value=0.1
            Constant RootNConcentration: Value=0.39
            Constant RootSenescenceRate: Value=0.001
            Constant InitialFrondNumber: Value=5
            AirTemperatureFunction RelativeDevelopmentalRate
              XYPairs: X=[13, 32, 35, 46]; Y=[0, 1, 1, 0]
            LinearInterpolationFunction FrondAppRate: XProperty=[OilPalm].Age
              XYPairs: X=[0, 2, 5, 10, 15]; Y=[5.25, 5.25, 7.725, 10.1, 10.1]
            Constant ExpandingFronds: Value=5
            Constant FrondMaximumNConcentration: Value=1.15
            Constant FrondCriticalNConcentration: Value=1.1
            Constant FrondMinimumNConcentration: Value=0.5
            SplineInterpolationFunction FrondMaxArea: XProperty=[OilPalm].Age
              XYPairs: X=[0, 2, 4.5, 8.5, 14]; Y=[0.1, 1, 7, 12, 14]
            LinearInterpolationFunction BunchSizeMax: XProperty=[OilPalm].Age
              XYPairs: X=[0, 2, 6, 10, 14]; Y=[53, 265, 7000, 11600, 12750]
            LinearInterpolationFunction HarvestFrondNumber: XProperty=[OilPalm].Age
              XYPairs: X=[0, 6, 10]; Y=[50, 40, 33]
            LinearInterpolationFunction FemaleFlowerFraction: XProperty=[OilPalm].Age
              XYPairs: X=[0, 4, 6, 8, 10]; Y=[0.8, 0.8, 0.8, 0.8, 0.8]
            LinearInterpolationFunction FFFStressImpact: XProperty=[OilPalm].CarbonStress
              XYPairs: X=[0, 1]; Y=[0.06, 0]
            LinearInterpolationFunction StemToFrondFraction: XProperty=[OilPalm].Age
              XYPairs: X=[0, 4, 7, 12]; Y=[0, 0.15, 0.25, 0.25]
            LinearInterpolationFunction StemNConcentration: XProperty=[OilPalm].Age
              XYPairs: X=[0, 8.5]; Y=[1.37, 0.351]
            Constant BunchOilConversionFactor: Value=1.55
            Constant RipeBunchWaterContent: Value=0.47
            Constant BunchNConcentration: Value=0.603
            LinearInterpolationFunction SpecificLeafArea: XProperty=[OilPalm].Age
              XYPairs: X=[1, 5, 13]; Y=[0.003, 0.003, 0.003]
            LinearInterpolationFunction SpecificLeafAreaMax: XProperty=[OilPalm].Age
              XYPairs: X=[1, 5, 13]; Y=[0.0035, 0.0035, 0.0035]
            LinearInterpolationFunction FlowerAbortionFraction: XProperty=[OilPalm].CarbonStress
              XYPairs: X=[0, 1]; Y=[0.15, 0]
            LinearInterpolationFunction BunchFailureFraction: XProperty=[OilPalm].CarbonStress
              XYPairs: X=[0, 1]; Y=[0.15, 0]
            LinearInterpolationFunction DirectExtinctionCoeff: XProperty=[OilPalm].Population
              XYPairs: X=[0.0056, 0.0186]; Y=[0.175, 0.35]
            LinearInterpolationFunction DiffuseExtinctionCoeff: XProperty=[OilPalm].Population
              XYPairs: X=[0.0056, 0.0186]; Y=[0.225, 0.45]
            Constant RUE: Value=1.22
            Constant RootFrontVelocity: Value=30
          Manager ReportMonthly: same as Sagarai.Sagarai.Base504.Field.ReportMonthly
          Manager ReportAnnually: same as Sagarai.Sagarai.Base504.Field.ReportAnnually
          Manager Palm Management
            sowing_date = 1996-03-01
            population = 135
            cultivar = Dami
            sowing_depth = 200
            Plant_population = 0
            script: same as in Sagarai.Sagarai.Base504.Field.Palm Management
          Manager Calculations
            Offset = 317
            AnnualFronds = 9
            AnnualBunches = 2.57515
            BunchOffset = 137.704
            AnnualYield = 3.11363
            AnnualBunchSize = 32496.3
            YieldOffset = 6551.12
            MonthlyPalmYield = 4.70342
            MonthlyPalmBunches = 0.8
            MonthlyPalmBunchSize = 5.87927
            MonthlyDenit = 0.0373018
            MonthlyN2O = 0.00681742
            MonthlyN2 = 0.0304844
            MonthlyFixation = 0
            SurfaceNO3 = 3.94205
            RootZoneNO3 = 5.39252
            MonthlyLeach = 0.00267348
            SoilCtpha = 6.59449
            surfaceom_wt_oilpalmstem = 4.28234e-10
            OilPalmYield = 0
            TotalNO3 = 5.42843
```csharp
using System;
using Models.Core;
using Models.PMF;
using Models.PMF.OilPalm;
using Models.Soils;
using Models.SurfaceOM;

namespace Models
{
	[Serializable]
	[System.Xml.Serialization.XmlInclude(typeof(Model))]
	public class Script : Model
	{
		[Link] Clock Clock;
		[Link] OilPalm oilPalm;
		[Link] Soil Soil;
		[Link] SurfaceOrganicMatter SurfaceOM;
		[Link] Summary Summary;
		
		public double Offset {get; set;}
		public double AnnualFronds {get; set;}
		public double AnnualBunches {get; set;}
		public double BunchOffset {get; set;}
		public double AnnualYield {get; set;}
		public double AnnualBunchSize {get; set;}
		public double YieldOffset {get; set;}
		public double MonthlyPalmYield {get; set;}
		public double MonthlyPalmBunches {get; set;}
		public double MonthlyPalmBunchSize {get; set;}
		public double MonthlyDenit {get; set;}
		public double MonthlyN2O {get; set;}
		public double MonthlyN2 {get; set;}
		public double MonthlyFixation {get; set;}
		public double SurfaceNO3 {get; set;}
		public double RootZoneNO3 {get; set;}
		public double MonthlyLeach {get; set;}
		public double SoilCtpha {get; set;}
		public double surfaceom_wt_oilpalmstem {get; set;}
	    public double OilPalmYield {get; set;}
	    public double TotalNO3 {get; set;}
		
		public override void OnSimulationCommencing()
		{	
			Offset = 0;
			OilPalmYield = 0;
			AnnualFronds = 0;
			AnnualBunches = 0;
			AnnualBunchSize = 0;
			BunchOffset = 0;
			AnnualYield = 0;
			YieldOffset = 0;
			MonthlyPalmYield = 0;
			MonthlyPalmBunches = 0;
			MonthlyPalmBunchSize = 0;
			MonthlyDenit = 0;
			MonthlyN2O = 0;
			MonthlyN2 = 0;
			MonthlyFixation = 0;
			SurfaceNO3 = 0;
			RootZoneNO3 = 0;
			MonthlyLeach = 0;
			SoilCtpha = 0;
			surfaceom_wt_oilpalmstem = 0;
		}
		
		[EventSubscribe("DoDailyInitialisation")]
		private void OnDoDailyInitialisation(object sender, EventArgs e)
		{			
			if (Clock.Today.Day == 1)
			{
			   MonthlyPalmYield = 0;
			   MonthlyPalmBunches = 0;
			   MonthlyPalmBunchSize = 0;
			   MonthlyDenit = 0;
			   MonthlyN2O = 0;
			   MonthlyN2 = 0;
			   MonthlyFixation = 0;
			   MonthlyLeach = 0;
			}
		}
		
	   [EventSubscribe("DoHarvest")]
	   private void OnDoHarvest(object sender, EventArgs e)
	   {
	   	   AnnualYield += oilPalm.HarvestFFB;
	   }
		
       [EventSubscribe("DoManagement")]
       private void OnDoManagement(object sender, EventArgs e)
		{

			if (oilPalm.IsCropInGround)
			{
				if (Clock.Today.DayOfYear == 1)
				{
				   Offset = oilPalm.CumulativeFrondNumber;
				   BunchOffset = oilPalm.CumulativeBunchNumber;
				   YieldOffset = oilPalm.CumulativeYield;
				   AnnualYield = 0;
				   AnnualBunchSize = 0;
				}
				
				if ((Clock.Today.Year % 4 == 0 && Clock.Today.DayOfYear == 366) || (Clock.Today.Year % 4 != 0 && Clock.Today.DayOfYear == 365))
				{
					AnnualFronds = oilPalm.CumulativeFrondNumber - Offset;		
					AnnualBunches = oilPalm.CumulativeBunchNumber - BunchOffset;
				}
			}

			MonthlyDenit = MonthlyDenit + Utility.Math.Sum(Soil.SoilNitrogen.dnit);
			MonthlyN2O = MonthlyN2O + Utility.Math.Sum(Soil.SoilNitrogen.n2o_atm);
			MonthlyN2 = MonthlyDenit - MonthlyN2O;
			SurfaceNO3  = Soil.SoilNitrogen.no3[0] + Soil.SoilNitrogen.no3[1] + Soil.SoilNitrogen.no3[2];
			RootZoneNO3 = Soil.SoilNitrogen.no3[0] + Soil.SoilNitrogen.no3[1] + Soil.SoilNitrogen.no3[2]
			            + Soil.SoilNitrogen.no3[3] + Soil.SoilNitrogen.no3[4] + Soil.SoilNitrogen.no3[4]
			            + Soil.SoilNitrogen.no3[6] + Soil.SoilNitrogen.no3[7] + Soil.SoilNitrogen.no3[8];
			MonthlyFixation = MonthlyFixation + oilPalm.UnderstoryNFixation;
			MonthlyLeach = MonthlyLeach + Soil.SoilWater.LeachNO3;
			SoilCtpha = Utility.Math.Sum(Soil.SoilNitrogen.carbon_tot) / 1000;
			surfaceom_wt_oilpalmstem = SurfaceOM.GetWeightFromPool("oilpalmstem");
			TotalNO3 = Utility.Math.Sum(Soil.SoilNitrogen.no3);

		}
		
		[EventSubscribe("Harvesting")]
		private void OnHarvesting(object sender, EventArgs e)
		{
			MonthlyPalmYield = MonthlyPalmYield + oilPalm.HarvestBunchSize * oilPalm.HarvestBunches / 1000;
			MonthlyPalmBunches = MonthlyPalmBunches + oilPalm.HarvestBunches;
			if (MonthlyPalmBunches > 0)
			   MonthlyPalmBunchSize = MonthlyPalmYield / MonthlyPalmBunches;
			else
			   MonthlyPalmBunchSize = 0;
			   
			AnnualYield += oilPalm.HarvestFFB;
			if (AnnualBunches > 0)
				AnnualBunchSize = AnnualYield * 1000 / AnnualBunches / (oilPalm.Population * 10000);
		}
	}
}
```
  DataStore
    Input: FileNames=[observed.prn]
    TimeSeriesStats: TableName=PredictedObserved
    PredictedObserved POMonthly: PredictedTableName=MonthlyOutput; ObservedTableName=Input; FieldNameUsedForMatch=Clock.Today
    PredictedObserved POAnnual: PredictedTableName=AnnualOutput; ObservedTableName=Input; FieldNameUsedForMatch=Clock.Today
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