Simulations
  Simulation Rain_Evap_Test: Area=0; Slope=0
    Weather: FileName=%root%\Tests\Pond\Ingham.met
    Clock: StartDate=1990-01-01; EndDate=2000-12-31
    Summary summaryfile
    Zone Pond: Area=1; Slope=0
      PondWater: SurfaceArea=10000; MaxPondDepth=1
      Report: EventNames=[Clock].DoReport
        VariableNames:
          [Clock].Today
          [Weather].Rain as Rain
          [PondWater].PondEvap as PondEvap
          [PondWater].PondDepth as PondDepth
  Simulation Salinity_RainDilute_EvapConcentrate_Test: Area=0; Slope=0
    Weather: FileName=Ingham.met
    Clock: StartDate=1990-01-01; EndDate=2000-12-31
    Summary summaryfile
    Zone Pond: Area=1; Slope=0
      PondWater: SurfaceArea=10000; MaxPondDepth=1
      Folder Manager folder
        Manager Add water on fixed date
          added_date = 01-jan
          volume = 10000
          temperature = 15
          salinity = 5
          ph = 2
          n = 3
          p = 4
          tss = 10
```csharp
using System;
using Models.Core;
using APSIM.Shared.Utilities;
using Models.Aqua;

namespace Models
{
	[Serializable]
	[System.Xml.Serialization.XmlInclude(typeof(Model))]
	public class Script : Model
	{

		[Link] Clock Clock;
		[Link] Summary Summary;
		[Link] PondWater PondWater;
		
		
	    [Description("Add Water on this date (dd-mmm)")]
		public string added_date {get; set;}
		
		[Description("Volume of Water Added (m^3)")]
		public double volume {get; set;}
		
		[Description("Temperature of Water Added (oC)")]
		public double temperature {get; set;}
		
		[Description("Salinity of Water Added (kg/m^3)")]
		public double salinity {get; set;}
		
		[Description("PH of Water Added")]
		public double ph {get; set;}
		
		[Description("Nitrogen of Water Added (kg/m^3)")]
		public double n {get; set;}
	
	    [Description("Phosphorus of Water Added (kg/m^3)")]
		public double p {get; set;}
		
		[Description("Total Suspended Solids of Water Added (kg/m^3)")]
		public double tss {get; set;}


        
       [EventSubscribe("StartOfSimulation")]
		private void OnStartOfSimulation(object sender, EventArgs e)
		{
		}
        
        
        
		[EventSubscribe("StartOfDay")]
		private void OnStartOfDay(object sender, EventArgs e)
		{

        if (DateUtilities.DatesEqual(added_date, Clock.Today))
			{
			WaterProperties addedProps = new WaterProperties(temperature, salinity, ph, n, p, tss);
			PondWater.Fill(Volume: volume, WaterProperties: addedProps);
			}

		}
      
	}
}
```
      Report: EventNames=[Clock].DoReport
        VariableNames:
          [Clock].Today
          [Weather].Rain as Rain
          [PondWater].PondEvap as PondEvap
          [PondWater].PondDepth as PondDepth
          [PondWater].PondTemp as PondTemp
          [PondWater].Salinity as Salinity
          [PondWater].PH as PH
          [PondWater].N as N
          [PondWater].P as P
          [PondWater].TSS as TSS
  Simulation MixingTest: Area=0; Slope=0
    Weather: FileName=%root%\Tests\Pond\Ingham.met
    Clock: StartDate=1990-01-01; EndDate=2000-12-31
    Summary summaryfile
    Zone PrawnPond: Area=1; Slope=0
      PondWater: SurfaceArea=10000; MaxPondDepth=1
      Folder Manager folder
        Manager Add water to PrawnPond on fixed date: same as Salinity_RainDilute_EvapConcentrate_Test.Pond.Manager folder.Add water on fixed date
      Report: EventNames=[Clock].DoReport
        VariableNames:
          [Clock].Today
          [Weather].Rain as Rain
          PondWater.PondEvap as P_PondEvap
          PondWater.PondDepth as P_PondDepth
          PondWater.PondTemp as P_PondTemp
          PondWater.Salinity as P_Salinity
          PondWater.PH as P_PH
          PondWater.N as P_N
          PondWater.P as P_P
          PondWater.TSS as P_TSS
    Zone SettlingPond: Area=1; Slope=0
      PondWater: SurfaceArea=10000; MaxPondDepth=1
      Folder Manager folder
        Manager Add water on SettlingPond on fixed date
          added_date = 01-jan
          volume = 5000
          temperature = 10
          salinity = 0
          ph = 0
          n = 0
          p = 0
          tss = 0
          script: same as in Salinity_RainDilute_EvapConcentrate_Test.Pond.Manager folder.Add water on fixed date
      Report: EventNames=[Clock].DoReport
        VariableNames:
          [Clock].Today
          [Weather].Rain as Rain
          PondWater.PondEvap as S_PondEvap
          PondWater.PondDepth as S_PondDepth
          PondWater.PondTemp as S_PondTemp
          PondWater.Salinity as S_Salinity
          PondWater.PH as S_PH
          PondWater.N as S_N
          PondWater.P as S_P
          PondWater.TSS as S_TSS
    Manager Transfer water from PrawnPond to SettlingPond
      added_date = 02-jan
      volume = 5000
```csharp
using System;
using Models.Core;
using APSIM.Shared.Utilities;
using Models.Aqua;

namespace Models
{
	[Serializable]
	[System.Xml.Serialization.XmlInclude(typeof(Model))]
	public class Script : Model
	{

		[Link] Clock Clock;
		[Link] Summary Summary;
		[Link] Zone PrawnPond;
		[Link] Zone SettlingPond;
		
		PondWater prawnWater;
		PondWater settlingWater;
		
		
	    [Description("Transfer Water on this date (dd-mmm)")]
		public string added_date {get; set;}
		
		[Description("Volume of Water Transfered (m^3)")]
		public double volume {get; set;}
		


        
       [EventSubscribe("StartOfSimulation")]
		private void OnStartOfSimulation(object sender, EventArgs e)
		{
	    	prawnWater = (PondWater)Apsim.Find(PrawnPond,"PondWater");
	    	settlingWater = (PondWater)Apsim.Find(SettlingPond,"PondWater");
		}
        
        
        
		[EventSubscribe("StartOfDay")]
		private void OnStartOfDay(object sender, EventArgs e)
		{

        if (DateUtilities.DatesEqual(added_date, Clock.Today))
			{
			
			prawnWater.Empty(volume);
			settlingWater.Fill(Volume: volume, WaterProperties: prawnWater.PondProps);
			
			}

		}
      
	}
}
```
  Simulation EvapTest: Area=0; Slope=0
    Weather: FileName=%root%\Tests\Pond\Ingham.met
    Clock: StartDate=1990-01-01; EndDate=2000-12-31
    Summary summaryfile
    Zone AquaFarm: Area=1; Slope=0
      MicroClimate: air_pressure=1010; soil_emissivity=0.96; sun_angle=15; soil_heat_flux_fraction=0.4; night_interception_fraction=0.5; windspeed_default=3; refheight=2; albedo=0.15; emissivity=0.96; gsmax=0.01; r50=200; a_interception=0; b_interception=1; c_interception=0; d_interception=0; soil_albedo=0.3
      Report: EventNames=[Clock].DoReport
        VariableNames:
          [Clock].Today
          [Weather].Rain as Rain
          [PondWater].PondEvap as PondEvap
          [PondWater].PondDepth as PondDepth
  DataStore
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