Simulations: Area=0
  Simulation Test: Area=0
    WeatherFile: FileName=lincoln.met
    Clock: StartDate=2003-10-20; EndDate=2004-05-23
    Summary
    Zone Field: Area=0
      Irrigation: IrrigationApplied=100
      Fertiliser
        Definitions:
          Name   FractionNO3  FractionNH4  FractionUrea
          UreaN  0            0            1
          NO3N   1            0            0
      Report: Events=[Clock].EndOfDay
        Variables:
          [Clock].Today
          [ExtraVariables].Script.AccumTtemerg
          [Plant].Phenology.CurrentPhaseName
          [Plant].Phenology.StageCode.Value
          [ExtraVariables].Script.AccumPlantN
          [ExtraVariables].Script.AccumMineralisation
          [ExtraVariables].Script.AccumDenit
          [ExtraVariables].Script.AccumFert
          [ExtraVariables].Script.AccumLeach
          [ExtraVariables].Script.AccumDetach
          [ExtraVariables].Script.DeltaSoilOMN
          [ExtraVariables].Script.DeltaSurfaceOMN
          [ExtraVariables].Script.DeltaSoilMineralN
          [Plant].Root.NSupplyUptake
          [SoilWater].eo
          [SoilWater].es
          [ExtraVariables].Script.SWC
          [ExtraVariables].Script.DUL
          [SoilWater].drain
          [SoilWater].runoff
          [ExtraVariables].Script.OutFlowLat
          [SoilWater].pond
          [ExtraVariables].Script.AccumEO
          [ExtraVariables].Script.AccumEP
          [ExtraVariables].Script.AccumES
          [ExtraVariables].Script.AccumDrainage
          [ExtraVariables].Script.AccumRunoff
          [ExtraVariables].Script.AccumRainfall
          [ExtraVariables].Script.AccumIrrigation
          [ExtraVariables].Script.AccumOutflowLat
          [ExtraVariables].Script.SoilWaterDeficit
          [Plant].AboveGroundWt
          [Plant].BelowGroundWt
          [Plant].TotalWt
          [Plant].Leaf.DeadWt
          [Plant].Leaf.LiveWt
          [Plant].Stem.DeadWt
          [Plant].Stem.LiveWt
          [Plant].Tuber.DeadWt
          [Plant].Tuber.LiveWt
          [Plant].Root.DeadWt
          [Plant].Root.LiveWt
          [Plant].AboveGroundN
          [Plant].BelowGroundN
          [Plant].TotalN
          [Plant].TotalLiveN
          [Plant].TotalDeadN
          [Plant].Leaf.DeadN
          [Plant].Leaf.LiveN
          [Plant].Stem.DeadN
          [Plant].Stem.LiveN
          [Plant].Tuber.DeadN
          [Plant].Tuber.LiveN
          [Plant].RootLiveN
          [Plant].RootDeadN
          [Plant].LeafLiveNConc
          [Plant].LeafDeadNConc
          [Plant].StemLiveNConc
          [Plant].TuberLiveNConc
          [Plant].RootLiveNConc
          [Plant].RootWaterSupply
          [Plant].RootWaterUptake
          [Plant].LeafTranspiration
          [Plant].LeafWaterDemand
          [Plant].Root.Depth
          [Plant].Leaf.Cover_green
          [Plant].Leaf.Cover_tot
          [Plant].Leaf.Cover_dead
          [Plant].Leaf.LAI
          [Plant].Leaf.LAIDead
          [Plant].Height
          [Plant].Leaf.Fn
          [Plant].Leaf.Fw
          [Plant].Leaf.Photosynthesis.Ft.Value
          [Plant].Leaf.Photosynthesis.Fvpd.Value
          [Plant].Structure.PlantTotalNodeNo
          [Plant].Structure.TotalStemPopn
          [Plant].Leaf.PlantAppearedGreenLeafNo
          [Plant].Leaf.ExpandingCohortNo
          [Plant].Leaf.AppearedCohortNo
          [Plant].Leaf.DeadCohortNo
          [Plant].Structure.MainStemNodeNo
          [Plant].Leaf.SenescingCohortNo
          [Plant].Structure.PrimaryBudTotalNodeNo
          [Plant].Leaf.MinimumNConc.Value
          [Plant].Stem.MinimumNConc.Value
          [Plant].Tuber.MinimumNConc.Value
          [Plant].Root.MinimumNConc.Value
          [Plant].Leaf.MaximumNConc.Value
          [Plant].Stem.MaximumNConc.Value
          [Plant].Tuber.MaximumNConc.Value
          [Plant].Root.MaximumNConc.Value
          [Plant].TotalLiveWt
          [Plant].Stem.LiveStructuralWt
          [Plant].Stem.LiveNonStructuralWt
          [Plant].Leaf.SpecificArea
          [Plant].TotalDeadWt
          [Plant].Leaf.ExpandedCohortNo
          [Plant].Leaf.ExpandedNodeNo
      Soil Templeton: SoilType=Sedementary; LocalName=Lincoln; Latitude=0; Longitude=0
        Water
          Thickness  BD   AirDry  LL15  DUL   SAT
          100        1.2  0.08    0.16  0.33  0.5
          200        1.2  0.16    0.16  0.33  0.5
          300        1.2  0.15    0.15  0.31  0.44
          300        1.2  0.13    0.13  0.27  0.46
          300        1.2  0.15    0.15  0.3   0.44
          300        1.2  0.15    0.15  0.3   0.44
          SoilCrop PotatoSoilCrop: LL=[0.13, 0.13, 0.1, 0.15, 0.3, 0.3]; KL=[0.1, 0.06, 0.04, 0.01, 0, 0]; XF=[1, 1, 1, 1, 0, 0]
        SoilWater: min_crit_temp=5; max_crit_temp=35; max_albedo=0.23; A_to_evap_fact=0.44; canopy_eos_coef=1.7; sw_top_crit=0.9; sumes1_max=100; sumes2_max=25; solute_flow_eff=[1]; solute_flux_eff=[1]; gravity_gradient=2E-05; specific_bd=2.65; hydrol_effective_depth=450; immobile_solutes=[nh4]; canopy_fact=[1, 1, 0, 0]; canopy_fact_height=[0, 600, 1800, 30000]; canopy_fact_default=0.5; act_evap_method=ritchie; irrigation_will_runoff=false; irrigation_layer=1; SummerCona=3; SummerU=6; SummerDate=1-Nov; WinterCona=3; WinterU=6; WinterDate=1-Apr; DiffusConst=88; DiffusSlope=35.4; Salb=0.18; eo=0.59443; eos=0.59443; CNRed=-9E-05
          zero: slope, discharge_width, catchment_area, drain, runoff, pond, irrigation, max_pond, CN2Bare, CNCov
          bd   outflow_lat  dlayer  Thickness  SWCON  KLAT  sat_dep  dul_dep  ll15_dep
          1.2  0            100     100        0.55   0     50       33       16
          1.2  0            200     200        0.55   0     100      66       32
          1.2  0            300     300        0.55   0     132      93       45
          1.2  0            300     300        0.55   0     138      81       39
          1.2  0            300     300        0.55   0     132      90       45
          1.2  0            300     300        0.55   0     132      90       45
          mobile_solutes=[no3, urea, cl, br, org_n, org_c_pool1, org_c_pool2, org_c_pool3]
        SoilNitrogen: NPartitionApproach=BasedOnLayerConcentration; wnmm_n_alpha=0.002; wnmm_dn_alpha=0.5; nemis_dn_km=22; nemis_dn_pot=7.194; cent_n_soilt_ave=15; cent_n_maxt_ave=25; cent_n_wfps_ave=0.7; cent_n_max_rate=0.1; ini_FOMtype=default; fom_type=[default, manure, mucuna, lablab, shemp, stable]; fract_carb=[0.2, 0.3, 0.54, 0.57, 0.45, 0]; fract_cell=[0.7, 0.3, 0.37, 0.37, 0.47, 0.1]; fract_lign=[0.1, 0.4, 0.09, 0.06, 0.08, 0.9]; ef_res=0.4; fr_res_biom=0.9; min_depth=100; rd_carb=[0.2, 0.1]; rd_cell=[0.05, 0.25]; rd_lign=[0.0095, 0.003]; ef_fom=0.4; fr_fom_biom=0.9; cnrf_coeff=0.693; cnrf_optcn=25; rd_biom=[0.0081, 0.004]; ef_biom=0.4; fr_biom_biom=0.6; rd_hum=[0.00015, 7E-05]; ef_hum=0.4; opt_temp=[32, 32]; wfmin_index=[0, 0.5, 1, 2]; wfmin_values=[0, 1, 1, 0.5]; soiltype=standard; allow_simpleSoilTemp=no; profile_reduction=no; use_organic_solutes=no; c_in_fom=0.4; minPatchArea=1; mcn=8; root_depth=3000; root_cn_pool=[40, 40, 40]
          zero: n2o_approach, ureappm_min, nh4ppm_min, no3ppm_min, fom_min, oc2om_factor, ini_pH, WarningThreshold, FatalThreshold, potHydrol_min, potHydrol_parmA, potHydrol_parmB, potHydrol_parmC, potHydrol_parmD, nitrification_pot, nh4_at_half_pot, dnit_rate_coeff, dnit_nitrf_loss, dnit_k1, dnit_wf_power, actC_parmB, actC_parmA, N2N2O_parmA, N2N2O_parmB
        SoilOrganicMatter: RootCN=30; RootWt=3000; SoilCN=11.5; EnrACoeff=7.4; EnrBCoeff=0.2; OCUnits=Total
          Thickness  OC    FBiom  FInert
          100        3.5   0.025  0.3
          200        2.5   0.025  0.4
          300        1.2   0.015  0.75
          300        1.03  0.01   0.9
          300        0.47  0.01   0.96
          300        0.47  0.01   0.96
        Analysis: Thickness=[100, 200, 300, 300, 300, 300]; PH=[6.6, 6.2, 5.7, 5.5, 5.5, 5.5]; PHUnits=Water; BoronUnits=HotWater
        InitialWater Initial water: FractionFull=1; PercentMethod=FilledFromTop
        Sample: NO3Units=kgha; NH4Units=kgha; SWUnits=Volumetric; OCUnits=Total; PHUnits=Water
          Thickness  NO3   NH4
          100        40    0.1
          200        30    0.1
          300        14    0.1
          300        14    0.1
          300        1.38  0.1
          300        1.38  0.1
      SurfaceOrganicMatter: crit_residue_wt=2000; opt_temp=20; cum_eos_max=20; cnrf_coeff=0.277; cnrf_optcn=25; c_fract=0.4; leach_rain_tot=25; min_rain_to_leach=10; crit_min_surfom_orgC=0.004; default_cpr=0; default_standing_fraction=0; standing_extinct_coeff=0.5; fractionFaecesAdded=0.5; PoolName=Wheat; type=Wheat; mass=2000; standing_fraction=0; cnr=80
        ResidueTypes:
          {Name=Wheat, fraction_C=0.08, po4ppm=10, nh4ppm=10, no3ppm=10, specific_area=0.0001, cf_contrib=1, pot_decomp_rate=0.1, fr_c=[0.3, 0.3, 0.4], fr_n=[0.3, 0.3, 0.4], fr_p=[0.3, 0.3, 0.4]}
        TillageTypes
      MicroClimate: air_pressure=1010; soil_emissivity=0.96; sun_angle=15; soil_heat_flux_fraction=0.4; night_interception_fraction=0.5; windspeed_default=3; refheight=2; albedo=0.293662; emissivity=0.96; gsmax=0.01; r50=200; soil_heat=-0.33; dryleaffraction=1; a_interception=0; b_interception=1; c_interception=0; d_interception=0; soil_albedo=0.3
        ComponentData potato: Type=Potato; LAI=0; LAItot=2.89661; CoverGreen=0; CoverTot=0.0832298; Ktot=0.0300051; K=0.8; Height=0.173838; Depth=0.173838; Albedo=0.26; Emissivity=0.96; Gsmax=0.011; R50=200; Frgr=0.95; layerLAI=[1.92896e-05]; layerLAItot=[2.89661]; Ftot=[1]; Fgreen=[6.65936e-06]; Rs=[0.274703]; Rl=[-0.0520241]; Rsoil=[-0.0274703]; Gc=[0.0001]; Ga=[0.0160743]; PET=[0.0205847]; PETr=[0.00038249]; PETa=[0.0202022]; Omega=[0.0141128]; interception=[0]
      Plant Potato: CropType=Potato
        SowingData={Cultivar=RussetBurbank, Population=4.63822, Depth=150, RowSpacing=150, MaxCover=1, BudNumber=2.2, CropClass=Plant, SkipRow=0, SkipPlant=0}
        Organs={GenericAboveGroundOrgan=[{Name=Tuber, Live={Name=Biomass}, Dead={Name=Biomass}, NitrogenDemandSwitch={{http://www.w3.org/2001/XMLSchema-instance}type=LinearInterpolationFunction, Name=LinearInterpolationFunction, XProperty=[Leaf].LAI, XYPairs={Name=XYPairs, X=[0, 0.02, 0.0201, 10], Y=[0, 0, 1, 1]}}, StructuralFraction={{http://www.w3.org/2001/XMLSchema-instance}type=Constant, Name=Constant, Value=1}, DMDemandFunction={{http://www.w3.org/2001/XMLSchema-instance}type=PotentialSizeDemandFunction, Name=PotentialSizeDemandFunction, StartStageName=TuberInitiation, EndStageName=Maturity, PotentialGrowthIncrement={{http://www.w3.org/2001/XMLSchema-instance}type=LinearInterpolationFunction, Name=LinearInterpolationFunction, XProperty=[Phenology].StageCode.Value, XYPairs={Name=XYPairs, X=[4, 4.04, 4.32, 4.52, 4.95, 6.54], Y=[0.017, 0.017, 0.06, 0.06, 0.018, 0]}}, OrganNumber={{http://www.w3.org/2001/XMLSchema-instance}type=MultiplyFunction, Name=MultiplyFunction}, ThermalTime={{http://www.w3.org/2001/XMLSchema-instance}type=AirTemperatureFunction, Name=AirTemperatureFunction, XYPairs={Name=XYPairs, X=[2, 20, 35], Y=[0, 18, 0]}}, AccumThermalTime={{http://www.w3.org/2001/XMLSchema-instance}type=AccumulateFunction, Name=AccumulateFunction, StartStageName=TuberInitiation, EndStageName=Maturity}}, WaterContent={{http://www.w3.org/2001/XMLSchema-instance}type=LinearInterpolationFunction, Name=LinearInterpolationFunction, XProperty=[Phenology].StageCode.Value, XYPairs={Name=XYPairs, X=[3, 4, 4.1, 4.7, 5.4, 6], Y=[0, 0, 0.1, 0.16, 0.2, 0.22]}}, MaximumNConc={{http://www.w3.org/2001/XMLSchema-instance}type=LinearInterpolationFunction, Name=LinearInterpolationFunction, XProperty=[Phenology].StageCode.Value, XYPairs={Name=XYPairs, X=[3, 4, 5, 6], Y=[0.023, 0.023, 0.018, 0.015]}}, MinimumNConc={{http://www.w3.org/2001/XMLSchema-instance}type=LinearInterpolationFunction, Name=LinearInterpolationFunction, XProperty=[Phenology].StageCode.Value, XYPairs={Name=XYPairs, X=[4, 4.1, 7], Y=[0.02, 0.006, 0.006]}}}, {Name=Stem, Live={Name=Biomass}, Dead={Name=Biomass}, NReallocationFactor={{http://www.w3.org/2001/XMLSchema-instance}type=Constant, Name=Constant, Value=0}, NRetranslocationFactor={{http://www.w3.org/2001/XMLSchema-instance}type=Constant, Name=Constant, Value=0.05}, NitrogenDemandSwitch={{http://www.w3.org/2001/XMLSchema-instance}type=PhaseBasedSwitch, Name=PhaseBasedSwitch, Start=Planting, End=FinalLeaf}, DMRetranslocationFactor={{http://www.w3.org/2001/XMLSchema-instance}type=Constant, Name=Constant, Value=0}, StructuralFraction={{http://www.w3.org/2001/XMLSchema-instance}type=Constant, Name=Constant, Value=1}, DMDemandFunction={{http://www.w3.org/2001/XMLSchema-instance}type=InternodeDemandFunction, Name=InternodeDemandFunction, InterNodeWt={{http://www.w3.org/2001/XMLSchema-instance}type=Constant, Name=Constant, Value=0.2}}, MaximumNConc={{http://www.w3.org/2001/XMLSchema-instance}type=LinearInterpolationFunction, Name=LinearInterpolationFunction, XProperty=[Phenology].StageCode.Value, XYPairs={Name=XYPairs, X=[3, 4, 5.3], Y=[0.06, 0.06, 0.025]}}, MinimumNConc={{http://www.w3.org/2001/XMLSchema-instance}type=Constant, Name=Constant, Value=0.006}}], Root={Name=Root, Live={{http://www.w3.org/2001/XMLSchema-instance}type=CompositeBiomass, Name=CompositeBiomass, Propertys=[[Root].LayerLive]}, Dead={{http://www.w3.org/2001/XMLSchema-instance}type=CompositeBiomass, Name=CompositeBiomass, Propertys=[[Root].LayerDead]}, InitialDM=5, SpecificRootLength=40000, KNO3=0.02, KNH4=0, NitrogenDemandSwitch={{http://www.w3.org/2001/XMLSchema-instance}type=PhaseBasedSwitch, Name=PhaseBasedSwitch, Start=Planting, End=FinalLeaf}, TemperatureEffect={{http://www.w3.org/2001/XMLSchema-instance}type=AirTemperatureFunction, Name=AirTemperatureFunction, XYPairs={Name=XYPairs, X=[0, 26, 35], Y=[1, 1, 1]}}, RootFrontVelocity={{http://www.w3.org/2001/XMLSchema-instance}type=PhaseLookup, Name=PhaseLookup}, PartitionFraction={{http://www.w3.org/2001/XMLSchema-instance}type=PhaseLookup, Name=PhaseLookup}, MaximumNConc={{http://www.w3.org/2001/XMLSchema-instance}type=Constant, Name=Constant, Value=0.01}, MaxDailyNUptake={{http://www.w3.org/2001/XMLSchema-instance}type=LinearInterpolationFunction, Name=LinearInterpolationFunction, XProperty=[Root].Length, XYPairs={Name=XYPairs, X=[0, 0.02], Y=[0, 6]}}, MinimumNConc={{http://www.w3.org/2001/XMLSchema-instance}type=Constant, Name=Constant, Value=0.01}, KLModifier={{http://www.w3.org/2001/XMLSchema-instance}type=LinearInterpolationFunction, Name=LinearInterpolationFunction, XProperty=[Leaf].LAI, XYPairs={Name=XYPairs, X=[0, 3], Y=[1, 1]}}}, Leaf={Name=Leaf, Live={{http://www.w3.org/2001/XMLSchema-instance}type=CompositeBiomass, Name=CompositeBiomass, Propertys=[[Leaf].CohortLive]}, Dead={{http://www.w3.org/2001/XMLSchema-instance}type=CompositeBiomass, Name=CompositeBiomass, Propertys=[[Leaf].CohortDead]}, MaxCover=1, InitialLeaf=[{Name=LeafCohort, Rank=1, Area=900}, {Name=LeafCohort, Rank=2, Area=600}, {Name=LeafCohort, Rank=3, Area=300}], LeafCohortParameters={Name=InitialLeafValues, MaxArea={{http://www.w3.org/2001/XMLSchema-instance}type=LinearInterpolationFunction, Name=LinearInterpolationFunction, XProperty=[Structure].RelativeNodeApperance, XYPairs={Name=XYPairs, X=[0, 0.15, 0.3, 0.44, 0.59, 0.73], Y=[2000, 18000, 27000, 15000, 6000, 1500]}}, GrowthDuration={{http://www.w3.org/2001/XMLSchema-instance}type=LinearInterpolationFunction, Name=LinearInterpolationFunction, XProperty=[Structure].RelativeNodeApperance, XYPairs={Name=XYPairs, X=[0, 0.3, 0.4, 1], Y=[200, 400, 400, 400]}}, LagDuration={{http://www.w3.org/2001/XMLSchema-instance}type=LinearInterpolationFunction, Name=LinearInterpolationFunction, XProperty=[Structure].RelativeNodeApperance, XYPairs={Name=XYPairs, X=[0, 0.15, 0.3, 0.4, 0.73, 1], Y=[350, 350, 350, 350, 350, 20]}}, SenescenceDuration={{http://www.w3.org/2001/XMLSchema-instance}type=LinearInterpolationFunction, Name=LinearInterpolationFunction, XProperty=[Structure].RelativeNodeApperance, XYPairs={Name=XYPairs, X=[0, 0.15, 0.3, 0.4, 0.73, 2], Y=[350, 350, 350, 350, 350, 100]}}, DetachmentLagDuration={{http://www.w3.org/2001/XMLSchema-instance}type=Constant, Name=Constant, Value=1000000}, DetachmentDuration={{http://www.w3.org/2001/XMLSchema-instance}type=Constant, Name=Constant, Value=1000000}, SpecificLeafAreaMax={{http://www.w3.org/2001/XMLSchema-instance}type=LinearInterpolationFunction, Name=LinearInterpolationFunction, XProperty=[Structure].RelativeNodeApperance, XYPairs={Name=XYPairs, X=[0, 1], Y=[40000, 25000]}}, SpecificLeafAreaMin={{http://www.w3.org/2001/XMLSchema-instance}type=Constant, Name=Constant, Value=25000}, StructuralFraction={{http://www.w3.org/2001/XMLSchema-instance}type=Constant, Name=Constant, Value=0.5}, MaximumNConc={{http://www.w3.org/2001/XMLSchema-instance}type=Constant, Name=Constant, Value=0.07}, MinimumNConc={{http://www.w3.org/2001/XMLSchema-instance}type=Constant, Name=Constant, Value=0.03}, InitialNConc={{http://www.w3.org/2001/XMLSchema-instance}type=Constant, Name=Constant, Value=0}, NReallocationFactor={{http://www.w3.org/2001/XMLSchema-instance}type=Constant, Name=Constant, Value=1}, NRetranslocationFactor={{http://www.w3.org/2001/XMLSchema-instance}type=Constant, Name=Constant, Value=0.01}, ExpansionStress={{http://www.w3.org/2001/XMLSchema-instance}type=LinearInterpolationFunction, Name=LinearInterpolationFunction, XProperty=[Plant].WaterSupplyDemandRatio, XYPairs={Name=XYPairs, X=[0.5, 1], Y=[0, 1]}}, CriticalNConc={{http://www.w3.org/2001/XMLSchema-instance}type=Constant, Name=Constant, Value=0.05}, DMRetranslocationFactor={{http://www.w3.org/2001/XMLSchema-instance}type=Constant, Name=Constant, Value=0.5}, ShadeInducedSenescenceRate={{http://www.w3.org/2001/XMLSchema-instance}type=LinearInterpolationFunction, Name=LinearInterpolationFunction, XProperty=[Leaf].CohortCurrentRankCoverAbove, XYPairs={Name=XYPairs, X=[0, 0.5, 0.8, 1], Y=[0, 0, 0, 0.03]}}, NonStructuralFraction={{http://www.w3.org/2001/XMLSchema-instance}type=Constant, Name=Constant, Value=0.2}}, Photosynthesis={Name=RUEModel, RUE={{http://www.w3.org/2001/XMLSchema-instance}type=Constant, Name=Constant, Value=1.2}, FCO2={{http://www.w3.org/2001/XMLSchema-instance}type=RUECO2Function, Name=RUECO2Function, PhotosyntheticPathway=C3}, FN={{http://www.w3.org/2001/XMLSchema-instance}type=LinearInterpolationFunction, Name=LinearInterpolationFunction, XProperty=[Leaf].Fn, XYPairs={Name=XYPairs, X=[0, 1, 1.5], Y=[1, 1, 1]}}, FT={{http://www.w3.org/2001/XMLSchema-instance}type=WeightedTemperatureFunction, Name=WeightedTemperatureFunction, MaximumTemperatureWeighting=0.75, XYPairs={Name=XYPairs, X=[2, 12, 24, 34], Y=[0, 1, 1, 0]}}, FW={{http://www.w3.org/2001/XMLSchema-instance}type=LinearInterpolationFunction, Name=LinearInterpolationFunction, XProperty=[Leaf].Fw, XYPairs={Name=XYPairs, X=[0, 0.4, 1.5], Y=[0, 1, 1]}}, FVPD={{http://www.w3.org/2001/XMLSchema-instance}type=LinearInterpolationFunction, Name=LinearInterpolationFunction, XProperty=[Leaf].Photosynthesis.VPD, XYPairs={Name=XYPairs, X=[0, 10, 50], Y=[1, 1, 1]}}}, ThermalTime={{http://www.w3.org/2001/XMLSchema-instance}type=AirTemperatureFunction, Name=AirTemperatureFunction, XYPairs={Name=XYPairs, X=[2, 20, 35], Y=[0, 18, 0]}}, ExtinctionCoeff={{http://www.w3.org/2001/XMLSchema-instance}type=MultiplyFunction, Name=MultiplyFunction}, FrostFraction={{http://www.w3.org/2001/XMLSchema-instance}type=LinearInterpolationFunction, Name=LinearInterpolationFunction, XProperty=[WeatherFile].MinT, XYPairs={Name=XYPairs, X=[-1, 0], Y=[0, 0]}}, Total={{http://www.w3.org/2001/XMLSchema-instance}type=CompositeBiomass, Name=CompositeBiomass, Propertys=[[Leaf].Live, [Leaf].Dead]}, CohortArrayLive={Name=ArrayBiomass, Propertys=[[Leaf].Live], ArraySize=[Leaf].MaxNodeNo}, CohortArrayDead={Name=ArrayBiomass, Propertys=[[Leaf].Dead], ArraySize=[Leaf].MaxNodeNo}, KDead=0.03, WaterDemand=0.0205847}}
        Phenology
          Phases={GenericPhase=[{Name=Dormant, Start=Planting, End=Peeping, ThermalTime={{http://www.w3.org/2001/XMLSchema-instance}type=AirTemperatureFunction, Name=AirTemperatureFunction, XYPairs={Name=XYPairs, X=[2, 20, 35], Y=[0, 18, 0]}}, Target={{http://www.w3.org/2001/XMLSchema-instance}type=Constant, Name=Constant, Value=1}}, {Name=Vegetative, Start=Emergence, End=TuberInitiation, ThermalTime={{http://www.w3.org/2001/XMLSchema-instance}type=AirTemperatureFunction, Name=AirTemperatureFunction, XYPairs={Name=XYPairs, X=[2, 20, 35], Y=[0, 18, 0]}}, Target={{http://www.w3.org/2001/XMLSchema-instance}type=Constant, Name=Constant, Value=300}}, {Name=Senesced, Start=FullSenescence, End=Maturity, ThermalTime={{http://www.w3.org/2001/XMLSchema-instance}type=AirTemperatureFunction, Name=AirTemperatureFunction, XYPairs={Name=XYPairs, X=[2, 20, 35], Y=[0, 18, 0]}}, Target={{http://www.w3.org/2001/XMLSchema-instance}type=Constant, Name=Constant, Value=200}}, {Name=Dormant, Start=Planting, End=Peeping, ThermalTime={{http://www.w3.org/2001/XMLSchema-instance}type=AirTemperatureFunction, Name=AirTemperatureFunction, XYPairs={Name=XYPairs, X=[2, 20, 35], Y=[0, 18, 0]}}, Target={{http://www.w3.org/2001/XMLSchema-instance}type=Constant, Name=Constant, Value=1}}, {Name=Dormant, Start=Planting, End=Peeping, ThermalTime={{http://www.w3.org/2001/XMLSchema-instance}type=AirTemperatureFunction, Name=AirTemperatureFunction, XYPairs={Name=XYPairs, X=[2, 20, 35], Y=[0, 18, 0]}}, Target={{http://www.w3.org/2001/XMLSchema-instance}type=Constant, Name=Constant, Value=1}}, {Name=Dormant, Start=Planting, End=Peeping, ThermalTime={{http://www.w3.org/2001/XMLSchema-instance}type=AirTemperatureFunction, Name=AirTemperatureFunction, XYPairs={Name=XYPairs, X=[2, 20, 35], Y=[0, 18, 0]}}, Target={{http://www.w3.org/2001/XMLSchema-instance}type=Constant, Name=Constant, Value=1}}, {Name=Dormant, Start=Planting, End=Peeping, ThermalTime={{http://www.w3.org/2001/XMLSchema-instance}type=AirTemperatureFunction, Name=AirTemperatureFunction, XYPairs={Name=XYPairs, X=[2, 20, 35], Y=[0, 18, 0]}}, Target={{http://www.w3.org/2001/XMLSchema-instance}type=Constant, Name=Constant, Value=1}}, {Name=Dormant, Start=Planting, End=Peeping, ThermalTime={{http://www.w3.org/2001/XMLSchema-instance}type=AirTemperatureFunction, Name=AirTemperatureFunction, XYPairs={Name=XYPairs, X=[2, 20, 35], Y=[0, 18, 0]}}, Target={{http://www.w3.org/2001/XMLSchema-instance}type=Constant, Name=Constant, Value=1}}, {Name=Dormant, Start=Planting, End=Peeping, ThermalTime={{http://www.w3.org/2001/XMLSchema-instance}type=AirTemperatureFunction, Name=AirTemperatureFunction, XYPairs={Name=XYPairs, X=[2, 20, 35], Y=[0, 18, 0]}}, Target={{http://www.w3.org/2001/XMLSchema-instance}type=Constant, Name=Constant, Value=1}}, {Name=Dormant, Start=Planting, End=Peeping, ThermalTime={{http://www.w3.org/2001/XMLSchema-instance}type=AirTemperatureFunction, Name=AirTemperatureFunction, XYPairs={Name=XYPairs, X=[2, 20, 35], Y=[0, 18, 0]}}, Target={{http://www.w3.org/2001/XMLSchema-instance}type=Constant, Name=Constant, Value=1}}, {Name=Dormant, Start=Planting, End=Peeping, ThermalTime={{http://www.w3.org/2001/XMLSchema-instance}type=AirTemperatureFunction, Name=AirTemperatureFunction, XYPairs={Name=XYPairs, X=[2, 20, 35], Y=[0, 18, 0]}}, Target={{http://www.w3.org/2001/XMLSchema-instance}type=Constant, Name=Constant, Value=1}}, {Name=Dormant, Start=Planting, End=Peeping, ThermalTime={{http://www.w3.org/2001/XMLSchema-instance}type=AirTemperatureFunction, Name=AirTemperatureFunction, XYPairs={Name=XYPairs, X=[2, 20, 35], Y=[0, 18, 0]}}, Target={{http://www.w3.org/2001/XMLSchema-instance}type=Constant, Name=Constant, Value=1}}, {Name=Dormant, Start=Planting, End=Peeping, ThermalTime={{http://www.w3.org/2001/XMLSchema-instance}type=AirTemperatureFunction, Name=AirTemperatureFunction, XYPairs={Name=XYPairs, X=[2, 20, 35], Y=[0, 18, 0]}}, Target={{http://www.w3.org/2001/XMLSchema-instance}type=Constant, Name=Constant, Value=1}}, {Name=Dormant, Start=Planting, End=Peeping, ThermalTime={{http://www.w3.org/2001/XMLSchema-instance}type=AirTemperatureFunction, Name=AirTemperatureFunction, XYPairs={Name=XYPairs, X=[2, 20, 35], Y=[0, 18, 0]}}, Target={{http://www.w3.org/2001/XMLSchema-instance}type=Constant, Name=Constant, Value=1}}, {Name=Dormant, Start=Planting, End=Peeping, ThermalTime={{http://www.w3.org/2001/XMLSchema-instance}type=AirTemperatureFunction, Name=AirTemperatureFunction, XYPairs={Name=XYPairs, X=[2, 20, 35], Y=[0, 18, 0]}}, Target={{http://www.w3.org/2001/XMLSchema-instance}type=Constant, Name=Constant, Value=1}}, {Name=Dormant, Start=Planting, End=Peeping, ThermalTime={{http://www.w3.org/2001/XMLSchema-instance}type=AirTemperatureFunction, Name=AirTemperatureFunction, XYPairs={Name=XYPairs, X=[2, 20, 35], Y=[0, 18, 0]}}, Target={{http://www.w3.org/2001/XMLSchema-instance}type=Constant, Name=Constant, Value=1}}, {Name=Dormant, Start=Planting, End=Peeping, ThermalTime={{http://www.w3.org/2001/XMLSchema-instance}type=AirTemperatureFunction, Name=AirTemperatureFunction, XYPairs={Name=XYPairs, X=[2, 20, 35], Y=[0, 18, 0]}}, Target={{http://www.w3.org/2001/XMLSchema-instance}type=Constant, Name=Constant, Value=1}}, {Name=Dormant, Start=Planting, End=Peeping, ThermalTime={{http://www.w3.org/2001/XMLSchema-instance}type=AirTemperatureFunction, Name=AirTemperatureFunction, XYPairs={Name=XYPairs, X=[2, 20, 35], Y=[0, 18, 0]}}, Target={{http://www.w3.org/2001/XMLSchema-instance}type=Constant, Name=Constant, Value=1}}, {Name=Dormant, Start=Planting, End=Peeping, ThermalTime={{http://www.w3.org/2001/XMLSchema-instance}type=AirTemperatureFunction, Name=AirTemperatureFunction, XYPairs={Name=XYPairs, X=[2, 20, 35], Y=[0, 18, 0]}}, Target={{http://www.w3.org/2001/XMLSchema-instance}type=Constant, Name=Constant, Value=1}}, {Name=Dormant, Start=Planting, End=Peeping, ThermalTime={{http://www.w3.org/2001/XMLSchema-instance}type=AirTemperatureFunction, Name=AirTemperatureFunction, XYPairs={Name=XYPairs, X=[2, 20, 35], Y=[0, 18, 0]}}, Target={{http://www.w3.org/2001/XMLSchema-instance}type=Constant, Name=Constant, Value=1}}, {Name=Dormant, Start=Planting, End=Peeping, ThermalTime={{http://www.w3.org/2001/XMLSchema-instance}type=AirTemperatureFunction, Name=AirTemperatureFunction, XYPairs={Name=XYPairs, X=[2, 20, 35], Y=[0, 18, 0]}}, Target={{http://www.w3.org/2001/XMLSchema-instance}type=Constant, Name=Constant, Value=1}}, {Name=Dormant, Start=Planting, End=Peeping, ThermalTime={{http://www.w3.org/2001/XMLSchema-instance}type=AirTemperatureFunction, Name=AirTemperatureFunction, XYPairs={Name=XYPairs, X=[2, 20, 35], Y=[0, 18, 0]}}, Target={{http://www.w3.org/2001/XMLSchema-instance}type=Constant, Name=Constant, Value=1}}, {Name=Dormant, Start=Planting, End=Peeping, ThermalTime={{http://www.w3.org/2001/XMLSchema-instance}type=AirTemperatureFunction, Name=AirTemperatureFunction, XYPairs={Name=XYPairs, X=[2, 20, 35], Y=[0, 18, 0]}}, Target={{http://www.w3.org/2001/XMLSchema-instance}type=Constant, Name=Constant, Value=1}}, {Name=Dormant, Start=Planting, End=Peeping, ThermalTime={{http://www.w3.org/2001/XMLSchema-instance}type=AirTemperatureFunction, Name=AirTemperatureFunction, XYPairs={Name=XYPairs, X=[2, 20, 35], Y=[0, 18, 0]}}, Target={{http://www.w3.org/2001/XMLSchema-instance}type=Constant, Name=Constant, Value=1}}, {Name=Dormant, Start=Planting, End=Peeping, ThermalTime={{http://www.w3.org/2001/XMLSchema-instance}type=AirTemperatureFunction, Name=AirTemperatureFunction, XYPairs={Name=XYPairs, X=[2, 20, 35], Y=[0, 18, 0]}}, Target={{http://www.w3.org/2001/XMLSchema-instance}type=Constant, Name=Constant, Value=1}}, {Name=Dormant, Start=Planting, End=Peeping, ThermalTime={{http://www.w3.org/2001/XMLSchema-instance}type=AirTemperatureFunction, Name=AirTemperatureFunction, XYPairs={Name=XYPairs, X=[2, 20, 35], Y=[0, 18, 0]}}, Target={{http://www.w3.org/2001/XMLSchema-instance}type=Constant, Name=Constant, Value=1}}, {Name=Dormant, Start=Planting, End=Peeping, ThermalTime={{http://www.w3.org/2001/XMLSchema-instance}type=AirTemperatureFunction, Name=AirTemperatureFunction, XYPairs={Name=XYPairs, X=[2, 20, 35], Y=[0, 18, 0]}}, Target={{http://www.w3.org/2001/XMLSchema-instance}type=Constant, Name=Constant, Value=1}}, {Name=Dormant, Start=Planting, End=Peeping, ThermalTime={{http://www.w3.org/2001/XMLSchema-instance}type=AirTemperatureFunction, Name=AirTemperatureFunction, XYPairs={Name=XYPairs, X=[2, 20, 35], Y=[0, 18, 0]}}, Target={{http://www.w3.org/2001/XMLSchema-instance}type=Constant, Name=Constant, Value=1}}, {Name=Dormant, Start=Planting, End=Peeping, ThermalTime={{http://www.w3.org/2001/XMLSchema-instance}type=AirTemperatureFunction, Name=AirTemperatureFunction, XYPairs={Name=XYPairs, X=[2, 20, 35], Y=[0, 18, 0]}}, Target={{http://www.w3.org/2001/XMLSchema-instance}type=Constant, Name=Constant, Value=1}}, {Name=Dormant, Start=Planting, End=Peeping, ThermalTime={{http://www.w3.org/2001/XMLSchema-instance}type=AirTemperatureFunction, Name=AirTemperatureFunction, XYPairs={Name=XYPairs, X=[2, 20, 35], Y=[0, 18, 0]}}, Target={{http://www.w3.org/2001/XMLSchema-instance}type=Constant, Name=Constant, Value=1}}, {Name=Dormant, Start=Planting, End=Peeping, ThermalTime={{http://www.w3.org/2001/XMLSchema-instance}type=AirTemperatureFunction, Name=AirTemperatureFunction, XYPairs={Name=XYPairs, X=[2, 20, 35], Y=[0, 18, 0]}}, Target={{http://www.w3.org/2001/XMLSchema-instance}type=Constant, Name=Constant, Value=1}}, {Name=Dormant, Start=Planting, End=Peeping, ThermalTime={{http://www.w3.org/2001/XMLSchema-instance}type=AirTemperatureFunction, Name=AirTemperatureFunction, XYPairs={Name=XYPairs, X=[2, 20, 35], Y=[0, 18, 0]}}, Target={{http://www.w3.org/2001/XMLSchema-instance}type=Constant, Name=Constant, Value=1}}, {Name=Dormant, Start=Planting, End=Peeping, ThermalTime={{http://www.w3.org/2001/XMLSchema-instance}type=AirTemperatureFunction, Name=AirTemperatureFunction, XYPairs={Name=XYPairs, X=[2, 20, 35], Y=[0, 18, 0]}}, Target={{http://www.w3.org/2001/XMLSchema-instance}type=Constant, Name=Constant, Value=1}}, {Name=Dormant, Start=Planting, End=Peeping, ThermalTime={{http://www.w3.org/2001/XMLSchema-instance}type=AirTemperatureFunction, Name=AirTemperatureFunction, XYPairs={Name=XYPairs, X=[2, 20, 35], Y=[0, 18, 0]}}, Target={{http://www.w3.org/2001/XMLSchema-instance}type=Constant, Name=Constant, Value=1}}, {Name=Dormant, Start=Planting, End=Peeping, ThermalTime={{http://www.w3.org/2001/XMLSchema-instance}type=AirTemperatureFunction, Name=AirTemperatureFunction, XYPairs={Name=XYPairs, X=[2, 20, 35], Y=[0, 18, 0]}}, Target={{http://www.w3.org/2001/XMLSchema-instance}type=Constant, Name=Constant, Value=1}}, {Name=Dormant, Start=Planting, End=Peeping, ThermalTime={{http://www.w3.org/2001/XMLSchema-instance}type=AirTemperatureFunction, Name=AirTemperatureFunction, XYPairs={Name=XYPairs, X=[2, 20, 35], Y=[0, 18, 0]}}, Target={{http://www.w3.org/2001/XMLSchema-instance}type=Constant, Name=Constant, Value=1}}, {Name=Dormant, Start=Planting, End=Peeping, ThermalTime={{http://www.w3.org/2001/XMLSchema-instance}type=AirTemperatureFunction, Name=AirTemperatureFunction, XYPairs={Name=XYPairs, X=[2, 20, 35], Y=[0, 18, 0]}}, Target={{http://www.w3.org/2001/XMLSchema-instance}type=Constant, Name=Constant, Value=1}}, {Name=Dormant, Start=Planting, End=Peeping, ThermalTime={{http://www.w3.org/2001/XMLSchema-instance}type=AirTemperatureFunction, Name=AirTemperatureFunction, XYPairs={Name=XYPairs, X=[2, 20, 35], Y=[0, 18, 0]}}, Target={{http://www.w3.org/2001/XMLSchema-instance}type=Constant, Name=Constant, Value=1}}, {Name=Dormant, Start=Planting, End=Peeping, ThermalTime={{http://www.w3.org/2001/XMLSchema-instance}type=AirTemperatureFunction, Name=AirTemperatureFunction, XYPairs={Name=XYPairs, X=[2, 20, 35], Y=[0, 18, 0]}}, Target={{http://www.w3.org/2001/XMLSchema-instance}type=Constant, Name=Constant, Value=1}}, {Name=Dormant, Start=Planting, End=Peeping, ThermalTime={{http://www.w3.org/2001/XMLSchema-instance}type=AirTemperatureFunction, Name=AirTemperatureFunction, XYPairs={Name=XYPairs, X=[2, 20, 35], Y=[0, 18, 0]}}, Target={{http://www.w3.org/2001/XMLSchema-instance}type=Constant, Name=Constant, Value=1}}, {Name=Dormant, Start=Planting, End=Peeping, ThermalTime={{http://www.w3.org/2001/XMLSchema-instance}type=AirTemperatureFunction, Name=AirTemperatureFunction, XYPairs={Name=XYPairs, X=[2, 20, 35], Y=[0, 18, 0]}}, Target={{http://www.w3.org/2001/XMLSchema-instance}type=Constant, Name=Constant, Value=1}}, {Name=Dormant, Start=Planting, End=Peeping, ThermalTime={{http://www.w3.org/2001/XMLSchema-instance}type=AirTemperatureFunction, Name=AirTemperatureFunction, XYPairs={Name=XYPairs, X=[2, 20, 35], Y=[0, 18, 0]}}, Target={{http://www.w3.org/2001/XMLSchema-instance}type=Constant, Name=Constant, Value=1}}], EmergingPhase={Name=Sprouting, Start=Peeping, End=Emergence, ThermalTime={{http://www.w3.org/2001/XMLSchema-instance}type=AirTemperatureFunction, Name=AirTemperatureFunction, XYPairs={Name=XYPairs, X=[2, 20, 35], Y=[0, 18, 0]}}, ShootLag=72, ShootRate=1.35}, LeafAppearancePhase={Name=EarlyTuber, Start=TuberInitiation, End=FinalLeaf, ThermalTime={{http://www.w3.org/2001/XMLSchema-instance}type=AirTemperatureFunction, Name=AirTemperatureFunction, XYPairs={Name=XYPairs, X=[2, 20, 35], Y=[0, 18, 0]}}}, LeafDeathPhase={Name=LateTuber, Start=FinalLeaf, End=FullSenescence, ThermalTime={{http://www.w3.org/2001/XMLSchema-instance}type=AirTemperatureFunction, Name=AirTemperatureFunction, XYPairs={Name=XYPairs, X=[2, 20, 35], Y=[0, 18, 0]}}}, EndPhase={Name=Maturity, Start=Maturity, End=Unused, ThermalTime={{http://www.w3.org/2001/XMLSchema-instance}type=AirTemperatureFunction, Name=AirTemperatureFunction, XYPairs={Name=XYPairs, X=[2, 20, 35], Y=[0, 18, 0]}}}}
          StageBasedInterpolation StageCode: Codes=[1, 2, 3, 4, 5, 6, 7]
            Stages=[Planting, Peeping, Emergence, TuberInitiation, FinalLeaf, FullSenescence, Maturity]
          AirTemperatureFunction
            XYPairs: X=[2, 20, 35]; Y=[0, 18, 0]
        Arbitrator: NArbitrationOption=PriorityThenRelativeAllocation; DMArbitrationOption=RelativeAllocation
        Structure: InitialiseStage=Emergence; PrimaryBudNo=2.2
          AirTemperatureFunction
            XYPairs: X=[2, 20, 35]; Y=[0, 18, 0]
          PhaseLookupValue: Start=Emergence; End=FinalLeaf
            DivideFunction NodeInitiationRateFunction
              VariableReference Phyllochron: VariableName=[Structure].MainStemNodeAppearanceRate.Phyllochron.Value
              Constant PrimordiaPerMainstemNode: Value=2
          PhaseLookupValue: Start=Emergence; End=FinalLeaf
            LinearInterpolationFunction Phyllochron: XProperty=[Structure].RelativeNodeApperance
              XYPairs: X=[0, 0.15, 0.74, 0.75]; Y=[5, 30, 30, 60]
          Constant: Value=34
          LinearInterpolationFunction: XProperty=[Stem].Live.Wt
            XYPairs: X=[0, 200, 1200, 4000]; Y=[20, 300, 700, 900]
          MultiplyFunction
            LinearInterpolationFunction: XProperty=[Structure].MainStemNodeNo
              XYPairs: X=[0, 7, 8, 13, 14, 34]; Y=[0, 0, 0.5, 0.5, 0, 0]
            LinearInterpolationFunction: XProperty=[Leaf].CoverGreen
              XYPairs: X=[0, 0.4, 0.55, 0.8, 1]; Y=[1, 1, 0.45, 0, 0]
          Constant: Value=0
          Constant: Value=0
        Summariser
          CompositeBiomass: Propertys=[[Leaf].Live, [Leaf].Dead, [Stem].Live, [Stem].Dead]
          CompositeBiomass: Propertys=[[Root].Live, [Root].Dead, [Tuber].Live, [Tuber].Dead]
          CompositeBiomass
            Propertys=[[Leaf].Live, [Leaf].Dead, [Stem].Live, [Stem].Dead, [Root].Live, [Root].Dead, [Tuber].Live, [Tuber].Dead]
      Manager PotatoSowingRule
        RowSpace = 280
        RowWidth = 770
        PlantingDepth = 150
        StemNumberPerSeedTuber = 2.2
        CultivarName = RussetBurbank
        SowingDate = 2003-11-10
```csharp
        using System;
        using Models.Core;
        using Models.PMF;
        namespace Models
        {
           [System.Xml.Serialization.XmlInclude(typeof(Model))]
            public class Script : Model
            {      
               [Link] Plant Plant;
               [Link] Clock Clock;

               [Description("Spacing (mm) between plants within rows")]
               public double RowSpace { get; set; }//= 280;
               [Description("Spacing (mm) between rows")]
               public double RowWidth { get; set; }//= 770;
               [Description("Depth (mm) tubers are planted")]
               public double PlantingDepth { get; set; }//= 150;
               [Description("Number of stems per seed tuber")]
               public double StemNumberPerSeedTuber { get; set; }//= 2.2;
               [Description("Cultivar")]
               public string CultivarName { get; set; }//= "RussetBurbank";
               [Description("Sowing Date")]
               public DateTime SowingDate { get; set; }//= new DateTime(2003, 11, 10, 0, 0, 0);

               private double PlantPopulation = 0;

               [EventSubscribe("StartOfDay")]
               private void OnStartOfDay(object sender, EventArgs e)
               {
				PlantPopulation = 1/((RowWidth/1000)*(RowSpace/1000));

				if (Clock.Today.Date.Equals(SowingDate))
                    Plant.Sow(Population:PlantPopulation, Cultivar:CultivarName, Depth:PlantingDepth, BudNumber:StemNumberPerSeedTuber);
                //Plant.Sow(... Contains the following arguements:
                //Population  double  Required  Seeds sowing/m2
                //Cultivar    string  Required  "NameOfCultivar"
                //Depth       double  Optional  Depth (mm) seed sown.   Default is 100mm 
                //MaxCover    double  Optional  Proportion (0-1) of the ground row crop will cover.   Default is 1.0
                //BudNumber   double  Optional  Number of mainstems per seed sown.  Default is 1.0
                //RowSpacing  double  Optional  Spaceing (mm) between drill rows when crop is sown.  Default is 150mm
                //CropClass   string  Optional  Crop class to instantiate when crop is sown.  Default is "Plant"
                //if (Clock.Today.DayOfYear == 30)
                //   Plant.EndCrop();
			   }
            }
        }
```
      Manager IrrigationRule
        IrrigationApplied = 0
        ApplicationAmount = 100
        ApplicationDate = 2003-12-20
```csharp
        using System;
        using Models.Core;
        using Models.PMF;
        namespace Models
        {
            public class Script : Model
            {      
               [Link] Irrigation Irrigation;
               [Link] Clock Clock;
			
			   [Description("Amount of water to apply")]
               public double ApplicationAmount {get; set;} 
               [Description("Date irrigation is applied")]
               public DateTime ApplicationDate {get; set;}
			   public double IrrigationApplied = 0;
			   
			   [EventSubscribe("StartOfDay")]
               private void OnStartOfDay(object sender, EventArgs e)
               {
				IrrigationApplied = 0;
				if (Clock.Today.Date.Equals(ApplicationDate))
                    {
                    Irrigation.Apply(Amount:ApplicationAmount);
                    IrrigationApplied = ApplicationAmount;
                    }
                  //Irrigation.Apply(Amount:a, Depth:b, Efficiency:c, willRunoff:"d");
                  //a is a double and can be represented by a variable name or a number representing the amount (mm) of irrigation to apply
			      //b is an optional double and can be represented by a variable name or a number representing the depth (mm) at which irrigation is applied
			      //if b is omitted a default value of 0 is used (irrigation is applied to the surface by defalt)
			      //c is an optional double and can be represented by a varialbe name or a number representing the efficiency (0-1) with which irrigation is applied
			      //if c is omitted a default of 1 is used (irrigation efficiency is 100% by defalt)
			      //d is a optional boolen and can be represented by text strings "true" or "false" determining if irrigation water will runoff or not
			      //if d is omitted a default of false is used (irrigation won't run off by defalt)
			   }
            }
        }
```
      Manager FertiliserRule
        NitrogenApplied = 0
        ApplicationAmount = 500
        FertType = NO3N
        ApplicationDate = 2003-12-30
```csharp
        using System;
        using Models.Core;
        using Models.PMF;
        namespace Models
        {
            public class Script : Model
            {      
               [Link] Fertiliser Fertiliser;
               [Link] Clock Clock;

               [Description("Amount (kg/ha) of fertiliser to apply")]
               public double ApplicationAmount {get; set;} //= 500;
               [Description("Type of fertiliser to apply")]
               public Fertiliser.Types FertType {get; set;}//= "NO3_N";
               [Description("Date of fertiliser application")]
               public DateTime ApplicationDate {get; set;} //= new DateTime(2003, 12, 30, 0, 0, 0);
               public double NitrogenApplied = 0;
               
               [EventSubscribe("StartOfDay")]
               private void OnStartOfDay(object sender, EventArgs e)
               {
               NitrogenApplied = 0;
               if (Clock.Today.Date.Equals(ApplicationDate))
                    {
                    Fertiliser.Apply(Amount:ApplicationAmount,Type:FertType);
                    NitrogenApplied = ApplicationAmount;
                    }
			      //Fertiliser.Apply(Amount:a, Type:"b", Depth:c)
			      //a is a double and can be represented by a variable name or a number representing the amount (kg/ha) of fertiliser to apply
			      //b is a string and can be represented by a variable name or text string (in quotes eg "UreaN") representing the type of fertiliser to apply
			      //c is an optional double and can be represented by a variable name or a number representing the depth (mm) to which fertiliser is applied
			      //if c is omitted a default depth of 0 is used (fertiliser is applied to the surface by defalt)
			   }
            }
        }
```
      Manager ExtraVariables
        InitialDay = false
        AccumPlantN = 0
        AccumMineralisation = 78.9481
        AccumDenit = 0
        AccumFert = 0
        AccumLeach = 0
        AccumDetach = 0
        DeltaSoilOMN = -17417.2
        DeltaSurfaceOMN = -11.56
        DeltaSoilMineralN = -98.8711
        AccumEO = -755.9
        AccumEP = 0
        AccumES = 0
        AccumDrainage = 0
        AccumRunoff = 0
        AccumOutflowLat = 0
        AccumIrrigation = 100
        AccumRainfall = 246.6
        SoilWaterDeficit = -110.101
        AccumTtemerg = 1894.12
        InitialSoilOMN = 18891.7
        InitialSurfaceOMN = 12
        InitialMineralN = 101.36
        SWC = 342.899
        DUL = 453
        OutFlowLat = 0
```csharp
        using System;
        using Models.Core;
		using System.Collections.Generic;
        using System.Text;
        using Models.PMF;
        using Models.Soils;
        using Models;
        namespace Models
        {
 public class Script : Model
{      
[Link] Clock Clock;
[Link] Soils.SoilNitrogen SoilN;
[Link] Soils.SoilWater SoilWat;
[Link] Models.SurfaceOM.SurfaceOrganicMatter SOM;
[Link] Plant Plant;          
[Link] WeatherFile Met;   
[Link] Fertiliser Fert;  
               
public bool InitialDay = true;

public double AccumPlantN = 0;
public double AccumMineralisation = 0;
public double AccumDenit = 0;
public double AccumFert = 0;
public double AccumLeach = 0;
public double AccumDetach = 0;
public double DeltaSoilOMN = 0;
public double DeltaSurfaceOMN = 0;
public double DeltaSoilMineralN = 0;

public double AccumEO = 0;
public double AccumEP = 0;
public double AccumES = 0;
public double AccumDrainage = 0;
public double AccumRunoff = 0;
public double AccumOutflowLat = 0;
public double AccumIrrigation = 0;
public double AccumRainfall = 0;
public double SoilWaterDeficit = 0;

public double AccumTtemerg = 0;

public double  InitialSoilOMN = 0;
public double  InitialSurfaceOMN = 0;
public double  InitialMineralN = 0;

public double SWC = 0;
public double DUL = 0;
public double OutFlowLat = 0;

[EventSubscribe("Initialised")]
private void OnInitialised(object sender, EventArgs e)
{
InitialDay = true;
AccumPlantN = 0;
AccumMineralisation = 0;
AccumDenit = 0;
AccumFert = 0;
AccumLeach = 0;
AccumDetach = 0;
DeltaSoilOMN = 0;
DeltaSurfaceOMN = 0;
DeltaSoilMineralN = 0;

AccumEO = 0;
AccumEP = 0;
AccumES = 0;
AccumDrainage = 0;
AccumRunoff = 0;
AccumOutflowLat = 0;
AccumIrrigation = 0;
AccumRainfall = 0;
SoilWaterDeficit = 0;

AccumTtemerg = 0;

InitialSoilOMN = 0;
InitialSurfaceOMN = 0;
InitialMineralN = 0;

SWC = 0;
DUL = 0;
OutFlowLat = 0;
}	   

[EventSubscribe("StartOfDay")]
private void OnStartOfDay(object sender, EventArgs e)
{
	int layers = SoilWat.dlayer.Length;
    if (InitialDay)
	{
      for (int layer = 0; layer < layers; layer++)
      { 
      InitialSoilOMN += (SoilN.biom_n[layer] + SoilN.fom_n[layer] + SoilN.hum_n[layer]);
      InitialSurfaceOMN += SOM.surfaceom_n;
      //InitialSurfaceOMN += (double)this.Get("SOM.surfaceom_n");
      InitialMineralN += (SoilN.no3[layer] + SoilN.nh4[layer] + SoilN.urea[layer]);
      }
      InitialDay = false;
    }

//!!!!!! Nitrogen balance components !!!!!!
//!!!!!!^^^^^^^^^^^^^^^^^^^^^^^^^^^^^!!!!!!
//AccumPlantN =  AccumPlantN - Plant.Root.Nuptake;
//AccumPlantN =+ (double)this.Get("Plant.Root.Nuptake");
//AccumFert += Fertiliser.FertiliserApplied;
DeltaSurfaceOMN = SOM.surfaceom_n - InitialSurfaceOMN;
AccumDetach = 0; //plant2 doesn't detach yet
//AccumLeach = AccumLeach - SoilN.leach_urea - SoilN.leach_no3 - SoilN.leach_nh4; 
   for (int layer = 0; layer < layers; layer++)
    { 
    AccumMineralisation += (SoilN.dlt_n_min[layer] + SoilN.dlt_n_min_res[layer]);
    AccumDenit -= SoilN.dnit[layer] ;
    DeltaSoilOMN = (SoilN.biom_n[layer] + SoilN.fom_n[layer] + SoilN.hum_n[layer]) - InitialSoilOMN;
    DeltaSoilMineralN = (SoilN.no3[layer] + SoilN.nh4[layer] + SoilN.urea[layer]) - InitialMineralN;
    }

//!!!!!! Water balance components !!!!!!
//!!!!!!^^^^^^^^^^^^^^^^^^^^^^^^^^!!!!!!
AccumEO -= SoilWat.eo;
//AccumEP = AccumEP - Plant.Leaf.Transpiration;
AccumES -= SoilWat.es;
AccumDrainage -= SoilWat.drain;
AccumRunoff -= SoilWat.runoff;
AccumIrrigation += SoilWat.irrigation;
AccumRainfall += Met.Rain;
SWC = 0;
DUL = 0;
OutFlowLat = 0;
   for (int layer = 0; layer < layers; layer++)
   {
     SWC += SoilWat.sw_dep[layer];
     DUL += SoilWat.dul_dep[layer];
     OutFlowLat = SoilWat.outflow_lat[layer];
   }
AccumOutflowLat -= OutFlowLat;
SoilWaterDeficit =  (SWC - DUL);
//!!!!!! Thermal time calculation !!!!!!
//!!!!!! ^^^^^^^^^^^^^^^^^^^^^^^^ !!!!!!
if (Plant.Phenology.StageCode.Value >= 3)
AccumTtemerg += Plant.Phenology.ThermalTime.Value;
}
}
}
```
    Input: FileName=TestObserved.txt
  DataStore: AutoCreateReport=true
  Tests
    Test:
      SimulationName  TableName  Type       ColumnNames                      Parameters
      Test            Report     Tolerance  Plant.Phenology.StageCode.Value  1,1
      Test            Report     Tolerance  Plant.Structure.Population       1,1
      Test            Report     Tolerance  Plant.Leaf.LAI                   1,1
      Test            Report     Tolerance  Plant.Leaf.CoverGreen            1,1
      Test            Report     Tolerance  Plant.Leaf.Live.Wt               1,1
      Test            Report     Tolerance  Plant.Stem.Live.Wt               1,1
      Test            Report     Tolerance  Plant.Tuber.Live.Wt              1,1
      Test            Report     Tolerance  Plant.Root.Live.Wt               1,1
      Test            Report     Tolerance  Plant.Leaf.Live.N                1,1
      Test            Report     Tolerance  Plant.Stem.Live.N                1,1
      Test            Report     Tolerance  Plant.Tuber.Live.N               1,1
      Test            Report     Tolerance  Plant.Root.Live.N                1,1
      Test            Report     AllPos     WeatherFile.MaxT                 -
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