Simulations: Version=14
  DataStore
  Simulation BiomassRemoveHarvestTest
    Weather: FileName=%root%\Tests\WeatherFiles\lincoln.met
    Clock: StartDate=2010-10-01; EndDate=2013-07-31
    Summary
    SoilArbitrator Soil Arbitrator
    Zone Field: Area=1; Slope=0
      Soil: Latitude=0; Longitude=0
        Analysis: Thickness=[100, 200, 300, 300, 300, 300]; PH=[6.6, 6.2, 5.7, 5.5, 5.5, 5.5]; PHUnits=Water; BoronUnits=HotWater
        InitialWater Initial water: PercentMethod=EvenlyDistributed; FractionFull=1
        Water
          Thickness  BD   AirDry  LL15  DUL   SAT
          100        1.2  0.08    0.13  0.33  0.5
          200        1.2  0.13    0.13  0.33  0.5
          300        1.2  0.1     0.1   0.31  0.44
          300        1.2  0.06    0.06  0.15  0.46
          300        1.2  0.04    0.04  0.1   0.44
          300        1.2  0.02    0.02  0.06  0.44
          SoilCrop SCRUMSoil: LL=[0.13, 0.13, 0.1, 0.08, 0.11, 0.11]; KL=[0.1, 0.1, 0.1, 0.1, 0.1, 0.1]; XF=[1, 1, 1, 1, 1, 1]
          SoilCrop PotatoSoil: LL=[0.13, 0.13, 0.27, 0.27, 0.3, 0.3]; KL=[0.1, 0.06, 0.03, 0.01, 0, 0]; XF=[1, 1, 0.1, 0, 0, 0]
        SoilWater: SummerDate=1-Nov; SummerU=9; SummerCona=4.4; WinterDate=1-Apr; WinterU=9; WinterCona=4.4; DiffusConst=88; DiffusSlope=35.4; Salb=0.18; CN2Bare=68; CNRed=20; CNCov=0.8; slope=0; discharge_width=0; catchment_area=0; max_pond=0; residueinterception=0
          Thickness  SWCON  KLAT
          100        0.55   0
          200        0.55   0
          300        0.55   0
          300        0.55   0
          300        0.55   0
          300        0.55   0
        SoilNitrogen: fom_type=[default, manure, mucuna, lablab, shemp, stable]; fract_carb=[0.2, 0.3, 0.54, 0.57, 0.45, 0]; fract_cell=[0.7, 0.3, 0.37, 0.37, 0.47, 0.1]; fract_lign=[0.1, 0.4, 0.09, 0.06, 0.08, 0.9]; wfpsN2N2O_x=[22, 88]; wfpsN2N2O_y=[0.1, 1]; oc=[1.83566, 1.46334, 1.19884, 1.0301, 0.470338, 0.470138]
        SoilOrganicMatter: RootCN=30; RootWt=3000; SoilCN=11.5; EnrACoeff=7.4; EnrBCoeff=0.2; OCUnits=Total
          Thickness  OC    FBiom  FInert
          100        1.82  0.025  0.3
          200        1.47  0.025  0.4
          300        1.2   0.015  0.75
          300        1.03  0.01   0.9
          300        0.47  0.01   0.96
          300        0.47  0.01   0.96
        Sample Initial nitrogen: NO3Units=kgha; NH4Units=ppm; SWUnits=Volumetric; OCUnits=Total; PHUnits=Water
          Thickness  NO3  NH4
          100        270  0
          200        30   0
          300        5    0
          300        5    0
          300        0    0
          300        0    0
      SurfaceOrganicMatter surface organic matter: PondActive=no; ReportAdditions=no; ReportRemovals=no; PoolName=wheat; type=wheat; mass=2000; standing_fraction=0; cnr=80; CriticalResidueWeight=2000; OptimumDecompTemp=20; MaxCumulativeEOS=20; CNRatioDecompCoeff=0.277; CNRatioDecompThreshold=25; TotalLeachRain=25; MinRainToLeach=10; CriticalMinimumOrganicC=0.004; DefaultCPRatio=0; DefaultStandingFraction=0; StandingExtinctCoeff=0.5; FractionFaecesAdded=0.5
        Pools:
          {PoolName=wheat, ResidueType=wheat, Mass=2000, CNRatio=80, StandingFraction=0}
        ResidueTypes: LoadFromResource=ResidueTypes
        TillageTypes TillageTypesList
      MicroClimate: a_interception=0; b_interception=1; c_interception=0; d_interception=0; soil_albedo=0.23; sun_angle=15; soil_heat_flux_fraction=0.4; night_interception_fraction=0.5; refheight=2; albedo=0.26; emissivity=0.96; RadIntTotal=0
      Plant SCRUM: CropType=SCRUM
      Irrigation
      Fertiliser
      Manager SowingAndHarvesting
        CultivarName = Green_Peas
        InitialRootDepth = 10
        SowingDate = 2010-10-14
        SowingDate2 = 2011-09-14
        SowingDate3 = 2012-08-14
        HarvestDate = 2011-03-14
        HarvestDate2 = 2012-02-14
        HarvestDate3 = 2013-01-14
        EndCropDate = 2011-05-14
        EndCropDate2 = 2012-06-14
        EndCropDate3 = 2013-07-14
```csharp
using System;
using System.Collections.Generic;
using Models.Core;
using Models.PMF;
using Models.PMF.Interfaces;
using System.Xml.Serialization;

namespace Models
{
	[Serializable] 
	[System.Xml.Serialization.XmlInclude(typeof(Model))]
	public class Script : Model
	{
		[Link] Plant MCSP;
		[Link] Clock Clock;

		[Description("Cultivar")]
		public string CultivarName { get; set; }
		[Description("Initial Root Depth")]
		public double InitialRootDepth { get; set; }
		[Description("Sowing Date")]
		public DateTime SowingDate { get; set; }
		[Description("Sowing Date2")]
		public DateTime SowingDate2 { get; set; }
		[Description("Sowing Date3")]
		public DateTime SowingDate3 { get; set; }
		[Description("Harvest Date")]
		public DateTime HarvestDate { get; set; }
		[Description("Harvest Date2")]
		public DateTime HarvestDate2 { get; set; }
		[Description("Harvest Date3")]
		public DateTime HarvestDate3 { get; set; }
		[Description("EndCrop Date")]
		public DateTime EndCropDate { get; set; }
		[Description("EndCrop Date2")]
		public DateTime EndCropDate2 { get; set; }
		[Description("EndCrop Date3")]
		public DateTime EndCropDate3 { get; set; }
		
		[XmlIgnore] private RemovalFractions Remove { get; set; }
		
		[EventSubscribe("Commencing")]
		private void OnSimulationCommencing(object sender, EventArgs e)
		{
			Remove = new RemovalFractions();
		}
		
		[EventSubscribe("DoManagement")]
		private void OnDoManagement(object sender, EventArgs e)
		{
			//Set up  array of remove fractions to send with harvest method.  Each member in the array corresponds to an organ in the same order they are set up in.

			if (Clock.Today.Date == SowingDate)
				MCSP.Sow(cultivar: CultivarName, population: 1, depth: InitialRootDepth, rowSpacing: 150);
			else if (Clock.Today.Date == HarvestDate)
			{
				//Harvest without sending defoliation data to test defaults
				MCSP.Harvest();
			}
			else if (Clock.Today.Date == EndCropDate)
				MCSP.EndCrop();
			
			//Change fractions to remove
			if (Clock.Today.Date == SowingDate2)
				MCSP.Sow(cultivar: CultivarName, population: 1, depth: InitialRootDepth, rowSpacing: 150);
			else if (Clock.Today.Date == HarvestDate2)
			{
				//Harvest with manager specified removal fractions
				Remove.SetFractionToRemove("Product", 0.3);
				Remove.SetFractionToRemove("Stover", 0.1);
				Remove.SetFractionToResidue("Product", 0.3);
				Remove.SetFractionToResidue("Stover", 0.7);
				MCSP.Harvest(Remove);
			}
			else if (Clock.Today.Date == EndCropDate2)
				MCSP.EndCrop();
			
			//Change fractions to remove
			if (Clock.Today.Date == SowingDate3)
				MCSP.Sow(cultivar: CultivarName, population: 1, depth: InitialRootDepth, rowSpacing: 150);
			else if (Clock.Today.Date == HarvestDate3)
			{
				Remove.SetFractionToRemove("Product", 0.5);
				Remove.SetFractionToRemove("Stover", 0.3);
				Remove.SetFractionToResidue("Product", 0.3);
				Remove.SetFractionToResidue("Stover", 0.7);
				MCSP.Harvest(Remove);
			}
			else if (Clock.Today.Date == EndCropDate3)
				MCSP.EndCrop();
			//PMFCrop.Sow(... Contains the following arguements:
			//Population  double  Optional  Seeds sowing/m2.  Default is zero
			//Cultivar    string  Required  "NameOfCultivar"
			//Depth       double  Optional  Depth (mm) seed sown.   Default is 100mm 
			//MaxCover    double  Optional  Proportion (0-1) of the ground row crop will cover.   Default is 1.0
			//BudNumber   double  Optional  Number of mainstems per seed sown.  Default is 1.0
			//RowSpacing  double  Optional  Spaceing (mm) between drill rows when crop is sown.  Default is 150mm
			//CropClass   string  Optional  Crop class to instantiate when crop is sown.  Default is "Plant"
		}
	}
}
```
      Manager ExtraVariables
```csharp
using System;
using Models.Core;
using System.Collections.Generic;
using System.Text;
using Models.Soils;
using Models.PMF;
using Models;
using System.Xml.Serialization;
using APSIM.Shared.Utilities;


namespace Models
{
	[Serializable] 
	public class Script : Model
	{
		[Link] Clock Clock;
		[Link] Soils.Soil Soil;
		[Link] Models.SurfaceOM.SurfaceOrganicMatter SOM;
		[Link] Weather Met;
		[Link] Fertiliser Fert;
		[Link] Irrigation Irrig;
		[Link] Plant SCRUM;
		[Link] Zone zone;
					
		[XmlIgnore] public bool InitialDay { get; set; }
		
		[XmlIgnore] public double AccumPlantN { get; set; }
		[XmlIgnore] public double AccumMineralisation { get; set; }
		[XmlIgnore] public double AccumDenit { get; set; }
		[XmlIgnore] public double AccumFert { get; set; }
		[XmlIgnore] public double AccumLeach { get; set; }
		[XmlIgnore] public double AccumDetach { get; set; }
		[XmlIgnore] public double DeltaSoilOMN { get; set; }
		[XmlIgnore] public double DeltaSurfaceOMN { get; set; }
		[XmlIgnore] public double DeltaSoilMineralN { get; set; }
		[XmlIgnore] public double SoilNitrogenContent { get; set; }
		
		[XmlIgnore] public double AccumEO { get; set; }
		[XmlIgnore] public double AccumEP { get; set; }
		[XmlIgnore] public double AccumES { get; set; }
		[XmlIgnore] public double AccumDrainage { get; set; }
		[XmlIgnore] public double AccumRunoff { get; set; }
		[XmlIgnore] public double AccumOutflowLat { get; set; }
		[XmlIgnore] public double AccumIrrigation { get; set; }
		[XmlIgnore] public double AccumRainfall { get; set; }
		[XmlIgnore] public double SoilWaterDeficit { get; set; }
	
		[XmlIgnore] public double  InitialSoilOMN { get; set; }
		[XmlIgnore] public double  InitialSurfaceOMN { get; set; }
		[XmlIgnore] public double  InitialMineralN { get; set; }
		
		[XmlIgnore] public double SWC { get; set; }
		[XmlIgnore] public double DUL { get; set; }
		[XmlIgnore] public double OutFlowLat { get; set; }

		[XmlIgnore] public double FomN { get; set; }
		[XmlIgnore] public double BiomN { get; set; }
		[XmlIgnore] public double HumN { get; set; }
		[XmlIgnore] public double OrganicN { get; set; }
		[XmlIgnore] public double NO3N { get; set; }
		[XmlIgnore] public double NH4N { get; set; }
		[XmlIgnore] public double UreaN { get; set; }
		[XmlIgnore] public double MineralN { get; set; }
		[XmlIgnore] public double DltNMinRes { get; set; }
		[XmlIgnore] public double DltNMinTot { get; set; }
		
		[EventSubscribe("Commencing")]
		private void OnSimulationCommencing(object sender, EventArgs e)
		{
			InitialDay = true;
		}
		
		[EventSubscribe("DoManagement")]
		private void OnDoManagement(object sender, EventArgs e)
		{
			//!!!!!! Nitrogen balance components !!!!!!
			//!!!!!!^^^^^^^^^^^^^^^^^^^^^^^^^^^^^!!!!!!
			FomN = MathUtilities.Sum(Soil.SoilNitrogen.FOMN);
			HumN = MathUtilities.Sum(Soil.SoilNitrogen.HumicN);
			BiomN = MathUtilities.Sum(Soil.SoilNitrogen.MicrobialN);
			OrganicN = FomN + HumN + BiomN;
			NO3N = MathUtilities.Sum(Soil.NO3N);
			NH4N = MathUtilities.Sum(Soil.NH4N);
			UreaN = MathUtilities.Sum(Soil.SoilNitrogen.urea);
			MineralN = NO3N + NH4N + UreaN; 
			DltNMinRes = MathUtilities.Sum(Soil.SoilNitrogen.dlt_n_min_res);
			DltNMinTot = MathUtilities.Sum(Soil.SoilNitrogen.MineralisedN);
			int layers = Soil.Thickness.Length;
			if (InitialDay == true)
			{
				InitialSurfaceOMN = SOM.N;
				InitialSoilOMN = OrganicN;
				InitialMineralN = MineralN;
				InitialDay = false;
			}
			DeltaSurfaceOMN = SOM.N - InitialSurfaceOMN;
			AccumLeach = AccumLeach - Soil.SoilWater.LeachNH4 - Soil.SoilWater.LeachNO3 - Soil.SoilWater.LeachUrea; //Fails
			AccumMineralisation += MathUtilities.Sum(Soil.SoilNitrogen.MineralisedN);
			AccumDenit -= MathUtilities.Sum(Soil.SoilNitrogen.Denitrification);
			//AccumPlantN -= (double)zone.Get("SCRUM.Root.NUptake");
			DeltaSoilOMN = OrganicN - InitialSoilOMN;
			DeltaSoilMineralN = MineralN - InitialMineralN;
			SoilNitrogenContent = MineralN;
			
			//!!!!!! Water balance components !!!!!!
			//!!!!!!^^^^^^^^^^^^^^^^^^^^^^^^^^!!!!!!

			AccumRainfall += Met.Rain;
			//AccumEP -= (double)zone.Get("[SCRUM].Stover.Transpiration");
			AccumEP -= (double)zone.Get("SCRUM.Root.WaterUptake");
			SoilWaterDeficit = (SWC - DUL);
			double OutFlowLat = MathUtilities.Sum(Soil.SoilWater.outflow_lat);
			AccumOutflowLat -= OutFlowLat;
		}
		
		[EventSubscribe("DoManagementCalculations")]
		private void OnDoManagementCalculations(object sender, EventArgs e)
		{
			FomN = MathUtilities.Sum(Soil.SoilNitrogen.FOMN);
			HumN = MathUtilities.Sum(Soil.SoilNitrogen.HumicN);
			BiomN = MathUtilities.Sum(Soil.SoilNitrogen.MicrobialN);
			AccumFert += Fert.NitrogenApplied;
			AccumIrrigation += Irrig.IrrigationApplied;
			
			
			AccumEO -= Soil.SoilWater.Eo;
			AccumES -= Soil.SoilWater.Es; 
			AccumDrainage -= Soil.SoilWater.Drainage;
			AccumRunoff -= Soil.SoilWater.Runoff;
			SWC = MathUtilities.Sum(Soil.SoilWater.SWmm);
			DUL = MathUtilities.Sum(Soil.SoilWater.DULmm);
		}
	}
}
```
      Report: EventNames=[Clock].DoReport
        VariableNames:
          [Clock].Today
          [ExtraVariables].Script.AccumPlantN
          [ExtraVariables].Script.AccumMineralisation
          [ExtraVariables].Script.AccumDenit
          [ExtraVariables].Script.AccumFert
          [ExtraVariables].Script.AccumLeach
          [ExtraVariables].Script.AccumDetach
          [ExtraVariables].Script.DeltaSoilOMN
          [ExtraVariables].Script.DeltaSurfaceOMN
          [ExtraVariables].Script.DeltaSoilMineralN
          [ExtraVariables].Script.SWC
          [ExtraVariables].Script.DUL
          [ExtraVariables].Script.OutFlowLat
          [ExtraVariables].Script.AccumEO
          [ExtraVariables].Script.AccumEP
          [ExtraVariables].Script.AccumES
          [ExtraVariables].Script.AccumDrainage
          [ExtraVariables].Script.AccumRunoff
          [ExtraVariables].Script.AccumRainfall
          [ExtraVariables].Script.AccumIrrigation
          [ExtraVariables].Script.AccumOutflowLat
          [ExtraVariables].Script.SoilWaterDeficit
          [ExtraVariables].Script.SoilNitrogenContent
          [ExtraVariables].Script.FomN
          [ExtraVariables].Script.HumN
          [ExtraVariables].Script.BiomN
          [ExtraVariables].Script.DltNMinRes
          [ExtraVariables].Script.DltNMinTot
          [MicroClimate].net_radn
          [MicroClimate].peta
          [MicroClimate].petr
          [Soil].SoilWater.Drainage
          [Soil].SoilWater.Runoff
          [Soil].SoilWater.Eo
          [Soil].SoilWater.Es
          [Soil].SoilWater.pond
          [Soil].SoilWater.SWmm
          [Soil].NO3N
          [SCRUM].Stover.Live.Wt
          [SCRUM].Root.Live.Wt
          [SCRUM].Product.Live.Wt
          [SCRUM].Stover.Live.N
          [SCRUM].Root.Live.N
          [SCRUM].Product.Live.N
          [SCRUM].Stover.Live.NConc
          [SCRUM].Root.Live.NConc
          [SCRUM].Product.Live.NConc
          [SCRUM].Root.WaterSupply
          [SCRUM].Root.WaterUptake
          [SCRUM].Stover.Transpiration
          [SCRUM].Stover.WaterDemand
          [SCRUM].Root.Depth
          [SCRUM].Stover.CoverTotal
          [SCRUM].Stover.CoverDead
          [SCRUM].Stover.LAI
          [SCRUM].Stover.Height
          [SCRUM].Stover.PotentialBiomass.Value()
          [SCRUM].Product.LiveFWt
          [SCRUM].Arbitrator.N.TotalPlantDemand
          [SCRUM].Arbitrator.N.TotalPlantSupply
          [SCRUM].Stover.Fw
          [SCRUM].Stover.Fn
          [SCRUM].Total.Wt
          [SCRUM].ExpectedYield.Value()
          [SCRUM].DryYield.Value()
          [SCRUM].TotalBiomassAtStartReproductive.Value()
          [SCRUM].TotalBiomassAtStartSenescence.Value()
          [SCRUM].Ymax.Value()
          [SCRUM].Total.N
          [SCRUM].Arbitrator.DM.TotalFixationSupply
          [SCRUM].Arbitrator.DM.TotalPlantDemand
          [SCRUM].Phenology.AccumulatedThermalTime.Value()
          [SCRUM].Arbitrator.DM.SinkLimitation
          [SCRUM].Arbitrator.DM.NutrientLimitation
          [SCRUM].Phenology.ThermalTime.Value()
          [SCRUM].Phenology.CurrentPhaseName
          [SCRUM].Phenology.Stage
          [AutomaticIrrigation].Script.Top_Refull
          [AutomaticIrrigation].Script.Top_Trigger
          [AutomaticIrrigation].Script.Top_SW
          [AutomaticIrrigation].Script.Top_DUL
          [Irrigation].IrrigationApplied
          [AutomaticIrrigation].Script.Amount_to_apply
          [AutomaticIrrigation].Script.StartDate
          [Clock].Today
          [AutomaticIrrigation].Script.SeasonIsOpen
          [AutomaticIrrigation].Script.EndDate
          [AutomaticIrrigation].Script.TodayYear
          [SCRUM].Arbitrator.FN
          [SurfaceOrganicMatter].wt
          sum([Soil].SoilNitrogen.FOMN)
  Simulation BiomassRemoveCutTest
    Weather: FileName=%root%\Tests\WeatherFiles\lincoln.met
    Clock: StartDate=2010-10-01; EndDate=2013-07-31
    Summary
    SoilArbitrator Soil Arbitrator
    Zone Field: Area=1; Slope=0
      Soil: same as BiomassRemoveHarvestTest.Field.Soil
      SurfaceOrganicMatter surface organic matter: same as BiomassRemoveHarvestTest.Field.surface organic matter
      MicroClimate: a_interception=0; b_interception=1; c_interception=0; d_interception=0; soil_albedo=0.23; sun_angle=15; soil_heat_flux_fraction=0.4; night_interception_fraction=0.5; refheight=2; albedo=0.26; emissivity=0.96; RadIntTotal=0
      Plant SCRUM: CropType=SCRUM
      Irrigation
      Fertiliser
      Manager SowingAndCutting
        CultivarName = Green_Peas
        InitialRootDepth = 10
        SowingDate = 2010-10-14
        SowingDate2 = 2011-09-14
        SowingDate3 = 2012-08-14
        CutDate = 2011-03-14
        CutDate2 = 2012-02-14
        CutDate3 = 2013-01-14
        EndCropDate = 2011-05-14
        EndCropDate2 = 2012-06-14
        EndCropDate3 = 2013-07-14
```csharp
using System;
using System.Collections.Generic;
using Models.Core;
using Models.PMF;
using Models.PMF.Interfaces;
using System.Xml.Serialization;

namespace Models
{
	[Serializable] 
	[System.Xml.Serialization.XmlInclude(typeof(Model))]
	public class Script : Model
	{
		[Link] Plant MCSP;
		[Link] Clock Clock;

		[Description("Cultivar")]
		public string CultivarName { get; set; }
		[Description("Initial Root Depth")]
		public double InitialRootDepth { get; set; }
		[Description("Sowing Date")]
		public DateTime SowingDate { get; set; }
		[Description("Sowing Date2")]
		public DateTime SowingDate2 { get; set; }
		[Description("Sowing Date3")]
		public DateTime SowingDate3 { get; set; }
		[Description("Cut Date")]
		public DateTime CutDate { get; set; }
		[Description("Cut Date2")]
		public DateTime CutDate2 { get; set; }
		[Description("Cut Date3")]
		public DateTime CutDate3 { get; set; }
		[Description("EndCrop Date")]
		public DateTime EndCropDate { get; set; }
		[Description("EndCrop Date2")]
		public DateTime EndCropDate2 { get; set; }
		[Description("EndCrop Date3")]
		public DateTime EndCropDate3 { get; set; }
		
		[XmlIgnore] private RemovalFractions Remove { get; set; }
		
		[EventSubscribe("Commencing")]
		private void OnSimulationCommencing(object sender, EventArgs e)
		{
			Remove = new RemovalFractions();
		}
		
		[EventSubscribe("DoManagement")]
		private void OnDoManagement(object sender, EventArgs e)
		{
			//Set up  array of remove fractions to send with Cut method.  Each member in the array corresponds to an organ in the same order they are set up in.

			if (Clock.Today.Date == SowingDate)
				MCSP.Sow(cultivar: CultivarName, population: 1, depth: InitialRootDepth, rowSpacing: 150);
			else if (Clock.Today.Date == CutDate)
			{
				//Cut without sending defoliation data to test defaults
				MCSP.RemoveBiomass("Cut");
			}
			else if (Clock.Today.Date == EndCropDate)
				MCSP.EndCrop();
			
			//Change fractions to remove
			if (Clock.Today.Date == SowingDate2)
				MCSP.Sow(cultivar: CultivarName, population: 1, depth: InitialRootDepth, rowSpacing: 150);
			else if (Clock.Today.Date == CutDate2)
			{
				//Harvest with manager specified removal fractions
				Remove.SetFractionToRemove("Product", 0.3);
				Remove.SetFractionToRemove("Stover", 0.1);
				Remove.SetFractionToResidue("Product", 0.3);
				Remove.SetFractionToResidue("Stover", 0.7);
				MCSP.RemoveBiomass("Cut", Remove);
			}
			else if (Clock.Today.Date == EndCropDate2)
				MCSP.EndCrop();
			
			//Change fractions to remove
			if (Clock.Today.Date == SowingDate3)
				MCSP.Sow(cultivar: CultivarName, population: 1, depth: InitialRootDepth, rowSpacing: 150);
			else if (Clock.Today.Date == CutDate3)
			{
				Remove.SetFractionToRemove("Product", 0.5);
				Remove.SetFractionToRemove("Stover", 0.3);
				Remove.SetFractionToResidue("Product", 0.3);
				Remove.SetFractionToResidue("Stover", 0.7);
				MCSP.RemoveBiomass("Cut", Remove);
			}
			else if (Clock.Today.Date == EndCropDate3)
				MCSP.EndCrop();
			//PMFCrop.Sow(... Contains the following arguements:
			//Population  double  Optional  Seeds sowing/m2.  Default is zero
			//Cultivar    string  Required  "NameOfCultivar"
			//Depth       double  Optional  Depth (mm) seed sown.   Default is 100mm 
			//MaxCover    double  Optional  Proportion (0-1) of the ground row crop will cover.   Default is 1.0
			//BudNumber   double  Optional  Number of mainstems per seed sown.  Default is 1.0
			//RowSpacing  double  Optional  Spaceing (mm) between drill rows when crop is sown.  Default is 150mm
			//CropClass   string  Optional  Crop class to instantiate when crop is sown.  Default is "Plant"
		}
	}
}
```
      Manager ExtraVariables
```csharp
using System;
using Models.Core;
using System.Collections.Generic;
using System.Text;
using Models.Soils;
using Models.PMF;
using Models;
using System.Xml.Serialization;
using APSIM.Shared.Utilities;


namespace Models
{
	[Serializable] 
	public class Script : Model
	{
		[Link] Clock Clock;
		[Link] Soils.Soil Soil;
		[Link] Models.SurfaceOM.SurfaceOrganicMatter SOM;
		[Link] Weather Met;
		[Link] Fertiliser Fert;
		[Link] Irrigation Irrig;
		[Link] Plant SCRUM;
		[Link] Zone zone;
					
		[XmlIgnore] public bool InitialDay { get; set; }
		
		[XmlIgnore] public double AccumPlantN { get; set; }
		[XmlIgnore] public double AccumMineralisation { get; set; }
		[XmlIgnore] public double AccumDenit { get; set; }
		[XmlIgnore] public double AccumFert { get; set; }
		[XmlIgnore] public double AccumLeach { get; set; }
		[XmlIgnore] public double AccumDetach { get; set; }
		[XmlIgnore] public double DeltaSoilOMN { get; set; }
		[XmlIgnore] public double DeltaSurfaceOMN { get; set; }
		[XmlIgnore] public double DeltaSoilMineralN { get; set; }
		[XmlIgnore] public double SoilNitrogenContent { get; set; }
		
		[XmlIgnore] public double AccumEO { get; set; }
		[XmlIgnore] public double AccumEP { get; set; }
		[XmlIgnore] public double AccumES { get; set; }
		[XmlIgnore] public double AccumDrainage { get; set; }
		[XmlIgnore] public double AccumRunoff { get; set; }
		[XmlIgnore] public double AccumOutflowLat { get; set; }
		[XmlIgnore] public double AccumIrrigation { get; set; }
		[XmlIgnore] public double AccumRainfall { get; set; }
		[XmlIgnore] public double SoilWaterDeficit { get; set; }
	
		[XmlIgnore] public double  InitialSoilOMN { get; set; }
		[XmlIgnore] public double  InitialSurfaceOMN { get; set; }
		[XmlIgnore] public double  InitialMineralN { get; set; }
		
		[XmlIgnore] public double SWC { get; set; }
		[XmlIgnore] public double DUL { get; set; }
		[XmlIgnore] public double OutFlowLat { get; set; }

		[XmlIgnore] public double FomN { get; set; }
		[XmlIgnore] public double BiomN { get; set; }
		[XmlIgnore] public double HumN { get; set; }
		[XmlIgnore] public double OrganicN { get; set; }
		[XmlIgnore] public double NO3N { get; set; }
		[XmlIgnore] public double NH4N { get; set; }
		[XmlIgnore] public double UreaN { get; set; }
		[XmlIgnore] public double MineralN { get; set; }
		[XmlIgnore] public double DltNMinRes { get; set; }
		[XmlIgnore] public double DltNMinTot { get; set; }
		
		[EventSubscribe("Commencing")]
		private void OnSimulationCommencing(object sender, EventArgs e)
		{
			InitialDay = true;
		}
		
		[EventSubscribe("DoManagement")]
		private void OnDoManagement(object sender, EventArgs e)
		{
			//!!!!!! Nitrogen balance components !!!!!!
			//!!!!!!^^^^^^^^^^^^^^^^^^^^^^^^^^^^^!!!!!!
			FomN = MathUtilities.Sum(Soil.SoilNitrogen.FOMN);
			HumN = MathUtilities.Sum(Soil.SoilNitrogen.HumicN);
			BiomN = MathUtilities.Sum(Soil.SoilNitrogen.MicrobialN);
			OrganicN = FomN + HumN + BiomN;
			NO3N = MathUtilities.Sum(Soil.NO3N);
			NH4N = MathUtilities.Sum(Soil.NH4N);
			UreaN = MathUtilities.Sum(Soil.SoilNitrogen.urea);
			MineralN = NO3N + NH4N + UreaN; 
			DltNMinRes = MathUtilities.Sum(Soil.SoilNitrogen.dlt_n_min_res);
			DltNMinTot = MathUtilities.Sum(Soil.SoilNitrogen.MineralisedN);
			int layers = Soil.Thickness.Length;
			if (InitialDay == true)
			{
				InitialSurfaceOMN = SOM.N;
				InitialSoilOMN = OrganicN;
				InitialMineralN = MineralN;
				InitialDay = false;
			}
			DeltaSurfaceOMN = SOM.N - InitialSurfaceOMN;
			AccumLeach = AccumLeach - Soil.SoilWater.LeachNH4 - Soil.SoilWater.LeachNO3 - Soil.SoilWater.LeachUrea; //Fails
			AccumMineralisation += MathUtilities.Sum(Soil.SoilNitrogen.MineralisedN);
			AccumDenit -= MathUtilities.Sum(Soil.SoilNitrogen.Denitrification);
			AccumPlantN -= (double)zone.Get("SCRUM.Root.NUptake");
			DeltaSoilOMN = OrganicN - InitialSoilOMN;
			DeltaSoilMineralN = MineralN - InitialMineralN;
			SoilNitrogenContent = MineralN;
			
			//!!!!!! Water balance components !!!!!!
			//!!!!!!^^^^^^^^^^^^^^^^^^^^^^^^^^!!!!!!

			AccumRainfall += Met.Rain;
			//AccumEP -= (double)zone.Get("[SCRUM].Stover.Transpiration");
			AccumEP -= (double)zone.Get("SCRUM.Root.WaterUptake");
			SoilWaterDeficit = (SWC - DUL);
			double OutFlowLat = MathUtilities.Sum(Soil.SoilWater.outflow_lat);
			AccumOutflowLat -= OutFlowLat;
		}
		
		[EventSubscribe("DoManagementCalculations")]
		private void OnDoManagementCalculations(object sender, EventArgs e)
		{
			FomN = MathUtilities.Sum(Soil.SoilNitrogen.FOMN);
			HumN = MathUtilities.Sum(Soil.SoilNitrogen.HumicN);
			BiomN = MathUtilities.Sum(Soil.SoilNitrogen.MicrobialN);
			AccumFert += Fert.NitrogenApplied;
			AccumIrrigation += Irrig.IrrigationApplied;
			
			
			AccumEO -= Soil.SoilWater.Eo;
			AccumES -= Soil.SoilWater.Es; 
			AccumDrainage -= Soil.SoilWater.Drainage;
			AccumRunoff -= Soil.SoilWater.Runoff;
			SWC = MathUtilities.Sum(Soil.SoilWater.SWmm);
			DUL = MathUtilities.Sum(Soil.SoilWater.DULmm);
		}
	}
}
```
      Report: same as BiomassRemoveHarvestTest.Field.Report
  Simulation BiomassRemovePrunTest
    Weather: FileName=%root%\Tests\WeatherFiles\lincoln.met
    Clock: StartDate=2010-10-01; EndDate=2013-07-31
    Summary
    SoilArbitrator Soil Arbitrator
    Zone Field: Area=1; Slope=0
      Soil: same as BiomassRemoveHarvestTest.Field.Soil
      SurfaceOrganicMatter surface organic matter: same as BiomassRemoveHarvestTest.Field.surface organic matter
      MicroClimate: a_interception=0; b_interception=1; c_interception=0; d_interception=0; soil_albedo=0.23; sun_angle=15; soil_heat_flux_fraction=0.4; night_interception_fraction=0.5; refheight=2; albedo=0.26; emissivity=0.96; RadIntTotal=0
      Plant SCRUM: CropType=SCRUM
      Irrigation
      Fertiliser
      Manager SowingAndPruning
        CultivarName = Green_Peas
        InitialRootDepth = 10
        SowingDate = 2010-10-14
        SowingDate2 = 2011-09-14
        SowingDate3 = 2012-08-14
        PruneDate = 2011-03-14
        PruneDate2 = 2012-02-14
        PruneDate3 = 2013-01-14
        EndCropDate = 2011-05-14
        EndCropDate2 = 2012-06-14
        EndCropDate3 = 2013-07-14
```csharp
using System;
using System.Collections.Generic;
using Models.Core;
using Models.PMF;
using Models.PMF.Interfaces;
using System.Xml.Serialization;

namespace Models
{
	[Serializable] 
	[System.Xml.Serialization.XmlInclude(typeof(Model))]
	public class Script : Model
	{
		[Link] Plant MCSP;
		[Link] Clock Clock;

		[Description("Cultivar")]
		public string CultivarName { get; set; }
		[Description("Initial Root Depth")]
		public double InitialRootDepth { get; set; }
		[Description("Sowing Date")]
		public DateTime SowingDate { get; set; }
		[Description("Sowing Date2")]
		public DateTime SowingDate2 { get; set; }
		[Description("Sowing Date3")]
		public DateTime SowingDate3 { get; set; }
		[Description("Prune Date")]
		public DateTime PruneDate { get; set; }
		[Description("Prune Date2")]
		public DateTime PruneDate2 { get; set; }
		[Description("Prune Date3")]
		public DateTime PruneDate3 { get; set; }
		[Description("EndCrop Date")]
		public DateTime EndCropDate { get; set; }
		[Description("EndCrop Date2")]
		public DateTime EndCropDate2 { get; set; }
		[Description("EndCrop Date3")]
		public DateTime EndCropDate3 { get; set; }
		
		[XmlIgnore] private RemovalFractions Remove { get; set; }
		
		[EventSubscribe("Commencing")]
		private void OnSimulationCommencing(object sender, EventArgs e)
		{
			Remove = new RemovalFractions();
		}
		
		[EventSubscribe("DoManagement")]
		private void OnDoManagement(object sender, EventArgs e)
		{
			//Set up  array of remove fractions to send with Prune method.  Each member in the array corresponds to an organ in the same order they are set up in.

			if (Clock.Today.Date == SowingDate)
				MCSP.Sow(cultivar: CultivarName, population: 1, depth: InitialRootDepth, rowSpacing: 150);
			else if (Clock.Today.Date == PruneDate)
			{
				//Prune without sending defoliation data to test defaults
				MCSP.RemoveBiomass("Prune");
			}
			else if (Clock.Today.Date == EndCropDate)
				MCSP.EndCrop();
			
			//Change fractions to remove
			if (Clock.Today.Date == SowingDate2)
				MCSP.Sow(cultivar: CultivarName, population: 1, depth: InitialRootDepth, rowSpacing: 150);
			else if (Clock.Today.Date == PruneDate2)
			{
				//Harvest with manager specified removal fractions
				Remove.SetFractionToRemove("Product", 0.3);
				Remove.SetFractionToRemove("Stover", 0.1);
				Remove.SetFractionToResidue("Product", 0.3);
				Remove.SetFractionToResidue("Stover", 0.7);
				MCSP.RemoveBiomass("Prune", Remove);
			}
			else if (Clock.Today.Date == EndCropDate2)
				MCSP.EndCrop();
			
			//Change fractions to remove
			if (Clock.Today.Date == SowingDate3)
				MCSP.Sow(cultivar: CultivarName, population: 1, depth: InitialRootDepth, rowSpacing: 150);
			else if (Clock.Today.Date == PruneDate3)
			{
				Remove.SetFractionToRemove("Product", 0.1);
				Remove.SetFractionToRemove("Stover", 0.3);
				Remove.SetFractionToResidue("Product", 0.7);
				Remove.SetFractionToResidue("Stover", 0.3);
				MCSP.RemoveBiomass("Prune", Remove);
			}
			else if (Clock.Today.Date == EndCropDate3)
				MCSP.EndCrop();
			//PMFCrop.Sow(... Contains the following arguements:
			//Population  double  Optional  Seeds sowing/m2.  Default is zero
			//Cultivar    string  Required  "NameOfCultivar"
			//Depth       double  Optional  Depth (mm) seed sown.   Default is 100mm 
			//MaxCover    double  Optional  Proportion (0-1) of the ground row crop will cover.   Default is 1.0
			//BudNumber   double  Optional  Number of mainstems per seed sown.  Default is 1.0
			//RowSpacing  double  Optional  Spaceing (mm) between drill rows when crop is sown.  Default is 150mm
			//CropClass   string  Optional  Crop class to instantiate when crop is sown.  Default is "Plant"
		}
	}
}
```
      Manager ExtraVariables: same as BiomassRemoveCutTest.Field.ExtraVariables
      Report: same as BiomassRemoveHarvestTest.Field.Report
  Simulation BiomassRemoveGrazeTest
    Weather: FileName=%root%\Tests\WeatherFiles\lincoln.met
    Clock: StartDate=2010-10-01; EndDate=2013-07-31
    Summary
    SoilArbitrator Soil Arbitrator
    Zone Field: Area=1; Slope=0
      Soil: same as BiomassRemoveHarvestTest.Field.Soil
      SurfaceOrganicMatter surface organic matter: same as BiomassRemoveHarvestTest.Field.surface organic matter
      MicroClimate: a_interception=0; b_interception=1; c_interception=0; d_interception=0; soil_albedo=0.23; sun_angle=15; soil_heat_flux_fraction=0.4; night_interception_fraction=0.5; refheight=2; albedo=0.26; emissivity=0.96; RadIntTotal=0
      Plant SCRUM: CropType=SCRUM
      Irrigation
      Fertiliser
      Manager SowingAndGrazing
        CultivarName = Green_Peas
        InitialRootDepth = 10
        SowingDate = 2010-10-14
        SowingDate2 = 2011-09-14
        SowingDate3 = 2012-08-14
        GrazeDate = 2011-03-14
        GrazeDate2 = 2012-02-14
        GrazeDate3 = 2013-01-14
        EndCropDate = 2011-05-14
        EndCropDate2 = 2012-06-14
        EndCropDate3 = 2013-07-14
```csharp
using System;
using System.Collections.Generic;
using Models.Core;
using Models.PMF;
using Models.PMF.Interfaces;
using System.Xml.Serialization;

namespace Models
{
	[Serializable] 
	[System.Xml.Serialization.XmlInclude(typeof(Model))]
	public class Script : Model
	{
		[Link] Plant MCSP;
		[Link] Clock Clock;

		[Description("Cultivar")]
		public string CultivarName { get; set; }
		[Description("Initial Root Depth")]
		public double InitialRootDepth { get; set; }
		[Description("Sowing Date")]
		public DateTime SowingDate { get; set; }
		[Description("Sowing Date2")]
		public DateTime SowingDate2 { get; set; }
		[Description("Sowing Date3")]
		public DateTime SowingDate3 { get; set; }
		[Description("Graze Date")]
		public DateTime GrazeDate { get; set; }
		[Description("Graze Date2")]
		public DateTime GrazeDate2 { get; set; }
		[Description("Graze Date3")]
		public DateTime GrazeDate3 { get; set; }
		[Description("EndCrop Date")]
		public DateTime EndCropDate { get; set; }
		[Description("EndCrop Date2")]
		public DateTime EndCropDate2 { get; set; }
		[Description("EndCrop Date3")]
		public DateTime EndCropDate3 { get; set; }
		
		[XmlIgnore] private RemovalFractions Remove { get; set; }
		
		[EventSubscribe("Commencing")]
		private void OnSimulationCommencing(object sender, EventArgs e)
		{
			Remove = new RemovalFractions();
		}
		
		[EventSubscribe("DoManagement")]
		private void OnDoManagement(object sender, EventArgs e)
		{
			//Set up  array of remove fractions to send with Graze method.  Each member in the array corresponds to an organ in the same order they are set up in.

			if (Clock.Today.Date == SowingDate)
				MCSP.Sow(cultivar: CultivarName, population: 1, depth: InitialRootDepth, rowSpacing: 150);
			else if (Clock.Today.Date == GrazeDate)
			{
				//Graze without sending defoliation data to test defaults
				MCSP.RemoveBiomass("Graze");
			}
			else if (Clock.Today.Date == EndCropDate)
				MCSP.EndCrop();
			
			//Change fractions to remove
			if (Clock.Today.Date == SowingDate2)
				MCSP.Sow(cultivar: CultivarName, population: 1, depth: InitialRootDepth, rowSpacing: 150);
			else if (Clock.Today.Date == GrazeDate2)
			{
				//Harvest with manager specified removal fractions
				Remove.SetFractionToRemove("Product", 0.3);
				Remove.SetFractionToRemove("Stover", 0.1);
				Remove.SetFractionToResidue("Product", 0.3);
				Remove.SetFractionToResidue("Stover", 0.7);
				MCSP.RemoveBiomass("Graze", Remove);
			}
			else if (Clock.Today.Date == EndCropDate2)
				MCSP.EndCrop();
			
			//Change fractions to remove
			if (Clock.Today.Date == SowingDate3)
				MCSP.Sow(cultivar: CultivarName, population: 1, depth: InitialRootDepth, rowSpacing: 150);
			else if (Clock.Today.Date == GrazeDate3)
			{
				Remove.SetFractionToRemove("Product", 0.1);
				Remove.SetFractionToRemove("Stover", 0.3);
				Remove.SetFractionToResidue("Product", 0.7);
				Remove.SetFractionToResidue("Stover", 0.3);
				MCSP.RemoveBiomass("Graze", Remove);
			}
			else if (Clock.Today.Date == EndCropDate3)
				MCSP.EndCrop();
			//PMFCrop.Sow(... Contains the following arguements:
			//Population  double  Optional  Seeds sowing/m2.  Default is zero
			//Cultivar    string  Required  "NameOfCultivar"
			//Depth       double  Optional  Depth (mm) seed sown.   Default is 100mm 
			//MaxCover    double  Optional  Proportion (0-1) of the ground row crop will cover.   Default is 1.0
			//BudNumber   double  Optional  Number of mainstems per seed sown.  Default is 1.0
			//RowSpacing  double  Optional  Spaceing (mm) between drill rows when crop is sown.  Default is 150mm
			//CropClass   string  Optional  Crop class to instantiate when crop is sown.  Default is "Plant"
		}
	}
}
```
      Manager ExtraVariables: same as BiomassRemoveCutTest.Field.ExtraVariables
      Report: same as BiomassRemoveHarvestTest.Field.Report
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