Simulations: Version=30
  Folder DumpingArea
    PastureSpecies WhiteClover: MaximumNUptake=10; Albedo=0.26; Gsmax=0.011; R50=200; SpeciesFamily=Legume; PhotosyntheticPathway=C3; InitialShootDM=500; InitialRootDM=150; InitialRootDepth=350; ReferencePhotosyntheticRate=1; LightExtinctionCoefficient=0.8; GrowthTminimum=2; GrowthToptimum=22; GrowthTEffectExponent=1.7; UseHeatStressFactor=yes; HeatOnsetTemperature=30; HeatFullTemperature=36; HeatRecoverySumDD=20; HeatRecoveryTReference=25; UseColdStressFactor=yes; ColdOnsetTemperature=2; ColdFullTemperature=-5; ColdRecoverySumDD=30; ColdRecoveryTReference=0; MaintenanceRespirationCoefficient=0.04; GrowthRespirationCoefficient=0.25; RespirationTReference=20; RespirationExponent=1.5; NThresholdsForLeaves=[0.045, 0.02, 0.055]; NThresholdsForStems=[0.0225, 0.01, 0.0275]; NThresholdsForStolons=[0.0225, 0.01, 0.0275]; NThresholdsForRoots=[0.0225, 0.01, 0.0275]; DegreesDayForGermination=125; TargetShootRootRatio=4; MaxRootAllocation=0.25; ShootRootGlfFactor=0.5; UseReproSeasonFactor=yes; ReproSeasonReferenceLatitude=41; ReproSeasonTimingCoeff=0.14; ReproSeasonMaxAllocationIncrease=0.5; ReproSeasonAllocationCoeff=0.1; FractionLeafMaximum=0.56; FractionLeafMinimum=0.28; FractionLeafDMThreshold=500; FractionLeafDMFactor=2000; FractionLeafExponent=3; FractionToStolon=0.2; SpecificLeafArea=30; SpecificRootLength=45; StolonEffectOnLAI=0.3; ShootMaxEffectOnLAI=500; MaxStemEffectOnLAI=0.5; LiveLeavesPerTiller=3; TissueTurnoverRateShoot=0.05; TissueTurnoverRateRoot=0.02; DetachmentRateShoot=0.11; TurnoverTemperatureMin=2; TurnoverTemperatureRef=20; TurnoverTemperatureExponent=1; TurnoverDroughtEffectMax=1; TurnoverDroughtThreshold=0.5; TurnoverDefoliationCoefficient=0.5; TurnoverDefoliationRootEffect=0.1; FractionNLuxuryRemobilisable=[0.1, 0.1, 0.1]; MinimumNFixation=0.2; MaximumNFixation=0.6; SoilSaturationEffectMax=0.1; MinimumWaterFreePorosity=-1; SoilSaturationRecoveryFactor=0.25; NDillutionCoefficient=1; GlfGeneric=1; GlfSoilFertility=1; PlantHeightMinimum=25; PlantHeightMaximum=350; PlantHeightMassForMax=7500; PlantHeightExponent=2.5; RootDepthMinimum=30; RootDepthMaximum=350; RootElongationRate=25; RootDistributionDepthParam=70; RootDistributionExponent=2.5; DigestibilitiesCellWall=[0.6, 0.6, 0.6, 0.2]; MinimumGreenWt=50; FractionStolonStanding=0; PreferenceForGreenOverDead=1; PreferenceForLeafOverStems=1; WaterAvailableMethod=DefaultAPSIM; NitrogenAvailableMethod=BasicAgPasture
      PastureAboveGroundOrgan Leaves
        GenericTissue LeafCohort1
        GenericTissue LeafCohort2
        GenericTissue LeafCohort3
        GenericTissue Dead
      PastureAboveGroundOrgan Stems
        GenericTissue LeafCohort1
        GenericTissue LeafCohort2
        GenericTissue LeafCohort3
        GenericTissue Dead
      PastureAboveGroundOrgan Stolons
        GenericTissue LeafCohort1
        GenericTissue LeafCohort2
        GenericTissue LeafCohort3
        GenericTissue Dead
    Manager Ex_TargetRotationLength_store
      DoVerbose = False
      StockingRate = 4
      InitLocation = Paddock00
      TargetRotationLength = 6
      HarvestExcessHerbage = True
      NumCows = 3
      CurrentLocation =
      CurrentLocationNum = 0
      NumPaddocks = 0
      FarmArea = 0
```csharp
using System;
using Models.Core;
using Models.Utilities;
using Models.GrazPlan;
using APSIM.Shared.Utilities;
using System.Xml.Serialization;
using Models.PMF;
using Models.Soils;
using System.Collections;
using System.Collections.Generic;
using Models.AgPasture;
using System.Diagnostics;

namespace Models
{

	[Serializable]
	public class Script : Model
	{
		[Link] Clock Clock;
		[Link] Stock Cows;
		[Link] Supplement Feed;
		[Link] Zone[] Paddocks;
		[Link] ISummary summary = null;

		//List<AgPasture.PastureSpecies> Pasture = new List<AgPasture.PastureSpecies>();

		class PlantWeight
		{
			public string paddockName;
			public double totalWt;
		}

		[Description("Do verbose reporting from this script (tick for yes): ")] public bool DoVerbose { get; set; }

		[Description("Whole-farm stocking rate (head/ha): ")] public double StockingRate { get; set; }
		[Description("Initial location of the cows (paddock name): ")] public string InitLocation { get; set; }
		// move more cow stuff to the interface

		[Description("Target rotation length (days/paddock): ")] public int TargetRotationLength { get; set; }
		//[Description("Target grazing residual (kgDM/ha): ")] public double TargetGrazingResidual { get; set; }
		[Description("Harvest excess herbage? (days): ")] public bool HarvestExcessHerbage { get; set; }


		public int NumCows { get; set; } // number of cows on the whole farm
		public string CurrentLocation { get; set; }  // name of the paddock that the cows are currently in
		public int CurrentLocationNum { get; set; }  // name of the paddock that the cows are currently in
		public int NumPaddocks { get; set; }
		public double FarmArea { get; set; }

		private int group_count; // how many groups are there in the simulation
		private int g = 1;		// index to the groups of animals

		//private int DaysPerPaddock;
		private int DaysInThisPaddock;

		public event BiomassRemovedDelegate BiomassRemoved;


		[EventSubscribe("StartOfSimulation")]
		private void OnStartOfSimulation(object sender, EventArgs e)
		{
			SetInitialCowStuff();
			Cows.Move(g, InitLocation);
			CurrentLocation = InitLocation;

			summary.WriteMessage(this, "Initialising the paddocks information");
			NumPaddocks = 0;
			FarmArea = 0.0;
			foreach (Zone paddock in Paddocks)
			{
				NumPaddocks += 1;
				FarmArea += paddock.Area;
   				summary.WriteMessage(this, "     Paddock " + NumPaddocks + " has an area of " + paddock.Area);
			}
			//DaysPerPaddock = (int) (Math.Round((float) TargetRotationLength / (float) NumPaddocks, 0));
			DaysInThisPaddock = -1;

			NumCows = (int) (Math.Round((float) StockingRate * (float) FarmArea, 0));
			summary.WriteMessage(this, "     The number of animals has been rounded to " + NumCows + " from " + (StockingRate * FarmArea));
			summary.WriteMessage(this, "The area of the whole farm is " + FarmArea);


		}
                                
		[EventSubscribe("DoManagement")]
		private void OnDoManagement(object sender, EventArgs e)
		{
		    // how many days in this paddock?  Ready to move?

		    DaysInThisPaddock += 1;
			List<PlantWeight> plantWeights = new List<PlantWeight>();

		    			// get a list of the paddocks and sort into order of decreasing Sward.HarvestableWt
				foreach (Zone paddock in Paddocks)
				{
					PlantWeight weight = new PlantWeight();
					weight.paddockName = paddock.Name;
					foreach (PastureSpecies plant in Apsim.Children(paddock, typeof(PastureSpecies)))
					{
						weight.totalWt += plant.AboveGroundWt;
						if (DoVerbose)
							summary.WriteMessage(this, "In " + paddock.Name + " there is " + weight.totalWt + " kg DM /ha of " + plant.Name);
					}
					plantWeights.Add(weight);
		    }

		    if (DaysInThisPaddock >= TargetRotationLength)
		    {
				/*plantWeights.Sort((y, x) => x.totalWt.CompareTo(y.totalWt));
				for (int ii = 0; ii < NumPaddocks; ii++)
				{
				   if (DoVerbose)
				   	summary.WriteMessage(this, ii + " " + plantWeights[ii].paddockName + " " + plantWeights[ii].totalWt);
				}*/

				//Debugger.Break();
				Cows.Move(g, plantWeights[0].paddockName);  // "0" is because the list is sorted in descending order (but don't ask me to explain why!)
				CurrentLocation = plantWeights[0].paddockName;
				summary.WriteMessage(this, "moving to " + plantWeights[0].paddockName);
				//double CurrentTotalWt = plantWeights[0].totalWt;

		       // move to the next paddock
				DaysInThisPaddock = 0;
		    				}

                        /*
            // total harvested is equal total defoliated, for now
            HarvestedWt = DefoliatedWt;
            HarvestedN = DefoliatedN;  */

        	     	     	     	 
			// get the type of amount given
			/*if (RemoveAmountType == removeAmountTypes.ResidualDM)
                amountType = "SetResidueAmount";
            else
                amountType = "SetRemoveAmount"; */


			if (Cows.NumberAll > 0)
			{
				Feed.Feed("Silage", 15.0 * Cows.NumberAll, CurrentLocation);
				// remove some biomass

			    foreach (Zone paddock in Paddocks)
	    		{
		        	if (paddock.Name == CurrentLocation)
					{
						foreach (PastureSpecies plant in Apsim.Children(paddock, typeof(PastureSpecies)))
						{
							//Debugger.Break();
							double amountToRemove = (15.0 * Cows.NumberAll) * (plant.AboveGroundWt /  plantWeights[0].totalWt);
							if (amountToRemove >= plant.HarvestableWt)
							{
								if (DoVerbose)
									summary.WriteMessage(this, "not enough plant for the animal demand");
								amountToRemove = plant.HarvestableWt;
							}
							else
							{
							//double propToRemove = plant.AboveGroundWt /  plantWeights[0].totalWt;
							plant.Graze(amount: amountToRemove, type: "SetRemoveAmount");
							//DefoliatedWt += species.HarvestedWt;
							//DefoliatedN += species.HarvestedN;
							}
						}
					}
				}
			}
		}


		public void SetInitialCowStuff()
		{
			g = Cows.NoGroups + 1;

			StockBuy purchase = new StockBuy();
			purchase.Genotype = "Friesian";
			purchase.Number = NumCows;
			purchase.Sex = "heifers"; 
			purchase.Age = 24;       // age in months
			purchase.Weight = 550.0;  // live weight in kg
			purchase.UseTag = g + 1;
			purchase.MatedTo = "Friesian";
			purchase.Pregnant = 0;  // days pregnant, 0 = non pregnant, 1 = pregnant
			purchase.Lactating = 1;  // 0 for dry, 1 for lactating
			purchase.NumYoung = 2;
			purchase.YoungWt = 45;
                
			Cows.Buy(purchase);
		}

	}
}
```
    Manager Ex_TargetRotationLength
      DoVerbose = False
      StockingRate = 4
      InitLocation = Paddock00
      TargetRotationLength = 6
      HarvestExcessHerbage = True
      NumCows = 3
      CurrentLocation =
      CurrentLocationNum = 0
      NumPaddocks = 0
      FarmArea = 0
```csharp
using System;
using Models.Core;
using Models.Utilities;
using Models.GrazPlan;
using APSIM.Shared.Utilities;
using System.Xml.Serialization;
using Models.PMF;
using Models.Soils;
using System.Collections;
using System.Collections.Generic;
using Models.AgPasture;
using System.Diagnostics;

namespace Models
{

	[Serializable]
	public class Script : Model
	{
		[Link] Clock Clock;
		[Link] Stock Cows;
		[Link] Supplement Feed;
		[Link] Zone[] Paddocks;
		[Link] ISummary summary = null;

		//List<AgPasture.PastureSpecies> Pasture = new List<AgPasture.PastureSpecies>();

		[Serializable]
		public class PaddockInfo
		{
			public string paddockName;
			public double totalWt;
			public int paddockNum;
		}

		[Description("Do verbose reporting from this script (tick for yes): ")] public bool DoVerbose { get; set; }

		[Description("Whole-farm stocking rate (head/ha): ")] public double StockingRate { get; set; }
		[Description("Initial location of the cows (paddock name): ")] public string InitLocation { get; set; }
		// move more cow stuff to the interface

		[Description("Target rotation length (days/paddock): ")] public int TargetRotationLength { get; set; }
		//[Description("Target grazing residual (kgDM/ha): ")] public double TargetGrazingResidual { get; set; }
		[Description("Harvest excess herbage? (days): ")] public bool HarvestExcessHerbage { get; set; }


		public int NumCows { get; set; } // number of cows on the whole farm
		public string CurrentLocation { get; set; }  // name of the paddock that the cows are currently in
		public int CurrentLocationNum { get; set; }  // name of the paddock that the cows are currently in
		public int NumPaddocks { get; set; }
		public double FarmArea { get; set; }

		private int group_count; // how many groups are there in the simulation
		private int g = 1;		// index to the groups of animals

		//private int DaysPerPaddock;
		private int DaysInThisPaddock;

		public event BiomassRemovedDelegate BiomassRemoved;
		List<PaddockInfo> listOfPaddockInfo = new List<PaddockInfo>();


		[EventSubscribe("StartOfSimulation")]
		private void OnStartOfSimulation(object sender, EventArgs e)
		{
			//SetInitialCowStuff();
			//Cows.Move(g, InitLocation);
			//CurrentLocation = InitLocation;
			//CurrentLocationNum = 0;

			/*summary.WriteMessage(this, "Initialising the paddocks information");
			NumPaddocks = 0;
			FarmArea = 0.0;
			foreach (Zone paddock in Paddocks)
			{
				NumPaddocks += 1;
				FarmArea += paddock.Area;
				if (paddock.Name == "InitLocation")
					CurrentLocationNum = NumPaddocks;
   				summary.WriteMessage(this, "     Paddock " + NumPaddocks + " has an area of " + paddock.Area);
			}
			DaysInThisPaddock = -1;

			NumCows = (int) (Math.Round((float) StockingRate * (float) FarmArea, 0));
			summary.WriteMessage(this, "     The number of animals has been rounded to " + NumCows + " from " + (StockingRate * FarmArea));
			summary.WriteMessage(this, "The area of the whole farm is " + FarmArea);

			*/

		    /*// get a list of information about the paddocks 
				foreach (Zone paddock in Paddocks)
				{
					PaddockInfo paddockInfo = new PaddockInfo();
					paddockInfo.paddockName = paddock.Name;
					foreach (PastureSpecies plant in Apsim.Children(paddock, typeof(PastureSpecies)))
					{
						paddockInfo.totalWt += plant.AboveGroundWt;
						if (DoVerbose)
							summary.WriteMessage(this, "In " + paddock.Name + " there is " + paddockInfo.totalWt + " kg DM /ha of " + plant.Name);
					}
				listOfPaddockInfo.Add(paddockInfo);
		    }*/


		}
                                
		[EventSubscribe("DoManagement")]
		private void OnDoManagement(object sender, EventArgs e)
		{
		   /* // how many days in this paddock?  Ready to move?
		    DaysInThisPaddock += 1;
		    if (DaysInThisPaddock >= TargetRotationLength)
		    {
				Cows.Move(g, listOfPaddockInfo[0].paddockName);  // "0" is because the list is sorted in descending order (but don't ask me to explain why!)
				CurrentLocation = listOfPaddockInfo[0].paddockName;
				summary.WriteMessage(this, "moving to " + listOfPaddockInfo[0].paddockName);
				DaysInThisPaddock = 0;
		    }*/

                        /*
            // total harvested is equal total defoliated, for now
            HarvestedWt = DefoliatedWt;
            HarvestedN = DefoliatedN;  */

        	     	     	     	 
			// get the type of amount given
			/*if (RemoveAmountType == removeAmountTypes.ResidualDM)
                amountType = "SetResidueAmount";
            else
                amountType = "SetRemoveAmount"; */


			/*if (Cows.NumberAll > 0)
			{
				Feed.Feed("Silage", 15.0 * Cows.NumberAll, CurrentLocation);
				// remove some biomass

			    foreach (Zone paddock in Paddocks)
	    		{
		        	if (paddock.Name == CurrentLocation)
					{
						foreach (PastureSpecies plant in Apsim.Children(paddock, typeof(PastureSpecies)))
						{
							//Debugger.Break();
							double amountToRemove = (15.0 * Cows.NumberAll) * (plant.AboveGroundWt /  plantWeights[0].totalWt);
							if (amountToRemove >= plant.HarvestableWt)
							{
								if (DoVerbose)
									summary.WriteMessage(this, "not enough plant for the animal demand");
								amountToRemove = plant.HarvestableWt;
							}
							else
							{
							//double propToRemove = plant.AboveGroundWt /  plantWeights[0].totalWt;
							plant.Graze(amount: amountToRemove, type: "SetRemoveAmount");
							//DefoliatedWt += species.HarvestedWt;
							//DefoliatedN += species.HarvestedN;
							}
						}
					}
				}
			} */
		}


		public void SetInitialCowStuff()
		{
			/*g = Cows.NoGroups + 1;

			StockBuy purchase = new StockBuy();
			purchase.Genotype = "Friesian";
			purchase.Number = NumCows;
			purchase.Sex = "heifers"; 
			purchase.Age = 24;       // age in months
			purchase.Weight = 550.0;  // live weight in kg
			purchase.UseTag = g + 1;
			purchase.MatedTo = "Friesian";
			purchase.Pregnant = 0;  // days pregnant, 0 = non pregnant, 1 = pregnant
			purchase.Lactating = 1;  // 0 for dry, 1 for lactating
			purchase.NumYoung = 2;
			purchase.YoungWt = 45;
                
			Cows.Buy(purchase); */
		}

	}
}
```
    Report ReportTop: EventNames=[Clock].EndOfDay
      VariableNames:
        [Clock].Today
        [Ex_TargetRotationLength].Script.CurrentLocation
        [Ex_TargetRotationLength].Script.CurrentLocation
        //[Stock].NumberAll
        [Stock].WeightAll
        [Stock].CondScoreAll
        [Stock].IntakeAll.Weight
        [Stock].IntakeAll.N
        [Stock].UrineNAll
        [Stock].FaecesAll.N
        [Stock].MilkWtAll
        [Supplement].stores[2].Name
        [Supplement].stores[2].Stored
    Memo
                  // total harvested is equal total defoliated, for now
                  //HarvestedWt = DefoliatedWt;
                  //HarvestedN = DefoliatedN;

                  /*// get the type of amount given
      			if (RemoveAmountType == removeAmountTypes.ResidualDM)
                      amountType = "SetResidueAmount";
                  else
                      amountType = "SetRemoveAmount"; */

                  /*if (Cows.NumberAll > 0)
                  {
                      //Feed.Feed("Silage", 15.0 * Cows.NumberAll, CurrentLocation);
                      // remove some biomass
                      UpdatePaddockInfo();

                      foreach (Zone paddock in Paddocks)
                      {
                          if (paddock.Name == CurrentLocation)
                          {
                              foreach (PastureSpecies plant in Apsim.Children(paddock, typeof(PastureSpecies)))
                              {
                                  //Debugger.Break();
                                  double totalAmountToRemove = 15.0 * Cows.NumberAll;
                                  double amountToRemove = (15.0 * Cows.NumberAll) * (plant.HarvestableWt / listOfPaddockInfo[CurrentLocationNum].harvestableBiomass);
                                  if (amountToRemove >= plant.HarvestableWt)
                                  {
                                      if (DoVerbose)
                                          summary.WriteMessage(this, "not enough plant for the animal demand");
                                      amountToRemove = plant.HarvestableWt;
                                  }
                                  else
                                  {
                                      //double propToRemove = plant.AboveGroundWt /  plantWeights[0].totalWt;
                                      plant.Graze(amount: amountToRemove, type: "SetRemoveAmount");
                                      //DefoliatedWt += species.HarvestedWt;
                                      //DefoliatedN += species.HarvestedN;
                                  }
                              }
                          }
                      }
                  } */
    Manager ManageStock
      StockingRate = 2.5
      CurrentLocation = OneBigPaddock
      NumCows = 3
      FarmArea = 0
```csharp
using System;
using Models.Core;
using Models.Utilities;
using Models.GrazPlan;
using APSIM.Shared.Utilities;
using System.Xml.Serialization;
using Models.PMF;
using Models.Soils;
using System.Collections;
using System.Collections.Generic;
using Models.AgPasture;
using System.Diagnostics;

namespace Models
{

    [Serializable]
    public class Script : Model
    {
        [Link] Clock Clock;
        [Link] Stock Cows;
        [Link] Supplement Feed;
        [Link] Zone[] Paddocks;
        [Link] ISummary summary = null;

        [Serializable]
        public class PaddockInfo
        {
            public string paddockName;
            public double harvestableBiomass;
            public int paddockNum;
            public double paddockArea;
        }


        [Description("Whole-farm stocking rate (head/ha): ")] public double StockingRate { get; set; }
        [Description("Initial location of the cows (paddock name): ")] public string CurrentLocation { get; set; }


        public int NumCows { get; set; } // number of cows on the whole farm
        public double FarmArea { get; set; }

        private int group_count; // how many groups are there in the simulation
        private int g = 1;      // index to the groups of animals
        private int CurrentLocationNum; 
        private int NumPaddocks = 1;

        public event BiomassRemovedDelegate BiomassRemoved;
        List<PaddockInfo> listOfPaddockInfo = new List<PaddockInfo>();


        [EventSubscribe("StartOfSimulation")]
        private void OnStartOfSimulation(object sender, EventArgs e)
        {
            summary.WriteMessage(this, "Initialising the paddock information");

            GetFarmAreaAndOtherInfo();

            NumCows = (int)(Math.Round(StockingRate * FarmArea, 0));

            SetInitialCowStuff();

            Cows.Move(g, CurrentLocation);

            summary.WriteMessage(this, "     The number of animals has been rounded to " + NumCows + " from " + (StockingRate * FarmArea));
            summary.WriteMessage(this, "     The animals will begin in " + CurrentLocation + " which is paddock number " + CurrentLocationNum + " in the simulation");
            summary.WriteMessage(this, "     The area of the whole farm is " + FarmArea + " ha");

        }

        [EventSubscribe("DoManagement")]
        private void OnDoManagement(object sender, EventArgs e)
        {
           /*if (Cows.NumberAll > 0)
            {
                Feed.Feed("Silage", 15.0 * Cows.NumberAll, CurrentLocation);
                // remove some biomass
                UpdatePaddockInfo();

                foreach (Zone paddock in Paddocks)
                {
                    if (paddock.Name == CurrentLocation)
                    {
                        foreach (PastureSpecies plant in Apsim.Children(paddock, typeof(PastureSpecies)))
                        {
                            //Debugger.Break();
                            double totalAmountToRemove = 15.0 * Cows.NumberAll;
                            double amountToRemove = (15.0 * Cows.NumberAll) * (plant.HarvestableWt / listOfPaddockInfo[CurrentLocationNum].harvestableBiomass);
                            if (amountToRemove >= plant.HarvestableWt)
                            {
                                amountToRemove = plant.HarvestableWt;
                            }
                            else
                            {
                                //double propToRemove = plant.AboveGroundWt /  plantWeights[0].totalWt;
                                plant.Graze(amount: amountToRemove, type: "SetRemoveAmount");
                                //DefoliatedWt += species.HarvestedWt;
                                //DefoliatedN += species.HarvestedN;
                            }
                        }
                    }
                }
            } */
        }


        public void SetInitialCowStuff()
        {
            g = Cows.NoGroups + 1;

            StockBuy purchase = new StockBuy();
            purchase.Genotype = "Friesian";
            purchase.Number = NumCows;
            purchase.Sex = "heifers";
            purchase.Age = 24;       // age in months
            purchase.Weight = 550.0;  // live weight in kg
            purchase.UseTag = g + 1;
            purchase.MatedTo = "Friesian";
            purchase.Pregnant = 0;  // days pregnant, 0 = non pregnant, 1 = pregnant
            purchase.Lactating = 1;  // 0 for dry, 1 for lactating
            purchase.NumYoung = 2;
            purchase.YoungWt = 45;

            Cows.Buy(purchase);
        }

        public void GetFarmAreaAndOtherInfo()
        {
            NumPaddocks = 0;
            FarmArea = 0.0;
            CurrentLocationNum = 0;

            foreach (Zone paddock in Paddocks)
            {
                NumPaddocks += 1;

                PaddockInfo paddockInfo = new PaddockInfo();

                paddockInfo.paddockName = paddock.Name;
                paddockInfo.paddockNum = NumPaddocks - 1;
                paddockInfo.paddockArea = paddock.Area;

                foreach (PastureSpecies plant in Apsim.Children(paddock, typeof(PastureSpecies)))
                    paddockInfo.harvestableBiomass += plant.HarvestableWt;

                listOfPaddockInfo.Add(paddockInfo);

                FarmArea += paddock.Area;
                if (paddock.Name == CurrentLocation)
                    CurrentLocationNum = paddockInfo.paddockNum;

                summary.WriteMessage(this, "     Paddock " + NumPaddocks + " is called " + paddock.Name + ", has an area of " + paddock.Area + " ha and an initial harvestable biomass of " + paddockInfo.harvestableBiomass + " kg DM / ha");

            }

        }

        public void UpdatePaddockInfo()
        {
            int ii = -1;

            foreach (Zone paddock in Paddocks)
            {
                ii += 1;
                listOfPaddockInfo[ii].harvestableBiomass = 0.0;
                foreach (PastureSpecies plant in Apsim.Children(paddock, typeof(PastureSpecies)))
                    listOfPaddockInfo[ii].harvestableBiomass += plant.HarvestableWt;

            }

        }


    }
}
```
  Simulation OneBigPaddock
    Clock: StartDate=2000-08-01; EndDate=2001-07-31
    Summary SummaryFile
    SoilArbitrator
    Weather: FileName=%root%\Examples\WeatherFiles\lincoln.met
    Stock: RandSeed=9999
      PaddockList:
        {Area=1, Slope=0}
    Manager ManageStock
      genotypeInput = Angus
      sexInput = Steers
      ageInput = 36
      weightInput = 500
      pregnantInput = 0
      lactatingInput = 0
      youngNumberInput = 0
      youngWtInput = 0
      StockingRate = 2.5
      CurrentLocation = OneBigPaddock
      NumStock = 0
      FarmArea = 0
```csharp
using System;
using Models.Core;
using Models.Utilities;
using Models.GrazPlan;
using APSIM.Shared.Utilities;
using System.Xml.Serialization;
using Models.PMF;
using Models.Soils;
using System.Collections;
using System.Collections.Generic;
using Models.AgPasture;
using System.Diagnostics;

namespace Models
{

    [Serializable]
    public class Script : Model
    {
        [Link] Clock Clock;
        [Link] Stock Stock;
        [Link] Supplement Feed;
        [Link] Zone[] Paddocks;
        [Link] ISummary summary = null;

        [Serializable]
        public class PaddockInfo
        {
            public string paddockName;
            public double harvestableBiomass;
            public int paddockNum;
            public double paddockArea;
        }

		//public enum Genotypes {string1, string2 }


        [Separator("======= Stock type info, the same type of stock are bought at each purchase =======")]
        [Description("Stock: genotype (e.g. Small Merino, Angus, Freisian):")] public string genotypeInput { get; set; }
        [Description("Stock: sex (Cows, Heifers, Steers, Bulls, Ewes, Weathers, Rams, Cryptos):")] public string sexInput { get; set; }
        [Description("Stock: age (months):")] public double ageInput { get; set; }
        [Description("Stock: weight (kg liveweight /head):")] public double weightInput { get; set; }
        [Description("Stock: fertility status (0 if non-pregnant or days since conception):")] public int pregnantInput { get; set; }
        [Description("Stock: lactation status (0 if non-lactating or days since parturition):")] public int lactatingInput { get; set; }
        [Description("Stock: number of unweaned young:")] public int youngNumberInput { get; set; }
        [Description("Stock: weight of unweaned young:")] public double youngWtInput { get; set; }

        [Separator("======= Farm type info =======")]
        [Description("Whole-farm stocking rate (head/ha): ")] public double StockingRate { get; set; }
        [Description("Initial location of the cows (paddock name): ")] public string CurrentLocation { get; set; }


        public int NumStock { get; set; } // number of cows on the whole farm
        public double FarmArea { get; set; }
        //public double FarmArea { get; set; }

        private int group_count; // how many groups are there in the simulation
        private int g = 1;      // index to the groups of animals
        private int CurrentLocationNum; 
        private int NumPaddocks = 1;

        public event BiomassRemovedDelegate BiomassRemoved;
        List<PaddockInfo> listOfPaddockInfo = new List<PaddockInfo>();


        [EventSubscribe("StartOfSimulation")]
        private void OnStartOfSimulation(object sender, EventArgs e)
        {
            summary.WriteMessage(this, "Initialising the paddock information");

            GetFarmAreaAndOtherInfo();

            NumStock = (int)(Math.Round(StockingRate * FarmArea, 0));

            SetInitialCowStuff();

            Stock.Move(g, CurrentLocation);

            summary.WriteMessage(this, "     The number of animals has been rounded to " + NumStock + " from " + (StockingRate * FarmArea));
            summary.WriteMessage(this, "     The animals will begin in " + CurrentLocation + " which is paddock number " + CurrentLocationNum + " in the simulation");
            summary.WriteMessage(this, "     The area of the whole farm is " + FarmArea + " ha");

        }

        [EventSubscribe("DoManagement")]
        private void OnDoManagement(object sender, EventArgs e)
        {
        }


        public void SetInitialCowStuff()
        {
            g = Stock.NoGroups + 1;

            StockBuy purchase = new StockBuy();
            purchase.Genotype = genotypeInput;
            purchase.Number = NumStock;
            purchase.Sex = sexInput;
            purchase.Age = ageInput;       // age in months
            purchase.Weight = weightInput;  // live weight in kg
            purchase.UseTag = g + 1;
            purchase.MatedTo = genotypeInput;
            purchase.Pregnant = pregnantInput;  // days pregnant, 0 = non pregnant, 1 = pregnant
            purchase.Lactating = lactatingInput;  // 0 for dry, 1 for lactating
            purchase.NumYoung = youngNumberInput;
            purchase.YoungWt = youngWtInput;

            Stock.Buy(purchase);
        }

        public void GetFarmAreaAndOtherInfo()
        {
            NumPaddocks = 0;
            FarmArea = 0.0;
            CurrentLocationNum = 0;

            foreach (Zone paddock in Paddocks)
            {
                NumPaddocks += 1;

                PaddockInfo paddockInfo = new PaddockInfo();

                paddockInfo.paddockName = paddock.Name;
                paddockInfo.paddockNum = NumPaddocks - 1;
                paddockInfo.paddockArea = paddock.Area;

                foreach (PastureSpecies plant in Apsim.Children(paddock, typeof(PastureSpecies)))
                    paddockInfo.harvestableBiomass += plant.HarvestableWt;

                listOfPaddockInfo.Add(paddockInfo);

                FarmArea += paddock.Area;
                if (paddock.Name == CurrentLocation)
                    CurrentLocationNum = paddockInfo.paddockNum;

                summary.WriteMessage(this, "     Paddock " + NumPaddocks + " is called " + paddock.Name + ", has an area of " + paddock.Area + " ha and an initial harvestable biomass of " + paddockInfo.harvestableBiomass + " kg DM / ha");

            }

        }

        public void UpdatePaddockInfo()
        {
            int ii = -1;

            foreach (Zone paddock in Paddocks)
            {
                ii += 1;
                listOfPaddockInfo[ii].harvestableBiomass = 0.0;
                foreach (PastureSpecies plant in Apsim.Children(paddock, typeof(PastureSpecies)))
                    listOfPaddockInfo[ii].harvestableBiomass += plant.HarvestableWt;

            }

        }


    }
}
```
    Supplement: SpoilageTime=0
      stores:
        IsRoughage  DMContent  DMD   MEContent  CPConc  ProtDg  PConc   SConc   EEConc  ADIP2CP  AshAlk  MaxPassage  Name    Stored
        true        0.85       0     0          0       0       0       0       0       0        0       0           fodder  0
        true        0.25       0.75  12         0.18    0.8     0.0032  0.0024  0.02    0.06     0.6     0           silage  200000
    Report ReportTop: EventNames=[Clock].EndOfDay
      VariableNames:
        [Clock].Today
        [Stock].NumberAll as NumStock
        [Stock].IntakeAll.Weight as AveDMI
        [Stock].MEIntakeAll as AveMEIntake
        [Stock].WeightAll as AveBodyWeight
        [Stock].CondScoreAll as AveCS
        [Stock].MilkWtAll as AveMilkWeight
        [Stock].Paddock as CurrentLocation
    Zone OneBigPaddock: Area=160; Slope=0
      Folder Managers
        Manager AutomaticFertiliser
          AllowFertiliser = yes
          Depth2SoilN = 500
          CriticalSoilN = 5
          FertNAmount = 25
          FertType = UreaN
          FertApplicationDepth = 1
          FertMinimumDays = 15
```csharp
using System;
using Models.Core;
using Models.PMF;
using Models.Soils;
using APSIM.Shared.Utilities;
using System.Xml.Serialization;

namespace Models
{
    [Serializable]
    public class Script : Model
    {
        [Link] Clock Clock;
        [Link] Fertiliser fertiliser;
        [Link] ISummary summary = null;
        [Link] Soil Soil;

        //User inputs from properties tab
        [Description("Turn ferliser applications on? ")]
        public yesnoType AllowFertiliser { get; set; }
        
        [Description("Depth to calculate available soil N (mm): ")]
        public double Depth2SoilN { get; set; }

        [Description("Minimum available N, triggers an application (kgN/ha): ")]
        public double CriticalSoilN { get; set; }

        [Description("Amount of N fertiliser for each application (kgN/ha): ")]
        public double FertNAmount { get; set; }

        [Description("Type of N fertiliser to apply: ")]
        public Fertiliser.Types FertType { get; set; }

        [Description("Depth at which to apply the fertiliser (mm): ")]
        public double FertApplicationDepth { get; set; }
       
        [Description("Minimum period between applications (days): ")]
        public double FertMinimumDays { get; set; }
       
        public enum yesnoType
        {
            /// <summary>a positive answer</summary>
            yes,
            /// <summary>a negative answer</summary>
            no
        }

        [XmlIgnore] public double TopMineralN { get; set; }
        
        private DateTime lastApplicationDate;
        private bool fertiliserIsAllowed;
        private int nLayers;

        [EventSubscribe("StartOfSimulation")]
        private void OnStartOfSimulation(object sender, EventArgs e)
        {
            fertiliserIsAllowed = (AllowFertiliser == yesnoType.yes);
            nLayers = Soil.Thickness.Length;
        }

        [EventSubscribe("DoManagement")]
        private void OnDoManagement(object sender, EventArgs e)
        {
            double daysSinceLastApplication = (Clock.Today - lastApplicationDate).TotalDays;
            
            // get the N stored in the soil
            double depthFromSurface = 0.0;
            double fracLayer = 0.0;
            TopMineralN = 0.0;
            for (int layer = 0; layer < nLayers; layer++)
            {
                fracLayer = Math.Min(1.0, (Depth2SoilN - depthFromSurface) / Soil.Thickness[layer]);
                TopMineralN += (Soil.SoilNitrogen.NO3[layer]
                + Soil.SoilNitrogen.NH4[layer]
                + Soil.SoilNitrogen.urea[layer])
                * fracLayer;
                depthFromSurface += Soil.Thickness[layer];
                if (depthFromSurface >= Depth2SoilN)
                    layer = nLayers;
            }

            if (fertiliserIsAllowed && (daysSinceLastApplication >= FertMinimumDays) && (TopMineralN <= CriticalSoilN))
            {
                fertiliser.Apply(FertNAmount, FertType, FertApplicationDepth);
                lastApplicationDate = Clock.Today;
            }
        }
    }
}
```
        Manager AutomaticIrrigation
          allowIrrigation = True
          seasonStart = 15-Aug
          seasonEnd = 30-May
          seasonsAllocation = 10000
          triggerDeficit = 75
          targetDeficit = 99
          returndays = 1
          maximumAmount = 30
          depthPAWC = 300
```csharp
using System;
using Models.Core;
using Models.PMF;
using Models.Soils;
using System.Xml.Serialization;
using Models.PMF;
using APSIM.Shared.Utilities;

        
namespace Models
{
    [Serializable] 
    [System.Xml.Serialization.XmlInclude(typeof(Model))]
    public class Script : Model
    {
        //Communication to other modules
        [Link] ISummary summary = null;
        [Link] Irrigation Irrigation;
        [Link] Clock Clock;
        [Link] Soil Soil;
        [Link(IsOptional = true)] IPlant existingCrop;
       
        //User inputs from properties tab
        [Description("Turn irrigation on?")]
        public bool allowIrrigation { get; set; }
        [Description("Start of irrigation season (dd-MMM)")]
        public string seasonStart { get; set; }
        [Description("End of irrigation season (dd-MMM)")]
        public string seasonEnd { get; set; }
        [Description("Season allocation (mm)")]
        public double seasonsAllocation { get; set; }
        [Description("Deficit to trigger irrigation (% PAWC)")]
        public double triggerDeficit { get; set; }
        [Description("Deficit to stop irrigaton (% PAWC)")]
        public double targetDeficit { get; set; }
        [Description("Minimum days for irrigation to return")]
        public double returndays { get; set; }
        [Description("Maximum irrigation application (mm/day)")]
        public double maximumAmount { get; set; }
        [Description("Depth to calculate PAWC (mm)")]
        public double depthPAWC { get; set; }

        //Class members
        [XmlIgnore] public double TopSWdeficit { get; set; }
        [XmlIgnore] public double TopSWC { get; set; }
        [XmlIgnore] public double DaysSinceIrrigation { get; set; }
        [XmlIgnore] public double AmountToApply { get; set; }
        [XmlIgnore] public double SeasonAppliedAmount { get; set; }
        
        private bool IrrigationIsAllowed { get; set; }
        private bool SeasonIsOpen { get; set; }
        private bool CropIsActive { get; set; }
        private bool IrrigatorIsAvailable { get; set; }
        private bool SoilIsDry { get; set; }

        private DateTime StartDate;
        private DateTime EndDate;
        private double TopDUL;
        private double TopLL;
        private int nLayers;
    
        //Calculate static soil variables
        [EventSubscribe("StartOfSimulation")]
        private void OnStartOfSimulation(object sender, EventArgs e)
        {   
            //Set the season dates
            StartDate = DateTime.Parse(seasonStart + "-" + Clock.Today.Year.ToString());
            EndDate = DateTime.Parse(seasonEnd + "-" + Clock.Today.Year.ToString());
            
            //Can we irrigate at all?
            IrrigationIsAllowed = false; 
            if (allowIrrigation)
                IrrigationIsAllowed = true; 

            //Calculate soil water variables
            double depthFromSurface = 0.0;
            double fracLayer = 0.0;
            nLayers = Soil.Thickness.Length;
            for (int layer = 0; layer < nLayers; layer++)
            {
                fracLayer = Math.Min(1.0, (depthPAWC - depthFromSurface) / Soil.Thickness[layer]);
                TopLL += Soil.LL15mm[layer] * fracLayer;
                TopDUL += Soil.DULmm[layer] * fracLayer;
                depthFromSurface += Soil.Thickness[layer];
                if (depthFromSurface >= depthPAWC)
                    layer = nLayers;
            }
        }
             
        //Determine daily requirement for irrigation
        [EventSubscribe("StartOfDay")]
        private void OnStartOfDay(object sender, EventArgs e)
        {
            //Can we irrigate today?          
            SeasonIsOpen = isBetween(Clock.Today, StartDate, EndDate);

            //Is there a crop in the ground that needs irrigation?
            CropIsActive = false;
            if ((existingCrop != null) && (existingCrop.IsAlive))
                CropIsActive = true;
            //if ((existingCrop.Phenology.Stage >= 3.0) && (existingCrop.Phenology.Stage < 6.0))
          
            //Is the irrigator available?
            IrrigatorIsAvailable = false;
            DaysSinceIrrigation += 1;
            if (DaysSinceIrrigation >= returndays)
                IrrigatorIsAvailable = true;
          
            //Is the soil dry enough to require irrigation?
            SoilIsDry = false;
            double depthFromSurface = 0.0;
            double fracLayer = 0.0;
            TopSWC = 0.0;
            for (int layer = 0; layer < nLayers; layer++)
            //for (int layer = 0; depthFromSurface < depthPAWC + Soil.Thickness[layer]; layer++)
            {
                fracLayer = Math.Min(1.0, (depthPAWC - depthFromSurface) / Soil.Thickness[layer]);
                TopSWC += Soil.SoilWater.SWmm[layer] * fracLayer;
                depthFromSurface += Soil.Thickness[layer];
                if (depthFromSurface >= depthPAWC)
                    layer = nLayers;
            }
            
            TopSWdeficit = TopSWC - TopDUL;
            if (Math.Max(0.0, -TopSWdeficit) >= (TopDUL - TopLL) * (100 - triggerDeficit) / 100)
                SoilIsDry = true;
                
            //Are all the conditions ratifying irrigation
            if (IrrigationIsAllowed && SeasonIsOpen && CropIsActive && IrrigatorIsAvailable && SoilIsDry)
            {
                //Lets bloody well irrigate then!!!!
                AmountToApply = TopDUL * targetDeficit / 100 - TopSWC;
                AmountToApply = Math.Max(0.0, Math.Min(AmountToApply, seasonsAllocation - SeasonAppliedAmount));
                Irrigation.Apply(AmountToApply);
                DaysSinceIrrigation = 0;
                SeasonAppliedAmount += AmountToApply;
            }
        }
        
        ///Checks whether theDate is between iniDate and endDate (non-year specific)
        private bool isBetween(DateTime theDay, DateTime iniDate, DateTime endDate)
        {
            bool result = false;
            if (iniDate.DayOfYear < endDate.DayOfYear)
            {
                // period is within one year, ex: summer in the northern hemisphere
                if ((theDay.DayOfYear >= iniDate.DayOfYear) && (theDay.DayOfYear <= endDate.DayOfYear))
                    result = true;
            }
            else
            {
                // period goes over the end of the year, ex: summer in the southern hemisphere
                if ((theDay.DayOfYear >= iniDate.DayOfYear) || (theDay.DayOfYear <= endDate.DayOfYear))
                    result = true;
            }
            
            return result;
        }
    }
}
```
      MicroClimate: a_interception=0; b_interception=0; c_interception=0; d_interception=0; soil_albedo=0.23; sun_angle=15; soil_heat_flux_fraction=0.4; night_interception_fraction=0.5; refheight=2; albedo=0.293662; emissivity=0.96; RadIntTotal=0
      Irrigation
      Fertiliser
      SurfaceOrganicMatter: ReportAdditions=no; ReportRemovals=no; PoolName=Sward; type=grass; mass=1000; standing_fraction=0; cnr=15; CriticalResidueWeight=2000; OptimumDecompTemp=20; MaxCumulativeEOS=20; CNRatioDecompCoeff=0.277; CNRatioDecompThreshold=25; TotalLeachRain=25; MinRainToLeach=10; CriticalMinimumOrganicC=0.004; DefaultCPRatio=0; DefaultStandingFraction=0; StandingExtinctCoeff=0.5; FractionFaecesAdded=0.5
        Pools:
          {PoolName=Sward, ResidueType=grass, Mass=1000, CNRatio=15, StandingFraction=0}
        ResidueTypes: LoadFromResource=ResidueTypes
        TillageTypes TillageTypesList
      PastureSpecies Ryegrass: MaximumNUptake=10; Albedo=0.26; Gsmax=0.011; R50=200; SpeciesFamily=Grass; PhotosyntheticPathway=C3; InitialShootDM=2500; InitialRootDM=450; InitialRootDepth=750; ReferencePhotosyntheticRate=1; LightExtinctionCoefficient=0.5; GrowthTminimum=1; GrowthToptimum=20; GrowthTEffectExponent=1.7; UseHeatStressFactor=yes; HeatOnsetTemperature=28; HeatFullTemperature=35; HeatRecoverySumDD=30; HeatRecoveryTReference=25; UseColdStressFactor=yes; ColdOnsetTemperature=1; ColdFullTemperature=-5; ColdRecoverySumDD=25; ColdRecoveryTReference=0; MaintenanceRespirationCoefficient=0.03; GrowthRespirationCoefficient=0.25; RespirationTReference=20; RespirationExponent=1.5; NThresholdsForLeaves=[0.04, 0.012, 0.05]; NThresholdsForStems=[0.02, 0.006, 0.025]; NThresholdsForStolons=[0, 0, 0]; NThresholdsForRoots=[0.02, 0.006, 0.025]; DegreesDayForGermination=125; TargetShootRootRatio=4; MaxRootAllocation=0.25; ShootRootGlfFactor=0.5; UseReproSeasonFactor=yes; ReproSeasonReferenceLatitude=41; ReproSeasonTimingCoeff=0.14; ReproSeasonMaxAllocationIncrease=0.5; ReproSeasonAllocationCoeff=0.1; FractionLeafMaximum=0.7; FractionLeafMinimum=0.7; FractionLeafDMThreshold=500; FractionLeafDMFactor=2000; FractionLeafExponent=3; FractionToStolon=0; SpecificLeafArea=25; SpecificRootLength=100; StolonEffectOnLAI=0; ShootMaxEffectOnLAI=1000; MaxStemEffectOnLAI=1; LiveLeavesPerTiller=3; TissueTurnoverRateShoot=0.05; TissueTurnoverRateRoot=0.02; DetachmentRateShoot=0.08; TurnoverTemperatureMin=2; TurnoverTemperatureRef=20; TurnoverTemperatureExponent=1; TurnoverDroughtEffectMax=1; TurnoverDroughtThreshold=0.5; TurnoverDefoliationCoefficient=0.5; TurnoverDefoliationRootEffect=0.1; FractionNLuxuryRemobilisable=[0.1, 0.1, 0.1]; MinimumNFixation=0; MaximumNFixation=0; SoilSaturationEffectMax=0.1; MinimumWaterFreePorosity=-1; SoilSaturationRecoveryFactor=0.25; NDillutionCoefficient=0.25; GlfGeneric=1; GlfSoilFertility=1; PlantHeightMinimum=25; PlantHeightMaximum=600; PlantHeightMassForMax=10000; PlantHeightExponent=2.8; RootDepthMinimum=50; RootDepthMaximum=750; RootElongationRate=25; RootDistributionDepthParam=90; RootDistributionExponent=3.2; DigestibilitiesCellWall=[0.6, 0.6, 0.6, 0.2]; MinimumGreenWt=100; FractionStolonStanding=0; PreferenceForGreenOverDead=1; PreferenceForLeafOverStems=1; WaterAvailableMethod=DefaultAPSIM; NitrogenAvailableMethod=BasicAgPasture
        PastureAboveGroundOrgan Leaves
          GenericTissue LeafCohort1
          GenericTissue LeafCohort2
          GenericTissue LeafCohort3
          GenericTissue Dead
        PastureAboveGroundOrgan Stems
          GenericTissue LeafCohort1
          GenericTissue LeafCohort2
          GenericTissue LeafCohort3
          GenericTissue Dead
        PastureAboveGroundOrgan Stolons
          GenericTissue LeafCohort1
          GenericTissue LeafCohort2
          GenericTissue LeafCohort3
          GenericTissue Dead
      PastureSpecies WhiteClover: same as DumpingArea.WhiteClover
      Soil LismoreSoil: SoilType=NZ_Sedimentary; LocalName=Lismore; Site=Winchmore; NearestTown=Ashburton; Region=Canterbury; Country=New Zealand; Latitude=-48.48; Longitude=0
        Analysis: PHUnits=Water; BoronUnits=HotWater
          Thickness  Rocks  PH  CEC   ParticleSizeSand  ParticleSizeSilt  ParticleSizeClay
          150        0      6   12.5  15                65                20
          150        0      6   10    20                65                15
          200        10     6   9     25                63                12
          150        40     6   5     35                57                8
          250        60     6   4     40                54                6
          300        70     6   4     40                55                5
          300        70     6   4     40                55                5
        Water
          Thickness  BD    AirDry  LL15   DUL    SAT   KS
          150        1.3   0.05    0.15   0.36   0.45  5000
          150        1.35  0.12    0.14   0.34   0.43  2500
          200        1     0.055   0.055  0.19   0.25  3000
          150        0.53  0.015   0.015  0.065  0.15  10000
          250        0.31  0.01    0.01   0.04   0.11  17500
          300        0.3   0.01    0.01   0.03   0.11  20000
          300        0.3   0.01    0.01   0.03   0.11  20000
          SoilCrop SwardSoil: LL=[0.15, 0.14, 0.06, 0.02, 0.01, 0.01, 0.01]; KL=[0.1, 0.1, 0.08, 0.04, 0.01, 0, 0]; XF=[1, 1, 1, 1, 1, 0, 0]
          SoilCrop RyegrassSoil: LL=[0.15, 0.14, 0.06, 0.02, 0.01, 0.01, 0.01]; KL=[0.1, 0.1, 0.08, 0.04, 0.01, 0, 0]; XF=[1, 1, 1, 1, 1, 0, 0]
          SoilCrop WhiteCloverSoil: LL=[0.15, 0.14, 0.06, 0.02, 0.01, 0.01, 0.01]; KL=[0.1, 0.1, 0.08, 0.04, 0.01, 0, 0]; XF=[1, 1, 1, 1, 1, 0, 0]
          SoilCrop Ryegrass1Soil: LL=[0.15, 0.14, 0.06, 0.02, 0.01, 0.01, 0.01]; KL=[0.1, 0.1, 0.08, 0.04, 0.01, 0, 0]; XF=[1, 1, 1, 1, 1, 0, 0]
        SoilWater: SummerDate=1-Nov; SummerU=6; SummerCona=3.5; WinterDate=1-apr; WinterU=2; WinterCona=2; DiffusConst=88; DiffusSlope=35; Salb=0.13; CN2Bare=73; CNRed=20; CNCov=0.8; slope=0; discharge_width=0; catchment_area=0; max_pond=0; residueinterception=0
          Thickness  SWCON  KLAT
          150        0.5    0
          150        0.52   0
          200        0.55   0
          150        0.6    0
          250        0.65   0
          300        0.65   0
          300        0.65   0
        SoilNitrogen: fom_type=[default, manure, mucuna, lablab, shemp, stable]; fract_carb=[0.2, 0.3, 0.54, 0.57, 0.45, 0]; fract_cell=[0.7, 0.3, 0.37, 0.37, 0.47, 0.1]; fract_lign=[0.1, 0.4, 0.09, 0.06, 0.08, 0.9]
        SoilOrganicMatter: RootCN=40; RootWt=1000; SoilCN=12; EnrACoeff=7.4; EnrBCoeff=0.2; OCUnits=Total
          Thickness  OC    FBiom  FInert
          150        3     0.04   0.5
          150        1     0.02   0.7
          200        0.6   0.02   0.83
          150        0.4   0.01   0.9
          250        0.25  0.01   0.95
          300        0.15  0      0.99
          300        0.1   0      0.99
        InitialWater Initial water: PercentMethod=EvenlyDistributed; FractionFull=0.95
        Sample Initial nitrogen: NO3Units=ppm; NH4Units=ppm; SWUnits=Volumetric; OCUnits=Total; PHUnits=Water
          Thickness  NO3   NH4
          150        5     0.1
          150        2.5   0.1
          200        1     0.1
          150        0.75  0.1
          250        0.5   0.1
          300        0.5   0.1
          300        0.5   0.1
        CERESSoilTemperature
      SoluteManager
      Report ReportPaddock: EventNames=[Clock].EndOfDay
        VariableNames:
          [Clock].Today
          [Ryegrass].AboveGroundWt
          [Ryegrass].HarvestableWt
          [WhiteClover].AboveGroundWt
          [WhiteClover].HarvestableWt
  Simulation FeedlotForNeville
    Clock: StartDate=1999-01-01; EndDate=2000-12-31
    Summary SummaryFile
    Weather: FileName=%root%\Examples\WeatherFiles\lincoln.met
    Zone Feedlot: Area=10; Slope=0
      Report: VariableNames=[Clock].Today
      Soil: ASCOrder=Vertosol; ASCSubOrder=Black; SoilType=Clay; Site=Norwin; NearestTown=Norwin; Region=Darling Downs and Granite Belt; State=Queensland; Country=Australia; NaturalVegetation=Qld. Bluegrass, possible Qld. Blue gum; ApsoilNumber=900; Latitude=-27.581836; Longitude=151.320206; LocationAccuracy=+/- 20m
        DataSource=CSIRO Sustainable Ecosystems, Toowoomba; Characteriesd as part of the GRDC funded project"Doing it better, doing it smarter, managing soil water in Australian agriculture' 2011
        Comments=OC, CLL for all crops estimated-based on Bongeen Mywybilla Soil No1
        Water
          Thickness  BD       AirDry    LL15      DUL       SAT       KS
          150        1.01056  0.13025   0.2605    0.521     0.588655  20
          150        1.07146  0.198689  0.248362  0.496723  0.565677  20
          300        1.09394  0.28      0.28      0.488438  0.557193  20
          300        1.15861  0.28      0.28      0.480297  0.532787  20
          300        1.17301  0.28      0.28      0.471584  0.527354  20
          300        1.16287  0.28      0.28      0.457071  0.53118   20
          300        1.1875   0.28      0.28      0.452332  0.521888  20
          SoilCrop WheatSoil: LL=[0.261, 0.248, 0.28, 0.306, 0.36, 0.392, 0.446]; KL=[0.06, 0.06, 0.06, 0.04, 0.04, 0.02, 0.01]; XF=[1, 1, 1, 1, 1, 1, 1]
        SoilWater: SummerDate=1-Nov; SummerU=5; SummerCona=5; WinterDate=1-Apr; WinterU=5; WinterCona=5; DiffusConst=40; DiffusSlope=16; Salb=0.12; CN2Bare=73; CNRed=20; CNCov=0.8; max_pond=0; Thickness=[150, 150, 300, 300, 300, 300, 300]; SWCON=[0.3, 0.3, 0.3, 0.3, 0.3, 0.3, 0.3]; residueinterception=0
        SoilNitrogen: fom_type=[default, manure, mucuna, lablab, shemp, stable]; fract_carb=[0.2, 0.3, 0.54, 0.57, 0.45, 0]; fract_cell=[0.7, 0.3, 0.37, 0.37, 0.47, 0.1]; fract_lign=[0.1, 0.4, 0.09, 0.06, 0.08, 0.9]
        SoilOrganicMatter: RootCN=40; RootWt=1000; SoilCN=12; EnrACoeff=7.4; EnrBCoeff=0.2; OCUnits=Total
          Thickness  OC    FBiom  FInert
          150        1.2   0.04   0.4
          150        0.96  0.02   0.6
          300        0.6   0.02   0.8
          300        0.3   0.02   1
          300        0.18  0.01   1
          300        0.12  0.01   1
          300        0.12  0.01   1
        Analysis: Thickness=[150, 150, 300, 300, 300, 300, 300]; PH=[8, 8, 8, 8, 8, 8, 8]; PHUnits=Water; BoronUnits=HotWater
        InitialWater: PercentMethod=EvenlyDistributed; FractionFull=1
        Sample InitialN: NO3Units=ppm; NH4Units=ppm; SWUnits=Volumetric; OCUnits=Total; PHUnits=Water
          Thickness  NO3  NH4
          150        1    0.1
          150        1    0.1
          300        1    0.1
          300        1    0.1
          300        1    0.1
          300        1    0.1
          300        1    0.1
        CERESSoilTemperature
      SurfaceOrganicMatter: PoolName=wheat_stubble; type=wheat; mass=0; standing_fraction=0; cnr=100; CriticalResidueWeight=2000; OptimumDecompTemp=20; MaxCumulativeEOS=20; CNRatioDecompCoeff=0.277; CNRatioDecompThreshold=25; TotalLeachRain=25; MinRainToLeach=10; CriticalMinimumOrganicC=0.004; DefaultCPRatio=0; DefaultStandingFraction=0; StandingExtinctCoeff=0.5; FractionFaecesAdded=0.5
        Pools:
          {PoolName=wheat_stubble, ResidueType=wheat, Mass=0, CNRatio=100, StandingFraction=0}
        ResidueTypes: LoadFromResource=ResidueTypes
      MicroClimate: a_interception=0; b_interception=1; c_interception=0; d_interception=0; soil_albedo=0.3; sun_angle=15; soil_heat_flux_fraction=0.4; night_interception_fraction=0.5; refheight=2; albedo=0.15; emissivity=0.96; RadIntTotal=0
      SoluteManager
    Supplement: same as OneBigPaddock.Supplement
    Stock: RandSeed=9999
      PaddockList:
        {Area=1, Slope=0}
    Manager ManageStock
```csharp
using System;
using Models.Core;
using Models.Utilities;
using Models.GrazPlan;
using APSIM.Shared.Utilities;

namespace Models
{
    [Serializable]
    public class Script : Model
    {
        [Link] Clock Clock;
        [Link] Stock Cows;
        [Link] Supplement Feed;

        private double sale_age = 3.0;
        private int no_to_buy;
        private int group_count;
        private int g;

        [EventSubscribe("StartOfSimulation")]
        private void OnStartOfSimulation(object sender, EventArgs e)
        {
                g = Cows.NoGroups + 1;
                no_to_buy = 30;
                
                StockBuy purchase = new StockBuy();
                purchase.Genotype = "Friesian";
                purchase.Number = no_to_buy;
                purchase.Sex = "heifers";
                purchase.Age = 24;
                purchase.Weight = 550.0;
                purchase.UseTag = g + 1;
                purchase.MatedTo = "Friesian";
                purchase.Pregnant = 0;  // days pregnant
                purchase.Lactating = 1;
                purchase.NumYoung = 1;
                purchase.YoungWt = 45;
                
                Cows.Buy(purchase);
                Cows.Move(g, "Feedlot");
        }
                                
        [EventSubscribe("DoManagement")]
        private void OnDoManagement(object sender, EventArgs e)
        {
            // purchase animals annually
            if (DateUtilities.DatesEqual("01 JAN", Clock.Today))
            {
            }

            if (Cows.NumberAll > 0)
                Feed.Feed("Silage", 20.0 * Cows.NumberAll, "Feedlot");
        }
    }
}
```
    Report Report1: EventNames=[Clock].EndOfDay
      VariableNames:
        [Clock].Today
        [Stock].NumberAll
        [Stock].WeightAll
        [Stock].CondScoreAll
        [Stock].IntakeAll.Weight
        [Stock].IntakeAll.N
        [Stock].UrineNAll
        [Stock].FaecesAll.N
        [Stock].MilkWtAll
        [Supplement].stores[2].Name
        [Supplement].stores[2].Stored
  Simulation SimpleRotation
    Memo
      Very strange weaning behaviour.  Has been reported as issue #2677 https://github.com/APSIMInitiative/ApsimX/issues/2677
    Clock: StartDate=2001-10-01; EndDate=2001-10-31
    Summary SummaryFile
    SoilArbitrator
    Weather: FileName=%root%\Examples\WeatherFiles\lincoln.met
    Stock: RandSeed=9999
      PaddockList:
        {Area=1, Slope=0}
    Manager Ex_TargetRotationLength
      DoVerbose = True
      StockingRate = 3
      CurrentLocationName = Paddock01
      TargetRotationLength = 4
      PostGrazingResidual = 1500
      HarvestExcessHerbage = False
      SilageEveryDay = 0.25
      SilageOnPastureMass = 5
      TriggerPastureMass = 1800
      NumCows = 3
      pastLocationName =
      newLocationName =
      CurrentLocationNum = 0
      NumPaddocks = 0
      listOfPaddockInfo =
```csharp
using System;
using Models.Core;
using Models.Utilities;
using Models.GrazPlan;
using APSIM.Shared.Utilities;
using System.Xml.Serialization;
using Models.PMF;
using Models.Soils;
using System.Collections;
using System.Collections.Generic;
using Models.AgPasture;
using System.Diagnostics;

namespace Models
{

    [Serializable]
    public class Script : Model
    {
        [Link] Clock Clock;
        [Link] Stock Cows;
        [Link] Supplement Feed;
        [Link] Zone[] Paddocks;
        [Link] ISummary summary = null;
        [Link] Simulation Farm;

        //List<AgPasture.PastureSpecies> Pasture = new List<AgPasture.PastureSpecies>();

        [Serializable]
        public class PaddockInfo
        {
            public string paddockName;
            public double totalBiomass;
            public double harvestableBiomass;
            public int paddockNum;
            public double paddockArea;
        }

        [Description("Do verbose reporting from this script (tick for yes): ")] public bool DoVerbose { get; set; }

        [Separator("======= Whole farm info =======")]
        [Description("Whole-farm stocking rate (head/ha): ")]
        public double StockingRate { get; set; }
        [Description("Initial location of the cows (paddock name): ")] public string CurrentLocationName { get; set; }

        [Separator("======= Rotation and topping =======")]
        [Description("Target rotation length (days/paddock): ")] public int TargetRotationLength { get; set; }
        [Description("Post grazing residual (kgDM/ha): ")] public double PostGrazingResidual { get; set; }
        [Description("Harvest excess herbage above residual when cows leave the paddock?: ")] public bool HarvestExcessHerbage { get; set; }

        [Separator("======= Feeding of silage  =======")]
        [Description("Baseline feeding of silage (kgDM/head/day): ")] public double SilageEveryDay { get; set; }
        [Description("Low pasture mass feeding of silage (kgDM/head/day): ")] public double SilageOnPastureMass { get; set; }
        [Description("Trigger pasture mass for above rule (kgDM/ha): ")] public double TriggerPastureMass { get; set; }

        [Separator("======= Stock variables in here eventually =======")]


        public int NumCows { get; set; } // number of cows on the whole farm
        public string pastLocationName { get; set; }  // name of the paddock that the cows are currently in
        public string newLocationName { get; set; }  // name of the paddock that the cows are currently in
        public int CurrentLocationNum { get; set; }  // name of the paddock that the cows are currently in
        public int NumPaddocks { get; set; }
        //public double[] HarvestableBiomass { get; set; }

        private int group_count; // how many groups are there in the simulation
        private int g = 1;      // index to the groups of animals

        //private int DaysPerPaddock;
        private int DaysInThisPaddock;
        private bool MoveToday = false;

        public event BiomassRemovedDelegate BiomassRemoved;
        public List<PaddockInfo> listOfPaddockInfo { get; set; }


        [EventSubscribe("StartOfSimulation")]
        private void OnStartOfSimulation(object sender, EventArgs e)
        {
            summary.WriteMessage(this, "Initialising the paddock information");
            listOfPaddockInfo = new List<PaddockInfo>();


            GetPaddockInfo();
            //HarvestableBiomass = Farm.

            NumCows = (int)(Math.Round(StockingRate * Farm.Area, 0));

            SetInitialCowStuff();

            if (NumCows > 0)
                Cows.Move(g, CurrentLocationName);

            summary.WriteMessage(this, "     The number of animals has been rounded to " + NumCows + " from " + (StockingRate * Farm.Area));
            summary.WriteMessage(this, "     The animals will begin in " + CurrentLocationName + " which is paddock number " + CurrentLocationNum + " in the simulation");
            summary.WriteMessage(this, "     The area of the whole farm is " + Farm.Area + " ha");

            DaysInThisPaddock = -1;
        }

        [EventSubscribe("DoManagement")]
        private void OnDoManagement(object sender, EventArgs e)
        {
            UpdatePaddockInfo();

            if ((Cows.LactatingAll > 2) && (Cows.NoSucklingAll > 0))
            	WeanCalves();
            if ((Cows.LactatingAll > 4) && (Cows.LactatingAll < 6))
            	SellCalves();

            MoveToday = false;
            // how many days in this paddock?  Ready to move?
            DaysInThisPaddock += 1;
            if (DaysInThisPaddock >= TargetRotationLength)
            {
                MoveToday = true;

                pastLocationName = CurrentLocationName;
                if (CurrentLocationNum < NumPaddocks - 1)
                {
                    CurrentLocationNum += 1;
                    newLocationName = listOfPaddockInfo[CurrentLocationNum].paddockName;
                }
                else
                {
                    CurrentLocationNum = 0;
                    newLocationName = listOfPaddockInfo[CurrentLocationNum].paddockName;
                }
                CurrentLocationName = listOfPaddockInfo[CurrentLocationNum].paddockName;


                if (HarvestExcessHerbage)
                {
                    foreach (Zone paddock in Paddocks)
                    {
                        if (paddock.Name == pastLocationName)
                        {
                            double pastPaddockBiomass = 0.0;
                            foreach (PastureSpecies plant in Apsim.Children(paddock, typeof(PastureSpecies)))
                                pastPaddockBiomass += plant.AboveGroundWt;
                            if (pastPaddockBiomass > (PostGrazingResidual + 250.0))  //why the 250?
                            {
                                foreach (PastureSpecies plant in Apsim.Children(paddock, typeof(PastureSpecies)))
                                    plant.Graze(amount: (plant.AboveGroundWt / pastPaddockBiomass * PostGrazingResidual), type: "SetResidueAmount");

                            }
                        }
                    }
                }

                if (NumCows > 0)
                    Cows.Move(g, listOfPaddockInfo[CurrentLocationNum].paddockName);

                if (DoVerbose)
                    summary.WriteMessage(this, "moving Stock to " + listOfPaddockInfo[CurrentLocationNum].paddockName);

                DaysInThisPaddock = 0;
            }

            if (SilageEveryDay > 0)
            {
                Feed.Feed("silage_highquality", SilageEveryDay * Cows.NumberAll, CurrentLocationName);
            }

            if ((SilageOnPastureMass > 0) && (listOfPaddockInfo[CurrentLocationNum].harvestableBiomass < TriggerPastureMass))
            {
                Feed.Feed("silage_highquality", SilageOnPastureMass * Cows.NumberAll, CurrentLocationName);
            }


        } // End of Do Management

        [EventSubscribe("DoManagementCalculations")]
        private void DoManagementCalculations(object sender, EventArgs e)
        {
            //this is after Stock have eaten
            UpdatePaddockInfo();

        }

        public void SetInitialCowStuff()
        {
            if (NumCows > 0)
            {
                g = Cows.NoGroups + 1;

                StockBuy purchase = new StockBuy();
                purchase.Genotype = "Friesian";
                purchase.Number = NumCows;
                purchase.Sex = "heifers";
                purchase.Age = 36;       // age in months
                purchase.Weight = 600.0;  // live weight in kg
                purchase.UseTag = g + 1;
                purchase.MatedTo = "Friesian";
                purchase.Pregnant = 280;  // days pregnant, 0 = non pregnant, 1 = pregnant
                purchase.Lactating = 0;  // 0 for dry, 1 for lactating
                purchase.NumYoung = 1;
                purchase.YoungWt = 45;

                Cows.Buy(purchase);
            }
        }

        public void WeanCalves()
        {
                StockWean weanData = new StockWean();
				weanData.Group = 0;
				weanData.Sex = "all";
				weanData.Number = Cows.NumberAll;

				Cows.Wean(weanData);
        }

        public void SellCalves()
        {
				double weanAge = 0.25 * 365;
				int NumGroups = Cows.NoGroups;

			  for (int gg = 1; gg <= NumGroups; gg++)
              {
                  StockSplit split = new StockSplit();
                  split.Group = gg;
                  split.Type = "age";
                  split.Value = weanAge;  

                Cows.Split(split);
              }

              NumGroups = Cows.NoGroups;
              for (int gg = 1; gg <= NumGroups; gg++)
              {
                if (Cows.Age[gg - 1] < weanAge)
                      Cows.Sell(gg, Cows.Number[gg - 1]);
              }


        }


        public void GetPaddockInfo()
        {
            NumPaddocks = 0;
            CurrentLocationNum = 0;

            foreach (Zone paddock in Paddocks)
            {
                NumPaddocks += 1;

                PaddockInfo paddockInfo = new PaddockInfo();

                paddockInfo.paddockName = paddock.Name;
                paddockInfo.paddockNum = NumPaddocks - 1;
                paddockInfo.paddockArea = paddock.Area;

                foreach (PastureSpecies plant in Apsim.Children(paddock, typeof(PastureSpecies)))
                {
                    paddockInfo.harvestableBiomass += plant.HarvestableWt;
                    paddockInfo.totalBiomass += plant.AboveGroundWt;
                }


                listOfPaddockInfo.Add(paddockInfo);

                if (paddock.Name == CurrentLocationName)
                    CurrentLocationNum = paddockInfo.paddockNum;

                summary.WriteMessage(this, "     Paddock " + NumPaddocks + " is called " + paddock.Name + ", has an area of " + paddock.Area + " ha and an initial harvestable biomass of " + paddockInfo.harvestableBiomass + " kg DM / ha");

            }

        }

        public void UpdatePaddockInfo()
        {
            int ii = -1;

            foreach (Zone paddock in Paddocks)
            {
                ii += 1;
                listOfPaddockInfo[ii].harvestableBiomass = 0.0;
                foreach (PastureSpecies plant in Apsim.Children(paddock, typeof(PastureSpecies)))
                {
                    listOfPaddockInfo[ii].harvestableBiomass += plant.HarvestableWt;
                    listOfPaddockInfo[ii].totalBiomass += plant.AboveGroundWt;
                }

            }

        }


    }
}
```
    Supplement: SpoilageTime=0
      stores:
        IsRoughage  DMContent  DMD   MEContent  CPConc  ProtDg  PConc   SConc   EEConc  ADIP2CP  AshAlk  MaxPassage  Name                Stored
        true        0.85       0     0          0       0       0       0       0       0        0       0           fodder              0
        true        1          0.85  12         0.16    0.7     0.0032  0.0024  0.02    0.06     0.6     0           silage_highquality  2000
    Report ReportTop: EventNames=[Clock].EndOfDay
      VariableNames:
        [Clock].Today
        [Ex_TargetRotationLength].Script.listOfPaddockInfo[1].harvestableBiomass as PaddockInfo
        [Ex_TargetRotationLength].Script.CurrentLocation as CurrentLoc
        [Ex_TargetRotationLength].Script.CurrentLocationNum as CurrentLocNum
        [Stock].PastIntakeAll.Weight as IntakePast
        [Stock].SuppIntakeAll.Weight as IntakeSupp
        [Stock].IntakeAll.Weight as IntakePastSupp
        //[Stock].Paddock as StockInPaddockName
        [Ex_TargetRotationLength].Script.CurrentLocationNum as StockInPaddockNum
        [Stock].NumberAll
        [Stock].MilkWtAll * 0.1 as MilkSolids
        [Stock].BaseWtAll
        [Stock].CondScoreAll
        [Stock].IntakeAll.Weight * [Stock].NumberAll as TotalIntake
        ([Paddock00].Ryegrass.HerbageGrowthWt + [Paddock00].WhiteClover.HerbageGrowthWt) * [Paddock00].Area + ([Paddock01].Ryegrass.HerbageGrowthWt + [Paddock01].WhiteClover.HerbageGrowthWt) * [Paddock01].Area + ([Paddock02].Ryegrass.HerbageGrowthWt + [Paddock02].WhiteClover.HerbageGrowthWt) * [Paddock02].Area as TotalGrowth
        [Supplement].stores[2].Stored
    Zone Paddock00: Area=1; Slope=0
      Folder Managers: same as OneBigPaddock.OneBigPaddock.Managers
      MicroClimate: a_interception=0; b_interception=0; c_interception=0; d_interception=0; soil_albedo=0.23; sun_angle=15; soil_heat_flux_fraction=0.4; night_interception_fraction=0.5; refheight=2; albedo=0.293662; emissivity=0.96; RadIntTotal=0
      Irrigation
      Fertiliser
      SurfaceOrganicMatter: same as OneBigPaddock.OneBigPaddock.SurfaceOrganicMatter
      PastureSpecies Ryegrass: same as OneBigPaddock.OneBigPaddock.Ryegrass
      PastureSpecies WhiteClover: same as DumpingArea.WhiteClover
      Soil LismoreSoil: same as OneBigPaddock.OneBigPaddock.LismoreSoil
      SoluteManager
      Report: EventNames=[Clock].EndOfDay
        VariableNames:
          [Clock].Today
          [Ryegrass].AboveGroundWt
          [Ryegrass].HarvestableWt
          [WhiteClover].AboveGroundWt
          [WhiteClover].HarvestableWt
          [Ryegrass].AboveGroundWt + [WhiteClover].AboveGroundWt as PaddockBiomass
          [Ryegrass].HerbageGrowthWt + [WhiteClover].HerbageGrowthWt as PGR
          ([Ryegrass].HerbageGrowthWt + [WhiteClover].HerbageGrowthWt) * [Zone].Area as PaddockFeedAccum
    Zone Paddock01: same as SimpleRotation.Paddock00
    Zone Paddock02: same as SimpleRotation.Paddock00
  DataStore
  Simulation PlantainGrazing
    Clock: StartDate=2010-09-01; EndDate=2012-12-31
    Weather: FileName=%root%\Examples\WeatherFiles\lincoln.met
    Summary
    SoilArbitrator Soil Arbitrator
    Supplement: SpoilageTime=0
      stores:
        IsRoughage  DMContent  DMD   MEContent  CPConc  ProtDg  PConc   SConc   EEConc  ADIP2CP  AshAlk  MaxPassage  Name    Stored
        true        0.85       0     0          0       0       0       0       0       0        0       0           fodder  0
        true        0.25       0.75  12         0.18    0.8     0.0032  0.0024  0.02    0.06     0.6     0           silage  2000
    Stock: RandSeed=9999
      PaddockList:
        {Area=1, Slope=0}
    Manager GrazeForageCrop
      genotypeInput = Angus
      sexInput = Steers
      ageInput = 36
      weightInput = 500
      pregnantInput = 0
      lactatingInput = 0
      youngNumberInput = 0
      youngWtInput = 0
      StockingRate = 50
      CurrentLocation = Away
      NumStock = 0
      FarmArea = 0
      CurrentLocationNum = 0
```csharp
using System;
using Models.Core;
using Models.Utilities;
using Models.GrazPlan;
using APSIM.Shared.Utilities;
using System.Xml.Serialization;
using Models.PMF;
using Models.Soils;
using System.Collections;
using System.Collections.Generic;
using Models.AgPasture;
using System.Diagnostics;

namespace Models
{

    [Serializable]
    public class Script : Model
    {
        [Link] Clock Clock;
        [Link] Stock Stock;
        [Link] Supplement Feed;
        [Link] Zone[] Paddocks;
        [Link] ISummary summary = null;

        [Serializable]
        public class PaddockInfo
        {
            public string paddockName;
            public double harvestableBiomass;
            public int paddockNum;
            public double paddockArea;
        }

		//public enum Genotypes {string1, string2 }


        [Separator("======= Stock type info, the same type of stock are brought onto the paddock at each grazing =======")]
        [Description("Stock: genotype (e.g. Small Merino, Angus, Freisian):")] public string genotypeInput { get; set; }
        [Description("Stock: sex (Cows, Heifers, Steers, Bulls, Ewes, Weathers, Rams, Cryptos):")] public string sexInput { get; set; }
        [Description("Stock: age (months):")] public double ageInput { get; set; }
        [Description("Stock: weight (kg liveweight /head):")] public double weightInput { get; set; }
        [Description("Stock: fertility status (0 if non-pregnant or days since conception):")] public int pregnantInput { get; set; }
        [Description("Stock: lactation status (0 if non-lactating or days since parturition):")] public int lactatingInput { get; set; }
        [Description("Stock: number of unweaned young:")] public int youngNumberInput { get; set; }
        [Description("Stock: weight of unweaned young:")] public double youngWtInput { get; set; }

        [Separator("======= Farm type info =======")]
        [Description("Whole-farm stocking rate (head/ha): ")] public double StockingRate { get; set; }
        [Description("Initial location of the cows (give either the paddock name or 'away'): ")] public string CurrentLocation { get; set; }


        public int NumStock { get; set; } // number of cows on the whole farm
        public double FarmArea { get; set; }
        //public double FarmArea { get; set; }

        private int group_count; // how many groups are there in the simulation
        private int g = 1;      // index to the groups of animals
        public int CurrentLocationNum { get; set; }  
        private int NumPaddocks = 1;

        public event BiomassRemovedDelegate BiomassRemoved;
        List<PaddockInfo> listOfPaddockInfo = new List<PaddockInfo>();

        [EventSubscribe("StartOfSimulation")]
        private void OnStartOfSimulation(object sender, EventArgs e)
        {
            summary.WriteMessage(this, "Initialising the paddock information");

            GetFarmAreaAndOtherInfo();

            NumStock = (int)(Math.Round(StockingRate * FarmArea, 0));


            if (CurrentLocation.ToLower() != "away")
            {
	            BuyStock();
            	Stock.Move(g, CurrentLocation);
            	summary.WriteMessage(this, " The Stock have been moved");
            }

            summary.WriteMessage(this, "     The number of animals has been rounded to " + NumStock + " from " + (StockingRate * FarmArea));
            summary.WriteMessage(this, "     The animals will begin in " + CurrentLocation + " which is paddock number " + CurrentLocationNum + " in the simulation");
            summary.WriteMessage(this, "     The area of the whole farm is " + FarmArea + " ha");

        }

        [EventSubscribe("DoManagement")]
        private void OnDoManagement(object sender, EventArgs e)
        {
        }


        public void BuyStock()
        {
            g = Stock.NoGroups + 1;

            StockBuy purchase = new StockBuy();
            purchase.Genotype = genotypeInput;
            purchase.Number = NumStock;
            purchase.Sex = sexInput;
            purchase.Age = ageInput;       // age in months
            purchase.Weight = weightInput;  // live weight in kg
            purchase.UseTag = g + 1;
            purchase.MatedTo = genotypeInput;
            purchase.Pregnant = pregnantInput;  // days pregnant, 0 = non pregnant, 1 = pregnant
            purchase.Lactating = lactatingInput;  // 0 for dry, 1 for lactating
            purchase.NumYoung = youngNumberInput;
            purchase.YoungWt = youngWtInput;

            Stock.Buy(purchase);
        }

        public void GetFarmAreaAndOtherInfo()
        {
            NumPaddocks = 0;
            FarmArea = 0.0;
            CurrentLocationNum = -1;

            foreach (Zone paddock in Paddocks)
            {
                NumPaddocks += 1;

                PaddockInfo paddockInfo = new PaddockInfo();

                paddockInfo.paddockName = paddock.Name;
                paddockInfo.paddockNum = NumPaddocks - 1;
                paddockInfo.paddockArea = paddock.Area;

                foreach (PastureSpecies plant in Apsim.Children(paddock, typeof(PastureSpecies)))
                    paddockInfo.harvestableBiomass += plant.HarvestableWt;

                listOfPaddockInfo.Add(paddockInfo);

                FarmArea += paddock.Area;
                if (paddock.Name == CurrentLocation)
                    CurrentLocationNum = paddockInfo.paddockNum;

                summary.WriteMessage(this, "     Paddock " + NumPaddocks + " is called " + paddock.Name + ", has an area of " + paddock.Area + " ha and an initial harvestable biomass of " + paddockInfo.harvestableBiomass + " kg DM / ha");

            }

        }

        public void UpdatePaddockInfo()
        {
            int ii = -1;

            foreach (Zone paddock in Paddocks)
            {
                ii += 1;
                listOfPaddockInfo[ii].harvestableBiomass = 0.0;
                foreach (PastureSpecies plant in Apsim.Children(paddock, typeof(PastureSpecies)))
                    listOfPaddockInfo[ii].harvestableBiomass += plant.HarvestableWt;

            }

        }


    }
}
```
    Report ReportTop: EventNames=[Clock].EndOfDay
      VariableNames:
        [Clock].Today
        [Stock].NumberAll as NumStock
        [Stock].IntakeAll.Weight as AveDMI
        [Stock].MEIntakeAll as AveMEIntake
        [Stock].WeightAll as AveBodyWeight
        [Stock].CondScoreAll as AveCS
        [Stock].MilkWtAll as AveMilkWeight
        [Stock].Paddock as CurrentLocation
        [GrazeForageCrop].Script.CurrentLocationNum
    Zone Field: Area=1; Slope=0
      Folder Management
        Manager SowingRule
          StartDate = 1-oct
          EndDate = 30-oct
          MinESW = 50
          MinRain = 30
          RainDays = 5
          mustSow = yes
          CultivarName = Tonic
          SowingDepth = 10
          RowSpacing = 150
          Population = 200
          Amount = 60
```csharp
using System;
using Models.Core;
using Models.PMF;
using Models.Soils;
using Models.Utilities;
using APSIM.Shared.Utilities;

namespace Models
{
    [Serializable]
    public class Script : Model
    {
        [Link] Clock Clock;
        [Link] Fertiliser Fertiliser;
        [Link] Summary Summary;
        [Link] Plant Plantain;
        [Link] Soil Soil; 
        Accumulator accumulatedRain;

        [Separator("======= Sowing conditions =======")]
        [Description("Start of sowing window (dd-mmm)")] public string StartDate { get; set;}
        [Description("End of sowing window (dd-mmm)")] public string EndDate { get; set;}
        [Description("Minimum extractable soil water for sowing (mm)")] public double MinESW { get; set;}
        [Description("Accumulated rainfall required for sowing (mm)")] public double MinRain { get; set;}
        [Description("Duration of rainfall accumulation (d)")] public int RainDays { get; set;}
        [Description("Must sow at the end of the window?")] public answerType mustSow { get; set; }

        [Separator("======= Sowing data =======")]
        [Description("Cultivar to be sown")] public string CultivarName { get; set;}
        [Description("Sowing depth (mm)")] public double SowingDepth { get; set;}        
        [Description("Row spacing (mm)")] public double RowSpacing { get; set;}    
        [Description("Plant population (/m2)")] public double Population { get; set;}    

        [Separator("======= Sowing fertiliser =======")]
        [Description("Amount of fertiliser to be applied (kg/ha)")] public double Amount { get; set;}

           public enum answerType
        {
            /// <summary>a positive answer</summary>
            yes,
            /// <summary>a negative answer</summary>
            no
        }

        
        [EventSubscribe("Commencing")]
        private void OnSimulationCommencing(object sender, EventArgs e)
        {
            accumulatedRain = new Accumulator(this, "[Weather].Rain", RainDays);
        }
        

        [EventSubscribe("DoManagement")]
        private void OnDoManagement(object sender, EventArgs e)
        {
            accumulatedRain.Update();
            //if (allowIrrigation == answerType.yes)

            bool doSowing = false;
            if (DateUtilities.WithinDates(StartDate,Clock.Today,EndDate) && !Plantain.IsAlive)
            	doSowing = true;
            if ((MathUtilities.Sum(Soil.SoilWater.ESW) < MinESW) || (accumulatedRain.Sum < MinRain))
            	doSowing = false;
            if ((mustSow == answerType.yes) && (DateUtilities.DatesEqual(EndDate, Clock.Today)))
            	doSowing = true;
            
            if (doSowing)
            {
               Plantain.Sow(population:Population, cultivar:CultivarName, depth:SowingDepth, rowSpacing:RowSpacing);
               Fertiliser.Apply(Amount: Amount, Type: Fertiliser.Types.NO3N);    
            }
        
        }
        
    }
}
```
        Operations FertiliserSchedule
          2011-01-05  [Fertiliser].Apply(Amount: 20.0, Type: Fertiliser.Types.UreaN, Depth: 30)
          2011-02-20  [Fertiliser].Apply(Amount: 20.0, Type: Fertiliser.Types.UreaN, Depth: 30)
          2011-10-15  [Fertiliser].Apply(Amount: 20.0, Type: Fertiliser.Types.UreaN, Depth: 30)
          2011-11-15  [Fertiliser].Apply(Amount: 20.0, Type: Fertiliser.Types.UreaN, Depth: 30)
          2012-01-10  [Fertiliser].Apply(Amount: 20.0, Type: Fertiliser.Types.UreaN, Depth: 30)
          2012-02-25  [Fertiliser].Apply(Amount: 20.0, Type: Fertiliser.Types.UreaN, Depth: 30)
          2012-09-15  [Fertiliser].Apply(Amount: 20.0, Type: Fertiliser.Types.UreaN, Depth: 30)
          2012-10-25  [Fertiliser].Apply(Amount: 20.0, Type: Fertiliser.Types.UreaN, Depth: 30)
          2012-11-15  [Fertiliser].Apply(Amount: 20.0, Type: Fertiliser.Types.UreaN, Depth: 30)
        Manager AutomaticIrrigation
          allowIrrigation = yes
          seasonStart = 15-Sep
          seasonEnd = 30-Apr
          seasonsAllocation = 10000
          triggerDeficit = 75
          targetDeficit = 95
          returndays = 3
          maximumAmount = 15
          depthPAWC = 500
```csharp
using System;
using Models.Core;
using Models.PMF;
using Models.Soils;
using System.Xml.Serialization;
using Models.PMF;
using APSIM.Shared.Utilities;

        
namespace Models
{
    [Serializable] 
    [System.Xml.Serialization.XmlInclude(typeof(Model))]
    public class Script : Model
    {
        //Communication to other modules
        [Link] ISummary summary = null;
        [Link] Irrigation Irrigation;
        [Link] Clock Clock;
        [Link] Soil Soil;
        [Link(IsOptional = true)] Plant existingCrop;
       
        //User inputs from properties tab
        [Description("Turn irrigation on?")]
        public answerType allowIrrigation { get; set; }
        [Description("Start of irrigation season (dd-MMM)")]
        public string seasonStart { get; set; }
        [Description("End of irrigation season (dd-MMM)")]
        public string seasonEnd { get; set; }
        [Description("Season allocation (mm)")]
        public double seasonsAllocation { get; set; }
        [Description("Deficit to trigger irrigation (% PAWC)")]
        public double triggerDeficit { get; set; }
        [Description("Deficit to stop irrigaton (% PAWC)")]
        public double targetDeficit { get; set; }
        [Description("Minimum days for irrigation to return")]
        public double returndays { get; set; }
        [Description("Maximum irrigation application (mm/day)")]
        public double maximumAmount { get; set; }
        [Description("Depth to calculate PAWC (mm)")]
        public double depthPAWC { get; set; }
       
        public enum answerType
        {
            /// <summary>a positive answer</summary>
            yes,
            /// <summary>a negative answer</summary>
            no
        }

        //Class members
        [XmlIgnore] public double TopSWdeficit { get; set; }
        [XmlIgnore] public double TopSWC { get; set; }
        [XmlIgnore] public double DaysSinceIrrigation { get; set; }
        [XmlIgnore] public double AmountToApply { get; set; }
        [XmlIgnore] public double SeasonAppliedAmount { get; set; }
        
        private bool IrrigationIsAllowed { get; set; }
        private bool SeasonIsOpen { get; set; }
        private bool CropIsActive { get; set; }
        private bool IrrigatorIsAvailable { get; set; }
        private bool SoilIsDry { get; set; }

        private DateTime StartDate;
        private DateTime EndDate;
        private double TopDUL;
        private double TopLL;
        private int nLayers;
    
        //Calculate static soil variables
        [EventSubscribe("StartOfSimulation")]
        private void OnStartOfSimulation(object sender, EventArgs e)
        {   
            //Set the season dates
            StartDate = DateTime.Parse(seasonStart + "-" + Clock.Today.Year.ToString());
            EndDate = DateTime.Parse(seasonEnd + "-" + Clock.Today.Year.ToString());
            
            //Can we irrigate at all?
            IrrigationIsAllowed = false; 
            if (allowIrrigation == answerType.yes)
                IrrigationIsAllowed = true; 

            //Calculate soil water variables
            double depthFromSurface = 0.0;
            double fracLayer = 0.0;
            nLayers = Soil.Thickness.Length;
            for (int layer = 0; layer < nLayers; layer++)
            {
                fracLayer = Math.Min(1.0, (depthPAWC - depthFromSurface) / Soil.Thickness[layer]);
                TopLL += Soil.LL15mm[layer] * fracLayer;
                TopDUL += Soil.DULmm[layer] * fracLayer;
                depthFromSurface += Soil.Thickness[layer];
                if (depthFromSurface >= depthPAWC)
                    layer = nLayers;
            }
        }
             
        //Determine daily requirement for irrigation
        [EventSubscribe("StartOfDay")]
        private void OnStartOfDay(object sender, EventArgs e)
        {
            //Can we irrigate today?          
            SeasonIsOpen = isBetween(Clock.Today, StartDate, EndDate);

            //Is there a crop in the ground that needs irrigation?
            CropIsActive = false;
            if ((existingCrop != null) && (existingCrop.IsAlive))
                CropIsActive = true;
            //if ((existingCrop.Phenology.Stage >= 3.0) && (existingCrop.Phenology.Stage < 6.0))
          
            //Is the irrigator available?
            IrrigatorIsAvailable = false;
            DaysSinceIrrigation += 1;
            if (DaysSinceIrrigation >= returndays)
                IrrigatorIsAvailable = true;
          
            //Is the soil dry enough to require irrigation?
            SoilIsDry = false;
            double depthFromSurface = 0.0;
            double fracLayer = 0.0;
            TopSWC = 0.0;
            for (int layer = 0; layer < nLayers; layer++)
            {
                fracLayer = Math.Min(1.0, (depthPAWC - depthFromSurface) / Soil.Thickness[layer]);
                TopSWC += Soil.SoilWater.SWmm[layer] * fracLayer;
                depthFromSurface += Soil.Thickness[layer];
                if (depthFromSurface >= depthPAWC)
                    layer = nLayers;
            }
            
            TopSWdeficit = TopSWC - TopDUL;
            if (Math.Max(0.0, -TopSWdeficit) >= (TopDUL - TopLL) * (100 - triggerDeficit) / 100)
                SoilIsDry = true;
                
            //Are all the conditions ratifying irrigation
            if (IrrigationIsAllowed && SeasonIsOpen && CropIsActive && IrrigatorIsAvailable && SoilIsDry)
            {
                //Lets bloody well irrigate then!!!!
                AmountToApply = TopDUL * targetDeficit / 100 - TopSWC;
                //AmountToApply = Math.Max(0.0, Math.Min(AmountToApply, seasonsAllocation - SeasonAppliedAmount));
                AmountToApply = maximumAmount;
                Irrigation.Apply(AmountToApply);
                DaysSinceIrrigation = 0;
                SeasonAppliedAmount += AmountToApply;
            }
        }
        
        ///Checks whether theDate is between iniDate and endDate (non-year specific)
        private bool isBetween(DateTime theDay, DateTime iniDate, DateTime endDate)
        {
            bool result = false;
            if (iniDate.DayOfYear < endDate.DayOfYear)
            {
                // period is within one year, ex: summer in the northern hemisphere
                if ((theDay.DayOfYear >= iniDate.DayOfYear) && (theDay.DayOfYear <= endDate.DayOfYear))
                    result = true;
            }
            else
            {
                // period goes over the end of the year, ex: summer in the southern hemisphere
                if ((theDay.DayOfYear >= iniDate.DayOfYear) || (theDay.DayOfYear <= endDate.DayOfYear))
                    result = true;
            }
            
            return result;
        }
    }
}
```
        Manager Defoliate
          Crop =
          cutPasture_StartDate = 2011-01-01
          cutPasture_EndDate = 2100-12-31
          defoliateType = Graze
          interval2Cut = 45
          durationOfCut = 1
          removeAmountType = ResidualDM
          herbageAmount = 500
          fracDM2Remove = 0.8
          fracN2Remove = 0.8
          urineDepth = 10
          fracN2Dung = 0.4
          fracPopDecline = 0.05
```csharp
// Defoliates on a regular cycle or one-off via a schedule
// currently defoliates by the amount specified spread evenly over the specified period

using System;
using Models.Core;
using System.Collections.Generic;
using System.Text;
using Models;
using Models.Soils;
using Models.PMF;
using System.Xml.Serialization;
using APSIM.Shared.Utilities;

namespace Models
{
    [Serializable]
    public class Script : Model
    {
        [Link] Zone zone;
        [Link] Clock Clock;
        [Link] Plant Plantain;
        [Link] Fertiliser fertiliser;
        [Link] ISummary summary = null;

        [Description("Choose the crop to harvest:")]
        public IPlant Crop { get; set; }

        [Description("Enter the date to start the rotation (dd/mm/yyyy):")]
        public DateTime cutPasture_StartDate { get; set; }

        [Description("Enter the date to end the rotation (dd/mm/yyyy):")]
        public DateTime cutPasture_EndDate { get; set; }

        [Description("Select type of defoliation:")]
        public defoliationTypes defoliateType { get; set; }

        [Description("Enter the interval between defoliations (days):")]
        public int interval2Cut { get; set; }

        [Description("Enter the number of days to defoliate over (days):")]
        public int durationOfCut { get; set; }

        [Description("Choose what amount is being defined:")]
        public removeAmountTypes removeAmountType { get; set; }

        [Description("Enter the amount to use (kgDM/ha):")]
        public double herbageAmount { get; set; }

        [Description("Enter the fraction of DM that is removed from the field (0-1):")]
        public double fracDM2Remove { get; set; }

        [Description("Enter the fraction of N that is removed from the field (0-1):")]
        public double fracN2Remove { get; set; }

        [Description("Enter the depth down to which urine will applied (mm):")]
        public double urineDepth { get; set; }

        [Description("Enter the proportion of N returned in dung (0-1):")]
        public double fracN2Dung { get; set; }

        [Description("Enter the fraction of population decline due to defoliation (0-1):")]
        public double fracPopDecline { get; set; }

        //fraction of each plant part returned as residue (0-1), wastage
        private double leafResidueFrac = 0.01;
        private double stemResidueFrac = 0.01;
        private double flowerResidueFrac = 0.01;
        private double minLeafAmount = 5.0;

        //Outputs
        //Pasture DM defoliated today (kg/ha)
        [XmlIgnore] public double DefoliatedDM{ get; set; }
        //N defoliate today
        [XmlIgnore] public double DefoliatedN{ get; set; }
        //Pasture DM harvested today (kg/ha)
        [XmlIgnore] public double HarvestedDM{ get; set; }
        //N harvested today
        [XmlIgnore] public double HarvestedN{ get; set; }
        //DM removed from the paddock
        [XmlIgnore] public double RemovedDM{ get; set; }
        //N removed from the paddock
        [XmlIgnore] public double RemovedN{ get; set; }
        //DM returned to the paddock
        [XmlIgnore] public double ReturnedDM{ get; set; }
        //N returned to the paddock
        [XmlIgnore] public double ReturnedN{ get; set; }
        //N returned as dung (SurfaceOM)
        [XmlIgnore] public double NReturnedInDung{ get; set; }
        //N returned as urine (urea)
        [XmlIgnore] public double NReturnedInUrine{ get; set; }
        //Number of days after last harvest
        [XmlIgnore] public int DaysAfterCut{ get; set; }
        //Total standing DM (Leaf + Stem/Sheath) before cut
        [XmlIgnore] public double PreHarvestDM{ get; set; }
        //Total standing DM (Leaf + Stem/Sheath) after cut
        [XmlIgnore] public double PostHarvestDM{ get; set; }

        //Pasture DM harvested this rotation (kg/ha)
        [XmlIgnore] public double RotationHarvestedDM{ get; set; }
        //Pasture DM to be harvested this rotation (kg/ha)
        [XmlIgnore] public double RotationHarvestingDM{ get; set; }

        //Internal variables
        private RemovalFractions removalFractions;
        //The fraction of urine to be applied in each layer
        private double[] FracLayer;
        // total herbage to remove in g/m2 per day
        private double herbageToRemove;
        // counter
        private int daysCutting = 0;
        // type of defoliation (Cut or Graze)
        private string defoliationType;
        // type of DM amount (ResidualDM or DMToRemove)
        private string amountType;
        // auxiliary
        private bool aCutHasHappened = false;
        private bool isStillCutting = false;
        private double cumAmountHarvested;

        // event to add residue / dung to surface OM
        public event BiomassRemovedDelegate BiomassRemoved;

        [EventSubscribe("Commencing")]
        private void OnSimulationCommencing(object sender, EventArgs e)
        {
            removalFractions = new RemovalFractions();
            DaysAfterCut = 0;
            resetVariables();
            if (defoliateType == defoliationTypes.Cut)
                defoliationType = "Cut";
            else
                defoliationType = "Graze";

            if (removeAmountType == removeAmountTypes.ResidualDM)
                amountType = "ResidualDM";
            else
                amountType = "DMToRemove";

            // make sure that rotation start when startDate<simulationStartDay
            if ((Clock.Today > cutPasture_StartDate) && (Clock.Today < cutPasture_EndDate))
                cutPasture_StartDate = Clock.Today;
        }

        [EventSubscribe("DoManagement")]
        private void OnDoManagement(object sender, EventArgs e)
        {
            if (Clock.Today == cutPasture_StartDate)
                DaysAfterCut = interval2Cut;

            if ((Clock.Today >= cutPasture_StartDate) && (Clock.Today <= cutPasture_EndDate))
            {
                // Check whether we should start cutting
                if ((Plantain.IsEmerged) && (DaysAfterCut > 0) && (DaysAfterCut == interval2Cut))
                {
                    Defoliate(defoliationType, herbageAmount * 0.1, amountType, durationOfCut);
                }
            }

            // Check whether we need to continue cutting
            //if ((daysCutting > 0) && (daysCutting <= durationOfCut))
            if (isStillCutting)
            {
                // reset outputs
                resetVariables();

                removeDM(herbageToRemove, defoliationType);
                returnExcreta();
                cumAmountHarvested += HarvestedDM;
                daysCutting += 1;
            }

            // reset outputs
            if (daysCutting < 0)
            {
                resetVariables();
                daysCutting = 0;
            }
        }

        [EventSubscribe("DoManagementCalculations")]
        private void OnDoManagementCalculations(object sender, EventArgs e)
        {
            if ((daysCutting > 0) && (daysCutting < durationOfCut))
                isStillCutting = true;

            if (daysCutting == durationOfCut)
            {
                PostHarvestDM = (double)zone.Get("Plantain.AboveGround.Wt");
                RotationHarvestedDM = cumAmountHarvested;
                aCutHasHappened = true;
                isStillCutting = false;
                daysCutting = -1;
                Plantain.Population = Plantain.Population * (1.0 - fracPopDecline);
            }

            if (aCutHasHappened && (daysCutting == 0))
                DaysAfterCut += 1;
        }

        public enum removeAmountTypes
        {
            /// <summary>Setting DM amount to remove</summary>
            DMToRemove,
            /// <summary>Setting residual DM amount</summary>
            ResidualDM
        }

        public enum defoliationTypes
        {
            /// <summary>Cut</summary>
            Cut,
            /// <summary>Graze</summary>
            Graze
        }

        // resets the values of all outputs
        private void resetVariables()
        {
            DefoliatedDM = 0.0;
            DefoliatedN = 0.0;
            HarvestedDM = 0.0;
            HarvestedN = 0.0;
            RemovedDM = 0.0;
            RemovedN = 0.0;
            ReturnedDM = 0.0;
            ReturnedN = 0.0;
            NReturnedInDung = 0.0;
            NReturnedInUrine = 0.0;
            RotationHarvestedDM = 0.0;
            RotationHarvestingDM = 0.0;
        }

        // Perform the basic calculations for defoliation
        public void Defoliate(string defoliationType, double amountDM, string amountType, int duration)
        {
            // get the existing plant amount
            PreHarvestDM = (double)zone.Get("Plantain.AboveGround.Wt");

            // check duration
            if (duration <= 0)
                throw new Exception("Duration of graze/cut rotation is zero or negative");
            
            // check amount to remove
            if ((amountType == "DMToRemove") && (PreHarvestDM > 0.0))
            {
                summary.WriteMessage(this, "   Defoliating " + (10.0 * amountDM).ToString("#0.0") + "kg/ha over " + duration + " days");
                herbageToRemove = amountDM / duration;
            }
            else if ((amountType == "ResidualDM") && (PreHarvestDM > amountDM))
            {
                summary.WriteMessage(this, "   Defoliating down to approximately " + (10.0 * amountDM).ToString("#0.0") + "kg/ha over " + duration + " days");
                herbageToRemove = (PreHarvestDM - amountDM) / duration;
            }
            else
            {
                herbageToRemove = 0.0;
                summary.WriteMessage(this, "   Defoliation will not happend because there is not enough plant material");
                return;
            }

            RotationHarvestingDM = herbageToRemove * duration;
            durationOfCut = duration;
            // first defoliation
            removeDM(herbageToRemove, defoliationType);
            returnExcreta();
            cumAmountHarvested = HarvestedDM;
            daysCutting = 1;
            DaysAfterCut = 0;
        }

        private void removeDM(double removeAmount, string removeType)
        {
            // get the existing biomass
            double leafLiveWt = (double)zone.Get("Plantain.Leaf.Live.Wt");
            double stemLiveWt = (double)zone.Get("Plantain.Stem.Live.Wt");
            double flowerLiveWt = (double)zone.Get("Plantain.Inflorescence.Live.Wt");
            double leafDeadWt = (double)zone.Get("Plantain.Leaf.Dead.Wt");
            double stemDeadWt = (double)zone.Get("Plantain.Stem.Dead.Wt");
            double flowerDeadWt = (double)zone.Get("Plantain.Inflorescence.Dead.Wt");
            double leafLiveN = (double)zone.Get("Plantain.Leaf.Live.N");
            double stemLiveN = (double)zone.Get("Plantain.Stem.Live.N");
            double flowerLiveN = (double)zone.Get("Plantain.Inflorescence.Live.N");
            double leafDeadN = (double)zone.Get("Plantain.Leaf.Dead.N");
            double stemDeadN = (double)zone.Get("Plantain.Stem.Dead.N");
            double flowerDeadN = (double)zone.Get("Plantain.Inflorescence.Dead.N");

            double existingWt = leafLiveWt + leafDeadWt + stemLiveWt + stemDeadWt + flowerLiveWt + flowerDeadWt;
            double existingN = leafLiveN + leafDeadN + stemLiveN + stemDeadN + flowerLiveN + flowerDeadN;

            // Can we harvest anything?
            double removingWt = Math.Min(existingWt, removeAmount);
            if (removingWt > 0.0)
            {
                // get the fractions to remove for each organ (will override the default values)
                // the default is [Plantain].Leaf.BiomassRemovalDefaults.Cut.FractionRemoved, or equivalent
                // >> double leafFracToRemove = removeAmount * (leafLiveWt + leafDeadWt) / existingWt / existingWt;
                double fracToRemove = removingWt / existingWt;
                double leafFracToRemove = 0.0;
                if ((leafLiveWt + leafDeadWt) > 0.0)
                {
                    if (leafLiveWt < minLeafAmount)
                    {
                        // leafWt cannot go below a minimum
                        leafFracToRemove = (removingWt + leafLiveWt - minLeafAmount) / existingWt;
                    }
                    else
                        leafFracToRemove = fracToRemove;
                }

                double stemFracToRemove = ((stemLiveWt + stemDeadWt) > 0.0) ? fracToRemove : 0.0;
                double flowerFracToRemove = ((flowerLiveWt + flowerDeadWt) > 0.0) ? fracToRemove : 0.0;

                // get the fractions to residue (i.e. wastage - will override the default values)
                // the default is [Plantain].Leaf.BiomassRemovalDefaults.Cut.FractionToResidue, or equivalent
                double leafFracToResidue = leafResidueFrac * leafFracToRemove;
                double stemFracToResidue = stemResidueFrac * stemFracToRemove;
                double flowerFracToResidue = flowerResidueFrac * flowerFracToRemove;

                // correct the values to defoliate (so our removing = remove + residue)
                leafFracToRemove -= leafFracToResidue;
                stemFracToRemove -= stemFracToResidue;
                flowerFracToRemove -= flowerFracToResidue;

                // set removal fractions (these overrides the default removals in the plant)
                removalFractions.SetFractionToRemove("Leaf", leafFracToRemove, "Live");
                removalFractions.SetFractionToResidue("Leaf", leafFracToResidue, "Live");
                removalFractions.SetFractionToRemove("Leaf", leafFracToRemove, "Dead");
                removalFractions.SetFractionToResidue("Leaf", leafFracToResidue, "Dead");
                removalFractions.SetFractionToRemove("Stem", stemFracToRemove, "Live");
                removalFractions.SetFractionToResidue("Stem", stemFracToResidue, "Live");
                removalFractions.SetFractionToRemove("Stem", stemFracToRemove, "Dead");
                removalFractions.SetFractionToResidue("Stem", stemFracToResidue, "Dead");
                removalFractions.SetFractionToRemove("Inflorescence", flowerFracToRemove, "Live");
                removalFractions.SetFractionToResidue("Inflorescence", flowerFracToResidue, "Live");
                removalFractions.SetFractionToRemove("Inflorescence", flowerFracToRemove, "Dead");
                removalFractions.SetFractionToResidue("Inflorescence", flowerFracToResidue, "Dead");

                removalFractions.SetFractionToRemove("Root", 0.0);
                removalFractions.SetFractionToResidue("Root", 0.0);
                removalFractions.SetFractionToRemove("Taproot", 0.0);
                removalFractions.SetFractionToResidue("Taproot", 0.0);

                // Actually do the biomass removal
                Plantain.RemoveBiomass(removeType, removalFractions);

                // get the new existing plant amount
                double postHarvestWt = (double)zone.Get("Plantain.AboveGround.Wt");
                double postHarvestN = (double)zone.Get("Plantain.AboveGround.N");

                // get total defoliation (total plant stuff lost)
                DefoliatedDM = existingWt - postHarvestWt;
                DefoliatedN = existingN - postHarvestN;

                // get total harvested (plant stuff removed from plants)
                HarvestedDM = (double)zone.Get("Plantain.Leaf.Removed.Wt")
                + (double)zone.Get("Plantain.Stem.Removed.Wt")
                + (double)zone.Get("Plantain.Inflorescence.Removed.Wt");
                HarvestedN = (double)zone.Get("Plantain.Leaf.Removed.N")
                + (double)zone.Get("Plantain.Stem.Removed.N")
                + (double)zone.Get("Plantain.Inflorescence.Removed.N");

                // get amounts actually removed from field and that to be returned (residue or dung/urine)
                RemovedDM = HarvestedDM * fracDM2Remove;
                RemovedN = HarvestedN * fracN2Remove;
                ReturnedDM = HarvestedDM - RemovedDM;
                ReturnedN = HarvestedN - RemovedN;
                NReturnedInDung = ReturnedN * fracN2Dung;
                NReturnedInUrine = ReturnedN - NReturnedInDung;
            }
            else
            {
            }
        }

        // Return dung and urine
        private void returnExcreta()
        {
            if ((ReturnedDM > 0.0) || (NReturnedInDung > 0.0))
            {
                PMF.BiomassRemovedType BiomassDung = new PMF.BiomassRemovedType();
                string[] type = new string[] { "RuminantDung_PastureFed" };
                float[] dltdm = new float[] { (Single)ReturnedDM };
                float[] dltn = new float[] { (Single)NReturnedInDung };
                float[] dltp = new float[] { 0 };
                float[] fraction = new float[] { 1 };     // fraction is always 1.0 here

                BiomassDung.crop_type = "RuminantDung_PastureFed";
                BiomassDung.dm_type = type;
                BiomassDung.dlt_crop_dm = dltdm;
                BiomassDung.dlt_dm_n = dltn;
                BiomassDung.dlt_dm_p = dltp;
                BiomassDung.fraction_to_residue = fraction;
                BiomassRemoved.Invoke(BiomassDung);
            }

            if (NReturnedInUrine > 0.0)
            {
                fertiliser.Apply(NReturnedInUrine * 10, Fertiliser.Types.UreaN, urineDepth);
            }
        }
    }
}
```
      MicroClimate: a_interception=0; b_interception=1; c_interception=0; d_interception=0; soil_albedo=0.23; sun_angle=15; soil_heat_flux_fraction=0.4; night_interception_fraction=0.5; refheight=2; albedo=0.26; emissivity=0.96; RadIntTotal=0
      Irrigation
      Fertiliser
      SoluteManager
      SurfaceOrganicMatter: PondActive=no; ReportAdditions=no; ReportRemovals=no; PoolName=grass; type=grass; mass=500; standing_fraction=0; cnr=40; CriticalResidueWeight=2000; OptimumDecompTemp=20; MaxCumulativeEOS=20; CNRatioDecompCoeff=0.277; CNRatioDecompThreshold=25; TotalLeachRain=25; MinRainToLeach=10; CriticalMinimumOrganicC=0.004; DefaultCPRatio=0; DefaultStandingFraction=0; StandingExtinctCoeff=0.5; FractionFaecesAdded=0.5
        Pools:
          {PoolName=grass, ResidueType=grass, Mass=500, CNRatio=40, StandingFraction=0}
        ResidueTypes: LoadFromResource=ResidueTypes
        TillageTypes TillageTypesList
      Soil: SoilType=Generic medium texture; Region=Canterbury; Country=New Zealand; Latitude=0; Longitude=0
        Analysis: PHUnits=Water; BoronUnits=HotWater
          Thickness  Rocks  PH  CEC  ParticleSizeSand  ParticleSizeSilt  ParticleSizeClay
          150        0      6   13   15                65                20
          150        0      6   11   20                60                20
          200        0      6   9    20                60                20
          250        0      6   8    25                60                15
          250        0      6   7    35                55                10
          500        0      6   6    35                55                10
        Water
          Thickness  BD    AirDry  LL15  DUL   SAT   KS
          150        1.3   0.05    0.15  0.36  0.45  4500
          150        1.4   0.17    0.17  0.34  0.42  2500
          200        1.5   0.19    0.19  0.33  0.38  200
          250        1.6   0.17    0.17  0.3   0.36  1500
          250        1.45  0.1     0.1   0.2   0.38  5000
          500        1.35  0.1     0.1   0.2   0.39  10000
          SoilCrop PlantainSoil: LL=[0.15, 0.17, 0.19, 0.17, 0.1, 0.1]; KL=[0.1, 0.08, 0.05, 0.02, 0.01, 0.01]; XF=[1, 1, 1, 1, 1, 0.5]
        SoilWater: SummerDate=21-Sep; SummerU=6; SummerCona=3.5; WinterDate=23-Mar; WinterU=6; WinterCona=2.5; DiffusConst=88; DiffusSlope=35; Salb=0.2; CN2Bare=0.7; CNRed=20; CNCov=0.8; max_pond=0; Thickness=[150, 150, 200, 250, 250, 500]; SWCON=[0.45, 0.35, 0.1, 0.15, 0.3, 0.2]; residueinterception=0
        SoilNitrogen: fom_type=[default, manure, mucuna, lablab, shemp, stable]; fract_carb=[0.2, 0.3, 0.54, 0.57, 0.45, 0]; fract_cell=[0.7, 0.3, 0.37, 0.37, 0.47, 0.1]; fract_lign=[0.1, 0.4, 0.09, 0.06, 0.08, 0.9]
        SoilOrganicMatter: RootCN=40; RootWt=1000; SoilCN=12; EnrACoeff=7.4; EnrBCoeff=0.2; OCUnits=Total
          Thickness  OC    FBiom  FInert
          150        2.5   0.04   0.4
          150        1.25  0.025  0.6
          200        0.5   0.015  0.8
          250        0.2   0.01   0.9
          250        0.15  0.008  0.95
          500        0.1   0.008  0.98
        InitialWater Initial water: PercentMethod=EvenlyDistributed; FractionFull=0.9
        Sample Initial nitrogen: NO3Units=kgha; NH4Units=kgha; SWUnits=Volumetric; OCUnits=Total; PHUnits=Water
          Thickness  NO3  NH4
          200        25   1
          200        15   0.5
          600        20   0.5
          500        5    0.2
        CERESSoilTemperature
      Plant Plantain: CropType=Plantain
      Report: EventNames=[Clock].DoReport
        VariableNames:
          [Clock].Today as Date
          [Plantain].Population
          [Plantain].CropType
          [Plantain].Leaf.RadIntTot as InterceptedRadiation
          [Irrigation].IrrigationApplied as IrrigationApplied
          [Soil].SoilWater.Es as Evaporation
          [Plantain].Leaf.Transpiration as Transpiration
          [Soil].SoilWater.Drainage as Drainage
          [Soil].SoilWater.Runoff as Runoff
          sum([Soil].SoilWater.SWmm) as TotalSWC
          sum([Soil].DULmm) as TotalDUL
          sum([Soil].LL15mm) as TotalLL15
          [Fertiliser].NitrogenApplied as FertiliserN
          sum([Soil].SoilNitrogen.Denitrification) as DenitrifiedN
          ([Soil].SoilWater.LeachNH4 + [Soil].SoilWater.LeachNO3) as LeachedN
          (-1*[Plantain].Root.NUptake) as UptakeN
          (sum([Soil].SoilNitrogen.urea) + sum([Soil].SoilNitrogen.NH4) + sum([Soil].SoilNitrogen.NO3)) as SoilNContent
          [Plantain].Total.Wt
          [Plantain].AboveGround.Wt
          [Plantain].BelowGround.Wt
          [Plantain].Leaf.Live.NConc
          [Plantain].Leaf.LAI
          [Plantain].Leaf.Live.Wt
          [Plantain].Stem.Live.Wt
          [Plantain].Inflorescence.Live.Wt
          [Plantain].Taproot.Live.Wt
          [Plantain].Root.Live.Wt
          [Defoliate].Script.DefoliatedDM as HarvestedWt
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