Simulations: Version=168
  Folder Replacements
  DataStore
  Simulation Farm
    Clock: Start=1990-01-01; End=1995-04-30
    Summary SummaryFile
    Weather: FileName=/home/uqpdevo1/src/ApsimX/Examples/WeatherFiles/Dalby.met
    SoilArbitrator Soil Arbitrator
    Zone Field 1: Area=1; Slope=0; AspectAngle=0; Altitude=50
      Soil Black Vertosol-Bongeen (Dalby No027): ASCOrder=Vertosol; ASCSubOrder=Black; SoilType=Clay; Site=Dalby; NearestTown=Dalby, Q 4405; Region=Darling Downs and Granite Belt; State=Queensland; Country=Australia; ApsoilNumber=27; Latitude=-27.123; Longitude=151.305; LocationAccuracy=+/- 20m; YearOfSampling=0; DataSource=CSIRO Sustainable Ecosystems, Toowoomba
        Comments=Clay - Toowoomba - Wheat ll,xf copied from sorghum. Wheat kl is just default apsim kl values for wheat.
        Physical
          Thickness  BD    AirDry  LL15  DUL   SAT
          150        1.25  0.115   0.23  0.45  0.5
          150        1.31  0.184   0.23  0.43  0.48
          300        1.23  0.23    0.23  0.46  0.51
          300        1.24  0.23    0.23  0.45  0.5
          300        1.25  0.23    0.23  0.45  0.5
          300        1.26  0.23    0.23  0.44  0.49
          300        1.29  0.23    0.23  0.43  0.48
          BD, DUL source: Field measured and checked for sensibility
          AirDry, LL15 source: Estimated based on local knowledge
          SAT source: Calculated from measured, estimated or calculated BD
          SoilCrop wheatSoil: LL=[0.23, 0.24, 0.29, 0.34, 0.37, 0.38, 0.39]; KL=[0.06, 0.06, 0.06, 0.04, 0.04, 0.02, 0.01]; XF=[1, 1, 1, 1, 1, 1, 1]
            LL source: Estimated based on local knowledge
          SoilCrop cottonSoil: LL=[0.23, 0.23, 0.23, 0.26, 0.3, 0.33, 0.37]; KL=[0.1, 0.1, 0.1, 0.1, 0.09, 0.07, 0.05]; XF=[1, 1, 1, 1, 1, 1, 1]
            LL source: Field measured and checked for sensibility
          SoilCrop sorghumSoil: LL=[0.23, 0.24, 0.29, 0.34, 0.37, 0.38, 0.39]; KL=[0.07, 0.07, 0.07, 0.05, 0.05, 0.04, 0.03]; XF=[1, 1, 1, 1, 1, 1, 1]
            LL source: Field measured and checked for sensibility
          SoilCrop SCRUMSoil: same as Farm.Field 1.Black Vertosol-Bongeen (Dalby No027).Physical.wheatSoil
          SoilCrop MaizeSoil: same as Farm.Field 1.Black Vertosol-Bongeen (Dalby No027).Physical.sorghumSoil
        WaterBalance SoilWater: SummerDate=1-Nov; SummerU=6; SummerCona=3.5; WinterDate=1-Apr; WinterU=4; WinterCona=2.5; DiffusConst=40; DiffusSlope=16; Salb=0.12; CN2Bare=73; CNRed=20; CNCov=0.8; PSIDul=-100; Thickness=[150, 150, 300, 300, 300, 300, 300]; SWCON=[0.3, 0.3, 0.3, 0.3, 0.3, 0.3, 0.3]
        Organic: FOMCNRatio=40; CarbonUnits=WalkleyBlack
          Thickness  Carbon    SoilCNRatio  FBiom  FInert  FOM
          150        0.915385  12           0.04   0.4     347.129
          150        0.776923  12           0.02   0.6     270.344
          300        0.346154  12           0.02   0.8     163.972
          300        0.230769  12           0.02   1       99.4541
          300        0.153846  12           0.01   1       60.322
          300        0.123077  12           0.01   1       36.5871
          300        0.130769  12           0.01   1       22.1912
        Chemical: Thickness=[150, 150, 300, 300, 300, 300, 300]; PH=[8.2, 8.5, 8.6, 8.6, 7.4, 5.3, 5.3]; PHUnits=Water
          PH source: Estimated based on local knowledge
        Nutrient
        Solute NO3: InitialValuesUnits=ppm; WaterTableConcentration=0; D0=0; DepthConstant=0; MaxDepthSoluteAccessible=0; RunoffEffectivenessAtMovingSolute=0; MaxEffectiveRunoff=0
        Solute NH4: InitialValuesUnits=ppm; WaterTableConcentration=0; D0=0; DepthConstant=0; MaxDepthSoluteAccessible=0; RunoffEffectivenessAtMovingSolute=0; MaxEffectiveRunoff=0
        Solute Urea: Thickness=[150, 150, 300, 300, 300, 300, 300]; InitialValues=[0, 0, 0, 0, 0, 0, 0]; InitialValuesUnits=kg/ha; WaterTableConcentration=0; D0=0; DepthConstant=0; MaxDepthSoluteAccessible=0; RunoffEffectivenessAtMovingSolute=0; MaxEffectiveRunoff=0
        Water: Thickness=[150, 150, 300, 300, 300, 300, 300]; InitialValues=[0.406, 0.39, 0.414, 0.406, 0.406, 0.398, 0.39]; InitialPAWmm=309.6; RelativeTo=LL15; FilledFromTop=true
        CERESSoilTemperature
      Fertiliser
      SurfaceOrganicMatter: InitialResidueName=wheat_stubble; InitialResidueType=wheat; InitialResidueMass=500; InitialStandingFraction=0; InitialCPR=0; InitialCNR=100
      MicroClimate: a_interception=0; b_interception=1; c_interception=0; d_interception=0; SoilHeatFluxFraction=0.4; MinimumHeightDiffForNewLayer=0; NightInterceptionFraction=0.5; ReferenceHeight=2
      Plant Maize
      Plant Wheat
      Manager SowingFertiliserMaize
        Amount = 160
        CropName = maize
```csharp
using Models.Soils;
using System.Linq;
using System;
using Models.Core;
using Models.PMF;
namespace Models
{
    [Serializable]
    public class Script : Model
    {
        [Link] Clock Clock;
        [Link] Fertiliser Fertiliser;
        [Link] Summary Summary;
        
        
        [Description("Amount of fertiliser to be applied (kg/ha)")]
        public double Amount { get; set;}
        
        [Description("Crop to be fertilised")]
        public string CropName { get; set;}
        
        
        

        [EventSubscribe("Sowing")]
        private void OnSowing(object sender, EventArgs e)
        {
            Model crop = sender as Model;
            if (crop.Name.ToLower()==CropName.ToLower())
                Fertiliser.Apply(Amount: Amount, Type: Fertiliser.Types.NO3N);
        }
        
    }
}
```
      Manager SowingFertiliserWheat
        Amount = 160
        CropName = wheat
        script: same as in Farm.Field 1.SowingFertiliserMaize
      Report: EventNames=[Clock].EndOfDay
        VariableNames:
          [Clock].Today
          [Manager].Script.CurrentStateCSV as CurrentState
          [Wheat].Phenology.Zadok.Stage
          [Wheat].Phenology.CurrentStageName
          [Wheat].IsAlive
          [Wheat].IsReadyForHarvesting
          [Wheat].AboveGround.Wt
          [Wheat].AboveGround.N
          [Wheat].Grain.Total.Wt*10 as WheatYield
          [Maize].Grain.Total.Wt*10 as MaizeYield
          [Wheat].Grain.Protein
          [Wheat].Grain.Size
          [Wheat].Grain.Number
          [Wheat].Grain.Total.Wt
          [Wheat].Grain.Total.N
          [Wheat].Total.Wt
          Sum([Soil].SoilWater.ESW) as ESW
          [Soil].SoilWater.Es as ESoil
    Zone Field 2: same as Farm.Field 1
    Manager
```csharp
using System;
using System.Linq;
using System.Collections.Generic;
using Models.Core;
using Models.Interfaces;
using Models.PMF;
using Models.Soils;
using Models.WaterModel;
using Models.Soils.Nutrients;
using Models.Management;
using Models.Utilities;
using Models.Climate;
using APSIM.Shared.Utilities;

namespace Models
{
    [Serializable]
    public class Script : Model
    {
        [Link] private Clock Clock;
        [Link] private Summary Summary;
        [Link] private RotationManager RotationManager;
        [NonSerialized] private Events myEvents;

        private bool afterInit = false;
        
        public string currentPaddock = "";
        
        public List<string> myPaddockNames = new List<string> { "Field 1", "Field 2" };
        
        public Dictionary<string, string> initialStates = new Dictionary<string, string> { {"Field 1", "initial"}, {"Field 2","summer fallow"}};

        private Dictionary<string, Accumulator> accumulatedRain;
        private Dictionary<string, Zone> myPaddockZones;
        private Dictionary<string, WaterBalance> myWaterBalances;
        private Dictionary<string, string> currentState;
        
        public string CurrentStateCSV {get { return string.Join(",", currentState.Values);} set {}}
           
        [EventSubscribe("StartOfSimulation")]
        private void OnSimulationCommencing(object sender, EventArgs e)
        {
            afterInit = true;
            accumulatedRain = new Dictionary<string, Accumulator>();
            foreach (var crop in cropDefaults.Keys) {
               accumulatedRain.Add(crop, new Accumulator(this, "[Weather].Rain", cropDefaults[crop].RainDays));
            }
            myEvents = new Events(this);
            
            myPaddockZones = new Dictionary<string, Zone>();
            myWaterBalances = new Dictionary<string, WaterBalance>();
            currentState = new Dictionary<string, string>();
            foreach (var paddock in myPaddockNames) {
                myPaddockZones[ paddock ] = FindInScope(paddock) as Zone; 
                if (myPaddockZones[ paddock ]  == null) { throw new Exception("Can't find a paddock called '" + paddock + "'");}
 
                myWaterBalances[ paddock ] = myPaddockZones[ paddock ].FindInScope("SoilWater") as WaterBalance;
                if (myWaterBalances[ paddock ] == null) { throw new Exception("Can't find a waterbalance in '" + paddock + "'");}
                
                currentState[paddock] = initialStates[paddock];
            }
        }

        public int eventcount;
        [EventSubscribe("StartOfDay")]
        private void DoStartOfDay(object sender, EventArgs e) 
        {
            eventcount = 0;
        }

        [EventSubscribe("DoManagement")]
        private void DoManagement(object sender, EventArgs e)
        {
            if (eventcount++ > 20) { throw new Exception("Too many events"); }
            if (sender == this) {return;}

            foreach (var crop in cropDefaults.Keys) {
               accumulatedRain[crop].Update();
            }
            
            // while (moreToDo) ...
            foreach (var paddock in myPaddockNames) {
                currentPaddock = paddock;
                RotationManager.CurrentState = currentState[paddock];
                //Summary.WriteMessage(this, $"Publishing {currentPaddock}", MessageType.Diagnostic);
                // fixme. This goes out to every subscriber, we want it to be just the rotation manager 2 lines above..
                myEvents.Publish("DoManagement", new object[] { this, EventArgs.Empty  });
                currentState[paddock] = RotationManager.CurrentState;
            }
            currentPaddock = "";
        }
        
        // Occurs after all management is doe
        [EventSubscribe("DoManagementCalculations")]
        private void DoManagementCalculations(object sender, EventArgs e)
        {
            
        }

        public double CanSowWheat {get { return(canSow("Wheat")); } set {} }
        public double CanSowMaize {get { return(canSow("Maize")); } set {} }
         
        public double CanHarvestWheat {get { return(canHarvest("Wheat")); } set {} }
        public double CanHarvestMaize {get { return(canHarvest("Maize")); } set {} }

        private double canSow (string crop) {
            if (currentPaddock == "") { /*Summary.WriteMessage(this, $"No paddock set for canSow", MessageType.Diagnostic);*/ return 0; }
            //Summary.WriteMessage(this, $"Being asked for crop {crop} in {currentPaddock}", MessageType.Diagnostic);
            var Crop = findMyCrop(crop);
            

            if ((DateUtilities.WithinDates(cropDefaults[crop].StartDate, Clock.Today, cropDefaults[crop].EndDate) &&
                 !Crop.IsAlive &&
                 MathUtilities.Sum(myWaterBalances[currentPaddock].ESW) > cropDefaults[crop].MinESW &&
                 accumulatedRain[crop].Sum > cropDefaults[crop].MinRain) ||
                (!Crop.IsAlive && DateUtilities.DatesAreEqual(cropDefaults[crop].EndDate, Clock.Today) && cropDefaults[crop].MustSow)) 
                 {
                return 1; 
            }
            return 0; 
        }
               
        private double canHarvest (string crop) {
            if (currentPaddock == "") {/*Summary.WriteMessage(this, $"No paddock set for canHarvest", MessageType.Diagnostic);*/ return 0; }
            var Crop = findMyCrop(crop);
            if (Crop.IsReadyForHarvesting) {
               return(1);
            }
            return(0);   
        }
               
        public void SowCrop(string crop) 
        {   
            crop = crop.Replace("\"", ""); //NFI why the quotes are added in??
            var Crop = findMyCrop(crop);
            Summary.WriteMessage(this, this.FullPath + " -  sowing " + Crop.FullPath, MessageType.Diagnostic);
            Crop.Sow(population: cropDefaults[crop].Population, cultivar: cropDefaults[crop].CultivarName, 
                     depth: cropDefaults[crop].SowingDepth, rowSpacing: cropDefaults[crop].RowSpacing);    
        }
        
        public void HarvestCrop(string crop)
        {
            crop = crop.Replace("\"", "");
            var Crop = findMyCrop(crop);
            Summary.WriteMessage(this, this.FullPath + " -  harvesting " + Crop.FullPath, MessageType.Diagnostic);
            Crop.Harvest();
            Crop.EndCrop();
        }

        private IPlant findMyCrop(string crop) {
            var myPaddock = FindInScope(currentPaddock) as Zone; 
            if (myPaddock == null) { throw new Exception("Can't find a paddock called '" + currentPaddock + "'");}
            
            IPlant Crop = myPaddock.FindInScope(crop) as IPlant;
            if (Crop == null) { throw new Exception("Can't find crop called '" + currentPaddock + "." + crop + "'");}
            return (Crop);        
        }
        
        public int AreaPlantedOk (string Crop) {
           //Summary.WriteMessage(this, $"Being asked area for crop {Crop}", MessageType.Diagnostic);
           return(1);        
        }
        
        private class cropDefault {
           public int RainDays;
           public string StartDate;
           public string EndDate;
           public double MinRain;
           public double MinESW;
           public bool MustSow;
           public double Population;
           public string CultivarName;
           public double SowingDepth;
           public double RowSpacing;
           public double maxArea;
        }
        
        [NonSerialized]
        private static readonly Dictionary<string, cropDefault> cropDefaults = new Dictionary<string, cropDefault> { 
           {"Wheat", new cropDefault {StartDate = "1-apr", EndDate = "10-jun", RainDays = 7, MinRain = 10, MinESW = 50, MustSow = true,  
                                      CultivarName = "hartog", Population = 50, SowingDepth = 30, RowSpacing = 250,
                                      maxArea = 0.5 }},
           {"Maize", new cropDefault {StartDate = "1-nov", EndDate = "30-dec", RainDays = 7, MinRain = 20, MinESW = 80, MustSow = true,
                                      CultivarName = "sc501", Population =  6, SowingDepth = 50, RowSpacing = 1000,
                                      maxArea = 0.5 }}
        };
   }
}
```
    RotationManager: InitialState=initial; Verbose=false
      Nodes:
        Name           OutlineColour
        summer fallow  Black
        Wheat          Black
        Maize          Black
        initial        Black
      Arcs:
        {Conditions=[[Manager].Script.CanHarvestWheat], Actions=[[Manager].Script.HarvestCrop("Wheat");], SourceName=Wheat, DestinationName=summer fallow, Name=Arc 1}
        {Conditions=[[Manager].Script.CanSowMaize], Actions=[[Manager].Script.SowCrop("Maize");], SourceName=summer fallow, DestinationName=Maize, Name=Arc 2}
        {Conditions=[[Manager].Script.CanHarvestMaize], Actions=[[Manager].Script.HarvestCrop("Maize");], SourceName=Maize, DestinationName=initial, Name=Arc 3}
        {Conditions=[[Manager].Script.CanSowWheat, [Manager].Script.AreaPlantedOk("Wheat")], Actions=[[Manager].Script.SowCrop("Wheat");], SourceName=initial, DestinationName=Wheat, Name=Arc 4}
    Report TransitionReport: EventNames=[RotationManager].Transition
      VariableNames:
        [Clock].Today
        [Clock].Today.DayOfYear
        [Manager].Script.CurrentStateCSV as CurrentState
