Simulations: Version=198
  DataStore
  Simulation Farm
    Clock: Start=1990-01-01; End=1995-04-30
    Summary SummaryFile
    Weather: FileName=%root%/Examples/WeatherFiles/AU_Dalby.met
    SoilArbitrator Soil Arbitrator
    Zone Field 1: Area=100; Slope=0; AspectAngle=0; Altitude=50
      Soil Black Vertosol-Bongeen (Dalby No027): ASCOrder=Vertosol; ASCSubOrder=Black; SoilType=Clay; Site=Dalby; NearestTown=Dalby, Q 4405; Region=Darling Downs and Granite Belt; State=Queensland; Country=Australia; ApsoilNumber=27; Latitude=-27.123; Longitude=151.305; LocationAccuracy=+/- 20m; YearOfSampling=0; DataSource=CSIRO Sustainable Ecosystems, Toowoomba
        Comments=Clay - Toowoomba - Wheat ll,xf copied from sorghum. Wheat kl is just default apsim kl values for wheat.
        Physical
          Thickness  BD    AirDry  LL15  DUL   SAT
          150        1.25  0.115   0.23  0.45  0.5
          150        1.31  0.184   0.23  0.43  0.48
          300        1.23  0.23    0.23  0.46  0.51
          300        1.24  0.23    0.23  0.45  0.5
          300        1.25  0.23    0.23  0.45  0.5
          300        1.26  0.23    0.23  0.44  0.49
          300        1.29  0.23    0.23  0.43  0.48
          BD, DUL source: Field measured and checked for sensibility
          AirDry, LL15 source: Estimated based on local knowledge
          SAT source: Calculated from measured, estimated or calculated BD
          SoilCrop wheatSoil: LL=[0.23, 0.24, 0.29, 0.34, 0.37, 0.38, 0.39]; KL=[0.06, 0.06, 0.06, 0.04, 0.04, 0.02, 0.01]; XF=[1, 1, 1, 1, 1, 1, 1]
            LL source: Estimated based on local knowledge
          SoilCrop cottonSoil: LL=[0.23, 0.23, 0.23, 0.26, 0.3, 0.33, 0.37]; KL=[0.1, 0.1, 0.1, 0.1, 0.09, 0.07, 0.05]; XF=[1, 1, 1, 1, 1, 1, 1]
            LL source: Field measured and checked for sensibility
          SoilCrop sorghumSoil: LL=[0.23, 0.24, 0.29, 0.34, 0.37, 0.38, 0.39]; KL=[0.07, 0.07, 0.07, 0.05, 0.05, 0.04, 0.03]; XF=[1, 1, 1, 1, 1, 1, 1]
            LL source: Field measured and checked for sensibility
          SoilCrop SCRUMSoil: same as Farm.Field 1.Black Vertosol-Bongeen (Dalby No027).Physical.wheatSoil
          SoilCrop MaizeSoil: same as Farm.Field 1.Black Vertosol-Bongeen (Dalby No027).Physical.sorghumSoil
        WaterBalance SoilWater: SummerDate=1-Nov; SummerU=6; SummerCona=3.5; WinterDate=1-Apr; WinterU=4; WinterCona=2.5; DiffusConst=40; DiffusSlope=16; Salb=0.12; CN2Bare=73; CNRed=20; CNCov=0.8; PSIDul=-100; Thickness=[150, 150, 300, 300, 300, 300, 300]; SWCON=[0.3, 0.3, 0.3, 0.3, 0.3, 0.3, 0.3]
        Organic: FOMCNRatio=40; CarbonUnits=WalkleyBlack
          Thickness  Carbon    SoilCNRatio  FBiom  FInert  FOM
          150        0.915385  12           0.04   0.4     347.129
          150        0.776923  12           0.02   0.6     270.344
          300        0.346154  12           0.02   0.8     163.972
          300        0.230769  12           0.02   1       99.4541
          300        0.153846  12           0.01   1       60.322
          300        0.123077  12           0.01   1       36.5871
          300        0.130769  12           0.01   1       22.1912
        Chemical: Thickness=[150, 150, 300, 300, 300, 300, 300]; PH=[8.2, 8.5, 8.6, 8.6, 7.4, 5.3, 5.3]; PHUnits=Water
          PH source: Estimated based on local knowledge
        Nutrient
        Solute NO3: InitialValuesUnits=ppm; WaterTableConcentration=0; D0=0; DepthConstant=0; MaxDepthSoluteAccessible=0; RunoffEffectivenessAtMovingSolute=0; MaxEffectiveRunoff=0
        Solute NH4: InitialValuesUnits=ppm; WaterTableConcentration=0; D0=0; DepthConstant=0; MaxDepthSoluteAccessible=0; RunoffEffectivenessAtMovingSolute=0; MaxEffectiveRunoff=0
        Solute Urea: Thickness=[150, 150, 300, 300, 300, 300, 300]; InitialValues=[0, 0, 0, 0, 0, 0, 0]; InitialValuesUnits=kg/ha; WaterTableConcentration=0; D0=0; DepthConstant=0; MaxDepthSoluteAccessible=0; RunoffEffectivenessAtMovingSolute=0; MaxEffectiveRunoff=0
        Water: Thickness=[150, 150, 300, 300, 300, 300, 300]; InitialValues=[0.406, 0.39, 0.414, 0.406, 0.406, 0.398, 0.39]; FilledFromTop=true
        SoilTemperature CERESSoilTemperature
      Fertiliser
      SurfaceOrganicMatter: InitialResidueName=wheat_stubble; InitialResidueType=wheat; InitialResidueMass=500; InitialStandingFraction=0; InitialCPR=0; InitialCNR=100
      MicroClimate: a_interception=0; b_interception=1; c_interception=0; d_interception=0; SoilHeatFluxFraction=0.4; MinimumHeightDiffForNewLayer=0; NightInterceptionFraction=0.5; ReferenceHeight=2
      Plant Maize
      Plant Wheat
      Report: EventNames=[Clock].EndOfDay
        VariableNames:
          [Clock].Today
          [Wheat].Phenology.Zadok.Stage
          [Wheat].Phenology.CurrentStageName
          [Wheat].IsAlive
          [Wheat].IsReadyForHarvesting
          [Wheat].AboveGround.Wt
          [Wheat].AboveGround.N
          [Wheat].Grain.Total.Wt*10 as WheatYield
          [Maize].Grain.Total.Wt*10 as MaizeYield
          [Wheat].Grain.Protein
          [Wheat].Grain.Size
          [Wheat].Grain.Number
          [Wheat].Grain.Total.Wt
          [Wheat].Grain.Total.N
          [Wheat].Total.Wt
          Sum([Soil].SoilWater.ESW) as ESW
          [Soil].SoilWater.Es as ESoil
    Zone Field 2: same as Farm.Field 1
    FarmEconomics: InitialBalance=0; Balance=0
      CostPriceInfo Wheat: VariableCost=800; Price=200
      CostPriceInfo Maize: VariableCost=1200; Price=350
      CostInfo Urea: Cost=0.8
      CostInfo Roundup: Cost=12
    FarmMachinery: FuelCost=1.85; TractorNames=[220kW FWA, 220kW FWA, SprayRig, SprayRig]; ImplementNames=[Planter, Sprayer, Planter, Sprayer]; WorkRates=[42, 0, 0, 50]; FuelConsRates=[15, 0, 0, 10]; FuelConsumption=0
      FarmMachineryItem 220kW FWA: MachineryType=0; MaxHours=12; NewPrice=0; TradeInValue=0; LifeOfEquipment=0; OilTyreCost=1; RepairsMaintenance=0
      FarmMachineryItem Planter: MachineryType=1; MaxHours=12; NewPrice=0; TradeInValue=0; LifeOfEquipment=0; OilTyreCost=0; RepairsMaintenance=0
      FarmMachineryItem SprayRig: MachineryType=0; MaxHours=8; NewPrice=0; TradeInValue=0; LifeOfEquipment=0; OilTyreCost=0.5; RepairsMaintenance=0
      FarmMachineryItem Sprayer: MachineryType=1; MaxHours=8; NewPrice=0; TradeInValue=0; LifeOfEquipment=0; OilTyreCost=0; RepairsMaintenance=0
    Manager
```csharp
using APSIM.Core;
using System;
using System.Linq;
using System.Collections.Generic;
using Models.Core;
using Models.Interfaces;
using Models.Functions;
using Models.PMF;
using Models.Soils;
using Models.WaterModel;
using Models.Soils.Nutrients;
using Models.Management;
using Models.Utilities;
using Models.Climate;
using APSIM.Shared.Utilities;
using APSIM.Numerics;

namespace Models
{
    [Serializable]
    public class MScript : Model, IScopeDependency, ILocatorDependency
    {
        [Link] private Clock Clock;
        [Link] private Summary Summary;
        [Link] private RotationManager RotationManager;
        public string _currentPaddock;
        [NonSerialized] private Events myEvents;
        [NonSerialized]
        private ILocator locator;
        [NonSerialized]
        private IScope scope;

        // The paddocks - ie the names of zones.
        private List<string> myPaddockNames {get; set;}
        public string[] managedPaddocks {get {return myPaddockNames.ToArray();} set {}}
        
        // Default parameters for crops we manage.
        // The parameters for each alias are child components (FarmCropMgtInfo) of this manager 
        // Crop aliases: "Early Wheat" and "Late Wheat" both mean "Wheat", but different parameters. 
        private Dictionary<string, FarmCropMgtInfo> cropDefaults; 
       
        // Helpers for rotation arc rules. These will be called from the rotation manager 
        // component, which in turn is asked to do the daily management step by us. 
        public double CanSowEarlyWheat {get { return(canSow("Early Wheat")); } set {} }
        public double CanSowWheat {get { return(canSow("Wheat")); } set {} }
        public double CanSowMaize {get { return(canSow("Maize")); } set {} }
         
        public double CanHarvestEarlyWheat {get { return(canHarvest("Early Wheat")); } set {} }
        public double CanHarvestWheat {get { return(canHarvest("Wheat")); } set {} }
        public double CanHarvestMaize {get { return(canHarvest("Maize")); } set {} }
        
        // This is set during the management phase to the current paddock being managed.        
        public string currentPaddock {get => _currentPaddock; set => _currentPaddock = value; }
        
        // Keep these around as they're tedious to find 
        private Dictionary<string, Accumulator> accumulatedRain = new Dictionary<string, Accumulator>();
        private Dictionary<string, Zone> myPaddockZones = new Dictionary<string, Zone>();
        private Dictionary<string, WaterBalance> myWaterBalances = new Dictionary<string, WaterBalance>();
        private Dictionary<string, Physical> myPhysicals = new Dictionary<string, Physical>();
        
        // The current state of each paddock
        public Dictionary<string, string> currentStateAll {get; private set;}
        public string currentState {get { return currentStateAll[currentPaddock] ;} set {}}
        public string getCurrentStateOfPaddock(string paddock) {
           return currentStateAll[paddock];
        }

        private Dictionary<string, int> daysSinceLastHarvests;
           
        private bool afterInit = false;

        
        public void SetScope(IScope scope) => this.scope = scope;
public void SetLocator(ILocator locator) => this.locator = locator;

        [EventSubscribe("StartOfSimulation")]
        private void OnStartOfSimulation(object sender, EventArgs e)
        {
            cropDefaults = new Dictionary<string, FarmCropMgtInfo>();
            foreach (var def in (this.Parent.Children).OfType<FarmCropMgtInfo>()) {
               cropDefaults[def.Name] = def;
               Summary.WriteMessage(this, $"Found crop defaults for '{def.Name}' aka '{def.RealName}'", MessageType.Diagnostic);
            }
            // A rain accumulator is kept for each crop
            foreach (var crop in cropDefaults.Keys) {
               accumulatedRain.Add(crop, new Accumulator(this, "[Weather].Rain", cropDefaults[crop].RainDays));
            }
            accumulatedRain.Add("weed", new Accumulator(this, "[Weather].Rain", 4));
            
            // Set up initial values
            myEvents = new Events(this);
            currentStateAll = new Dictionary<string, string>();
            daysSinceLastHarvests = new Dictionary<string, int>();
            myPaddockNames = new List<string>();
            
            // find a child component with initial state parameters 
            var initStateModel = (this.Parent.Children).OfType<FarmPaddocks>().FirstOrDefault();
            
            for (var i = 0; i < initStateModel.PaddockNames.Length; i++) {
               if (initStateModel.IsManaged[i]) 
               {
                  myPaddockNames.Add(initStateModel.PaddockNames[i]);
                  if (! RotationManager.Nodes.Exists(x => x.Name == initStateModel.InitialState[i]))
                     throw new Exception("Can't find a initial state/node called '" + initStateModel.InitialState[i] + "'");
                  currentStateAll.Add(initStateModel.PaddockNames[i], initStateModel.InitialState[i]);
                  daysSinceLastHarvests.Add(initStateModel.PaddockNames[i], initStateModel.DaysSinceHarvest[i]);
               }
            }
            
            // Hook up the water balance objects etc to our dictionaries 
            foreach (var paddock in myPaddockNames) {
                myPaddockZones[ paddock ] =  scope.Find<IModel>(paddock) as Zone; 
                if (myPaddockZones[ paddock ]  == null) { throw new Exception("Can't find a paddock called '" + paddock + "'");}
 
                myWaterBalances[ paddock ] =  scope.Find<IModel>("SoilWater", relativeTo: (INodeModel)myPaddockZones[ paddock ]) as WaterBalance;
                if (myWaterBalances[ paddock ] == null) { throw new Exception("Can't find a waterbalance in '" + paddock + "'");}

                myPhysicals[ paddock ] = myWaterBalances[ paddock ].FindSibling("Physical") as Physical;
               
                // trick the logger into recording initial state
                currentPaddock = paddock;
                RotationManager.CurrentState = currentStateAll[paddock];
                RotationManager.DoLogState(); 
                currentPaddock = "";
                RotationManager.CurrentState = "";
            }
            afterInit = true;
        }

        [EventSubscribe("StartOfDay")]
        private void DoStartOfDay(object sender, EventArgs e) 
        {
        }
        
        [EventSubscribe("EndOfDay")]
        private void DoEndOfDay(object sender, EventArgs e) 
        {
            foreach (var paddock in myPaddockNames) {
               var cropIn = false;
               var cropModules = cropDefaults.Values.Select(c => c.RealName).Distinct();
               foreach (var crop in cropModules) {
                  IPlant Crop =  scope.Find<IModel>(crop, relativeTo: (INodeModel)myPaddockZones[paddock]) as IPlant;
                  if (Crop.IsAlive)
                     cropIn = true;
               }
               if (!cropIn) 
                  daysSinceLastHarvests[paddock]++;
            }
        }

        [EventSubscribe("DoManagement")]
        private void DoManagement(object sender, EventArgs e)
        {
            foreach (var crop in accumulatedRain.Keys) {
               accumulatedRain[crop].Update();
            }
            
            bool moreToDo = true;
            while (moreToDo) {
               foreach (var paddock in myPaddockNames) {
                  currentPaddock = paddock;
                  RotationManager.CurrentState = currentStateAll[paddock];
                  //Summary.WriteMessage(this, $"Calling DoManagement for {currentPaddock}", MessageType.Diagnostic);
                  moreToDo = RotationManager.DoManagement();
                  currentStateAll[paddock] = RotationManager.CurrentState;
               }
            }
            currentPaddock = "";
        }

        // Rotation arc rules & actions. These depend on currentPaddock being set 
        private double canSow (string crop) {
            if (currentPaddock == "") { return 0; }
            //Summary.WriteMessage(this, $"Being asked for crop {crop} in {currentPaddock}", MessageType.Diagnostic);
            var Crop = findMyCrop(cropDefaults[crop].RealName);

            if ((DateUtilities.WithinDates(cropDefaults[crop].StartDate, Clock.Today, cropDefaults[crop].EndDate) &&
                 !Crop.IsAlive &&
                 MathUtilities.Sum(myWaterBalances[currentPaddock].ESW) > cropDefaults[crop].MinESW &&
                 accumulatedRain[crop].Sum > cropDefaults[crop].MinRain) ||
                (!Crop.IsAlive && DateUtilities.DatesAreEqual(cropDefaults[crop].EndDate, Clock.Today) && 
                 cropDefaults[crop].MustSow)) 
                return 1; 
            return 0; 
        }
               
        private double canHarvest (string crop) {
            if (currentPaddock == "") { return 0; }
            var Crop = findMyCrop(cropDefaults[crop].RealName);
            if (Crop.IsReadyForHarvesting) {
               return(1);
            }
            return(0);   
        }
               
        public void SowCrop(string crop) 
        {   
            crop = crop.Replace("\"", ""); //NFI why the quotes are added in??
            var myPaddock =  scope.Find<IModel>(currentPaddock) as Zone; 
            if (myPaddock == null) { throw new Exception("Can't find a paddock called '" + currentPaddock + "'");}
            
            Plant Crop =  scope.Find<IModel>(cropDefaults[crop].RealName, relativeTo: (INodeModel)myPaddock) as Plant;
            if (Crop == null) { throw new Exception("Can't find crop called '" + currentPaddock + "." + crop + "'");}

            Summary.WriteMessage(this, this.FullPath + " -  sowing " + Crop.FullPath, MessageType.Diagnostic);
            Crop.Sow(population: cropDefaults[crop].Population, cultivar: cropDefaults[crop].CultivarName, 
                     depth: cropDefaults[crop].SowingDepth, rowSpacing: cropDefaults[crop].RowSpacing);
            myEvents.Publish("DoPaddockExpenditure",  new object[] { this, 
                  new FarmEconomics.PaddockExpenditureArgs{
                      Description = $"{crop} Sowing",
                      Category = "In-crop", 
                      Paddock = currentPaddock,
                      Name = Crop.Name,
                      Rate = 1,
                      Area = myPaddockZones [ currentPaddock ].Area}});
                      
            Fertiliser fert =  scope.Find<IModel>("Fertiliser", relativeTo: (INodeModel)myPaddock) as Fertiliser;
            fert.Apply(cropDefaults[crop].fertAmount, cropDefaults[crop].fertType); 
            myEvents.Publish("DoPaddockExpenditure",  new object[] { this, 
                  new FarmEconomics.PaddockExpenditureArgs{
                      Description = $"{crop} fertiliser",
                      Category = "In-crop", 
                      Paddock = currentPaddock,
                      Name = cropDefaults[crop].fertType,
                      Rate = cropDefaults[crop].fertAmount,
                      Area = myPaddockZones [ currentPaddock ].Area}}); 

            myEvents.Publish("Operate",  new object[] { this, 
                  new FarmMachinery.FarmMachineryOperateArgs{
                      Tractor = "220kW FWA",
                      Implement = "Planter",
                      Category = "In-crop",
                      Paddock = currentPaddock}}); 

            myEvents.Publish("KillWeeds",  new object [] {this, 
                  new EventArgs()}) ; 
         }
        
        public void HarvestCrop(string crop)
        {
            crop = crop.Replace("\"", "");
            var myPaddock =  scope.Find<IModel>(currentPaddock) as Zone; 
            Plant Crop =  scope.Find<IModel>(cropDefaults[crop].RealName, relativeTo: (INodeModel)myPaddock) as Plant;

            Summary.WriteMessage(this, this.FullPath + " -  harvesting " + Crop.FullPath, MessageType.Diagnostic);
            myEvents.Publish("DoPaddockIncome",  new object[] { this, 
                  new FarmEconomics.PaddockIncomeArgs{
                       Description = $"{crop} aka {Crop.Name} Harvest",
                       Category = "In-crop", 
                       Paddock = currentPaddock,
                       Name = Crop.Name,
                       //  wet yield @ 14% moisture 
                       Yield = 1.14 * GetValuebyName(locator.Get("[" + Crop.Name + "].Grain.Total.Wt", relativeTo: myPaddock)) * 10 / 1000,  // g/m2 -> t/ha
                       Protein = GetValuebyName(locator.Get("[" + Crop.Name + "].Grain.Protein", relativeTo: myPaddock)) ,
                       Area = myPaddockZones [ currentPaddock ].Area}});   
            Crop.Harvest();
            Crop.EndCrop();
            daysSinceLastHarvests[currentPaddock] = 0;
            myEvents.Publish("CropHarvested",  null); 
        }

        private Plant findMyCrop(string crop) {
            if (currentPaddock == "") { return null; }
            var myPaddock =  scope.Find<IModel>(currentPaddock) as Zone; 
            if (myPaddock == null) { throw new Exception("Can't find a paddock called '" + currentPaddock + "'");}
            
            Plant Crop =  scope.Find<IModel>(cropDefaults[crop].RealName, relativeTo: (INodeModel)myPaddock) as Plant;
            if (Crop == null) { throw new Exception("Can't find crop called '" + currentPaddock + "." + crop + "'");}
            return (Crop);        
        }
        
        private double GetValuebyName(object value) 
        {
            if (value is null) return(0);
              
            if (value is IFunction function)
                value = function.Value();
                
            double result = (double) Convert.ChangeType(value, typeof(double));
            return(result);
        }


        // More helpers for rotation arc rules. These rules also depend on currentPaddock being set 
        // earlier (ie we're calling the rotation graph, and in turn, it's asking us for something)

        // See if the potential area planted for this crop is less or equal to the total area allowed         
        public int AreaPlantedOk (string crop) {
           double areaCrop = 0;
           double areaTot = 0;
           foreach (var paddockZone in myPaddockZones.Values) {
               IPlant Crop =  scope.Find<IModel>(cropDefaults[crop].RealName, relativeTo: (INodeModel)paddockZone) as IPlant;
               if (Crop == null) { throw new Exception($"Can't find crop {crop} in '{paddockZone.Name}'");}
               if (Crop.IsAlive) 
                  areaCrop += paddockZone.Area;
               areaTot += paddockZone.Area;
           }
           var thisPaddockArea = myPaddockZones [ currentPaddock ].Area;
           var areaFrac = (thisPaddockArea + areaCrop) / areaTot ; 
           int result = areaFrac <= cropDefaults[crop].maxArea ? 1 : 0;
           //Summary.WriteMessage(this, $"area rule for crop {crop} is {result}: this = {thisPaddockArea}, pot= {(areaCrop + thisPaddockArea)}, tot={areaTot}", MessageType.Diagnostic);
           return(result);        
        }
        
        // The number of days since the last crop was harvested
        public int daysSinceLastHarvest {
           get { 
             if (!afterInit) return 0;
             return(daysSinceLastHarvests[currentPaddock]);
           }
           set {}
        }
        
        public int daysSinceLastHarvest_gt_30 {get {return (daysSinceLastHarvest > 30 ? 1 : 0); } set {}}
        public int daysSinceLastHarvest_gt_180 {get {return (daysSinceLastHarvest > 180 ? 1 : 0); } set {}}
        

    }
}
```
      Memo APSFarm
        ### Whole farm management

        This simulation aims to manage paddocks from a single "top level" manager that applies a rotation to each, testing environmental (rainfall, water content), current (eg %age of farm planted) and historical (eg max 2 cereals in a row) states for what crop to sow next.

        The top level manager
      FarmPaddocks Initial Values: PaddockNames=[Field 1, Field 2]; IsManaged=true; InitialState=[Fallow 1, Summer Fallow]; DaysSinceHarvest=[44, 16]
      FarmCropMgtInfo Early Wheat: RealName=Wheat; MinRain=30; RainDays=7; StartDate=1-apr; EndDate=1-may; MinESW=80; MustSow=true; Population=50; CultivarName=Hartog; SowingDepth=30; RowSpacing=250; maxArea=0.2; fertType=UreaGranular; fertAmount=120
      FarmCropMgtInfo Wheat: RealName=Wheat; MinRain=30; RainDays=7; StartDate=1-apr; EndDate=1-may; MinESW=80; MustSow=true; Population=50; CultivarName=Hartog; SowingDepth=30; RowSpacing=250; maxArea=0.8; fertType=UreaGranular; fertAmount=120
      FarmCropMgtInfo Maize: RealName=Maize; MinRain=20; RainDays=7; StartDate=1-nov; EndDate=30-dec; MinESW=80; MustSow=true; Population=6; CultivarName=sc501; SowingDepth=50; RowSpacing=1000; maxArea=0.8; fertType=UreaGranular; fertAmount=200
    Manager Weeds
      rainAmount = 0
      ttSum = 0
      swFrac = 0
      controlChemical =
      controlRate = 0
```csharp
using APSIM.Core;
using APSIM.Shared.Utilities;
using Models.Climate;
using Models.Utilities;
using Models.Management;
using Models.Soils.Nutrients;
using Models.WaterModel;
using Models.Soils;
using Models.PMF;
using Models.Functions;
using Models.Interfaces;
using Models.Core;
using System.Collections.Generic;
using System.Linq;
using System;

namespace Models
{
    [Serializable]
    public class WeedScript : Model, IScopeDependency
    {
        [Link] private Simulation Simulation;
        [Link] private Weather Weather;
        [Link] private Clock Clock;
        [Link] private Summary Summary;
        [Link] private RotationManager RotationManager;
        [Link(ByName = true)] private Manager Manager;
        private MScript ManagerScript;
        [NonSerialized] private Events myEvents;
        private Accumulator accumulatedRain;
        [NonSerialized]
        private IScope scope;
        ////////////////////////////////////////////////////////
        [Separator("Weeds - fallow cost of control")]
        [Description("Rainfall amount for germination (mm over 4 days)")]
        public double rainAmount{get; set;} 

        [Description("Thermal time to seed set (dd)")]
        public double ttSum{get; set;} 

        [Description("Surface soil water threshold for weed death (0-1)")]
        public double swFrac{get; set;} 
       
        [Description("Control chemical ()")]
        public string controlChemical{get; set;} 

        [Description("Control rate (l/ha)")]
        public double controlRate{get; set;} 
       
        ////////////////////////////////////////////////////////
        // The paddocks - ie the names of zones.
        [NonSerialized] public List<string> myPaddockNames;
        
        
        
        // Keep these around as they're tedious to find 
        private Dictionary<string, Zone> myPaddockZones = new Dictionary<string, Zone>();
        private Dictionary<string, WaterBalance> myWaterBalances = new Dictionary<string, WaterBalance>();
        private Dictionary<string, Physical> myPhysicals = new Dictionary<string, Physical>();
          
        private bool afterInit = false;

        public void SetScope(IScope scope) => this.scope = scope;

        [EventSubscribe("StartOfSimulation")]
        private void OnStartOfSimulation(object sender, EventArgs e)
        {
            ManagerScript = Manager.Script as MScript;
            accumulatedRain =  new Accumulator(this, "[Weather].Rain", 4);
            
            // Set up initial values
            myEvents = new Events(this);
            myPaddockNames = ManagerScript.managedPaddocks.ToList();
            
            // Hook up the water balance objects etc to our dictionaries 
            foreach (var paddock in myPaddockNames) {
                myPaddockZones[ paddock ] =  scope.Find<IModel>(paddock) as Zone; 
                if (myPaddockZones[ paddock ]  == null) { throw new Exception("Can't find a paddock called '" + paddock + "'");}
 
                myWaterBalances[ paddock ] =  scope.Find<IModel>("SoilWater", relativeTo: (INodeModel)myPaddockZones[ paddock ]) as WaterBalance;
                if (myWaterBalances[ paddock ] == null) { throw new Exception("Can't find a waterbalance in '" + paddock + "'");}

                myPhysicals[ paddock ] = myWaterBalances[ paddock ].FindSibling("Physical") as Physical;
                
                weedsGerminated.Add(paddock, false);
                weedsTT.Add(paddock, 0);
            }
            afterInit = true;
        }

        [EventSubscribe("DoManagement")]
        private void DoManagement(object sender, EventArgs e)
        {
            accumulatedRain.Update();
            
            foreach (var paddock in myPaddockNames) {
               checkWeeds(paddock);
            }
        }
        
        // Weeds-------------------
        private Dictionary<string, bool> weedsGerminated = new Dictionary<string, bool>();
        private Dictionary<string, double> weedsTT = new Dictionary<string, double>();

        //[EventSubscribe("CropHarvested")] fixme


        [EventSubscribe("KillWeeds")]
        private void KillWeeds(object sender, EventArgs e) {
            var currentPaddock = ManagerScript.currentPaddock;
            weedsGerminated[currentPaddock] = false;
            weedsTT[currentPaddock] = 0;
        }

        private void checkWeeds (string paddock) {
            var currentState = ManagerScript.getCurrentStateOfPaddock(paddock);
            if (currentState.Contains("Fallow", StringComparison.CurrentCultureIgnoreCase ) /*&&
                daysSinceHarvest[paddock] > 30*/) {

                  if (! weedsGerminated[paddock] && accumulatedRain.Sum >= rainAmount) {
                     weedsGerminated[paddock] = true;
                     weedsTT[paddock] = 0;
                     Summary.WriteMessage(this, $"Weeds germinating in {paddock}", MessageType.Diagnostic);

                  } else if (weedsGerminated[paddock]) {
                     // Thermal time calc
                     weedsTT[paddock] += (Weather.MaxT + Weather.MinT) / 2;
         
                     // Surface SW calc
                     var ll = myPhysicals[paddock].LL15[0];
                     var dul = myPhysicals[paddock].DUL[0];
                     var sw = myWaterBalances[paddock].SW[0];
                     var swf = (sw-ll)/(dul-ll);
         
                     if (swf < swFrac) {
                         // kill off weeds
                         weedsGerminated[paddock] = false;
                         Summary.WriteMessage(this, $"Weeds die in {paddock}", MessageType.Diagnostic);
         
                     } else if (weedsTT[paddock] > ttSum) {
                         // Weeds are mature - spray them
                         
                         myEvents.Publish("DoPaddockExpenditure",  new object[] { this, 
                             new FarmEconomics.PaddockExpenditureArgs {
                                 Description = "Weed control - " + controlChemical,
                                 Category = "Fallow", 
                                 Paddock = paddock,
                                 Name = controlChemical,
                                 Rate = controlRate,
                                 Area = myPaddockZones [ paddock ].Area}}); 
                         myEvents.Publish("Operate",  new object[] { this, 
                             new FarmMachinery.FarmMachineryOperateArgs{
                                Tractor = "SprayRig",
                                Category = "Fallow", 
                                Implement = "Sprayer",
                                Paddock = paddock}}); 
                         Summary.WriteMessage(this, $"Weeds mature in {paddock} - sprayed out.", MessageType.Diagnostic);
                         weedsGerminated[paddock] = false;
                         weedsTT[paddock] = 0;
                     }  
                 }
              }   
       }
    }
    public class WeedEventArgs: EventArgs
    {
       /// <summary> </summary>
       public string Paddock { get; set; }
    }        
}
```
    Manager PhaseAccumulations
```csharp
using APSIM.Core;
using System;
using System.Linq;
using System.Collections.Generic;
using Models.Core;
using Models.Interfaces;
using Models.Functions;
using Models.Climate;
using Models.Soils;
using Models.WaterModel;
using Models.Soils.Nutrients;
using Models.Management;
using Models.Utilities;
using Models.PMF;
using APSIM.Shared.Utilities;
using APSIM.Numerics;

// General accumulator for rotations. Reports on each transition in each paddock
namespace Models
{
    [Serializable]
    public class AccScript : Model, IScopeDependency, ILocatorDependency
    {
        [Link] private Simulation Simulation;
        [Link] private IClock Clock;
        [Link] private Weather Weather;
        [Link] private ISummary Summary;
        [Link(ByName = true)] private Manager Manager;
        private MScript ManagerScript;
        [Link(IsOptional = true)] private RotationManager RotationManager;
        [Link(IsOptional = true)] private Zone defaultZone;
        [NonSerialized]
        private ILocator locator;
        [NonSerialized]
        private IScope scope;

        

        private Dictionary<string, Zone> myPaddockZones = null;
        private Dictionary<string, WaterBalance> myWaterBalances;
        private Dictionary<string, Nutrient> myNutrient;
        private Dictionary<string, Solute> myNO3;
        private Dictionary<string, Fertiliser> myFert;
        private Dictionary<string, Plant> myCrops; // eg ["paddockName,cropName"]
        
        // A state / accumulator for each thing in each paddock
        private Dictionary<string, double> me = new Dictionary<string, double>();
        private Dictionary<string, double[]> meArray = new Dictionary<string, double[]>();
        private Dictionary<string, int> meInt = new Dictionary<string, int>();
        
        private string currentPaddock {get { 
           return((ManagerScript is null) ? 
             defaultZone.Name : 
                ManagerScript.currentPaddock); } set {}} 


        
        public void SetScope(IScope scope) => this.scope = scope;
public void SetLocator(ILocator locator) => this.locator = locator;

        [EventSubscribe("StartOfSimulation")]
        public void OnStart_Simulation(object sender, EventArgs e) { 
            myPaddockZones = new Dictionary<string, Zone>();
            myWaterBalances = new Dictionary<string, WaterBalance>();
            myNO3 = new Dictionary<string, Solute>();
            myFert = new Dictionary<string, Fertiliser>();
            myNutrient = new Dictionary<string, Nutrient>();
            myCrops = new Dictionary<string, Plant>();
            
            ManagerScript = Manager.Script as MScript;
            
            foreach (var z in Simulation.FindAllChildren<Zone>() ) {
               myPaddockZones.Add(z.Name, z);
               
               var w =  scope.Find<IModel>("SoilWater", relativeTo: (INodeModel)(z as Zone)) as WaterBalance;
               myWaterBalances.Add(z.Name, w);

               var no3 =  scope.Find<IModel>("NO3", relativeTo: (INodeModel)(z as Zone)) as Solute;
               myNO3.Add(z.Name, no3);

               var nut =  scope.Find<IModel>("Nutrient", relativeTo: (INodeModel)(z as Zone)) as Nutrient;
               myNutrient.Add(z.Name, nut);

               var fert =  scope.Find<IModel>("Fertiliser", relativeTo: (INodeModel)(z as Zone)) as Fertiliser;
               myFert.Add(z.Name, fert);
               
               foreach (var c in z.FindAllChildren<Plant>() ) {
                   myCrops.Add(z.Name + "," + c.Name, c);
               }
            }  
                    
            foreach (string paddockName in myPaddockZones.Keys) {
               me.Add(paddockName + "__NeedReset", 1);

               Summary.WriteMessage(this, "Adding " + paddockName, MessageType.Diagnostic);
               me.Add(paddockName + "_eswStart", 0);
               me.Add(paddockName + "_eswYesterday", 0);
               me.Add(paddockName + "_Ep", 0);
               me.Add(paddockName + "_drainage", 0);
               me.Add(paddockName + "_runoff", 0);
               me.Add(paddockName + "_no3Start", 0);
               me.Add(paddockName + "_no3Yesterday", 0);
               me.Add(paddockName + "_rain", 0);
               me.Add(paddockName + "_evaporation", 0);
               me.Add(paddockName + "_applied_fert", 0);
               
               double[] TotalC = myNutrient[paddockName].TotalC.ToArray(); // 
               meArray.Add(paddockName + "_CStart", new double[TotalC.Length]);
               meArray.Add(paddockName + "_CYesterday", new double[TotalC.Length]);
               meArray.Add(paddockName + "_dlt_carbon_tot", new double[TotalC.Length]);
               meArray.Add(paddockName + "_n2o_tot", new double[TotalC.Length]);
               meInt.Add(paddockName + "_daysInPhase", 0);
               

               double[] dlayer = myWaterBalances[paddockName].Thickness.ToArray();
               double dep = 0;
               int iLayer = 0;
               for (iLayer = 0; iLayer < dlayer.Length && dep < 300; iLayer++)
                    dep += dlayer[iLayer];
               if (dep != 300) { throw new Exception($"Layer structure is not aligned to 300mm boundary in {paddockName}"); }
               meInt.Add(paddockName + "_iLayer_300mm", iLayer);
               Summary.WriteMessage(this, "L @300 = " + iLayer.ToString(), MessageType.Diagnostic);
      
               for ( ;iLayer < dlayer.Length && dep < 1000; iLayer++)
                    dep += dlayer[iLayer];
               //if (dep > 1000) { throw new Exception($"Layer structure is not aligned to 1000mm boundary in {paddockName}"); }
               meInt.Add(paddockName + "iLayer_300_1000mm", iLayer);
               Summary.WriteMessage(this, $"L @1000 = {iLayer}  (= {dep} mm)", MessageType.Diagnostic);

           }
       } 
       
       [EventSubscribe("Transition")] 
       public void OnTransition(object sender, EventArgs e) {
          me[currentPaddock + "__NeedReset"] = 1;
       } 
   
   [EventSubscribe("StartOfDay")] 
   public void OnStartOfDay(object sender, EventArgs e) { 
      foreach (string paddockName in myPaddockZones.Keys) {
         if (me[paddockName + "__NeedReset"] > 0) {
            me[paddockName + "__NeedReset"] = 0;
            me[paddockName + "_eswStart"] = MathUtilities.Sum(myWaterBalances[paddockName].ESW);
            me[paddockName + "_swYesterday"] = me[paddockName + "_eswStart"];
            me[paddockName + "_Ep"] = 0;
            me[paddockName + "_drainage"] = 0;
            me[paddockName + "_runoff"] = 0;
            me[paddockName + "_no3Start"] = myNO3[paddockName].kgha.Sum();
            me[paddockName + "_no3Yesterday"] = me[paddockName + "_no3Start"];
            me[paddockName + "_rain"] = 0;
            me[paddockName + "_evaporation"] = 0;
            me[paddockName + "_applied_fert"] = 0;
            
            // C pools aren't initialised properly until the end of the 1st day. Fudge it for now.
            var TotalC = myNutrient[paddockName].TotalC.ToArray();
            meArray[paddockName + "_CStart"] = TotalC;
            meArray[paddockName + "_CYesterday"] = TotalC;
            meArray[paddockName + "_dlt_carbon_tot"] = new double[TotalC.Length];
            meArray[paddockName + "_n2o_tot"] = new double[TotalC.Length];
            meInt[paddockName + "_daysInPhase"] = 0;
            
         }
      }
   }
    
   private IEnumerable<string> listCropsIn(string paddock) {
      return(myCrops.Keys.ToList().
          Where(c => c.StartsWith(paddock + "," )).
          Select(s => s.Substring(s.IndexOf(',') + 1)));
   }
   
   [EventSubscribe("EndOfDay")] 
   public void OnEndOfDay(object sender, EventArgs e) { 
      foreach (string paddockName in myPaddockZones.Keys) 
      {
         foreach (var cropName in listCropsIn(paddockName))
         {
            double Ep =  GetValuebyName(locator.Get($"[{cropName}].Leaf.WaterAllocation", relativeTo: myPaddockZones[paddockName]));  
            me[paddockName + "_Ep"] += Ep;
         }
         
         me[paddockName + "_swYesterday"] = MathUtilities.Sum(myWaterBalances[paddockName].ESW);

         me[paddockName + "_drainage"] += myWaterBalances[paddockName].Drainage;

         me[paddockName + "_runoff"] += myWaterBalances[paddockName].Runoff;

         me[paddockName + "_rain"] += Weather.Rain;
         
         me[paddockName + "_evaporation"] += myWaterBalances[paddockName].Es;

         me[paddockName + "_applied_fert"] += myFert[paddockName].NitrogenApplied;

         me[paddockName + "_no3Yesterday"] = myNO3[paddockName].kgha.Sum();

         var TotalC = myNutrient[paddockName].TotalC.ToArray();
         if (MathUtilities.Sum( meArray[paddockName + "_CStart"] ) <= 0) {  // only occurs on the 1st day of simulation
            meArray[paddockName + "_CStart"] = TotalC;  
         }
         meArray[paddockName + "_CYesterday"] = TotalC;  
         for (int i = 0; i < TotalC.Length; i++) {
            meArray[paddockName + "_dlt_carbon_tot"][i] = TotalC[i] - meArray[paddockName + "_CStart"][i];
            meArray[paddockName + "_n2o_tot"][i] += myNutrient[paddockName].N2Oatm[i];
         }
         meInt[paddockName + "_daysInPhase"]++;
      }
    }

   // Cumulative Ep: The total transpiration since the last transition
   public double TEp {
      get {return(getv(currentPaddock + "_Ep"));}
      set {}
   }
   // Cumulative Drainage
   public double TDrainage {
      get {return(getv(currentPaddock + "_drainage"));}
   }
   // Cumulative Runoff
   public double TRunoff {
      get {return(getv(currentPaddock + "_runoff"));}
   }
   // <summary> The total rain since the last transition</summary>
   public double TRainfall {
      get {return(getv(currentPaddock + "_rain"));}
   }
   
   public double TEs {
      get {return(getv(currentPaddock + "_evaporation"));}
      set {}
   }
   // <summary> The total NO3 applied since the last transition </summary>
   public double TFertAsNO3 {
      get {return(getv(currentPaddock + "_applied_fert"));}
      set {}
   }

   // <summary> Instantaneous sw at start </summary>
   public double eswStart {
      get { return(getv(currentPaddock + "_eswStart"));} 
      set {}
   }
   // <summary> Instantaneous sw at end </summary>
   public double eswYesterday {
      get {return(getv(currentPaddock + "_eswYesterday"));} 
      set {}
   }
   // <summary> Instantaneous no3 at start of a phase </summary>
   public double no3Start { 
      get {return(getv(currentPaddock + "_no3Start"));}
   }
   // <summary> Instantaneous no3 at end of a phase </summary>
   public double no3Yesterday {
      get {return(getv(currentPaddock + "_no3Yesterday"));}
   }

   // <summary> Instantaneous total carbon at start of a phase </summary>
   public double[] totCStart { 
      get {return(geta(currentPaddock + "_CStart"));}
   }
   // <summary> Instantaneous no3 at end of a phase </summary>
   public double[] totCYesterday {
      get {return(geta(currentPaddock + "_CYesterday"));}
   }
   
   // <summary> Change in total carbon to 300mm over water year </summary>
   public double dlt_carbon_tot_300mm {
      get {
         double res = 0;
         int n = getInt( currentPaddock + "_iLayer_300mm" );
         for (var i = 0; i < n; i++)
            res += geta(currentPaddock + "_dlt_carbon_tot", i);
         return(res);
      }
   }
    // <summary> Change in total carbon from 300mm - 1000mm over water year</summary>
    public double dlt_carbon_tot_300_1000mm {
      get {
         double res = 0;
         int n1 = getInt( currentPaddock + "_iLayer_300mm" );
         int n2 = getInt( currentPaddock + "_iLayer_300mm_1000mm" );
         for (var i = n1; i < n2; i++)
            res += geta(currentPaddock + "_dlt_carbon_tot", i);
         return(res);
      }
   }
   
   
   // <summary> N2O emitted from top300mm since start of water year </summary>
   public double n2o_300mm {
      get {
         double res = 0;
         int n = getInt( currentPaddock + "_iLayer_300mm" );
         for (var i = 0; i < n; i++)
            res += geta(currentPaddock + "_n2o_tot", i);
         return(res);
      }
   }
   // <summary> N2O emitted from 300mm - 1000mm since start of water year</summary>
   public double n2o_300_1000mm {
      get {
         double res = 0;
         int n1 = getInt( currentPaddock + "_iLayer_300mm" );
         int n2 = getInt( currentPaddock + "_iLayer_300mm_1000mm" );
         for (var i = n1; i < n2; i++)
            res += geta(currentPaddock + "_n2o_tot", i);
         return(res);
      }
   }
   
    //<summary>CO2 equivalent emissions to 300mm since transition</summary> 
   public double co2_equiv_300mm {
      get {
         return((-1 * dlt_carbon_tot_300mm * 3.67 + 
                 n2o_300mm * 298) / 1000.0);
      }
   }
    //<summary>CO2 equivalent emissions from 300mm -  1000mm since transition</summary>
   public double co2_equiv_300_1000mm {
      get {
         return((-1 * dlt_carbon_tot_300_1000mm * 3.67 + 
            n2o_300_1000mm * 298) / 1000.0);
      }
   }

   // <summary> Instantaneous yield (kg/ha, sum of all crops) </summary>
   public double yield_kgha {
      get{
         double yld2 = 0;
         foreach (var cropName in listCropsIn(currentPaddock))
         {
            // This is quite a mouthful. Should be an easier way to do this..
            var yld =  GetValuebyName(locator.Get($"[{cropName}].Grain.Total.Wt", relativeTo: myPaddockZones[currentPaddock])) * 10;  // g/m2 -> kg/ha
            yld2 = yld2 + yld;
         }
         return yld2 ;
      }
      set {}
   }

   //<summary> Instantaneous yield (kg) of all crops </summary>
   public double yield_kg {
      get{
         double yld2 = 0;
         foreach (var cropName in listCropsIn(currentPaddock))
         {
            // This is quite a mouthful. Should be an easier way to do this..
            var yld =  GetValuebyName(locator.Get($"[{cropName}].Grain.Total.Wt", relativeTo: myPaddockZones[currentPaddock])) * 10;  // g/m2 -> kg/ha
            yld2 = yld2 + yld * myPaddockZones[currentPaddock].Area;
         }
         return yld2 ;
      }
      set {}
   }

   //<summary> Instantaneous biomass (kg/ha) of all crops</summary>
   public double biomass_kgha {
      get{
         double biomass2 = 0;
         foreach (var cropName in listCropsIn(currentPaddock))
         {
            // This is quite a mouthful. Should be an easier way to do this..
            var biomass =  GetValuebyName(locator.Get($"[{cropName}].AboveGround.Wt", relativeTo: myPaddockZones[currentPaddock])) * 10;  // g/m2 -> kg/ha
            biomass2 = biomass2 + biomass;
         }
         return biomass2 ;}
      set {}
   }
   // <summary>Instantaneous biomass (kg) of all crops</summary>
   public double biomass_kg {
      get{
         double biomass2 = 0;
         foreach (var cropName in listCropsIn(currentPaddock))
         {
            // This is quite a mouthful. Should be an easier way to do this..
            var biomass =  GetValuebyName(locator.Get($"[{cropName}].AboveGround.Wt", relativeTo: myPaddockZones[currentPaddock])) * 10;  // g/m2 -> kg/ha
            biomass2 = biomass2 + biomass * myPaddockZones[currentPaddock].Area;
         }
         return biomass2 ;}
   }
#if false
   // Instantaneous protein of all crops
   [Output, Description("Grain Protein"), Units("%")] public double protein {
      get{
         double pro2 = 0;
         Paddock p = (Paddock) MySimulation.LinkByName(currentPaddock());
         foreach (Component crop in p.Crops)
         {
            double pro = 0;
            locator.Get("grain_protein", out pro, relativeTo: crop);
            pro2 = pro2 + pro;
         }
        
         return pro2 ;}
   }
   
   // Instantaneous N of all crops
   [Output, Description("Grain N"), Units("g/m2")] public double GrainN_gm2 {
      get{
         double GN2 = 0;
         Paddock p = (Paddock) MySimulation.LinkByName(currentPaddock());
         foreach (Component crop in p.Crops)
         {
            double GN = 0;
            if (locator.Get("grain_N", out GN, relativeTo: crop))
               GN2 = GN2 + GN;
            else if (locator.Get("GrainGreenN", out GN, relativeTo: crop))
               GN2 = GN2 + GN;
         }
         return GN2 ;}
   }

#endif
   
   public int daysInPhase {
      get {
        return(getInt( currentPaddock + "_daysInPhase"));
      }
   }
   
        private double[] geta(string key) {
           if (meArray.ContainsKey(key)) return(meArray[key]);
           return(null);
        }

        private double geta(string key, int i) {
           if (meArray.ContainsKey(key)) return(meArray[key] [i]);
           return(-1.0);
        }
        
        private double getv(string key) {
           if (me.ContainsKey(key)) return(me[key]);
           return(-1.0);
        }
        
        private int getInt(string key) {
           if (meInt.ContainsKey(key)) return(meInt[key]);
           return(0);
        }
        
        private double GetValuebyName(object value) 
        {
            double result;
            if (value is IFunction function)
                value = function.Value();
            result = (double) Convert.ChangeType(value, typeof(double));
            return(result);
        }

    
        [EventSubscribe("DoManagement")]
        private void DoDailyCalculations(object sender, EventArgs e)
        {
            // Called once per day
        }
    }
}
```
    RotationManager: TopLevel=false; InitialState=initial; Verbose=false
      Nodes:
        ID  Name
        1   Summer Fallow
        2   Wheat
        3   Maize
        4   Fallow 1
        5   Early Wheat
      Arcs:
        {SourceID=2, DestinationID=1, Conditions=[[Manager].Script.CanHarvestWheat], Actions=[[Manager].Script.HarvestCrop("Wheat");], ID=6, Name=Arc 1}
        {SourceID=1, DestinationID=3, Conditions=[[Manager].Script.CanSowMaize, [Manager].Script.daysSinceLastHarvest_gt_180, [FarmMachinery].MachineryAvailable("220kW FWA", "Planter")], Actions=[[Manager].Script.SowCrop("Maize");], ID=7, Name=Arc 2}
        {SourceID=3, DestinationID=4, Conditions=[[Manager].Script.CanHarvestMaize], Actions=[[Manager].Script.HarvestCrop("Maize");], ID=8, Name=Arc 3}
        {SourceID=4, DestinationID=2, Conditions=[[Manager].Script.CanSowWheat, [Manager].Script.AreaPlantedOk("Wheat"), [FarmMachinery].MachineryAvailable("220kW FWA", "Planter")], Actions=[[Manager].Script.SowCrop("Wheat");], ID=9, Name=Arc 4}
        {SourceID=4, DestinationID=5, Conditions=[[Manager].Script.CanSowEarlyWheat, [Manager].Script.AreaPlantedOk("Early Wheat"), [FarmMachinery].MachineryAvailable("220kW FWA", "Planter")], Actions=[[Manager].Script.SowCrop("Early Wheat");], ID=10, Name=Arc 5}
        {SourceID=5, DestinationID=1, Conditions=[[Manager].Script.CanHarvestEarlyWheat], Actions=[[Manager].Script.HarvestCrop("Early Wheat");], ID=11, Name=Arc 6}
      RotationRugplot: SimulationName=Farm; CurrentPaddockString=[Manager].Script.currentPaddock
    Report TransitionReport: EventNames=[RotationManager].Transition
      VariableNames:
        [Clock].Today
        [Manager].Script.currentPaddock as Paddock
        [Manager].Script.currentState as currentState
        [FarmEconomics].Balance as Balance
        [PhaseAccumulations].AccScript.TRainfall as Rain
        //Sum of [FarmMachinery].FuelConsumption from [TransitionReport].DateOfLastOutput to [Clock].Today as FuelConsumption
