Simulations: Version=174
  DataStore
  Simulation Sward
    Clock: Start=1972-01-01; End=1972-01-10
    Weather: FileName=%root%/Examples/WeatherFiles/NZ_Lincoln
    Summary
    MicroClimate: a_interception=0; b_interception=1; c_interception=0; d_interception=0; SoilHeatFluxFraction=0.4; MinimumHeightDiffForNewLayer=0; NightInterceptionFraction=0.5; ReferenceHeight=2
    SoilArbitrator
    Manager BivariateNormal (disabled)
      NumRealisations = 10
      MeanLoadToGenerate = 0
      AmountAddMeanLoad = 2.5
      VectorOfMeans = 1.1567018157972, 0.400851532821705
      CovarianceMatrix = 0.047123025480434, 0.033361752139528, 0.033361752139528, 0.033598852595467
```csharp
using Newtonsoft.Json;
using System;
using System.Linq;
using System.Xml.Serialization;
using Models.Core;
using Models.PMF;
using Models.Soils;
using APSIM.Shared.Utilities;
using Models.Interfaces;
using MathNet.Numerics.Distributions;
using MathNet.Numerics.LinearAlgebra;
namespace Models
{
    [Serializable]
    public class Script : Model
    {
        // - Links to APSIM models
        [Link] Simulation simulation;
        [Link] Clock Clock;

        // - Paramters for this manager
        [Description("Number of realisaitons to be generated: ")] public int NumRealisations { get; set; }
        [Description("First mean load of the generated distribution (g N): ")] public double MeanLoadToGenerate { get; set; }
        [Description("Amount to add to the first mean every day (g N): ")] public double AmountAddMeanLoad { get; set; }
        [Description("Means of the original distributions, mu_i load (gN) first and then mu_j volume (L): ")] public double[] VectorOfMeans { get; set; }
        [Description("Covariance matrix - in order of E_ii, E_ij, E_ij, E_jj: ")] public double[] CovarianceMatrix { get; set; }

        // - Outputs from this manager
        [JsonIgnore][Units("g N")] public double[] GeneratedLoad { get; set; } // Array of generated load values
        [JsonIgnore][Units("L")] public double[] GeneratedVolume { get; set; } // Array of generated volume values
        [JsonIgnore][Units("g N")] public double MeanGeneratedLoad { get; set; } // Mean generated load values
        [JsonIgnore][Units("L")] public double MeanGeneratedVolume { get; set; } // Mean of generated volume values

        Random RandomNumGenerator = new Random(10);

        [EventSubscribe("StartOfSimulation")] private void OnSimulationCommencing(object sender, EventArgs e)
        {

        }
        
        [EventSubscribe("DoManagement")] private void OnDoManagement(object sender, EventArgs e)
        {
            // Defines parameters of transformed distribution.
            MeanLoadToGenerate += AmountAddMeanLoad;
            double NormalMeanLoadToGenerate = Math.Log10(MeanLoadToGenerate) - 0.5 * CovarianceMatrix[0];

            double[,] TransformedMu = { { NormalMeanLoadToGenerate },
                                        { VectorOfMeans[1] }};

            double[,] SigmaRows = { { CovarianceMatrix[0], CovarianceMatrix[1] },
                                    { CovarianceMatrix[2], CovarianceMatrix[3] } };

            double[,] SigmaColumns = { { 1} };

            // Converts parameters to MathNet matrices.
            Matrix<double> TransformedMuMatrix = Matrix<double>.Build.DenseOfArray(TransformedMu);
            Matrix<double> SigmaRowsMatrix = Matrix<double>.Build.DenseOfArray(SigmaRows);
            Matrix<double> SigmaColumnsMatrix = Matrix<double>.Build.DenseOfArray(SigmaColumns);

            // Initializes transformed distribution.
            var TransformedMVN = new MatrixNormal(TransformedMuMatrix,
                                                  SigmaRowsMatrix,
                                                  SigmaColumnsMatrix,
                                                  RandomNumGenerator);

            // Generates samples and transforms them back to lognormal space.
            double[] LogNormalLoadSamples = new double[NumRealisations];
            double[] LogNormalVolumeSamples = new double[NumRealisations];

            for (int i = 0; i < NumRealisations; i++)
            {
                Matrix<double> LoadVolumeSample = TransformedMVN.Sample();
                LogNormalLoadSamples[i] = Math.Pow(10.0, LoadVolumeSample[0,0]);
                LogNormalVolumeSamples[i] = Math.Pow(10.0, LoadVolumeSample[1,0]);
            }

            // Updates some script parameters.
            GeneratedLoad = LogNormalLoadSamples;
            GeneratedVolume = LogNormalVolumeSamples;
            MeanGeneratedLoad = LogNormalLoadSamples.Average();
            MeanGeneratedVolume = LogNormalVolumeSamples.Average();
        }

        [EventSubscribe("DoManagementCalculations")] private void OnDoManagementCalculations(object sender, EventArgs e)
        {
        }

    }
}
```
    Report BivariateNormalResults: EventNames=[Clock].EndOfDay
      VariableNames:
        [Clock].Today as Date
        // [BivariateNormal].Script.VectorOfMeans
        // [BivariateNormal].Script.CovarianceMatrix
        //[BivariateNormal].Script.MeanLoadToGenerate
        //[BivariateNormal].Script.MeanGeneratedLoad
        //[BivariateNormal].Script.MeanGeneratedVolume
        //[BivariateNormal].Script.GeneratedLoad
        //[BivariateNormal].Script.GeneratedVolume
