Simulations: Version=67
  DataStore
    ExcelInput: FileName=PatchyMcPatchFace.xlsx; SheetNames=[Sheet1]
    PredictedObserved: PredictedTableName=ReportingWithPatches; ObservedTableName=ReportingWithPatches; FieldNameUsedForMatch=Date
      Tests
  Folder PatchyMcPatchFace
    Simulation ExplicitGrazedPaddock
      Clock: Start=1972-01-01; End=1972-12-31
      Summary SummaryFile
      Manager PatchManager
        CuttingFrequency = 0
        CuttingResidual = 1000
        NutrientReturnType = Constant
        AmountFertNReturned = 40
        AmountDungNReturned = 0
        FertiliserDepth = 200
        FertiliserReturnPattern = RotatingInOrder
        ReportingFreq = OnGrazing
        PatchType = EP
        NumGPPatches = 1
        SystemID = A
```csharp
using Models.Interfaces;
using System.Diagnostics;
using System.Collections.Generic;
using APSIM.Shared.Utilities;
using Models.Surface;
using Models.Soils;
using System.Xml.Serialization;
using Models.AgPasture;
using Models.Zones;
using Models.PMF;
using Models.Soils;
using Models.Core;
using System;

namespace Models
{
    [Serializable]
    [System.Xml.Serialization.XmlInclude(typeof(Model))]
    public class Script : Model
    {
        [Link] private Clock Clock;
        [Link] private Soil soil;
        [Link] private ISummary summary;
        [Link] private Weather Weather;
        [Link] private Sward sward;
        [Link] private Zone myZone;
        public string SoilType;
        public string SimLocation;
        public string SetIrrigation;
        public string GeneralFertType;
        public double GeneralFertAmt;
        public string PastureType;
        public int PatchCount;
        private double iniOrgC;
        private double iniOrgN;
        private double NewArea;
        public  event AddSoilCNPatchDelegate AddSoilCNPatch;
        public  event BiomassRemovedDelegate BiomassRemoved;
        [ScopedLinkByName]
        private SoilNitrogen SoilNitrogen;


        public int DaysSinceCut = 0;
        public int PatchNumForFert = -1;

        private int NumPaddocks = 0; // NumPaddocks is the number of AgPastures and SoilWats etc
        private int NumPatchesForFertiliser = 1;
        private double[] MonthlyFertAmt;
        private double[] FertDepthPlacement;
        private int[] PseudoRandomSeq;
        private int GrazingNumber = -1;
        private bool CutNow = false;

        private bool ReportToday = false;
        private double AmountDungCReturned = 0.0;
        private int nPatchesAdded = 0;
        private int[] PatchToAddTo;
        private string[] PatchNmToAddTo = new string[1];


        [XmlIgnore] public bool grazedToday { get; set; }
        [XmlIgnore] public double Harvested { get; set; }
        [XmlIgnore] public double HarvestedN { get; set; }
        [XmlIgnore] public double UreaReturned  { get; set; }
        [XmlIgnore] public int NumPatches { get; set; }


        [Description("Frequency of cutting (days) (0 will be interpreted as the end of each month)")]
        public int CuttingFrequency { get; set; }

        [Description("Residual pasture mass after cutting (kg DM /ha)")]
        public int CuttingResidual { get; set; }

        [Description("Type of nutrient return - calculated from the amount of herbage harvested or constant")]
        public NutrientReturnTypes NutrientReturnType { get; set; }

        [Description("Amount of fertiliser N to apply to simulation after each cutting (pretend urine) (kgN/ha) (ignored if nutrient return is FromHarvest)")]
        public double AmountFertNReturned { get; set; }

        [Description("Amount of dung N to apply to simulation after each cutting (kgN/ha) (ignored if nutrient return is FromHarvest)")]
        public double AmountDungNReturned { get; set; }

        [Description("Depth band (0 mm to X mm) for fertiliser placement (mm)")]
        public int FertiliserDepth { get; set; }
                        
        [Description("Pattern for fertiliser return")]
        public urineReturnTypes FertiliserReturnPattern { get; set; }

        [Description("Frequency of reporting")]
        public reportingFrequencyTypes ReportingFreq { get; set; }

        [Description("Patch type")]
        public patchTypes PatchType { get; set; }

        [Description("How many patches should there be in the grid? (used to create the grid for GP and the size of the patches for PP)")]
        public int NumGPPatches { get; set; }

        [Description("System identifier")]
        public systemTypes SystemID { get; set; }

        public enum systemTypes
        {
            /// <summary>A</summary>
            A,
            /// <summary>B</summary>
            B,
            /// <summary>C</summary>
            C,
            /// <summary>D</summary>
            D,
            /// <summary>E</summary>
            E,
            /// <summary>F</summary>
            F
        }

        public enum patchTypes
        {
            /// <summary>EP</summary>
            EP,
            /// <summary>EP</summary>
            GP,
            /// <summary>EP</summary>
            PP,
            /// <summary>EP</summary>
            UP
        }

        public enum reportingFrequencyTypes
        {
            /// <summary>Daily</summary>
            Daily,
            /// <summary>Every 10 days</summary>
            TenDaily,
            /// <summary>Monthly</summary>
            Monthly,
            /// <summary>Annual</summary>
            Annual,
            /// <summary>On grazing</summary>
            OnGrazing
        }

        public enum urineReturnTypes
        {
            /// <summary>Uniform</summary>
            UniformAcrossAllPatches,
            /// <summary>Rotating in order</summary>
            RotatingInOrder,
            /// <summary>Random</summary>
            Random,
            /// <summary>Pseudo-random</summary>
            PseudoRandom
        }

        public enum NutrientReturnTypes
        {
            /// <summary>Constant</summary>
            Constant,
            /// <summary>FromHarvest</summary>
            FromHarvest,
            /// <summary>SetMonthly</summary>
            SetMonthly
        }

        private void SetSystemParams()
        {
            if (SystemID == systemTypes.A)
            {
                SoilType = "HE";
                SimLocation = "Rua";
                SetIrrigation = "no";
                GeneralFertType = "NoWinter";
                GeneralFertAmt = 0.0;
                PastureType = "RyeWhite";
            }
            else if (SystemID == systemTypes.B)
            {
                SoilType = "HE";
                SimLocation = "Rua";
                SetIrrigation = "no";
                GeneralFertType = "NoWinter";
                GeneralFertAmt = 150.0;
                PastureType = "RyeWhite";
            }
            else if (SystemID == systemTypes.C)
            {
                SoilType = "VL";
                SimLocation = "Lin";
                SetIrrigation = "yes";
                GeneralFertType = "NoWinter";
                GeneralFertAmt = 0.0;
                PastureType = "RyeWhite";
            }
            else if (SystemID == systemTypes.D)
            {
                SoilType = "VL";
                SimLocation = "Lin";
                SetIrrigation = "yes";
                GeneralFertType = "NoWinter";
                GeneralFertAmt = 250.0;
                PastureType = "RyeWhite";
            }
            else if (SystemID == systemTypes.E)
            {
                SoilType = "VL";
                SimLocation = "Lin";
                SetIrrigation = "yes";
                GeneralFertType = "NoWinter";
                GeneralFertAmt = 400.0;
                PastureType = "GrassOnly";
            }
            else if (SystemID == systemTypes.F)
            {
                SoilType = "VL";
                SimLocation = "Lin";
                SetIrrigation = "no";
                GeneralFertType = "NoWinter";
                GeneralFertAmt = 0.0;
                PastureType = "RyeWhite";
            }
        }

        [EventSubscribe("StartOfSimulation")]
        private void OnStartOfSimulation(object sender, EventArgs e)
        {
            if (PatchType == patchTypes.EP)
                NumPatches = NumPaddocks;
            else if (PatchType == patchTypes.GP)
                NumPatches = NumGPPatches;
            else if (PatchType == patchTypes.PP)
                NumPatches = NumGPPatches; // but will actually use this to set the size of the newly created patches
            else if (PatchType == patchTypes.UP)
                NumPatches = NumGPPatches;
            else
                throw new Exception("Patch type not catered for");

            if ((PatchType == patchTypes.GP) && (NumPaddocks > 1))
                throw new Exception("Patch type GP may only have one paddock/zone");
            if ((PatchType == patchTypes.PP) && (NumPaddocks > 1))
                throw new Exception("Patch type PP may only have one paddock/zone");

            NumPatchesForFertiliser = 1;  // in the future this might be > 1
            if (FertiliserReturnPattern == urineReturnTypes.PseudoRandom)  // generate a return pattern up front
            {
                int MaxNumGrazings = (Clock.EndDate.Year - Clock.StartDate.Year + 1) * 52; //allow for a maximum of 1 per week

                PseudoRandomSeq = new int[MaxNumGrazings * NumPatchesForFertiliser];
                Random rndConstSeed = new Random((int)666);
                string MyString = "";
                for (int i = 0; i < (MaxNumGrazings * NumPatchesForFertiliser); i++)
                {
                    PseudoRandomSeq[i] = rndConstSeed.Next(0, NumPatches);  // will never select NumPatches 
                    MyString += Convert.ToString(PseudoRandomSeq[i]) + " ";
                }

                summary.WriteMessage(this, "The order of patch return will be: " + MyString);
            }

            // Add patches
            if (PatchType == patchTypes.GP)
            {
                SoilNitrogen.MaximumNitrogenAvailableToPlants = 0.45;
                SoilNitrogen.NPartitionApproach = "BasedOnConcentrationAndDelta";
                SoilNitrogen.AllowPatchAutoAmalgamation = "No";
                SoilNitrogen.AutoAmalgamationApproach = "CompareAll";
                SoilNitrogen.basePatchApproach = "IDBased";
                SoilNitrogen.AllowPatchAmalgamationByAge = "No";
                SoilNitrogen.PatchAgeForForcedMerge = 3.0;                                


                int[] PatchToAddTo = new int[1];  //need an array variable for this
                string[] PatchNmToAddTo = new string[1];  
                int nPatchesAdded = 0;
                double NewArea = 1.0 / NumPatches;

                while (nPatchesAdded < NumPatches - 1)
                {
                    AddSoilCNPatchType NewPatch = new AddSoilCNPatchType();
                    NewPatch.DepositionType = "ToNewPatch";
                    NewPatch.AreaFraction = NewArea;
                    PatchToAddTo[0] = 0;
                    PatchNmToAddTo[0] = "0";
                    NewPatch.AffectedPatches_id = PatchToAddTo;
                    NewPatch.AffectedPatches_nm = PatchNmToAddTo;
                    NewPatch.SuppressMessages = "no";

                    AddSoilCNPatch.Invoke(NewPatch);
                    nPatchesAdded += 1;
                }                

                summary.WriteMessage(this, "NumPatches at end of initialisation (GP):" + SoilNitrogen.PatchCount.ToString());
            }
        }


        [EventSubscribe("Commencing")]
        private void OnSimulationCommencing(object sender, EventArgs e)
        {
            summary.WriteMessage(this, "Initialising the Manager for grazing, urine return and reporting");

            grazedToday = false;

            // count the paddocks in the simulation
            NumPaddocks = 0;   
            foreach (Zone zone in Apsim.FindAll(this.Parent, typeof(Zone)))
                NumPaddocks += 1;   
            summary.WriteMessage(this, "There are " + NumPaddocks + " in the simulation");

            MonthlyFertAmt = new double[] { 24, 19, 17, 12, 8, 5, 5, 10, 16, 19, 23, 25 };

            summary.WriteMessage(this, "Finished initialising the Manager for grazing, urine return and reporting");
        }

        [EventSubscribe("DoManagement")]
        private void OnDoManagement(object sender, EventArgs e)
        {    

            // if this is the start of the simulation then sort out the depth for the fertiliser (aka urine) placement
            // can't do this in initialisation because of the module order
            if (Clock.Today == Clock.StartDate)
            {
                FertPlacementDepth();
                int i = -1;  // to use as a patch counter

                iniOrgC = 0.0; 
                iniOrgN = 0.0;
                foreach (Zone zone in Apsim.FindAll(this.Parent, typeof(Zone)))
                {
                    Soil soil = Apsim.Find(zone, typeof(Soil)) as Soil;
                    i += 1;
                    PatchCount = SoilNitrogen.PatchCount;

                    for (int ii = 0; ii <= (soil.Thickness.Length - 1); ii++)
                    {
                        iniOrgC += SoilNitrogen.TotalC[ii] / NumPaddocks; 
                        iniOrgN += SoilNitrogen.organic_n[ii] / NumPaddocks;
                    }
                }
            }

            DaysSinceCut += 1;
            Harvested = 0.0;
            HarvestedN = 0.0;
            UreaReturned = 0.0;

            bool isEndOfMonth = false;
            if (Clock.Today.AddDays(1).Day == 1)
                isEndOfMonth = true;

            bool isEndOfYear = false;
            if (Clock.Today.AddDays(1).DayOfYear == 1)
                isEndOfYear = true;



            CutNow = false;
            grazedToday = false;
            if ((CuttingFrequency == 0) && (isEndOfMonth))
                CutNow = true;
            else if ((DaysSinceCut >= CuttingFrequency) && (CuttingFrequency > 0))
                CutNow = true;

            // should reporting be done today?  Do this here as need to know if grazing will happen
            if (ReportingFreq == reportingFrequencyTypes.Daily)
                ReportToday = true;
            else if ((ReportingFreq == reportingFrequencyTypes.TenDaily) && ((Clock.Today.Day == 10) || (Clock.Today.Day == 20) || (isEndOfMonth)))
                ReportToday = true;
            else if ((ReportingFreq == reportingFrequencyTypes.Monthly) && (isEndOfMonth))
                ReportToday = true;
            else if ((ReportingFreq == reportingFrequencyTypes.Annual) && (isEndOfYear))
                ReportToday = true;
            else if ((ReportingFreq == reportingFrequencyTypes.OnGrazing) && (CutNow))
                ReportToday = true;
            else
                ReportToday = false;

            //if (Clock.Today == Clock.StartDate) CutNow = true;

            if (CutNow)
            {
                //if(Clock.Today.Month < 3) Debugger.Break();

                grazedToday = true;
                summary.WriteMessage(this, "Doing Cutting");
                DaysSinceCut = 0;
                GrazingNumber += 1;  //was initialsed as -1 - this is used to pick the pseudo-random patch return number
                // GetPatchForUrineReturn();  now called in the deposition routine

                // do the cutting=grazing - it doesn't matter if there one (GP) or many (EP) physical paddocks in the simulation at this point
                int i = -1;  // to use as a patch counter
                Harvested = 0.0;
                HarvestedN = 0.0;
                foreach (Zone zone in Apsim.FindAll(this.Parent, typeof(Zone)))
                {
                    i += 1;
                    foreach (AgPasture.Sward sward in Apsim.Children(zone, typeof(AgPasture.Sward)))
                    {        
                        sward.Graze(amount: CuttingResidual, type: "SetResidueAmount");
                        if (PatchType == patchTypes.EP) {
                            Harvested += sward.HarvestedWt;
                            HarvestedN += sward.HarvestedN;
                        } 
                        else 
                        {
                            Harvested += sward.HarvestedWt / NumPaddocks;
                            HarvestedN += sward.HarvestedN / NumPaddocks;
                        }
                    }
                }

                if (NutrientReturnType == NutrientReturnTypes.FromHarvest)
                {
                    AmountFertNReturned = HarvestedN * 0.50;  // TODO yikes - probably should not have hard-coded this, if it is not FromHarvest then the value has been set in the manager parameters
                    AmountDungNReturned = HarvestedN * 0.35;  // 
                    AmountDungCReturned = AmountDungNReturned * 20;
                }
                else if (NutrientReturnType == NutrientReturnTypes.SetMonthly)
                {
                    AmountFertNReturned = MonthlyFertAmt[Clock.Today.Month - 1];
                    AmountDungNReturned = AmountFertNReturned * (0.35 / 0.50);  // 
                    AmountDungCReturned = AmountDungNReturned * 20;
                }
                else
                {
                    // urine and dung are set from the parameters
                    AmountDungCReturned = AmountDungNReturned * 20;
                }


                summary.WriteMessage(this, "The amount of urea fertiliser to be returned to the whole paddock is " + AmountFertNReturned);

                DoUrineReturn();

                //DoTramplingAndDungReturn();

                summary.WriteMessage(this, "Finished Cutting");

            } // this is the end of the CutNow section

            if ((GeneralFertAmt > 0.0) && (Clock.Today.AddDays(1).Day == 1))
            {
                //DoFertiliser();
            }



            summary.WriteMessage(this, "End of DoMgmt");
            //printMinN();
        }

        [EventSubscribe("EndOfDay")]
        private void OnEndOfDay(object sender, EventArgs e)
        {
            summary.WriteMessage(this, "Start of EndOfDay");
            //printMinN();
        }

        public void DoTramplingAndDungReturn()
        {
            int i = -1;  // patch or paddock counter
            foreach (Zone zone in Apsim.FindAll(this.Parent, typeof(Zone)))
            {
                i += 1;
                SoilNitrogen soilN = Apsim.Find(zone, typeof(SoilNitrogen)) as SoilNitrogen;
                SurfaceOrganicMatter surfaceOM = Apsim.Find(zone, typeof(SurfaceOrganicMatter)) as SurfaceOrganicMatter; 

                // do some trampling of litter
                // accelerate the movement of surface litter into the soil - do this before the dung is added
                double temp = surfaceOM.Wt * 0.1;

                TillageType trampling = new TillageType();
                surfaceOM.Incorporate(fraction: (double)0.1, depth: (double)100.0);

                summary.WriteMessage(this, "For patch " + i + " the amount of litter trampled was " + temp + " and the remaining litter is " + (surfaceOM.Wt));

                // move the dung to litter - assume dung is 40% of that harvested and a C:N ratio of 
                BiomassRemovedType dung = new BiomassRemovedType();
                dung.crop_type = "RuminantDung_PastureFed";
                dung.dm_type = new string[] { "RuminantDung_PastureFed" };
                dung.dlt_crop_dm = new float[] { Convert.ToSingle(AmountDungCReturned / 0.4) };  // 
                dung.dlt_dm_n = new float[] { Convert.ToSingle(AmountDungNReturned) };    // 
                dung.dlt_dm_p = new float[] { 0.0F };
                dung.fraction_to_residue = new float[] { 1.0F };
                BiomassRemoved.Invoke(dung);
                summary.WriteMessage(this, "For patch " + i + " the amount of dung DM added to the litter was " + (AmountDungCReturned / 0.4) + " and the amount of N added in the dung was " + (AmountDungNReturned));

            } 
        }
        // this is the end of the trampling and dung patch/paddock section


        public void printMinN()
        {
            List<IModel> zones = Apsim.FindAll(this, typeof(Zone));
            Soil soil = Apsim.Find(zones[0], typeof(Soil)) as Soil; // Only one zone allowed for GP so use the first zone

            for (int ii = 0; ii < (SoilNitrogen.PatchCount); ii++)
            {
                double MinNPatch = SoilNitrogen.PatchTotalUrea[ii] + SoilNitrogen.PatchTotalNH4[ii] + SoilNitrogen.PatchTotalNO3[ii];
                summary.WriteMessage(this, "Patch " + ii + ":" + MinNPatch);
            }

        }

        public void DoUrineReturn()
        {
            if (PatchType == patchTypes.EP)
            {                

                GetPatchForUrineReturn();  //sets the value for PatchNumForFert
                int i = -1; //to count the paddocks
                foreach (Zone zone in Apsim.FindAll(this.Parent, typeof(Zone)))
                {
                    i += 1;
                    if (i == PatchNumForFert)
                    {
                        Fertiliser thisFert = Apsim.Find(zone, typeof(Fertiliser)) as Fertiliser;
                        Soil soil = Apsim.Find(zone, typeof(Soil)) as Soil;

                        double tempDepth = 0.0;
                        for (int ii = 0; ii <= (soil.Thickness.Length - 1); ii++)
                        {
                            tempDepth += soil.Thickness[ii];
                            thisFert.Apply(Amount: (double)(FertDepthPlacement[ii] * NumPatches * AmountFertNReturned), Type: Fertiliser.Types.UreaN, Depth: (tempDepth - soil.Thickness[ii] / 2));
                        }
                        UreaReturned += AmountFertNReturned;
                    }
                } 

            }
            else if (PatchType == patchTypes.GP)
            {
                GetPatchForUrineReturn();  //sets the value for PatchNumForFert
                int[] PatchToAddTo = new int[1];  //because need an array variable for this
                string[] PatchNmToAddTo = new string[0];  //need an array variable for this
                List<IModel> zones = Apsim.FindAll(this, typeof(Zone));
                Soil soil = Apsim.Find(zones[0], typeof(Soil)) as Soil; // Only one zone allowed for GP so use the first
                double[] UreaToAdd = new double[soil.Thickness.Length];  

                for (int ii = 0; ii <= (soil.Thickness.Length - 1); ii++)
                    UreaToAdd[ii] = FertDepthPlacement[ii] * NumPatches * AmountFertNReturned;

                UreaReturned += AmountFertNReturned;


                AddSoilCNPatchType CurrentPatch = new AddSoilCNPatchType();
                CurrentPatch.Sender = "manager";
                CurrentPatch.DepositionType = "ToSpecificPatch";
                PatchToAddTo[0] = PatchNumForFert;
                CurrentPatch.AffectedPatches_id = PatchToAddTo;
                CurrentPatch.AffectedPatches_nm = PatchNmToAddTo;
                CurrentPatch.Urea = UreaToAdd;


                summary.WriteMessage(this, "Patch MinN prior to urine return:");

                //printMinN();
                AddSoilCNPatch.Invoke(CurrentPatch); 
                summary.WriteMessage(this, "Patch MinN after urine return:");
                //printMinN();
            }
            else if (PatchType == patchTypes.PP)
            {
                // create a new patch from base of area 1/NumGPPatches
                // add the fertiliser to that patch
                // set amalgamation autmomatic
                List<IModel> zones = Apsim.FindAll(this, typeof(Zone));
                Soil soil = Apsim.Find(zones[0], typeof(Soil)) as Soil; // Only one zone allowed for GP so use the first

                double[] UreaToAdd = new double[soil.Thickness.Length];  

                for (int ii = 0; ii <= (soil.Thickness.Length - 1); ii++)
                    UreaToAdd[ii] = FertDepthPlacement[ii] * NumPatches * AmountFertNReturned;

                int[] PatchToAddTo = new int[1];
                string[] PatchNmToAddTo = new string[0];  //need an array variable for this

                UreaReturned += AmountFertNReturned;

                AddSoilCNPatchType NewPatch = new AddSoilCNPatchType();
                NewPatch.DepositionType = "ToNewPatch";
                NewPatch.AreaFraction = 1.0 / NumPatches;
                PatchToAddTo[0] = 0;
                NewPatch.AffectedPatches_id = PatchToAddTo;
                NewPatch.AffectedPatches_nm = PatchNmToAddTo;
                NewPatch.Urea = UreaToAdd;

                summary.WriteMessage(this, "UreaToAdd " + UreaToAdd[0] + " " + UreaToAdd[1] + " " + UreaToAdd[2] + " " + UreaToAdd[3] + " " + UreaToAdd[4]);


                AddSoilCNPatch.Invoke(NewPatch);

                //throw new Exception("Have not set up the PP for DoUrineReturn yet");
            }
            else if (PatchType == patchTypes.UP)
            {
                int i = -1;  // patch or paddock counter
                foreach (Zone zone in Apsim.FindAll(this.Parent, typeof(Zone)))
                {
                    i += 1;

                    Fertiliser thisFert = Apsim.Find(zone, typeof(Fertiliser)) as Fertiliser;
                    Soil soil = Apsim.Find(zone, typeof(Soil)) as Soil;

                    double tempDepth = 0.0;
                    for (int ii = 0; ii <= (soil.Thickness.Length - 1); ii++)
                    {
                        tempDepth += soil.Thickness[ii];
                        thisFert.Apply(Amount: (double)(FertDepthPlacement[ii] * AmountFertNReturned), Type: Fertiliser.Types.UreaN, Depth: (tempDepth - soil.Thickness[ii] / 2));
                    } 
                    UreaReturned += AmountFertNReturned;
                }
            }
            else
                throw new Exception("Patch type not catered for");



        }
        // end of DoUrineReturn

        public void GetPatchForUrineReturn()
        {
            
            if (FertiliserReturnPattern == urineReturnTypes.UniformAcrossAllPatches)
                PatchNumForFert = 0;  // but will not be used
            else if (FertiliserReturnPattern == urineReturnTypes.RotatingInOrder)
            {
                PatchNumForFert += 1;  //increment the patch number
                if (PatchNumForFert >= NumPatches)
                    PatchNumForFert = 0;  // but reset back to the first patch if needed
                //summary.WriteMessage(this, "The patch for fertiliser return is " + PatchNumForFert);
            }
            else if (FertiliserReturnPattern == urineReturnTypes.Random)
            {
                Random rnd = new Random();
                PatchNumForFert = rnd.Next(0, NumPatches);
                //summary.WriteMessage(this, "The next random number patch for fertiliser return is " + PatchNumForFert);
            }
            else if (FertiliserReturnPattern == urineReturnTypes.PseudoRandom)
            {
                PatchNumForFert = PseudoRandomSeq[GrazingNumber];
                //summary.WriteMessage(this, "The next pseudo-random number patch for fertiliser return is " + PatchNumForFert);
            }
        }
        // this is the end of GetPatchForUrineReturn


        public void FertPlacementDepth()
        {
            // note that this only looks at the first paddock and assumes that all the paddocks are the same
            int iii = -1;  // to use as a patch counter
            foreach (Zone zone in Apsim.FindAll(this.Parent, typeof(Zone)))
            {
                iii += 1;
                if (iii == 0)
                {
                    Soil soil = Apsim.Find(zone, typeof(Soil)) as Soil;
                    double tempDepth = 0.0;
                    FertDepthPlacement = new double[soil.Thickness.Length];
                    for (int i = 0; i <= (soil.Thickness.Length - 1); i++)
                    {
                        tempDepth += soil.Thickness[i];
                        if (tempDepth <= FertiliserDepth)
                        {
                            FertDepthPlacement[i] = soil.Thickness[i] / FertiliserDepth;
                        }
                        else
                        {
                            FertDepthPlacement[i] = (FertiliserDepth - (tempDepth - soil.Thickness[i])) / (tempDepth - (tempDepth - soil.Thickness[i])) * soil.Thickness[i] / FertiliserDepth;
                            FertDepthPlacement[i] = Math.Max(0.0, Math.Min(1.0, FertDepthPlacement[i]));
                        }
                        //if (FertiliserReturnPattern == "UniformAcrossAllPatches")
                        //   summary.WriteMessage(this, "The proportion of fertiliser applied to the " + i + "th layer will be " + FertDepthPlacement[i]);
                        //else
                        summary.WriteMessage(this, "The proportion of fertiliser (* NumPatches) applied to the " + i + "th layer will be " + FertDepthPlacement[i]);
                    }
                }
            }

        }
        // this is the end of FertPlacementDepth


        public void DoFertiliser()
        {
            bool ApplyFert = true; // the test for first day of the month has already been done
            double NumMonths = 0;

            if (GeneralFertType == "Monthly")
                NumMonths = 12;
            else if (GeneralFertType == "NoWinter")
            {
                if ((Clock.Today.Month < 5) || (Clock.Today.Month > 7))
                {
                    ApplyFert = true;
                    NumMonths = 9;
                }
            }
            else
                throw new Exception("Wrong general fertiliser setting");

            if (ApplyFert)
            {
                foreach (Zone zone in Apsim.FindAll(this.Parent, typeof(Zone)))  // but actually there will only be a single paddock
                {
                    Fertiliser thisFert = Apsim.Find(zone, typeof(Fertiliser)) as Fertiliser;

                    //thisFert.Apply((float)(GeneralFertAmt / NumMonths), (float) (0.0), "urea_n");
                    thisFert.Apply(Amount: (double)(GeneralFertAmt / NumMonths), Type: Fertiliser.Types.UreaN, Depth: FertiliserDepth);
                    summary.WriteMessage(this, "Applying " + (GeneralFertAmt / NumMonths) + " kg of general fertiliser");
                }

            }
        }
    }
}
```
      Manager ReportingWithPatchesVariables
        verbose = False
        InputModule = PatchManager
        OutputModule = ReportingWithPatches
        ReportingFreq = Daily
```csharp
using Models.Interfaces;
using System;
using Models.Core;
using Models.Soils;
using Models.PMF;
using Models.Zones;
using Models.AgPasture;
using System.Xml.Serialization;
using Models.Soils;
using Models.Surface;
using APSIM.Shared.Utilities;
using System.Collections.Generic;
using System.Diagnostics;
using System;
using Models.Interfaces;


namespace Models
{
    [Serializable]
    [System.Xml.Serialization.XmlInclude(typeof(Model))]
    public class Script : Model
    {
        [Link] private Clock Clock;
        [Link] private Simulation Simulation;
        [Link] private Soil soil;
        [Link] private ISummary summary;
        [Link] private Weather Weather;
        [Link] private Zone zone;
        [Link] private Sward sward;
        public int PatchCount;
        public int PaddockCount;
        public double Grazed;
        public double GrazedN;
        public double UrineNReturned;
        private double iniOrgC;
        private double iniOrgN;
        private double myVariable;
        [ScopedLinkByName]
        private ISolute NO3;
        [ScopedLinkByName]
        private ISolute NH4;
        [ScopedLinkByName]
        private ISolute Urea;
        [ScopedLinkByName]
        private SoilNitrogen SoilNitrogen;

        private Zone[] Zones {get; set; }

        private Models.Report.Report ReportingWithPatches;

        [Description("Verbose reporting mode (True/False)")]
        public bool verbose { get; set; }

        [Description("Name of the patch manager for input")]
        public string InputModule { get; set; }

        [Description("Name of the report for output")]
        public string OutputModule { get; set; }

        [Description("Frequency of reporting")]
        public reportingFrequencyTypes ReportingFreq { get; set; }

        [XmlIgnore] public int DaysSinceReport { get; set; }
        [XmlIgnore] public double NHA { get; set; }
        [XmlIgnore] public double PGR { get; set; }
        [XmlIgnore] public double HerbageGrazed { get; set; }
        [XmlIgnore] public double HerbageGrazedN { get; set; }
        [XmlIgnore] public double AreaUrinePatchesToday { get; set; }
        [XmlIgnore] public double UreaReturned { get; set; }
        [XmlIgnore] public double Fixation { get; set; }
        [XmlIgnore] public double LeachN { get; set; }
        [XmlIgnore] public double Denit { get; set; }
        [XmlIgnore] public double DenitN2O { get; set; }
        [XmlIgnore] public double OrgC { get; set; }
        [XmlIgnore] public double OrgN { get; set; }
        [XmlIgnore] public double dltOrgC { get; set; }
        [XmlIgnore] public double dltOrgN { get; set; }
        [XmlIgnore] public double MinN { get; set; }
        [XmlIgnore] public double UreaN { get; set; }
        [XmlIgnore] public double NH4N { get; set; }
        [XmlIgnore] public double NO3N { get; set; }
        [XmlIgnore] public double UreaAddedInGrazing { get; set; }

        [XmlIgnore] public double[] MinNPatch { get; set; }




        private bool ReportToday = false;      

        public enum reportingFrequencyTypes
        {
            /// <summary>Daily</summary>
            Daily,
            /// <summary>Every 10 days</summary>
            TenDaily,
            /// <summary>Monthly</summary>
            Monthly,
            /// <summary>Annual</summary>
            Annual,
            /// <summary>On grazing</summary>
            OnGrazing
        }

    

        [EventSubscribe("StartOfSimulation")]
        private void OnStartOfSimulation(object sender, EventArgs e)
        {

               if (verbose)
                summary.WriteMessage(this, "Initialising the Manager for grazing, urine return and reporting");
            DaysSinceReport = 0;
            PatchCount = SoilNitrogen.PatchCount;
            PaddockCount=0;



            // Get list of zones in the simulation
            List<Zone> zones = new List<Zone>();

            foreach (Zone zone in Apsim.FindAll(this.Parent, typeof(Zone)))
            {
                zones.Add(zone as Zone);
                ReportingWithPatches = (Models.Report.Report)zone.Get("[" + OutputModule+ "]");
                PaddockCount++;
            }
            Zones = zones.ToArray();


            //myVariable = (double)ManageGriddedPaddock.Get("Script.Var1");
            //double grazedN = ManageGriddedPaddock.Get("Script.grazedN");

            if (verbose)
                summary.WriteMessage(this, "Finished initialising the Manager for grazing, urine return and reporting");
        }


        [EventSubscribe("DoDailyInitialisation")]
        private void OnDoDailyInitialisation(object sender, EventArgs e)
        {    
                    
            if (verbose)
                summary.WriteMessage(this, "In Daily Initialisation for the Reporting Manager on " + Clock.Today);
            if(Clock.Today == Clock.StartDate) {

                iniOrgC = 0.0; 
                iniOrgN = 0.0;            

                foreach (Zone zone in Zones)
                {
                    SoilNitrogen soilN = Apsim.Find(zone, typeof(SoilNitrogen)) as SoilNitrogen;
                    for (int ii = 0; ii < soil.Thickness.Length; ii++)
                    {
                        iniOrgC += soilN.TotalC[ii]; // TODO RJM Check this is right!
                        iniOrgN += soilN.organic_n[ii];
                    }
                }
            }        


        }

            
        [EventSubscribe("DoManagement")]
        private void DoManagement(object sender, EventArgs e)
        {
               bool isEndOfMonth = false;
            if (Clock.Today.AddDays(1).Day == 1) 
                isEndOfMonth = true;
            

            bool isEndOfYear = false;
            if (Clock.Today.Day == 31 && Clock.Today.Month == 12)
                isEndOfYear = true;


            bool GrazedToday = (bool) Apsim.Get(Simulation, InputModule + ".Script.grazedToday"); 

            // should reporting be done today?  
            if (ReportingFreq == reportingFrequencyTypes.Daily)
                ReportToday = true;
            else if ((ReportingFreq == reportingFrequencyTypes.TenDaily) && ((Clock.Today.Day == 10) || (Clock.Today.Day == 20) || (isEndOfMonth)))
                ReportToday = true;
            else if ((ReportingFreq == reportingFrequencyTypes.Monthly) && (isEndOfMonth))
                ReportToday = true;
            else if ((ReportingFreq == reportingFrequencyTypes.Annual) && (isEndOfYear))
                ReportToday = true;
            else if ((ReportingFreq == reportingFrequencyTypes.OnGrazing) && (GrazedToday))
                ReportToday = true;
            else
                ReportToday = false;
            if (verbose)
                summary.WriteMessage(this, "Finished Prepare for the Reporting Manager on " + Clock.Today);
        } 

        [EventSubscribe("EndOfDay")]
        private void OnEndOfDay(object sender, EventArgs e)
        {
            if (verbose)
                summary.WriteMessage(this, "In EndOfDay for the Reporting Manager on  " + Clock.Today);

            DaysSinceReport += 1;



            foreach (Zone zone in Zones)
            {

                Sward sward = Apsim.Find(zone, typeof(Sward)) as Sward;
                NHA += sward.HerbageGrowthWt/PaddockCount;
                PGR = NHA;  // divide this by the number of days just before reporting
                 Fixation += sward.FixedN/PaddockCount;

                Soil soil = Apsim.Find(zone, typeof(Soil)) as Soil;
                LeachN += soil.SoilWater.FlowNO3[soil.SoilWater.FlowNO3.Length-1]/PaddockCount;  // only take the deepest element

                for (int ii = 0; ii <= (soil.Thickness.Length - 1); ii++)
                {
                    Denit += SoilNitrogen.Denitrification[ii]/PaddockCount;
                    DenitN2O += SoilNitrogen.n2o_atm[ii]/PaddockCount;
                }


                Grazed = (double)zone.Get("[" + InputModule + "].Script.Harvested")/PaddockCount;
                GrazedN = (double)zone.Get("[" + InputModule + "].Script.HarvestedN")/PaddockCount;
                UrineNReturned = (double)zone.Get("[" + InputModule + "].Script.UreaReturned")/PaddockCount;
                //AreaUrinePatchesToday = (double)zone.Get("[" + InputModule + "].Script.areaUrinePatchesToday");
            } 

            HerbageGrazed += Grazed;
            HerbageGrazedN += GrazedN;
            UreaReturned += UrineNReturned;

            if(ReportToday) {

                OrgC = 0.0;
                OrgN = 0.0;
                UreaN = 0.0;
                NH4N = 0.0;
                NO3N = 0.0;
                MinN = 0.0;


                Soil soil1 = Apsim.Find(Zones[0], typeof(Soil)) as Soil;

                if(PaddockCount>1)
                    MinNPatch = new double[PaddockCount];
                else 
                    MinNPatch = new double[SoilNitrogen.PatchCount];


                int currentZoneNum = 0;
                foreach (Zone zone in Zones)
                {
                    Soil soil = Apsim.Find(zone, typeof(Soil)) as Soil;
                    Sward sward = Apsim.Find(zone, typeof(Sward)) as Sward;

                    double minNPatch = 0;

                    for (int ii = 0; ii <= (soil.Thickness.Length - 1); ii++)
                    {
                        OrgC += SoilNitrogen.TotalC[ii]/PaddockCount;  
                        OrgN += SoilNitrogen.organic_n[ii]/PaddockCount;
                        UreaN += Urea.kgha[ii]/PaddockCount;
                        NH4N += NH4.kgha[ii]/PaddockCount;
                        NO3N += NO3.kgha[ii]/PaddockCount;
                        MinN = UreaN + NH4N + NO3N;                    
                        minNPatch += Urea.kgha[ii] + NH4.kgha[ii] + NO3.kgha[ii];
                    }


                    //MinN = (UreaN*PaddockCount + NH4N*PaddockCount + NO3N*PaddockCount);
                    if(PaddockCount>1) MinNPatch[currentZoneNum] = minNPatch;

                    dltOrgC = OrgC - iniOrgC; 
                    dltOrgN = OrgN - iniOrgN;
                    iniOrgC = OrgC; // ready for the next calculation of change in pools
                    iniOrgN = OrgN;
                    currentZoneNum++;
                }

                if(SoilNitrogen.PatchCount>1) {  // TODO will break if there is more than one paddock/zone AND more than one patch                    

                    for (int ii = 0; ii < (SoilNitrogen.PatchCount); ii++)
                    {
                        MinNPatch[ii] = SoilNitrogen.PatchTotalUrea[ii]+SoilNitrogen.PatchTotalNH4[ii] + SoilNitrogen.PatchTotalNO3[ii];
                    }
                }

                PGR = NHA / DaysSinceReport; 

                ReportingWithPatches.DoOutput();

                // now zero the reported variables
                DaysSinceReport = 0;
                HerbageGrazed = 0.0;
                HerbageGrazedN = 0.0;
                DaysSinceReport = 0;
                NHA = 0;
                PGR = 0;
                UreaReturned = 0;
                Fixation = 0;
                LeachN = 0;
                Denit = 0;
                DenitN2O = 0;
                OrgC = 0;
                OrgN = 0;
                MinN = 0;
                UreaN = 0;
                NH4N = 0;
                NO3N = 0;
            }
        }
    }
}
```
      Report ReportingWithPatches
        VariableNames:
          Parent.Name as Zone
          [Clock].Today as Date
          [Clock].Today.Month as Month
          [Clock].Today.Year as Year
          [ReportingWithPatchesVariables]Script.UreaReturned as UrineNReturned
          [ReportingWithPatchesVariables]Script.NHA as NHA
          [PatchManager]Script.NumPatches as NumPatches
          [PatchManager]Script.ListOfPatches as ListOfPatches
          [ReportingWithPatchesVariables]Script.AreaUrinePatchesToday as AreaUrinePatchesToday
          [ReportingWithPatchesVariables]Script.HerbageGrazed as HerbageGrazed
          [ReportingWithPatchesVariables]Script.HerbageGrazedN as HerbageGrazedN
          [ReportingWithPatchesVariables]Script.LeachN as LeachN
          [ReportingWithPatchesVariables]Script.Denit as Denit
          [ReportingWithPatchesVariables]Script.Fixation as Fixation
          [ReportingWithPatchesVariables]Script.MinN as MinN
          [ReportingWithPatchesVariables]Script.UreaN as UreaN
          [ReportingWithPatchesVariables]Script.NH4N as NH4N
          [ReportingWithPatchesVariables]Script.NO3N as NO3N
          [ReportingWithPatchesVariables]Script.dltOrgC as dltOrgC
          [ReportingWithPatchesVariables]Script.dltOrgN as dltOrgN
      Weather: FileName=%root%\Examples\WeatherFiles\lincoln.met
      SoilArbitrator Soil Arbitrator
      Folder Paddocks
        Zone P1: Area=1; Slope=0
          Manager CentrePivot
            allowIrrigation = yes
            IrrigStart = 1-sep
            IrrigEnd = 30-apr
            SoilDepth = 500
            CritPAWForShallow = 60
            CritRainToPause = 30
            DaysToPauseOnCritRain = 3
            IrrigReturnShallow = 2
            IrrigAmtShallow = 10
            PercPAWIrrigDeficitShallow = 30
            IrrigEffShallow = 100
            IrrigReturnDeep = 4
            IrrigAmtDeep = 20
            PercPAWIrrigDeficitDeep = 25
            IrrigEffDeep = 100
            TodayDeficit = 123.894
            TodayDeficit_nve = -123.894
            IrrigDay = 3
            SoilPAW = 63.65
            IrrigDeficit = 25
            IrrigReturn = 4
            IrrigAmt = 20
            IrrigEff = 100
            Rain3 = 0
            Days2Pause = -80
```csharp
using System;
using Models.Core;
using Models.PMF;
using Models.Soils;
using System.Xml.Serialization;
using Models.PMF;
using APSIM.Shared.Utilities;
using System.Diagnostics; // used with Debugger.Break(); to debug manager scripts
        
namespace Models
{
    [Serializable] 
    [System.Xml.Serialization.XmlInclude(typeof(Model))]
    public class Script : Model
    {
        //Communication to other modules
        [Link] ISummary summary = null;
        [Link] Irrigation irrigation;
        [Link] Clock Clock;
        [Link] Soil soil;
        [Link] Weather Met; 
        [Link(IsOptional = true)] IPlant existingCrop;
       
        //User inputs from properties tab
        [Description("Turn irrigation on?")]
        public answerTypes allowIrrigation { get; set; }
        [Description("Start of irrigation season (dd-MMM)")]
        public string IrrigStart { get; set; }
        [Description("End of irrigation season (dd-MMM)")]
        public string IrrigEnd { get; set; }
        [Description("Enter the depth to which water deficit is computed (mm)")]
        public double SoilDepth { get; set; }
        [Description("PAW below which soil is considered 'shallow' (mm)")]
        public double CritPAWForShallow { get; set; }
        [Description("Amount of rainfall over the last 3 days to cause pause to irrigator (mm)")]
        public double CritRainToPause { get; set; }
        [Description("Number of days to pause irrigator after critical rainfall (days)")]
        public double DaysToPauseOnCritRain { get; set; }

        [Description("Shallow Soils: Irrigation return period (days)")]
        public double IrrigReturnShallow { get; set; }
        [Description("Shallow Soils: Effective irrigation amount (mm)")]
        public double IrrigAmtShallow { get; set; }
        [Description("Shallow Soils: Percentage of PAW at which to irrigate (%)")]
        public double PercPAWIrrigDeficitShallow { get; set; }
        [Description("Shallow Soils: Irrigation efficiency (%)")]
        public double IrrigEffShallow { get; set; }

        [Description("Deep Soils: Irrigation return period (days)")]
        public double IrrigReturnDeep { get; set; }
        [Description("Deep Soils: Effective irrigation amount (mm)")]
        public double IrrigAmtDeep { get; set; }
        [Description("Deep Soils: Percentage of PAW at which to irrigate (%)")]
        public double PercPAWIrrigDeficitDeep { get; set; }
        [Description("Deep Soils: Irrigation efficiency (%)")]
        public double IrrigEffDeep { get; set; }

        // Outputs
        public double TodayDeficit { get; set; }
        public double TodayDeficit_nve { get; set; }
        public double IrrigDay { get; set; }
        public double SoilPAW { get; set; }
        public double IrrigDeficit { get; set; }
        public double IrrigReturn { get; set; }
        public double IrrigAmt { get; set; }
        public double IrrigEff { get; set; }
        public double Rain3 { get; set; }

        public double Days2Pause { get; set; }

        // internal use
        private DateTime StartDate;               //The date when irrigation start (in date format)
        private DateTime EndDate;                 //The date when irrigation finish (in date format)
        private double RainToday=0;
        public double[] Rain_3;

        public enum answerTypes
        {
            /// <summary>a positive answer</summary>
            yes,
            /// <summary>a negative answer</summary>
            no
        }


        [EventSubscribe("StartOfSimulation")]
        private void OnStartOfSimulation(object sender, EventArgs e)
        {
            summary.WriteMessage(this, "==================================================");
            summary.WriteMessage(this, "                CentrePivot initialising          ");
            summary.WriteMessage(this, "");

            IrrigDay = 5000;  //so will reset to 1 on first day
              StartDate = DateTime.Parse(IrrigStart);
              EndDate = DateTime.Parse(IrrigEnd);

            Rain3 = 0;
            Rain_3 = new double[4];
            Rain_3[0] = 0;
            Rain_3[1] = 0;
            Rain_3[2] = 0;

              SoilPAW = 0.0;

              double[] sw_dul = soil.DULmm;
              double[] sw_15 = soil.LL15mm;  
              double MySoilDepth = 0;
              for(int z=0;z<soil.Thickness.Length;z++) {
                  MySoilDepth+=soil.Thickness[z];
                  if (MySoilDepth<= SoilDepth) 
                      SoilPAW+=sw_dul[z] - sw_15[z];    
              }

              if(SoilPAW <= CritPAWForShallow) {      
                IrrigDeficit = PercPAWIrrigDeficitShallow / 100 * SoilPAW;
                IrrigReturn = IrrigReturnShallow;
                IrrigAmt = IrrigAmtShallow;
                IrrigEff = IrrigEffShallow ;           
                summary.WriteMessage(this, "  Soil is considered to be shallow " + CritPAWForShallow + " " + SoilPAW);
            } 
            else 
            {
                IrrigDeficit = PercPAWIrrigDeficitDeep;
                IrrigReturn = IrrigReturnDeep;
                IrrigAmt = IrrigAmtDeep;
                IrrigEff = IrrigEffDeep;
                summary.WriteMessage(this, "  Soil is considered to be deep");
            }

            summary.WriteMessage(this, "  Irrigation critical deficit (mm): " + IrrigDeficit);
            summary.WriteMessage(this, "          Irrigation return (days): " + IrrigReturn);
            summary.WriteMessage(this, "     Irrigation pumped amount (mm): " + IrrigAmt);
            summary.WriteMessage(this, "         Irrigation efficiency (%): " + IrrigEff);
            summary.WriteMessage(this, "");
            summary.WriteMessage(this, "                CentrePivot initialised");
            summary.WriteMessage(this, "==================================================");
            
        }

        [EventSubscribe("Commencing")]
        private void OnSimulationCommencing(object sender, EventArgs e)
        {
        }

       [EventSubscribe("PreparingNewWeatherData")]
        private void OnPreparingNewWeatherData(object sender, EventArgs e)
        {
            RainToday = Met.Rain; //takes note of how much rain was due to fall today        
        }

        //[EventSubscribe("DoDailyInitialisation")]
        //private void OnDoDailyInitialisation(object sender, EventArgs e) 
        //{
        //}

        [EventSubscribe("StartOfDay")]
        private void OnStartOfDay(object sender, EventArgs e)
        {
            int rain=0;

            Rain_3[2] = Rain_3[1];
            Rain_3[1] = Rain_3[0];
            Rain_3[0] = RainToday;
            Rain3 = Rain_3[0] + Rain_3[1] + Rain_3[2]; //sums the rain in the last 3 days
            if(Rain3 >= CritRainToPause)
                Days2Pause = DaysToPauseOnCritRain;
            else
                Days2Pause = Days2Pause - 1;

            double[] sw_dul = soil.DULmm;
            double[] sw_sw = soil.Thickness;  // ??? was MySwim.sw_dep
              double[] sw_15 = soil.LL15mm;  
              double MySoilDepth = 0;

            TodayDeficit = 0.0;
            SoilPAW = 0.0;

              for(int z=0;z<soil.Thickness.Length;z++) {
                  MySoilDepth+=soil.Thickness[z];
                  if (MySoilDepth<= SoilDepth) {
                      SoilPAW+=sw_dul[z] - sw_15[z];    
                      TodayDeficit += sw_dul[z] - Math.Min(sw_dul[z], sw_sw[z]);
                  }
              }
            TodayDeficit_nve = -1 * TodayDeficit;

            if (isBetween(Clock.Today, StartDate, EndDate)) {
                 if(SoilPAW <= CritPAWForShallow) {      
                    IrrigDeficit = PercPAWIrrigDeficitShallow / 100 * SoilPAW;
                    IrrigReturn = IrrigReturnShallow;
                    IrrigAmt = IrrigAmtShallow;
                    IrrigEff = IrrigEffShallow ;           
                } 
                else 
                {
                    IrrigDeficit = PercPAWIrrigDeficitDeep;
                    IrrigReturn = IrrigReturnDeep;
                    IrrigAmt = IrrigAmtDeep;
                    IrrigEff = IrrigEffDeep;
                }

                if(Days2Pause < 0.5) {
                    IrrigDay = IrrigDay + 1;
                    if(IrrigDay > IrrigReturn)
                        IrrigDay = 1;  // and day = 1 is when the irrigation happens                    

                    if ((TodayDeficit >= IrrigDeficit) && (allowIrrigation == answerTypes.yes)) {
                        if(IrrigDay == 1){
                            double AmountToApply = (IrrigAmt / (IrrigEff / 100.0));
                            //summary.WriteMessage(this, "Rain today was " + RainToday + ". Applying " + AmountToApply+ " mm of irrigation");
                            irrigation.Apply(AmountToApply);

                        }
                    }
                }
            }
        }

        ///Checks whether theDate is between iniDate and endDate (non-year specific)
        private bool isBetween(DateTime theDay, DateTime iniDate, DateTime endDate)
        {
            bool result = false;
            if (iniDate.DayOfYear < endDate.DayOfYear)
            {
                // period is within one year, ex: summer in the northern hemisphere
                if ((theDay.DayOfYear >= iniDate.DayOfYear) && (theDay.DayOfYear <= endDate.DayOfYear))
                    result = true;
            }
            else
            {
                // period goes over the end of the year, ex: summer in the southern hemisphere
                if ((theDay.DayOfYear >= iniDate.DayOfYear) || (theDay.DayOfYear <= endDate.DayOfYear))
                    result = true;
            }
            
            return result;
        }

    }
}
```
          SurfaceOrganicMatter: InitialResidueName=grass; InitialResidueType=grass; InitialResidueMass=500; InitialStandingFraction=0; InitialCPR=0; InitialCNR=15; FractionFaecesAdded=0.5
          MicroClimate: a_interception=0; b_interception=1; c_interception=0; d_interception=0; soil_albedo=0.23; SoilHeatFluxFraction=0.4; NightInterceptionFraction=0.5; ReferenceHeight=2
          Irrigation
          Fertiliser
          Report: EventNames=[Clock].EndOfDay
            VariableNames:
              [Clock].Today as Date
              (sum([Soil].SoilNitrogen.Urea.kgha) + sum([Soil].SoilNitrogen.NH4.kgha) + sum([Soil].SoilNitrogen.NO3.kgha)) as minNPaddock
              [Sward].HerbageGrowthWt
          Sward: ControlledBySward=0; WaterUptakeSource=species; NUptakeSource=species
            PastureSpecies Ryegrass: MaximumNUptake=10; Albedo=0.26; Gsmax=0.011; R50=200; InitialShootDM=750; InitialRootDM=450; InitialRootDepth=750; ReferencePhotosyntheticRate=1; LightExtinctionCoefficient=0.5; GrowthTminimum=1; GrowthToptimum=20; GrowthTEffectExponent=1.7; HeatOnsetTemperature=28; HeatFullTemperature=35; HeatRecoverySumDD=30; HeatRecoveryTReference=25; ColdOnsetTemperature=1; ColdFullTemperature=-5; ColdRecoverySumDD=25; MaintenanceRespirationCoefficient=0.03; GrowthRespirationCoefficient=0.25; RespirationTReference=20; RespirationExponent=1.5; NThresholdsForLeaves=[0.04, 0.012, 0.05]; NThresholdsForStems=[0.02, 0.006, 0.025]; NThresholdsForStolons=[0, 0, 0]; NThresholdsForRoots=[0.02, 0.006, 0.025]; DegreesDayForGermination=125; TargetShootRootRatio=4; MaxRootAllocation=0.25; ShootRootGlfFactor=0.5; ReproSeasonReferenceLatitude=41; ReproSeasonTimingCoeff=0.14; ReproSeasonMaxAllocationIncrease=0.5; ReproSeasonAllocationCoeff=0.1; FractionLeafMaximum=0.7; FractionLeafMinimum=0.7; FractionLeafDMThreshold=500; FractionLeafDMFactor=2000; FractionLeafExponent=3; SpecificLeafArea=25; SpecificRootLength=100; ShootMaxEffectOnLAI=1000; MaxStemEffectOnLAI=1; LiveLeavesPerTiller=3; TissueTurnoverRateShoot=0.05; TissueTurnoverRateRoot=0.02; DetachmentRateShoot=0.08; TurnoverTemperatureMin=2; TurnoverTemperatureRef=20; TurnoverTemperatureExponent=1; TurnoverDroughtEffectMax=1; TurnoverDroughtThreshold=0.5; TurnoverDefoliationCoefficient=0.5; TurnoverDefoliationRootEffect=0.1; FractionNLuxuryRemobilisable=[0.1, 0.1, 0.1]; SoilSaturationEffectMax=0.1; MinimumWaterFreePorosity=-1; SoilSaturationRecoveryFactor=0.25; NDillutionCoefficient=0.25; GlfGeneric=1; GlfSoilFertility=1; PlantHeightMinimum=25; PlantHeightMaximum=600; PlantHeightMassForMax=10000; PlantHeightExponent=2.8; RootDepthMinimum=50; RootDepthMaximum=750; RootElongationRate=25; RootDistributionDepthParam=90; RootDistributionExponent=3.2; DigestibilitiesCellWall=[0.6, 0.6, 0.6, 0.2]; MinimumGreenWt=100; PreferenceForGreenOverDead=1; PreferenceForLeafOverStems=1
              zero: SpeciesFamily, PhotosyntheticPathway, UseHeatStressFactor, UseColdStressFactor, ColdRecoveryTReference, UseReproSeasonFactor, FractionToStolon, StolonEffectOnLAI, MinimumNFixation, MaximumNFixation, FractionStolonStanding, WaterAvailableMethod, NitrogenAvailableMethod
              PastureAboveGroundOrgan Leaves
                GenericTissue LeafCohort1
                GenericTissue LeafCohort2
                GenericTissue LeafCohort3
                GenericTissue Dead
              PastureAboveGroundOrgan Stems
                GenericTissue LeafCohort1
                GenericTissue LeafCohort2
                GenericTissue LeafCohort3
                GenericTissue Dead
              PastureAboveGroundOrgan Stolons
                GenericTissue LeafCohort1
                GenericTissue LeafCohort2
                GenericTissue LeafCohort3
                GenericTissue Dead
            PastureSpecies WhiteClover: MaximumNUptake=10; Albedo=0.26; Gsmax=0.011; R50=200; SpeciesFamily=1; PhotosyntheticPathway=0; InitialShootDM=250; InitialRootDM=150; InitialRootDepth=350; ReferencePhotosyntheticRate=1; LightExtinctionCoefficient=0.8; GrowthTminimum=2; GrowthToptimum=22; GrowthTEffectExponent=1.7; UseHeatStressFactor=0; HeatOnsetTemperature=30; HeatFullTemperature=36; HeatRecoverySumDD=20; HeatRecoveryTReference=25; UseColdStressFactor=0; ColdOnsetTemperature=2; ColdFullTemperature=-5; ColdRecoverySumDD=30; ColdRecoveryTReference=0; MaintenanceRespirationCoefficient=0.04; GrowthRespirationCoefficient=0.25; RespirationTReference=20; RespirationExponent=1.5; NThresholdsForLeaves=[0.045, 0.02, 0.055]; NThresholdsForStems=[0.0225, 0.01, 0.0275]; NThresholdsForStolons=[0.0225, 0.01, 0.0275]; NThresholdsForRoots=[0.0225, 0.01, 0.0275]; DegreesDayForGermination=125; TargetShootRootRatio=4; MaxRootAllocation=0.25; ShootRootGlfFactor=0.5; UseReproSeasonFactor=0; ReproSeasonReferenceLatitude=41; ReproSeasonTimingCoeff=0.14; ReproSeasonMaxAllocationIncrease=0.5; ReproSeasonAllocationCoeff=0.1; FractionLeafMaximum=0.56; FractionLeafMinimum=0.28; FractionLeafDMThreshold=500; FractionLeafDMFactor=2000; FractionLeafExponent=3; FractionToStolon=0.2; SpecificLeafArea=30; SpecificRootLength=45; StolonEffectOnLAI=0.3; ShootMaxEffectOnLAI=500; MaxStemEffectOnLAI=0.5; LiveLeavesPerTiller=3; TissueTurnoverRateShoot=0.05; TissueTurnoverRateRoot=0.02; DetachmentRateShoot=0.11; TurnoverTemperatureMin=2; TurnoverTemperatureRef=20; TurnoverTemperatureExponent=1; TurnoverDroughtEffectMax=1; TurnoverDroughtThreshold=0.5; TurnoverDefoliationCoefficient=0.5; TurnoverDefoliationRootEffect=0.1; FractionNLuxuryRemobilisable=[0.1, 0.1, 0.1]; MinimumNFixation=0.2; MaximumNFixation=0.6; SoilSaturationEffectMax=0.1; MinimumWaterFreePorosity=-1; SoilSaturationRecoveryFactor=0.25; NDillutionCoefficient=1; GlfGeneric=1; GlfSoilFertility=1; PlantHeightMinimum=25; PlantHeightMaximum=350; PlantHeightMassForMax=7500; PlantHeightExponent=2.5; RootDepthMinimum=30; RootDepthMaximum=350; RootElongationRate=25; RootDistributionDepthParam=70; RootDistributionExponent=2.5; DigestibilitiesCellWall=[0.6, 0.6, 0.6, 0.2]; MinimumGreenWt=50; FractionStolonStanding=0; PreferenceForGreenOverDead=1; PreferenceForLeafOverStems=1; WaterAvailableMethod=0; NitrogenAvailableMethod=0
              PastureAboveGroundOrgan Leaves
                GenericTissue LeafCohort1
                GenericTissue LeafCohort2
                GenericTissue LeafCohort3
                GenericTissue Dead
              PastureAboveGroundOrgan Stems
                GenericTissue LeafCohort1
                GenericTissue LeafCohort2
                GenericTissue LeafCohort3
                GenericTissue Dead
              PastureAboveGroundOrgan Stolons
                GenericTissue LeafCohort1
                GenericTissue LeafCohort2
                GenericTissue LeafCohort3
                GenericTissue Dead
          Soil: SoilType=NZ_Sedimentary; LocalName=Lismore; Site=Winchmore; NearestTown=Ashburton; Region=Canterbury; Country=New Zealand; Latitude=-48.48; Longitude=0
            InitialWater Initial water: PercentMethod=0; FractionFull=0.987013
            Physical
              Thickness  ParticleSizeClay  BD    AirDry  LL15   DUL    SAT   KS
              150        18.3333           1.3   0.05    0.15   0.36   0.45  5000
              150        15                1.35  0.12    0.14   0.34   0.43  2500
              200        12                1     0.015   0.055  0.19   0.25  3000
              150        10.6667           0.53  0.015   0.015  0.065  0.15  10000
              250        8                 0.31  0.01    0.01   0.04   0.11  17500
              300        6                 0.3   0.01    0.01   0.03   0.11  20000
              300        5                 0.3   0.01    0.01   0.03   0.11  20000
              SoilCrop SwardSoil: LL=[0.15, 0.14, 0.06, 0.02, 0.01, 0.01, 0.01]; KL=[0.1, 0.1, 0.08, 0.04, 0.01, 0, 0]; XF=[1, 1, 1, 1, 1, 0, 0]
              SoilCrop RyegrassSoil: LL=[0.14, 0.14, 0.03, 0.03, 0.03, 0.03, 0.03]; KL=[0.1, 0.1, 0.1, 0.02, 0, 0, 0]; XF=[1, 1, 1, 1, 0, 0, 0]
              SoilCrop WhiteCloverSoil: LL=[0.14, 0.14, 0.03, 0.03, 0.03, 0.03, 0.03]; KL=[0.1, 0.1, 0.1, 0.02, 0, 0, 0]; XF=[1, 1, 1, 1, 0, 0, 0]
            SoilWater: SummerDate=1-Nov; SummerU=6; SummerCona=3.5; WinterDate=1-apr; WinterU=2; WinterCona=2; DiffusConst=88; DiffusSlope=35; Salb=0.13; CN2Bare=73; CNRed=20; CNCov=0.8; slope=0; discharge_width=0; catchment_area=0; max_pond=0
              Thickness  SWCON  KLAT
              100        0.4    0
              200        0.5    0
              300        0.6    0
              300        0.6    0
              300        0.8    0
              300        0.8    0
              300        0.8    0
            Organic: FOMCNRatio=40
              Thickness  Carbon  SoilCNRatio  FBiom  FInert  FOM
              150        3       12           0.04   0.5     331.337
              150        1       12           0.02   0.7     245.461
              200        0.6     12           0.02   0.83    164.537
              150        0.4     12           0.01   0.9     121.892
              250        0.25    12           0.01   0.95    73.9313
              300        0.15    12           0      0.99    40.5743
              300        0.1     12           0      0.99    22.2677
            Chemical
              Thickness  NO3N   NH4N   PH
              100        7.619  0.132  5.9
              200        7.27   0.132  5.9
              300        3.871  0.132  5.9
              300        3.84   0.132  5.9
              300        3.81   0.132  5.9
              300        3.779  0.132  5.9
              300        3.691  0.132  5.9
            Sample Initial nitrogen: Thickness=[100, 200, 300, 300, 300, 300, 300]; SWUnits=Volumetric; OCUnits=Total; PHUnits=Water
            SoilNitrogen: fom_types=[default, manure, mucuna, lablab, shemp, stable]; fract_carb=[0.2, 0.3, 0.54, 0.57, 0.45, 0]; fract_cell=[0.7, 0.3, 0.37, 0.37, 0.47, 0.1]; fract_lign=[0.1, 0.4, 0.09, 0.06, 0.08, 0.9]
              SoilNitrogenNO3 NO3
              SoilNitrogenNH4 NH4
              SoilNitrogenUrea Urea
              SoilNitrogenPlantAvailableNO3 PlantAvailableNO3
              SoilNitrogenPlantAvailableNH4 PlantAvailableNH4
            CERESSoilTemperature
        Zone P2: Area=1; Slope=0
          Manager CentrePivot: same as PatchyMcPatchFace.ExplicitGrazedPaddock.Paddocks.P1.CentrePivot
          SurfaceOrganicMatter: InitialResidueName=grass; InitialResidueType=grass; InitialResidueMass=500; InitialStandingFraction=0; InitialCPR=0; InitialCNR=15; FractionFaecesAdded=0.5
          MicroClimate: a_interception=0; b_interception=1; c_interception=0; d_interception=0; soil_albedo=0.23; SoilHeatFluxFraction=0.4; NightInterceptionFraction=0.5; ReferenceHeight=2
          Irrigation
          Fertiliser
          Report: EventNames=[Clock].EndOfDay
            VariableNames:
              [Clock].Today as Date
              (sum([Soil].SoilNitrogen.Urea.kgha) + sum([Soil].SoilNitrogen.NH4.kgha) + sum([Soil].SoilNitrogen.NO3.kgha)) as minNPaddock
              [Sward].HerbageGrowthWt
          Sward: same as PatchyMcPatchFace.ExplicitGrazedPaddock.Paddocks.P1.Sward
          Soil: SoilType=NZ_Sedimentary; LocalName=Lismore; Site=Winchmore; NearestTown=Ashburton; Region=Canterbury; Country=New Zealand; Latitude=-48.48; Longitude=0
            InitialWater Initial water: PercentMethod=0; FractionFull=0.987013
            Physical
              Thickness  ParticleSizeClay  BD     AirDry  LL15   DUL    SAT   KS
              150        18.3333           1.3    0.05    0.15   0.36   0.45  5000
              150        15                1.35   0.12    0.14   0.34   0.43  2500
              200        12                1      0.015   0.055  0.19   0.25  3000
              150        10.6667           0.015  0.015   0.015  0.065  0.15  10000
              250        8                 0.31   0.01    0.01   0.04   0.11  17500
              300        6                 0.3    0.01    0.01   0.03   0.11  20000
              300        5                 0.3    0.01    0.01   0.03   0.11  20000
              SoilCrop SwardSoil: LL=[0.15, 0.14, 0.06, 0.02, 0.01, 0.01, 0.01]; KL=[0.1, 0.1, 0.08, 0.04, 0.01, 0, 0]; XF=[1, 1, 1, 1, 1, 0, 0]
              SoilCrop RyegrassSoil: LL=[0.14, 0.14, 0.03, 0.03, 0.03, 0.03, 0.03]; KL=[0.1, 0.1, 0.1, 0.02, 0, 0, 0]; XF=[1, 1, 1, 1, 0, 0, 0]
              SoilCrop WhiteCloverSoil: LL=[0.14, 0.14, 0.03, 0.03, 0.03, 0.03, 0.03]; KL=[0.1, 0.1, 0.1, 0.02, 0, 0, 0]; XF=[1, 1, 1, 1, 0, 0, 0]
            SoilWater: same as PatchyMcPatchFace.ExplicitGrazedPaddock.Paddocks.P1.Soil.SoilWater
            Organic: same as PatchyMcPatchFace.ExplicitGrazedPaddock.Paddocks.P1.Soil.Organic
            Chemical: same as PatchyMcPatchFace.ExplicitGrazedPaddock.Paddocks.P1.Soil.Chemical
            Sample Initial nitrogen: Thickness=[100, 200, 300, 300, 300, 300, 300]; SWUnits=Volumetric; OCUnits=Total; PHUnits=Water
            SoilNitrogen: same as PatchyMcPatchFace.ExplicitGrazedPaddock.Paddocks.P1.Soil.SoilNitrogen
            CERESSoilTemperature
        Zone P3: same as PatchyMcPatchFace.ExplicitGrazedPaddock.Paddocks.P2
        Zone P4: same as PatchyMcPatchFace.ExplicitGrazedPaddock.Paddocks.P1
        Zone P5: same as PatchyMcPatchFace.ExplicitGrazedPaddock.Paddocks.P1
        Zone P6: same as PatchyMcPatchFace.ExplicitGrazedPaddock.Paddocks.P1
        Zone P7: same as PatchyMcPatchFace.ExplicitGrazedPaddock.Paddocks.P1
        Zone P8: same as PatchyMcPatchFace.ExplicitGrazedPaddock.Paddocks.P1
        Zone P9: same as PatchyMcPatchFace.ExplicitGrazedPaddock.Paddocks.P1
        Zone P10: same as PatchyMcPatchFace.ExplicitGrazedPaddock.Paddocks.P1
    Simulation GriddedGrazedPaddock
      Clock: Start=1972-01-01; End=1972-12-31
      Summary SummaryFile
      Weather: FileName=%root%\Examples\WeatherFiles\lincoln.met
      SoilArbitrator Soil Arbitrator
      Manager PatchManager
        CuttingFrequency = 0
        CuttingResidual = 1000
        NutrientReturnType = Constant
        AmountFertNReturned = 40
        AmountDungNReturned = 0
        FertiliserDepth = 200
        FertiliserReturnPattern = RotatingInOrder
        ReportingFreq = OnGrazing
        PatchType = GP
        NumGPPatches = 10
        SystemID = A
        script: same as in PatchyMcPatchFace.ExplicitGrazedPaddock.PatchManager
      Manager ReportingWithPatchesVariables
        verbose = False
        InputModule = PatchManager
        OutputModule = ReportingWithPatches
        ReportingFreq = Daily
```csharp
using Models.Interfaces;
using System;
using Models.Core;
using Models.Soils;
using Models.PMF;
using Models.Zones;
using Models.AgPasture;
using System.Xml.Serialization;
using Models.Soils;
using Models.Surface;
using APSIM.Shared.Utilities;
using System.Collections.Generic;
using System.Diagnostics;
using System;
using Models.Interfaces;


namespace Models
{
    [Serializable]
    [System.Xml.Serialization.XmlInclude(typeof(Model))]
    public class Script : Model
    {
        [Link] private Clock Clock;
        [Link] private Simulation Simulation;
        [Link] private Soil soil;
        [Link] private ISummary summary;
        [Link] private Weather Weather;
        [Link] private Zone zone;
        [Link] private Sward sward;
        public int PatchCount;
        public int PaddockCount;
        public double Grazed;
        public double GrazedN;
        public double UrineNReturned;
        private double iniOrgC;
        private double iniOrgN;
        private double myVariable;
        [ScopedLinkByName]
        private ISolute NO3;
        [ScopedLinkByName]
        private ISolute NH4;
        [ScopedLinkByName]
        private ISolute Urea;
        [ScopedLinkByName]
        private SoilNitrogen SoilNitrogen;

        private Zone[] Zones {get; set; }

        private Models.Report.Report ReportingWithPatches;

        [Description("Verbose reporting mode (True/False)")]
        public bool verbose { get; set; }

        [Description("Name of the patch manager for input")]
        public string InputModule { get; set; }

        [Description("Name of the report for output")]
        public string OutputModule { get; set; }

        [Description("Frequency of reporting")]
        public reportingFrequencyTypes ReportingFreq { get; set; }

        [XmlIgnore] public int DaysSinceReport { get; set; }
        [XmlIgnore] public double NHA { get; set; }
        [XmlIgnore] public double PGR { get; set; }
        [XmlIgnore] public double HerbageGrazed { get; set; }
        [XmlIgnore] public double HerbageGrazedN { get; set; }
        [XmlIgnore] public double AreaUrinePatchesToday { get; set; }
        [XmlIgnore] public double UreaReturned { get; set; }
        [XmlIgnore] public double Fixation { get; set; }
        [XmlIgnore] public double LeachN { get; set; }
        [XmlIgnore] public double Denit { get; set; }
        [XmlIgnore] public double DenitN2O { get; set; }
        [XmlIgnore] public double OrgC { get; set; }
        [XmlIgnore] public double OrgN { get; set; }
        [XmlIgnore] public double dltOrgC { get; set; }
        [XmlIgnore] public double dltOrgN { get; set; }
        [XmlIgnore] public double MinN { get; set; }
        [XmlIgnore] public double UreaN { get; set; }
        [XmlIgnore] public double NH4N { get; set; }
        [XmlIgnore] public double NO3N { get; set; }
        [XmlIgnore] public double UreaAddedInGrazing { get; set; }

        [XmlIgnore] public double[] MinNPatch { get; set; }




        private bool ReportToday = false;      

        public enum reportingFrequencyTypes
        {
            /// <summary>Daily</summary>
            Daily,
            /// <summary>Every 10 days</summary>
            TenDaily,
            /// <summary>Monthly</summary>
            Monthly,
            /// <summary>Annual</summary>
            Annual,
            /// <summary>On grazing</summary>
            OnGrazing
        }

    

        [EventSubscribe("StartOfSimulation")]
        private void OnStartOfSimulation(object sender, EventArgs e)
        {

               if (verbose)
                summary.WriteMessage(this, "Initialising the Manager for grazing, urine return and reporting");
            DaysSinceReport = 0;
            PatchCount = SoilNitrogen.PatchCount;
            PaddockCount=0;



            // Get list of zones in the simulation
            List<Zone> zones = new List<Zone>();

            foreach (Zone zone in Apsim.FindAll(this.Parent, typeof(Zone)))
            {
                zones.Add(zone as Zone);
                ReportingWithPatches = (Models.Report.Report)zone.Get("[" + OutputModule+ "]");
                PaddockCount++;
            }
            Zones = zones.ToArray();


            //myVariable = (double)ManageGriddedPaddock.Get("Script.Var1");
            //double grazedN = ManageGriddedPaddock.Get("Script.grazedN");

            if (verbose)
                summary.WriteMessage(this, "Finished initialising the Manager for grazing, urine return and reporting");
        }


        [EventSubscribe("DoDailyInitialisation")]
        private void OnDoDailyInitialisation(object sender, EventArgs e)
        {    
                    
            if (verbose)
                summary.WriteMessage(this, "In Daily Initialisation for the Reporting Manager on " + Clock.Today);
            if(Clock.Today == Clock.StartDate) {

                iniOrgC = 0.0; 
                iniOrgN = 0.0;            

                foreach (Zone zone in Zones)
                {
                    SoilNitrogen soilN = Apsim.Find(zone, typeof(SoilNitrogen)) as SoilNitrogen;
                    for (int ii = 0; ii < soil.Thickness.Length; ii++)
                    {
                        iniOrgC += soilN.TotalC[ii]; // TODO RJM Check this is right!
                        iniOrgN += soilN.organic_n[ii];
                    }
                }
            }        
            summary.WriteMessage(this, "End of DoDailyInit");
            printMinN();
        }

            
        [EventSubscribe("DoManagement")]
        private void DoManagement(object sender, EventArgs e)
        {
               bool isEndOfMonth = false;
            if (Clock.Today.AddDays(1).Day == 1) 
                isEndOfMonth = true;
            

            bool isEndOfYear = false;
            if (Clock.Today.Day == 31 && Clock.Today.Month == 12)
                isEndOfYear = true;


            bool GrazedToday = (bool) Apsim.Get(Simulation, InputModule + ".Script.grazedToday"); 

            // should reporting be done today?  
            if (ReportingFreq == reportingFrequencyTypes.Daily)
                ReportToday = true;
            else if ((ReportingFreq == reportingFrequencyTypes.TenDaily) && ((Clock.Today.Day == 10) || (Clock.Today.Day == 20) || (isEndOfMonth)))
                ReportToday = true;
            else if ((ReportingFreq == reportingFrequencyTypes.Monthly) && (isEndOfMonth))
                ReportToday = true;
            else if ((ReportingFreq == reportingFrequencyTypes.Annual) && (isEndOfYear))
                ReportToday = true;
            else if ((ReportingFreq == reportingFrequencyTypes.OnGrazing) && (GrazedToday))
                ReportToday = true;
            else
                ReportToday = false;
            if (verbose)
                summary.WriteMessage(this, "Finished Prepare for the Reporting Manager on " + Clock.Today);


            summary.WriteMessage(this, "End of DoMgmt");
            printMinN();

        } 

        public void printMinN()
        {
            List<IModel> zones = Apsim.FindAll(this, typeof(Zone));
            Soil soil = Apsim.Find(zones[0], typeof(Soil)) as Soil; // Only one zone allowed for GP so use the first zone

            for (int ii = 0; ii < (SoilNitrogen.PatchCount); ii++)
            {
                double MinNPatch = SoilNitrogen.PatchTotalUrea[ii]+SoilNitrogen.PatchTotalNH4[ii] + SoilNitrogen.PatchTotalNO3[ii];
                summary.WriteMessage(this, "Patch " + ii + ":" + MinNPatch);
            }

        }


        [EventSubscribe("DoSoilWaterMovement")]
        private void OnDoSoilWaterMovement(object sender, EventArgs e)
        {
            summary.WriteMessage(this, "DoSoilWaterMovement");

            //if((Clock.Today.Day==31)&&(Clock.Today.Month==1)) 
            //    Debugger.Break();
            printMinN();

        }

         [EventSubscribe("DoSoilTemperature")]
        private void OnDoSoilTemperature(object sender, EventArgs e)
        {
            summary.WriteMessage(this, "DoSoilTemperature");

            //if((Clock.Today.Day==31)&&(Clock.Today.Month==1)) 
                //Debugger.Break();
            printMinN();

        }




        [EventSubscribe("EndOfDay")]
        private void OnEndOfDay(object sender, EventArgs e)
        {
               summary.WriteMessage(this, "Start of EndOfDay");
            printMinN();


            if (verbose)
                summary.WriteMessage(this, "In EndOfDay for the Reporting Manager on  " + Clock.Today);

            

            DaysSinceReport += 1;



            foreach (Zone zone in Zones)
            {

                Sward sward = Apsim.Find(zone, typeof(Sward)) as Sward;
                NHA += sward.HerbageGrowthWt/PaddockCount;
                PGR = NHA;  // divide this by the number of days just before reporting
                 Fixation += sward.FixedN/PaddockCount;

                Soil soil = Apsim.Find(zone, typeof(Soil)) as Soil;
                LeachN += soil.SoilWater.FlowNO3[soil.SoilWater.FlowNO3.Length-1]/PaddockCount;  // only take the deepest element

                for (int ii = 0; ii <= (soil.Thickness.Length - 1); ii++)
                {
                    Denit += SoilNitrogen.Denitrification[ii]/PaddockCount;
                    DenitN2O += SoilNitrogen.n2o_atm[ii]/PaddockCount;
                }


                Grazed = (double)zone.Get("[" + InputModule + "].Script.Harvested")/PaddockCount;
                GrazedN = (double)zone.Get("[" + InputModule + "].Script.HarvestedN")/PaddockCount;
                UrineNReturned = (double)zone.Get("[" + InputModule + "].Script.UreaReturned")/PaddockCount;
                //AreaUrinePatchesToday = (double)zone.Get("[" + InputModule + "].Script.areaUrinePatchesToday");
            } 

            HerbageGrazed += Grazed;
            HerbageGrazedN += GrazedN;
            UreaReturned += UrineNReturned;



            if(ReportToday) {

                OrgC = 0.0;
                OrgN = 0.0;
                UreaN = 0.0;
                NH4N = 0.0;
                NO3N = 0.0;
                MinN = 0.0;


                Soil soil1 = Apsim.Find(Zones[0], typeof(Soil)) as Soil;

                if(PaddockCount>1)
                    MinNPatch = new double[PaddockCount];
                else 
                    MinNPatch = new double[SoilNitrogen.PatchCount];


                int currentZoneNum = 0;
                foreach (Zone zone in Zones)
                {
                    Soil soil = Apsim.Find(zone, typeof(Soil)) as Soil;
                    Sward sward = Apsim.Find(zone, typeof(Sward)) as Sward;

                    double minNPatch = 0;

                    for (int ii = 0; ii <= (soil.Thickness.Length - 1); ii++)
                    {
                        OrgC += SoilNitrogen.TotalC[ii]/PaddockCount;  
                        OrgN += SoilNitrogen.organic_n[ii]/PaddockCount;
                        UreaN += Urea.kgha[ii]/PaddockCount;
                        NH4N += NH4.kgha[ii]/PaddockCount;
                        NO3N += NO3.kgha[ii]/PaddockCount;
                        MinN = UreaN + NH4N + NO3N;                    
                        minNPatch += Urea.kgha[ii] + NH4.kgha[ii] + NO3.kgha[ii];
                    }

                    if(PaddockCount>1) MinNPatch[currentZoneNum] = minNPatch;

                    dltOrgC = OrgC - iniOrgC; 
                    dltOrgN = OrgN - iniOrgN;
                    iniOrgC = OrgC; // ready for the next calculation of change in pools
                    iniOrgN = OrgN;
                    currentZoneNum++;
                }

                if(SoilNitrogen.PatchCount>1) {  // TODO will break if there is more than one paddock/zone AND more than one patch                    

                    for (int ii = 0; ii < (SoilNitrogen.PatchCount); ii++)
                    {
                        MinNPatch[ii] = SoilNitrogen.PatchTotalUrea[ii]+SoilNitrogen.PatchTotalNH4[ii] + SoilNitrogen.PatchTotalNO3[ii];
                    }
                }

                PGR = NHA / DaysSinceReport; 

                ReportingWithPatches.DoOutput();

                // now zero the reported variables
                DaysSinceReport = 0;
                HerbageGrazed = 0.0;
                HerbageGrazedN = 0.0;
                DaysSinceReport = 0;
                NHA = 0;
                PGR = 0;
                UreaReturned = 0;
                Fixation = 0;
                LeachN = 0;
                Denit = 0;
                DenitN2O = 0;
                OrgC = 0;
                OrgN = 0;
                MinN = 0;
                UreaN = 0;
                NH4N = 0;
                NO3N = 0;
            }


        }
    }
}
```
      Report ReportingWithPatches
        VariableNames:
          Parent.Name as Zone
          [Clock].Today as Date
          [Clock].Today.Month as Month
          [Clock].Today.Year as Year
          [ReportingWithPatchesVariables].Script.UreaReturned as UrineNReturned
          [ReportingWithPatchesVariables].Script.NHA as NHA
          [PatchManager].Script.NumPatches as NumPatches
          [PatchManager].Script.ListOfPatches as ListOfPatches
          [ReportingWithPatchesVariables].Script.AreaUrinePatchesToday as AreaUrinePatchesToday
          [ReportingWithPatchesVariables].Script.HerbageGrazed as HerbageGrazed
          [ReportingWithPatchesVariables].Script.HerbageGrazedN as HerbageGrazedN
          [ReportingWithPatchesVariables].Script.LeachN as LeachN
          [ReportingWithPatchesVariables].Script.Denit as Denit
          [ReportingWithPatchesVariables].Script.Fixation as Fixation
          [ReportingWithPatchesVariables].Script.MinN as MinN
          [ReportingWithPatchesVariables].Script.UreaN as UreaN
          [ReportingWithPatchesVariables].Script.NH4N as NH4N
          [ReportingWithPatchesVariables].Script.NO3N as NO3N
          [ReportingWithPatchesVariables].Script.dltOrgC as dltOrgC
          [ReportingWithPatchesVariables].Script.dltOrgN as dltOrgN
      Zone Paddock: Area=1; Slope=0
        Manager CentrePivot: same as PatchyMcPatchFace.ExplicitGrazedPaddock.Paddocks.P1.CentrePivot
        SurfaceOrganicMatter: InitialResidueName=grass; InitialResidueType=grass; InitialResidueMass=500; InitialStandingFraction=0; InitialCPR=0; InitialCNR=15; FractionFaecesAdded=0.5
        MicroClimate: a_interception=0; b_interception=1; c_interception=0; d_interception=0; soil_albedo=0.23; SoilHeatFluxFraction=0.4; NightInterceptionFraction=0.5; ReferenceHeight=2
        Irrigation
        Fertiliser
        Sward: same as PatchyMcPatchFace.ExplicitGrazedPaddock.Paddocks.P1.Sward
        Soil: same as PatchyMcPatchFace.ExplicitGrazedPaddock.Paddocks.P1.Soil
        Report: EventNames=[Clock].EndOfDay
          VariableNames:
            [Clock].Today as Date
            [Sward].HerbageGrowthWt
            [Soil].SoilNitrogen.PatchCount as PatchCount
            [Soil].SoilNitrogen.PatchTotalUrea + [Soil].SoilNitrogen.PatchTotalNH4 + [Soil].SoilNitrogen.PatchTotalNO3 as MinN
            [Soil].SoilNitrogen.MaximumNitrogenAvailableToPlants
    Simulation UniformGrazedPaddock
      Clock: Start=1972-01-01; End=1972-12-31
      Summary SummaryFile
      Weather: FileName=%root%\Examples\WeatherFiles\lincoln.met
      SoilArbitrator Soil Arbitrator
      Manager PatchManager
        CuttingFrequency = 0
        CuttingResidual = 1000
        NutrientReturnType = Constant
        AmountFertNReturned = 40
        AmountDungNReturned = 0
        FertiliserDepth = 200
        FertiliserReturnPattern = RotatingInOrder
        ReportingFreq = OnGrazing
        PatchType = UP
        NumGPPatches = 1
        SystemID = A
        script: same as in PatchyMcPatchFace.ExplicitGrazedPaddock.PatchManager
      Manager ReportingWithPatchesVariables
        verbose = False
        InputModule = PatchManager
        OutputModule = ReportingWithPatches
        ReportingFreq = Daily
```csharp
using Models.Interfaces;
using System;
using Models.Core;
using Models.Soils;
using Models.PMF;
using Models.Zones;
using Models.AgPasture;
using System.Xml.Serialization;
using Models.Soils;
using Models.Surface;
using APSIM.Shared.Utilities;
using System.Collections.Generic;
using System.Diagnostics;
using System;
using Models.Interfaces;


namespace Models
{
    [Serializable]
    [System.Xml.Serialization.XmlInclude(typeof(Model))]
    public class Script : Model
    {
        [Link] private Clock Clock;
        [Link] private Simulation Simulation;
        [Link] private Soil soil;
        [Link] private ISummary summary;
        [Link] private Weather Weather;
        [Link] private Zone zone;
        [Link] private Sward sward;
        public int PatchCount;
        public int PaddockCount;
        public double Grazed;
        public double GrazedN;
        public double UrineNReturned;
        private double iniOrgC;
        private double iniOrgN;
        private double myVariable;
        [ScopedLinkByName]
        private ISolute NO3;
        [ScopedLinkByName]
        private ISolute NH4;
        [ScopedLinkByName]
        private ISolute Urea;
        [ScopedLinkByName]
        private SoilNitrogen SoilNitrogen;

        private Zone[] Zones {get; set; }

        private Models.Report.Report ReportingWithPatches;

        [Description("Verbose reporting mode (True/False)")]
        public bool verbose { get; set; }

        [Description("Name of the patch manager for input")]
        public string InputModule { get; set; }

        [Description("Name of the report for output")]
        public string OutputModule { get; set; }

        [Description("Frequency of reporting")]
        public reportingFrequencyTypes ReportingFreq { get; set; }

        [XmlIgnore] public int DaysSinceReport { get; set; }
        [XmlIgnore] public double NHA { get; set; }
        [XmlIgnore] public double PGR { get; set; }
        [XmlIgnore] public double HerbageGrazed { get; set; }
        [XmlIgnore] public double HerbageGrazedN { get; set; }
        [XmlIgnore] public double AreaUrinePatchesToday { get; set; }
        [XmlIgnore] public double UreaReturned { get; set; }
        [XmlIgnore] public double Fixation { get; set; }
        [XmlIgnore] public double LeachN { get; set; }
        [XmlIgnore] public double Denit { get; set; }
        [XmlIgnore] public double DenitN2O { get; set; }
        [XmlIgnore] public double OrgC { get; set; }
        [XmlIgnore] public double OrgN { get; set; }
        [XmlIgnore] public double dltOrgC { get; set; }
        [XmlIgnore] public double dltOrgN { get; set; }
        [XmlIgnore] public double MinN { get; set; }
        [XmlIgnore] public double UreaN { get; set; }
        [XmlIgnore] public double NH4N { get; set; }
        [XmlIgnore] public double NO3N { get; set; }
        [XmlIgnore] public double UreaAddedInGrazing { get; set; }

        [XmlIgnore] public double[] MinNPatch { get; set; }




        private bool ReportToday = false;      

        public enum reportingFrequencyTypes
        {
            /// <summary>Daily</summary>
            Daily,
            /// <summary>Every 10 days</summary>
            TenDaily,
            /// <summary>Monthly</summary>
            Monthly,
            /// <summary>Annual</summary>
            Annual,
            /// <summary>On grazing</summary>
            OnGrazing
        }

    

        [EventSubscribe("StartOfSimulation")]
        private void OnStartOfSimulation(object sender, EventArgs e)
        {

               if (verbose)
                summary.WriteMessage(this, "Initialising the Manager for grazing, urine return and reporting");
            DaysSinceReport = 0;
            PatchCount = SoilNitrogen.PatchCount;
            PaddockCount=0;



            // Get list of zones in the simulation
            List<Zone> zones = new List<Zone>();

            foreach (Zone zone in Apsim.FindAll(this.Parent, typeof(Zone)))
            {
                zones.Add(zone as Zone);
                ReportingWithPatches = (Models.Report.Report)zone.Get("[" + OutputModule+ "]");
                PaddockCount++;
            }
            Zones = zones.ToArray();


            //myVariable = (double)ManageGriddedPaddock.Get("Script.Var1");
            //double grazedN = ManageGriddedPaddock.Get("Script.grazedN");

            if (verbose)
                summary.WriteMessage(this, "Finished initialising the Manager for grazing, urine return and reporting");
        }


        [EventSubscribe("DoDailyInitialisation")]
        private void OnDoDailyInitialisation(object sender, EventArgs e)
        {    
                    
            if (verbose)
                summary.WriteMessage(this, "In Daily Initialisation for the Reporting Manager on " + Clock.Today);
            if(Clock.Today == Clock.StartDate) {

                iniOrgC = 0.0; 
                iniOrgN = 0.0;            

                foreach (Zone zone in Zones)
                {
                    SoilNitrogen soilN = Apsim.Find(zone, typeof(SoilNitrogen)) as SoilNitrogen;
                    for (int ii = 0; ii < soil.Thickness.Length; ii++)
                    {
                        iniOrgC += soilN.TotalC[ii]; // TODO RJM Check this is right!
                        iniOrgN += soilN.organic_n[ii];
                    }
                }
            }        

            bool isEndOfMonth = false;
            if (Clock.Today.AddDays(1).Day == 1)
                isEndOfMonth = true;

            bool isEndOfYear = false;
            if (Clock.Today.Day == 31 && Clock.Today.Month == 12)
                isEndOfYear = true;


            bool GrazedToday = (bool) Apsim.Get(Simulation, InputModule + ".Script.grazedToday"); 

            // should reporting be done today?  
            if (ReportingFreq == reportingFrequencyTypes.Daily)
                ReportToday = true;
            else if ((ReportingFreq == reportingFrequencyTypes.TenDaily) && ((Clock.Today.Day == 10) || (Clock.Today.Day == 20) || (isEndOfMonth)))
                ReportToday = true;
            else if ((ReportingFreq == reportingFrequencyTypes.Monthly) && (isEndOfMonth))
                ReportToday = true;
            else if ((ReportingFreq == reportingFrequencyTypes.Annual) && (isEndOfYear))
                ReportToday = true;
            else if ((ReportingFreq == reportingFrequencyTypes.OnGrazing) && (GrazedToday))
                ReportToday = true;
            else
                ReportToday = false;
            if (verbose)
                summary.WriteMessage(this, "Finished Prepare for the Reporting Manager on " + Clock.Today);
        } 

        [EventSubscribe("EndOfDay")]
        private void OnEndOfDay(object sender, EventArgs e)
        {
            if (verbose)
                summary.WriteMessage(this, "In EndOfDay for the Reporting Manager on  " + Clock.Today);

            DaysSinceReport += 1;

            foreach (Zone zone in Zones)
            {

                Sward sward = Apsim.Find(zone, typeof(Sward)) as Sward;
                NHA += sward.HerbageGrowthWt/PaddockCount;
                PGR = NHA;  // divide this by the number of days just before reporting
                 Fixation += sward.FixedN/PaddockCount;

                Soil soil = Apsim.Find(zone, typeof(Soil)) as Soil;
                LeachN += soil.SoilWater.FlowNO3[soil.SoilWater.FlowNO3.Length-1]/PaddockCount;  // only take the deepest element

                for (int ii = 0; ii <= (soil.Thickness.Length - 1); ii++)
                {
                    Denit += SoilNitrogen.Denitrification[ii]/PaddockCount;
                    DenitN2O += SoilNitrogen.n2o_atm[ii]/PaddockCount;
                }


                Grazed = (double)zone.Get("[" + InputModule + "].Script.Harvested")/PaddockCount;
                GrazedN = (double)zone.Get("[" + InputModule + "].Script.HarvestedN")/PaddockCount;
                UrineNReturned = (double)zone.Get("[" + InputModule + "].Script.UreaReturned")/PaddockCount;
                //AreaUrinePatchesToday = (double)zone.Get("[" + InputModule + "].Script.areaUrinePatchesToday");
            } 

            HerbageGrazed += Grazed;
            HerbageGrazedN += GrazedN;
            UreaReturned += UrineNReturned;

            if(ReportToday) {
                OrgC = 0.0;
                OrgN = 0.0;
                UreaN = 0.0;
                NH4N = 0.0;
                NO3N = 0.0;
                MinN = 0.0;

                Soil soil1 = Apsim.Find(Zones[0], typeof(Soil)) as Soil;

                if(PaddockCount>1)
                    MinNPatch = new double[PaddockCount];
                else 
                    MinNPatch = new double[SoilNitrogen.PatchCount];


                int currentZoneNum = 0;
                foreach (Zone zone in Zones)
                {
                    Soil soil = Apsim.Find(zone, typeof(Soil)) as Soil;
                    Sward sward = Apsim.Find(zone, typeof(Sward)) as Sward;

                    for (int ii = 0; ii <= (soil.Thickness.Length - 1); ii++)
                    {
                        OrgC += SoilNitrogen.TotalC[ii]/PaddockCount;  // TODO RJM Check this is right!
                        OrgN += SoilNitrogen.organic_n[ii]/PaddockCount;
                        UreaN += Urea.kgha[ii]/PaddockCount;
                        NH4N += NH4.kgha[ii]/PaddockCount;
                        NO3N += NO3.kgha[ii]/PaddockCount;

                    }

                    MinN = (UreaN + NH4N + NO3N)/PaddockCount;
                    if(PaddockCount>1) MinNPatch[currentZoneNum] = MinN;
                    dltOrgC = OrgC - iniOrgC; 
                    dltOrgN = OrgN - iniOrgN;
                    iniOrgC = OrgC; // ready for the next calculation of change in pools
                    iniOrgN = OrgN;
                    currentZoneNum++;
                }

                if(SoilNitrogen.PatchCount>1) {  // TODO will break if there is more than one paddock/zone AND more than one patch                    

                    for (int ii = 0; ii < (SoilNitrogen.PatchCount); ii++)
                    {
                        MinNPatch[ii] = SoilNitrogen.PatchTotalUrea[ii]+SoilNitrogen.PatchTotalNH4[ii] + SoilNitrogen.PatchTotalNO3[ii];
                    }
                }

                PGR = NHA / DaysSinceReport; 

                ReportingWithPatches.DoOutput();

                // now zero the reported variables
                DaysSinceReport = 0;
                HerbageGrazed = 0.0;
                HerbageGrazedN = 0.0;
                DaysSinceReport = 0;
                NHA = 0;
                PGR = 0;
                UreaReturned = 0;
                Fixation = 0;
                LeachN = 0;
                Denit = 0;
                DenitN2O = 0;
                OrgC = 0;
                OrgN = 0;
                MinN = 0;
                UreaN = 0;
                NH4N = 0;
                NO3N = 0;
            }
        }
    }
}
```
      Report ReportingWithPatches
        VariableNames:
          Parent.Name as Zone
          [Clock].Today as Date
          [Clock].Today.Month as Month
          [Clock].Today.Month as Year
          [ReportingWithPatchesVariables]Script.UreaReturned as UrineNReturned
          [ReportingWithPatchesVariables]Script.NHA as NHA
          [PatchManager]Script.NumPatches as NumPatches
          [PatchManager]Script.ListOfPatches as ListOfPatches
          [ReportingWithPatchesVariables]Script.AreaUrinePatchesToday as AreaUrinePatchesToday
          [ReportingWithPatchesVariables]Script.HerbageGrazed as HerbageGrazed
          [ReportingWithPatchesVariables]Script.HerbageGrazedN as HerbageGrazedN
          [ReportingWithPatchesVariables]Script.LeachN as LeachN
          [ReportingWithPatchesVariables]Script.Denit as Denit
          [ReportingWithPatchesVariables]Script.Fixation as Fixation
          [ReportingWithPatchesVariables]Script.MinN as MinN
          [ReportingWithPatchesVariables]Script.UreaN as UreaN
          [ReportingWithPatchesVariables]Script.NH4N as NH4N
          [ReportingWithPatchesVariables]Script.NO3N as NO3N
          [ReportingWithPatchesVariables]Script.dltOrgC as dltOrgC
          [ReportingWithPatchesVariables]Script.dltOrgN as dltOrgN
      Zone Paddock: Area=1; Slope=0
        Manager CentrePivot: same as PatchyMcPatchFace.ExplicitGrazedPaddock.Paddocks.P1.CentrePivot
        SurfaceOrganicMatter: InitialResidueName=grass; InitialResidueType=grass; InitialResidueMass=500; InitialStandingFraction=0; InitialCPR=0; InitialCNR=15; FractionFaecesAdded=0.5
        MicroClimate: a_interception=0; b_interception=1; c_interception=0; d_interception=0; soil_albedo=0.23; SoilHeatFluxFraction=0.4; NightInterceptionFraction=0.5; ReferenceHeight=2
        Irrigation
        Fertiliser
        Sward: same as PatchyMcPatchFace.ExplicitGrazedPaddock.Paddocks.P1.Sward
        Soil: same as PatchyMcPatchFace.ExplicitGrazedPaddock.Paddocks.P1.Soil
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