Simulations: Version=102
  DataStore
    ExcelInput: FileNames=[Observed.xlsx]; SheetNames=[Observed]
    PredictedObserved: PredictedTableName=ReportExp; ObservedTableName=Observed; FieldNameUsedForMatch=Date
      Tests: POName=PredictedObserved
        AcceptedStats:
          Name                   n     RMSE  ME  MAE  Slope  Intercept  SEslope  SEintercept  R2  NSE  RSR
          dltDenitrifiedN        3840  0     0   0    -      -          -        -            -   -    -
          dltHydrolisedN         3840  0     0   0    -      -          -        -            -   -    -
          dltMineralisedSoilN    3840  0     0   0    -      -          -        -            -   -    -
          dltMineralisedSurfOMN  3840  0     0   0    -      -          -        -            -   -    -
          dltNitrifiedN          3840  0     0   0    -      -          -        -            -   -    -
          dltSoilDenit           3840  0     0   0    -      -          -        -            -   -    -
          dltSoilNO3             3840  0     0   0    -      -          -        -            -   -    -
          dltTotalFOMC           3840  0     0   0    -      -          -        -            -   -    -
          dltTotalFOMN           3840  0     0   0    -      -          -        -            -   -    -
          dltTotalHumicC         3840  0     0   0    -      -          -        -            -   -    -
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        AcceptedStatsName=Name n Slope Intercept SEslope SEintercept R2 RMSE NSE ME MAE RSR
  Folder DifferenceTesting
    Experiment
      Factors
        Permutation
          Factor Fert: Specification=[FertiliserSchedule]
            Operations None
              1981-01-10  [Fertiliser].Apply(0, Fertiliser.Types.NO3N, 30);
            Operations NO3
              1981-01-10  [Fertiliser].Apply(100, Fertiliser.Types.NO3N, 30);
            Operations NH4
              1981-01-10  [Fertiliser].Apply(100, Fertiliser.Types.NH4N, 30);
            Operations Urea
              1981-01-10  [Fertiliser].Apply(100, Fertiliser.Types.Urea, 30);
          Factor SurfaceOM: Specification=[SurfaceOrganicMatter]
            SurfaceOrganicMatter On: InitialResidueName=wheat_stubble; InitialResidueType=wheat; InitialResidueMass=500; InitialStandingFraction=0; InitialCPR=0; InitialCNR=10
            SurfaceOrganicMatter Off: InitialResidueName=wheat_stubble; InitialResidueType=wheat; InitialResidueMass=0; InitialStandingFraction=0; InitialCPR=0; InitialCNR=10
          Factor SoilOM: Specification=[Organic]
            Organic On: FOMCNRatio=40
              Thickness  Carbon  SoilCNRatio  FBiom  FInert  FOM
              150        5       12           0.04   0.4     0
              150        3       12           0.02   0.6     0
              300        2       12           0.02   0.8     0
              300        1       12           0.02   1       0
              300        0.01    12           0      1       0
              300        0.01    12           0      1       0
              300        0.01    12           0      1       0
            Organic Off: FOMCNRatio=40
              Thickness  Carbon  SoilCNRatio  FBiom  FInert  FOM
              150        0.01    12           0      1       0
              150        0.01    12           0      1       0
              300        0.01    12           0      1       0
              300        0.01    12           0      1       0
              300        0.01    12           0      1       0
              300        0.01    12           0      1       0
              300        0.01    12           0      1       0
          Factor Plant: Specification=[KillPlants]
            Manager On
              killPlants = False
```csharp
using System.Collections.Generic;
using APSIM.Shared.Utilities;
using System.Xml.Serialization;
using Models.AgPasture;
using Models.Zones;
using Models.PMF;
using Models.Soils;
using Models.Core;
using System;

namespace Models
{
    [Serializable]
    [System.Xml.Serialization.XmlInclude(typeof(Model))]
    public class Script : Model
    {
        [Link] Clock Clock;
        [Link] List<PastureSpecies> Pasture;

        [Description("Kill all plants (True/False)")]
        public bool killPlants { get; set; }

        [EventSubscribe("DoDailyInitialisation")]
        private void OnDoDailyInitialisation(object sender, EventArgs e)
        {    
            bool isEndOfMonth = false;

            if (Clock.Today == Clock.StartDate)
            {
                if (killPlants)
                {
                    Pasture.ForEach(species => species.KillCrop(1));
                    Pasture.ForEach(species => species.EndCrop());
                }
            }                               
        }
    }
}
```
            Manager Off
              killPlants = True
              script: same as in DifferenceTesting.Experiment.Factors.Permutation.Plant.On
      Simulation Diffs
        Clock: Start=1981-01-01; End=1982-12-31
        Summary SummaryFile
        Weather: FileName=%root%\Examples\WeatherFiles\lincoln.met
        SoilArbitrator Soil Arbitrator
        Manager Reporting
```csharp
using System.Linq;
using System.Collections.Generic;
using APSIM.Shared.Utilities;
using System.IO;
using System.Xml.Serialization;
using Models.AgPasture;
using Models.Zones;
using Models.PMF;
using Models.Soils;
using Models.Core;
using System;
using Models.Interfaces;

namespace Models
{
    [Serializable]
    [System.Xml.Serialization.XmlInclude(typeof(Model))]
    public class Script : Model
    {
        [Link] private Clock Clock;
        [Link] private Soil soil;
        [Link] private Zone zone;
        [Link] private ISummary summary;
        [Link(ByName = true)]
        private ISolute NO3;
        [Link(ByName = true)]
        private ISolute NH4;
        [Link(ByName = true)]
        private ISolute Urea;
        [Link(ByName = true)]
        private SoilNitrogen SoilNitrogen;
        [Link] List<PastureSpecies> Pasture;
        
                
        [XmlIgnore] public double[] TotalWater { get; set; }
        [XmlIgnore] public double[] DenitrifiedN { get; set; }
        //[XmlIgnore] public double[] LeachedN  { get; set; }
        [XmlIgnore] public double[] MineralisedSoilN  { get; set; }
        [XmlIgnore] public double[] MineralisedSurfOMN  { get; set; }

        //[XmlIgnore] public double[] SoilNContent  { get; set; }
        [XmlIgnore] public double[] TotalUrea { get; set; }
        [XmlIgnore] public double[] TotalNH4 { get; set; }
        [XmlIgnore] public double[] TotalNO3 { get; set; }

        [XmlIgnore] public double[] TotalFOMN { get; set; }
        [XmlIgnore] public double[] TotalHumicN { get; set; }

        [XmlIgnore] public double[] TotalMicrobialN { get; set; }
        [XmlIgnore] public double[] HydrolisedN { get; set; }
        [XmlIgnore] public double[] NitrifiedN { get; set; }
        [XmlIgnore] public double[] TotalFOMC { get; set; }
        [XmlIgnore] public double[] TotalHumicC { get; set; }
        [XmlIgnore] public double[] TotalMicrobialC { get; set; }

        //[XmlIgnore] public double[] SoilAtmC { get; set; }
        [XmlIgnore] public double[] SoilNO3 { get; set; }
        [XmlIgnore] public double[] SoilDenit { get; set; }


        [XmlIgnore] public double[] TotalWt { get; set; }




        double[] tmpTotalWater;
        double[] tmpMineralisedN;
        double[] tmpDenitrifiedN;
        double[] tmpLeachedN;
        double[] tmpMineralisedSoilN;
        double[] tmpMineralisedSurfOMN;
        double[] tmpSoilNContent;
        double[] tmpTotalUrea;
        double[] tmpTotalNH4;
        double[] tmpTotalNO3;
        double[] tmpTotalFOMN;
        double[] tmpTotalHumicN;
        double[] tmpTotalMicrobialN;
        double[] tmpHydrolisedN;
        double[] tmpNitrifiedN;
        double[] tmpTotalFOMC;
        double[] tmpTotalHumicC;
        double[] tmpTotalMicrobialC;
        double[] tmpSoilAtmC;
        double[] tmpSoilNO3;
        double[] tmpSoilDenit;
        double[] tmpTotalWt;

        private List<IModel> zones;

        private double sum(double[] inarr)
        {
            double total = 0;
            for (int x = 0; x < inarr.Length; x++)
            {
                total += inarr[x];
            }            
            return(total);
        }

        [EventSubscribe("StartOfSimulation")]
        private void OnSimulationCommencing(object sender, EventArgs e)
        {    
            zones = Apsim.FindAll(this, typeof(Zone));
            
            Array.Resize(ref tmpMineralisedN, zones.Count);                    
            Array.Resize(ref tmpTotalWater, zones.Count); 
            Array.Resize(ref tmpDenitrifiedN, zones.Count); 
            //Array.Resize(ref tmpLeachedN, zones.Count); 
            Array.Resize(ref tmpMineralisedSoilN, zones.Count); 
            Array.Resize(ref tmpMineralisedSurfOMN, zones.Count);
            //Array.Resize(ref tmpSoilNContent, zones.Count); 
            Array.Resize(ref tmpTotalUrea, zones.Count); 
            Array.Resize(ref tmpTotalNH4, zones.Count); 
            Array.Resize(ref tmpTotalNO3, zones.Count); 
            Array.Resize(ref tmpTotalFOMN, zones.Count); 
            Array.Resize(ref tmpTotalHumicN, zones.Count); 
            Array.Resize(ref tmpTotalMicrobialN, zones.Count); 
            Array.Resize(ref tmpHydrolisedN, zones.Count); 
            Array.Resize(ref tmpNitrifiedN, zones.Count); 
            Array.Resize(ref tmpTotalFOMC, zones.Count); 
            Array.Resize(ref tmpTotalHumicC, zones.Count); 
            Array.Resize(ref tmpTotalMicrobialC, zones.Count); 
            //Array.Resize(ref tmpSoilAtmC, zones.Count); 
            Array.Resize(ref tmpSoilNO3, zones.Count);
            Array.Resize(ref tmpSoilDenit, zones.Count);            
            
            
            Array.Resize(ref tmpTotalWt, zones.Count);            

            // if the outputs are queried before DoReport is run they will be uninitialised
            // so assign them to the tmp results now (all zeros)        
            MineralisedSoilN = tmpMineralisedSoilN;
            TotalWater = tmpTotalWater; 
            DenitrifiedN = tmpDenitrifiedN; 
            MineralisedSurfOMN = tmpMineralisedSurfOMN;
            TotalUrea = tmpTotalUrea; 
            TotalNH4 = tmpTotalNH4; 
            TotalNO3 = tmpTotalNO3; 
            TotalFOMN = tmpTotalFOMN; 
            TotalHumicN = tmpTotalHumicN; 
            TotalMicrobialN = tmpTotalMicrobialN; 
            HydrolisedN = tmpHydrolisedN; 
            NitrifiedN = tmpNitrifiedN; 
            TotalFOMC = tmpTotalFOMC; 
            TotalHumicC = tmpTotalHumicC; 
            TotalMicrobialC = tmpTotalMicrobialC; 
            SoilNO3 = tmpSoilNO3;
            SoilDenit = tmpSoilDenit; 
            TotalWt = tmpTotalWt;

        }

        [EventSubscribe("DoReport")]
        private void OnEndOfDay(object sender, EventArgs e)
        {
            zones = Apsim.FindAll(this, typeof(Zone));    
            for (int x = 0; x < zones.Count; x++)
            {
                Soil soil = Apsim.Find(zone, typeof(Soil)) as Soil;                                
                tmpTotalWater[x] = sum(soil.SoilWater.SWmm);
                
                tmpMineralisedN[x] = sum(SoilNitrogen.MineralisedN);
                tmpDenitrifiedN[x] = sum(SoilNitrogen.Denitrification);
                //tmpLeachedN[x] = sum();
                tmpMineralisedSoilN[x] = sum(SoilNitrogen.MineralisedN);
                tmpMineralisedSurfOMN[x] = sum(SoilNitrogen.dlt_n_min_res);
                //tmpSoilNContent[x] = sum();
                tmpTotalUrea[x] = sum(Urea.kgha);
                tmpTotalNH4[x] = sum(NH4.kgha);
                tmpTotalNO3[x] = sum(NO3.kgha);
                tmpTotalFOMN[x] = sum(SoilNitrogen.FOMN);
                tmpTotalHumicN[x] = sum(SoilNitrogen.HumicN);
                tmpTotalMicrobialN[x] = sum(SoilNitrogen.MicrobialN);
                tmpHydrolisedN[x] = sum(SoilNitrogen.dlt_urea_hydrol);
                tmpNitrifiedN[x] = sum(SoilNitrogen.Nitrification);
                tmpTotalFOMC[x] = sum(SoilNitrogen.FOMC);
                tmpTotalHumicC[x] = sum(SoilNitrogen.HumicC);
                tmpTotalMicrobialC[x] = sum(SoilNitrogen.MicrobialC);
                //tmpSoilAtmC[x] = sum();
                tmpSoilNO3[x] = sum(NO3.kgha);
                tmpSoilDenit[x] = sum(SoilNitrogen.Denitrification);                
                tmpTotalWt[x] = Pasture.Sum(species => species.TotalWt);
            }            

            MineralisedSoilN = tmpMineralisedSoilN;
            TotalWater = tmpTotalWater;
            DenitrifiedN = tmpDenitrifiedN;
            //LeachedN = tmpLeachedN;
            MineralisedSurfOMN = tmpMineralisedSurfOMN;
            //SoilNContent = tmpSoilNContent;
            TotalUrea = tmpTotalUrea;
            TotalNH4 = tmpTotalNH4;
            TotalNO3 = tmpTotalNO3;
            TotalFOMN = tmpTotalFOMN;
            TotalHumicN = tmpTotalHumicN;
            TotalMicrobialN = tmpTotalMicrobialN;
            HydrolisedN = tmpHydrolisedN;
            NitrifiedN = tmpNitrifiedN;
            TotalFOMC = tmpTotalFOMC;
            TotalHumicC = tmpTotalHumicC;
            TotalMicrobialC = tmpTotalMicrobialC;
            //SoilAtmC = tmpSoilAtmC;
            SoilNO3 = tmpSoilNO3;
            SoilDenit = tmpSoilDenit;                        
            TotalWt = tmpTotalWt;
        }

    }
}
```
        Report ReportExp: EventNames=[Clock].EndOfDay
          VariableNames:
            [Clock].Today as Date
            ([Reporting]Script.TotalWater[2]-[Reporting]Script.TotalWater[1]) as dltTotalWater
            ([Reporting]Script.DenitrifiedN[2]-[Reporting]Script.DenitrifiedN[1]) as dltDenitrifiedN
            ([Reporting]Script.MineralisedSoilN[2]-[Reporting]Script.MineralisedSoilN[1]) as dltMineralisedSoilN
            ([Reporting]Script.MineralisedSurfOMN[2]-[Reporting]Script.MineralisedSurfOMN[1]) as dltMineralisedSurfOMN
            ([Reporting]Script.TotalUrea[2]-[Reporting]Script.TotalUrea[1]) as dltTotalUrea
            ([Reporting]Script.TotalNH4[2]-[Reporting]Script.TotalNH4[1]) as dltTotalNH4
            ([Reporting]Script.TotalNO3[2]-[Reporting]Script.TotalNO3[1]) as dltTotalNO3
            ([Reporting]Script.TotalFOMN[2]-[Reporting]Script.TotalFOMN[1]) as dltTotalFOMN
            ([Reporting]Script.TotalHumicN[2]-[Reporting]Script.TotalHumicN[1]) as dltTotalHumicN
            ([Reporting]Script.TotalMicrobialN[2]-[Reporting]Script.TotalMicrobialN[1]) as dltTotalMicrobialN
            ([Reporting]Script.HydrolisedN[2]-[Reporting]Script.HydrolisedN[1]) as dltHydrolisedN
            ([Reporting]Script.NitrifiedN[2]-[Reporting]Script.NitrifiedN[1]) as dltNitrifiedN
            ([Reporting]Script.TotalFOMC[2]-[Reporting]Script.TotalFOMC[1]) as dltTotalFOMC
            ([Reporting]Script.TotalHumicC[2]-[Reporting]Script.TotalHumicC[1]) as dltTotalHumicC
            ([Reporting]Script.TotalMicrobialC[2]-[Reporting]Script.TotalMicrobialC[1]) as dltTotalMicrobialC
            ([Reporting]Script.SoilNO3[2]-[Reporting]Script.SoilNO3[1]) as dltSoilNO3
            ([Reporting]Script.SoilDenit[2]-[Reporting]Script.SoilDenit[1]) as dltSoilDenit
            ([Reporting]Script.SoilDenit[2]-[Reporting]Script.SoilDenit[1]) as dltSoilDenit
            ([Reporting]Script.TotalWt[2]-[Reporting]Script.TotalWt[1]) as dltTotalWt
        Zone 1Patch: Area=1; Slope=0; AspectAngle=0; Altitude=50
          Fertiliser
          Soil: ASCOrder=Vertosol; ASCSubOrder=Black; SoilType=Clay; Site=Norwin; NearestTown=Norwin; Region=Darling Downs and Granite Belt; State=Queensland; Country=Australia; NaturalVegetation=Qld. Bluegrass, possible Qld. Blue gum; ApsoilNumber=900; Latitude=-27.581836; Longitude=151.320206; LocationAccuracy=+/- 20m
            DataSource=CSIRO Sustainable Ecosystems, Toowoomba; Characteriesd as part of the GRDC funded project"Doing it better, doing it smarter, managing soil water in Australian agriculture' 2011
            Comments=OC, CLL for all crops estimated-based on Bongeen Mywybilla Soil No1
            Physical
              Thickness  BD       AirDry    LL15      DUL       SAT       KS
              150        1.01056  0.13025   0.2605    0.521     0.588655  20
              150        1.07146  0.198689  0.248362  0.496723  0.565677  20
              300        1.09394  0.28      0.28      0.488438  0.557193  20
              300        1.15861  0.28      0.28      0.480297  0.532787  20
              300        1.17301  0.28      0.28      0.471584  0.527354  20
              300        1.16287  0.28      0.28      0.457071  0.53118   20
              300        1.1875   0.28      0.28      0.452332  0.521888  20
              SoilCrop AGPWhiteCloverSoil: LL=[0.261, 0.248, 0.28, 0.306, 0.36, 0.392, 0.446]; KL=[0.06, 0.06, 0.06, 0.04, 0.04, 0.02, 0.01]; XF=[1, 1, 1, 1, 1, 1, 1]
              SoilCrop AGPRyegrassSoil: LL=[0.261, 0.248, 0.28, 0.306, 0.36, 0.392, 0.446]; KL=[0.06, 0.06, 0.06, 0.04, 0.04, 0.02, 0.01]; XF=[1, 1, 1, 1, 1, 1, 1]
            WaterBalance SoilWater: SummerDate=1-Nov; SummerU=5; SummerCona=5; WinterDate=1-Apr; WinterU=5; WinterCona=5; DiffusConst=40; DiffusSlope=16; Salb=0.12; CN2Bare=73; CNRed=20; CNCov=0.8; Thickness=[150, 150, 300, 300, 300, 300, 300]; SWCON=[0.3, 0.3, 0.3, 0.3, 0.3, 0.3, 0.3]
            SoilNitrogen: fom_types=[default, manure, mucuna, lablab, shemp, stable]; fract_carb=[0.2, 0.3, 0.54, 0.57, 0.45, 0]; fract_cell=[0.7, 0.3, 0.37, 0.37, 0.47, 0.1]; fract_lign=[0.1, 0.4, 0.09, 0.06, 0.08, 0.9]; NPartitionApproach=0
              SoilNitrogenNO3 NO3
              SoilNitrogenNH4 NH4
              SoilNitrogenUrea Urea
              SoilNitrogenPlantAvailableNO3 PlantAvailableNO3
              SoilNitrogenPlantAvailableNH4 PlantAvailableNH4
            Organic: FOMCNRatio=40
              Thickness  Carbon  SoilCNRatio  FBiom  FInert  FOM
              150        0.1     12           0      1       0
              150        0.1     12           0      1       0
              300        0.1     12           0      1       0
              300        0.1     12           0      1       0
              300        0.1     12           0      1       0
              300        0.1     12           0      1       0
              300        0.1     12           0      1       0
            Chemical
              Thickness  NO3N  NH4N  PH
              150        0     0     8
              150        0     0     8
              300        0     0     8
              300        0     0     8
              300        0     0     8
              300        0     0     8
              300        0     0     8
            InitialWater: PercentMethod=1; FractionFull=1
            Sample InitialN: Thickness=[150, 150, 300, 300, 300, 300, 300]; SWUnits=Volumetric; OCUnits=Total; PHUnits=Water
            CERESSoilTemperature
          SurfaceOrganicMatter: InitialResidueName=wheat_stubble; InitialResidueType=wheat; InitialResidueMass=0; InitialStandingFraction=0; InitialCPR=0; InitialCNR=10
          MicroClimate: a_interception=0; b_interception=1; c_interception=0; d_interception=0; soil_albedo=0.3; SoilHeatFluxFraction=0.4; MinimumHeightDiffForNewLayer=0; NightInterceptionFraction=0.5; ReferenceHeight=2
          Manager CreatePatches
            Verbose = True
            NumPatches = 1
```csharp
using System;
using Models.Core;
using Models.PMF;
using Models.Zones;
using Models.AgPasture;
using System.Xml.Serialization;
using Models.Soils;
using APSIM.Shared.Utilities;
using System.Collections.Generic;
using Models.Interfaces;
using Models.Soils.NutrientPatching;

namespace Models
{
    [Serializable]
    [System.Xml.Serialization.XmlInclude(typeof(Model))]
    public class Script : Model
    {
        [Link] private Clock Clock;
        [Link] private Soil soil;
        [Link] private ISummary summary;
        [Link] private Weather Weather;
        [Link] private Zone zone;
        [Link(ByName = true)]
        private SoilNitrogen SoilNitrogen;

        [Description("Verbose reporting mode (True/False)")]
        public bool Verbose { get; set; }
        
        [Description("How many patches should there be in the grid?")]
        public int NumPatches { get; set; }

        
        private List<IModel> zones;

        [EventSubscribe("DoDailyInitialisation")]
        private void OnDoDailyInitialisation(object sender, EventArgs e)
        {    
            bool isEndOfMonth = false;
            if (Clock.Today.AddDays(1).Day == 1)
                isEndOfMonth = true;

            if (Clock.Today == Clock.StartDate)
            {
                

                
                if (Verbose)
                {
                    
                    summary.WriteMessage(this, "NumPatches at start:" + SoilNitrogen.PatchCount.ToString());                    
                }
                
                SoilNitrogen.MaximumNitrogenAvailableToPlants = 3.0;
                SoilNitrogen.NPartitionApproach = PartitionApproachEnum.BasedOnConcentrationAndDelta;
                SoilNitrogen.AutoAmalgamationApproach = AutoAmalgamationApproachEnum.None;
                SoilNitrogen.basePatchApproach = BaseApproachEnum.IDBased;
                SoilNitrogen.AllowPatchAmalgamationByAge = false;
                SoilNitrogen.PatchAgeForForcedMerge = 3.0;                                
                
                int[] PatchToAddTo = new int[1];  //need an array variable for this
                string[] PatchNmToAddTo = new string[1];  
                int nPatchesAdded = 0;
                double NewArea = 1.0 / NumPatches;

                while (nPatchesAdded < NumPatches - 1)
                {
                    AddSoilCNPatchType NewPatch = new AddSoilCNPatchType();
                    NewPatch.DepositionType = DepositionTypeEnum.ToNewPatch;
                    NewPatch.AreaFraction = NewArea;
                    PatchToAddTo[0] = 0;
                    PatchNmToAddTo[0] = "0";
                    NewPatch.AffectedPatches_id = PatchToAddTo;
                    NewPatch.AffectedPatches_nm = PatchNmToAddTo;
                    NewPatch.SuppressMessages = true;
                    SoilNitrogen.Add(NewPatch);
                    nPatchesAdded += 1;
                }                
                if (Verbose)
                    summary.WriteMessage(this, "NumPatches at end of initialisation:" + SoilNitrogen.PatchCount.ToString());
            }                       
        
        }
    }
}
```
          Manager CutRotation
            AllowControl = yes
            CutRotationStartDate = 01/01/1900 00:00:00
            CutRotationEndDate = 12/31/2100 00:00:00
            IntervalType = FixedInterval
            CutInterval = 21
            DurationOfCut = 1
            RemoveAmountType = ResidualDM
            AmountGiven = 1000
            DMRemoveType = BasedOnDigestibility
            FractionN2Remove = 0.75
            ReturnType = AsDungUrine
            NDungType = DefineProportion
            ProportionN2Dung = 0.4
            CNRatioDung = 0
            UrineDepth = 250
```csharp
// Defoliates AgPasture on a regular rotation or one-off via a schedule
// currenty defoliates the amount specified by spreading evenly over the specified period

using Models.Interfaces;
using APSIM.Shared.Utilities;
using Models.Soils;
using Models.PMF;
using Models.Core;
using System.Xml.Serialization;
using System.Collections.Generic;
using System;

namespace Models
{
    [Serializable]
    public class Script : Model
    {
        // - Links to APSIM models
        [Link] Zone myZone;
        [Link] Clock Clock;
        [Link] Fertiliser fertiliser;
        [Link(ByName = true)] ISolute no3;
        [Link] Soil mySoil;
        [Link] ISummary summary = null;
        
        List<AgPasture.PastureSpecies> Pasture = new List<AgPasture.PastureSpecies>();
        
        // - Paramters for this manager
        [Description("Allow this manager to control defoliation? ")]
        public yesnoType AllowControl { get; set; }
        [Description("Date to begin the rotation: ")]
        public DateTime CutRotationStartDate { get; set; }
        [Description("Date to finish the rotation: ")]
        public DateTime CutRotationEndDate { get; set; }
        [Description("How the interval is defined: ")]
        public rotationIntervalTypes IntervalType { get; set; }
        [Description("Rotation interval (days): ")]
        public int CutInterval { get; set; }
        [Description("Duration of each event (days): ")]
        public int DurationOfCut { get; set; }
        [Description("What amount is being defined: ")]
        public removeAmountTypes RemoveAmountType { get; set; }
        [Description("Amount to use (kg/ha): ")]
        public double AmountGiven { get; set; }
        [Description("How much of DM is removed from the field: ")]
        public removeDMTypes DMRemoveType { get; set; }
        [Description("Fraction of N that is removed from the field (0-1): ")]
        public double FractionN2Remove { get; set; }
        [Description("How defoliated material is returned to the field? ")]
        public returnTypes ReturnType { get; set; }
        [Description("How the partition of N to dung and urine are defined:")]
        public dungNContentTypes NDungType { get; set; }
        [Description("Proportion of returned N that goes to dung (0-1): ")]
        public double ProportionN2Dung { get; set; }
        [Description("The C:N of dung (typically around 20): ")]
        public double CNRatioDung { get; set; }
        [Description("Depth down to which urine is applied (mm): ")]
        public double UrineDepth { get; set; }

        // - Outputs from this manager
        [XmlIgnore][Units("g/m2")]// Description: Pasture DM defoliated today
        public double DefoliatedWt { get; set; }
        [XmlIgnore][Units("g/m2")]// Description: Pasture N defoliate today
        public double DefoliatedN { get; set; }
        [XmlIgnore][Units("g/m2")]// Description: Pasture DM harvested today
        public double HarvestedWt { get; set; }
        [XmlIgnore][Units("g/m2")]// Description: Pasture N harvested today
        public double HarvestedN { get; set; }
        [XmlIgnore][Units("g/m2")]// Description: Pasture DM removed from the field
        public double RemovedWt { get; set; }
        [XmlIgnore][Units("g/m2")]// Description: Pasture N removed from the field
        public double RemovedN { get; set; }
        [XmlIgnore][Units("g/m2")]// Description: Residue DM returned to the field
        public double ReturnedWt { get; set; }
        [XmlIgnore][Units("g/m2")]// Description: Residue N returned to the field
        public double ReturnedN { get; set; }
        [XmlIgnore][Units("g/m2")]// Description: Harvested N returned as dung (SurfaceOM)
        public double NReturnedInDung { get; set; }
        [XmlIgnore][Units("g/m2")]// Description: Harvested N returned as urine (urea)
        public double NReturnedInUrine { get; set; }
        [XmlIgnore][Units("day")]// Description: Number of days after last defoliation
        public int DaysAfterCut { get; set; }
        [XmlIgnore][Units("g/m2")]// Description: Total standing DM (Leaf + Stem/Sheath) before cut
        public double PreHarvestDM { get; set; }
        [XmlIgnore][Units("g/m2")]// Description: Total standing DM (Leaf + Stem/Sheath) after cut
        public double PostHarvestDM { get; set; }
        
        // - Internal variables
        // fraction of harvested Dm to actually remove from field
        private double fractionDM2Remove = 1.0;
        // number of days for each defoliation event
        private int cuttingDuration = 0;
        // counter for day within each defoliation
        private int daysCutting = 0;
        // total existing DM harvestable
        private double existingDM;
        // total herbage to remove in g/m2 per day
        private double herbageToRemove;
        // type of DM amount (ResidualDM or DMToRemove)
        private string amountType;
        // auxiliary flag for defoliation
        private bool aCutHasHappened = false;
        // fraction of urine that is applied to each layer
        private double[] fractionUrine;
        // number of layer in the soil
        private int nLayers;

        // - Event to add residue or dung to surface OM
        public event BiomassRemovedDelegate BiomassRemoved;

        [EventSubscribe("StartOfSimulation")]
        private void OnSimulationCommencing(object sender, EventArgs e)
        {
            foreach (AgPasture.PastureSpecies species in Apsim.Children(myZone, typeof(AgPasture.PastureSpecies)))
                Pasture.Add(species);

            // reset variables
            DaysAfterCut = 0;
            resetVariables();
            cuttingDuration = DurationOfCut;
            
            // get the type of amount given
            if (RemoveAmountType == removeAmountTypes.ResidualDM)
                amountType = "SetResidueAmount";
            else
                amountType = "SetRemoveAmount";

            // make sure that rotation start when startDate < simulationStartDay
            if ((Clock.Today > CutRotationStartDate) && (Clock.Today < CutRotationEndDate))
                CutRotationStartDate = Clock.Today;
                
            // set the fraction of urine for each layer
            nLayers = mySoil.Thickness.Length;
            fractionUrine = new double[nLayers];
            double soilDepth = 0.0;
            double distFactor = 1.5;
            if (ReturnType == returnTypes.AsDungUrine)
            {
                double atZ0;
                double atZ1;
                double totalProp = UrineDepth * Math.Pow(1.0, distFactor) / (distFactor + 1.0);
                
                atZ1 = (UrineDepth - soilDepth) * Math.Pow(1.0 - soilDepth / UrineDepth, distFactor) / (distFactor + 1.0);
                for (int z = 0; z < nLayers; z++)
                {
                    atZ0 = atZ1;
                    soilDepth += mySoil.Thickness[z];
                    atZ1 = (UrineDepth - soilDepth) * Math.Pow(1.0 - soilDepth / UrineDepth, distFactor) / (distFactor + 1);
                    if (1.0 - (soilDepth / UrineDepth) < 0.0)
                        atZ1 = 0;
                    fractionUrine[z] = (atZ0 - atZ1) / totalProp;
                }
            }
        }
        
        [EventSubscribe("DoManagement")]
        private void OnDoManagement(object sender, EventArgs e)
        {
            // Check whether defoliation is allowed at all
            if (AllowControl == yesnoType.yes)
            {
                // Check whether defoliation can start
                if ((Clock.Today >= CutRotationStartDate) && (Clock.Today <= CutRotationEndDate))
                {
                    if (Clock.Today == CutRotationStartDate)
                        DaysAfterCut = CutInterval;
    
                    // Check whether we should start a defoliation
                    if ((Pasture[0].IsAlive) && (DaysAfterCut >= (CutInterval - 1)))
                        StartDefoliation(AmountGiven, amountType, DurationOfCut);
                }
            }
            //// Note: Only the code above should be limited by 'AllowControl'. So the rest of the code
            ////  can be used by being called from another manager or a schedulle thingy


            // Check whether we need to continue cutting
            if ((daysCutting > 0) && (daysCutting < cuttingDuration))
            {
                // reset outputs
                resetVariables();

                defoliatePasture(herbageToRemove);
                if (ReturnType == returnTypes.AsResidue)
                    returnResidues();
                else
                    returnExcreta();
                daysCutting += 1;
                if (daysCutting == cuttingDuration)
                {
                    PostHarvestDM = 0.0;
                    foreach (AgPasture.PastureSpecies species in Pasture)
                        PostHarvestDM += species.Standing.Wt;
                }
            }

            // reset outputs
            if (daysCutting < 0)
            {
                resetVariables();
                daysCutting = 0;
            }
        }

        [EventSubscribe("DoManagementCalculations")]
        private void OnDoManagementCalculations(object sender, EventArgs e)
        {
            // Check whether a cutting has finished
            if (daysCutting == cuttingDuration)
            {
                aCutHasHappened = true;
                daysCutting = -1;
            }

            // Increase the counter for days after cutting
            if (aCutHasHappened && (daysCutting == 0))
                DaysAfterCut += 1;
        }

        // Resets the values of all outputs
        private void resetVariables()
        {
            DefoliatedWt = 0.0;
            DefoliatedN = 0.0;
            HarvestedWt = 0.0;
            HarvestedN = 0.0;
            RemovedWt = 0.0;
            RemovedN = 0.0;
            ReturnedWt = 0.0;
            ReturnedN = 0.0;
            NReturnedInDung = 0.0;
            NReturnedInUrine = 0.0;
        }

        // Description: Perform the basic calculations for defoliation
        public void StartDefoliation(double amountDM, string amountType, int duration)
        {
            // Get the existing plant amount
            existingDM = 0.0;
            PreHarvestDM = 0.0;
            foreach (AgPasture.PastureSpecies species in Pasture)
            {
                PreHarvestDM += species.Standing.Wt;
                existingDM += species.Harvestable.Wt;
            }
            
            // Check the amount to remove and print some info
            if ((amountType == "SetRemoveAmount") && (existingDM >= amountDM / duration))
            {
                summary.WriteMessage(this, "   Defoliating " + (10 * amountDM).ToString("#0.0") + "kg/ha over " + duration + " days");
                herbageToRemove = amountDM / duration;
            }
            else if ((amountType == "SetResidueAmount") && (existingDM >= amountDM))
            {
                summary.WriteMessage(this, "   Defoliating down to approximately " + (10 * amountDM).ToString("#0.0") + "kg/ha over " + duration + " days");
                herbageToRemove = (PreHarvestDM - amountDM) / duration;
            }
            else
            {
                summary.WriteMessage(this, "   Defoliation will not happend because there is not enough plant material");
                if (IntervalType == rotationIntervalTypes.FixedInterval)
                    DaysAfterCut = -duration;
                return;
            }

            // Start defoliation
            cuttingDuration = duration;
            defoliatePasture(herbageToRemove);
            if (ReturnType == returnTypes.AsResidue)
                returnResidues();
            else
                returnExcreta();
                
            daysCutting = 1;
            DaysAfterCut = 0;
            if (daysCutting == cuttingDuration)
            {
                PostHarvestDM = 0.0;
                foreach (AgPasture.PastureSpecies species in Pasture)
                    PostHarvestDM += species.Standing.Wt;
            }
        }

        // Do the DM removal
        private void defoliatePasture(double removeAmount)
        {
            // Remove a proportion of required DM from each species
            DefoliatedWt = 0.0;
            DefoliatedN = 0.0;
            foreach (AgPasture.PastureSpecies species in Pasture)
            {
                double amountToRemove = removeAmount * species.Harvestable.Wt / existingDM;
                species.RemoveBiomass(amount: amountToRemove, type: "SetRemoveAmount");
                DefoliatedWt += species.HarvestedWt;
                DefoliatedN += species.HarvestedN;
            }
            
            // total harvested is equal total defoliated, for now
            HarvestedWt = DefoliatedWt;
            HarvestedN = DefoliatedN;

            // get amounts actually removed from field and that to be returned (dung/urine)
            if (DMRemoveType == removeDMTypes.RemoveAll)
                fractionDM2Remove = 1.0;
            else if (DMRemoveType == removeDMTypes.RemoveNone)
                fractionDM2Remove = 0.0;
            else
            {
                fractionDM2Remove = 0.0;
                foreach (AgPasture.PastureSpecies species in Pasture)
                    fractionDM2Remove += species.HarvestedDigestibility * species.HarvestedWt;
                fractionDM2Remove /= removeAmount;
            }
            
            RemovedWt = HarvestedWt * fractionDM2Remove;
            RemovedN = HarvestedN * FractionN2Remove;
            ReturnedWt = HarvestedWt - RemovedWt;
            ReturnedN = HarvestedN - RemovedN;

            if (ReturnType == returnTypes.AsDungUrine)
            {
                if (NDungType == dungNContentTypes.DefineProportion)
                    NReturnedInDung = ReturnedN * ProportionN2Dung;
                else
                    NReturnedInDung = Math.Min(ReturnedN, ReturnedWt * 0.4 / CNRatioDung);
                NReturnedInUrine = ReturnedN - NReturnedInDung;
            }
            else
            {
                NReturnedInDung = 0.0;
                NReturnedInUrine = 0.0;
            }
        }
        
        // Return dung and urine
        private void returnExcreta()
        {
            if ((ReturnedWt > 0.0) || (NReturnedInDung > 0.0))
            {
                PMF.BiomassRemovedType BiomassDung = new PMF.BiomassRemovedType();
                string[] type = new string[] { "RuminantDung_PastureFed" };
                float[] dltdm = new float[] { (Single)ReturnedWt };
                float[] dltn = new float[] { (Single)NReturnedInDung };
                float[] dltp = new float[] { 0 };
                float[] fraction = new float[] { 1 };     // fraction is always 1.0 here

                BiomassDung.crop_type = "RuminantDung_PastureFed";
                BiomassDung.dm_type = type;
                BiomassDung.dlt_crop_dm = dltdm;
                BiomassDung.dlt_dm_n = dltn;
                BiomassDung.dlt_dm_p = dltp;
                BiomassDung.fraction_to_residue = fraction;
                BiomassRemoved.Invoke(BiomassDung);
            }

            if (NReturnedInUrine > 0.0)
            {
                double[] myUrineDeposition = new double[nLayers];
                for (int z = 0; z < nLayers; z++)
                    myUrineDeposition[z] = NReturnedInUrine * fractionUrine[z];

                no3.AddKgHaDelta(SoluteSetterType.Fertiliser, myUrineDeposition);
                //fertiliser.Apply(NReturnedInUrine * 10, Fertiliser.Types.UreaN, 1.0);
            }
        }

        // Return pasture residues
        private void returnResidues()
        {
            if ((ReturnedWt > 0.0) || (ReturnedN > 0.0))
            {
                PMF.BiomassRemovedType BiomassDung = new PMF.BiomassRemovedType();
                string[] type = new string[] { "Grass" };
                float[] dltdm = new float[] { (Single)ReturnedWt };
                float[] dltn = new float[] { (Single)ReturnedN };
                float[] dltp = new float[] { 0 };
                float[] fraction = new float[] { 1 };     // fraction is always 1.0 here

                BiomassDung.crop_type = "Grass";
                BiomassDung.dm_type = type;
                BiomassDung.dlt_crop_dm = dltdm;
                BiomassDung.dlt_dm_n = dltn;
                BiomassDung.dlt_dm_p = dltp;
                BiomassDung.fraction_to_residue = fraction;
                BiomassRemoved.Invoke(BiomassDung);
            }
        }
        
        // Auxiliary bits and pieces  - - - - - - - - - - - - - - - - - - - - - - - -  - - - - -  - -

        public enum yesnoType
        {
            /// <summary>a positive answer</summary>
            yes,
            /// <summary>a negative answer</summary>
            no
        }

        public enum removeAmountTypes
        {
            /// <summary>Setting DM amount to remove</summary>
            DMToRemove,
            /// <summary>Setting residual DM amount</summary>
            ResidualDM
        }

        public enum rotationIntervalTypes
        {
            /// <summary>Setting a fixed interval</summary>
            FixedInterval,
            /// <summary>Setting a target (minimum) inteval</summary>
            TargetInterval
        }

        public enum removeDMTypes
        {
            /// <summary>Remove all DM</summary>
            RemoveAll,
            /// <summary>Remove no DM</summary>
            RemoveNone,
            /// <summary>Remove a fraction based on digestibility</summary>
            BasedOnDigestibility
        }
        
        public enum returnTypes
        {
            /// <summary>Return plant material as residue</summary>
            AsResidue,
            /// <summary>Return meterial as dung and urine</summary>
            AsDungUrine
        }

        public enum dungNContentTypes
        {
            /// <summary>Define the proportion of N returned as dung</summary>
            DefineProportion,
            /// <summary>Define the C:N of dung</summary>
            DefineCNratio,
        }
    }
}
```
          Manager KillPlants: same as DifferenceTesting.Experiment.Factors.Permutation.Plant.On
          Operations FertiliserSchedule
            1981-01-10  [Fertiliser].Apply(0, Fertiliser.Types.NO3N, 30);
          PastureSpecies AGPRyegrass: InitialShootDM=1500; InitialRootDM=450; InitialRootDepth=750
          PastureSpecies AGPWhiteClover: InitialShootDM=500; InitialRootDM=150; InitialRootDepth=350
        Zone 10Patch: Area=1; Slope=0; AspectAngle=0; Altitude=50
          Fertiliser
          Soil: ASCOrder=Vertosol; ASCSubOrder=Black; SoilType=Clay; Site=Norwin; NearestTown=Norwin; Region=Darling Downs and Granite Belt; State=Queensland; Country=Australia; NaturalVegetation=Qld. Bluegrass, possible Qld. Blue gum; ApsoilNumber=900; Latitude=-27.581836; Longitude=151.320206; LocationAccuracy=+/- 20m
            DataSource=CSIRO Sustainable Ecosystems, Toowoomba; Characteriesd as part of the GRDC funded project"Doing it better, doing it smarter, managing soil water in Australian agriculture' 2011
            Comments=OC, CLL for all crops estimated-based on Bongeen Mywybilla Soil No1
            Physical: same as DifferenceTesting.Experiment.Diffs.1Patch.Soil.Physical
            WaterBalance SoilWater: same as DifferenceTesting.Experiment.Diffs.1Patch.Soil.SoilWater
            SoilNitrogen: same as DifferenceTesting.Experiment.Diffs.1Patch.Soil.SoilNitrogen
            Organic: same as DifferenceTesting.Experiment.Factors.Permutation.SoilOM.Off
            Chemical
              Thickness  NO3N  NH4N  PH
              150        0     0     8
              150        0     0     8
              300        0     0     8
              300        0     0     8
              300        0     0     8
              300        0     0     8
              300        0     0     8
            InitialWater: PercentMethod=1; FractionFull=1
            Sample InitialN: Thickness=[150, 150, 300, 300, 300, 300, 300]; SWUnits=Volumetric; OCUnits=Total; PHUnits=Water
            CERESSoilTemperature
          SurfaceOrganicMatter: InitialResidueName=wheat_stubble; InitialResidueType=wheat; InitialResidueMass=0; InitialStandingFraction=0; InitialCPR=0; InitialCNR=10
          MicroClimate: a_interception=0; b_interception=1; c_interception=0; d_interception=0; soil_albedo=0.3; SoilHeatFluxFraction=0.4; MinimumHeightDiffForNewLayer=0; NightInterceptionFraction=0.5; ReferenceHeight=2
          Manager CreatePatches
            Verbose = True
            NumPatches = 10
```csharp
using System;
using Models.Core;
using Models.PMF;
using Models.Zones;
using Models.AgPasture;
using System.Xml.Serialization;
using Models.Soils;
using APSIM.Shared.Utilities;
using System.Collections.Generic;
using Models.Interfaces;


namespace Models
{
    [Serializable]
    [System.Xml.Serialization.XmlInclude(typeof(Model))]
    public class Script : Model
    {
        [Link] private Clock Clock;
        [Link] private Soil soil;
        [Link] private ISummary summary;
        [Link] private Weather Weather;
        [Link] private Zone zone;
        public  event AddSoilCNPatchDelegate AddSoilCNPatch;
        [Link(ByName = true)]
        private SoilNitrogen SoilNitrogen;

        [Description("Verbose reporting mode (True/False)")]
        public bool Verbose { get; set; }
        
        [Description("How many patches should there be in the grid?")]
        public int NumPatches { get; set; }

        
        private List<IModel> zones;

        [EventSubscribe("DoDailyInitialisation")]
        private void OnDoDailyInitialisation(object sender, EventArgs e)
        {    
            bool isEndOfMonth = false;
            if (Clock.Today.AddDays(1).Day == 1)
                isEndOfMonth = true;

            if (Clock.Today == Clock.StartDate)
            {
                

                
                if (Verbose)
                {
                    
                    summary.WriteMessage(this, "NumPatches at start:" + SoilNitrogen.PatchCount.ToString());                    
                }
                
                SoilNitrogen.MaximumNitrogenAvailableToPlants = 3.0;
                SoilNitrogen.NPartitionApproach = "BasedOnConcentrationAndDelta";
                SoilNitrogen.AllowPatchAutoAmalgamation = "No";
                SoilNitrogen.AutoAmalgamationApproach = "CompareAll";
                SoilNitrogen.basePatchApproach = "IDBased";
                SoilNitrogen.AllowPatchAmalgamationByAge = "No";
                SoilNitrogen.PatchAgeForForcedMerge = 3.0;                                
                
                int[] PatchToAddTo = new int[1];  //need an array variable for this
                string[] PatchNmToAddTo = new string[1];  
                int nPatchesAdded = 0;
                double NewArea = 1.0 / NumPatches;

                while (nPatchesAdded < NumPatches - 1)
                {
                    AddSoilCNPatchType NewPatch = new AddSoilCNPatchType();
                    NewPatch.DepositionType = "ToNewPatch";
                    NewPatch.AreaFraction = NewArea;
                    PatchToAddTo[0] = 0;
                    PatchNmToAddTo[0] = "0";
                    NewPatch.AffectedPatches_id = PatchToAddTo;
                    NewPatch.AffectedPatches_nm = PatchNmToAddTo;
                    NewPatch.SuppressMessages = "yes";
                    AddSoilCNPatch.Invoke(NewPatch);
                    nPatchesAdded += 1;
                }                
                if (Verbose)
                    summary.WriteMessage(this, "NumPatches at end of initialisation:" + SoilNitrogen.PatchCount.ToString());
            }                       
        
        }
    }
}
```
          Manager CutRotation
            AllowControl = yes
            CutRotationStartDate = 1900-01-01
            CutRotationEndDate = 2100-12-31
            IntervalType = FixedInterval
            CutInterval = 21
            DurationOfCut = 1
            RemoveAmountType = ResidualDM
            AmountGiven = 1000
            DMRemoveType = BasedOnDigestibility
            FractionN2Remove = 0.75
            ReturnType = AsDungUrine
            NDungType = DefineProportion
            ProportionN2Dung = 0.4
            CNRatioDung = 0
            UrineDepth = 250
            script: same as in DifferenceTesting.Experiment.Diffs.1Patch.CutRotation
          Manager KillPlants: same as DifferenceTesting.Experiment.Factors.Permutation.Plant.Off
          Operations FertiliserSchedule
            1981-01-10  [Fertiliser].Apply(0, Fertiliser.Types.NO3N, 30);
          PastureSpecies AGPRyegrass: InitialShootDM=1500; InitialRootDM=450; InitialRootDepth=750
          PastureSpecies AGPWhiteClover: InitialShootDM=500; InitialRootDM=150; InitialRootDepth=350
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