Simulations: Version=159
  DataStore
    ExcelInput: FileNames=[PatchyMcPatchFace.xlsx]; SheetNames=[Sheet1]
  Simulation PatchManager
    Clock: Start=1972-01-21; End=1972-03-31
    Summary SummaryFile
    Weather: FileName=%root%\Tests\WeatherFiles\Ruakura.met
    SoilArbitrator Soil Arbitrator
    MicroClimate: a_interception=0; b_interception=1; c_interception=0; d_interception=0; SoilHeatFluxFraction=0.4; MinimumHeightDiffForNewLayer=0; NightInterceptionFraction=0.5; ReferenceHeight=2
    Forages
      Parameters:
        Name                          IsLive  DigestibilityString  FractionConsumable  MinimumAmount  UseDigestibilityFromModel
        SurfaceOrganicMatter.Residue  true    0.7                  1                   100            false
        SurfaceOrganicMatter.Residue  false   0.3                  1                   0              false
        AGPRyegrass.Leaf              true    0.7                  1                   100            false
        AGPRyegrass.Leaf              false   0.3                  1                   0              false
        AGPRyegrass.Stem              true    0.7                  1                   100            false
        AGPRyegrass.Stem              false   0.3                  1                   0              false
        AGPRyegrass.Stolon            true    0.7                  1                   100            false
        AGPRyegrass.Stolon            false   0.3                  1                   0              false
    Zone Nutrient: Area=1; Slope=0; AspectAngle=0; Altitude=50
      Manager Fertilise on fixed dates
        FertiliserType = UreaN
        FertiliserDates = 31-jan
        Amount = 120
        AmountType = False
```csharp
using Models.Soils;
using System;
using Models.Core;
using Models.PMF;
using APSIM.Shared.Utilities;
namespace Models
{
    [Serializable]
    public class Script : Model
    {
        [Link] Clock Clock;
        [Link] Fertiliser Fertiliser;
        
        [Separator("A component to apply fertiliser on one or more dates on every year of the simulation")]

        [Description("Type of fertiliser to apply? ")] 
        public Fertiliser.Types FertiliserType { get; set; }

        [Description("Enter the fertilisation dates as dd-mmm with comma separation (any year information entered will be ignored): ")] 
        public string[] FertiliserDates { get; set; } 

        [Description("Amount of fertiliser to be applied (kg /ha)")] 
        public double Amount { get; set; }

        [Description("Is the above amount to be applied each time? (yes/ticked)? Or is it the total annual amount across all dates (no/unticked)")] 
        public bool AmountType { get; set; }
        
        [EventSubscribe("DoManagement")]
        private void OnDoManagement(object sender, EventArgs e)
        {
            foreach (string ddMMM in FertiliserDates)
            {
                if (DateUtilities.DatesEqual(ddMMM, Clock.Today))
                {
                    if (AmountType)
                        Fertiliser.Apply(Amount: Amount, Type: FertiliserType);
                    else
                        Fertiliser.Apply(Amount: Amount / FertiliserDates.Length, Type: FertiliserType);
                }
            }
        }
    }
}
```
      Fertiliser
      Irrigation
      SimpleGrazing: GrazingRotationType=0; SimpleGrazingFrequencyString=0; SimpleMinGrazable=21; SimpleGrazingResidual=1000; FlexibleGrazePostDM=0; FractionDefoliatedNToSoil=[0.9]; FractionExcretedNToDung=[0.4]; DepthUrineIsAdded=200; FractionPopulationDecline=0; TramplingOn=false; MaximumPropLitterMovedToSoil=0.1; PastureConsumedAtMaximumRateOfLitterRemoval=1200
      SurfaceOrganicMatter: InitialResidueName=grass; InitialResidueType=grass; InitialResidueMass=0; InitialStandingFraction=0; InitialCPR=0; InitialCNR=15
      Soil HE_140mm: SoilType=NZ_sedementary; Region=Plains; State=Canterbury; Country=New Zealand; Latitude=0; Longitude=0
        DataSource=Generic profile descriptions provided by Trevor Webb and data for functional horizions based on SWAMP project results
        Comments=Bulk density values were measured on the fine earth fraction so values entered into apsim soil are adjusted down to account for stone content (assuming stones are inert from all soil process so their mass and volume is removed from model paramaters).  SAT, DUL, LL15 and Air dry have been adjusted down to account for stone content.  OC has not been adjusted so the model will get the correct carbon and N amounts using the adjusted BD.
        Physical
          Thickness  ParticleSizeClay  ParticleSizeSand  ParticleSizeSilt  BD     AirDry  LL15   DUL    SAT    KS
          200        20                14.5              65.5              1.31   0.077   0.153  0.373  0.456  4832.039
          150        24                18                58                1.524  0.201   0.201  0.332  0.394  389.229
          200        39                13                48                1.42   0.298   0.298  0.426  0.442  21.6
          350        44                1                 55                1.424  0.308   0.308  0.446  0.456  19.051
          150        44                1                 55                1.424  0.308   0.308  0.446  0.456  19.051
          150        19                15                66                1.601  0.162   0.162  0.325  0.376  97.995
          300        19                15                66                1.601  0.162   0.162  0.325  0.376  97.995
          SoilCrop AGPRyegrassSoil: LL=[0.154, 0.201, 0.299, 0.308, 0.308, 0.162, 0.162]; KL=[0.1, 0.1, 0.1, 0.05, 0.05, 0.05, 0.05]; XF=[1, 0.8, 0.8, 0.3, 0, 0, 0]
          SoilCrop AGPWhiteCloverSoil: LL=[0.154, 0.201, 0.299, 0.308, 0.308, 0.162, 0.162]; KL=[0.1, 0.1, 0.1, 0.05, 0.05, 0.05, 0.05]; XF=[1, 0.8, 0.8, 0.3, 0, 0, 0]
        Organic: FOMCNRatio=40; CarbonUnits=Total
          Thickness  Carbon  SoilCNRatio  FBiom  FInert  FOM
          200        0       11           0.048  0.382   0
          150        0       11           0.027  0.634   0
          200        0       11           0.019  0.784   0
          350        0       11           0.015  0.924   0
          150        0       11           0.015  0.924   0
          150        0       11           0.015  0.971   0
          300        0       11           0.015  0.985   0
        Chemical: Thickness=[200, 150, 200, 350, 150, 150, 300]; PH=[6, 6, 6, 6, 6, 6, 6]; PHUnits=Water
        WaterBalance SoilWater: SummerDate=1-Oct; SummerU=9; SummerCona=4.4; WinterDate=1-Apr; WinterU=6; WinterCona=3; DiffusConst=88; DiffusSlope=35; Salb=0.13; CN2Bare=73; CNRed=20; CNCov=0.8; PSIDul=-100; Thickness=[200, 150, 200, 350, 150, 150, 300]
          SWCON=[0.496442, 0.365575, 0.373877, 0.0758548, 0.076, 0.306, 0.306]
        Water: Thickness=[200, 150, 200, 350, 150, 150, 300]; InitialValues=[0.373, 0.332, 0.426, 0.446, 0.446, 0.325, 0.325]; RelativeTo=LL15; FilledFromTop=true
        Nutrient
        CERESSoilTemperature Temperature
        Solute NO3: Thickness=[200, 150, 200, 350, 150, 150, 300]; InitialValues=[18.98, 4.625, 1.047, 1.047, 1.031, 1, 1]; InitialValuesUnits=ppm; WaterTableConcentration=0; D0=0; DepthConstant=0; MaxDepthSoluteAccessible=0; RunoffEffectivenessAtMovingSolute=0; MaxEffectiveRunoff=0
        Solute NH4: Thickness=[200, 150, 200, 350, 150, 150, 300]; InitialValues=[0.884, 0.313, 0.105, 0.105, 0.136, 0.2, 0.2]; InitialValuesUnits=ppm; WaterTableConcentration=0; D0=0; DepthConstant=0; MaxDepthSoluteAccessible=0; RunoffEffectivenessAtMovingSolute=0; MaxEffectiveRunoff=0
        Solute Urea: Thickness=[200, 150, 200, 350, 150, 150, 300]; InitialValues=[0, 0, 0, 0, 0, 0, 0]; InitialValuesUnits=ppm; WaterTableConcentration=0; D0=0; DepthConstant=0; MaxDepthSoluteAccessible=0; RunoffEffectivenessAtMovingSolute=0; MaxEffectiveRunoff=0
      PastureSpecies AGPRyegrass: doyGermination=275; daysEmergenceToAnthesis=120; daysAnthesisToMaturity=85; degreesDayForAnthesis=1100; degreesDayForMaturity=900; daysAnnualsFactor=45; InitialShootDM=1500; InitialRootDM=450; InitialRootDepth=750; initialDMFractionsGrasses=[0.15, 0.25, 0.25, 0.05, 0.05, 0.1, 0.1, 0.05, 0, 0, 0]; initialDMFractionsForbs=[0.2, 0.2, 0.15, 0.05, 0.1, 0.15, 0.1, 0.05, 0, 0, 0]; PhotosyntheticEfficiency=0.01; PhotosynthesisCurveFactor=0.8; FractionPAR=0.5; ReferenceCO2=380; CO2EffectScaleFactor=700; CO2EffectOffsetFactor=600; CO2EffectMinimum=0.7; CO2EffectExponent=2; ReproSeasonDurationCoeff=2; ReproSeasonShouldersLengthFactor=1; ReproSeasonOnsetDurationFactor=0.6; RelativeTurnoverEmerging=2; DetachmentDroughtCoefficient=3; DetachmentDroughtEffectMin=0.1; TurnoverStockFactor=0.01; TurnoverDefoliationEffectMin=0.025; MinimumGreenLeafProp=0.8; MinimumGreenRootProp=0.5
        initialDMFractionsLegumes=[0.16, 0.23, 0.22, 0.05, 0.03, 0.05, 0.05, 0.01, 0.04, 0.08, 0.08]
        LinearInterpolationFunction FVPDFunction
      PastureSpecies AGPWhiteClover: doyGermination=275; daysEmergenceToAnthesis=120; daysAnthesisToMaturity=85; degreesDayForAnthesis=1100; degreesDayForMaturity=900; daysAnnualsFactor=45; InitialShootDM=500; InitialRootDM=150; InitialRootDepth=350; initialDMFractionsGrasses=[0.15, 0.25, 0.25, 0.05, 0.05, 0.1, 0.1, 0.05, 0, 0, 0]; initialDMFractionsForbs=[0.2, 0.2, 0.15, 0.05, 0.1, 0.15, 0.1, 0.05, 0, 0, 0]; PhotosyntheticEfficiency=0.01; PhotosynthesisCurveFactor=0.8; FractionPAR=0.5; ReferenceCO2=380; CO2EffectScaleFactor=700; CO2EffectOffsetFactor=600; CO2EffectMinimum=0.7; CO2EffectExponent=2; ReproSeasonDurationCoeff=2; ReproSeasonShouldersLengthFactor=1; ReproSeasonOnsetDurationFactor=0.6; RelativeTurnoverEmerging=2; DetachmentDroughtCoefficient=3; DetachmentDroughtEffectMin=0.1; TurnoverStockFactor=0.01; TurnoverDefoliationEffectMin=0.025; MinimumGreenLeafProp=0.8; MinimumGreenRootProp=0.5
        initialDMFractionsLegumes=[0.16, 0.23, 0.22, 0.05, 0.03, 0.05, 0.05, 0.01, 0.04, 0.08, 0.08]
        LinearInterpolationFunction FVPDFunction
      Report NutrientReport: EventNames=[Clock].EndOfDay
        VariableNames:
          [Clock].Today as Date
          sum([Soil].Urea.kgha) + sum([Soil].NH4.kgha) + sum([Soil].NO3.kgha) as MinN
          sum([Soil].NO3.kgha) / (sum([Soil].Urea.kgha) + sum([Soil].NH4.kgha) + sum([Soil].NO3.kgha)) as PropNO3
          [Soil].SoilWater.LeachUrea + [Soil].SoilWater.LeachNH4 + [Soil].SoilWater.LeachNO3 as LeachN
          [AgPRyegrass].AboveGroundWt + [AgPWhiteClover].AboveGroundWt as AGBiomass
          [AgPRyegrass].NetGrowthWt + [AgPWhiteClover].NetGrowthWt as Growth
          sum([Soil].Nutrient.DenitrifiedN) as Denit
          sum([Soil].Nutrient.Organic.N) as OrganicN
          sum([Soil].Nutrient.Organic.C) as OrganicC
          [Soil].SoilWater.Drainage as Drainage
          [AgPRyegrass].WaterUptake + [AgPWhiteClover].WaterUptake as WaterUptake
          [AgPRyegrass].NitrogenUptake + [AgPWhiteClover].NitrogenUptake as NUptake
          [AgPWhiteClover].AboveGroundWt / ([AgPRyegrass].AboveGroundWt + [AgPWhiteClover].AboveGroundWt) as CloverProp
    Zone Patch (disabled): Area=1; Slope=0; AspectAngle=0; Altitude=50
      Manager Fertilise on fixed dates
        FertiliserType = UreaN
        FertiliserDates = 31-jan
        Amount = 120
        AmountType = False
        script: same as in PatchManager.Nutrient.Fertilise on fixed dates
      Fertiliser
      Irrigation
      SimpleGrazing: GrazingRotationType=0; SimpleGrazingFrequencyString=end of month; SimpleMinGrazable=21; SimpleGrazingResidual=1000; FlexibleGrazePostDM=0; FractionDefoliatedNToSoil=[0.9]; FractionExcretedNToDung=[0.4]; CNRatioDung=0; DepthUrineIsAdded=200; FractionPopulationDecline=0; TramplingOn=false; MaximumPropLitterMovedToSoil=0.1; PastureConsumedAtMaximumRateOfLitterRemoval=1200
      SurfaceOrganicMatter: InitialResidueName=grass; InitialResidueType=grass; InitialResidueMass=0; InitialStandingFraction=0; InitialCPR=0; InitialCNR=15
      Soil HE_140mm: SoilType=NZ_sedementary; Region=Plains; State=Canterbury; Country=New Zealand; Latitude=0; Longitude=0
        DataSource=Generic profile descriptions provided by Trevor Webb and data for functional horizions based on SWAMP project results
        Comments=Bulk density values were measured on the fine earth fraction so values entered into apsim soil are adjusted down to account for stone content (assuming stones are inert from all soil process so their mass and volume is removed from model paramaters).  SAT, DUL, LL15 and Air dry have been adjusted down to account for stone content.  OC has not been adjusted so the model will get the correct carbon and N amounts using the adjusted BD.
        Physical
          Thickness  ParticleSizeClay  ParticleSizeSand  ParticleSizeSilt  BD      AirDry   LL15    DUL     SAT       KS
          200        20                14.5              65.5              1.3105  0.07675  0.1535  0.3735  0.456165  4832.04
          150        24                18                58                1.524   0.201    0.201   0.332   0.39432   389.229
          200        39                13                48                1.42    0.2985   0.2985  0.426   0.441525  21.6
          350        44                1                 55                1.424   0.308    0.308   0.446   0.4557    19.0512
          150        44                1                 55                1.424   0.308    0.308   0.446   0.456     19.051
          150        19                15                66                1.601   0.162    0.162   0.325   0.376     97.995
          300        19                15                66                1.601   0.162    0.162   0.325   0.376     97.995
          SoilCrop AGPRyegrassSoil: LL=[0.154, 0.201, 0.299, 0.308, 0.308, 0.162, 0.162]; KL=[0.1, 0.1, 0.1, 0.05, 0.05, 0.05, 0.05]; XF=[1, 0.8, 0.8, 0.3, 0, 0, 0]
          SoilCrop AGPWhiteCloverSoil: LL=[0.154, 0.201, 0.299, 0.308, 0.308, 0.162, 0.162]; KL=[0.1, 0.1, 0.1, 0.05, 0.05, 0.05, 0.05]; XF=[1, 0.8, 0.8, 0.3, 0, 0, 0]
        Organic: FOMCNRatio=40; CarbonUnits=Total
          Thickness  Carbon  SoilCNRatio  FBiom  FInert  FOM
          200        0       11           0.048  0.382   0
          150        0       11           0.027  0.634   0
          200        0       11           0.019  0.784   0
          350        0       11           0.015  0.924   0
          150        0       11           0.015  0.924   0
          150        0       11           0.015  0.971   0
          300        0       11           0.015  0.985   0
        Chemical: Thickness=[200, 150, 200, 350, 150, 150, 300]; PH=[6, 6, 6, 6, 6, 6, 6]; PHUnits=Water
        WaterBalance SoilWater: SummerDate=1-Oct; SummerU=9; SummerCona=4.4; WinterDate=1-Apr; WinterU=6; WinterCona=3; DiffusConst=88; DiffusSlope=35; Salb=0.13; CN2Bare=73; CNRed=20; CNCov=0.8; PSIDul=-100; Thickness=[200, 150, 200, 350, 150, 150, 300]
          SWCON=[0.496442, 0.365575, 0.373877, 0.0758548, 0.076, 0.306, 0.306]
        Water: Thickness=[200, 150, 200, 350, 150, 150, 300]; InitialValues=[0.3735, 0.332, 0.426, 0.446, 0.446, 0.325, 0.325]; FilledFromTop=true
        NutrientPatchManager: MaximumNitrogenAvailableToPlants=3; NPartitionApproach=0; AutoAmalgamationApproach=0; basePatchApproach=0; AllowPatchAmalgamationByAge=false; PatchAgeForForcedMerge=0; LayerForNPartition=-99
        CERESSoilTemperature Temperature
        SolutePatch NO3: Thickness=[200, 150, 200, 350, 150, 150, 300]; InitialValues=[18.98, 4.625, 1.047, 1.047, 1.031, 1, 1]; InitialValuesUnits=ppm; WaterTableConcentration=0; D0=0; DepthConstant=0; MaxDepthSoluteAccessible=0; RunoffEffectivenessAtMovingSolute=0; MaxEffectiveRunoff=0
        SolutePatch NH4: Thickness=[200, 150, 200, 350, 150, 150, 300]; InitialValues=[0.884, 0.313, 0.105, 0.105, 0.136, 0.2, 0.2]; InitialValuesUnits=ppm; WaterTableConcentration=0; D0=0; DepthConstant=0; MaxDepthSoluteAccessible=0; RunoffEffectivenessAtMovingSolute=0; MaxEffectiveRunoff=0
        SolutePatch Urea: Thickness=[200, 150, 200, 350, 150, 150, 300]; InitialValues=[0, 0, 0, 0, 0, 0, 0]; InitialValuesUnits=kg/ha; WaterTableConcentration=0; D0=0; DepthConstant=0; MaxDepthSoluteAccessible=0; RunoffEffectivenessAtMovingSolute=0; MaxEffectiveRunoff=0
      PastureSpecies AGPRyegrass: doyGermination=275; daysEmergenceToAnthesis=120; daysAnthesisToMaturity=85; degreesDayForAnthesis=1100; degreesDayForMaturity=900; daysAnnualsFactor=45; InitialShootDM=1500; InitialRootDM=450; InitialRootDepth=750; initialDMFractionsGrasses=[0.15, 0.25, 0.25, 0.05, 0.05, 0.1, 0.1, 0.05, 0, 0, 0]; initialDMFractionsForbs=[0.2, 0.2, 0.15, 0.05, 0.1, 0.15, 0.1, 0.05, 0, 0, 0]; PhotosyntheticEfficiency=0.01; PhotosynthesisCurveFactor=0.8; FractionPAR=0.5; ReferenceCO2=380; CO2EffectScaleFactor=700; CO2EffectOffsetFactor=600; CO2EffectMinimum=0.7; CO2EffectExponent=2; ReproSeasonDurationCoeff=2; ReproSeasonShouldersLengthFactor=1; ReproSeasonOnsetDurationFactor=0.6; RelativeTurnoverEmerging=2; DetachmentDroughtCoefficient=3; DetachmentDroughtEffectMin=0.1; TurnoverStockFactor=0.01; TurnoverDefoliationEffectMin=0.025; MinimumGreenLeafProp=0.8; MinimumGreenRootProp=0.5
        initialDMFractionsLegumes=[0.16, 0.23, 0.22, 0.05, 0.03, 0.05, 0.05, 0.01, 0.04, 0.08, 0.08]
        LinearInterpolationFunction FVPDFunction
      Report PatchReport: EventNames=[Clock].EndOfDay
        VariableNames:
          [Clock].Today as Date
          //[AgPRyegrass].NitrogenUptake
          //sum([Soil].NutrientPatchManager.DenitrifiedN) as Denit
          [Soil].SoilWater.LeachUrea + [Soil].SoilWater.LeachNH4 + [Soil].SoilWater.LeachNO3 as LeachN
          sum([Soil].NutrientPatchManager.Organic.N) as OrganicN
          [Soil].NutrientPatchManager.UreaEachPatch + [Soil].NutrientPatchManager.NH4EachPatch + [Soil].NutrientPatchManager.NO3EachPatch as MinN
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