Simulations
  DataStore
    Input ObservedResidues: FileNames=[A_block_obs_residual.txt]
    Input ObservedSoilWater: FileNames=[a_block_obs_soilwater.txt]
    PredictedObserved: PredictedTableName=Report; ObservedTableName=ObservedSoilWater; FieldNameUsedForMatch=Clock.Today
    TimeSeriesStats: TableName=PredictedObserved
  Tests TestsBinary
    Test:
      SimulationName                 TableName  Type       ColumnNames                           Parameters
      ResiduesCoverHarvesterWindrow  Report     Tolerance  SurfaceOrganicMatter.surfaceom_cover  1,1
      ResiduesCoverHarvesterWindrow  Report     Tolerance  SurfaceOrganicMatter.surfaceom_wt     1,1
      ResiduesCoverBareSoil          Report     Tolerance  Soil.SoilWater.sw_dep(1)              1,1
      ResiduesCoverMownStubble       Report     Tolerance  Soil.SoilWater.sw_dep(1)              1,1
      ResiduesCoverHarvesterWindrow  Report     Tolerance  Soil.SoilWater.sw_dep(1)              1,1
      ResiduesCoverStandingStubble   Report     Tolerance  Soil.SoilWater.sw_dep(1)              1,1
  Tests TestsStats
    Test:
      SimulationName  TableName        Type       ColumnNames  Parameters
      All             TimeSeriesStats  Tolerance  R^2          1,1
      All             TimeSeriesStats  Tolerance  residual     1,1
      All             TimeSeriesStats  Tolerance  RMSD         1,1
      All             TimeSeriesStats  Tolerance  n            1,1
      All             TimeSeriesStats  Tolerance  %            1,1
  Experiment Residues
    Factors
      Factor CoverStandingStubble: Specifications=[SurfaceOrganicMatter]
        SurfaceOrganicMatter Stubble left by harvester: PoolName=Barley; type=Barley; mass=2026; standing_fraction=1; cnr=80; CriticalResidueWeight=2000; OptimumDecompTemp=20; MaxCumulativeEOS=20; CNRatioDecompCoeff=0.277; CNRatioDecompThreshold=25; TotalLeachRain=25; MinRainToLeach=10; CriticalMinimumOrganicC=0.004; DefaultCPRatio=0; DefaultStandingFraction=0; StandingExtinctCoeff=0.5; FractionFaecesAdded=0.5
          Pools:
            {PoolName=Barley, ResidueType=Barley, Mass=2026, CNRatio=80, StandingFraction=1}
          ResidueTypes: LoadFromResource=ResidueTypes
      Factor CoverHarvesterWindrow: Specifications=[SurfaceOrganicMatter]
        SurfaceOrganicMatter Windrow left by harvester: PoolName=Barley; type=Barley; mass=8300; standing_fraction=0; cnr=80; CriticalResidueWeight=2000; OptimumDecompTemp=20; MaxCumulativeEOS=20; CNRatioDecompCoeff=0.277; CNRatioDecompThreshold=25; TotalLeachRain=25; MinRainToLeach=10; CriticalMinimumOrganicC=0.004; DefaultCPRatio=0; DefaultStandingFraction=0; StandingExtinctCoeff=0.5; FractionFaecesAdded=0.5
          Pools:
            {PoolName=Barley, ResidueType=Barley, Mass=8300, CNRatio=80, StandingFraction=0}
          ResidueTypes: LoadFromResource=ResidueTypes
      Factor CoverMownStubble: Specifications=[SurfaceOrganicMatter]
        SurfaceOrganicMatter Stubble mown and bailed: PoolName=Barley; type=Barley; mass=400; standing_fraction=1; cnr=80; CriticalResidueWeight=2000; OptimumDecompTemp=20; MaxCumulativeEOS=20; CNRatioDecompCoeff=0.277; CNRatioDecompThreshold=25; TotalLeachRain=25; MinRainToLeach=10; CriticalMinimumOrganicC=0.004; DefaultCPRatio=0; DefaultStandingFraction=0; StandingExtinctCoeff=0.5; FractionFaecesAdded=0.5
          Pools:
            {PoolName=Barley, ResidueType=Barley, Mass=400, CNRatio=80, StandingFraction=1}
          ResidueTypes: LoadFromResource=ResidueTypes
      Factor CoverBareSoil: Specifications=[SurfaceOrganicMatter]
        SurfaceOrganicMatter Stubble mown, bailed and cultivared: PoolName=Barley; type=Barley; mass=0; standing_fraction=1; cnr=80; CriticalResidueWeight=2000; OptimumDecompTemp=20; MaxCumulativeEOS=20; CNRatioDecompCoeff=0.277; CNRatioDecompThreshold=25; TotalLeachRain=25; MinRainToLeach=10; CriticalMinimumOrganicC=0.004; DefaultCPRatio=0; DefaultStandingFraction=0; StandingExtinctCoeff=0.5; FractionFaecesAdded=0.5
          Pools:
            {PoolName=Barley, ResidueType=Barley, Mass=0, CNRatio=80, StandingFraction=1}
          ResidueTypes: LoadFromResource=ResidueTypes
    Simulation Base: Area=0; Slope=0
      WeatherFile: FileName=..\WeatherFiles\lincoln.met
      Clock: StartDate=2010-02-25; EndDate=2010-08-11
      Summary
      Zone Field: Area=0; Slope=0
        Soil: SoilType=Sedementary; LocalName=Lincoln; Latitude=0; Longitude=0
          Water
            Thickness  BD    AirDry  LL15   DUL   SAT    KS
            200        1.3   0.06    0.08   0.27  0.31   999
            200        1.3   0.124   0.124  0.25  0.358  300
            200        1.3   0.106   0.106  0.27  0.4    100
            200        1.52  0.07    0.07   0.2   0.314  90
            200        1.52  0.07    0.07   0.2   0.314  90
            200        1.52  0.165   0.165  0.3   0.358  90
            200        1.65  0.157   0.157  0.29  0.35   90
            200        1.65  0.125   0.125  0.25  0.318  90
            200        1.65  0.125   0.125  0.25  0.318  90
            200        1.65  0.125   0.125  0.25  0.318  90
            200        1.65  0.125   0.125  0.25  0.318  90
            200        1.65  0.125   0.125  0.25  0.318  90
            200        1.65  0.125   0.125  0.25  0.318  90
            200        1.65  0.125   0.125  0.25  0.318  90
            200        1.6   0.125   0.125  0.25  0.318  90
          SoilWater: min_crit_temp=5; max_crit_temp=35; max_albedo=0.23; A_to_evap_fact=0.44; canopy_eos_coef=1.7; sw_top_crit=0.9; sumes1_max=100; sumes2_max=25; solute_flow_eff=[1]; solute_flux_eff=[1]; gravity_gradient=2E-05; specific_bd=2.65; hydrol_effective_depth=450; immobile_solutes=[nh4]; canopy_fact=[1, 1, 0, 0]; canopy_fact_height=[0, 600, 1800, 30000]; canopy_fact_default=0.5; act_evap_method=ritchie; irrigation_will_runoff=false; irrigation_layer=1; SummerCona=4.4; SummerU=9; SummerDate=1-Nov; WinterCona=4.4; WinterU=9; WinterDate=1-Apr; DiffusConst=88; DiffusSlope=35; Salb=0.13; slope=0; discharge_width=0; catchment_area=0; max_pond=0; CN2Bare=73; CNRed=20; CNCov=0.8
            Thickness  SWCON  KLAT
            200        0.3    0
            200        0.6    0
            200        0.6    0
            200        0.6    0
            200        0.95   0
            200        0.95   0
            200        0.95   0
            200        0.95   0
            200        0.95   0
            200        0.95   0
            200        0.95   0
            200        0.95   0
            200        0.95   0
            200        0.95   0
            200        0.95   0
            mobile_solutes=[no3, urea, cl, br, org_n, org_c_pool1, org_c_pool2, org_c_pool3]
          SoilNitrogen: fom_type=[default, manure, mucuna, lablab, shemp, stable]; fract_carb=[0.2, 0.3, 0.54, 0.57, 0.45, 0]; fract_cell=[0.7, 0.3, 0.37, 0.37, 0.47, 0.1]; fract_lign=[0.1, 0.4, 0.09, 0.06, 0.08, 0.9]; wfpsN2N2O_x=[22, 88]; wfpsN2N2O_y=[0.1, 1]
          SoilOrganicMatter: RootCN=40; RootWt=1000; SoilCN=11; EnrACoeff=7.4; EnrBCoeff=0.2; OCUnits=Total
            Thickness  OC    FBiom  FInert
            200        2.63  0.03   0.4
            200        1.25  0.02   0.7
            200        0.32  0.01   0.8
            200        0.21  0.01   0.9
            200        0.2   0.01   1
            200        0.2   0.01   1
            200        0.2   0.01   1
            200        0.2   0.01   1
            200        0.2   0.01   1
            200        0.2   0.01   1
            200        0.2   0.01   1
            200        0.2   0.01   1
            200        0.2   0.01   1
            200        0.2   0.01   1
            200        0.2   0.01   1
          Analysis: PH=[6, 6, 6, 6, 6, 6, 6, 6, 6, 6, 6, 6, 6, 6, 6]; PHUnits=Water; BoronUnits=HotWater
            Thickness=[200, 200, 200, 200, 200, 200, 200, 200, 200, 200, 200, 200, 200, 200, 200]
          Sample InitialN: NO3Units=kgha; NH4Units=kgha; SWUnits=Volumetric; OCUnits=Total; PHUnits=Water
            Thickness  NO3      NH4    SW
            200        115.556  0.26   0.253
            200        77.0371  0.26   0.175
            200        57.7778  0.26   0.15
            200        33.7778  0.304  0.1
            200        33.7778  0.304  0.13
            200        0        0.304  0.25
            200        0        0.33   0.29
            200        0        0.33   0.25
            200        0.33     0.33   0.25
            200        0.33     0.33   0.25
            200        0.33     0.33   0.25
            200        0.33     0.33   0.25
            200        0.33     0.33   0.25
            200        0.33     0.33   0.25
            200        0.32     0.32   0.25
        Irrigation
        Fertiliser
        SurfaceOrganicMatter: same as Residues.Factors.CoverStandingStubble.Stubble left by harvester
        MicroClimate: air_pressure=1010; soil_emissivity=0.96; sun_angle=15; soil_heat_flux_fraction=0.4; night_interception_fraction=0.5; windspeed_default=3; refheight=2; albedo=0.293662; emissivity=0.96; gsmax=0.01; r50=200; a_interception=0; b_interception=1; c_interception=0; d_interception=0; soil_albedo=0.3
        Report
          VariableNames:
            [Clock].Today
            [SurfaceOrganicMatter].surfaceom_cover
            [SurfaceOrganicMatter].surfaceom_wt
            [Soil].SoilWater.sw_dep
            [WeatherFile].Rain
            [Soil].SoilWater.dlayer
            [Soil].SoilWater.es
            [Irrigation].IrrigationApplied
            [Soil].SoilWater.sw
            [Soil].SoilWater.runoff
            [Soil].SoilWater.infiltration
            [Soil].SoilWater.drain
            [Soil].SoilWater.ll15
            [Soil].SoilWater.dul
            [Soil].SoilWater.ll15_dep
            [Soil].SoilWater.dul_dep
            [ExtraVariables].Script.SWDep60
            [ExtraVariables].Script.FomN
            [ExtraVariables].Script.HumN
            [ExtraVariables].Script.BiomN
            [ExtraVariables].Script.DltNMinRes
            [ExtraVariables].Script.DltNMinTot
            [ExtraVariables].Script.AccumPlantN
            [ExtraVariables].Script.AccumMineralisation
            [ExtraVariables].Script.AccumDenit
            [ExtraVariables].Script.AccumFert
            [ExtraVariables].Script.AccumLeach
            [ExtraVariables].Script.AccumDetach
            [ExtraVariables].Script.DeltaSoilOMN
            [ExtraVariables].Script.DeltaSurfaceOMN
            [ExtraVariables].Script.DeltaSoilMineralN
            [ExtraVariables].Script.AccumEO
            [ExtraVariables].Script.AccumEP
            [ExtraVariables].Script.AccumES
            [ExtraVariables].Script.AccumDrainage
            [ExtraVariables].Script.AccumRunoff
            [ExtraVariables].Script.AccumRainfall
            [ExtraVariables].Script.AccumIrrigation
            [ExtraVariables].Script.AccumOutflowLat
            [ExtraVariables].Script.SoilWaterDeficit
            [Soil].SoilNitrogen.dnit
            [ExtraVariables].Script.MineralN
            [Soil].SoilNitrogen.no3
            [Soil].SoilNitrogen.nh4
            [Soil].SoilNitrogen.urea
          EventNames:
            [Clock].DoReport
        Operations
          2010-03-05  [Irrigation].Apply(26.6);
          2010-03-08  [Irrigation].Apply(30.4);
          2010-03-09  [Irrigation].Apply(100);
          2010-03-12  [Irrigation].Apply(10);
        Manager ResiduePrecipitationInterception
```csharp
        using System;
        using Models.Core;
		using System.Collections.Generic;
        using System.Text;
        using Models.Soils;
        using Models;
        using System.Xml.Serialization;
        namespace Models
        {
[Serializable] 
public class Script : Model
{      
[Link] Clock Clock;
[Link] Soils.Soil Soil;
[Link] Models.SurfaceOM.SurfaceOrganicMatter SOM;        
[Link] WeatherFile Met;   
[Link] Irrigation Irrig;  
               
[XmlIgnore] public bool InitialDay { get; set; }

[XmlIgnore] public double Precip { get; set; }
[XmlIgnore] public double Maximum_interception { get; set; }
[XmlIgnore] public double Residue_water { get; set; }
[XmlIgnore] public double Interception_today { get; set; }
[XmlIgnore] public double Evaporated_interception { get; set; }
[XmlIgnore] public double SWC60 { get; set; }

[EventSubscribe("Initialised")]
private void OnInitialised(object sender, EventArgs e)
{
Precip = 0;
Maximum_interception = 0;
Residue_water = 0;
Interception_today = 0;
Evaporated_interception = 0;
SWC60 = 0;
}	   

[EventSubscribe("DoManagementCalculations")]
private void OnDoManagementCalculations(object sender, EventArgs e)
{
//calculate the amount of water that is going to evaporate from the residue water pool

if (Residue_water > Soil.SoilWater.eo)
   Evaporated_interception = Soil.SoilWater.eo;
else
   Evaporated_interception = Residue_water;

SWC60 = Soil.SoilWater.sw_dep[0] + Soil.SoilWater.sw_dep[1] + Soil.SoilWater.sw_dep[2];

// remove evaporation from residue water pool               

Residue_water = Residue_water - Evaporated_interception;
}

[EventSubscribe("DoManagement")]
private void OnDoManagement(object sender, EventArgs e)
{
//Set interception variables
Precip = Met.Rain + Irrig.IrrigationApplied; 
Maximum_interception = 0.0002 * SOM.surfaceom_wt;
          
//Determine the amount of water intercepted by residue today
if ((Precip * SOM.surfaceom_cover) >= (Maximum_interception - Residue_water))
   Interception_today = (Maximum_interception - Residue_water);
else
   Interception_today = (Precip * SOM.surfaceom_cover) ;

// Send message to soil module to take interception out of water balance
    
Soil.SoilWater.residueinterception = Interception_today;
            
//Add intercepted water into residual water pool

 Residue_water = Residue_water + Interception_today;



            

}
}
}
```
        Manager ExtraVariables
```csharp
using System;
using Models.Core;
using System.Collections.Generic;
using System.Text;
using Models.Soils;
using Models;
using System.Xml.Serialization;
namespace Models
{
	[Serializable] 
	public class Script : Model
	{      
		[Link] Clock Clock;
		[Link] Soils.Soil Soil;
		[Link] Models.SurfaceOM.SurfaceOrganicMatter SOM;
		[Link] WeatherFile Met;   
		[Link] Fertiliser Fert;
		[Link] Irrigation Irrig;  
					
		[XmlIgnore] public bool InitialDay { get; set; }
		
		[XmlIgnore] public double AccumPlantN { get; set; }
		[XmlIgnore] public double AccumMineralisation { get; set; }
		[XmlIgnore] public double AccumDenit { get; set; }
		[XmlIgnore] public double AccumFert { get; set; }
		[XmlIgnore] public double AccumLeach { get; set; }
		[XmlIgnore] public double AccumDetach { get; set; }
		[XmlIgnore] public double DeltaSoilOMN { get; set; }
		[XmlIgnore] public double DeltaSurfaceOMN { get; set; }
		[XmlIgnore] public double DeltaSoilMineralN { get; set; }
		[XmlIgnore] public double SoilNitrogenContent { get; set; }
		
		[XmlIgnore] public double AccumEO { get; set; }
		[XmlIgnore] public double AccumEP { get; set; }
		[XmlIgnore] public double AccumES { get; set; }
		[XmlIgnore] public double AccumDrainage { get; set; }
		[XmlIgnore] public double AccumRunoff { get; set; }
		[XmlIgnore] public double AccumOutflowLat { get; set; }
		[XmlIgnore] public double AccumIrrigation { get; set; }
		[XmlIgnore] public double AccumRainfall { get; set; }
		[XmlIgnore] public double SoilWaterDeficit { get; set; }
		
		[XmlIgnore] public double AccumTtemerg { get; set; }
		
		[XmlIgnore] public double  InitialSoilOMN { get; set; }
		[XmlIgnore] public double  InitialSurfaceOMN { get; set; }
		[XmlIgnore] public double  InitialMineralN { get; set; }
		
		[XmlIgnore] public double SWC { get; set; }
		[XmlIgnore] public double DUL { get; set; }
		[XmlIgnore] public double OutFlowLat { get; set; }
		[XmlIgnore] public double SWDep60 { get; set; }
		[XmlIgnore] public double Flux1 { get; set; }
		[XmlIgnore] public double Flux3 { get; set; }
		
		[XmlIgnore] public double FomN { get; set; }
		[XmlIgnore] public double BiomN { get; set; }
		[XmlIgnore] public double HumN { get; set; }
		[XmlIgnore] public double OrganicN { get; set; }
		[XmlIgnore] public double NO3N { get; set; }
		[XmlIgnore] public double NH4N { get; set; }
		[XmlIgnore] public double UreaN { get; set; }
		[XmlIgnore] public double MineralN { get; set; }
		[XmlIgnore] public double DltNMinRes { get; set; }
		[XmlIgnore] public double DltNMinTot { get; set; }
		
        [EventSubscribe("Commencing")]
        private void OnSimulationCommencing(object sender, EventArgs e)
        {
			InitialDay = true;
		}	   
		
		[EventSubscribe("DoManagement")]
		private void OnDoManagement(object sender, EventArgs e)
		{
			//!!!!!! Nitrogen balance components !!!!!!
			//!!!!!!^^^^^^^^^^^^^^^^^^^^^^^^^^^^^!!!!!!
           	FomN = Utility.Math.Sum(Soil.SoilNitrogen.fom_n);
			HumN = Utility.Math.Sum(Soil.SoilNitrogen.hum_n);
		    BiomN = Utility.Math.Sum(Soil.SoilNitrogen.biom_n);
			OrganicN = FomN + HumN + BiomN;
			NO3N = Utility.Math.Sum(Soil.SoilNitrogen.no3);
			NH4N = Utility.Math.Sum(Soil.SoilNitrogen.nh4);
			UreaN = Utility.Math.Sum(Soil.SoilNitrogen.urea);
			MineralN = NO3N + NH4N + UreaN; 
			DltNMinRes = Utility.Math.Sum(Soil.SoilNitrogen.dlt_n_min_res);
			DltNMinTot = Utility.Math.Sum(Soil.SoilNitrogen.dlt_n_min);
            int layers = Soil.SoilWater.dlayer.Length;
			if (InitialDay == true)
			{
				InitialSurfaceOMN = SOM.surfaceom_n;
				InitialSoilOMN = OrganicN;
				InitialMineralN = MineralN;
				InitialDay = false;
			}
			AccumFert += Fert.NitrogenApplied;
			DeltaSurfaceOMN = SOM.surfaceom_n - InitialSurfaceOMN;
			AccumLeach = AccumLeach - Soil.SoilWater.LeachNH4 - Soil.SoilWater.LeachNO3 - Soil.SoilWater.LeachUrea; //Fails
            AccumMineralisation += Utility.Math.Sum(Soil.SoilNitrogen.dlt_n_min);
            AccumDenit -= Utility.Math.Sum(Soil.SoilNitrogen.dnit);
			DeltaSoilOMN = OrganicN - InitialSoilOMN;
			DeltaSoilMineralN = MineralN - InitialMineralN;
			SoilNitrogenContent = MineralN;
			
			//!!!!!! Water balance components !!!!!!
			//!!!!!!^^^^^^^^^^^^^^^^^^^^^^^^^^!!!!!!

			AccumIrrigation += Irrig.IrrigationApplied; 
			AccumRainfall += Met.Rain;
			SWDep60 = 0;
			SWC = Utility.Math.Sum(Soil.SoilWater.sw_dep);
			DUL = Utility.Math.Sum(Soil.SoilWater.dul_dep);
			SoilWaterDeficit =  (SWC - DUL);
			double OutFlowLat = Utility.Math.Sum(Soil.SoilWater.outflow_lat);
			AccumOutflowLat -= OutFlowLat;
			SWDep60 = Soil.SoilWater.sw_dep[0] + Soil.SoilWater.sw_dep[1] + Soil.SoilWater.sw_dep[2];
		}
		
		[EventSubscribe("DoManagementCalculations")]
		private void OnDoManagementCalculations(object sender, EventArgs e)
		{
			int layers = Soil.SoilWater.dlayer.Length;			
			AccumEO -= Soil.SoilWater.eo;
			AccumES -= Soil.SoilWater.es; 
			AccumDrainage -= Soil.SoilWater.drain;
			AccumRunoff -= Soil.SoilWater.runoff;
			Flux1 = Soil.SoilWater.flux2[0];
			Flux3 = Soil.SoilWater.flux2[2];
		}
	}
}
```
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