Simulations
  Simulation Saturated_Flow_Only: Area=0; Slope=0
    WeatherFile: FileName=Saturated Flow Only.met
    Clock: StartDate=1940-01-01; EndDate=1940-03-02
    Summary summaryfile
    Zone paddock: Area=1; Slope=0
      Soil: SoilType=Black Vertosol; LocalName=Waco; Site=Jimbour; NearestTown=Jimbour, Q 4352; Region=South East Queensland; NaturalVegetation=Grassland, mainly Qld bluegrass; Latitude=0; Longitude=0
        Sample Soil sample: NO3Units=ppm; NH4Units=ppm; SWUnits=Volumetric; OCUnits=Total; PHUnits=Water
          Thickness  NO3  NH4  SW
          150        0    0    0.59
          150        0    0    0.58
          300        0    0    0.59
          300        0    0    0.58
          300        0    0    0.57
          300        0    0    0.55
          300        0    0    0.55
          300        0    0    0.53
          300        0    0    0.52
          300        0    0    0.51
          300        0    0    0.49
        Water
          Thickness  BD    AirDry  LL15  DUL   SAT
          150        1.02  0.15    0.29  0.54  0.59
          150        1.03  0.26    0.29  0.53  0.58
          300        1.02  0.29    0.29  0.54  0.59
          300        1.02  0.29    0.29  0.54  0.58
          300        1.06  0.3     0.3   0.52  0.57
          300        1.11  0.31    0.31  0.5   0.55
          300        1.12  0.32    0.32  0.5   0.55
          300        1.15  0.33    0.33  0.48  0.53
          300        1.18  0.34    0.34  0.47  0.52
          300        1.2   0.35    0.35  0.46  0.51
          300        1.25  0.36    0.36  0.44  0.49
        SoilWater: min_crit_temp=5; max_crit_temp=35; max_albedo=0.23; A_to_evap_fact=0.44; canopy_eos_coef=1.7; sw_top_crit=0.9; sumes1_max=100; sumes2_max=25; solute_flow_eff=[1]; solute_flux_eff=[1]; gravity_gradient=2E-05; specific_bd=2.65; hydrol_effective_depth=450; immobile_solutes=[nh4]; canopy_fact=[1, 1, 0, 0]; canopy_fact_height=[0, 600, 1800, 30000]; canopy_fact_default=0.5; act_evap_method=ritchie; irrigation_will_runoff=false; SummerDate=1-Nov; WinterDate=1-Apr; Salb=0.13; CN2Bare=1
          zero: irrigation_layer, SummerCona, SummerU, WinterCona, WinterU, DiffusConst, DiffusSlope, slope, discharge_width, catchment_area, max_pond, CNRed, CNCov
          Thickness  SWCON  KLAT
          150        0.3    0
          150        0.3    0
          300        0.3    0
          300        0.3    0
          300        0.3    0
          300        0.3    0
          300        0.3    0
          300        0.3    0
          300        0.3    0
          300        0.3    0
          300        0.3    0
          mobile_solutes=[no3, urea, cl, br, org_n, org_c_pool1, org_c_pool2, org_c_pool3]
        SoilNitrogen: fom_type=[default, manure, mucuna, lablab, shemp, stable]; fract_carb=[0.2, 0.3, 0.54, 0.57, 0.45, 0]; fract_cell=[0.7, 0.3, 0.37, 0.37, 0.47, 0.1]; fract_lign=[0.1, 0.4, 0.09, 0.06, 0.08, 0.9]; wfpsN2N2O_x=[22, 88]; wfpsN2N2O_y=[0.1, 1]
          oc=[1.03342, 0.886846, 0.888645, 0.889496, 0.769828, 0.44992, 0.269964, 0.219972, 0.159982, 0.129986, 0.119986]
        SoilOrganicMatter: RootCN=40; RootWt=200; SoilCN=12.5; EnrACoeff=7.4; EnrBCoeff=0.2; OCUnits=Total
          Thickness  OC    FBiom  FInert
          150        1.04  0.025  0.4
          150        0.89  0.02   0.6
          300        0.89  0.015  0.8
          300        0.89  0.01   0.9
          300        0.77  0.01   0.95
          300        0.45  0.01   0.95
          300        0.27  0.01   0.95
          300        0.22  0.01   0.95
          300        0.16  0.01   0.95
          300        0.13  0.01   0.95
          300        0.12  0.01   0.95
        Analysis: Thickness=[150, 150, 300, 300, 300, 300, 300, 300, 300, 300, 300]; PH=[8.4, 8.8, 9, 9.2, 9.2, 9.1, 9, 9, 8.9, 8.9, 8.9]; PHUnits=Water; BoronUnits=HotWater
      Report: EventNames=[Clock].DoReport
        VariableNames:
          [Soil].SoilWater.dlayer as dlayer
          [Soil].SoilWater.sat_dep as sat_dep
          [Soil].SoilWater.dul_dep as dul_dep
          [Soil].SoilWater.ll15_dep as ll15_dep
          [Soil].SoilWater.air_dry_dep as air_dry_dep
          [Clock].Today
          [WeatherFile].Rain as rain
          [Soil].SoilWater.sw_dep as sw_dep
          [Soil].SoilWater.flux2 as flux
          [Soil].SoilWater.drain as drain
          [Soil].SoilWater.runoff as runoff
          [Soil].SoilWater.es as es
      SurfaceOrganicMatter: PondActive=no; ReportAdditions=no; ReportRemovals=no; PoolName=wheat_stubble; type=wheat; mass=0; standing_fraction=0; cpr=0; cnr=80; CriticalResidueWeight=2000; OptimumDecompTemp=20; MaxCumulativeEOS=20; CNRatioDecompCoeff=0.277; CNRatioDecompThreshold=25; TotalLeachRain=25; MinRainToLeach=10; CriticalMinimumOrganicC=0.004; DefaultCPRatio=0; DefaultStandingFraction=0; StandingExtinctCoeff=0.5; FractionFaecesAdded=0.5
        Pools:
          {PoolName=wheat_stubble, ResidueType=wheat, Mass=0, CNRatio=80, CPRatio=0, StandingFraction=0}
        ResidueTypes ResidueTypesList: LoadFromResource=ResidueTypes
        TillageTypes TillageTypesList
      MicroClimate: air_pressure=1010; soil_emissivity=0.96; sun_angle=15; soil_heat_flux_fraction=0.4; night_interception_fraction=0.5; windspeed_default=3; refheight=2; albedo=0.15; emissivity=0.96; gsmax=0.01; r50=200; a_interception=0; b_interception=1; c_interception=0; d_interception=0; soil_albedo=0.23
  Simulation Unsaturated_Flow_Only: Area=0; Slope=0
    WeatherFile: FileName=Unsaturated Flow Only.met
    Clock: StartDate=1940-01-01; EndDate=1950-12-31
    Summary summaryfile
    Zone paddock: Area=1; Slope=0
      Soil: SoilType=Black Vertosol; LocalName=Waco; Site=Jimbour; NearestTown=Jimbour, Q 4352; Region=South East Queensland; NaturalVegetation=Grassland, mainly Qld bluegrass; Latitude=0; Longitude=0
        Sample Soil sample: NO3Units=ppm; NH4Units=ppm; SWUnits=Volumetric; OCUnits=Total; PHUnits=Water
          Thickness  NO3  NH4  SW
          150        0    0    0.54
          150        0    0    0.53
          300        0    0    0.29
          300        0    0    0.54
          300        0    0    0.3
          300        0    0    0.5
          300        0    0    0.32
          300        0    0    0.48
          300        0    0    0.34
          300        0    0    0.46
          300        0    0    0.36
        Water: same as Saturated_Flow_Only.paddock.Soil.Water
        SoilWater: min_crit_temp=5; max_crit_temp=35; max_albedo=0.23; A_to_evap_fact=0.44; canopy_eos_coef=1.7; sw_top_crit=0.9; sumes1_max=100; sumes2_max=25; solute_flow_eff=[1]; solute_flux_eff=[1]; gravity_gradient=2E-05; specific_bd=2.65; hydrol_effective_depth=450; immobile_solutes=[nh4]; canopy_fact=[1, 1, 0, 0]; canopy_fact_height=[0, 600, 1800, 30000]; canopy_fact_default=0.5; act_evap_method=ritchie; irrigation_will_runoff=false; SummerDate=1-Nov; WinterDate=1-Apr; DiffusConst=40; DiffusSlope=16; Salb=0.13; CN2Bare=1
          zero: irrigation_layer, SummerCona, SummerU, WinterCona, WinterU, slope, discharge_width, catchment_area, max_pond, CNRed, CNCov
          Thickness  SWCON  KLAT
          150        0      0
          150        0      0
          300        0      0
          300        0      0
          300        0      0
          300        0      0
          300        0      0
          300        0      0
          300        0      0
          300        0      0
          300        0      0
          mobile_solutes=[no3, urea, cl, br, org_n, org_c_pool1, org_c_pool2, org_c_pool3]
        SoilNitrogen: fom_type=[default, manure, mucuna, lablab, shemp, stable]; fract_carb=[0.2, 0.3, 0.54, 0.57, 0.45, 0]; fract_cell=[0.7, 0.3, 0.37, 0.37, 0.47, 0.1]; fract_lign=[0.1, 0.4, 0.09, 0.06, 0.08, 0.9]; wfpsN2N2O_x=[22, 88]; wfpsN2N2O_y=[0.1, 1]
          oc=[0.862004, 0.788933, 0.843286, 0.86748, 0.760857, 0.44473, 0.267061, 0.21757, 0.158351, 0.12863, 0.118865]
        SoilOrganicMatter: same as Saturated_Flow_Only.paddock.Soil.SoilOrganicMatter
        Analysis: Thickness=[150, 150, 300, 300, 300, 300, 300, 300, 300, 300, 300]; PH=[8.4, 8.8, 9, 9.2, 9.2, 9.1, 9, 9, 8.9, 8.9, 8.9]; PHUnits=Water; BoronUnits=HotWater
      Report: EventNames=[Clock].DoReport
        VariableNames:
          [Soil].SoilWater.dlayer as dlayer
          [Soil].SoilWater.sat_dep as sat_dep
          [Soil].SoilWater.dul_dep as dul_dep
          [Soil].SoilWater.ll15_dep as ll15_dep
          [Soil].SoilWater.air_dry_dep as air_dry_dep
          [Clock].Today
          [WeatherFile].Rain as rain
          [Soil].SoilWater.sw_dep as sw_dep
          [Soil].SoilWater.flow as flow
          [Soil].SoilWater.drain as drain
          [Soil].SoilWater.runoff as runoff
          [Soil].SoilWater.es as es
      SurfaceOrganicMatter: same as Saturated_Flow_Only.paddock.SurfaceOrganicMatter
      MicroClimate: same as Saturated_Flow_Only.paddock.MicroClimate
  Simulation Runoff_Only: Area=0; Slope=0
    WeatherFile: FileName=Runoff Only.met
    Clock: StartDate=1940-01-01; EndDate=1950-12-31
    Summary summaryfile
    Zone paddock: Area=1; Slope=0
      Soil: SoilType=Black Vertosol; LocalName=Waco; Site=Jimbour; NearestTown=Jimbour, Q 4352; Region=South East Queensland; NaturalVegetation=Grassland, mainly Qld bluegrass; Latitude=0; Longitude=0
        Sample Soil sample: NO3Units=ppm; NH4Units=ppm; SWUnits=Volumetric; OCUnits=Total; PHUnits=Water
          Thickness  NO3  NH4  SW
          150        0    0    0.59
          150        0    0    0.58
          300        0    0    0.29
          300        0    0    0.29
          300        0    0    0.3
          300        0    0    0.31
          300        0    0    0.32
          300        0    0    0.33
          300        0    0    0.34
          300        0    0    0.35
          300        0    0    0.36
        Water: same as Saturated_Flow_Only.paddock.Soil.Water
        SoilWater: min_crit_temp=5; max_crit_temp=35; max_albedo=0.23; A_to_evap_fact=0.44; canopy_eos_coef=1.7; sw_top_crit=0.9; sumes1_max=100; sumes2_max=25; solute_flow_eff=[1]; solute_flux_eff=[1]; gravity_gradient=2E-05; specific_bd=2.65; hydrol_effective_depth=450; immobile_solutes=[nh4]; canopy_fact=[1, 1, 0, 0]; canopy_fact_height=[0, 600, 1800, 30000]; canopy_fact_default=0.5; act_evap_method=ritchie; irrigation_will_runoff=false; SummerDate=1-Nov; WinterDate=1-Apr; Salb=0.13; CN2Bare=73
          zero: irrigation_layer, SummerCona, SummerU, WinterCona, WinterU, DiffusConst, DiffusSlope, slope, discharge_width, catchment_area, max_pond, CNRed, CNCov
          Thickness  SWCON  KLAT
          150        0      0
          150        0      0
          300        0      0
          300        0      0
          300        0      0
          300        0      0
          300        0      0
          300        0      0
          300        0      0
          300        0      0
          300        0      0
          mobile_solutes=[no3, urea, cl, br, org_n, org_c_pool1, org_c_pool2, org_c_pool3]
        SoilNitrogen: fom_type=[default, manure, mucuna, lablab, shemp, stable]; fract_carb=[0.2, 0.3, 0.54, 0.57, 0.45, 0]; fract_cell=[0.7, 0.3, 0.37, 0.37, 0.47, 0.1]; fract_lign=[0.1, 0.4, 0.09, 0.06, 0.08, 0.9]; wfpsN2N2O_x=[22, 88]; wfpsN2N2O_y=[0.1, 1]
          oc=[0.936414, 0.833186, 0.86334, 0.877604, 0.764885, 0.447288, 0.268472, 0.218792, 0.159146, 0.129328, 0.119396]
        SoilOrganicMatter: same as Saturated_Flow_Only.paddock.Soil.SoilOrganicMatter
        Analysis: Thickness=[150, 150, 300, 300, 300, 300, 300, 300, 300, 300, 300]; PH=[8.4, 8.8, 9, 9.2, 9.2, 9.1, 9, 9, 8.9, 8.9, 8.9]; PHUnits=Water; BoronUnits=HotWater
      Report: EventNames=[Clock].DoReport
        VariableNames:
          [Clock].Today
          [WeatherFile].Rain as rain
          [Soil].SoilWater.runoff as runoff
          [Soil].SoilWater.dlayer as dlayer
          [Soil].SoilWater.sat_dep as sat_dep
          [Soil].SoilWater.dul_dep as dul_dep
          [Soil].SoilWater.ll15_dep as ll15_dep
          [Soil].SoilWater.air_dry_dep as air_dry_dep
          [Soil].SoilWater.sw_dep as sw_dep
          [Soil].SoilWater.flux as flux
          [Soil].SoilWater.flow as flow
          [Soil].SoilWater.drain as drain
          [Soil].SoilWater.es as es
      SurfaceOrganicMatter: same as Saturated_Flow_Only.paddock.SurfaceOrganicMatter
      MicroClimate: same as Saturated_Flow_Only.paddock.MicroClimate
  Simulation Soil_Evaporation_Only: Area=0; Slope=0
    WeatherFile: FileName=Soil Evaporation Only.met
    Clock: StartDate=1940-01-01; EndDate=1941-01-01
    Summary summaryfile
    Zone paddock: Area=1; Slope=0
      Manager AvgTempCalculation
        avgTemp = 24.95
```csharp
using System;
using Models.Core;
using Models.PMF;
using Models.PMF.OldPlant;
namespace Models
{
	[Serializable]
	[System.Xml.Serialization.XmlInclude(typeof(Model))]
	public class Script : Model
	{
		public double avgTemp{get; set;}
		
		[Link] Clock Clock;
		[Link] WeatherFile Met;
		[EventSubscribe("DoManagement")]
		private void OnDoManagement(object sender, EventArgs e)
		{
			avgTemp = (Met.MaxT + Met.MinT)/2;
			/*	
			avgTemp = (maxt + mint)/2
			*/
		}
	}
}
```
      Soil: SoilType=Black Vertosol; LocalName=Waco; Site=Jimbour; NearestTown=Jimbour, Q 4352; Region=South East Queensland; NaturalVegetation=Grassland, mainly Qld bluegrass; Latitude=0; Longitude=0
        Sample Soil sample: same as Saturated_Flow_Only.paddock.Soil.Soil sample
        Water: same as Saturated_Flow_Only.paddock.Soil.Water
        SoilWater: min_crit_temp=5; max_crit_temp=35; max_albedo=0.23; A_to_evap_fact=0.44; canopy_eos_coef=1.7; sw_top_crit=0.9; sumes1_max=100; sumes2_max=25; solute_flow_eff=[1]; solute_flux_eff=[1]; gravity_gradient=2E-05; specific_bd=2.65; hydrol_effective_depth=450; immobile_solutes=[nh4]; canopy_fact=[1, 1, 0, 0]; canopy_fact_height=[0, 600, 1800, 30000]; canopy_fact_default=0.5; act_evap_method=ritchie; irrigation_will_runoff=false; SummerCona=3.5; SummerU=6; SummerDate=1-Nov; WinterCona=2.5; WinterU=5; WinterDate=1-Apr; Salb=0.13; CN2Bare=1
          zero: irrigation_layer, DiffusConst, DiffusSlope, slope, discharge_width, catchment_area, max_pond, CNRed, CNCov
          Thickness  SWCON  KLAT
          150        0      0
          150        0      0
          300        0      0
          300        0      0
          300        0      0
          300        0      0
          300        0      0
          300        0      0
          300        0      0
          300        0      0
          300        0      0
          mobile_solutes=[no3, urea, cl, br, org_n, org_c_pool1, org_c_pool2, org_c_pool3]
        SoilNitrogen: fom_type=[default, manure, mucuna, lablab, shemp, stable]; fract_carb=[0.2, 0.3, 0.54, 0.57, 0.45, 0]; fract_cell=[0.7, 0.3, 0.37, 0.37, 0.47, 0.1]; fract_lign=[0.1, 0.4, 0.09, 0.06, 0.08, 0.9]; wfpsN2N2O_x=[22, 88]; wfpsN2N2O_y=[0.1, 1]
          oc=[1.0321, 0.883118, 0.887037, 0.888782, 0.769524, 0.449743, 0.269859, 0.219887, 0.159921, 0.129937, 0.119941]
        SoilOrganicMatter: same as Saturated_Flow_Only.paddock.Soil.SoilOrganicMatter
        Analysis: Thickness=[150, 150, 300, 300, 300, 300, 300, 300, 300, 300, 300]; PH=[8.4, 8.8, 9, 9.2, 9.2, 9.1, 9, 9, 8.9, 8.9, 8.9]; PHUnits=Water; BoronUnits=HotWater
      Report: EventNames=[Clock].DoReport
        VariableNames:
          [Soil].SoilWater.dlayer as dlayer
          [Soil].SoilWater.sat_dep as sat_dep
          [Soil].SoilWater.dul_dep as dul_dep
          [Soil].SoilWater.sw_dep as sw_dep
          [Soil].SoilWater.ll15_dep as ll15_dep
          [Soil].SoilWater.air_dry_dep as air_dry_dep
          [Soil].SoilWater.flux as flux
          [Soil].SoilWater.drain as drain
          [Soil].SoilWater.runoff as runoff
          [WeatherFile].Rain as rain
          [Clock].Today.DayOfYear as day
          [Clock].Today
          [Soil].SoilWater.u as u
          [Soil].SoilWater.cona as cona
          [Soil].SoilWater.t as t
          [Soil].SoilWater.es as es
          [Soil].SoilWater.eo as eo
          [Soil].SoilWater.eos as eos
          [Soil].SoilWater.sw_dep(1) as sw_top
          [WeatherFile].Radn as radn
          [AvgTempCalculation].Script.avgTemp as avgTemp
      SurfaceOrganicMatter: same as Saturated_Flow_Only.paddock.SurfaceOrganicMatter
      MicroClimate: same as Saturated_Flow_Only.paddock.MicroClimate
  Simulation Ponding_Only: Area=0; Slope=0
    WeatherFile: FileName=Ponding Only.met
    Clock: StartDate=1940-01-01; EndDate=1940-03-02
    Summary summaryfile
    Zone paddock: Area=1; Slope=0
      Soil: SoilType=Black Vertosol; LocalName=Waco; Site=Jimbour; NearestTown=Jimbour, Q 4352; Region=South East Queensland; NaturalVegetation=Grassland, mainly Qld bluegrass; Latitude=0; Longitude=0
        Sample Soil sample: NO3Units=ppm; NH4Units=ppm; SWUnits=Volumetric; OCUnits=Total; PHUnits=Water
          Thickness  NO3  NH4  SW
          150        0    0    0
          150        0    0    0
          300        0    0    0
          300        0    0    0
          300        0    0    0
          300        0    0    0
          300        0    0    0
          300        0    0    0
          300        0    0    0
          300        0    0    0
          300        0    0    0
        Water: same as Saturated_Flow_Only.paddock.Soil.Water
        SoilWater: min_crit_temp=5; max_crit_temp=35; max_albedo=0.23; A_to_evap_fact=0.44; canopy_eos_coef=1.7; sw_top_crit=0.9; sumes1_max=100; sumes2_max=25; solute_flow_eff=[1]; solute_flux_eff=[1]; gravity_gradient=2E-05; specific_bd=2.65; hydrol_effective_depth=450; immobile_solutes=[nh4]; canopy_fact=[1, 1, 0, 0]; canopy_fact_height=[0, 600, 1800, 30000]; canopy_fact_default=0.5; act_evap_method=ritchie; irrigation_will_runoff=false; SummerDate=1-Nov; WinterDate=1-Apr; Salb=0.13; CN2Bare=1
          zero: irrigation_layer, SummerCona, SummerU, WinterCona, WinterU, DiffusConst, DiffusSlope, slope, discharge_width, catchment_area, max_pond, CNRed, CNCov
          Thickness  SWCON  KLAT
          150        0      0
          150        0      0
          300        0      0
          300        0      0
          300        0      0
          300        0      0
          300        0      0
          300        0      0
          300        0      0
          300        0      0
          300        0      0
          mobile_solutes=[no3, urea, cl, br, org_n, org_c_pool1, org_c_pool2, org_c_pool3]
        SoilNitrogen: fom_type=[default, manure, mucuna, lablab, shemp, stable]; fract_carb=[0.2, 0.3, 0.54, 0.57, 0.45, 0]; fract_cell=[0.7, 0.3, 0.37, 0.37, 0.47, 0.1]; fract_lign=[0.1, 0.4, 0.09, 0.06, 0.08, 0.9]; wfpsN2N2O_x=[22, 88]; wfpsN2N2O_y=[0.1, 1]
          oc=[1.03711, 0.88906, 0.889821, 0.889953, 0.769994, 0.450001, 0.270003, 0.220002, 0.16, 0.13, 0.12]
        SoilOrganicMatter: same as Saturated_Flow_Only.paddock.Soil.SoilOrganicMatter
        Analysis: Thickness=[150, 150, 300, 300, 300, 300, 300, 300, 300, 300, 300]; PH=[8.4, 8.8, 9, 9.2, 9.2, 9.1, 9, 9, 8.9, 8.9, 8.9]; PHUnits=Water; BoronUnits=HotWater
      Manager calculate total_pond
        total_pond = 0
```csharp
using System;
using Models.Core;
using Models.PMF;
using Models.PMF.OldPlant;
using Models.Soils;
namespace Models
{
	[Serializable]
	[System.Xml.Serialization.XmlInclude(typeof(Model))]
	public class Script : Model
	{		
		[Link] Clock Clock;
		[Link] Soil Soil;
				
		public double total_pond {get; set;}
				
		[EventSubscribe("DoCalculations")]
		private void OnDoCalculations(object sender, EventArgs e)
		{
			total_pond = Soil.SoilWater.pond + Soil.SoilWater.pond_evap; 
			/*
			total_pond = pond + pond_evap
			*/
		}
	}
}
```
      Report: EventNames=[Clock].DoReport
        VariableNames:
          [Soil].SoilWater.dlayer as dlayer
          [Soil].SoilWater.sat_dep as sat_dep
          [Soil].SoilWater.dul_dep as dul_dep
          [Soil].SoilWater.ll15_dep as ll15_dep
          [Soil].SoilWater.air_dry_dep as air_dry_dep
          [Clock].Today
          [WeatherFile].Rain as rain
          [Soil].SoilWater.pond_evap as pond_evap
          [Soil].SoilWater.pond as pond
          [calculate total_pond].Script.total_pond as total_pond
          [Soil].SoilWater.runoff as runoff
          [Soil].SoilWater.sw_dep(1-3) as sw_top
          [Soil].SoilWater.es as es
          [Soil].SoilWater.drain as drain
          [Soil].SoilWater.flux as flux
          [Soil].SoilWater.flow as flow
          [Soil].SoilWater.sw_dep as sw_dep
      SurfaceOrganicMatter: same as Saturated_Flow_Only.paddock.SurfaceOrganicMatter
      MicroClimate: same as Saturated_Flow_Only.paddock.MicroClimate
  Simulation Ponding_with_Soil_Evap: Area=0; Slope=0
    WeatherFile: FileName=Ponding Only.met
    Clock: StartDate=1940-01-01; EndDate=1940-03-02
    Summary summaryfile
    Zone paddock: Area=1; Slope=0
      Soil: SoilType=Black Vertosol; LocalName=Waco; Site=Jimbour; NearestTown=Jimbour, Q 4352; Region=South East Queensland; NaturalVegetation=Grassland, mainly Qld bluegrass; Latitude=0; Longitude=0
        Sample Soil sample: same as Ponding_Only.paddock.Soil.Soil sample
        Water: same as Saturated_Flow_Only.paddock.Soil.Water
        SoilWater: same as Soil_Evaporation_Only.paddock.Soil.SoilWater
        SoilNitrogen: fom_type=[default, manure, mucuna, lablab, shemp, stable]; fract_carb=[0.2, 0.3, 0.54, 0.57, 0.45, 0]; fract_cell=[0.7, 0.3, 0.37, 0.37, 0.47, 0.1]; fract_lign=[0.1, 0.4, 0.09, 0.06, 0.08, 0.9]; wfpsN2N2O_x=[22, 88]; wfpsN2N2O_y=[0.1, 1]
          oc=[1.03493, 0.889286, 0.889846, 0.889961, 0.769998, 0.450002, 0.270003, 0.22, 0.16, 0.13, 0.12]
        SoilOrganicMatter: same as Saturated_Flow_Only.paddock.Soil.SoilOrganicMatter
        Analysis: Thickness=[150, 150, 300, 300, 300, 300, 300, 300, 300, 300, 300]; PH=[8.4, 8.8, 9, 9.2, 9.2, 9.1, 9, 9, 8.9, 8.9, 8.9]; PHUnits=Water; BoronUnits=HotWater
      Manager calculate total_pond: same as Ponding_Only.paddock.calculate total_pond
      Report: EventNames=[Clock].DoReport
        VariableNames:
          [Soil].SoilWater.dlayer as dlayer
          [Soil].SoilWater.sat_dep as sat_dep
          [Soil].SoilWater.dul_dep as dul_dep
          [Soil].SoilWater.ll15_dep as ll15_dep
          [Soil].SoilWater.air_dry_dep as air_dry_dep
          [Clock].Today
          [WeatherFile].Rain as rain
          [Soil].SoilWater.eos as eos
          [Soil].SoilWater.es as es
          [Soil].SoilWater.pond_evap as pond_evap
          [Soil].SoilWater.pond as pond
          [calculate total_pond].Script.total_pond as total_pond
          [Soil].SoilWater.runoff as runoff
          [Soil].SoilWater.sw_dep(1-3) as sw_top
          [Soil].SoilWater.drain as drain
          [Soil].SoilWater.flux as flux
          [Soil].SoilWater.flow as flow
          [Soil].SoilWater.sw_dep as sw_dep
      SurfaceOrganicMatter: PoolName=wheat_stubble; type=wheat; mass=0; standing_fraction=0; cpr=0; cnr=80; CriticalResidueWeight=2000; OptimumDecompTemp=20; MaxCumulativeEOS=20; CNRatioDecompCoeff=0.277; CNRatioDecompThreshold=25; TotalLeachRain=25; MinRainToLeach=10; CriticalMinimumOrganicC=0.004; DefaultCPRatio=0; DefaultStandingFraction=0; StandingExtinctCoeff=0.5; FractionFaecesAdded=0.5
        Pools:
          {PoolName=wheat_stubble, ResidueType=wheat, Mass=0, CNRatio=80, CPRatio=0, StandingFraction=0}
        ResidueTypes ResidueTypesList: LoadFromResource=ResidueTypes
        TillageTypes TillageTypesList
      MicroClimate: same as Saturated_Flow_Only.paddock.MicroClimate
  Simulation WaterTable_Calculation: Area=0; Slope=0
    WeatherFile: FileName=WaterTable Only.met
    Clock: StartDate=1940-01-01; EndDate=1940-03-02
    Summary summaryfile
    Zone paddock: Area=1; Slope=0
      Soil: SoilType=Black Vertosol; LocalName=Waco; Site=Jimbour; NearestTown=Jimbour, Q 4352; Region=South East Queensland; NaturalVegetation=Grassland, mainly Qld bluegrass; Latitude=0; Longitude=0
        Sample Soil sample: NO3Units=ppm; NH4Units=ppm; SWUnits=Volumetric; OCUnits=Total; PHUnits=Water
          Thickness  NO3  NH4  SW
          150        0    0    0
          150        0    0    0
          300        0    0    0.79
          300        0    0    0.79
          300        0    0    0.79
          300        0    0    0.79
          300        0    0    0.6
          300        0    0    0.6
          300        0    0    0.6
          300        0    0    0.6
          300        0    0    0.6
        Water
          Thickness  BD    AirDry  LL15  DUL  SAT
          150        1.02  0.15    0.29  0.5  0.8
          150        1.03  0.26    0.29  0.5  0.8
          300        1.02  0.29    0.29  0.5  0.8
          300        1.02  0.29    0.29  0.5  0.8
          300        1.06  0.3     0.3   0.5  0.8
          300        1.11  0.31    0.31  0.5  0.8
          300        1.12  0.32    0.32  0.5  0.8
          300        1.15  0.33    0.33  0.5  0.8
          300        1.18  0.34    0.34  0.5  0.8
          300        1.2   0.35    0.35  0.5  0.8
          300        1.25  0.36    0.36  0.5  0.8
        SoilWater: min_crit_temp=5; max_crit_temp=35; max_albedo=0.23; A_to_evap_fact=0.44; canopy_eos_coef=1.7; sw_top_crit=0.9; sumes1_max=100; sumes2_max=25; solute_flow_eff=[1]; solute_flux_eff=[1]; gravity_gradient=2E-05; specific_bd=2.65; hydrol_effective_depth=450; immobile_solutes=[nh4]; canopy_fact=[1, 1, 0, 0]; canopy_fact_height=[0, 600, 1800, 30000]; canopy_fact_default=0.5; act_evap_method=ritchie; irrigation_will_runoff=false; SummerDate=1-Nov; WinterDate=1-Apr; Salb=0.13; CN2Bare=1
          zero: irrigation_layer, SummerCona, SummerU, WinterCona, WinterU, DiffusConst, DiffusSlope, slope, discharge_width, catchment_area, max_pond, CNRed, CNCov
          Thickness  SWCON  KLAT
          150        0      0
          150        0      0
          300        0.102  0
          300        0.103  0
          300        0.104  0
          300        0.105  0
          300        0.106  0
          300        0.107  0
          300        0.108  0
          300        0.109  0
          300        0      0
          mobile_solutes=[no3, urea, cl, br, org_n, org_c_pool1, org_c_pool2, org_c_pool3]
        SoilNitrogen: fom_type=[default, manure, mucuna, lablab, shemp, stable]; fract_carb=[0.2, 0.3, 0.54, 0.57, 0.45, 0]; fract_cell=[0.7, 0.3, 0.37, 0.37, 0.47, 0.1]; fract_lign=[0.1, 0.4, 0.09, 0.06, 0.08, 0.9]; wfpsN2N2O_x=[22, 88]; wfpsN2N2O_y=[0.1, 1]; oc=[0, 0, 0, 0, 0, 0, 0, 0, 0, 0, 0]
        SoilOrganicMatter: RootCN=40; RootWt=0; SoilCN=12.5; EnrACoeff=7.4; EnrBCoeff=0.2; OCUnits=Total
          Thickness  OC  FBiom  FInert
          150        0   0.025  0.4
          150        0   0.02   0.6
          300        0   0.015  0.8
          300        0   0.01   0.9
          300        0   0.01   0.95
          300        0   0.01   0.95
          300        0   0.01   0.95
          300        0   0.01   0.95
          300        0   0.01   0.95
          300        0   0.01   0.95
          300        0   0.01   0.95
        Analysis: Thickness=[150, 150, 300, 300, 300, 300, 300, 300, 300, 300, 300]; PH=[8.4, 8.8, 9, 9.2, 9.2, 9.1, 9, 9, 8.9, 8.9, 8.9]; PHUnits=Water; BoronUnits=HotWater
      Report: EventNames=[Clock].DoReport
        VariableNames:
          [Soil].SoilWater.dlayer as dlayer
          [Soil].SoilWater.sat_dep as sat_dep
          [Soil].SoilWater.dul_dep as dul_dep
          [Soil].SoilWater.ll15_dep as ll15_dep
          [Soil].SoilWater.air_dry_dep as air_dry_dep
          [Clock].Today
          [WeatherFile].Rain as rain
          [Soil].SoilWater.runoff as runoff
          [Soil].SoilWater.drain as drain
          [Soil].SoilWater.water_table as water_table
          [Soil].SoilWater.sw_dep as sw_dep
          [Soil].SoilWater.es as es
          [Soil].SoilWater.flux as flux
          [Soil].SoilWater.flow as flow
      SurfaceOrganicMatter: same as Ponding_with_Soil_Evap.paddock.SurfaceOrganicMatter
      MicroClimate: same as Saturated_Flow_Only.paddock.MicroClimate
  Simulation Lateral_Outflow_Only: Area=0; Slope=0
    WeatherFile: FileName=Lateral Outflow Only.met
    Clock: StartDate=1940-01-01; EndDate=1940-03-02
    Summary summaryfile
    Zone paddock: Area=1; Slope=0
      Soil: SoilType=Black Vertosol; LocalName=Waco; Site=Jimbour; NearestTown=Jimbour, Q 4352; Region=South East Queensland; NaturalVegetation=Grassland, mainly Qld bluegrass; Latitude=0; Longitude=0
        Sample Soil sample: same as Saturated_Flow_Only.paddock.Soil.Soil sample
        Water: same as Saturated_Flow_Only.paddock.Soil.Water
        SoilWater: same as Ponding_Only.paddock.Soil.SoilWater
        SoilNitrogen: fom_type=[default, manure, mucuna, lablab, shemp, stable]; fract_carb=[0.2, 0.3, 0.54, 0.57, 0.45, 0]; fract_cell=[0.7, 0.3, 0.37, 0.37, 0.47, 0.1]; fract_lign=[0.1, 0.4, 0.09, 0.06, 0.08, 0.9]; wfpsN2N2O_x=[22, 88]; wfpsN2N2O_y=[0.1, 1]
          oc=[1.03671, 0.888472, 0.889342, 0.889768, 0.76993, 0.44997, 0.269989, 0.21999, 0.159994, 0.129995, 0.119994]
        SoilOrganicMatter: same as Saturated_Flow_Only.paddock.Soil.SoilOrganicMatter
        Analysis: Thickness=[150, 150, 300, 300, 300, 300, 300, 300, 300, 300, 300]; PH=[8.4, 8.8, 9, 9.2, 9.2, 9.1, 9, 9, 8.9, 8.9, 8.9]; PHUnits=Water; BoronUnits=HotWater
      Report: EventNames=[Clock].DoReport
        VariableNames:
          [Soil].SoilWater.dlayer as dlayer
          [Soil].SoilWater.sat_dep as sat_dep
          [Soil].SoilWater.dul_dep as dul_dep
          [Soil].SoilWater.ll15_dep as ll15_dep
          [Soil].SoilWater.air_dry_dep as air_dry_dep
          [Clock].Today
          [WeatherFile].Rain as rain
          [Soil].SoilWater.outflow_lat as outflow_lat
          [Soil].SoilWater.sw_dep as sw_dep
          [Soil].SoilWater.flux as flux
          [Soil].SoilWater.drain as drain
          [Soil].SoilWater.runoff as runoff
          [Soil].SoilWater.es as es
      SurfaceOrganicMatter: same as Ponding_with_Soil_Evap.paddock.SurfaceOrganicMatter
      MicroClimate: same as Saturated_Flow_Only.paddock.MicroClimate
  Simulation Soil_Evaporation_with_SurfaceOM: Area=0; Slope=0
    WeatherFile: FileName=Soil Evaporation with SurfaceOM.met
    Clock: StartDate=1940-01-01; EndDate=1941-01-01
    Summary summaryfile
    Zone paddock: Area=1; Slope=0
      Manager AvgTempCalculation: same as Soil_Evaporation_Only.paddock.AvgTempCalculation
      Soil: SoilType=Black Vertosol; LocalName=Waco; Site=Jimbour; NearestTown=Jimbour, Q 4352; Region=South East Queensland; NaturalVegetation=Grassland, mainly Qld bluegrass; Latitude=0; Longitude=0
        Sample Soil sample: same as Saturated_Flow_Only.paddock.Soil.Soil sample
        Water: same as Saturated_Flow_Only.paddock.Soil.Water
        SoilWater: same as Soil_Evaporation_Only.paddock.Soil.SoilWater
        SoilNitrogen: fom_type=[default, manure, mucuna, lablab, shemp, stable]; fract_carb=[0.2, 0.3, 0.54, 0.57, 0.45, 0]; fract_cell=[0.7, 0.3, 0.37, 0.37, 0.47, 0.1]; fract_lign=[0.1, 0.4, 0.09, 0.06, 0.08, 0.9]; wfpsN2N2O_x=[22, 88]; wfpsN2N2O_y=[0.1, 1]
          oc=[1.0322, 0.883118, 0.887037, 0.888782, 0.769524, 0.449743, 0.269859, 0.219887, 0.159921, 0.129937, 0.119941]
        SoilOrganicMatter: same as Saturated_Flow_Only.paddock.Soil.SoilOrganicMatter
        Analysis: Thickness=[150, 150, 300, 300, 300, 300, 300, 300, 300, 300, 300]; PH=[8.4, 8.8, 9, 9.2, 9.2, 9.1, 9, 9, 8.9, 8.9, 8.9]; PHUnits=Water; BoronUnits=HotWater
      SurfaceOrganicMatter Surface Organic Matter: PoolName=wheat_stubble; type=wheat; mass=1000; standing_fraction=0; cnr=80; CriticalResidueWeight=2000; OptimumDecompTemp=20; MaxCumulativeEOS=20; CNRatioDecompCoeff=0.277; CNRatioDecompThreshold=25; TotalLeachRain=25; MinRainToLeach=10; CriticalMinimumOrganicC=0.004; DefaultCPRatio=0; DefaultStandingFraction=0; StandingExtinctCoeff=0.5; FractionFaecesAdded=0.5
        Pools:
          {PoolName=wheat_stubble, ResidueType=wheat, Mass=1000, CNRatio=80, StandingFraction=0}
        ResidueTypes ResidueTypesList: LoadFromResource=ResidueTypes
        TillageTypes TillageTypesList
      Report: EventNames=[Clock].DoReport
        VariableNames:
          [Soil].SoilWater.dlayer as dlayer
          [Soil].SoilWater.sat_dep as sat_dep
          [Soil].SoilWater.dul_dep as dul_dep
          [Soil].SoilWater.sw_dep as sw_dep
          [Soil].SoilWater.ll15_dep as ll15_dep
          [Soil].SoilWater.air_dry_dep as air_dry_dep
          [Soil].SoilWater.flux as flux
          [Soil].SoilWater.drain as drain
          [Soil].SoilWater.runoff as runoff
          [WeatherFile].Rain as rain
          [Clock].Today.DayOfYear as day
          [Clock].Today
          [Soil].SoilWater.u as u
          [Soil].SoilWater.cona as cona
          [Soil].SoilWater.t as t
          [Surface Organic Matter].surfaceom_cover as surfaceom_cover
          [Soil].SoilWater.es as es
          [Soil].SoilWater.eo as eo
          [Soil].SoilWater.eos as eos
          [Soil].SoilWater.sw_dep(1) as sw_top
          [WeatherFile].Radn as radn
          [AvgTempCalculation].Script.avgTemp as avgTemp
      MicroClimate: same as Saturated_Flow_Only.paddock.MicroClimate
  Simulation Runoff_with_SurfaceOM: Area=0; Slope=0
    WeatherFile: FileName=Runoff with SurfaceOM.met
    Clock: StartDate=1940-01-01; EndDate=1950-12-31
    Summary summaryfile
    Zone paddock: Area=1; Slope=0
      Soil: SoilType=Black Vertosol; LocalName=Waco; Site=Jimbour; NearestTown=Jimbour, Q 4352; Region=South East Queensland; NaturalVegetation=Grassland, mainly Qld bluegrass; Latitude=0; Longitude=0
        Sample Soil sample: same as Runoff_Only.paddock.Soil.Soil sample
        Water: same as Saturated_Flow_Only.paddock.Soil.Water
        SoilWater: min_crit_temp=5; max_crit_temp=35; max_albedo=0.23; A_to_evap_fact=0.44; canopy_eos_coef=1.7; sw_top_crit=0.9; sumes1_max=100; sumes2_max=25; solute_flow_eff=[1]; solute_flux_eff=[1]; gravity_gradient=2E-05; specific_bd=2.65; hydrol_effective_depth=450; immobile_solutes=[nh4]; canopy_fact=[1, 1, 0, 0]; canopy_fact_height=[0, 600, 1800, 30000]; canopy_fact_default=0.5; act_evap_method=ritchie; irrigation_will_runoff=false; SummerDate=1-Nov; WinterDate=1-Apr; Salb=0.13; CN2Bare=73; CNRed=20; CNCov=0.8
          zero: irrigation_layer, SummerCona, SummerU, WinterCona, WinterU, DiffusConst, DiffusSlope, slope, discharge_width, catchment_area, max_pond
          Thickness  SWCON  KLAT
          150        0      0
          150        0      0
          300        0      0
          300        0      0
          300        0      0
          300        0      0
          300        0      0
          300        0      0
          300        0      0
          300        0      0
          300        0      0
          mobile_solutes=[no3, urea, cl, br, org_n, org_c_pool1, org_c_pool2, org_c_pool3]
        SoilNitrogen: fom_type=[default, manure, mucuna, lablab, shemp, stable]; fract_carb=[0.2, 0.3, 0.54, 0.57, 0.45, 0]; fract_cell=[0.7, 0.3, 0.37, 0.37, 0.47, 0.1]; fract_lign=[0.1, 0.4, 0.09, 0.06, 0.08, 0.9]; wfpsN2N2O_x=[22, 88]; wfpsN2N2O_y=[0.1, 1]
          oc=[0.949834, 0.83316, 0.863315, 0.877585, 0.764867, 0.447116, 0.268331, 0.218677, 0.159062, 0.129276, 0.119376]
        SoilOrganicMatter: same as Saturated_Flow_Only.paddock.Soil.SoilOrganicMatter
        Analysis: Thickness=[150, 150, 300, 300, 300, 300, 300, 300, 300, 300, 300]; PH=[8.4, 8.8, 9, 9.2, 9.2, 9.1, 9, 9, 8.9, 8.9, 8.9]; PHUnits=Water; BoronUnits=HotWater
      SurfaceOrganicMatter Surface Organic Matter: PoolName=wheat_stubble; type=wheat; mass=5000; standing_fraction=0; cnr=80; CriticalResidueWeight=2000; OptimumDecompTemp=20; MaxCumulativeEOS=20; CNRatioDecompCoeff=0.277; CNRatioDecompThreshold=25; TotalLeachRain=25; MinRainToLeach=10; CriticalMinimumOrganicC=0.004; DefaultCPRatio=0; DefaultStandingFraction=0; StandingExtinctCoeff=0.5; FractionFaecesAdded=0.5
        Pools:
          {PoolName=wheat_stubble, ResidueType=wheat, Mass=5000, CNRatio=80, StandingFraction=0}
        ResidueTypes ResidueTypesList: LoadFromResource=ResidueTypes
        TillageTypes TillageTypesList
      Report: EventNames=[Clock].DoReport
        VariableNames:
          [Clock].Today
          [WeatherFile].Rain as rain
          [Soil].SoilWater.runoff as runoff
          [Surface Organic Matter].surfaceom_cover as surfaceom_cover
          [Soil].SoilWater.dlayer as dlayer
          [Soil].SoilWater.sat_dep as sat_dep
          [Soil].SoilWater.dul_dep as dul_dep
          [Soil].SoilWater.ll15_dep as ll15_dep
          [Soil].SoilWater.air_dry_dep as air_dry_dep
          [Soil].SoilWater.sw_dep as sw_dep
          [Soil].SoilWater.flux as flux
          [Soil].SoilWater.flow as flow
          [Soil].SoilWater.drain as drain
          [Soil].SoilWater.es as es
      MicroClimate: same as Saturated_Flow_Only.paddock.MicroClimate
  Simulation Runoff_after_Tillage_Event: Area=0; Slope=0
    WeatherFile: FileName=Runoff after Tillage Event.met
    Clock: StartDate=1940-01-01; EndDate=1950-12-31
    Summary summaryfile
    Zone paddock: Area=1; Slope=0
      Soil: SoilType=Black Vertosol; LocalName=Waco; Site=Jimbour; NearestTown=Jimbour, Q 4352; Region=South East Queensland; NaturalVegetation=Grassland, mainly Qld bluegrass; Latitude=0; Longitude=0
        Sample Soil sample: same as Runoff_Only.paddock.Soil.Soil sample
        Water: same as Saturated_Flow_Only.paddock.Soil.Water
        SoilWater: same as Runoff_Only.paddock.Soil.SoilWater
        SoilNitrogen: fom_type=[default, manure, mucuna, lablab, shemp, stable]; fract_carb=[0.2, 0.3, 0.54, 0.57, 0.45, 0]; fract_cell=[0.7, 0.3, 0.37, 0.37, 0.47, 0.1]; fract_lign=[0.1, 0.4, 0.09, 0.06, 0.08, 0.9]; wfpsN2N2O_x=[22, 88]; wfpsN2N2O_y=[0.1, 1]
          oc=[0.936407, 0.833177, 0.863331, 0.877591, 0.764875, 0.446901, 0.268464, 0.21879, 0.15914, 0.129329, 0.119387]
        SoilOrganicMatter: same as Saturated_Flow_Only.paddock.Soil.SoilOrganicMatter
        Analysis: Thickness=[150, 150, 300, 300, 300, 300, 300, 300, 300, 300, 300]; PH=[8.4, 8.8, 9, 9.2, 9.2, 9.1, 9, 9, 8.9, 8.9, 8.9]; PHUnits=Water; BoronUnits=HotWater
      Manager TillageSW
        tillage_date = 1940-01-03
        CumWater = 200
        CnRed = 15
```csharp
using System;
using Models.Core;
using Models.PMF;
using Models.PMF.OilPalm;
using Models.Soils;
using Models.SurfaceOM;

namespace Models
{ 
	[Serializable]
	[System.Xml.Serialization.XmlInclude(typeof(Model))]
	public class Script : Model
	{
		[Link] Clock Clock;
		[Link] Soil Soil;
		[Link] SurfaceOrganicMatter SurfaceOM;
		
		
		[Description("Tillage date")]
		public DateTime tillage_date {get; set;}
		
		[Description("Cumulative Water since tillage, where reduction stops")]
		[Units("mm")]
		public int CumWater {get; set;}
		
		[Description("Runoff Curve Number Reduction straight after tillage")]
		public int CnRed {get; set;}
		
		
		
       [EventSubscribe("DoManagement")]
       private void OnDoManagement(object sender, EventArgs e)
		{
		if (Clock.Today == tillage_date)
			{
				TillageType data = new TillageType();
				data.cn_rain = CumWater;
				data.cn_red = CnRed;
			   	Soil.SoilWater.Tillage(data);
	        }
        }
	}
}
```
      Report: same as Runoff_Only.paddock.Report
      SurfaceOrganicMatter: same as Ponding_with_Soil_Evap.paddock.SurfaceOrganicMatter
      MicroClimate: same as Saturated_Flow_Only.paddock.MicroClimate
  Simulation Runoff_with_Irrigation: Area=0; Slope=0
    WeatherFile: FileName=Runoff with Irrigation.met
    Clock: StartDate=1940-01-01; EndDate=1950-12-31
    Summary summaryfile
    Zone paddock: Area=1; Slope=0
      Soil: SoilType=Black Vertosol; LocalName=Waco; Site=Jimbour; NearestTown=Jimbour, Q 4352; Region=South East Queensland; NaturalVegetation=Grassland, mainly Qld bluegrass; Latitude=0; Longitude=0
        Sample Soil sample: same as Runoff_Only.paddock.Soil.Soil sample
        Water: same as Saturated_Flow_Only.paddock.Soil.Water
        SoilWater: min_crit_temp=5; max_crit_temp=35; max_albedo=0.23; A_to_evap_fact=0.44; canopy_eos_coef=1.7; sw_top_crit=0.9; sumes1_max=100; sumes2_max=25; solute_flow_eff=[1]; solute_flux_eff=[1]; gravity_gradient=2E-05; specific_bd=2.65; hydrol_effective_depth=450; immobile_solutes=[nh4]; canopy_fact=[1, 1, 0, 0]; canopy_fact_height=[0, 600, 1800, 30000]; canopy_fact_default=0.5; act_evap_method=ritchie; irrigation_will_runoff=false; irrigation_layer=1; SummerDate=1-Nov; WinterDate=1-Apr; Salb=0.13; CN2Bare=73
          zero: SummerCona, SummerU, WinterCona, WinterU, DiffusConst, DiffusSlope, slope, discharge_width, catchment_area, max_pond, CNRed, CNCov
          Thickness  SWCON  KLAT
          150        0      0
          150        0      0
          300        0      0
          300        0      0
          300        0      0
          300        0      0
          300        0      0
          300        0      0
          300        0      0
          300        0      0
          300        0      0
          mobile_solutes=[no3, urea, cl, br, org_n, org_c_pool1, org_c_pool2, org_c_pool3]
        SoilNitrogen: fom_type=[default, manure, mucuna, lablab, shemp, stable]; fract_carb=[0.2, 0.3, 0.54, 0.57, 0.45, 0]; fract_cell=[0.7, 0.3, 0.37, 0.37, 0.47, 0.1]; fract_lign=[0.1, 0.4, 0.09, 0.06, 0.08, 0.9]; wfpsN2N2O_x=[22, 88]; wfpsN2N2O_y=[0.1, 1]
          oc=[0.936393, 0.833159, 0.86332, 0.877595, 0.764871, 0.447116, 0.268327, 0.218673, 0.15906, 0.129252, 0.119322]
        SoilOrganicMatter: same as Saturated_Flow_Only.paddock.Soil.SoilOrganicMatter
        Analysis: Thickness=[150, 150, 300, 300, 300, 300, 300, 300, 300, 300, 300]; PH=[8.4, 8.8, 9, 9.2, 9.2, 9.1, 9, 9, 8.9, 8.9, 8.9]; PHUnits=Water; BoronUnits=HotWater
      Irrigation
      Operations Operations Schedule
        1940-01-02  [Irrigation].Apply(10);
        1940-01-05  [Irrigation].Apply(20);
        1940-01-08  [Irrigation].Apply(50);
        1940-01-11  [Irrigation].Apply(100);
        1940-01-14  [Irrigation].Apply(250);
        1940-01-17  [Irrigation].Apply(500);
        1940-01-20  [Irrigation].Apply(1000);
        1940-01-23  [Irrigation].Apply(2000);
      Report: EventNames=[Clock].DoReport
        VariableNames:
          [Clock].Today
          [Irrigation].irrigation
          [Soil].SoilWater.runoff as runoff
          [Soil].SoilWater.dlayer as dlayer
          [Soil].SoilWater.sat_dep as sat_dep
          [Soil].SoilWater.dul_dep as dul_dep
          [Soil].SoilWater.ll15_dep as ll15_dep
          [Soil].SoilWater.air_dry_dep as air_dry_dep
          [Soil].SoilWater.sw_dep as sw_dep
          [Soil].SoilWater.flux as flux
          [Soil].SoilWater.flow as flow
          [Soil].SoilWater.drain as drain
          [Soil].SoilWater.es as es
      SurfaceOrganicMatter: same as Saturated_Flow_Only.paddock.SurfaceOrganicMatter
      MicroClimate: same as Saturated_Flow_Only.paddock.MicroClimate
  Simulation Subsurface_Irrigation: Area=0; Slope=0
    WeatherFile: FileName=Subsurface Irrigation.met
    Clock: StartDate=1940-01-01; EndDate=1940-01-31
    Summary summaryfile
    Zone paddock: Area=1; Slope=0
      Soil: SoilType=Black Vertosol; LocalName=Waco; Site=Jimbour; NearestTown=Jimbour, Q 4352; Region=South East Queensland; NaturalVegetation=Grassland, mainly Qld bluegrass; Latitude=0; Longitude=0
        Sample Soil sample: same as Ponding_Only.paddock.Soil.Soil sample
        Water: same as Saturated_Flow_Only.paddock.Soil.Water
        SoilWater: min_crit_temp=5; max_crit_temp=35; max_albedo=0.23; A_to_evap_fact=0.44; canopy_eos_coef=1.7; sw_top_crit=0.9; sumes1_max=100; sumes2_max=25; solute_flow_eff=[1]; solute_flux_eff=[1]; gravity_gradient=2E-05; specific_bd=2.65; hydrol_effective_depth=450; immobile_solutes=[nh4]; canopy_fact=[1, 1, 0, 0]; canopy_fact_height=[0, 600, 1800, 30000]; canopy_fact_default=0.5; act_evap_method=ritchie; irrigation_will_runoff=false; irrigation_layer=1; SummerDate=1-Nov; WinterDate=1-Apr; DiffusConst=40; DiffusSlope=16; Salb=0.13; CN2Bare=1
          zero: SummerCona, SummerU, WinterCona, WinterU, slope, discharge_width, catchment_area, max_pond, CNRed, CNCov
          Thickness  SWCON  KLAT
          150        0      0
          150        0      0
          300        0      0
          300        0      0
          300        0      0
          300        0      0
          300        0      0
          300        0      0
          300        0      0
          300        0      0
          300        0      0
          mobile_solutes=[no3, urea, cl, br, org_n, org_c_pool1, org_c_pool2, org_c_pool3]
        SoilNitrogen: fom_type=[default, manure, mucuna, lablab, shemp, stable]; fract_carb=[0.2, 0.3, 0.54, 0.57, 0.45, 0]; fract_cell=[0.7, 0.3, 0.37, 0.37, 0.47, 0.1]; fract_lign=[0.1, 0.4, 0.09, 0.06, 0.08, 0.9]; wfpsN2N2O_x=[22, 88]; wfpsN2N2O_y=[0.1, 1]
          oc=[1.04, 0.89, 0.89, 0.89, 0.77, 0.45, 0.27, 0.22, 0.16, 0.13, 0.12]
        SoilOrganicMatter: same as Saturated_Flow_Only.paddock.Soil.SoilOrganicMatter
        Analysis: Thickness=[150, 150, 300, 300, 300, 300, 300, 300, 300, 300, 300]; PH=[8.4, 8.8, 9, 9.2, 9.2, 9.1, 9, 9, 8.9, 8.9, 8.9]; PHUnits=Water; BoronUnits=HotWater
      Irrigation
      Operations Operations Schedule
        1940-01-01  [Irrigation].Apply(10);
        1940-01-02  [Irrigation].Apply(10);
        1940-01-04  [Irrigation].Apply(10);
        1940-01-06  [Irrigation].Apply(10);
        1940-01-08  [Irrigation].Apply(10);
        1940-01-10  [Irrigation].Apply(10);
        1940-01-12  [Irrigation].Apply(10);
      Manager ResetSW1
        reset_date = 1940-01-03
```csharp
using System;
using Models.Core;
using Models.PMF;
using Models.PMF.OilPalm;
using Models.Soils;
using Models.SurfaceOM;

namespace Models
{ 
	[Serializable]
	[System.Xml.Serialization.XmlInclude(typeof(Model))]
	public class Script : Model
	{
		[Link] Clock Clock;
		[Link] Soil Soil;
		[Link] SurfaceOrganicMatter SurfaceOM;
		[Description("Reset date")]
		public DateTime reset_date {get; set;}

		
       [EventSubscribe("DoManagement")]
       private void OnDoManagement(object sender, EventArgs e)
		{
		if (Clock.Today == reset_date)
		   Soil.SoilWater.Reset();
        }
	}
}
```
      Manager ResetSW2
        reset_date = 1940-01-05
        script: same as in Subsurface_Irrigation.paddock.ResetSW1
      Manager ResetSW3
        reset_date = 1940-01-07
        script: same as in Subsurface_Irrigation.paddock.ResetSW1
      Manager ResetSW4
        reset_date = 1940-01-09
        script: same as in Subsurface_Irrigation.paddock.ResetSW1
      Manager ResetSW5
        reset_date = 1940-01-11
        script: same as in Subsurface_Irrigation.paddock.ResetSW1
      Report: EventNames=[Clock].DoReport
        VariableNames:
          [Clock].Today
          [Soil].SoilWater.irrigation_layer
          [Irrigation].irrigation
          [Soil].SoilWater.dlayer as dlayer
          [Soil].SoilWater.sat_dep as sat_dep
          [Soil].SoilWater.dul_dep as dul_dep
          [Soil].SoilWater.ll15_dep as ll15_dep
          [Soil].SoilWater.air_dry_dep as air_dry_dep
          [WeatherFile].Rain as rain
          [Soil].SoilWater.sw_dep as sw_dep
          [Soil].SoilWater.flow as flow
          [Soil].SoilWater.drain as drain
          [Soil].SoilWater.runoff as runoff
          [Soil].SoilWater.es as es
      SurfaceOrganicMatter: same as Saturated_Flow_Only.paddock.SurfaceOrganicMatter
      MicroClimate: same as Saturated_Flow_Only.paddock.MicroClimate
  Folder Solute Tests
    Simulation Solute_Saturated_Flow_Only: Area=0; Slope=0
      WeatherFile: FileName=Solute - Saturated Flow Only.met
      Clock: StartDate=1940-01-01; EndDate=1940-03-02
      Summary summaryfile
      Zone paddock: Area=1; Slope=0
        Soil: SoilType=Black Vertosol; LocalName=Waco; Site=Jimbour; NearestTown=Jimbour, Q 4352; Region=South East Queensland; NaturalVegetation=Grassland, mainly Qld bluegrass; Latitude=0; Longitude=0
          Sample Soil sample: NO3Units=ppm; NH4Units=kgha; SWUnits=Volumetric; OCUnits=Total; PHUnits=Water
            Thickness  NO3  NH4  SW
            150        0    350  0.59
            150        0    250  0.58
            300        0    350  0.59
            300        0    250  0.58
            300        0    350  0.57
            300        0    250  0.55
            300        0    350  0.55
            300        0    250  0.53
            300        0    350  0.52
            300        0    250  0.51
            300        0    350  0.49
          Water: same as Saturated_Flow_Only.paddock.Soil.Water
          SoilWater: same as Saturated_Flow_Only.paddock.Soil.SoilWater
          SoilNitrogen: same as WaterTable_Calculation.paddock.Soil.SoilNitrogen
          SoilOrganicMatter: same as WaterTable_Calculation.paddock.Soil.SoilOrganicMatter
          Analysis: Thickness=[150, 150, 300, 300, 300, 300, 300, 300, 300, 300, 300]; PH=[1, 1, 1, 1, 1, 1, 1, 1, 1, 1, 1]; PHUnits=Water; BoronUnits=HotWater
        Report: EventNames=[Clock].DoReport
          VariableNames:
            [Soil].SoilWater.dlayer as dlayer
            [Soil].SoilWater.sat_dep as sat_dep
            [Soil].SoilWater.dul_dep as dul_dep
            [Soil].SoilWater.ll15_dep as ll15_dep
            [Soil].SoilWater.air_dry_dep as air_dry_dep
            [WeatherFile].Rain as rain
            [Soil].SoilWater.sw_dep as sw_dep
            [Soil].SoilWater.flux as flux
            [Soil].SoilWater.drain as drain
            [Soil].SoilWater.runoff as runoff
            [Soil].SoilWater.es as es
            [Clock].Today
            leach_cl as leach_mobile
            [Soil].SoilNitrogen.LeachNH4 as leach_immobile
            [Soil].SoilNitrogen.LeachNO3 as leach_no3
            [Soil].SoilNitrogen.LeachUrea as leach_urea
            cl format 3 as mobile
            [Soil].SoilNitrogen.nh4 format 3 as immobile
            [Soil].SoilNitrogen.no3 format 3
            [Soil].SoilNitrogen.urea format 3
        SurfaceOrganicMatter: same as Ponding_with_Soil_Evap.paddock.SurfaceOrganicMatter
        MicroClimate: same as Saturated_Flow_Only.paddock.MicroClimate
    Simulation Solute_Unsaturated_Flow_Only: Area=0; Slope=0
      WeatherFile: FileName=Solute - Unsaturated Flow Only.met
      Clock: StartDate=1940-01-01; EndDate=1950-12-31
      Summary summaryfile
      Zone paddock: Area=1; Slope=0
        Soil: SoilType=Black Vertosol; LocalName=Waco; Site=Jimbour; NearestTown=Jimbour, Q 4352; Region=South East Queensland; NaturalVegetation=Grassland, mainly Qld bluegrass; Latitude=0; Longitude=0
          Sample Soil sample: NO3Units=ppm; NH4Units=kgha; SWUnits=Volumetric; OCUnits=Total; PHUnits=Water
            Thickness  NO3  NH4  SW
            150        0    350  0.54
            150        0    250  0.53
            300        0    350  0.29
            300        0    250  0.54
            300        0    350  0.3
            300        0    250  0.5
            300        0    350  0.32
            300        0    250  0.48
            300        0    350  0.34
            300        0    250  0.46
            300        0    350  0.36
          Water: same as Saturated_Flow_Only.paddock.Soil.Water
          SoilWater: same as Unsaturated_Flow_Only.paddock.Soil.SoilWater
          SoilNitrogen: same as WaterTable_Calculation.paddock.Soil.SoilNitrogen
          SoilOrganicMatter: same as WaterTable_Calculation.paddock.Soil.SoilOrganicMatter
          Analysis: Thickness=[150, 150, 300, 300, 300, 300, 300, 300, 300, 300, 300]; PH=[1, 1, 1, 1, 1, 1, 1, 1, 1, 1, 1]; PHUnits=Water; BoronUnits=HotWater
        Report: EventNames=[Clock].DoReport
          VariableNames:
            [Soil].SoilWater.dlayer as dlayer
            [Soil].SoilWater.sat_dep as sat_dep
            [Soil].SoilWater.dul_dep as dul_dep
            [Soil].SoilWater.ll15_dep as ll15_dep
            [Soil].SoilWater.air_dry_dep as air_dry_dep
            [WeatherFile].Rain as rain
            [Soil].SoilWater.sw_dep as sw_dep
            [Soil].SoilWater.flux as flux
            [Soil].SoilWater.drain as drain
            [Soil].SoilWater.runoff as runoff
            [Soil].SoilWater.es as es
            [Clock].Today
            flow_cl as flow_mobile
            flow_nh4 as flow_immobile
            flow_no3
            flow_urea
            cl format 3 as mobile
            [Soil].SoilNitrogen.nh4 format 3 as immobile
            [Soil].SoilNitrogen.no3 format 3 as no3
            [Soil].SoilNitrogen.urea format 3 as urea
        SurfaceOrganicMatter: same as Ponding_with_Soil_Evap.paddock.SurfaceOrganicMatter
        MicroClimate: same as Saturated_Flow_Only.paddock.MicroClimate
    Simulation Solute_Irrigation: Area=0; Slope=0
      WeatherFile: FileName=Solute - Irrigation Only.met
      Clock: StartDate=1940-01-01; EndDate=1940-06-01
      Summary summaryfile
      Zone paddock: Area=1; Slope=0
        Irrigation
        Soil: SoilType=Black Vertosol; LocalName=Waco; Site=Jimbour; NearestTown=Jimbour, Q 4352; Region=South East Queensland; NaturalVegetation=Grassland, mainly Qld bluegrass; Latitude=0; Longitude=0
          Sample Soil sample: NO3Units=ppm; NH4Units=ppm; SWUnits=Volumetric; OCUnits=Total; PHUnits=Water
            Thickness  NO3  NH4  SW
            150        0    0    0.001
            150        0    0    0.001
            300        0    0    0.001
            300        0    0    0.001
            300        0    0    0.001
            300        0    0    0.001
            300        0    0    0.001
            300        0    0    0.001
            300        0    0    0.001
            300        0    0    0.001
            300        0    0    0.001
          Water: same as Saturated_Flow_Only.paddock.Soil.Water
          SoilWater: min_crit_temp=5; max_crit_temp=35; max_albedo=0.23; A_to_evap_fact=0.44; canopy_eos_coef=1.7; sw_top_crit=0.9; sumes1_max=100; sumes2_max=25; solute_flow_eff=[1]; solute_flux_eff=[1]; gravity_gradient=2E-05; specific_bd=2.65; hydrol_effective_depth=450; immobile_solutes=[nh4]; canopy_fact=[1, 1, 0, 0]; canopy_fact_height=[0, 600, 1800, 30000]; canopy_fact_default=0.5; act_evap_method=ritchie; irrigation_will_runoff=false; irrigation_layer=1; SummerDate=1-Nov; WinterDate=1-Apr; Salb=0.13; CN2Bare=73; CNRed=20; CNCov=0.8
            zero: SummerCona, SummerU, WinterCona, WinterU, DiffusConst, DiffusSlope, slope, discharge_width, catchment_area, max_pond
            Thickness  SWCON  KLAT
            150        0      0
            150        0      0
            300        0      0
            300        0      0
            300        0      0
            300        0      0
            300        0      0
            300        0      0
            300        0      0
            300        0      0
            300        0      0
            mobile_solutes=[no3, urea, cl, br, org_n, org_c_pool1, org_c_pool2, org_c_pool3]
          SoilNitrogen: same as WaterTable_Calculation.paddock.Soil.SoilNitrogen
          SoilOrganicMatter: same as WaterTable_Calculation.paddock.Soil.SoilOrganicMatter
          Analysis: Thickness=[150, 150, 300, 300, 300, 300, 300, 300, 300, 300, 300]; PH=[1, 1, 1, 1, 1, 1, 1, 1, 1, 1, 1]; PHUnits=Water; BoronUnits=HotWater
        Operations Operations Schedule
          1940-02-01  [Irrigation].Apply(20);
          1940-03-01  [Irrigation].Apply(20);
          1940-04-01  [Irrigation].Apply(20);
        Report: EventNames=[Clock].DoReport
          VariableNames:
            [WeatherFile].Rain as rain
            [Soil].SoilWater.runoff as runoff
            [Soil].SoilWater.dlayer as dlayer
            [Soil].SoilWater.dul_dep as dul_dep
            [Soil].SoilWater.ll15_dep as ll15_dep
            [Soil].SoilWater.air_dry_dep as air_dry_dep
            [Soil].SoilWater.sw_dep as sw_dep
            [Soil].SoilWater.flux as flux
            [Soil].SoilWater.flow as flow
            [Soil].SoilWater.drain as drain
            [Soil].SoilWater.es as es
            [Clock].Today
            Irrigation.irrigation
            [Soil].SoilWater.sw_dep(1) as sw_top
            [Soil].SoilNitrogen.no3(1) as no3_top
            [Soil].SoilNitrogen.nh4(1) as nh4_top
            cl(1) as cl_top
            [Soil].SoilNitrogen.no3 as no3
            [Soil].SoilNitrogen.nh4 as nh4
            cl
        SurfaceOrganicMatter: same as Ponding_with_Soil_Evap.paddock.SurfaceOrganicMatter
        MicroClimate: same as Saturated_Flow_Only.paddock.MicroClimate
  Folder Manager Set Variables
    Simulation Setable_Variables_Erosion: Area=0; Slope=0
      WeatherFile: FileName=Setable Variables - Erosion.met
      Clock: StartDate=1940-01-01; EndDate=1940-01-17
      Summary summaryfile
      Zone paddock: Area=1; Slope=0
        Soil: SoilType=Black Vertosol; LocalName=Waco; Site=Jimbour; NearestTown=Jimbour, Q 4352; Region=South East Queensland; NaturalVegetation=Grassland, mainly Qld bluegrass; Latitude=0; Longitude=0
          Sample Soil sample: same as Ponding_Only.paddock.Soil.Soil sample
          Water
            Thickness  BD    AirDry  LL15  DUL  SAT
            150        1.02  0.4     0.6   0.7  0.8
            150        1.03  0.5     0.6   0.7  0.8
            300        1.02  0.5     0.6   0.7  0.8
            300        1.02  0.5     0.6   0.7  0.8
            300        1.06  0.5     0.6   0.7  0.8
            300        1.11  0.5     0.6   0.7  0.8
            300        1.12  0.5     0.6   0.7  0.8
            300        1.15  0.5     0.6   0.7  0.8
            300        1.18  0.5     0.6   0.7  0.8
            300        1.2   0.5     0.6   0.7  0.8
            300        1.25  0.5     0.6   0.7  0.8
          SoilWater: same as Ponding_Only.paddock.Soil.SoilWater
          SoilNitrogen: fom_type=[default, manure, mucuna, lablab, shemp, stable]; fract_carb=[0.2, 0.3, 0.54, 0.57, 0.45, 0]; fract_cell=[0.7, 0.3, 0.37, 0.37, 0.47, 0.1]; fract_lign=[0.1, 0.4, 0.09, 0.06, 0.08, 0.9]; wfpsN2N2O_x=[22, 88]; wfpsN2N2O_y=[0.1, 1]
            oc=[1.03969, 0.889877, 0.889948, 0.889985, 0.769997, 0.449999, 0.27, 0.22, 0.16, 0.13, 0.12]
          SoilOrganicMatter: same as Saturated_Flow_Only.paddock.Soil.SoilOrganicMatter
          Analysis: Thickness=[150, 150, 300, 300, 300, 300, 300, 300, 300, 300, 300]; PH=[8.4, 8.8, 9, 9.2, 9.2, 9.1, 9, 9, 8.9, 8.9, 8.9]; PHUnits=Water; BoronUnits=HotWater
        Manager set setable variables
```csharp
using System;
using Models.Core;
using Models.PMF;
using Models.PMF.OldPlant;
using Models.Soils;

namespace Models
{
	[Serializable]
	[System.Xml.Serialization.XmlInclude(typeof(Model))]
	public class Script : Model
	{
		[Link] Clock Clock;
		[Link] Soil soil;
		
		[EventSubscribe("DoManagement")]
		private void OnDoManagement(object sender, EventArgs e)
		{
			
			if (Clock.Today == new DateTime(1940, 01, 04)) 
				{
			   	soil.SoilWater.max_pond = 100;
			    soil.SoilWater.dlayer = new double[] {50, 50, 50, 50, 50, 50, 50, 50, 50, 50, 50};         
				}
			
			if (Clock.Today == new DateTime(1940, 01, 05))
				{
			    soil.SoilWater.sat_dep = new double[] {30, 30, 30, 30, 30, 30, 30, 30, 30, 30, 30};    
			    soil.SoilWater.dul_dep = new double[] {20, 20, 20, 20, 20, 20, 20, 20, 20, 20, 20};  
			   soil.SoilWater.ll15_dep = new double[] {10, 10, 10, 10, 10, 10, 10, 10, 10, 10, 10};  
		    soil.SoilWater.air_dry_dep = new double[] { 3,  4,  5,  5,  5,  5,  5,  5,  5,  5,  5};    
				}
			
			
			if (Clock.Today == new DateTime(1940, 01, 08)) 
				{
			    soil.SoilWater.sat = new double[] {0.5, 0.5, 0.5, 0.5, 0.5, 0.5, 0.5, 0.5, 0.5, 0.5, 0.5};    
			    soil.SoilWater.dul = new double[] {0.4, 0.4, 0.4, 0.4, 0.4, 0.4, 0.4, 0.4, 0.4, 0.4, 0.4};  
			   soil.SoilWater.ll15 = new double[] {0.3, 0.3, 0.3, 0.3, 0.3, 0.3, 0.3, 0.3, 0.3, 0.3, 0.3};  
			soil.SoilWater.air_dry = new double[] {0.1, 0.2, 0.2, 0.2, 0.2, 0.2, 0.2, 0.2, 0.2, 0.2, 0.2};  
				}
			
			
			if (Clock.Today == new DateTime(1940, 01, 11)) 
				{
			     soil.SoilWater.dlt_dlayer = new double[] {20, 20, 20, 20, 20, 20, 20, 20, 20, 20, 20};         
				}
			
			if (Clock.Today == new DateTime(1940, 01, 14)) 
				{
			    soil.SoilWater.Reset();
				}			





			/*
				
			if day = 2 and year = 1940 then
			   'Soil Water' set max_pond = 100
			     'Soil Water' set dlayer = 50 50 50 50 50 50 50 50 50 50 50         
			endif
			
			if day = 5 and year = 1940 then
			    'Soil Water' set sat_dep = 30 30 30 30 30 30 30 30 30 30 30    
			    'Soil Water' set dul_dep = 20 20 20 20 20 20 20 20 20 20 20  
			   'Soil Water' set ll15_dep = 10 10 10 10 10 10 10 10 10 10 10  
			'Soil Water' set air_dry_dep =  3  4  5  5  5  5  5  5  5  5  5    
			endif
			
			
			if day = 8 and year = 1940 then    
			    'Soil Water' set sat = 0.5 0.5 0.5 0.5 0.5 0.5 0.5 0.5 0.5 0.5 0.5    
			    'Soil Water' set dul = 0.4 0.4 0.4 0.4 0.4 0.4 0.4 0.4 0.4 0.4 0.4  
			   'Soil Water' set ll15 = 0.3 0.3 0.3 0.3 0.3 0.3 0.3 0.3 0.3 0.3 0.3  
			'Soil Water' set air_dry = 0.1 0.2 0.2 0.2 0.2 0.2 0.2 0.2 0.2 0.2 0.2  
			endif
			
			
			if day = 11 and year = 1940 then
			     'Soil Water' set dlt_dlayer = 20 20 20 20 20 20 20 20 20 20 20         
			endif
			
			if day = 14 and year = 1940 then
			
			   'Soil Water' reset
			endif
			*/
		}
	}
}
```
        Manager calculate total_pond: same as Ponding_Only.paddock.calculate total_pond
        Report: EventNames=[Clock].DoReport
          VariableNames:
            [Clock].Today
            [Soil].SoilWater.pond as pond
            [Soil].SoilWater.pond_evap as pond_evap
            [calculate total_pond].Script.total_pond as total_pond
            [Soil].SoilWater.dlayer as dlayer
            [Soil].SoilWater.sat_dep as sat_dep
            [Soil].SoilWater.dul_dep as dul_dep
            [Soil].SoilWater.ll15_dep as ll15_dep
            [Soil].SoilWater.air_dry_dep as air_dry_dep
            [Soil].SoilWater.sat as sat
            [Soil].SoilWater.dul as dul
            [Soil].SoilWater.ll15 as ll15
            [Soil].SoilWater.air_dry as air_dry
            [WeatherFile].Rain as rain
            [Soil].SoilWater.runoff as runoff
            [Soil].SoilWater.sw_dep as sw_dep
        SurfaceOrganicMatter: same as Saturated_Flow_Only.paddock.SurfaceOrganicMatter
        MicroClimate: same as Saturated_Flow_Only.paddock.MicroClimate
    Simulation Setable_Variables_Runoff: Area=0; Slope=0
      WeatherFile: FileName=Setable Variables - Runoff.met
      Clock: StartDate=1940-01-01; EndDate=1940-01-10
      Summary summaryfile
      Zone paddock: Area=1; Slope=0
        Soil: SoilType=Black Vertosol; LocalName=Waco; Site=Jimbour; NearestTown=Jimbour, Q 4352; Region=South East Queensland; NaturalVegetation=Grassland, mainly Qld bluegrass; Latitude=0; Longitude=0
          Sample Soil sample: same as Ponding_Only.paddock.Soil.Soil sample
          Water: same as Manager Set Variables.Setable_Variables_Erosion.paddock.Soil.Water
          SoilWater: min_crit_temp=5; max_crit_temp=35; max_albedo=0.23; A_to_evap_fact=0.44; canopy_eos_coef=1.7; sw_top_crit=0.9; sumes1_max=100; sumes2_max=25; solute_flow_eff=[1]; solute_flux_eff=[1]; gravity_gradient=2E-05; specific_bd=2.65; hydrol_effective_depth=450; immobile_solutes=[nh4]; canopy_fact=[1, 1, 0, 0]; canopy_fact_height=[0, 600, 1800, 30000]; canopy_fact_default=0.5; act_evap_method=ritchie; irrigation_will_runoff=false; SummerDate=1-Nov; WinterDate=1-Apr; Salb=0.13; CN2Bare=50; CNRed=30; CNCov=0.5
            zero: irrigation_layer, SummerCona, SummerU, WinterCona, WinterU, DiffusConst, DiffusSlope, slope, discharge_width, catchment_area, max_pond
            Thickness  SWCON  KLAT
            150        0      0
            150        0      0
            300        0      0
            300        0      0
            300        0      0
            300        0      0
            300        0      0
            300        0      0
            300        0      0
            300        0      0
            300        0      0
            mobile_solutes=[no3, urea, cl, br, org_n, org_c_pool1, org_c_pool2, org_c_pool3]
          SoilNitrogen: same as Subsurface_Irrigation.paddock.Soil.SoilNitrogen
          SoilOrganicMatter: same as Saturated_Flow_Only.paddock.Soil.SoilOrganicMatter
          Analysis: Thickness=[150, 150, 300, 300, 300, 300, 300, 300, 300, 300, 300]; PH=[8.4, 8.8, 9, 9.2, 9.2, 9.1, 9, 9, 8.9, 8.9, 8.9]; PHUnits=Water; BoronUnits=HotWater
        Manager set setable variables
```csharp
using System;
using Models.Core;
using Models.PMF;
using Models.PMF.OldPlant;
using Models.Soils;
namespace Models
{
	[Serializable]
	[System.Xml.Serialization.XmlInclude(typeof(Model))]
	public class Script : Model
	{
		[Link] Clock Clock;
		[Link] Soil soil;
		
		[EventSubscribe("DoManagement")]
		private void OnDoManagement(object sender, EventArgs e)
		{
		
			if (Clock.Today == new DateTime(1940, 01, 04))
				{
			    soil.SoilWater.CN2Bare = 100;
			    soil.SoilWater.CNRed = 60;     
			    soil.SoilWater.CNCov = 0.8; 
			    //SoilWater.eo_source = "Brand_New_Eo_Source" 
				}
			
			if (Clock.Today == new DateTime(1940, 01, 07))
				{
			    soil.SoilWater.Reset();
				}	
		
		
			/*
			
			if day = 4 and year = 1940 then
			   'Soil Water' set cn2_bare = 100
			   'Soil Water' set cn_red = 60      
			   'Soil Water' set cn_cov = 0.8 
			   !'Soil Water' set eo_source = 'Brand_New_Eo_Source' 
			endif
			
			if day = 7 and year = 1940 then
			
			   'Soil Water' reset
			endif
			*/
		}
	}
}
```
        Report: EventNames=[Clock].DoReport
          VariableNames:
            [Clock].Today
            [Soil].SoilWater.CN2Bare as cn2_bare
            [Soil].SoilWater.CNCov as cn_cov
            [Soil].SoilWater.CNRed as cn_red
        SurfaceOrganicMatter: same as Saturated_Flow_Only.paddock.SurfaceOrganicMatter
        MicroClimate: same as Saturated_Flow_Only.paddock.MicroClimate
    Folder cause ExternalMassFlow Event
      Simulation WaterTable_Set_to_a_fixed_depth: Area=0; Slope=0
        WeatherFile: FileName=WaterTable - Set to a fixed depth.met
        Clock: StartDate=1940-01-01; EndDate=1940-03-02
        Summary summaryfile
        Zone paddock: Area=1; Slope=0
          Soil: SoilType=Black Vertosol; LocalName=Waco; Site=Jimbour; NearestTown=Jimbour, Q 4352; Region=South East Queensland; NaturalVegetation=Grassland, mainly Qld bluegrass; Latitude=0; Longitude=0
            Sample Soil sample: same as Ponding_Only.paddock.Soil.Soil sample
            Water: same as WaterTable_Calculation.paddock.Soil.Water
            SoilWater: same as Ponding_Only.paddock.Soil.SoilWater
            SoilNitrogen: fom_type=[default, manure, mucuna, lablab, shemp, stable]; fract_carb=[0.2, 0.3, 0.54, 0.57, 0.45, 0]; fract_cell=[0.7, 0.3, 0.37, 0.37, 0.47, 0.1]; fract_lign=[0.1, 0.4, 0.09, 0.06, 0.08, 0.9]; wfpsN2N2O_x=[22, 88]; wfpsN2N2O_y=[0.1, 1]
              oc=[1.04, 0.89, 0.89, 0.89, 0.77, 0.45, 0.27, 0.219989, 0.159997, 0.129997, 0.119996]
            SoilOrganicMatter: same as Saturated_Flow_Only.paddock.Soil.SoilOrganicMatter
            Analysis: Thickness=[150, 150, 300, 300, 300, 300, 300, 300, 300, 300, 300]; PH=[8.4, 8.8, 9, 9.2, 9.2, 9.1, 9, 9, 8.9, 8.9, 8.9]; PHUnits=Water; BoronUnits=HotWater
          Manager set water table
```csharp
using System;
using Models.Core;
using Models.PMF;
using Models.PMF.OldPlant;
using Models.Soils;

namespace Models
{
	[Serializable]
	[System.Xml.Serialization.XmlInclude(typeof(Model))]
	public class Script : Model
	{
		[Link] Clock Clock;
		[Link] Soil soil;

		[EventSubscribe("DoManagement")]
		private void OnDoManagement(object sender, EventArgs e)
		{
			soil.SoilWater.WaterTable = 2000;
			/*
			'Soil Water' set water_table = 2000
			*/
		}
	}
}
```
          Report: EventNames=[Clock].DoReport
            VariableNames:
              [Soil].SoilWater.dlayer as dlayer
              [Soil].SoilWater.sat_dep as sat_dep
              [Soil].SoilWater.dul_dep as dul_dep
              [Soil].SoilWater.ll15_dep as ll15_dep
              [Soil].SoilWater.air_dry_dep as air_dry_dep
              [Clock].Today
              [WeatherFile].Rain as rain
              [Soil].SoilWater.runoff as runoff
              [Soil].SoilWater.es as es
              [Soil].SoilWater.drain as drain
              [Soil].SoilWater.water_table as water_table
              [Soil].SoilWater.sw as sw
              [Soil].SoilWater.flux as flux
              [Soil].SoilWater.flow as flow
              [Soil].SoilWater.sw_dep as sw_dep
          SurfaceOrganicMatter: same as Saturated_Flow_Only.paddock.SurfaceOrganicMatter
          MicroClimate: same as Saturated_Flow_Only.paddock.MicroClimate
      Simulation Setable_Variables_Water: Area=0; Slope=0
        WeatherFile: FileName=Setable Variables - Water.met
        Clock: StartDate=1940-01-01; EndDate=1940-01-20
        Summary summaryfile
        Zone paddock: Area=1; Slope=0
          Soil: SoilType=Black Vertosol; LocalName=Waco; Site=Jimbour; NearestTown=Jimbour, Q 4352; Region=South East Queensland; NaturalVegetation=Grassland, mainly Qld bluegrass; Latitude=0; Longitude=0
            Sample Soil sample: same as Ponding_Only.paddock.Soil.Soil sample
            Water: same as WaterTable_Calculation.paddock.Soil.Water
            SoilWater: same as Ponding_Only.paddock.Soil.SoilWater
            SoilNitrogen: fom_type=[default, manure, mucuna, lablab, shemp, stable]; fract_carb=[0.2, 0.3, 0.54, 0.57, 0.45, 0]; fract_cell=[0.7, 0.3, 0.37, 0.37, 0.47, 0.1]; fract_lign=[0.1, 0.4, 0.09, 0.06, 0.08, 0.9]; wfpsN2N2O_x=[22, 88]; wfpsN2N2O_y=[0.1, 1]
              oc=[1.0397, 0.889877, 0.889949, 0.889983, 0.769995, 0.449998, 0.269999, 0.219999, 0.16, 0.13, 0.119999]
            SoilOrganicMatter: same as Saturated_Flow_Only.paddock.Soil.SoilOrganicMatter
            Analysis: Thickness=[150, 150, 300, 300, 300, 300, 300, 300, 300, 300, 300]; PH=[8.4, 8.8, 9, 9.2, 9.2, 9.1, 9, 9, 8.9, 8.9, 8.9]; PHUnits=Water; BoronUnits=HotWater
          Manager set setable variables
```csharp
using System;
using Models.Core;
using Models.PMF;
using Models.PMF.OldPlant;
using Models.Soils;

namespace Models
{
	[Serializable]
	[System.Xml.Serialization.XmlInclude(typeof(Model))]
	public class Script : Model
	{
		[Link] Clock Clock;
		[Link] Soil soil;
		
		[EventSubscribe("DoManagement")]
		private void OnDoManagement(object sender, EventArgs e)
		{
		
			//!sw's (fractional values)
			
			if (Clock.Today == new DateTime(1940, 01, 02))
				{
			    soil.SoilWater.sw = 
			    new double[] {0.3, 0.3, 0.3, 0.3, 0.3, 0.3, 0.3, 0.3, 0.3, 0.3, 0.3};
				}
			
			
			if (Clock.Today == new DateTime(1940, 01, 05)) 
				{
			    soil.SoilWater.dlt_sw = 
			    new double[] {0.2, 0.2, 0.2, 0.2, 0.2, 0.2, 0.2, 0.2, 0.2, 0.2, 0.2};
				}
			
			
			

			//!reset the soil water again
			
			if (Clock.Today == new DateTime(1940, 01, 08))
				{
			    soil.SoilWater.Reset();    
				}
			
			
			
			
			//!sw_dep's (in millimeters)
			
			if (Clock.Today == new DateTime(1940, 01, 11))
				{
			    soil.SoilWater.sw_dep = 
			    new double[] {30, 30, 30, 30, 30, 30, 30, 30, 30, 30, 30};
				}
			
			
			if (Clock.Today == new DateTime(1940, 01, 14))
				{
			    soil.SoilWater.dlt_sw_dep = 
			    new double[] {-20, -20, -20, -20, -20, -20, -20, -20, -20, -20, -20};
				}
			
			
			
			//!reset the soil water again
			
			if (Clock.Today == new DateTime(1940, 01, 17))
				{
			    soil.SoilWater.Reset();
				}	
		
		
	
		
		
			/*	

			!sw's (fractional values)
			
			if day = 2 and year = 1940 then
			
			          'Soil Water' set sw = 0.3 0.3 0.3 0.3 0.3 0.3 0.3 0.3 0.3 0.3 0.3    
			endif
			
			
			if day = 5 and year = 1940 then 
			
			       'Soil Water' set dlt_sw =  0.2 0.2 0.2 0.2 0.2 0.2 0.2 0.2 0.2 0.2 0.2    
			endif
			
			
			
			
			!reset the soil water again
			
			if day = 8 and year = 1940 then
			
			   'Soil Water' reset    
			endif
			
			
			
			
			!sw_dep's (in millimeters)
			
			if day = 11 and year = 1940 then
			
			       'Soil Water' set sw_dep = 30 30 30 30 30 30 30 30 30 30 30   
			endif
			
			
			if day = 14 and year = 1940 then
			
			   'Soil Water' set dlt_sw_dep = -20 -20 -20 -20 -20 -20 -20 -20 -20 -20 -20   
			endif
			
			
			if day = 17 and year = 1940 then
			
			   'Soil Water' reset
			endif
			*/
		}
	}
}
```
          Report: EventNames=[Clock].DoReport
            VariableNames:
              [Clock].Today
              [Soil].SoilWater.sw as sw
              [Soil].SoilWater.sw_dep as sw_dep
              [Soil].SoilWater.dlayer as dlayer
              [Soil].SoilWater.sat as sat
              [Soil].SoilWater.dul as dul
              [Soil].SoilWater.ll15 as ll15
              [Soil].SoilWater.air_dry as air_dry
              [Soil].SoilWater.sat_dep as sat_dep
              [Soil].SoilWater.dul_dep as dul_dep
              [Soil].SoilWater.ll15_dep as ll15_dep
              [Soil].SoilWater.air_dry_dep as air_dry_dep
              [WeatherFile].Rain as rain
              [Soil].SoilWater.runoff as runoff
          SurfaceOrganicMatter: same as Saturated_Flow_Only.paddock.SurfaceOrganicMatter
          MicroClimate: same as Saturated_Flow_Only.paddock.MicroClimate
  DataStore
    Input: FileNames=[OLD_Outputs\Saturated Flow Only (OLD).out]
    Input old_unsaturated: FileNames=[OLD_Outputs\Unsaturated Flow Only (OLD).out]
    Input old_runoff: FileNames=[OLD_Outputs\Runoff Only (OLD).out]
    Input old_soil_evap: FileNames=[OLD_Outputs\Soil Evaporation Only (OLD).out]
    Input old_ponding: FileNames=[OLD_Outputs\Ponding Only using KS (OLD).out]
    Input old_ponding_soil_evap: FileNames=[OLD_Outputs\Ponding with Soil Evap (OLD).out]
    Input old_watertable_calc: FileNames=[OLD_Outputs\WaterTable Calculation (OLD).out]
    Input old_lateral_outflow: FileNames=[OLD_Outputs\Lateral Outflow Only (OLD).out]
    Input old_soil_evap_surfaceom: FileNames=[OLD_Outputs\Soil Evaporation with SurfaceOM (OLD).out]
    Input old_runoff_surfaceom: FileNames=[OLD_Outputs\Runoff with SurfaceOM (OLD).out]
    Input old_runoff_tillage_event: FileNames=[OLD_Outputs\Runoff after Tillage Event (OLD).out]
    Input new_runoff_irrigation: FileNames=[OLD_Outputs\Runoff with Irrigation (NEW).out]
    Input new_subsurface_irrigation: FileNames=[OLD_Outputs\Subsurface Irrigation (NEW).out]
    Input old_solute_saturated: FileNames=[OLD_Outputs\Solute - Saturated Flow Only (OLD).out]
    Input old_solute_unsaturated: FileNames=[OLD_Outputs\Solute - Unsaturated Flow Only (OLD).out]
    Input old_solute_irrigation: FileNames=[OLD_Outputs\Solute - Irrigation (OLD).out]
    Input old_setable_vars_erosion: FileNames=[OLD_Outputs\Setable Variables - Erosion (OLD).out]
    Input old_setable_vars_runoff: FileNames=[OLD_Outputs\Setable Variables - Runoff (OLD).out]
    Input old_watertable_fixed_depth: FileNames=[OLD_Outputs\WaterTable - Set to a fixed depth (OLD).out]
    Input old_setable_vars_water: FileNames=[OLD_Outputs\Setable Variables - Water (OLD).out]
  Tests
    Test:
      SimulationName                   TableName  Type       ColumnNames        Parameters
      Saturated_Flow_Only              Report     Tolerance  flux(1)            1,1
      Saturated_Flow_Only              Report     Tolerance  flux(2)            1,1
      Saturated_Flow_Only              Report     Tolerance  flux(3)            1,1
      Saturated_Flow_Only              Report     Tolerance  flux(4)            1,1
      Saturated_Flow_Only              Report     Tolerance  flux(5)            1,1
      Saturated_Flow_Only              Report     Tolerance  flux(6)            1,1
      Saturated_Flow_Only              Report     Tolerance  flux(7)            1,1
      Saturated_Flow_Only              Report     Tolerance  flux(8)            1,1
      Saturated_Flow_Only              Report     Tolerance  flux(9)            1,1
      Saturated_Flow_Only              Report     Tolerance  flux(10)           1,1
      Saturated_Flow_Only              Report     Tolerance  flux(11)           1,1
      Saturated_Flow_Only              Report     Tolerance  drain              1,1
      Unsaturated_Flow_Only            Report     Tolerance  flow(1)            1,1
      Unsaturated_Flow_Only            Report     Tolerance  flow(2)            1,1
      Unsaturated_Flow_Only            Report     Tolerance  flow(3)            1,1
      Unsaturated_Flow_Only            Report     Tolerance  flow(4)            1,1
      Unsaturated_Flow_Only            Report     Tolerance  flow(5)            1,1
      Unsaturated_Flow_Only            Report     Tolerance  flow(6)            1,1
      Unsaturated_Flow_Only            Report     Tolerance  flow(7)            1,1
      Unsaturated_Flow_Only            Report     Tolerance  flow(8)            1,1
      Unsaturated_Flow_Only            Report     Tolerance  flow(9)            1,1
      Unsaturated_Flow_Only            Report     Tolerance  flow(10)           1,1
      Unsaturated_Flow_Only            Report     Tolerance  flow(11)           1,1
      Runoff_Only                      Report     Tolerance  runoff             1,1
      Soil_Evaporation_Only            Report     Tolerance  t                  1,1
      Soil_Evaporation_Only            Report     Tolerance  es                 1,1
      Soil_Evaporation_Only            Report     Tolerance  eos                1,1
      Soil_Evaporation_Only            Report     Tolerance  eo                 1,1
      Soil_Evaporation_Only            Report     Tolerance  sw_top             1,1
      Ponding_Only                     Report     Tolerance  pond_evap          1,1
      Ponding_Only                     Report     Tolerance  pond               1,1
      Ponding_Only                     Report     Tolerance  total_pond         1,1
      Ponding_with_Soil_Evap           Report     Tolerance  es                 1,1
      Ponding_with_Soil_Evap           Report     Tolerance  eos                1,1
      Ponding_with_Soil_Evap           Report     Tolerance  pond_evap          1,1
      Ponding_with_Soil_Evap           Report     Tolerance  pond               1,1
      Ponding_with_Soil_Evap           Report     Tolerance  total_pond         1,1
      WaterTable_Calculation           Report     Tolerance  water_table        1,1
      Lateral_Outflow_Only             Report     Tolerance  outflow_lat        1,1
      Soil_Evaporation_with_SurfaceOM  Report     Tolerance  t                  1,1
      Soil_Evaporation_with_SurfaceOM  Report     Tolerance  es                 1,1
      Soil_Evaporation_with_SurfaceOM  Report     Tolerance  eos                1,1
      Soil_Evaporation_with_SurfaceOM  Report     Tolerance  eo                 1,1
      Soil_Evaporation_with_SurfaceOM  Report     Tolerance  sw_top             1,1
      Runoff_with_SurfaceOM            Report     Tolerance  runoff             1,1
      Runoff_after_Tillage_Event       Report     Tolerance  runoff             1,1
      Runoff_with_Irrigation           Report     Tolerance  runoff             1,1
      Subsurface_Irrigation            Report     Tolerance  sw_dep(1)          1,1
      Subsurface_Irrigation            Report     Tolerance  sw_dep(2)          1,1
      Subsurface_Irrigation            Report     Tolerance  sw_dep(3)          1,1
      Subsurface_Irrigation            Report     Tolerance  sw_dep(4)          1,1
      Subsurface_Irrigation            Report     Tolerance  sw_dep(5)          1,1
      Subsurface_Irrigation            Report     Tolerance  sw_dep(6)          1,1
      Subsurface_Irrigation            Report     Tolerance  sw_dep(7)          1,1
      Subsurface_Irrigation            Report     Tolerance  sw_dep(8)          1,1
      Subsurface_Irrigation            Report     Tolerance  sw_dep(9)          1,1
      Subsurface_Irrigation            Report     Tolerance  sw_dep(10)         1,1
      Subsurface_Irrigation            Report     Tolerance  sw_dep(11)         1,1
      Solute_Saturated_Flow_Only       Report     Tolerance  leach_immobile     1,1
      Solute_Saturated_Flow_Only       Report     Tolerance  leach_no3          1,1
      Solute_Saturated_Flow_Only       Report     Tolerance  immobile(1)        1,1
      Solute_Saturated_Flow_Only       Report     Tolerance  immobile(2)        1,1
      Solute_Saturated_Flow_Only       Report     Tolerance  immobile(3)        1,1
      Solute_Saturated_Flow_Only       Report     Tolerance  immobile(4)        1,1
      Solute_Saturated_Flow_Only       Report     Tolerance  immobile(5)        1,1
      Solute_Saturated_Flow_Only       Report     Tolerance  immobile(6)        1,1
      Solute_Saturated_Flow_Only       Report     Tolerance  immobile(7)        1,1
      Solute_Saturated_Flow_Only       Report     Tolerance  immobile(8)        1,1
      Solute_Saturated_Flow_Only       Report     Tolerance  immobile(9)        1,1
      Solute_Saturated_Flow_Only       Report     Tolerance  immobile(10)       1,1
      Solute_Saturated_Flow_Only       Report     Tolerance  immobile(11)       1,1
      Solute_Saturated_Flow_Only       Report     Tolerance  no3(1)             1,1
      Solute_Saturated_Flow_Only       Report     Tolerance  no3(2)             1,1
      Solute_Saturated_Flow_Only       Report     Tolerance  no3(3)             1,1
      Solute_Saturated_Flow_Only       Report     Tolerance  no3(4)             1,1
      Solute_Saturated_Flow_Only       Report     Tolerance  no3(5)             1,1
      Solute_Saturated_Flow_Only       Report     Tolerance  no3(6)             1,1
      Solute_Saturated_Flow_Only       Report     Tolerance  no3(7)             1,1
      Solute_Saturated_Flow_Only       Report     Tolerance  no3(8)             1,1
      Solute_Saturated_Flow_Only       Report     Tolerance  no3(9)             1,1
      Solute_Saturated_Flow_Only       Report     Tolerance  no3(10)            1,1
      Solute_Saturated_Flow_Only       Report     Tolerance  no3(11)            1,1
      Solute_Unsaturated_Flow_Only     Report     Tolerance  flow_immobile(1)   1,1
      Solute_Unsaturated_Flow_Only     Report     Tolerance  flow_immobile(2)   1,1
      Solute_Unsaturated_Flow_Only     Report     Tolerance  flow_immobile(3)   1,1
      Solute_Unsaturated_Flow_Only     Report     Tolerance  flow_immobile(4)   1,1
      Solute_Unsaturated_Flow_Only     Report     Tolerance  flow_immobile(5)   1,1
      Solute_Unsaturated_Flow_Only     Report     Tolerance  flow_immobile(6)   1,1
      Solute_Unsaturated_Flow_Only     Report     Tolerance  flow_immobile(7)   1,1
      Solute_Unsaturated_Flow_Only     Report     Tolerance  flow_immobile(8)   1,1
      Solute_Unsaturated_Flow_Only     Report     Tolerance  flow_immobile(9)   1,1
      Solute_Unsaturated_Flow_Only     Report     Tolerance  flow_immobile(10)  1,1
      Solute_Unsaturated_Flow_Only     Report     Tolerance  flow_immobile(11)  1,1
      Solute_Unsaturated_Flow_Only     Report     Tolerance  flow_no3(1)        1,1
      Solute_Unsaturated_Flow_Only     Report     Tolerance  flow_no3(2)        1,1
      Solute_Unsaturated_Flow_Only     Report     Tolerance  flow_no3(3)        1,1
      Solute_Unsaturated_Flow_Only     Report     Tolerance  flow_no3(4)        1,1
      Solute_Unsaturated_Flow_Only     Report     Tolerance  flow_no3(5)        1,1
      Solute_Unsaturated_Flow_Only     Report     Tolerance  flow_no3(6)        1,1
      Solute_Unsaturated_Flow_Only     Report     Tolerance  flow_no3(7)        1,1
      Solute_Unsaturated_Flow_Only     Report     Tolerance  flow_no3(8)        1,1
      Solute_Unsaturated_Flow_Only     Report     Tolerance  flow_no3(9)        1,1
      Solute_Unsaturated_Flow_Only     Report     Tolerance  flow_no3(10)       1,1
      Solute_Unsaturated_Flow_Only     Report     Tolerance  flow_no3(11)       1,1
      Solute_Unsaturated_Flow_Only     Report     Tolerance  immobile(1)        1,1
      Solute_Unsaturated_Flow_Only     Report     Tolerance  immobile(2)        1,1
      Solute_Unsaturated_Flow_Only     Report     Tolerance  immobile(3)        1,1
      Solute_Unsaturated_Flow_Only     Report     Tolerance  immobile(4)        1,1
      Solute_Unsaturated_Flow_Only     Report     Tolerance  immobile(5)        1,1
      Solute_Unsaturated_Flow_Only     Report     Tolerance  immobile(6)        1,1
      Solute_Unsaturated_Flow_Only     Report     Tolerance  immobile(7)        1,1
      Solute_Unsaturated_Flow_Only     Report     Tolerance  immobile(8)        1,1
      Solute_Unsaturated_Flow_Only     Report     Tolerance  immobile(9)        1,1
      Solute_Unsaturated_Flow_Only     Report     Tolerance  immobile(10)       1,1
      Solute_Unsaturated_Flow_Only     Report     Tolerance  immobile(11)       1,1
      Solute_Unsaturated_Flow_Only     Report     Tolerance  no3(1)             1,1
      Solute_Unsaturated_Flow_Only     Report     Tolerance  no3(2)             1,1
      Solute_Unsaturated_Flow_Only     Report     Tolerance  no3(3)             1,1
      Solute_Unsaturated_Flow_Only     Report     Tolerance  no3(4)             1,1
      Solute_Unsaturated_Flow_Only     Report     Tolerance  no3(5)             1,1
      Solute_Unsaturated_Flow_Only     Report     Tolerance  no3(6)             1,1
      Solute_Unsaturated_Flow_Only     Report     Tolerance  no3(7)             1,1
      Solute_Unsaturated_Flow_Only     Report     Tolerance  no3(8)             1,1
      Solute_Unsaturated_Flow_Only     Report     Tolerance  no3(9)             1,1
      Solute_Unsaturated_Flow_Only     Report     Tolerance  no3(10)            1,1
      Solute_Unsaturated_Flow_Only     Report     Tolerance  no3(11)            1,1
      Setable_Variables_Runoff         Report     Tolerance  cn2_bare           1,1
      Setable_Variables_Runoff         Report     Tolerance  cn_cov             1,1
      Setable_Variables_Runoff         Report     Tolerance  cn_red             1,1
      WaterTable_Set_to_a_fixed_depth  Report     Tolerance  water_table        1,1
      WaterTable_Set_to_a_fixed_depth  Report     Tolerance  sw_dep(1)          1,1
      WaterTable_Set_to_a_fixed_depth  Report     Tolerance  sw_dep(2)          1,1
      WaterTable_Set_to_a_fixed_depth  Report     Tolerance  sw_dep(3)          1,1
      WaterTable_Set_to_a_fixed_depth  Report     Tolerance  sw_dep(4)          1,1
      WaterTable_Set_to_a_fixed_depth  Report     Tolerance  sw_dep(5)          1,1
      WaterTable_Set_to_a_fixed_depth  Report     Tolerance  sw_dep(6)          1,1
      WaterTable_Set_to_a_fixed_depth  Report     Tolerance  sw_dep(7)          1,1
      WaterTable_Set_to_a_fixed_depth  Report     Tolerance  sw_dep(8)          1,1
      WaterTable_Set_to_a_fixed_depth  Report     Tolerance  sw_dep(9)          1,1
      WaterTable_Set_to_a_fixed_depth  Report     Tolerance  sw_dep(10)         1,1
      WaterTable_Set_to_a_fixed_depth  Report     Tolerance  sw_dep(11)         1,1
      Setable_Variables_Water          Report     Tolerance  sw_dep(1)          1,1
      Setable_Variables_Water          Report     Tolerance  sw_dep(2)          1,1
      Setable_Variables_Water          Report     Tolerance  sw_dep(3)          1,1
      Setable_Variables_Water          Report     Tolerance  sw_dep(4)          1,1
      Setable_Variables_Water          Report     Tolerance  sw_dep(5)          1,1
      Setable_Variables_Water          Report     Tolerance  sw_dep(6)          1,1
      Setable_Variables_Water          Report     Tolerance  sw_dep(7)          1,1
      Setable_Variables_Water          Report     Tolerance  sw_dep(8)          1,1
      Setable_Variables_Water          Report     Tolerance  sw_dep(9)          1,1
      Setable_Variables_Water          Report     Tolerance  sw_dep(10)         1,1
      Setable_Variables_Water          Report     Tolerance  sw_dep(11)         1,1
      Setable_Variables_Water          Report     Tolerance  sw(1)              1,1
      Setable_Variables_Water          Report     Tolerance  sw(2)              1,1
      Setable_Variables_Water          Report     Tolerance  sw(3)              1,1
      Setable_Variables_Water          Report     Tolerance  sw(4)              1,1
      Setable_Variables_Water          Report     Tolerance  sw(5)              1,1
      Setable_Variables_Water          Report     Tolerance  sw(6)              1,1
      Setable_Variables_Water          Report     Tolerance  sw(7)              1,1
      Setable_Variables_Water          Report     Tolerance  sw(8)              1,1
      Setable_Variables_Water          Report     Tolerance  sw(9)              1,1
      Setable_Variables_Water          Report     Tolerance  sw(10)             1,1
      Setable_Variables_Water          Report     Tolerance  sw(11)             1,1
