Simulations: Version=128
  Memo SITE CHANGES FOR RECOMBINING with elizabeth version
    look at microclimate

    look at evap coefficiencts and kl values

    Greenthorpe Met file changing (TTag Temp)
  Memo VERSION NOTES
    trying linear TT (no reduction at 30 degrees, hotter days speed crop finish)
  Memo Introduction
    The APSIM Chickpea model has been developed using the Plant Modelling Framework (PMF) of [brown_plant_2014]. This new framework provides a library of plant organ and process submodels that can be coupled, at runtime, to construct a model in much the same way that models can be coupled to construct a simulation. This means that dynamic composition of lower level process and organ classes (e.g. photosynthesis, leaf) into larger constructions (e.g. chickpea, wheat, sorghum) can be achieved by the model developer without additional coding.

    The model consists of:

    * a phenology model to simulate development between growth phases
    * a structure model to simulate plant morphology
    * a collection of organs to simulate the various plant parts
    * an arbitrator to allocate resources (N, biomass) to the various plant organs
  DataStore
    ExcelInput Observed: FileNames=[Observed.xlsx]; SheetNames=[ObservedHarvestData]
    ExcelInput ObservedTimeseries: FileNames=[Observed.xlsx]; SheetNames=[ObservedTimeseriesData]
    PredictedObserved: PredictedTableName=HarvestReport; ObservedTableName=ObservedHarvestData; FieldNameUsedForMatch=Stage; AllColumns=false
    PredictedObserved PredictedObserved_Daily: PredictedTableName=Report; ObservedTableName=ObservedTimeseriesData; FieldNameUsedForMatch=Clock.Today; AllColumns=false
  Replacements
    Report IrrigWaterreport: EventNames=[Clock].DoReport
      VariableNames:
        [Clock].Today
        [Irrigation].IrrigationApplied
        [Soil].SoilWater.SW
        [Soil].SoilWater.Eo
        [Soil].SoilWater.Es
        [Soil].SoilWater.Drainage
        [Soil].SoilWater.Runoff
        [Soil].SoilWater.pond
        sum([Soil].SoilWater.SWmm) as ProfileWater
        ([Soil].SoilWater.SWmm[1]+[Soil].SoilWater.SWmm[2]+[Soil].SoilWater.SWmm[3]+[Soil].SoilWater.SWmm[4]+[Soil].SoilWater.SWmm[5]) as ProfWatTop5Layers
    Report RDDReport: EventNames=[Clock].DoReport
      VariableNames:
        [Clock].Today
        [Chickpea].Phenology.EndJuv_PhotoPeriod
        [Chickpea].Phenology.Budding.Target
        [Chickpea].Phenology.LateVegetative.Target
        [Chickpea].Phenology.Flowering.Target
        [Chickpea].Phenology.AccumulatedTT
        [Chickpea].Phenology.FloweringDAS
        [Chickpea].Phenology.PodStartTT
        [Chickpea].Phenology.EndFloweringPodStartTT
        [Phenology].Stage
        [Phenology].CurrentStageName
    Report HarvestReport: EventNames=[Chickpea].Harvesting
      VariableNames:
        [Clock].Today
        [Chickpea].Phenology.CurrentStageName as Stage
        [Chickpea].Phenology.FloweringDAS as FloweringDAS
        [Chickpea].Phenology.MaturityDAS as MaturityDAS
        [Chickpea].Grain.Live.Wt as GrainWt
        [Chickpea].AboveGround.Wt
        [Chickpea].Grain.Size
        [Chickpea].Phenology.EmergenceDAS as EmergenceDAS
        [Chickpea].SowingData.Cultivar
        [Chickpea].Phenology.RadDegDays
        [Chickpea].Phenology.PoddingDAS as PoddingDAS
    Report: EventNames=[Clock].DoReport
      VariableNames:
        [Clock].Today
        [Soil].SoilWater.SW
        [Soil].SoilWater.Eo
        [Soil].SoilWater.Es
        [Soil].SoilWater.Drainage
        [Soil].SoilWater.Runoff
        [Soil].SoilWater.pond
        sum([Soil].SoilWater.SWmm) as ProfileWater
        [Soil].SoilNitrogen.NO3.kgha
        [Chickpea].Leaf.LAI
        [Chickpea].Leaf.Fn
        [Chickpea].Leaf.Fw
        [Chickpea].Structure.LeafTipsAppeared
        [Chickpea].Structure.PlantTotalNodeNo
        [Chickpea].Leaf.SenescingCohortNo
        [Chickpea].Structure.TotalStemPopn
        [Chickpea].AboveGround.Wt
        [Chickpea].Leaf.Live.Wt
        [Chickpea].Leaf.Live.NConc
        [Chickpea].Stem.Live.Wt
        [Chickpea].Leaf.SpecificArea
        [Chickpea].Shell.Live.Wt
        [Chickpea].Grain.Live.Wt
        [Chickpea].Nodule.NFixed
        [Chickpea].Nodule.Live.Wt
        [Chickpea].Arbitrator.DM.NutrientLimitation
        [Chickpea].Arbitrator.DM.SinkLimitation
        [Chickpea].Arbitrator.N.TotalPlantDemand
        [Chickpea].Arbitrator.N.TotalPlantSupply
        [Chickpea].Arbitrator.DM.TotalPlantDemand
        [Chickpea].Arbitrator.DM.TotalFixationSupply
        [Chickpea].Leaf.Live.MetabolicNConc
        [Chickpea].Leaf.Live.StructuralNConc
        [Chickpea].Leaf.Live.StorageNConc
        [Chickpea].Leaf.DeadCohortNo
        [Chickpea].Stem.DMDemand
        [Chickpea].Leaf.DMSupplyPhotosynthesis
        [Chickpea].SowingData.Cultivar
        [Chickpea].Leaf.Dead.Wt
        [Chickpea].Root.Live.Wt
        [Chickpea].Leaf.Senesced.Wt
        [Chickpea].Phenology.CurrentStageName
        [Chickpea].Phenology.Stage
        [Chickpea].Stem.Live.MetabolicWt
        [Chickpea].Root.KLModifier
        [Chickpea].Structure.BranchingRate
        [Chickpea].Leaf.PlantsenescedLeafNo
        [Chickpea].Leaf.DeadCohortNo
        sum([Soil].SoilWater.SWmm)-[Soil].SoilWater.SWmm[1] as ProfWat_less_toplayer
        [Chickpea].Leaf.CoverGreen
        [Soil].SoilWater.PAWmm
        [Soil].Physical.PAWCmm
        [Root].SurfaceWaterAvailability
        [Chickpea].Leaf.Photosynthesis
        [Chickpea].Leaf.Transpiration
        [Chickpea].Phenology.AccumulatedTT
        [Weather].MeanT
        [Chickpea].Structure.PhotoSynthPerBranch
        [Chickpea].Structure.BranchingRate.Potential_Branching_Rate.Vegetative.MultiplyFunction.BranchModifier.EarlyVeg.TempResponse
        [Chickpea].Structure.BranchingRate.Potential_Branching_Rate.Vegetative.MultiplyFunction.BranchModifier.EarlyVeg.SurfaceWaterFactor
        [Soil].SoilWater.ESW
        [Chickpea].Structure.BranchingRate.Potential_Branching_Rate.Vegetative.MultiplyFunction.BranchModifier.LateVeg.Cover_response
        [Chickpea].Structure.BranchingRate.Potential_Branching_Rate.Vegetative.MultiplyFunction.BranchModifier.LateVeg.WaterStress
        [Chickpea].Structure.BranchingRate.Potential_Branching_Rate.Vegetative.MultiplyFunction.BranchModifier.LateVeg.TempResponse
        [Chickpea].Structure.BranchingRate.Potential_Branching_Rate.Vegetative.MultiplyFunction.BranchModifier
        [Chickpea].Structure.BranchingRate.Potential_Branching_Rate.Vegetative.MultiplyFunction.BranchModifier.EarlyVeg
        [Chickpea].Structure.BranchingRate.Potential_Branching_Rate.Vegetative.MultiplyFunction.BranchModifier.LateVeg
        ([Soil].SoilWater.SWmm[1]+[Soil].SoilWater.SWmm[2]+[Soil].SoilWater.SWmm[3]+[Soil].SoilWater.SWmm[4]+[Soil].SoilWater.SWmm[5]) as ProfWatTop5Layers
        [Chickpea].Leaf.CoverGreen
        [Chickpea].Leaf.CoverTotal
        [Chickpea].Pod.Wt
        [Weather].MinT
        [Weather].MaxT
        ([Chickpea].Shell.Wt+[Chickpea].Grain.Wt) as PodPlusGrain
        [Chickpea].Grain.DMDemand
        [Chickpea].Leaf.DMDemand
        [Chickpea].Stem.DMDemand
        [Chickpea].Root.DMDemand
        [Chickpea].Shell.DMDemand
        [Chickpea].Stem.Dead.Wt
        [Chickpea].Grain.HarvestIndex
        [Chickpea].Grain.DMSupply.Total
        [Chickpea].Leaf.DMSupply.Total
        [Chickpea].Stem.DMSupply.Total
        [Chickpea].Shell.DMSupply.Total
        [Chickpea].Grain.Allocated.Wt
        [Chickpea].Stem.Allocated.Wt
        [Chickpea].Leaf.Allocated.Wt
        [Chickpea].Shell.Allocated.Wt
        [Chickpea].Root.Allocated.Wt
        [Weather].MeanT as MeanTemp
        [Chickpea].Phenology.CurrentStageName as GStage
        [Chickpea].CultivarFolder.Australian cvv.HatTrick.Name
        [Soil].SoilWater.SWmm[2]+[Soil].SoilWater.SWmm[3]+[Soil].SoilWater.SWmm[4]+[Soil].SoilWater.SWmm[5] as SoilLayers2to5
    Plant Chickpea: PlantType=Chickpea; IsAlive=false; IsEnding=false; DaysAfterEnding=0
      Memo Introduction
        The APSIM Chickpea model has been developed from the original APSIM Chickpea model described by Robertson et al(2002) using the Plant Modelling Framework of Brown et al (2014).
      OrganArbitrator Arbitrator
        BiomassTypeArbitrator DMArbitration
          Folder PotentialPartitioningMethods
            ReallocationMethod
            AllocateFixationMethod
            RetranslocationMethod
            SendPotentialDMAllocationsMethod
          Folder AllocationMethods
            NutrientConstrainedAllocationMethod
            DryMatterAllocationsMethod
          RelativeAllocation ArbitrationMethod
        BiomassTypeArbitrator NArbitration
          Folder PotentialPartitioningMethods
            ReallocationMethod
          Folder ActualPartitioningMethods
            AllocateFixationMethod
            RetranslocationMethod
          Folder AllocationMethods
            NitrogenAllocationsMethod
          RelativeAllocation ArbitrationMethod
          AllocateUptakesMethod
        WaterUptakeMethod
        NitrogenUptakeMethod
      Phenology
        PhaseLookup ThermalTime
          PhaseLookupValue PreEmergence: Start=Germination; End=Emergence
            DivideFunction ThermalTime
              HourlyInterpolation AirTempFunction: agregationMethod=0
                Memo
                  The cardinal temperatures for calculating thermal time have been taken from Singh and Virmani (1996) as used by Robertson et al (2002).
                XYPairs Response: X=[0, 30, 40]; Y=[0, 30, 0]
                ThreeHourSin InterpolationMethod
              Constant: FixedValue=1
          PhaseLookupValue Emerge_to_EndFlower: Start=Emergence; End=HarvestRipe
            DivideFunction ThermalTime
              HourlyInterpolation AirTempFunction: agregationMethod=0
                Memo
                  The cardinal temperatures for calculating thermal time have been taken from Singh and Virmani (1996) as used by Robertson et al (2002).
                XYPairs Response: X=[0, 30, 40]; Y=[0, 30, 30]
                ThreeHourSin InterpolationMethod
              Constant: FixedValue=1
        PhotoperiodFunction Photoperiod: Twilight=-6; DayLength=0
        GerminatingPhase Germinating: Start=Sowing; End=Germination
        EmergingPhase Emerging: ShootLag=120; ShootRate=0.7; Start=Germination; End=Emergence; TTForTimeStep=0
          Memo
            Shoot lag = constant
            Shoot rate = multiplier on sowing depth (mm)

            Note could be beneficial to set differently for large-seeded kabuli cultivars, which anecdotally seem to be slower emerging.
          VariableReference ThermalTime: VariableName=[Phenology].ThermalTime
        GenericPhase Vegetative: Start=Emergence; End=EndJuvenille
          Constant Target: FixedValue=400; Units=Degree Days
          VariableReference Progression: VariableName=[Phenology].ThermalTime
        GenericPhase LateVegetative: Start=EndJuvenille; End=StartBudding
          Memo
            This phase simulates the time between end of the Non-inductive phase of Robertson et al (515 TT) and the appearance of visible buds on petioles
          Constant Target: FixedValue=250; Units=thermal time
          VariableReference Progression: VariableName=[Phenology].ThermalTime
        GenericPhase Budding: Start=StartBudding; End=StartFlowering
          Memo
            This phase encompasses the budding phase. All photoperiod response is currently contained here although in reality probably carries across LateVeg as well as this one
          VariableReference Progression: VariableName=[Phenology].ThermalTime
          LinearInterpolationFunction Target
            XYPairs: X=[10, 12.43, 17]; Y=[501.6, 50, 50]
            VariableReference XValue: VariableName=[Phenology].EndJuv_PhotoPeriod
        GenericPhase Flowering: Start=StartFlowering; End=EndFlowering
          Memo
            Minimum thermal time target for duration of flowers prior to pod initiation.
          VariableReference Progression: VariableName=[Phenology].ThermalTime
          Constant Target: FixedValue=100
        GenericPhase PodInitiation: Start=EndFlowering; End=EndPodInitiation
          Memo
             Requires 5 days of temp above 16 degrees (or ten days at 15 degrees) before 1cm pods are visible, due to sensitivity of pod initiation to mean daily temperature. These days may accumulate anytime after flowering begins (i.e. during previous growth stage as well as during the current one). so the 'EndFloweringPodStartTT' is subtracted from the 5 days target
          VariableReference Progression: VariableName=[Phenology].PodStartTT
          SubtractFunction Target
            Constant Total: FixedValue=5
            VariableReference EndFloweringPodStartTT: VariableName=[Phenology].EndFloweringPodStartTT
        GenericPhase EarlyGrainFilling: Start=EndPodInitiation; End=MidGrainFilling
          Memo
            Shortens TT for grainfilling when there is a big gap between beginning of flowering and beginning of pod initiaton
          VariableReference Progression: VariableName=[Phenology].ThermalTime
          SubtractFunction Target
            Constant Max: FixedValue=500
            DivideFunction Adjust
              VariableReference TotalPodInitTT: VariableName=[Phenology].TotalPodInitTT
              Constant Total: FixedValue=2
        GenericPhase MidGrainFilling: Start=MidGrainFilling; End=LateGrainFilling
          VariableReference Progression: VariableName=[Phenology].ThermalTime
          Constant Target: FixedValue=150
        GenericPhase LateGrainFilling: Start=LateGrainFilling; End=EndGrainFill
          VariableReference Progression: VariableName=[Phenology].ThermalTime
          Constant Target: FixedValue=150
        GenericPhase Maturing: Start=EndGrainFill; End=Maturity
          Memo
            The duration of the Maturing phase has been taken from the model of Robertson et al (2002).
          Constant Target: FixedValue=60
          VariableReference Progression: VariableName=[Phenology].ThermalTime
        GenericPhase Ripening: Start=Maturity; End=HarvestRipe
          Constant Target: FixedValue=1
          VariableReference Progression: VariableName=[Phenology].ThermalTime
        EndPhase ReadyForHarvesting: Start=HarvestRipe; End=Unused
          VariableReference ThermalTime: VariableName=[Phenology].ThermalTime
        OnEventFunction BuddingDAS: SetEvent=StartBudding; ReSetEvent=never
          Memo
            A function is used to provide flowering date as days after sowing(DAS).
          Constant PreEventValue: FixedValue=0
          VariableReference PostEventValue: VariableName=[Plant].DaysAfterSowing
        OnEventFunction FloweringDAS: SetEvent=StartFlowering; ReSetEvent=never
          Memo
            A function is used to provide flowering date as days after sowing(DAS).
          Constant PreEventValue: FixedValue=0
          VariableReference PostEventValue: VariableName=[Plant].DaysAfterSowing
        OnEventFunction MaturityDAS: SetEvent=Maturity; ReSetEvent=never
          Memo
            A function is used to provide maturity date as days after sowing(DAS).
          Constant PreEventValue: FixedValue=0
          VariableReference PostEventValue: VariableName=[Plant].DaysAfterSowing
        OnEventFunction EmergenceDAS: SetEvent=Emergence; ReSetEvent=never
          Memo
            A function is used to provide maturity date as days after sowing(DAS).
          Constant PreEventValue: FixedValue=0
          VariableReference PostEventValue: VariableName=[Plant].DaysAfterSowing
        OnEventFunction EndBuddingMSLeafNo: SetEvent=EndBudding; ReSetEvent=never
          Memo
            A function is used to provide leaf number at end of flowering as a reference point for reducing maximum leaf size during grainfilling
          Constant PreEventValue: FixedValue=0
          VariableReference PostEventValue: VariableName=[Structure].LeafTipsAppeared
        DivideFunction MeanTemp
          AddFunction TempSum
            VariableReference MaxT: VariableName=[Weather].MaxT
            VariableReference MinT: VariableName=[Weather].MinT
          Constant Two: FixedValue=2
        AccumulateFunction RadDegDays: StartStageName=Emergence; EndStageName=EndGrainFill; FractionRemovedOnCut=0; FractionRemovedOnHarvest=0; FractionRemovedOnGraze=0; FractionRemovedOnPrune=0
          DivideFunction RDD
            VariableReference Rad: VariableName=[Weather].Radn
            VariableReference TT: VariableName=[Phenology].ThermalTime
        OnEventFunction StartBudSoilT: SetEvent=StartBudding; ReSetEvent=never
          Memo
            A function is used to provide flowering date as days after sowing(DAS).
          Constant PreEventValue: FixedValue=0
          VariableReference PostEventValue: VariableName=[Soil].Temperature.Value[1]
        OnEventFunction StartBudding_PhotoPeriod: SetEvent=StartBudding; ReSetEvent=never
          Memo
            A function is used to provide flowering date as days after sowing(DAS).
          Constant PreEventValue: FixedValue=15
          VariableReference PostEventValue: VariableName=[Phenology].Photoperiod.DayLength
        OnEventFunction PoddingDAS: SetEvent=EndPodInitiation; ReSetEvent=never
          Memo
            A function is used to provide flowering date as days after sowing(DAS).
          Constant PreEventValue: FixedValue=0
          VariableReference PostEventValue: VariableName=[Plant].DaysAfterSowing
        OnEventFunction EndJuv_PhotoPeriod: SetEvent=EndJuvenille; ReSetEvent=never
          Memo
            A function is used to provide flowering date as days after sowing(DAS).
          Constant PreEventValue: FixedValue=12
          VariableReference PostEventValue: VariableName=[Phenology].Photoperiod.DayLength
        PhaseLookup PodStartTT
          PhaseLookupValue PreFlower: Start=Germination; End=StartFlowering
            Constant PodStartTT: FixedValue=0
          PhaseLookupValue PostFlower: Start=StartFlowering; End=HarvestRipe
            LinearInterpolationFunction PodStartTT
              XYPairs: X=[0, 14, 16]; Y=[0, 0, 1]
              VariableReference XValue: VariableName=[Phenology].MeanTemp
        PhaseLookup AccumPodStartTT
          PhaseLookupValue PreFlowering: Start=Germination; End=StartFlowering
            Constant PodStartTT: FixedValue=0
          PhaseLookupValue FloweringtoMaturity: Start=StartFlowering; End=HarvestRipe
            AccumulateFunction PodStartTTsum: StartStageName=StartFlowering; EndStageName=Maturity; FractionRemovedOnCut=0; FractionRemovedOnHarvest=0; FractionRemovedOnGraze=0; FractionRemovedOnPrune=0
              LinearInterpolationFunction PodStartTT
                XYPairs: X=[0, 14, 16]; Y=[0, 0, 1]
                VariableReference XValue: VariableName=[Phenology].MeanTemp
        OnEventFunction StartPodInitTT: SetEvent=EndFlowering
          Constant PreEventValue: FixedValue=0
          VariableReference PostEventValue: VariableName=[Phenology].AccumulatedTT
        OnEventFunction EndPodInitTT: SetEvent=EndPodInitiation
          Constant PreEventValue: FixedValue=0
          VariableReference PostEventValue: VariableName=[Phenology].AccumulatedTT
        OnEventFunction StartFloweringPodStartTT: SetEvent=StartFlowering
          Constant PreEventValue: FixedValue=0
          VariableReference PostEventValue: VariableName=[Phenology].AccumPodStartTT
        OnEventFunction EndFloweringPodStartTT: SetEvent=EndFlowering
          Constant PreEventValue: FixedValue=0
          VariableReference PostEventValue: VariableName=[Phenology].AccumPodStartTT
        SubtractFunction TotalPodInitTT
          Memo
            Shortens TT for grainfilling when there is a big gap between beginning of flowering and beginning of pod initiaton
          VariableReference EndPodInitTT: VariableName=[Phenology].EndPodInitTT
          VariableReference StartPodInitTT: VariableName=[Phenology].StartPodInitTT
      Structure: CohortInitialisationStage=Germination; LeafInitialisationStage=Emergence
        VariableReference ThermalTime: VariableName=[Phenology].ThermalTime
        Constant DroughtInducedBranchMortality: FixedValue=0
        Constant HeightModel: FixedValue=1
        Constant FinalLeafNumber: FixedValue=40
        LinearInterpolationFunction Height
          XYPairs: X=[0, 50, 300]; Y=[10, 200, 750]
          VariableReference XValue: VariableName=[Stem].Live.Wt
        MultiplyFunction BranchingRate
          Memo Memo1
            Cover response as per soybean
          LinearInterpolationFunction OLDPotential_Branching_Rate (disabled)
            XYPairs: X=[0, 6, 8, 10, 20, 31]; Y=[0, 0, 1, 2, 0, 0]
            VariableReference XValue: VariableName=[Structure].LeafTipsAppeared
          PhaseLookup Potential_Branching_Rate
            PhaseLookupValue PreEmergence: Start=Germination; End=Emergence
              Constant Function: FixedValue=0
            PhaseLookupValue Vegetative: Start=Emergence; End=StartBudding
              MultiplyFunction
                LinearInterpolationFunction MaxBranchRate
                  Memo
                    Robertson et al (2002) used a maximum leaf size of 300 mm2 for the first 9 leaves and 600 mm2 thereafter.
                  XYPairs: X=[0, 1, 2, 4, 5, 7, 8, 20]; Y=[0, 0.5, 0.5, 0.5, 1, 1, 1, 1]
                  VariableReference XValue: VariableName=[Structure].LeafTipsAppeared
                LessThanFunction BranchModifier
                  VariableReference: VariableName=[Structure].LeafTipsAppeared
                  Constant: FixedValue=12
                  MinimumFunction EarlyVeg
                    LinearInterpolationFunction TempResponse
                      XYPairs: X=[2, 4, 6, 10, 30, 35]; Y=[0, 0.5, 1, 1, 1, 0]
                      VariableReference XValue: VariableName=[Weather].MinT
                    LinearInterpolationFunction Cover_response (disabled)
                      XYPairs: X=[0, 0.04, 0.07, 0.09, 0.1]; Y=[1, 1, 0, 0, 0]
                      VariableReference XValue: VariableName=[leaf].CoverGreen
                    LinearInterpolationFunction SurfaceWaterFactor
                      Memo
                        Robertson et al (2002) used a maximum leaf size of 300 mm2 for the first 9 leaves and 600 mm2 thereafter.
                      XYPairs: X=[0, 0.2, 0.4, 0.6, 0.8, 1, 1.1]; Y=[0.1, 0.1, 0.2, 0.4, 1, 1, 0]
                      VariableReference XValue: VariableName=[Root].SurfaceWaterAvailability
                  MinimumFunction LateVeg
                    LinearInterpolationFunction Cover_response
                      XYPairs: X=[0, 0.2, 0.4, 0.5, 0.7, 0.8, 0.9]; Y=[1, 1, 1, 1, 0.7, 0.2, 0]
                      VariableReference XValue: VariableName=[leaf].CoverGreen
                    LinearInterpolationFunction WaterStress
                      XYPairs: X=[0, 0.2, 0.4, 0.6, 0.8, 1]; Y=[0, 0, 0, 0.2, 0.8, 1]
                      VariableReference XValue: VariableName=[leaf].Fw
                    LinearInterpolationFunction PhotoSynthPerBranch (disabled)
                      XYPairs: X=[0, 0.05, 0.1, 0.15, 0.2, 0.3, 0.4, 0.5]; Y=[0, 0, 0.8, 1, 1, 1, 1, 1]
                      VariableReference XValue: VariableName=[Structure].PhotoSynthPerBranch
                    LinearInterpolationFunction SurfaceWaterFactor (disabled)
                      Memo
                        Robertson et al (2002) used a maximum leaf size of 300 mm2 for the first 9 leaves and 600 mm2 thereafter.
                      XYPairs: X=[0, 0.2, 0.4, 0.6, 0.8, 1, 1.1]; Y=[0, 0, 0, 0, 1, 1, 0]
                      VariableReference XValue: VariableName=[Root].SurfaceWaterAvailability
                    LinearInterpolationFunction TempResponse
                      XYPairs: X=[4, 6, 8, 10, 30, 35]; Y=[0, 0.5, 1, 1, 1, 0]
                      VariableReference XValue: VariableName=[Weather].MeanT
            PhaseLookupValue PostFlowering: Start=StartBudding; End=Maturity
              Constant Function: FixedValue=0
            PhaseLookupValue Grainfilling (disabled): Start=EndFlowering; End=Maturity
              Constant Function: FixedValue=0
          Constant: FixedValue=1
        Constant BranchMortality: FixedValue=0
        PhaseLookup Phyllochron
          PhaseLookupValue PreEmergence: Start=Germination; End=Emergence
            Constant Function: FixedValue=0
          PhaseLookupValue CanopyDevelopment: Start=Emergence; End=EndFlowering
            VariableReference NodeAppearanceRate: VariableName=[Structure].NodeAppearanceRate
          PhaseLookupValue EarlyGrainfilling: Start=EndFlowering; End=MidGrainFilling
            VariableReference NodeAppearanceRate: VariableName=[Structure].NodeAppearanceRate
          PhaseLookupValue MidGrainfilling: Start=MidGrainFilling; End=LateGrainFilling
            DivideFunction
            VariableReference NodeAppearanceRate: VariableName=[Structure].NodeAppearanceRate
            MinimumFunction
              LinearInterpolationFunction WaterStress
                XYPairs: X=[0, 0.2, 0.4, 0.6, 0.8, 1]; Y=[0, 0, 0, 0.2, 0.4, 1]
                VariableReference XValue: VariableName=[leaf].Fw
          PhaseLookupValue LateGrainfilling: Start=LateGrainFilling; End=EndGrainFill
            DivideFunction
            VariableReference NodeAppearanceRate: VariableName=[Structure].NodeAppearanceRate
            MinimumFunction
              LinearInterpolationFunction WaterStress
                XYPairs: X=[0, 0.2, 0.4, 0.6, 0.8, 1]; Y=[0, 0, 0, 0.2, 0.4, 1]
                VariableReference XValue: VariableName=[leaf].Fw
        LinearInterpolationFunction NodeAppearanceRate
          XYPairs: X=[1, 2, 3, 4, 30]; Y=[20, 20, 20, 50, 50]
          Memo
            One node every 20 Degree Days for first 3 nodes. After this then reverts to 50 Degree Days for each subsequent node

            Operating during both vegetative and flowering phases.
          VariableReference XValue: VariableName=[Structure].LeafTipsAppeared
        Constant StemSenescenceAge: FixedValue=0
        DivideFunction LAIperBranch
          VariableReference LAI: VariableName=[Leaf].LAI
          VariableReference Branches: VariableName=[Structure].BranchNumber
        DivideFunction PhotoSynthPerBranch
          VariableReference Photosynthesis: VariableName=[Leaf].Photosynthesis
          VariableReference Branches: VariableName=[Structure].TotalStemPopn
      ReproductiveOrgan Grain: GrowthRespiration=0; MaintenanceRespiration=0
        Biomass Live: DMDOfStructural=0.6
        Biomass Dead: DMDOfStructural=0.6
        Constant PotentialHarvestIndex: FixedValue=0.5
        AddFunction FillingDuration
          VariableReference EarlyGrainFillingDuration: VariableName=[Phenology].EarlyGrainFilling.Target
          VariableReference MidGrainFillingDuration: VariableName=[Phenology].MidGrainFilling.Target
          VariableReference LateGrainFillingDuration: VariableName=[Phenology].LateGrainFilling.Target
        Constant MaximumPotentialGrainSize: FixedValue=0.25
        PhaseLookup DMDemandFunction
          PhaseLookupValue GrainFilling: Start=EndPodInitiation; End=EndGrainFill
            MultiplyFunction HIGrainDemand
              VariableReference AboveGroundWt: VariableName=[AboveGround].Wt
              DivideFunction HarvestIndexIncrease
                VariableReference PotentialHarvestIndex: VariableName=[Grain].PotentialHarvestIndex
                VariableReference FillingDuration: VariableName=[Grain].FillingDuration
                Constant (disabled): FixedValue=1
              VariableReference ThermalTime: VariableName=[Phenology].ThermalTime
        Constant MinimumNConc: FixedValue=0.02
        Constant MaximumNConc: FixedValue=0.04
        Constant WaterContent: FixedValue=0.12
        MultiplyFunction NFillingRate
          VariableReference NConc: VariableName=[Grain].MaximumNConc
          VariableReference DMConversionEfficiency: VariableName=[Grain].DMConversionEfficiency
        PhaseLookup NFillingRateOLD
          PhaseLookupValue GrainFilling: Start=EndFlowering; End=EndGrainFill
            FillingRateFunction
              VariableReference NumberFunction: VariableName=[Grain].NumberFunction
              VariableReference ThermalTime: VariableName=[Phenology].ThermalTime
              MultiplyFunction PotentialSizeIncrement
                Constant MaximumFinalNConc: FixedValue=0.04
                VariableReference MaximumSize: VariableName=[Grain].MaximumPotentialGrainSize
              AddFunction FillingDuration
                VariableReference LatePodDevelopmentDuration: VariableName=[Phenology].LatePodDevelopment.Target
                VariableReference LateGrainFillingDuration1: VariableName=[Phenology].LateGrainFilling.Target
        MultiplyFunction NumberFunction
          Constant PeasPerPod: FixedValue=1
          VariableReference PodNumber: VariableName=[Shell].PodNumber
        BiomassRemoval BiomassRemovalDefaults
          OrganBiomassRemovalType Harvest: FractionLiveToRemove=1; FractionDeadToRemove=0; FractionLiveToResidue=0; FractionDeadToResidue=0
          OrganBiomassRemovalType Cut: FractionLiveToRemove=1; FractionDeadToRemove=0; FractionLiveToResidue=0; FractionDeadToResidue=0
          OrganBiomassRemovalType Prune: FractionLiveToRemove=0; FractionDeadToRemove=0; FractionLiveToResidue=0.8; FractionDeadToResidue=0
          OrganBiomassRemovalType Graze: FractionLiveToRemove=0.6; FractionDeadToRemove=0; FractionLiveToResidue=0.2; FractionDeadToResidue=0
          OrganBiomassRemovalType Thin: FractionLiveToRemove=0; FractionDeadToRemove=0; FractionLiveToResidue=0.05; FractionDeadToResidue=0
        Constant DMConversionEfficiency: FixedValue=0.89
        Constant RemobilisationCost: FixedValue=0
        Constant CarbonConcentration: FixedValue=0.4
        DivideFunction HarvestIndex
          VariableReference GrainWt: VariableName=[Grain].Wt
          VariableReference AboveGroundWt: VariableName=[AboveGround].Wt
        VariableReference AboveGroundWt: VariableName=[AboveGround].Wt
      Root: GrowthRespiration=0; MaintenanceRespiration=0
        RootShapeCylindre RootShape
        Constant KLModifier: FixedValue=1
        PhaseLookup KLModifier_archive
          PhaseLookupValue PreEmergence: Start=Germination; End=Emergence
            Constant Function: FixedValue=0.1
          PhaseLookupValue PreCanopyDevelopment: Start=Emergence; End=EndFlowering
            VariableReference klTTfactor1: VariableName=[Root].klComboeffects
          PhaseLookupValue PostCanopyDevelopment: Start=EndFlowering; End=Maturity
            Memo
              Soil data at Kulai and ICRISAT suggests wider row spacing and late sowing can catch up with kl - so allow the function to continue post flowering
            VariableReference klTTfactor1: VariableName=[Root].klComboeffects
        Constant MaxDailyNUptake: FixedValue=6
        Constant SenescenceRate: FixedValue=0.005
        Constant MaximumRootDepth: FixedValue=1000000
        PhaseLookup RootFrontVelocity
          PhaseLookupValue PreEmergence: Start=Germination; End=Emergence
            Constant Function: FixedValue=3
          PhaseLookupValue early: Start=Emergence; End=StartFlowering
            Constant Function: FixedValue=15
          PhaseLookupValue late: Start=StartFlowering; End=Maturity
            Constant Function: FixedValue=17
        Constant MaximumNConc: FixedValue=0.01
        Constant MinimumNConc: FixedValue=0.005
        PhaseLookupValue NitrogenDemandSwitch: Start=Emergence; End=EndGrainFill
          Constant: FixedValue=1
        BiomassRemoval BiomassRemovalDefaults
          OrganBiomassRemovalType Harvest: FractionLiveToRemove=0; FractionDeadToRemove=0; FractionLiveToResidue=0.2; FractionDeadToResidue=0
          OrganBiomassRemovalType Cut: FractionLiveToRemove=0; FractionDeadToRemove=0; FractionLiveToResidue=0.3; FractionDeadToResidue=0
          OrganBiomassRemovalType Prune: FractionLiveToRemove=0; FractionDeadToRemove=0; FractionLiveToResidue=0.1; FractionDeadToResidue=0
          OrganBiomassRemovalType Graze: FractionLiveToRemove=0; FractionDeadToRemove=0; FractionLiveToResidue=0.15; FractionDeadToResidue=0
        LinearInterpolationFunction KNO3
          XYPairs: X=[0, 0.003]; Y=[0.02, 0.02]
          VariableReference XValue: VariableName=[Root].LengthDensity
        LinearInterpolationFunction KNH4
          XYPairs: X=[0, 0.003]; Y=[0, 0]
          VariableReference XValue: VariableName=[Root].LengthDensity
        LinearInterpolationFunction NUptakeSWFactor
          XYPairs: X=[0, 1]; Y=[0, 1]
          VariableReference XValue: VariableName=[Root].RWC
        Constant SpecificRootLength: FixedValue=40; Units=m/g
        Constant DMConversionEfficiency: FixedValue=1
        Constant MaintenanceRespirationFunction: FixedValue=1
        Constant RemobilisationCost: FixedValue=0
        Constant CarbonConcentration: FixedValue=0.4
        BiomassDemand DMDemands
          MultiplyFunction Structural
            PartitionFractionDemandFunction DMDemandFunction
              PhaseLookup PartitionFraction
                PhaseLookupValue Early: Start=Emergence; End=StartFlowering
                  MultiplyFunction
                    Constant Function: FixedValue=0.1
                    DivideFunction
                      Constant Function: FixedValue=1; Units=inverse
                      LinearInterpolationFunction SurfaceWaterFactor
                        Memo
                          Robertson et al (2002) used a maximum leaf size of 300 mm2 for the first 9 leaves and 600 mm2 thereafter.
                        XYPairs: X=[0, 0.2, 0.4, 0.6, 0.8, 1]; Y=[0.4, 0.4, 0.4, 0.4, 0.6, 1]
                        VariableReference XValue: VariableName=[Root].SurfaceWaterAvailability
                  Constant Function (disabled): FixedValue=0.1
                PhaseLookupValue Middle: Start=StartBudding; End=StartFlowering
                  Constant Function: FixedValue=0.1
                PhaseLookupValue Late: Start=StartFlowering; End=Maturity
                  Constant Function: FixedValue=0
            Constant StructuralFraction: FixedValue=1
          Constant Metabolic: FixedValue=0
          StorageDMDemandFunction Storage
            SubtractFunction StorageFraction
              Constant One: FixedValue=1
              VariableReference StructuralFraction: VariableName=[Root].DMDemands.Structural.StructuralFraction
        BiomassDemand NDemands
          MultiplyFunction Structural
            VariableReference MinNconc: VariableName=[Root].minimumNconc
            VariableReference PotentialDMAllocation: VariableName=[Root].potentialDMAllocation.Structural
          MultiplyFunction Metabolic
            SubtractFunction MetabolicNconc
              VariableReference CritNconc: VariableName=[Root].criticalNConc
              VariableReference MinNconc: VariableName=[Root].minimumNconc
            VariableReference PotentialDMAllocation: VariableName=[Root].potentialDMAllocation.Structural
          StorageNDemandFunction Storage
            VariableReference NitrogenDemandSwitch: VariableName=[Root].nitrogenDemandSwitch
            VariableReference MaxNconc: VariableName=[Root].maximumNconc
        DivideFunction SurfaceWaterAvailability
          VariableReference PAW: VariableName=[Soil].SoilWater.PAWmm[1]
          VariableReference PAWC: VariableName=[Soil].Physical.PAWCmm[1]
        DivideFunction WithinRowSpaceFactor
          Constant: FixedValue=1000; Units=mm per 1m of row
          VariableReference RowSpacing: VariableName=[Chickpea].SowingData.RowSpacing
          VariableReference Population: VariableName=[Chickpea].SowingData.Population
          Constant Constant1: FixedValue=0.001
        LinearInterpolationFunction klBiomMod
          XYPairs: X=[0, 200, 350, 500, 700]; Y=[0.1, 0.6, 1, 1.1, 1.2]
          VariableReference XValue: VariableName=[Chickpea].AboveGround.Wt
        MultiplyFunction klComboeffects
          VariableReference Biommod: VariableName=[Root].klBiomMod
          VariableReference klpopmod2: VariableName=[Root].klPopMultiplier
          VariableReference klRSmod2: VariableName=[Root].klRowSpaceMultiplier
        LinearInterpolationFunction klPopMultiplier
          XYPairs: X=[10, 20, 40, 60, 80]; Y=[0.8, 0.9, 1, 1.1, 1.2]
          VariableReference XValue: VariableName=[Chickpea].SowingData.Population
        LinearInterpolationFunction klRowSpaceMultiplier
          XYPairs: X=[0, 200, 350, 500, 1000]; Y=[1.05, 1.05, 1, 0.95, 0.8]
          VariableReference XValue: VariableName=[Chickpea].SowingData.RowSpacing
        VariableReference CriticalNConc: VariableName=[Root].MinimumNConc
        BiomassDemand InitialWt
          Constant Structural: FixedValue=0.2; Units=g/plant
          Constant Metabolic: FixedValue=0
          Constant Storage: FixedValue=0
        Constant RootDepthStressFactor: FixedValue=1
      GenericOrgan Shell: IsAboveGround=true
        MultiplyFunction PodNumber
          Constant PodsPerNode: FixedValue=2
          VariableReference StemPopulation: VariableName=[Structure].TotalStemPopn
        Constant NReallocationFactor: FixedValue=0
        Constant NRetranslocationFactor: FixedValue=0.1
        Constant MaximumNConc: FixedValue=0.02
        Constant MinimumNConc: FixedValue=0.007
        Constant DMRetranslocationFactor: FixedValue=0.1
        PhaseLookupValue NitrogenDemandSwitch: Start=Germination; End=Maturity
          Constant: FixedValue=1
        BiomassRemoval BiomassRemovalDefaults
          OrganBiomassRemovalType Harvest: FractionLiveToRemove=0.5; FractionDeadToRemove=0; FractionLiveToResidue=0.1; FractionDeadToResidue=0
          OrganBiomassRemovalType Cut: FractionLiveToRemove=0.8; FractionDeadToRemove=0; FractionLiveToResidue=0; FractionDeadToResidue=0
          OrganBiomassRemovalType Prune: FractionLiveToRemove=0; FractionDeadToRemove=0; FractionLiveToResidue=0.6; FractionDeadToResidue=0
          OrganBiomassRemovalType Graze: FractionLiveToRemove=0.6; FractionDeadToRemove=0; FractionLiveToResidue=0.2; FractionDeadToResidue=0
        Constant SenescenceRate: FixedValue=0; Units=/d
        Constant DetachmentRateFunction: FixedValue=0; Units=/d
        Constant MaintenanceRespirationFunction: FixedValue=0; Units=0-1
        Constant DMConversionEfficiency: FixedValue=1; Units=0-1
        Constant DMReallocationFactor: FixedValue=0
        VariableReference CriticalNConc: VariableName=[Shell].MinimumNConc
        Constant RemobilisationCost: FixedValue=0
        Constant CarbonConcentration: FixedValue=0.4
        Constant PotentialHarvestIndex: FixedValue=0.2
        BiomassDemand DMDemands
          MultiplyFunction Structural
            PhaseLookup DMDemandFunction
              PhaseLookupValue PodDevelopment: Start=EndPodInitiation; End=MidGrainFilling
                MultiplyFunction HIPodDemand
                  VariableReference AboveGroundWt: VariableName=[AboveGround].Wt
                  DivideFunction HarvestIndexIncrease
                    VariableReference PotentialHarvestIndex: VariableName=[Shell].PotentialHarvestIndex
                    VariableReference FillingDuration: VariableName=[Shell].FillingDuration
                  VariableReference ThermalTime: VariableName=[Phenology].ThermalTime
                FillingRateFunction (disabled)
                  VariableReference NumberFunction: VariableName=[Grain].NumberFunction
                  VariableReference ThermalTime: VariableName=[Phenology].ThermalTime
                  VariableReference PotentialSizeIncrement: VariableName=[Grain].MaximumPotentialGrainSize
                  VariableReference FillingDuration: VariableName=[Grain].FillingDuration
              PhaseLookup PartitionFraction (disabled)
                PhaseLookupValue Early: Start=Emergence; End=StartFlowering
                  Constant Function: FixedValue=0
                PhaseLookupValue Middle: Start=StartFlowering; End=EndFlowering
                  Constant Function: FixedValue=0.7
                PhaseLookupValue Late: Start=EndFlowering; End=Maturity
                  Constant Function: FixedValue=0
            Constant StructuralFraction: FixedValue=1; Units=g/g
          Constant Metabolic: FixedValue=0
          StorageDMDemandFunction Storage
            SubtractFunction StorageFraction
              Constant One: FixedValue=1
              VariableReference StructuralFraction: VariableName=[Shell].DMDemands.Structural.StructuralFraction
        AddFunction FillingDuration
          VariableReference EarlyGrainFillingDuration: VariableName=[Phenology].EarlyGrainFilling.Target
          VariableReference MidGrainFillingDuration: VariableName=[Phenology].MidGrainFilling.Target
          VariableReference LateGrainFillingDuration: VariableName=[Phenology].MidGrainFilling.Target
        BiomassDemand NDemands
          MultiplyFunction Structural
            VariableReference MinNconc: VariableName=[Shell].minimumNconc
            VariableReference PotentialDMAllocation: VariableName=[Shell].potentialDMAllocation.Structural
          MultiplyFunction Metabolic
            SubtractFunction MetabolicNconc
              VariableReference CritNconc: VariableName=[Shell].criticalNConc
              VariableReference MinNconc: VariableName=[Shell].minimumNconc
            VariableReference PotentialDMAllocation: VariableName=[Shell].potentialDMAllocation.Structural
          StorageNDemandFunction Storage
            VariableReference NitrogenDemandSwitch: VariableName=[Shell].nitrogenDemandSwitch
            VariableReference MaxNconc: VariableName=[Shell].maximumNconc
        RetranslocateNonStructural RetranslocateNitrogen
        BiomassDemand InitialWt
          Constant Structural: FixedValue=0; Units=g/m^2
          Constant Metabolic: FixedValue=0
          Constant Storage: FixedValue=0
      Leaf: MaxCover=1; Albedo=0.25; Gsmax350=0.015; R50=150; KDead=0.3; MaximumMainStemLeafNumber=40
        zero: CurrentExpandingLeaf, StartFractionExpanded, FractionNextleafExpanded, DeadNodesYesterday, GrowthRespiration, LAI, Depth, Width, FRGR, PotentialEP, WaterDemand, TipsAtEmergence, CohortsAtInitialisation, FractionDied
        Memo
          Dead leaf ext coeff - may need to be higher than 0.3 - chickpea holds its shape pretty well when dead
        LeafCohort InitialLeaf1: Rank=1; Area=50
          zero: NReallocationFactor, DMReallocationFactor, NRetranslocationFactor, DMRetranslocationFactor, ShadeInducedSenRate, SenescedFrac, DeltaPotentialArea, DeltaStressConstrainedArea, DeltaCarbonConstrainedArea, PotentialStructuralDMAllocation, PotentialMetabolicDMAllocation, MetabolicNReallocated, MetabolicWtReallocated, StorageNReallocated, StorageWtReallocated, MetabolicNRetranslocated, StorageNRetrasnlocated, DMRetranslocated, MetabolicNAllocation, StructuralDMAllocation, MetabolicDMAllocation, MaintenanceRespiration
        LeafCohort InitialLeaf2: Rank=2; Area=100
          zero: NReallocationFactor, DMReallocationFactor, NRetranslocationFactor, DMRetranslocationFactor, ShadeInducedSenRate, SenescedFrac, DeltaPotentialArea, DeltaStressConstrainedArea, DeltaCarbonConstrainedArea, PotentialStructuralDMAllocation, PotentialMetabolicDMAllocation, MetabolicNReallocated, MetabolicWtReallocated, StorageNReallocated, StorageWtReallocated, MetabolicNRetranslocated, StorageNRetrasnlocated, DMRetranslocated, MetabolicNAllocation, StructuralDMAllocation, MetabolicDMAllocation, MaintenanceRespiration
        LeafCohort InitialLeaf3: Rank=3; Area=150
          zero: NReallocationFactor, DMReallocationFactor, NRetranslocationFactor, DMRetranslocationFactor, ShadeInducedSenRate, SenescedFrac, DeltaPotentialArea, DeltaStressConstrainedArea, DeltaCarbonConstrainedArea, PotentialStructuralDMAllocation, PotentialMetabolicDMAllocation, MetabolicNReallocated, MetabolicWtReallocated, StorageNReallocated, StorageWtReallocated, MetabolicNRetranslocated, StorageNRetrasnlocated, DMRetranslocated, MetabolicNAllocation, StructuralDMAllocation, MetabolicDMAllocation, MaintenanceRespiration
        LeafCohortParameters: ExpansionStressValue=0; CellDivisionStressValue=0; DroughtInducedLagAccelerationValue=0; DroughtInducedSenAccelerationValue=0; ShadeInducedSenescenceRateValue=0; SenessingLeafRelativeSizeValue=0
          Constant StorageFraction: FixedValue=0.5
          PhaseLookup StructuralFraction
            PhaseLookupValue Vegetative_to_Flowering: Start=Emergence; End=StartFlowering
              Constant Fraction: FixedValue=0.3
            PhaseLookupValue Flowering: Start=StartFlowering; End=EndPodInitiation
              Constant Fraction: FixedValue=0.3
            PhaseLookupValue Grainfilling: Start=EndPodInitiation; End=EndGrainFill
              Constant Fraction: FixedValue=0.3
          Constant SenessingLeafRelativeSize: FixedValue=1; Units=0-1
          PhaseLookup MaxArea
            PhaseLookupValue PreEmergence: Start=Germination; End=Emergence
              Constant MaxArea: FixedValue=0
            PhaseLookupValue Vegetative_to_Flowering: Start=Emergence; End=StartFlowering
              LinearInterpolationFunction MaxArea
                Memo
                  As per Robertson et al (2002) bell curve (Figure 2)
                XYPairs: X=[1, 5, 10, 15, 17, 25, 40]; Y=[50, 500, 1000, 1500, 1500, 1500, 1500]
                VariableReference XValue: VariableName=[Structure].LeafTipsAppeared
            PhaseLookupValue Flowering_to_Maturity: Start=StartFlowering; End=Maturity
              LinearInterpolationFunction MaxArea
                XYPairs: X=[1, 15, 20, 25]; Y=[1400, 500, 250, 150]
                VariableReference XValue: VariableName=[Phenology].EndBuddingMSLeafNo
          MultiplyFunction GrowthDuration
            Constant Multiplier: FixedValue=4
            VariableReference Phyllochron: VariableName=[Structure].Phyllochron
          MultiplyFunction LagDuration
            Constant Multiplier: FixedValue=16
            VariableReference Phyllochron: VariableName=[Structure].Phyllochron
          MultiplyFunction SenescenceDuration
            Constant Multiplier: FixedValue=2
            VariableReference Phyllochron: VariableName=[Structure].Phyllochron
          Constant DetachmentLagDuration: FixedValue=1000000
          Constant DetachmentDuration: FixedValue=46
          LinearInterpolationFunction SpecificLeafAreaMax
            Memo
              Maximum specific leaf area has been taken from Robertson et al (2002).
            XYPairs: X=[0, 2000]; Y=[22000, 15000]
            VariableReference XValue: VariableName=[Phenology].AccumulatedTT
          LinearInterpolationFunction SpecificLeafAreaMin
            XYPairs: X=[0, 2000]; Y=[20000, 14000]
            VariableReference XValue: VariableName=[Phenology].AccumulatedTT
          MinimumFunction ExpansionStress
            LinearInterpolationFunction WaterStress
              XYPairs: X=[0, 1]; Y=[0, 1]
              VariableReference XValue: VariableName=[Root].WaterTensionFactor
            LinearInterpolationFunction TemperatureEffect
              XYPairs: X=[0, 12, 14]; Y=[0, 1, 1]
              VariableReference XValue: VariableName=[Phenology].MeanTemp
            LinearInterpolationFunction Cover_response
              XYPairs: X=[0, 0.4, 0.5, 1]; Y=[1, 1, 0.7, 0.2]
              VariableReference XValue: VariableName=[leaf].CoverGreen
          MinimumFunction CellDivisionStress
            LinearInterpolationFunction Cover_response
              XYPairs: X=[0, 0.5, 0.7, 1]; Y=[1, 1, 0.5, 0.2]
              VariableReference XValue: VariableName=[leaf].CoverGreen
          Constant MinimumNConc: FixedValue=0.02
          Constant CriticalNConc: FixedValue=0.05
          Constant MaximumNConc: FixedValue=0.08
          Constant NReallocationFactor: FixedValue=0.3
          Constant NRetranslocationFactor: FixedValue=0.1
            Memo
              Retranslocation = movement of reserves out of live organs
              Reallocation = from senesced organs

              Storage fraction decides how much is available to be moved, while these decide what proportion can be moved each day
          Constant DMReallocationFactor: FixedValue=0.5
            Memo
              Reallocation = from senesced organs, fraction that can be moved per day
          Constant DMRetranslocationFactor: FixedValue=0.3
            Memo
              Retranslocation = movement of reserves out of live organs, what proportion can be moved each day
          LinearInterpolationFunction ShadeInducedSenescenceRate
            XYPairs: X=[0, 0.8, 0.9, 0.99]; Y=[0, 0, 0, 0]
            VariableReference XValue: VariableName=[Leaf].CohortCurrentRankCoverAbove
          Constant InitialNConc: FixedValue=0.08
          Constant LeafSizeShapeParameter: FixedValue=0.01
          Constant MaintenanceRespirationFunction: FixedValue=0
          Constant DroughtInducedLagAcceleration: FixedValue=1
          Constant DroughtInducedSenAcceleration: FixedValue=1
          Constant ArchiveCellDivisionStress: FixedValue=1; Units=0-1
          ArrayFunction LagDurationAgeMultiplier: Values=1 1 1
          ArrayFunction SenescenceDurationAgeMultiplier: Values=1 1 1
          ArrayFunction LeafSizeAgeMultiplier: Values=1 1 1 1 1 1 1 1 1 1 1 1
          Constant RemobilisationCost: FixedValue=0
          Constant CarbonConcentration: FixedValue=0.4
        VariableReference ThermalTime: VariableName=[Phenology].ThermalTime
        LinearInterpolationFunction ExtinctionCoeff
          XYPairs: X=[200, 350, 500, 750, 1000]; Y=[0.71, 0.69, 0.66, 0.57, 0.48]
          Memo
            Using soybean data from Flenet et al 1996 to establish trend, with data from Tesfaye et al 2006 for absolute values (close to 0.8 at 40cm RS). These high values also agreed with Thomas and Fukai 1995 (their measurements were at noon therefore they need to be increased for absolute light interception?)
          VariableReference XValue: VariableName=[Chickpea].SowingData.RowSpacing
        RUEModel Photosynthesis
          Memo
            There is no specific TE parameter in NextGen. TE is an emergent property calculated separately from water use and biomass production
          Constant RUE: FixedValue=1.25
          WeightedTemperatureFunction FT: MaximumTemperatureWeighting=0.75
            XYPairs: X=[0, 15, 30, 40]; Y=[0, 1, 1, 0]
          LinearInterpolationFunction FVPD
            XYPairs: X=[0, 10, 50]; Y=[1, 1, 1]
            VariableReference XValue: VariableName=[Leaf].Photosynthesis.VPD
          LinearInterpolationFunction FN
            XYPairs: X=[0, 1, 1.5]; Y=[0, 1, 1]
            VariableReference XValue: VariableName=[Leaf].Fn
          LinearInterpolationFunction FW
            XYPairs: X=[0, 1, 1.5]; Y=[0, 1, 1]
            VariableReference XValue: VariableName=[Leaf].Fw
          RUECO2Function FCO2: PhotosyntheticPathway=C3
          Memo
            Ayaz eta 2004 presented a RUE of 1.6 g/MJ PAR during non-limiting temperature conditions for field pea.  Halving this to make it total radiation gives 0.8 g/MJ and adding 20% to account for root and  nodule production and N fixiation costs gives 1.0 g/MJ

            However Sincalir had data that presented RUE of 2.0 hence by the same calcs we have advanced RUE to 1.2
          VariableReference RadnInt: VariableName=[Leaf].RadiationIntercepted
        LinearInterpolationFunction FrostFractionOrig
          XYPairs: X=[-1, 0]; Y=[0, 0]
          VariableReference XValue: VariableName=[Weather].MinT
        PhaseLookup FrostFraction
          Memo
            Also includes high T and water stress effect end of season
          PhaseLookupValue PreEmergence: Start=Germination; End=Emergence
            Constant NA: FixedValue=1
          PhaseLookupValue Vegetative_to_Flowering: Start=Emergence; End=StartFlowering
            LinearInterpolationFunction FrostFraction
              XYPairs: X=[-1, 0]; Y=[0, 0]
              VariableReference XValue: VariableName=[Weather].MinT
          PhaseLookupValue Flowering: Start=StartFlowering; End=EndPodInitiation
            LinearInterpolationFunction FrostFraction
              XYPairs: X=[-1, 0]; Y=[0, 0]
              VariableReference XValue: VariableName=[Weather].MaxT
          PhaseLookupValue EarlyGrainfilling: Start=EndPodInitiation; End=MidGrainFilling
            LinearInterpolationFunction FrostFraction
              XYPairs: X=[-1, 0]; Y=[0, 0]
              VariableReference XValue: VariableName=[Weather].MinT
          PhaseLookupValue MidGrainfilling: Start=MidGrainFilling; End=LateGrainFilling
            MaximumFunction
              LinearInterpolationFunction FrostFraction
                XYPairs: X=[-1, 0]; Y=[0, 0]
                VariableReference XValue: VariableName=[Weather].MinT
          PhaseLookupValue LateGrainfilling: Start=LateGrainFilling; End=EndGrainFill
            MaximumFunction
              LinearInterpolationFunction FrostFraction
                XYPairs: X=[-1, 0]; Y=[0, 0]
                VariableReference XValue: VariableName=[Weather].MinT
              LinearInterpolationFunction HighTemp
                XYPairs: X=[0, 35, 40]; Y=[0, 0, 1]
                VariableReference XValue: VariableName=[Weather].MaxT
              LinearInterpolationFunction WaterStress
                XYPairs: X=[0, 0.1, 0.2, 0.3, 0.5, 0.8, 1]; Y=[0.2, 0, 0, 0, 0, 0, 0]
                VariableReference XValue: VariableName=[leaf].Fw
        MinimumFunction FRGRFunction
          VariableReference RUE_FT: VariableName=[Leaf].Photosynthesis.FT
          MinimumFunction Others
            VariableReference RUE_FN: VariableName=[Leaf].Photosynthesis.FN
            VariableReference RUE_FVPD: VariableName=[Leaf].Photosynthesis.FVPD
        BiomassRemoval BiomassRemovalDefaults
          OrganBiomassRemovalType Harvest: FractionLiveToRemove=0; FractionDeadToRemove=0; FractionLiveToResidue=0.3; FractionDeadToResidue=0
          OrganBiomassRemovalType Cut: FractionLiveToRemove=0.8; FractionDeadToRemove=0; FractionLiveToResidue=0; FractionDeadToResidue=0
          OrganBiomassRemovalType Prune: FractionLiveToRemove=0; FractionDeadToRemove=0; FractionLiveToResidue=0.6; FractionDeadToResidue=0
          OrganBiomassRemovalType Graze: FractionLiveToRemove=0.6; FractionDeadToRemove=0; FractionLiveToResidue=0.1; FractionDeadToResidue=0
        Constant DMConversionEfficiency: FixedValue=1
        Constant RemobilisationCost: FixedValue=0
        Constant CarbonConcentration: FixedValue=0.4
        Constant StomatalConductanceCO2Modifier: FixedValue=1
        Constant StructuralFraction: FixedValue=0.3
        Constant WidthFunction: FixedValue=0
        VariableReference DepthFunction: VariableName=[Leaf].Height
      GenericOrgan Stem: IsAboveGround=true
        Constant NReallocationFactor: FixedValue=0
          Memo
            Rate (fraction per day) at which N can be reallocated e.g. SPECIFICALLY from sensecing stem
        Constant NRetranslocationFactor: FixedValue=0.1
          Memo
            fraction per day of stored stem reserves that can be used elsewhere - from live leaves, not seneseced
        Constant DMReallocationFactor: FixedValue=0.2
          Memo
            How quickly will it reallocate somwhere else (0.1) = 10% per day FROM SENESCED STEM
        Constant DMRetranslocationFactor: FixedValue=0.5
          Memo
            How quickly will it retranslocate somwhere else from LIVE stem (0.1) = 10% per day
        Constant MaximumNConc: FixedValue=0.02
        Constant MinimumNConc: FixedValue=0.007
        PhaseLookupValue NitrogenDemandSwitch: Start=Emergence; End=EndGrainFill
          Constant: FixedValue=1
        BiomassRemoval BiomassRemovalDefaults: same as Replacements.Chickpea.Shell.BiomassRemovalDefaults
        Constant SenescenceRate: FixedValue=0; Units=/d
        Constant DetachmentRateFunction: FixedValue=0; Units=/d
        Constant MaintenanceRespirationFunction: FixedValue=0; Units=0-1
        Constant DMConversionEfficiency: FixedValue=1; Units=0-1
        VariableReference CriticalNConc: VariableName=[Stem].MinimumNConc
        Constant RemobilisationCost: FixedValue=0
          Constant DMConversionEfficiency: FixedValue=1; Units=0-1
        Constant CarbonConcentration: FixedValue=0.4
        BiomassDemand NDemands
          MultiplyFunction Structural
            VariableReference MinNconc: VariableName=[Stem].minimumNconc
            VariableReference PotentialDMAllocation: VariableName=[Stem].potentialDMAllocation.Structural
          MultiplyFunction Metabolic
            SubtractFunction MetabolicNconc
              VariableReference CritNconc: VariableName=[Stem].criticalNConc
              VariableReference MinNconc: VariableName=[Stem].minimumNconc
            VariableReference PotentialDMAllocation: VariableName=[Stem].potentialDMAllocation.Structural
          StorageNDemandFunction Storage
            VariableReference NitrogenDemandSwitch: VariableName=[Stem].nitrogenDemandSwitch
            VariableReference MaxNconc: VariableName=[Stem].maximumNconc
        RetranslocateNonStructural RetranslocateNitrogen
        BiomassDemand DMDemands
          MultiplyFunction Structural
            PhaseLookup Fraction
              PhaseLookupValue Vegetative_to_Flowering: Start=Emergence; End=StartBudding
                Constant Fraction: FixedValue=0.5
              PhaseLookupValue Flowering: Start=StartBudding; End=EndPodInitiation
                Constant Fraction: FixedValue=0.3
              PhaseLookupValue Grainfilling: Start=EndPodInitiation; End=EndGrainFill
                Constant Fraction: FixedValue=0.3
            VariableReference DMDemand: VariableName=[Stem].PotentialGrowth
          Constant Metabolic: FixedValue=0
          MultiplyFunction Storage
            VariableReference DMDemand: VariableName=[Stem].PotentialGrowth
            SubtractFunction StorageFraction
              Constant One: FixedValue=1
              VariableReference StructuralFraction: VariableName=[Stem].DMDemands.Structural.Fraction
        PartitionFractionDemandFunction PotentialGrowth
          PhaseLookup PartitionFraction
            PhaseLookupValue Vegetative_to_Flowering: Start=Emergence; End=StartFlowering
              Constant Fraction: FixedValue=0.9
            PhaseLookupValue Flowering: Start=StartFlowering; End=EndPodInitiation
              Constant Fraction: FixedValue=0.7
            PhaseLookupValue EarlyGrainfilling: Start=EndPodInitiation; End=LateGrainFilling
              Constant Fraction: FixedValue=0.5
            PhaseLookupValue LateGrainfilling: Start=LateGrainFilling; End=EndGrainFill
              Constant Fraction: FixedValue=0
        BiomassDemand InitialWt
          Constant Structural: FixedValue=0; Units=g/m^2
          Constant Metabolic: FixedValue=0
          Constant Storage: FixedValue=0
      Nodule
        Constant FixationMetabolicCost: FixedValue=0
        Constant MaximumNConc: FixedValue=0.02
        Constant MinimumNConc: FixedValue=0.01
        Constant SenescenceRate: FixedValue=0
        Constant NReallocationFactor: FixedValue=0
        PhaseLookupValue NitrogenDemandSwitch: Start=Emergence; End=EndGrainFill
          Constant: FixedValue=1
        BiomassRemoval BiomassRemovalDefaults
          OrganBiomassRemovalType Harvest: FractionLiveToRemove=0; FractionDeadToRemove=0; FractionLiveToResidue=0; FractionDeadToResidue=0
          OrganBiomassRemovalType Cut: FractionLiveToRemove=0; FractionDeadToRemove=0; FractionLiveToResidue=0; FractionDeadToResidue=0
          OrganBiomassRemovalType Prune: FractionLiveToRemove=0; FractionDeadToRemove=0; FractionLiveToResidue=0; FractionDeadToResidue=0
          OrganBiomassRemovalType Graze: FractionLiveToRemove=0; FractionDeadToRemove=0; FractionLiveToResidue=0; FractionDeadToResidue=0
        Constant InitialWtFunction: FixedValue=0; Units=g/m^2
        Constant DetachmentRateFunction: FixedValue=0; Units=/d
        Constant FixationRate: FixedValue=10000; Units=g/m^2/d
        MultiplyFunction FixationRate2
          VariableReference NoduleWt: VariableName=[Nodule].Live.Wt
          Constant SpecificNitrogenaseActivity: FixedValue=0
          MinimumFunction
            HourlyInterpolation FT: agregationMethod=0
              XYPairs Response: X=[0, 20, 30, 40]; Y=[0, 1, 1, 0]
              ThreeHourSin InterpolationMethod
            LinearInterpolationFunction FW
              XYPairs: X=[0, 1, 1.5]; Y=[0, 1, 1]
              VariableReference XValue: VariableName=[Leaf].Fw
            LinearInterpolationFunction FWlog
              XYPairs: X=[0, 1, 1.5]; Y=[1, 1, 1]
              VariableReference XValue: VariableName=[Leaf].Fw
        Constant MaintenanceRespirationFunction: FixedValue=0; Units=0-1
        Constant DMConversionEfficiency: FixedValue=1; Units=0-1
        Constant NRetranslocationFactor: FixedValue=0
        Constant DMReallocationFactor: FixedValue=0
        Constant DMRetranslocationFactor: FixedValue=0
        VariableReference CriticalNConc: VariableName=[Nodule].MinimumNConc
        Constant RemobilisationCost: FixedValue=0
        Constant CarbonConcentration: FixedValue=0.4
        BiomassDemand DMDemands
          MultiplyFunction Structural
            PartitionFractionDemandFunction DMDemandFunction
              PhaseLookup PartitionFraction
                PhaseLookupValue Early: Start=Emergence; End=StartFlowering
                  Constant Function: FixedValue=0
                PhaseLookupValue Middle: Start=StartFlowering; End=EndFlowering
                  Constant Function: FixedValue=0
                PhaseLookupValue Late: Start=EndFlowering; End=Maturity
                  Constant Function: FixedValue=0
            Constant StructuralFraction: FixedValue=1; Units=g/g
          Constant Metabolic: FixedValue=0
          StorageDMDemandFunction Storage
            SubtractFunction StorageFraction
              Constant One: FixedValue=1
              VariableReference StructuralFraction: VariableName=[Nodule].DMDemands.Structural.StructuralFraction
        BiomassDemand NDemands
          MultiplyFunction Structural
            VariableReference MinNconc: VariableName=[Nodule].minimumNconc
            VariableReference PotentialDMAllocation: VariableName=[Nodule].potentialDMAllocation.Structural
          MultiplyFunction Metabolic
            SubtractFunction MetabolicNconc
              VariableReference CritNconc: VariableName=[Nodule].criticalNConc
              VariableReference MinNconc: VariableName=[Nodule].minimumNconc
            VariableReference PotentialDMAllocation: VariableName=[Nodule].potentialDMAllocation.Structural
          StorageNDemandFunction Storage
            VariableReference NitrogenDemandSwitch: VariableName=[Nodule].nitrogenDemandSwitch
            VariableReference MaxNconc: VariableName=[Nodule].maximumNconc
      CompositeBiomass AboveGround: DMDOfStructural=0.6
        Propertys=[[Leaf].Live, [Leaf].Dead, [Stem].Live, [Stem].Dead, [Grain].Live, [Grain].Dead, [Shell].Live, [Shell].Dead]
      CompositeBiomass BelowGround: Propertys=[[Root].Live, [Root].Dead, [Nodule].Live, [Nodule].Dead]; DMDOfStructural=0.6
      CompositeBiomass Total: DMDOfStructural=0.6
        Propertys=[[Leaf].Live, [Leaf].Dead, [Stem].Live, [Stem].Dead, [Grain].Live, [Grain].Dead, [Shell].Live, [Shell].Dead, [Root].Live, [Root].Dead, [Nodule].Live, [Nodule].Dead]
      CompositeBiomass TotalLive: DMDOfStructural=0.6
        Propertys=[[Leaf].Live, [Stem].Live, [Grain].Live, [Shell].Live, [Root].Live, [Nodule].Live]
      CompositeBiomass TotalDead: DMDOfStructural=0.6
        Propertys=[[Leaf].Dead, [Stem].Dead, [Grain].Dead, [Shell].Dead, [Root].Dead, [Nodule].Dead]
      CompositeBiomass Pod: Propertys=[[Shell].Live, [Shell].Dead, [Grain].Live, [Grain].Dead]; DMDOfStructural=0.6
      Memo References
        References

        Brown, H.E., Huth, N.I., Holzworth, D.P., Teixeira, E.I., Zyskowski, R.F., Hargreaves, J.N., Moot, D.J., 2014\. Plant modelling framework: software for building and running crop models on the APSIM platform. Environmental Modelling & Software 62 385-398.

        Robertson, M.J., Carberry, P.S., Huth, N.I., Turpin, J.E., Probert, M.E., Poulton, P.L., Bell, M., Wright, G.C., Yeates, S.J., Brinsmead, R.B., 2002\. Simulation of growth and development of diverse legume species in APSIM. Australian Journal of Agricultural Research 53 429-446.

        Singh P, Virmani SM (1996) Modeling growth and yield of chickpea (Cicer arietinum L.). Field Crops Research , 46, 41-59.
      CultivarFolder
        Memo
          18/2/2020 - Copieds Amethyst to make new cultivars: Striker, Slasher, Kyabra, Drummond, Seamer, Boundary, Pistol, Genesis90, Kalkee, Almaz
        CultivarFolder Australian cvv
          Cultivar Amethyst
          Cultivar Almaz
            Command:
              [Phenology].Emerging.ShootLag = 140
              [Phenology].Vegetative.Target.FixedValue = 500
              [Phenology].LateVegetative.Target.FixedValue = 100
              [Phenology].Budding.Target.XYPairs.X = 10, 13.17, 17
              [Phenology].Budding.Target.XYPairs.Y = 665, 50, 50
          Cultivar Boundary
          Cultivar CICA1521
            Command:
              [Phenology].Vegetative.Target.FixedValue = 600
              [Phenology].LateVegetative.Target.FixedValue = 100
              [Phenology].Budding.Target.XYPairs.X = 10, 12.54, 17
              [Phenology].Budding.Target.XYPairs.Y = 453, 50, 50
          Cultivar Drummond
            Command:
              [Phenology].Vegetative.Target.FixedValue = 600
              [Phenology].LateVegetative.Target.FixedValue = 100
              [Phenology].Budding.Target.XYPairs.X = 10, 12.54, 17
              [Phenology].Budding.Target.XYPairs.Y = 453, 50, 50
              [Phenology].Flowering.Target.FixedValue = 200
              [Phenology].PodInitiation.Target.Total.FixedValue = 8
          Cultivar Genesis90
            Command:
              [Phenology].Emerging.ShootLag = 140
              [Phenology].Vegetative.Target.FixedValue = 600
              [Phenology].LateVegetative.Target.FixedValue = 0
              [Phenology].Budding.Target.XYPairs.X = 10, 15.62, 17
              [Phenology].Budding.Target.XYPairs.Y = 300, 300, 300
              [Phenology].Flowering.Target.FixedValue = 200
              [Phenology].PodInitiation.Target.Total.FixedValue = 8
          Cultivar HatTrick
          Cultivar Kalkee
            Command:
              [Phenology].Emerging.ShootLag = 140
              [Phenology].Vegetative.Target.FixedValue = 600
              [Phenology].LateVegetative.Target.FixedValue = 0
              [Phenology].Budding.Target.XYPairs.X = 10, 14.31, 17
              [Phenology].Budding.Target.XYPairs.Y = 633, 50, 50
              [Phenology].Flowering.Target.FixedValue = 200
          Cultivar Kyabra
            Command:
              [Phenology].LateVegetative.Target.FixedValue = 200
              [Phenology].Budding.Target.XYPairs.X = 10, 12.51, 17
              [Phenology].Budding.Target.XYPairs.Y = 466, 50, 50
              [Phenology].Flowering.Target.FixedValue = 250
              [Phenology].PodInitiation.Target.Total.FixedValue = 8
          Cultivar Monarch
            Command:
              [Phenology].Emerging.ShootLag = 140
              [Phenology].Vegetative.Target.FixedValue = 600
              [Phenology].LateVegetative.Target.FixedValue = 0
              [Phenology].Budding.Target.XYPairs.X = 10, 13.45, 17
              [Phenology].Budding.Target.XYPairs.Y = 621, 50, 50
              [Phenology].Flowering.Target.FixedValue = 200
              [Phenology].PodInitiation.Target.Total.FixedValue = 8
          Cultivar Pistol
            Command:
              [Phenology].LateVegetative.Target.FixedValue = 200
              [Phenology].Budding.Target.XYPairs.X = 10, 12.51, 17
              [Phenology].Budding.Target.XYPairs.Y = 466, 50, 50
              [Phenology].Flowering.Target.FixedValue = 200
          Cultivar QuickKabuli
            Command:
              [Phenology].Emerging.ShootLag = 140
              [Phenology].Vegetative.Target.FixedValue = 600
              [Phenology].LateVegetative.Target.FixedValue = 0
              [Phenology].Budding.Target.XYPairs.X = 10, 13.45, 17
              [Phenology].Budding.Target.XYPairs.Y = 621, 50, 50
              [Phenology].Flowering.Target.FixedValue = 150
          Cultivar Seamer
            Command:
              [Phenology].LateVegetative.Target.FixedValue = 200
              [Phenology].Budding.Target.XYPairs.X = 10, 12.51, 17
              [Phenology].Budding.Target.XYPairs.Y = 466, 50, 50
              [Phenology].Flowering.Target.FixedValue = 200
              [Phenology].PodInitiation.Target.Total.FixedValue = 5
          Cultivar Slasher
            Command:
              [Phenology].LateVegetative.Target.FixedValue = 200
              [Phenology].Budding.Target.XYPairs.X = 10, 12.51, 17
              [Phenology].Budding.Target.XYPairs.Y = 466, 50, 50
              [Phenology].Flowering.Target.FixedValue = 100
              [Phenology].PodInitiation.Target.Total.FixedValue = 5
          Cultivar SlowDesi
            Command:
              [Phenology].Vegetative.Target.FixedValue = 600
              [Phenology].LateVegetative.Target.FixedValue = 100
              [Phenology].Budding.Target.XYPairs.X = 10, 12.54, 17
              [Phenology].Budding.Target.XYPairs.Y = 453, 50, 50
          Cultivar Striker
            Command:
              [Phenology].LateVegetative.Target.FixedValue = 200
              [Phenology].Budding.Target.XYPairs.X = 10, 12.51, 17
              [Phenology].Budding.Target.XYPairs.Y = 466, 50, 50
              [Phenology].Flowering.Target.FixedValue = 200
              [Phenology].PodInitiation.Target.Total.FixedValue = 5
          Cultivar Genesis90_archivePPsensitive
            Command:
              [Phenology].Emerging.ShootLag = 140
              [Phenology].Vegetative.Target.FixedValue = 600
              [Phenology].LateVegetative.Target.FixedValue = 0
              [Phenology].Budding.Target.XYPairs.X = 10, 15.62, 17
              [Phenology].Budding.Target.XYPairs.Y = 478, 50, 50
              [Phenology].Flowering.Target.FixedValue = 200
              [Phenology].PodInitiation.Target.Total.FixedValue = 8
        CultivarFolder ICRISAT cvv
          Cultivar JAKI
            Command:
              [Phenology].Emerging.ShootLag = 140
              [Phenology].Vegetative.Target.FixedValue = 600
              [Phenology].LateVegetative.Target.FixedValue = 0
              [Phenology].Budding.Target.XYPairs.X = 10, 15.62, 17
              [Phenology].Budding.Target.XYPairs.Y = 478, 50, 50
              [Phenology].Flowering.Target.FixedValue = 200
              [Phenology].PodInitiation.Target.Total.FixedValue = 8
              [Leaf].LeafCohortParameters.MaxArea.Vegetative_to_Flowering.MaxArea.XYPairs.X = 1,  15,  20,   27,   40
              [Leaf].LeafCohortParameters.MaxArea.Vegetative_to_Flowering.MaxArea.XYPairs.Y = 200,  1000,  1000,   300,  100
              [Leaf].LeafCohortParameters.SpecificLeafAreaMax.XYPairs.X = 0, 1800
              [Leaf].LeafCohortParameters.SpecificLeafAreaMax.XYPairs.Y = 32000, 2000
              [Leaf].LeafCohortParameters.SpecificLeafAreaMin.XYPairs.X = 0, 1800
              [Leaf].LeafCohortParameters.SpecificLeafAreaMin.XYPairs.Y = 30000, 1000
              [Root].klBiomMod.XYPairs.X = 0, 200, 350, 500, 700
              [Root].klBiomMod.XYPairs.Y = 0.3, 0.8, 1.0, 1.2, 1.4
          Cultivar ICCV2
            Command:
              [Phenology].Emerging.ShootLag = 140
              [Phenology].Vegetative.Target.FixedValue = 500
              [Phenology].LateVegetative.Target.FixedValue = 0
              [Phenology].Budding.Target.XYPairs.X = 10, 13.45, 17
              [Phenology].Budding.Target.XYPairs.Y = 621, 50, 50
              [Phenology].Flowering.Target.FixedValue = 200
              [Phenology].PodInitiation.Target.Total.FixedValue = 8
              [Leaf].LeafCohortParameters.MaxArea.Vegetative_to_Flowering.MaxArea.XYPairs.X = 1,  8,  21,   25,   40
              [Leaf].LeafCohortParameters.MaxArea.Vegetative_to_Flowering.MaxArea.XYPairs.Y = 200,  700,  1000,   200,  100
              [Leaf].LeafCohortParameters.SpecificLeafAreaMax.XYPairs.X = 0, 1800
              [Leaf].LeafCohortParameters.SpecificLeafAreaMax.XYPairs.Y = 32000, 2000
              [Leaf].LeafCohortParameters.SpecificLeafAreaMin.XYPairs.X = 0, 1800
              [Leaf].LeafCohortParameters.SpecificLeafAreaMin.XYPairs.Y = 30000, 1000
              [Root].klBiomMod.XYPairs.X = 0, 200, 350, 500, 700
              [Root].klBiomMod.XYPairs.Y = 0.3, 0.8, 1.0, 1.2, 1.4
          Cultivar NBeG47
            Command:
              [Phenology].Emerging.ShootLag = 140
              [Phenology].Vegetative.Target.FixedValue = 650
              [Phenology].LateVegetative.Target.FixedValue = 0
              [Phenology].Budding.Target.XYPairs.X = 10, 13.45, 17
              [Phenology].Budding.Target.XYPairs.Y = 621, 50, 50
              [Phenology].Flowering.Target.FixedValue = 200
              [Phenology].PodInitiation.Target.Total.FixedValue = 8
              [Leaf].LeafCohortParameters.MaxArea.Vegetative_to_Flowering.MaxArea.XYPairs.X = 1,  11,  15,   30,   40
              [Leaf].LeafCohortParameters.MaxArea.Vegetative_to_Flowering.MaxArea.XYPairs.Y = 200,  1300,  1300,   400,  100
              [Leaf].ExtinctionCoeff.XYPairs.X = 200, 350, 500, 750, 1000
              [Leaf].ExtinctionCoeff.XYPairs.Y = 0.51, 0.49, 0.46, 0.43, 0.35
              [Leaf].LeafCohortParameters.SpecificLeafAreaMax.XYPairs.X = 0, 1800
              [Leaf].LeafCohortParameters.SpecificLeafAreaMax.XYPairs.Y = 32000, 2000
              [Leaf].LeafCohortParameters.SpecificLeafAreaMin.XYPairs.X = 0, 1800
              [Leaf].LeafCohortParameters.SpecificLeafAreaMin.XYPairs.Y = 30000, 1000
              [Root].klBiomMod.XYPairs.X = 0, 200, 350, 500, 700
              [Root].klBiomMod.XYPairs.Y = 0.3, 0.8, 1.0, 1.2, 1.4
          Cultivar NBeG119
            Command:
              [Phenology].Emerging.ShootLag = 140
              [Phenology].Vegetative.Target.FixedValue = 500
              [Phenology].LateVegetative.Target.FixedValue = 0
              [Phenology].Budding.Target.XYPairs.X = 10, 13.45, 17
              [Phenology].Budding.Target.XYPairs.Y = 621, 50, 50
              [Phenology].Flowering.Target.FixedValue = 200
              [Phenology].PodInitiation.Target.Total.FixedValue = 8
              [Leaf].LeafCohortParameters.MaxArea.Vegetative_to_Flowering.MaxArea.XYPairs.X = 1,  10,  22,   30,   40
              [Leaf].LeafCohortParameters.MaxArea.Vegetative_to_Flowering.MaxArea.XYPairs.Y = 200,  900,  900,   300,  100
              [Leaf].ExtinctionCoeff.XYPairs.X = 200, 350, 500, 750, 1000
              [Leaf].ExtinctionCoeff.XYPairs.Y = 0.76, 0.74, 0.71, 0.60, 0.51
              [Leaf].LeafCohortParameters.SpecificLeafAreaMax.XYPairs.X = 0, 1800
              [Leaf].LeafCohortParameters.SpecificLeafAreaMax.XYPairs.Y = 32000, 2000
              [Leaf].LeafCohortParameters.SpecificLeafAreaMin.XYPairs.X = 0, 1800
              [Leaf].LeafCohortParameters.SpecificLeafAreaMin.XYPairs.Y = 30000, 1000
              [Structure].BranchingRate.Potential_Branching_Rate.Vegetative.MultiplyFunction.MaxBranchRate.XYPairs.X = 0, 2
              [Structure].BranchingRate.Potential_Branching_Rate.Vegetative.MultiplyFunction.MaxBranchRate.XYPairs.Y = 0, 2
              [Root].klBiomMod.XYPairs.X = 0, 200, 350, 500, 700
              [Root].klBiomMod.XYPairs.Y = 0.3, 0.8, 1.0, 1.2, 1.4
        CultivarFolder Other cvv
          Cultivar Anwar
            Command:
              [Leaf].LeafCohortParameters.MaxArea.Vegetative_to_Flowering.MaxArea.XYPairs.X = 1,  5,  10,  21
              [Leaf].LeafCohortParameters.MaxArea.Vegetative_to_Flowering.MaxArea.XYPairs.Y = 224,  224,  489, 1080
              [Phenology].Vegetative.Target.FixedValue = 490
              [Phenology].Vegetative.Progression.PhotoperiodModifier.CriticalPhotoperiod = 11
          Cultivar Ayaz
            Command:
              [Leaf].LeafCohortParameters.MaxArea.Vegetative_to_Flowering.MaxArea.XYPairs.X = 1,  5,  10,  21
              [Leaf].LeafCohortParameters.MaxArea.Vegetative_to_Flowering.MaxArea.XYPairs.Y = 224,  224,  489, 1080
              [Phenology].Vegetative.Target.FixedValue = 550
          Cultivar Hashem
            Command:
              [Leaf].LeafCohortParameters.MaxArea.Vegetative_to_Flowering.MaxArea.XYPairs.X = 1,  5,  10,  21
              [Leaf].LeafCohortParameters.MaxArea.Vegetative_to_Flowering.MaxArea.XYPairs.Y = 224,  224,  489, 1080
              [Phenology].Vegetative.Target.FixedValue = 610
              [Phenology].Vegetative.Progression.PhotoperiodModifier.CriticalPhotoperiod = 10.3
      CultivarFolder ArchiveCultivarFolder
        Cultivar 99_73C
          Command:
            [Leaf].LeafCohortParameters.MaxArea.Vegetative_to_Flowering.MaxArea.XYPairs.X = 1,  5,  10,  21
            [Leaf].LeafCohortParameters.MaxArea.Vegetative_to_Flowering.MaxArea.XYPairs.Y = 224,  224,  489, 1080
            [Phenology].Vegetative.Target.FixedValue = 440
            [Phenology].Vegetative.Progression.PhotoperiodModifier.CriticalPhotoperiod = 11
        Cultivar 99_66C
          Command:
            [Leaf].LeafCohortParameters.MaxArea.Vegetative_to_Flowering.MaxArea.XYPairs.X = 1,  5,  10,  21
            [Leaf].LeafCohortParameters.MaxArea.Vegetative_to_Flowering.MaxArea.XYPairs.Y = 224,  224,  489, 1080
            [Phenology].Vegetative.Target.FixedValue = 410
            [Phenology].Vegetative.Progression.PhotoperiodModifier.CriticalPhotoperiod = 11
        Cultivar 99_34C
          Command:
            [Leaf].LeafCohortParameters.MaxArea.Vegetative_to_Flowering.MaxArea.XYPairs.X = 1,  5,  10,  21
            [Leaf].LeafCohortParameters.MaxArea.Vegetative_to_Flowering.MaxArea.XYPairs.Y = 224,  224,  489, 1080
            [Phenology].Vegetative.Target.FixedValue = 420
            [Phenology].Vegetative.Progression.PhotoperiodModifier.CriticalPhotoperiod = 11
        Cultivar 98_79C
          Command:
            [Leaf].LeafCohortParameters.MaxArea.Vegetative_to_Flowering.MaxArea.XYPairs.X = 1,  5,  10,  21
            [Leaf].LeafCohortParameters.MaxArea.Vegetative_to_Flowering.MaxArea.XYPairs.Y = 224,  224,  489, 1080
            [Phenology].Vegetative.Target.FixedValue = 410
            [Phenology].Vegetative.Progression.PhotoperiodModifier.CriticalPhotoperiod = 11
        Cultivar 98_55C
          Command:
            [Leaf].LeafCohortParameters.MaxArea.Vegetative_to_Flowering.MaxArea.XYPairs.X = 1,  5,  10,  21
            [Leaf].LeafCohortParameters.MaxArea.Vegetative_to_Flowering.MaxArea.XYPairs.Y = 224,  224,  489, 1080
            [Phenology].Vegetative.Target.FixedValue = 410
            [Phenology].Vegetative.Progression.PhotoperiodModifier.CriticalPhotoperiod = 11
        Cultivar 98_16C
          Command:
            [Leaf].LeafCohortParameters.MaxArea.Vegetative_to_Flowering.MaxArea.XYPairs.X = 1,  5,  10,  21
            [Leaf].LeafCohortParameters.MaxArea.Vegetative_to_Flowering.MaxArea.XYPairs.Y = 224,  224,  489, 1080
            [Phenology].Vegetative.Target.FixedValue = 430
            [Phenology].Vegetative.Progression.PhotoperiodModifier.CriticalPhotoperiod = 10
        Cultivar 98_107C
          Command:
            [Leaf].LeafCohortParameters.MaxArea.Vegetative_to_Flowering.MaxArea.XYPairs.X = 1,  5,  10,  21
            [Leaf].LeafCohortParameters.MaxArea.Vegetative_to_Flowering.MaxArea.XYPairs.Y = 224,  224,  489, 1080
            [Phenology].Vegetative.Target.FixedValue = 410
            [Phenology].Vegetative.Progression.PhotoperiodModifier.CriticalPhotoperiod = 11
        Cultivar 98_106C
          Command:
            [Leaf].LeafCohortParameters.MaxArea.Vegetative_to_Flowering.MaxArea.XYPairs.X = 1,  5,  10,  21
            [Leaf].LeafCohortParameters.MaxArea.Vegetative_to_Flowering.MaxArea.XYPairs.Y = 224,  224,  489, 1080
            [Phenology].Vegetative.Target.FixedValue = 400
            [Phenology].Vegetative.Progression.PhotoperiodModifier.CriticalPhotoperiod = 11
        Cultivar 97_219C
          Command:
            [Leaf].LeafCohortParameters.MaxArea.Vegetative_to_Flowering.MaxArea.XYPairs.X = 1,  5,  10,  21
            [Leaf].LeafCohortParameters.MaxArea.Vegetative_to_Flowering.MaxArea.XYPairs.Y = 224,  224,  489, 1080
            [Phenology].Vegetative.Target.FixedValue = 430
            [Phenology].Vegetative.Progression.PhotoperiodModifier.CriticalPhotoperiod = 11
        Cultivar 97_120C
          Command:
            [Leaf].LeafCohortParameters.MaxArea.Vegetative_to_Flowering.MaxArea.XYPairs.X = 1,  5,  10,  21
            [Leaf].LeafCohortParameters.MaxArea.Vegetative_to_Flowering.MaxArea.XYPairs.Y = 224,  224,  489, 1080
            [Phenology].Vegetative.Target.FixedValue = 400
            [Phenology].Vegetative.Progression.PhotoperiodModifier.CriticalPhotoperiod = 11
        Cultivar 97_118C
          Command:
            [Leaf].LeafCohortParameters.MaxArea.Vegetative_to_Flowering.MaxArea.XYPairs.X = 1,  5,  10,  21
            [Leaf].LeafCohortParameters.MaxArea.Vegetative_to_Flowering.MaxArea.XYPairs.Y = 224,  224,  489, 1080
            [Phenology].Vegetative.Target.FixedValue = 420
            [Phenology].Vegetative.Progression.PhotoperiodModifier.CriticalPhotoperiod = 10.5
        Cultivar 97_116C
          Command:
            [Leaf].LeafCohortParameters.MaxArea.Vegetative_to_Flowering.MaxArea.XYPairs.X = 1,  5,  10,  21
            [Leaf].LeafCohortParameters.MaxArea.Vegetative_to_Flowering.MaxArea.XYPairs.Y = 224,  224,  489, 1080
            [Phenology].Vegetative.Target.FixedValue = 405
            [Phenology].Vegetative.Progression.PhotoperiodModifier.CriticalPhotoperiod = 10.5
        Cultivar 02_35C
          Command:
            [Leaf].LeafCohortParameters.MaxArea.Vegetative_to_Flowering.MaxArea.XYPairs.X = 1,  5,  10,  21
            [Leaf].LeafCohortParameters.MaxArea.Vegetative_to_Flowering.MaxArea.XYPairs.Y = 224,  224,  489, 1080
            [Phenology].Vegetative.Target.FixedValue = 505
            [Phenology].Vegetative.Progression.PhotoperiodModifier.CriticalPhotoperiod = 10.5
        Cultivar 02_30C
          Command:
            [Leaf].LeafCohortParameters.MaxArea.Vegetative_to_Flowering.MaxArea.XYPairs.X = 1,  5,  10,  21
            [Leaf].LeafCohortParameters.MaxArea.Vegetative_to_Flowering.MaxArea.XYPairs.Y = 224,  224,  489, 1080
            [Phenology].Vegetative.Target.FixedValue = 400
            [Phenology].Vegetative.Progression.PhotoperiodModifier.CriticalPhotoperiod = 11
        Cultivar 02_23C
          Command:
            [Leaf].LeafCohortParameters.MaxArea.Vegetative_to_Flowering.MaxArea.XYPairs.X = 1,  5,  10,  21
            [Leaf].LeafCohortParameters.MaxArea.Vegetative_to_Flowering.MaxArea.XYPairs.Y = 224,  224,  489, 1080
            [Phenology].Vegetative.Target.FixedValue = 400
            [Phenology].Vegetative.Progression.PhotoperiodModifier.CriticalPhotoperiod = 11
        Cultivar 02_10C
          Command:
            [Leaf].LeafCohortParameters.MaxArea.Vegetative_to_Flowering.MaxArea.XYPairs.X = 1,  5,  10,  21
            [Leaf].LeafCohortParameters.MaxArea.Vegetative_to_Flowering.MaxArea.XYPairs.Y = 224,  224,  489, 1080
            [Phenology].Vegetative.Target.FixedValue = 500
            [Phenology].Vegetative.Progression.PhotoperiodModifier.CriticalPhotoperiod = 10.5
        Cultivar 02_03C
          Command:
            [Leaf].LeafCohortParameters.MaxArea.Vegetative_to_Flowering.MaxArea.XYPairs.X = 1,  5,  10,  21
            [Leaf].LeafCohortParameters.MaxArea.Vegetative_to_Flowering.MaxArea.XYPairs.Y = 224,  224,  489, 1080
            [Phenology].Vegetative.Target.FixedValue = 500
            [Phenology].Vegetative.Progression.PhotoperiodModifier.CriticalPhotoperiod = 10.5
        Cultivar 01_7C
          Command:
            [Leaf].LeafCohortParameters.MaxArea.Vegetative_to_Flowering.MaxArea.XYPairs.X = 1,  5,  10,  21
            [Leaf].LeafCohortParameters.MaxArea.Vegetative_to_Flowering.MaxArea.XYPairs.Y = 224,  224,  489, 1080
            [Phenology].Vegetative.Target.FixedValue = 485
            [Phenology].Vegetative.Progression.PhotoperiodModifier.CriticalPhotoperiod = 10.5
        Cultivar 01_61C
          Command:
            [Leaf].LeafCohortParameters.MaxArea.Vegetative_to_Flowering.MaxArea.XYPairs.X = 1,  5,  10,  21
            [Leaf].LeafCohortParameters.MaxArea.Vegetative_to_Flowering.MaxArea.XYPairs.Y = 224,  224,  489, 1080
            [Phenology].Vegetative.Target.FixedValue = 500
            [Phenology].Vegetative.Progression.PhotoperiodModifier.CriticalPhotoperiod = 10.5
        Cultivar 01_36C
          Command:
            [Leaf].LeafCohortParameters.MaxArea.Vegetative_to_Flowering.MaxArea.XYPairs.X = 1,  5,  10,  21
            [Leaf].LeafCohortParameters.MaxArea.Vegetative_to_Flowering.MaxArea.XYPairs.Y = 224,  224,  489, 1080
            [Phenology].Vegetative.Target.FixedValue = 600
            [Phenology].Vegetative.Progression.PhotoperiodModifier.CriticalPhotoperiod = 10
        Cultivar 00_40C
          Command:
            [Leaf].LeafCohortParameters.MaxArea.Vegetative_to_Flowering.MaxArea.XYPairs.X = 1,  5,  10,  21
            [Leaf].LeafCohortParameters.MaxArea.Vegetative_to_Flowering.MaxArea.XYPairs.Y = 224,  224,  489, 1080
            [Phenology].Vegetative.Target.FixedValue = 430
            [Phenology].Vegetative.Progression.PhotoperiodModifier.CriticalPhotoperiod = 10
        Cultivar 00_21C
          Command:
            [Leaf].LeafCohortParameters.MaxArea.Vegetative_to_Flowering.MaxArea.XYPairs.X = 1,  5,  10,  21
            [Leaf].LeafCohortParameters.MaxArea.Vegetative_to_Flowering.MaxArea.XYPairs.Y = 224,  224,  489, 1080
            [Phenology].Vegetative.Target.FixedValue = 500
            [Phenology].Vegetative.Progression.PhotoperiodModifier.CriticalPhotoperiod = 10.5
        Cultivar Ghab4
          Command:
            [Leaf].LeafCohortParameters.MaxArea.Vegetative_to_Flowering.MaxArea.XYPairs.X = 1,  5,  10,  21
            [Leaf].LeafCohortParameters.MaxArea.Vegetative_to_Flowering.MaxArea.XYPairs.Y = 224,  224,  489, 1080
            [Phenology].Vegetative.Target.FixedValue = 500
            [Phenology].Vegetative.Progression.PhotoperiodModifier.CriticalPhotoperiod = 10.5
        Cultivar Ghab5
          Command:
            [Leaf].LeafCohortParameters.MaxArea.Vegetative_to_Flowering.MaxArea.XYPairs.X = 1,  5,  10,  21
            [Leaf].LeafCohortParameters.MaxArea.Vegetative_to_Flowering.MaxArea.XYPairs.Y = 224,  224,  489, 1080
            [Phenology].Vegetative.Target.FixedValue = 500
            [Phenology].Vegetative.Progression.PhotoperiodModifier.CriticalPhotoperiod = 10.5
        Cultivar Ghab3
          Command:
            [Leaf].LeafCohortParameters.MaxArea.Vegetative_to_Flowering.MaxArea.XYPairs.X = 1,  5,  10,  21
            [Leaf].LeafCohortParameters.MaxArea.Vegetative_to_Flowering.MaxArea.XYPairs.Y = 224,  224,  489, 1080
            [Phenology].Vegetative.Target.FixedValue = 510
            [Phenology].Vegetative.Progression.PhotoperiodModifier.CriticalPhotoperiod = 10.5
      Constant MortalityRate: FixedValue=0
  Folder Validation
    Folder 2019_PulseAdaptation
      Memo
        Data from the one year GRDC funded 'Pulse Adaptation' project led by Allan Peake with assistance from Fernanda Dreccer, Jeremy Whish, Tony Swan
      Experiment Caragabal19_ (disabled)
        Memo
          Starting soil water taken in April 2019 - assumed the 15th.

          Extremely drought stressed trial, highly variable emergence date due to marginal soil water at sowing. Highly variable crop health even within plots, where some plants managed to get a tap root down while others were stunted and never really got going. Flowering data not very meaningful at this site for this reason.
        Factors
          Memo
            **Factors at Caragabal**

            ***Time of sowing***

            1. 8 May, 2019
            2. 17 June, 2019
            Only 2 TOS physically possible due to lack of rain.

            ***Cultivar***

            Almaz
            Genesis90
            HatTrick
            Kalkee
            Monarch
            Seamer
            Slasher
            Striker
          Permutation
            Factor TOS
              CompositeFactor 1: Specifications=[Sowing].Script.SowDate = 8-May
              CompositeFactor 2: Specifications=[Sowing].Script.SowDate = 17-Jun
            Factor Cv
              Specification=[Sowing].Script.CultivarName = Almaz,Genesis90,HatTrick,Kalkee,Monarch,Seamer,Slasher,Striker
        Simulation Caragabal19
          Weather: FileName=CaragabalPO.met
          Clock: Start=2019-04-01; End=2019-12-31
          Summary summaryfile
          SoilArbitrator Soil Arbitrator
          Zone Field: Area=1; Slope=0; AspectAngle=0; Altitude=50
            MicroClimate: a_interception=0; b_interception=1; c_interception=0; d_interception=0; soil_albedo=0.12; SoilHeatFluxFraction=0.4; MinimumHeightDiffForNewLayer=0; NightInterceptionFraction=0.5; ReferenceHeight=2
            Irrigation
            Fertiliser
            SurfaceOrganicMatter: InitialResidueName=maize; InitialResidueType=maize; InitialResidueMass=500; InitialStandingFraction=0; InitialCPR=0; InitialCNR=65
            Report: EventNames=[Clock].DoReport
              VariableNames:
                [Clock].Today
                [Soil].SoilWater.SW
                [Soil].SoilWater.Eo
                [Soil].SoilWater.Es
                [Soil].SoilWater.Drainage
                [Soil].SoilWater.Runoff
                [Soil].SoilWater.pond
                sum([Soil].SoilWater.SWmm) as ProfileWater
                [Soil].SoilNitrogen.NO3.kgha
                [MicroClimate].net_radn
                [MicroClimate].peta
                [MicroClimate].petr
                [Chickpea].
            Report HarvestReport: EventNames=[Chickpea].Harvesting
              VariableNames:
                [Clock].Today
                [Chickpea].Phenology.CurrentStageName as Stage
                [Chickpea].Phenology.FloweringDAS as FloweringDAS
                [Chickpea].Phenology.MaturityDAS as MaturityDAS
                [Chickpea].Grain.Live.Wt as GrainWt
                [Chickpea].AboveGround.Wt
                [Chickpea].Structure.BranchNumber
            Manager Harvesting
```csharp
using Models.PMF.Phen;
using System;
using Models.Core;
using System.Collections.Generic;
using System.Text;
using Models.Soils;
using Models.PMF;
using Models;
using System.Xml.Serialization;
using APSIM.Shared.Utilities;

namespace Models
{
    [Serializable] 
    public class Script : Model
    {      
        [Link] private Plant Chickpea;
        [Link] private Zone zone;
        [Link(Type = LinkType.Path, Path = "[Chickpea].Phenology")]
        private Phenology phenology;
                    
        
        [EventSubscribe("StartOfSimulation")]
        private void OnSimulationCommencing(object sender, EventArgs e)
        {
        }       
        
        [EventSubscribe("DoManagement")]
        private void OnDoManagement(object sender, EventArgs e)
        {
        if (phenology.CurrentPhase.Name=="ReadyForHarvesting")
           {
           Chickpea.Harvest();
           Chickpea.EndCrop();
           }
        }
        
        [EventSubscribe("DoManagementCalculations")]
        private void OnDoManagementCalculations(object sender, EventArgs e)
        {
            
        }
    }
}
```
            Plant Chickpea
            Manager Sowing
              SowDate = 25-Apr
              CultivarName = Jumbo2
              SowingDepth = 50
              RowSpacing = 230
              Population = 110
```csharp
using APSIM.Shared.Utilities;
using Models.Utilities;
using Models.Soils;
using Models.PMF;
using Models.Core;
using System;

namespace Models
{
    [Serializable]
    public class Script : Model
    {
        [Link] Clock Clock;
        [Link] Fertiliser Fertiliser;
        [Link] Summary Summary;
        [Link] Plant Canola;
        [Link] Soil Soil;
        Accumulator accumulatedRain;
        
        [Description("Sowing date (d-mmm)")]
        public string SowDate { get; set; }
        [Description("Cultivar to be sown")]
        public string CultivarName { get; set; }
        [Description("Sowing depth (mm)")]
        public double SowingDepth { get; set; }
        [Description("Row spacing (mm)")]
        public double RowSpacing { get; set; }
        [Description("Plant population (/m2)")]
        public double Population { get; set; }
        
        


        [EventSubscribe("DoManagement")]
        private void OnDoManagement(object sender, EventArgs e)
        {
        
            
            if (DateUtilities.WithinDates(SowDate, Clock.Today, SowDate))
            {
                Canola.Sow(population: Population, cultivar: CultivarName, depth: SowingDepth, rowSpacing: RowSpacing);    
            }
        
        }
        
    }
}
```
            Manager Reset on date
              ResetDate = 15-Apr
              ResetWater = Yes
              ResetSOM = No
```csharp
using Models.Interfaces;
using System;
using Models.Core;
using Models.PMF;
using Models.Soils;
using Models.Utilities;
using Models.Surface;
using APSIM.Shared.Utilities;

namespace Models
{
    [Serializable]
    public class Script : Model
    {
        [Link] private Clock Clock;
        [Link] private Plant Wheat;
        [Link] private ISoilWater SoilWater;
        [Link] private SurfaceOrganicMatter SOM;
        [Link] private Summary Summary;

        [Description("Date to reset on:")]
        public string ResetDate {get;set;}

        [Description("Reset Water? (Yes or No)")]
        public string ResetWater {get;set;}

        [Description("Reset Surface Organic Matter? (Yes or No)")]
        public string ResetSOM {get;set;}

        [EventSubscribe("DoManagement")]
        private void OnDoManagement(object sender, EventArgs e)
        {
            if (DateUtilities.WithinDates(ResetDate, Clock.Today, ResetDate))
            {
                if (ResetWater == "Yes")
                {
                    Summary.WriteMessage(this, "Reset Water");
                    SoilWater.Reset();
                }
                if (ResetSOM == "Yes")
                {
                    Summary.WriteMessage(this, "Reset Surface OM");
                    SOM.Reset();
                }
            }
        }
    }
}
```
            Soil: ASCOrder=Vertosol; SoilType=Clay; Site=Generic-Qld; State=Generic; Country=Australia; NaturalVegetation=NA; ApsoilNumber=517-GENERIC; Latitude=-27.183286; Longitude=151.263748; LocationAccuracy=Regional Soil Type; DataSource=Generic soil. CSIRO Sustainable Ecosystems, Toowoomba
              Comments=Generic soil developed by Allan Peake. 'Typical Vertosol' soil properties have been calculated as the average of vertosols with similar characteristics from within the Apsoil database. Groupings were made on the basis of bulk density. Measured BD, DUL and CLL for the groups were then averaged to derive the characteristics of the typical Vertosols. They can then be used in conjunction with measured soil water to simplify the selection of appropriate Vertosols, for paddocks where full soil characterisations have not yet been completed. For more information see Peake et al. 2010: ‘A rapid method for estimating the plant available water capacity of Vertosols’, 2010 Australian Agronomy Conference. Typical Vertosols are different to 'Generic' soil types elsewhere in the Apsoil database, which are representative of certain soil types and districts, but have not been calculated from large numbers of similar, characterised soils.
              Memo
                Typvert Vertosol No5 (PAWC-226 No517-Generic)
              Physical
                Thickness  BD    AirDry  LL15   DUL    SAT
                150        1.2   0.119   0.238  0.468  0.518
                150        1.23  0.197   0.246  0.457  0.507
                300        1.26  0.263   0.263  0.446  0.496
                300        1.3   0.263   0.263  0.43   0.48
                300        1.34  0.263   0.263  0.413  0.463
                300        1.37  0.263   0.263  0.403  0.453
                300        1.37  0.263   0.263  0.401  0.451
                SoilCrop LentilSoil: LL=[0.228, 0.227626, 0.263, 0.276, 0.306, 0.337, 0.401]; KL=[0.045, 0.045, 0.045, 0.03, 0.025, 0.02, 0.01]; XF=[1, 1, 1, 1, 1, 1, 1]
                  LL source: Field measured and checked for sensibility
                SoilCrop ChickpeaSoil: same as Validation.2019_PulseAdaptation.Caragabal19_.Caragabal19.Field.soil.Physical.LentilSoil
                SoilCrop WheatSoil: LL=[0.238, 0.246, 0.263, 0.276, 0.306, 0.337, 0.376]; KL=[0.06, 0.06, 0.06, 0.04, 0.04, 0.02, 0.02]; XF=[1, 1, 1, 1, 1, 1, 1]
                  LL source: Field measured and checked for sensibility
              WaterBalance SoilWater: SummerDate=1-Nov; SummerU=6; SummerCona=3.5; WinterDate=1-Apr; WinterU=4; WinterCona=2.5; DiffusConst=40; DiffusSlope=16; Salb=0.12; CN2Bare=73; CNRed=20; CNCov=0.8; Thickness=[150, 150, 300, 300, 300, 300, 300]; SWCON=[0.3, 0.3, 0.3, 0.3, 0.3, 0.3, 0.3]
              SoilNitrogen: fom_types=[default, manure, mucuna, lablab, shemp, stable]; fract_carb=[0.2, 0.3, 0.54, 0.57, 0.45, 0]; fract_cell=[0.7, 0.3, 0.37, 0.37, 0.47, 0.1]; fract_lign=[0.1, 0.4, 0.09, 0.06, 0.08, 0.9]; NPartitionApproach=0
                SoilNitrogenNO3 NO3
                SoilNitrogenNH4 NH4
                SoilNitrogenUrea Urea
                SoilNitrogenPlantAvailableNO3 PlantAvailableNO3
                SoilNitrogenPlantAvailableNH4 PlantAvailableNH4
              Organic: FOMCNRatio=40
                Thickness  Carbon  SoilCNRatio  FBiom  FInert  FOM
                150        1.3     12           0.04   0.4     347.129
                150        1.04    12           0.02   0.6     270.344
                300        0.65    12           0.02   0.8     163.972
                300        0.325   12           0.02   1       99.4541
                300        0.195   12           0.01   1       60.322
                300        0.13    12           0.01   1       36.5871
                300        0.13    12           0.01   1       22.1912
              Chemical: Thickness=[150, 150, 300, 300, 300, 300, 300]; PH=[6.7, 6.9, 7.7, 8.3, 8.5, 8.7, 8.5]
              Sample Initial conditions: Thickness=[150, 150, 300, 300, 300, 300, 300]; SWUnits=Volumetric; OCUnits=Total; PHUnits=Water
              CERESSoilTemperature Temperature
              Sample Initial Water: Thickness=[100, 200, 300, 300, 300, 300, 300]; SW=[0.234, 0.291, 0.279, 0.29, 0.322, 0.335, 0.327]; SWUnits=Volumetric; OCUnits=Total; PHUnits=Water
            Report RDDReport: EventNames=[Chickpea].Harvesting
              VariableNames:
                [Clock].Today
                [Chickpea].Phenology.RadDegDays
                [Chickpea].Phenology.EarlyPodSoilT
                [Chickpea].Phenology.EndFlower_PhotoPeriod
                [Chickpea].Phenology.FloweringDAS
                [Chickpea].Phenology.StartFlower_PhotoPeriod
      Experiment Emerald19_
        Factors
          Permutation
            Factor TOS
              CompositeFactor 1: Specifications=[Sowing].Script.SowDate = 10-May
              CompositeFactor 2: Specifications=[Sowing].Script.SowDate = 03-Jun
              CompositeFactor 3: Specifications=[Sowing].Script.SowDate = 27-Jun
            Factor Cv
              Specification=[Sowing].Script.CultivarName = HatTrick, Monarch, Drummond, Kalkee, Almaz, Seamer, CICA1521, Pistol, Kyabra
        Simulation Emerald19_
          Memo
            Emerald Site run by DAFQ, site leader was Doug Sands, assisted by Peter Agius. Definately no irrigation applied after 14th May, all trials were dryland

            May 10 plant – lentil emerged 16/5 ; chickpeas emerged about 19/5
            June 3 plant – lentil emerged about 12-13/6 ; chickpeas emerged about 15/6
            June 27 plant – lentil emerged about 7-8/7 ; chickpeas emerged 9-10/7

            I don’t recall if the desi and kabuli have different emergence dates but the lentil was fast and was always the first to emerge. Lentil seems to have plenty of vigour. If there were emergence differences between the chickpeas, it was minor.
          Weather: FileName=Emerald2019Combo.met
          Clock: Start=2019-05-01; End=2019-10-31
          Summary summaryfile
          SoilArbitrator Soil Arbitrator
          Zone Field: Area=1; Slope=0; AspectAngle=0; Altitude=50
            MicroClimate: a_interception=0; b_interception=1; c_interception=0; d_interception=0; soil_albedo=0.13; SoilHeatFluxFraction=0.4; MinimumHeightDiffForNewLayer=0; NightInterceptionFraction=0.5; ReferenceHeight=2
              Memo
                Albedo should be same as soil, ranging between 0.12 (dark clay) to 0.15 (light sand). Scope for larger values up to 0.19 on particularly light coloured sandy soils

                Height of 2m is for anemometer
            Irrigation
            Fertiliser
            SurfaceOrganicMatter: InitialResidueName=maize; InitialResidueType=maize; InitialResidueMass=500; InitialStandingFraction=0; InitialCPR=0; InitialCNR=65
            Report: EventNames=[Clock].DoReport
              VariableNames:
                [Clock].Today
                [Soil].SoilWater.SW
                [Soil].SoilWater.Eo
                [Soil].SoilWater.Es
                [Soil].SoilWater.Drainage
                [Soil].SoilWater.Runoff
                [Soil].SoilWater.pond
                sum([Soil].SoilWater.SWmm) as ProfileWater
                [Soil].SoilNitrogen.NO3.kgha
                [MicroClimate].net_radn
                [MicroClimate].peta
                [MicroClimate].petr
                [chickpea].
            Report HarvestReport: EventNames=[Chickpea].Harvesting
              VariableNames:
                [Clock].Today
                [Chickpea].Phenology.CurrentStageName as Stage
                [Chickpea].Phenology.FloweringDAS as FloweringDAS
                [Chickpea].Phenology.MaturityDAS as MaturityDAS
                [Chickpea].Grain.Live.Wt as GrainWt
                [Chickpea].AboveGround.Wt
            Manager Harvesting
              script: same as in Validation.2019_PulseAdaptation.Caragabal19_.Caragabal19.Field.Harvesting
            Plant Chickpea
            Manager Sowing
              SowDate = 25-Apr
              CultivarName = Amethyst
              SowingDepth = 50
              RowSpacing = 500
              Population = 30
              script: same as in Validation.2019_PulseAdaptation.Caragabal19_.Caragabal19.Field.Sowing
            Manager Reset on date
              ResetDate = 14-May
              ResetWater = Yes
              ResetSOM = No
              script: same as in Validation.2019_PulseAdaptation.Caragabal19_.Caragabal19.Field.Reset on date
            Soil Vertosol_No8: ASCOrder=Vertosol; SoilType=Clay; Site=Generic-Qld; State=Generic; Country=Australia; NaturalVegetation=NA; ApsoilNumber=519-GENERIC; Latitude=-27.183286; Longitude=151.263748; LocationAccuracy=Regional Soil Type; DataSource=Generic soil. CSIRO Sustainable Ecosystems, Toowoomba
              Comments=Generic soil developed by Allan Peake. 'Typical Vertosol' soil properties have been calculated as the average of vertosols with similar characteristics from within the Apsoil database. Groupings were made on the basis of bulk density. Measured BD, DUL and CLL for the groups were then averaged to derive the characteristics of the typical Vertosols. They can then be used in conjunction with measured soil water to simplify the selection of appropriate Vertosols, for paddocks where full soil characterisations have not yet been completed. For more information see Peake et al. 2010: ‘A rapid method for estimating the plant available water capacity of Vertosols’, 2010 Australian Agronomy Conference. Typical Vertosols are different to 'Generic' soil types elsewhere in the Apsoil database, which are representative of certain soil types and districts, but have not been calculated from large numbers of similar, characterised soils.
              Physical
                Thickness  BD    AirDry  LL15   DUL    SAT
                150        1.37  0.109   0.21   0.402  0.452
                150        1.35  0.18    0.224  0.411  0.461
                300        1.35  0.244   0.244  0.409  0.459
                300        1.41  0.244   0.244  0.388  0.438
                300        1.45  0.244   0.244  0.373  0.423
                300        1.5   0.244   0.244  0.354  0.404
                300        1.52  0.244   0.244  0.346  0.396
                SoilCrop ChickpeaSoil: LL=[0.21, 0.224, 0.244, 0.273, 0.312, 0.354, 0.346]; KL=[0.045, 0.045, 0.045, 0.03, 0.025, 0.02, 0.01]; XF=[1, 1, 1, 1, 1, 1, 1]
                  LL source: Field measured and checked for sensibility
              WaterBalance SoilWater: SummerDate=1-oct; SummerU=6; SummerCona=3.5; WinterDate=1-Apr; WinterU=4; WinterCona=2.5; DiffusConst=40; DiffusSlope=16; Salb=0.13; CN2Bare=73; CNRed=20; CNCov=0.8; Thickness=[150, 150, 300, 300, 300, 300, 300]; SWCON=[0.3, 0.3, 0.3, 0.3, 0.3, 0.3, 0.3]
              SoilNitrogen: fom_types=[default, manure, mucuna, lablab, shemp, stable]; fract_carb=[0.2, 0.3, 0.54, 0.57, 0.45, 0]; fract_cell=[0.7, 0.3, 0.37, 0.37, 0.47, 0.1]; fract_lign=[0.1, 0.4, 0.09, 0.06, 0.08, 0.9]; NPartitionApproach=0
                SoilNitrogenNO3 NO3
                SoilNitrogenNH4 NH4
                SoilNitrogenUrea Urea
                SoilNitrogenPlantAvailableNO3 PlantAvailableNO3
                SoilNitrogenPlantAvailableNH4 PlantAvailableNH4
              Organic: FOMCNRatio=40
                Thickness  Carbon  SoilCNRatio  FBiom  FInert  FOM
                150        1.3     12           0.04   0.4     347.129
                150        1.04    12           0.02   0.6     270.344
                300        0.65    12           0.02   0.8     163.972
                300        0.325   12           0.02   1       99.4541
                300        0.195   12           0.01   1       60.322
                300        0.13    12           0.01   1       36.5871
                300        0.13    12           0.01   1       22.1912
              Chemical: Thickness=[150, 150, 300, 300, 300, 300, 300]; PH=[8.4, 8.6, 8.6, 8, 7.1, 6.5, 6.5]
              Sample InitialSW: Thickness=[150, 150, 300, 300, 300, 300, 300]; SW=[0.387, 0.381, 0.382, 0.367, 0.345, 0.315, 0.295]; SWUnits=Volumetric; OCUnits=Total; PHUnits=Water
              CERESSoilTemperature Temperature
              Sample SoilNutrients: Thickness=[150, 150, 300, 300, 300, 300, 300]; SWUnits=Volumetric; OCUnits=Total; PHUnits=Water
            Report RDDReport: EventNames=[Chickpea].Harvesting
              VariableNames:
                [Clock].Today
                [Chickpea].Phenology.RadDegDays
      Experiment GreenethorpePhen19_
        Memo
          Greenethorpe phenology trial:

          Trial was sown by hand so sowing depth was variable and not recorded, establishment date also variable for the same reason. The important data for this trial is the rate of leafe appearance rather than the actual leaf number which is only simulated correctly where observed emergence date matches the simulation

          * all treatments are irrigated - "JW: For greenethorpe simulate unlimited. We tried to keep it unlimited but there would have been some stress no measure of water just applied when ever we were out there."
          * they use different TOS to the other Greenethorpe trial so will be simulated separately
          * there are only 2 TOS for the phenology trial at Greenethorpe
          * only treatments without lights used
          * phenology measurements up until the time of flowering only are recorded
        Factors
          Memo
            **Factors at Greenethorpe phenology trial**

            ***Time of sowing - only two done for the phelology trial***

            1. 18 April, 2019
            2. 21 May, 2019

            ***Cultivar***

            **Desi:**
            Boundary
            Drummond
            HatTrick
            Kalkee  (in data as Genesis_Kalkee)
            Kyabra
            Slasher
            Striker

            *Not at site:*

            Seamer
            Pistol

            *Kabuli:*

            Genesis90
            Monarch

            *Not at site:*

            Almaz
          Permutation
            Factor TOS
              CompositeFactor 1: Specifications=[Sowing].Script.SowDate = 18-Apr
              CompositeFactor 2: Specifications=[Sowing].Script.SowDate = 21-May
            Factor Cv
              Specification=[Sowing].Script.CultivarName = Boundary, Drummond, Genesis90, HatTrick, Kalkee, Kyabra, Monarch, Slasher, Striker,QuickKabuli
        Simulation GreenethorpePhen19
          Weather: FileName=GreenethorpeTTagTemp.met
          Clock: Start=2019-04-04; End=2019-12-30
          Summary summaryfile
          SoilArbitrator Soil Arbitrator
          Zone Field: Area=1; Slope=0; AspectAngle=0; Altitude=50
            MicroClimate: a_interception=0; b_interception=1; c_interception=0; d_interception=0; soil_albedo=0.13; SoilHeatFluxFraction=0.4; MinimumHeightDiffForNewLayer=0; NightInterceptionFraction=0.5; ReferenceHeight=2
            Irrigation
            Fertiliser
            SurfaceOrganicMatter: InitialResidueName=maize; InitialResidueType=maize; InitialResidueMass=500; InitialStandingFraction=0; InitialCPR=0; InitialCNR=65
            Report: EventNames=[Clock].DoReport
              VariableNames:
                [Clock].Today
                [Soil].SoilWater.SW
                [Soil].SoilWater.Eo
                [Soil].SoilWater.Es
                [Soil].SoilWater.Drainage
                [Soil].SoilWater.Runoff
                [Soil].SoilWater.pond
                sum([Soil].SoilWater.SWmm) as ProfileWater
                [Soil].SoilNitrogen.NO3.kgha
                [MicroClimate].net_radn
                [MicroClimate].peta
                [MicroClimate].petr
                [Lentil].
            Report HarvestReport: EventNames=[Chickpea].Harvesting
              VariableNames:
                [Clock].Today
                [Lentil].Phenology.CurrentStageName as Stage
                [Lentil].Phenology.FloweringDAS as FloweringDAS
                [Lentil].Phenology.MaturityDAS as MaturityDAS
                [Lentil].Grain.Live.Wt as GrainWt
                [Lentil].AboveGround.Wt
            Manager Harvesting: same as Validation.2019_PulseAdaptation.Emerald19_.Emerald19_.Field.Harvesting
            Plant Chickpea
            Manager Sowing
              SowDate = 30-Apr
              CultivarName = Amethyst
              SowingDepth = 50
              RowSpacing = 230
              Population = 35
              script: same as in Validation.2019_PulseAdaptation.Caragabal19_.Caragabal19.Field.Sowing
            Manager Automatic irrigation based on water deficit
              FASW = 0
              WaterDeficit = 0
              Crop = [Chickpea]
              AutoIrrigationOn = True
              FASWThreshold = 0.9
              FASWDepth = 600
              weeks = 1
              afterSowing = 1
```csharp
using Models.Interfaces;
using System;
using Models.Core;
using System.Collections.Generic;
using System.Text;
using Models.Soils;
using Models.PMF;
using Models;
using System.Xml.Serialization;
using APSIM.Shared.Utilities;

namespace Models
{
    [Serializable] 
    public class Script : Model
    {
        [Link] private Zone zone;
        [Link] private Irrigation irrigation;
        [Link] private Soil soil;
        [Link]
        private IPhysical soilPhysical;
        [Link]
        private ISoilWater waterBalance;
        public double FASW { get; set; }
        public double WaterDeficit  { get; set; }
    

        [Description("Crop to irrigate")]
        public IPlant Crop { get; set; }
        
        [Description("Auto irrigation on?")]
        public bool AutoIrrigationOn { get; set; }

        [Description("Threshold fraction available water (0-1)")]
        public double FASWThreshold { get; set; }

        [Description("Soil depth (mm) to which fraction available water is calculated")]
        public double FASWDepth { get; set; }

        [Description("Minimum weeks between irrigations")]
        public double weeks { get; set; }

        [Description("Minimum days after sowing for first irrigation")]
        public int afterSowing { get; set; }

        private double irrigationGap = 0;    // gap between irrigations

        [EventSubscribe("DoManagement")]
        private void OnDoManagement(object sender, EventArgs e)
        {
            if (AutoIrrigationOn && Crop.IsAlive)
            {
                   irrigationGap += 1;                // increment gap between irrigations
                CalculateFASW();                // calc FASW and WaterDeficit
                if ((FASW < FASWThreshold) && (irrigationGap >= weeks * 7))
                {
                    irrigation.Apply(WaterDeficit, depth: 0);
                    irrigationGap = 0;            // reset
                }
            }
            else
            {
                irrigationGap = weeks * 7 - afterSowing - 1;    // allow irrigation a number of days after it becomes alive/sown
            }
        }

        // Calculate the fraction of the potential available sw
        // Calculate the deficit amount from DUL
        private void CalculateFASW()
        {
            double[] LL15 = MathUtilities.Multiply(soilPhysical.LL15, soilPhysical.Thickness);
            double[] DUL = MathUtilities.Multiply(soilPhysical.DUL, soilPhysical.Thickness);
        
            int nlayr = GetLayerIndex(FASWDepth);
            double cumdep = MathUtilities.Sum(soilPhysical.Thickness, 0, nlayr, 0.0);    // tricky function that sums up to before nlayr

            double part_layer = MathUtilities.Divide((FASWDepth - cumdep), soilPhysical.Thickness[nlayr], 0.0);

            // note that results may be strange if swdep < ll15
            double avail_sw = (MathUtilities.Sum(waterBalance.SWmm, 0, nlayr, 0.0) + part_layer * waterBalance.SWmm[nlayr])
                            - (MathUtilities.Sum(LL15, 0, nlayr, 0.0) + part_layer * LL15[nlayr]);

            double pot_avail_sw = (MathUtilities.Sum(DUL, 0, nlayr, 0.0) + part_layer * DUL[nlayr])
                                - (MathUtilities.Sum(LL15, 0, nlayr, 0.0) + part_layer * LL15[nlayr]);
            
            FASW = MathUtilities.Divide(avail_sw, pot_avail_sw, 0.0);
            WaterDeficit = MathUtilities.Constrain(pot_avail_sw - avail_sw, 0.0, 100000);
        }

        // Get index of the layer that has this depth in it 
        private int GetLayerIndex(double pointDepth)
        {
            double[] cumThickness = soilPhysical.ThicknessCumulative;
            int layerIdx = 0;
            while ((layerIdx < cumThickness.Length) && (pointDepth > cumThickness[layerIdx]))
            {
                layerIdx += 1;
            }

            return layerIdx;
        }
    }
}
```
            Soil: SoilType=SNSW; Site=Front paddock; NearestTown=Young; Region=Southern NSW; State=NSW; Country=Australia; Latitude=0; Longitude=0; DataSource=Kirkegaard/Lilley
              Memo
                The soil for Greenethorpe was developed by Julianne Lilley:

                "Hi Elizabeth,

                Laura and I did a bit of playing around with this soil as I initially adapted something from a Young soil that I had characterised. The simulation I took it from was called Y:\WORK\OCP modelling\Greenethorpe_Iandra\greenethorpe_2013 and was saved on 16 jan 2019 , so this may be the last file we used. Jeremy has also been simulating at the Iandra site, so he may be worth asking, but I know he is not back at work yet.  Anyway this soil will be a good place to start.

                Cheers
                Julianne"

                **NOTE** chickpea kl values set same as lentil for starters.
              Physical
                Thickness  BD    AirDry  LL15   DUL    SAT
                100        1.5   0.08    0.08   0.25   0.28
                100        1.53  0.08    0.102  0.211  0.241
                200        1.56  0.1     0.156  0.232  0.262
                200        1.54  0.1     0.213  0.287  0.317
                200        1.54  0.15    0.241  0.311  0.341
                200        1.6   0.15    0.253  0.35   0.369
                200        1.62  0.15    0.258  0.35   0.369
                200        1.68  0.15    0.256  0.35   0.355
                200        1.69  0.15    0.268  0.35   0.357
                200        1.74  0.15    0.268  0.335  0.337
                200        1.7   0.15    0.268  0.335  0.344
                SoilCrop LentilSoil
                  LL=[0.102, 0.102, 0.156, 0.213, 0.241, 0.253, 0.258, 0.256, 0.268, 0.268, 0.268]
                  KL=[0.045, 0.045, 0.045, 0.045, 0.03, 0.02, 0.02, 0.02, 0.02, 0.01, 0.01]
                  XF=[1, 1, 1, 1, 1, 1, 0, 0, 0, 0, 0]
                  LL source: Field measured and checked for sensibility
                SoilCrop ChickpeaSoil: same as Validation.2019_PulseAdaptation.GreenethorpePhen19_.GreenethorpePhen19.Field.soil.Physical.LentilSoil
              WaterBalance SoilWater: SummerDate=1-Nov; SummerU=6; SummerCona=3.5; WinterDate=1-Apr; WinterU=4; WinterCona=2.5; DiffusConst=40; DiffusSlope=16; Salb=0.13; CN2Bare=73; CNRed=20; CNCov=0.8; Thickness=[100, 100, 200, 200, 200, 200, 200, 200, 200, 200, 200]; SWCON=[0.3, 0.3, 0.3, 0.3, 0.3, 0.3, 0.3, 0.3, 0.3, 0.3, 0.3]
              SoilNitrogen: same as Validation.2019_PulseAdaptation.Emerald19_.Emerald19_.Field.Vertosol_No8.SoilNitrogen
              Organic: FOMCNRatio=40
                Thickness  Carbon  SoilCNRatio  FBiom  FInert  FOM
                100        1       12           0.06   0.01    347.129
                100        0.35    12           0.05   0.01    270.344
                200        0.22    12           0.035  0.35    163.972
                200        0.22    12           0.015  0.425   99.4541
                200        0.18    12           0.01   0.55    60.322
                200        0.135   12           0.01   0.75    36.5871
                200        0.105   12           0.01   0.95    22.1912
                200        0.1     12           0.01   0.99    22.191
                200        0.1     12           0.01   0.99    22.191
                200        0.07    12           0.01   0.99    22.191
                200        0.045   12           0.01   0.99    22.191
              Chemical: Thickness=[100, 100, 200, 200, 200, 200, 200, 200, 200, 200, 200]; PH=[5.8, 5.9, 6.7, 7.05, 7.25, 7.4, 7.7, 8.1, 8.35, 8.45, 8.5]
              CERESSoilTemperature Temperature
              Sample Initial Water: Thickness=[100, 100, 200, 200, 200, 200, 200, 200, 200, 200, 200]; SWUnits=Volumetric; OCUnits=Total; PHUnits=Water
                SW=[0.25, 0.211, 0.232, 0.287, 0.311, 0.35, 0.35, 0.35, 0.35, 0.335, 0.335]
            Report RDDReport: EventNames=[Clock].DoReport
              VariableNames:
                [Clock].Today
                [Chickpea].Phenology.RadDegDays
                [Chickpea].Phenology.EarlyPodSoilT
                [Chickpea].Phenology.EndFlower_PhotoPeriod
                [Chickpea].Phenology.FloweringDAS
                [Chickpea].Phenology.StartFlower_PhotoPeriod
                [Phenology].Stage
      Experiment Mildura19_
        Memo
          Trial conducted by Michael Moodie (Frontier Farming Systems) on behalf of pulse adaptaton project led by Allan Peake.

          Emergence observed approx 11 days after sowing for lentils, 14 days for Desi chickpea and 16 days Kabuli chickpea. Sowing depth 6cm.

          Trickle tape on the row was used to irrigated each sowing, so the irrigation was not even distributed. This concentration of water on the seed zone probably led to different growth patterns in the crop and makes the experiment more difficult to simulate
        Factors
          Memo
            **Factors at Emerald**

            ***Time of sowing***

            1. 1 May, 2019
            2. 18 May, 2019
            3. 7 June, 2019

            ***Cultivar***

            PBA Jumbo 2
            PBA Blitz
            PBA Ace
            PBA Hallmark XT
            PBA Greenfield
          Permutation
            Factor TOS
              CompositeFactor 1
                Specifications:
                  [Sowing].Script.SowDate = 1-May
                  [Sowing].Script.Population = 35
                  [Irrigate].Script.IrrigateDates = 2-May
              CompositeFactor 2
                Specifications:
                  [Sowing].Script.SowDate = 18-May
                  [Sowing].Script.Population = 27
                  [Irrigate].Script.IrrigateDates = 20-May
              CompositeFactor 3
                Specifications:
                  [Sowing].Script.SowDate = 07-Jun
                  [Sowing].Script.Population = 35
                  [Irrigate].Script.IrrigateDates = 09-Jun
            Factor Cv
              Specification=[Sowing].Script.CultivarName = HatTrick, Genesis90, Monarch, Almaz, Kalkee, Seamer, Striker, Slasher, CICA1521
        Simulation Mildura19
          Weather: FileName=MildurahPO.met
          Clock: Start=2019-04-30; End=2019-11-30
          Summary summaryfile
          SoilArbitrator Soil Arbitrator
          Zone Field: Area=1; Slope=0; AspectAngle=0; Altitude=50
            MicroClimate: a_interception=0; b_interception=1; c_interception=0; d_interception=0; soil_albedo=0.15; SoilHeatFluxFraction=0.4; MinimumHeightDiffForNewLayer=0; NightInterceptionFraction=0.5; ReferenceHeight=2
            Irrigation
            Fertiliser
            SurfaceOrganicMatter: InitialResidueName=maize; InitialResidueType=maize; InitialResidueMass=500; InitialStandingFraction=0; InitialCPR=0; InitialCNR=65
            Report: EventNames=[Clock].DoReport
              VariableNames:
                [Clock].Today
                [Soil].SoilWater.SW
                [Soil].SoilWater.Eo
                [Soil].SoilWater.Es
                [Soil].SoilWater.Drainage
                [Soil].SoilWater.Runoff
                [Soil].SoilWater.pond
                sum([Soil].SoilWater.SWmm) as ProfileWater
                [Soil].SoilNitrogen.NO3.kgha
                [MicroClimate].net_radn
                [MicroClimate].peta
                [MicroClimate].petr
            Report HarvestReport: EventNames=[Chickpea].Harvesting
              VariableNames:
                [Clock].Today
                [Chickpea].Phenology.CurrentStageName as Stage
                [Chickpea].Phenology.FloweringDAS as FloweringDAS
                [Chickpea].Phenology.MaturityDAS as MaturityDAS
                [Chickpea].Grain.Live.Wt as GrainWt
                [Chickpea].AboveGround.Wt
                [Chickpea].Structure.BranchNumber
            Manager Harvesting: same as Validation.2019_PulseAdaptation.Emerald19_.Emerald19_.Field.Harvesting
            Manager Sowing
              SowDate = 1-jun
              CultivarName = HatTrick
              SowingDepth = 50
              RowSpacing = 280
              Population = 40
              script: same as in Validation.2019_PulseAdaptation.Caragabal19_.Caragabal19.Field.Sowing
            Manager Irrigate
              IrrigateDates = 24-jan
              Amount = 13
              Depth = 0
              Efficiency = 1
              WillRunoff = False
```csharp
using APSIM.Shared.Utilities;
using Models.PMF;
using Models.Core;
using System;
namespace Models
{
    [Serializable]
    public class Script : Model
    {
        [Link] Clock Clock;
        [Link] Irrigation Irrigation;
        
        [Separator("A component to apply irrigation on one or more dates on every year of the simulation")]

        [Description("Enter the irrigation dates as dd-mmm with comma separation (any year information entered will be ignored)")] 
        public string[] IrrigateDates { get; set; }
        
        [Description("Amount of irrigation to be applied (mm)")] 
        public double Amount { get; set; }
        
        [Description("Depth in the soil to apply the  irrigation (mm)")] 
        public double Depth { get; set; }
        
        [Description("Efficiency of irrigation (0-1)")] 
        public double Efficiency { get; set; }
        
        [Description("Will the irrigation runoff?")] 
        public bool WillRunoff { get; set; }
        
        [EventSubscribe("DoManagement")]
        private void OnDoManagement(object sender, EventArgs e)
        {
            foreach (string ddMMM in IrrigateDates)
            {
                if (DateUtilities.DatesEqual(ddMMM, Clock.Today))
                    Irrigation.Apply(amount: Amount, depth: Depth, efficiency: Efficiency, willRunoff: WillRunoff);
            }
        }
    }
}
```
            Soil: ASCOrder=Calcarosol; SoilType=Sandy loam; Site=Kerribee; NearestTown=Paringi; Region=Lower Western; State=New South Wales; Country=Australia; NaturalVegetation=Belah and mallee; ApsoilNumber=359; Latitude=-34.288; Longitude=142.371; LocationAccuracy=+/- 20m
              DataSource=Based on Soil Characterisation undertaken by Whitbread/Davoren GRDC Soil water project and Jeff Baldock MSF data
              Physical
                Thickness  ParticleSizeClay  BD     AirDry  LL15   DUL   SAT    KS
                100        10.6              1.286  0.016   0.06   0.13  0.46   0
                200        15.2              1.486  0.048   0.06   0.13  0.39   0
                300        17.7              1.471  0.07    0.1    0.25  0.396  0
                300        21.9              1.59   0.1     0.168  0.31  0.38   0
                300        21.2              1.59   0.11    0.19   0.32  0.38   0
                300        22.1              1.626  0.11    0.19   0.32  0.38   0
                300        22.1              1.626  0.11    0.19   0.32  0.38   0
                SoilCrop ChickpeaSoil: LL=[0.06, 0.06, 0.1, 0.168, 0.19, 0.22, 0.25]; KL=[0.022, 0.022, 0.022, 0.02, 0.015, 0.01, 0.005]; XF=[1, 1, 1, 1, 1, 1, 0]
              WaterBalance SoilWater: SummerDate=1-Oct; SummerU=2; SummerCona=4.5; WinterDate=1-Apr; WinterU=2; WinterCona=3.9; DiffusConst=250; DiffusSlope=22; Salb=0.15; CN2Bare=70; CNRed=20; CNCov=0.8; Thickness=[100, 100, 200, 200, 200, 200, 200, 300]; SWCON=[0.7, 0.7, 0.5, 0.5, 0.5, 0.3, 0.3, 0.3]
              SoilNitrogen: same as Validation.2019_PulseAdaptation.Emerald19_.Emerald19_.Field.Vertosol_No8.SoilNitrogen
              Organic: FOMCNRatio=40
                Thickness  Carbon    SoilCNRatio  FBiom  FInert    FOM
                100        0.47      13.8         0.04   0.5       301.302
                200        0.325     13.8         0.02   0.7       206.0215
                300        0.246667  13.8         0.02   0.933333  129.015
                300        0.213333  13.8         0.01   1         66.135
                300        0.2       13.8         0.01   1         38.8583
                300        0.2       13.8         0.01   1         18.322
                300        0.2       13.8         0.01   1         18.322
              Chemical: Thickness=[100, 200, 300, 300, 300, 300, 300]; PH=[7.1, 7.95, 8.16667, 8.43333, 8.5, 8.5, 8.5]
              CERESSoilTemperature Temperature
              Sample Initial Water: Thickness=[100, 200, 300, 300, 300, 300, 300]; SW=[0.105, 0.149, 0.225, 0.257, 0.255, 0.225, 0.19]; SWUnits=Volumetric; OCUnits=Total; PHUnits=Water
            Plant Chickpea
            Report RDDReport: EventNames=[Chickpea].Harvesting
              VariableNames:
                [Clock].Today
                [Chickpea].Phenology.RadDegDays
            Report IrrigWaterreport: EventNames=[Chickpea].Harvesting
              VariableNames:
                [Clock].Today
                [Irrigation].IrrigationApplied
                [Soil].SoilWater.SW
                [Soil].SoilWater.Eo
                [Soil].SoilWater.Es
                [Soil].SoilWater.Drainage
                [Soil].SoilWater.Runoff
                [Soil].SoilWater.pond
                sum([Soil].SoilWater.SWmm) as ProfileWater
                ([Soil].SoilWater.SWmm[1]+[Soil].SoilWater.SWmm[2]+[Soil].SoilWater.SWmm[3]+[Soil].SoilWater.SWmm[4]+[Soil].SoilWater.SWmm[5]) as ProfWatTop5Layers
        Memo
          The observed data for early branches at Mildura is the tiller count, in units of number/m2
      Experiment Walgett19_
        Memo
          **Time of sowing - none for TOS2 (wild pigs uprooted seed from 2nd TOS)

          **Plant population** - initial population averaged at 23 plants/m2; used 30 plants/m2 for the high population treatments.

          **Met file for Walgett** - trial site located at -30.538537,148.614925 near Come By Chance. Several options in SILO:

          * Bungle Gully, Come by Chance is approx 5 km from site
          * Come by Chance store is approx 20 km from site
          * Grid -30.55,148.60 is approx 2 km from site  --> this met file was selected as is the closest. Combined with TTag data from site

          A difficult site to simulate. Felt that the 1st 2 biomass cuts may have been taken on 1/2 the stated area (which would explain why obs=2xpredicted). However trial cooperator is adamant that cut areas were correct, and says he felt the crop growth pattern was unusual, with extremely rapid growth after emergence. could there have been a residual herbicide effect? Also potential for nutrient deficiency as we still ended up over-simulating yield from TOS1 by a factor of 2, whereas TOS 2 was simulated accurately for yield when biomass was lower (i.e. less likely to experience nutrient deficiency).
        Factors
          Memo
            **Factors at Walgett for lentils**

            ***Time of sowing***

            1. 21 May, 2019
            2. 9 June, 2019
            3. 28 June, 2019

            Starting soil water measured on 19 May before first sowing so same reset to 19 May was simulated for all TOS.

            ***Cultivar***

            Almaz
            Boundary
            Genesis90
            HatTrick
            Kalkee
            Kyabra
            Monarch
            Seamer

            **Plant population**

            Planting density was unknown; initially set to:

            * 40 plants/m2 for 'usual' plantings, and
            * 55 plants/m2 for high density plantings

            High plant populations in field were only sown for HatTrick and Monarch. All cultivars were simulated at the two plant densities in the factorial but results are graphed only for the cultivars that have field data.
          Permutation
            Factor TOS
              CompositeFactor 1: Specifications=[Sowing].Script.SowDate = 21-May
              CompositeFactor 3: Specifications=[Sowing].Script.SowDate = 28-Jun
            Factor Cv
              Specification=[Sowing].Script.CultivarName = Almaz,Boundary,Genesis90,HatTrick,Kalkee,Kyabra,Monarch,Seamer,QuickKabuli
            Factor Pop
              CompositeFactor 23: Specifications=[Sowing].Script.Population = 23
              CompositeFactor 30: Specifications=[Sowing].Script.Population = 30
        Simulation Walgett19
          Weather: FileName=WalgettTTagCombo2019.met
          Clock: Start=2019-05-07; End=2019-11-30
          Summary summaryfile
          SoilArbitrator Soil Arbitrator
          Zone Field: Area=1; Slope=0; AspectAngle=0; Altitude=50
            MicroClimate: a_interception=0; b_interception=1; c_interception=0; d_interception=0; soil_albedo=0.14; SoilHeatFluxFraction=0.4; MinimumHeightDiffForNewLayer=0; NightInterceptionFraction=0.5; ReferenceHeight=2
            Irrigation
            Fertiliser
            SurfaceOrganicMatter: InitialResidueName=wheat; InitialResidueType=wheat; InitialResidueMass=1500; InitialStandingFraction=0; InitialCPR=0; InitialCNR=80
            Report: EventNames=[Clock].DoReport
              VariableNames:
                [Clock].Today
                [Soil].SoilWater.SW
                [Soil].SoilWater.Eo
                [Soil].SoilWater.Es
                [Soil].SoilWater.Drainage
                [Soil].SoilWater.Runoff
                [Soil].SoilWater.pond
                sum([Soil].SoilWater.SWmm) as ProfileWater
                [Soil].SoilNitrogen.NO3.kgha
                [MicroClimate].net_radn
                [MicroClimate].peta
                [MicroClimate].petr
                [Chickpea].
            Report HarvestReport: same as Validation.2019_PulseAdaptation.Mildura19_.Mildura19.Field.HarvestReport
            Manager Harvesting: same as Validation.2019_PulseAdaptation.Emerald19_.Emerald19_.Field.Harvesting
            Plant Chickpea
            Manager Sowing
              SowDate = 25-Apr
              CultivarName = Amethyst
              SowingDepth = 50
              RowSpacing = 375
              Population = 23
              script: same as in Validation.2019_PulseAdaptation.Caragabal19_.Caragabal19.Field.Sowing
            Manager Reset on date
              ResetDate = 19-May
              ResetWater = Yes
              ResetSOM = No
              script: same as in Validation.2019_PulseAdaptation.Caragabal19_.Caragabal19.Field.Reset on date
            Report RDDReport: EventNames=[Chickpea].Harvesting
              VariableNames:
                [Clock].Today
                [Chickpea].Phenology.RadDegDays
            Soil (disabled): ASCOrder=Vertosol; SoilType=Clay; Site=Generic-Qld; State=Generic; Country=Australia; NaturalVegetation=NA; ApsoilNumber=523-GENERIC; Latitude=-27.183286; Longitude=151.263748; LocationAccuracy=Regional Soil Type; DataSource=Generic soil. CSIRO Sustainable Ecosystems, Toowoomba
              Comments=Generic soil developed by Allan Peake. 'Typical Vertosol' soil properties have been calculated as the average of vertosols with similar characteristics from within the Apsoil database. Groupings were made on the basis of bulk density. Measured BD, DUL and CLL for the groups were then averaged to derive the characteristics of the typical Vertosols. They can then be used in conjunction with measured soil water to simplify the selection of appropriate Vertosols, for paddocks where full soil characterisations have not yet been completed. For more information see Peake et al. 2010: ‘A rapid method for estimating the plant available water capacity of Vertosols’, 2010 Australian Agronomy Conference. Typical Vertosols are different to 'Generic' soil types elsewhere in the Apsoil database, which are representative of certain soil types and districts, but have not been calculated from large numbers of similar, characterised soils.
              Memo
                This soil is AP's TypVert 11 "Vertosol No11 (PAWC-136 No523-Generic)".
              Physical
                Thickness  BD    AirDry  LL15   DUL    SAT
                150        1.59  0.089   0.16   0.32   0.37
                150        1.62  0.14    0.17   0.308  0.358
                300        1.59  0.16    0.189  0.321  0.371
                300        1.58  0.19    0.195  0.322  0.372
                300        1.61  0.19    0.206  0.312  0.362
                300        1.64  0.19    0.215  0.301  0.351
                300        1.7   0.19    0.23   0.28   0.329
                SoilCrop ChickpeaSoil: LL=[0.16, 0.17, 0.189, 0.195, 0.206, 0.215, 0.23]; KL=[0.033, 0.033, 0.033, 0.022, 0.018, 0.015, 0.12]; XF=[1, 1, 1, 1, 1, 1, 1]
                  LL source: Field measured and checked for sensibility
                SoilCrop LentilSoil
                  LL=[0.119912, 0.195459, 0.192306, 0.194867, 0.201156, 0.25, 0.28]
                  KL=[0.033, 0.033, 0.033, 0.022, 0.018, 0.015, 0.075]
                  XF=[1, 1, 1, 1, 1, 1, 1]
                  LL source: Field measured and checked for sensibility
                SoilCrop WheatSoil: LL=[0.177, 0.175, 0.19, 0.22, 0.251, 0.278, 0.28]; KL=[0.06, 0.06, 0.06, 0.04, 0.04, 0.02, 0.02]; XF=[1, 1, 1, 1, 1, 1, 1]
                  LL source: Field measured and checked for sensibility
              WaterBalance SoilWater: SummerDate=1-Nov; SummerU=2; SummerCona=4.5; WinterDate=1-Apr; WinterU=2; WinterCona=4; DiffusConst=88; DiffusSlope=35; Salb=0.14; CN2Bare=73; CNRed=20; CNCov=0.8; Thickness=[150, 150, 300, 300, 300, 300, 300]; SWCON=[0.3, 0.3, 0.3, 0.3, 0.3, 0.3, 0.3]
              SoilNitrogen: same as Validation.2019_PulseAdaptation.Caragabal19_.Caragabal19.Field.soil.SoilNitrogen
              Organic: FOMCNRatio=40
                Thickness  Carbon  SoilCNRatio  FBiom  FInert  FOM
                150        1.17    12           0.04   0.4     347.129
                150        0.936   12           0.02   0.6     270.344
                300        0.585   12           0.02   0.8     163.972
                300        0.2925  12           0.02   1       99.4541
                300        0.1755  12           0.01   1       60.322
                300        0.117   12           0.01   1       36.5871
                300        0.117   12           0.01   1       22.1912
              Chemical: Thickness=[150, 150, 300, 300, 300, 300, 300]; PH=[8.1, 8.7, 8.9, 8, 7, 6.4, 5.8]
              Sample Initial conditions: Thickness=[150, 150, 300, 300, 300, 300, 300]; SWUnits=Volumetric; OCUnits=Total; PHUnits=Water
                SW=[0.19875, 0.281556, 0.304008, 0.303202, 0.296562, 0.297, 0.297]
              CERESSoilTemperature Temperature
            Soil Comeby: ASCOrder=Vertosol; SoilType=Clay; Site=Generic-Qld; State=Generic; Country=Australia; NaturalVegetation=NA; ApsoilNumber=523-GENERIC; Latitude=-27.183286; Longitude=151.263748; LocationAccuracy=Regional Soil Type; DataSource=Generic soil. CSIRO Sustainable Ecosystems, Toowoomba
              Comments=Generic soil developed by Allan Peake. 'Typical Vertosol' soil properties have been calculated as the average of vertosols with similar characteristics from within the Apsoil database. Groupings were made on the basis of bulk density. Measured BD, DUL and CLL for the groups were then averaged to derive the characteristics of the typical Vertosols. They can then be used in conjunction with measured soil water to simplify the selection of appropriate Vertosols, for paddocks where full soil characterisations have not yet been completed. For more information see Peake et al. 2010: ‘A rapid method for estimating the plant available water capacity of Vertosols’, 2010 Australian Agronomy Conference. Typical Vertosols are different to 'Generic' soil types elsewhere in the Apsoil database, which are representative of certain soil types and districts, but have not been calculated from large numbers of similar, characterised soils.
              Memo
                This soil is AP's TypVert 11 "Vertosol No11 (PAWC-136 No523-Generic)".
              Physical
                Thickness  BD    AirDry  LL15   DUL    SAT
                150        1.59  0.089   0.16   0.32   0.37
                150        1.62  0.14    0.17   0.308  0.358
                300        1.59  0.16    0.189  0.321  0.371
                300        1.58  0.19    0.195  0.322  0.372
                300        1.61  0.19    0.206  0.312  0.362
                300        1.64  0.19    0.215  0.301  0.351
                300        1.7   0.19    0.23   0.28   0.329
                SoilCrop ChickpeaSoil: LL=[0.16, 0.17, 0.189, 0.195, 0.206, 0.215, 0.23]; KL=[0.045, 0.045, 0.045, 0.033, 0.025, 0.02, 0.01]; XF=[1, 1, 1, 1, 1, 1, 1]
                  LL source: Field measured and checked for sensibility
                SoilCrop LentilSoil
                  LL=[0.119912, 0.195459, 0.192306, 0.194867, 0.201156, 0.25, 0.28]
                  KL=[0.033, 0.033, 0.033, 0.022, 0.018, 0.015, 0.075]
                  XF=[1, 1, 1, 1, 1, 1, 1]
                  LL source: Field measured and checked for sensibility
                SoilCrop WheatSoil: LL=[0.177, 0.175, 0.19, 0.22, 0.251, 0.278, 0.28]; KL=[0.06, 0.06, 0.06, 0.04, 0.04, 0.02, 0.02]; XF=[1, 1, 1, 1, 1, 1, 1]
                  LL source: Field measured and checked for sensibility
              WaterBalance SoilWater: SummerDate=1-Nov; SummerU=2; SummerCona=4.5; WinterDate=1-Apr; WinterU=2; WinterCona=4; DiffusConst=88; DiffusSlope=35; Salb=0.14; CN2Bare=73; CNRed=20; CNCov=0.8; Thickness=[150, 150, 300, 300, 300, 300, 300]; SWCON=[0.3, 0.3, 0.3, 0.3, 0.3, 0.3, 0.3]
              SoilNitrogen: same as Validation.2019_PulseAdaptation.Emerald19_.Emerald19_.Field.Vertosol_No8.SoilNitrogen
              Organic: FOMCNRatio=40
                Thickness  Carbon  SoilCNRatio  FBiom  FInert  FOM
                150        1.17    12           0.04   0.4     347.129
                150        0.936   12           0.02   0.6     270.344
                300        0.585   12           0.02   0.8     163.972
                300        0.2925  12           0.02   1       99.4541
                300        0.1755  12           0.01   1       60.322
                300        0.117   12           0.01   1       36.5871
                300        0.117   12           0.01   1       22.1912
              Chemical: Thickness=[150, 150, 300, 300, 300, 300, 300]; PH=[8.1, 8.7, 8.9, 8, 7, 6.4, 5.8]
              Sample Initial conditions: Thickness=[150, 150, 300, 300, 300, 300, 300]; SWUnits=Volumetric; OCUnits=Total; PHUnits=Water
                SW=[0.19875, 0.281556, 0.304008, 0.303202, 0.296562, 0.297, 0.297]
              CERESSoilTemperature Temperature
        Folder ProfileWater_Genesis90Only
          Memo
            Soil water measured only in HatTrick for Desi and Genesis90 for Kabuli Chickpeas.
        Folder ProfileWater_HatTrickOnly
          Memo
            Soil water measured only in HatTrick for Desi and Genesis90 for Kabuli Chickpeas.
      Experiment Greenethorpe_2019_
        Memo
          Planting density information by TOS was available. It differed broadly by TOS and so average density for TOS used for all cvv.

          Initial SW across site is quite variable - question whether appropriate to model as factorial? Variability probably due to micro-environment variations at specific location fo soil cores, so factorial design was retained.

          **Met file** - based on SILO but used local TTag at trial for max/minT, because trial is at a different point in the landscape to the SILO station
        Factors
          Memo
            **Factors at Greenethorpe**

            ***Time of sowing***

            1. 30 April, 2019
            2. 21 May, 2019
            3. 12 June, 2019

            Initial SW at TOS based on 15/4 measurement for all TOS; measurement of SW for irrig and dryland treatments averaged for TOS since first irrigation not applied until after this measurement.

            ***Cultivar***

            **Desi:**
            HatTrick
            Striker
            Slasher

            *Not at site:*
            Kyabra
            Drummond
            Seamer
            Boundary
            Pistol

            *Kabuli:*
            Monarch
            Genesis90

            *Not at site:*
            Kalkee
            Almaz
          Permutation
            Factor TOS
              CompositeFactor 1: Specifications=[Sowing].Script.SowDate = 30-Apr
              CompositeFactor 2: Specifications=[Sowing].Script.SowDate = 21-May
              CompositeFactor 3: Specifications=[Sowing].Script.SowDate = 12-Jun
            Factor Cv
              Specification=[Sowing].Script.CultivarName = Genesis90, HatTrick, Monarch, Slasher, Striker,QuickKabuli
            Factor Irr
              CompositeFactor 0
                Specifications:
                  [IrrigateFixedDates].Script.Amount = 0.0
                  [IrrigateOnSow_TOS2only].Script.Amount = 0.0
              CompositeFactor 1
                Specifications:
                  [IrrigateFixedDates].Script.Amount = 10.0
                  [IrrigateOnSow_TOS2only].Script.Amount = 15.0
        Simulation Greenethorpe_2019_
          Weather: FileName=GreenethorpeTTagTemp.met
          Clock: Start=2019-04-10; End=2019-12-30
          Summary summaryfile
          SoilArbitrator Soil Arbitrator
          Zone Field: Area=1; Slope=0; AspectAngle=0; Altitude=50
            MicroClimate: a_interception=0; b_interception=1; c_interception=0; d_interception=0; soil_albedo=0.13; SoilHeatFluxFraction=0.4; MinimumHeightDiffForNewLayer=0; NightInterceptionFraction=0.5; ReferenceHeight=2
            Irrigation
            Fertiliser
            SurfaceOrganicMatter: InitialResidueName=maize; InitialResidueType=maize; InitialResidueMass=500; InitialStandingFraction=0; InitialCPR=0; InitialCNR=65
            Report: same as Validation.2019_PulseAdaptation.Walgett19_.Walgett19.Field.Report
            Report HarvestReport: EventNames=[Chickpea].Harvesting
              VariableNames:
                [Clock].Today
                [Chickpea].Phenology.CurrentStageName as Stage
                [Chickpea].Phenology.FloweringDAS as FloweringDAS
                [Chickpea].Phenology.MaturityDAS as MaturityDAS
                [Chickpea].Grain.Live.Wt as GrainWt
                [Chickpea].AboveGround.Wt
            Manager Harvesting: same as Validation.2019_PulseAdaptation.Emerald19_.Emerald19_.Field.Harvesting
            Plant Chickpea
            Manager Sowing
              SowDate = 30-Apr
              CultivarName = Amethyst
              SowingDepth = 50
              RowSpacing = 230
              Population = 46
              script: same as in Validation.2019_PulseAdaptation.Caragabal19_.Caragabal19.Field.Sowing
            Manager Reset on date
              ResetDate = 15-apr
              ResetWater = Yes
              ResetSOM = No
              script: same as in Validation.2019_PulseAdaptation.Caragabal19_.Caragabal19.Field.Reset on date
            Manager Fertilise at sowing
              Crop = [Chickpea]
              FertiliserType = UreaN
              Amount = 4
```csharp
using Models.PMF;
using Models.Core;
using System;
namespace Models
{
    [Serializable]
    public class Script : Model
    {
        [Link] Clock Clock;
        [Link] Fertiliser Fertiliser;
        
        [Description("Crop to be fertilised")]
        public IPlant Crop { get; set; }

        [Description("Type of fertiliser to apply? ")] public Fertiliser.Types FertiliserType { get; set; }

    
        [Description("Amount of fertiliser to be applied (kg/ha)")]
        public double Amount { get; set; }
        
        [EventSubscribe("Sowing")]
        private void OnSowing(object sender, EventArgs e)
        {
            Model crop = sender as Model;
            if (Crop != null && crop.Name.ToLower() == (Crop as IModel).Name.ToLower())
                Fertiliser.Apply(Amount: Amount, Type: FertiliserType);
        }
        
    }
}
```
            Manager IrrigateOnSow_TOS2only
              IrrigateDates = 21-may
              Amount = 15
              Depth = 0
              Efficiency = 0.8
              WillRunoff = False
              script: same as in Validation.2019_PulseAdaptation.Mildura19_.Mildura19.Field.Irrigate
            Manager IrrigateFixedDates
              IrrigateDates = 13-aug,14-aug,15-aug,26-aug,31-aug,03-sep,25-sep,30-sep,1-oct
              Amount = 10
              Depth = 0
              Efficiency = 0.8
              WillRunoff = True
              script: same as in Validation.2019_PulseAdaptation.Mildura19_.Mildura19.Field.Irrigate
            Soil: SoilType=SNSW; Site=Front paddock; NearestTown=Young; Region=Southern NSW; State=NSW; Country=Australia; Latitude=0; Longitude=0; DataSource=Kirkegaard/Lilley
              Memo
                The soil for Greenethorpe was developed by Julianne Lilley:

                "Hi Elizabeth,

                Laura and I did a bit of playing around with this soil as I initially adapted something from a Young soil that I had characterised. The simulation I took it from was called Y:\WORK\OCP modelling\Greenethorpe_Iandra\greenethorpe_2013 and was saved on 16 jan 2019 , so this may be the last file we used. Jeremy has also been simulating at the Iandra site, so he may be worth asking, but I know he is not back at work yet.  Anyway this soil will be a good place to start.

                Cheers
                Julianne"

                **Chickpea soil properties** set same as for lentil.
              Physical
                Thickness  BD    AirDry  LL15   DUL    SAT
                100        1.5   0.08    0.08   0.25   0.28
                100        1.53  0.08    0.102  0.211  0.241
                200        1.56  0.1     0.156  0.232  0.262
                200        1.54  0.1     0.213  0.287  0.317
                200        1.54  0.15    0.241  0.311  0.341
                200        1.6   0.15    0.253  0.35   0.369
                200        1.62  0.15    0.258  0.35   0.369
                200        1.71  0.15    0.256  0.35   0.355
                200        1.69  0.15    0.268  0.35   0.357
                200        1.77  0.15    0.268  0.33   0.332
                200        1.7   0.15    0.268  0.335  0.344
                SoilCrop LentilSoil: same as Validation.2019_PulseAdaptation.GreenethorpePhen19_.GreenethorpePhen19.Field.soil.Physical.LentilSoil
                SoilCrop ChickpeaSoil
                  LL=[0.102, 0.102, 0.156, 0.213, 0.241, 0.253, 0.258, 0.256, 0.268, 0.268, 0.268]
                  KL=[0.045, 0.045, 0.045, 0.045, 0.02, 0.005, 0, 0, 0, 0, 0]
                  XF=[1, 1, 1, 1, 0.3, 0.1, 0, 0, 0, 0, 0]
                  LL source: Field measured and checked for sensibility
              WaterBalance SoilWater: SummerDate=1-Nov; SummerU=2; SummerCona=4.5; WinterDate=1-Apr; WinterU=2; WinterCona=3.9; DiffusConst=88; DiffusSlope=35; Salb=0.13; CN2Bare=73; CNRed=20; CNCov=0.8; Thickness=[100, 100, 200, 200, 200, 200, 200, 200, 200, 200, 200]; SWCON=[0.3, 0.3, 0.3, 0.3, 0.3, 0.3, 0.3, 0.3, 0.3, 0.3, 0.3]
              SoilNitrogen: same as Validation.2019_PulseAdaptation.Emerald19_.Emerald19_.Field.Vertosol_No8.SoilNitrogen
              Organic: same as Validation.2019_PulseAdaptation.GreenethorpePhen19_.GreenethorpePhen19.Field.soil.Organic
              Chemical: same as Validation.2019_PulseAdaptation.GreenethorpePhen19_.GreenethorpePhen19.Field.soil.Chemical
              CERESSoilTemperature Temperature
              Sample Initial Water: Thickness=[100, 100, 200, 200, 200, 200, 200, 200, 200, 200, 200]; SWUnits=Volumetric; OCUnits=Total; PHUnits=Water
                SW=[0.218604, 0.218604, 0.262, 0.297604, 0.28928167, 0.265772, 0.253469, 0.256987, 0.24218885, 0.246785, 0.247]
            Report RDDReport: EventNames=[Chickpea].Harvesting
              VariableNames:
                [Clock].Today
                [Chickpea].Phenology.RadDegDays
      Experiment GT_HatTrick_WU_2019_
        Memo: same as Validation.2019_PulseAdaptation.Greenethorpe_2019_.Memo
        Factors
          Memo: same as Validation.2019_PulseAdaptation.Greenethorpe_2019_.Factors.Memo
          Permutation
            Factor TOS
              CompositeFactor 1_Dry
                Specifications:
                  [Crop]
                  [Clock]
                  [IrrigateFixedDates].Script.Amount = 0.0
                  [IrrigateOnSow_TOS2only].Script.Amount = 0.0
                Operations Crop
                  2019-04-15  [SoilWater].SW = 0.219,0.236,0.263,0.310,0.317,0.287,0.277,0.281,0.292,0.242,0.242
                  2019-04-30  [Chickpea].Sow(population: 46, cultivar: "HatTrick", depth: 50, rowSpacing: 230)
                  2019-08-13  [SoilWater].SW = 0.100, 0.127,0.219,0.287,0.300,0.294,0.286,0.286,0.292,0.283,0.283
                Clock: Start=2019-04-10; End=2019-12-10
              CompositeFactor 2_Dry
                Specifications:
                  [Crop]
                  [Clock]
                  [IrrigateFixedDates].Script.Amount = 0.0
                  [IrrigateOnSow_TOS2only].Script.Amount = 15.0
                Operations Crop
                  2019-04-15  [SoilWater].SW = 0.219,0.186,0.257,0.297,0.282,0.248,0.226,0.237,0.256, 0.235,0.235
                  2019-05-21  [Chickpea].Sow(population: 46, cultivar: "HatTrick", depth: 50, rowSpacing: 230)
                  2019-08-13  [SoilWater].SW = 0.100, 0.170,0.246,0.291,0.299,0.277,0.264,0.253,0.256,0.239,0.239
                Clock: Start=2019-04-10; End=2019-12-10
              CompositeFactor 3_Dry
                Specifications:
                  [Crop]
                  [Clock]
                  [IrrigateFixedDates].Script.Amount = 0.0
                  [IrrigateOnSow_TOS2only].Script.Amount = 0.0
                Operations Crop
                  2019-04-15  [SoilWater].SW = 0.219,0.188,0.256,0.299,0.277,0.272,0.259,0.263,0.286,0.242,0.242
                  2019-06-12  [Chickpea].Sow(population: 46, cultivar: "HatTrick", depth: 50, rowSpacing: 230)
                  2019-08-13  [SoilWater].SW = 0.100,0.178,0.248,0.288,0.275,0.297,0.282,0.279,0.288,0.256,0.256
                Clock: Start=2019-04-10; End=2019-12-10
              CompositeFactor 1_Wet
                Specifications:
                  [Crop]
                  [Clock]
                  [IrrigateFixedDates].Script.Amount = 10.0
                  [IrrigateOnSow_TOS2only].Script.Amount = 0.0
                Operations Crop
                  2019-04-15  [SoilWater].SW = 0.219,0.198,0.266,0.291,0.262,0.220,0.236,0.244,0.236,0.271,0.271
                  2019-04-30  [Chickpea].Sow(population: 46, cultivar: "HatTrick", depth: 50, rowSpacing: 230)
                  2019-08-13  [SoilWater].SW = 0.100,0.132,0.218,0.272,0.262,0.239,0.261,0.251,0.248,0.275,0.275
                Clock: Start=2019-04-10; End=2019-12-10
              CompositeFactor 2_Wet
                Specifications:
                  [Crop]
                  [Clock]
                  [IrrigateFixedDates].Script.Amount = 10.0
                  [IrrigateOnSow_TOS2only].Script.Amount = 15.0
                Operations Crop
                  2019-04-15  [SoilWater].SW = 0.219,0.197,0.261,0.285,0.249,0.209,0.212,0.238,0.271,242,242
                  2019-05-21  [Chickpea].Sow(population: 46, cultivar: "HatTrick", depth: 50, rowSpacing: 230)
                  2019-08-13  [SoilWater].SW = 0.100, 0.174,0.249,0.284,0.282,0.251,0.237,0.256,0.275,0.275,0.275
                Clock: Start=2019-04-10; End=2019-12-10
              CompositeFactor 3_Wet
                Specifications:
                  [Crop]
                  [Clock]
                  [IrrigateFixedDates].Script.Amount = 10.0
                  [IrrigateOnSow_TOS2only].Script.Amount = 0.0
                Operations Crop
                  2019-04-15  [SoilWater].SW = 0.219,0.200,0.266,0.297,0.280,0.254,0.231,0.250,0.261,0.248,0.248
                  2019-06-12  [Chickpea].Sow(population: 46, cultivar: "HatTrick", depth: 50, rowSpacing: 230)
                  2019-08-13  [SoilWater].SW = 0.100, 0.192,0.251,0.288,0.277,0.270,0.267,0.260,0.272,0.306,0.306
                Clock: Start=2019-04-10; End=2019-12-10
        Simulation GT_HatTrick_WU_2019_
          Weather: FileName=GreenethorpeTTagTemp.met
          Clock: Start=2019-04-10; End=2019-12-30
          Summary summaryfile
          SoilArbitrator Soil Arbitrator
          Zone Field: Area=1; Slope=0; AspectAngle=0; Altitude=50
            MicroClimate: a_interception=0; b_interception=1; c_interception=0; d_interception=0; soil_albedo=0.13; SoilHeatFluxFraction=0.4; MinimumHeightDiffForNewLayer=0; NightInterceptionFraction=0.5; ReferenceHeight=2
            Irrigation
            Fertiliser
            SurfaceOrganicMatter: InitialResidueName=maize; InitialResidueType=maize; InitialResidueMass=500; InitialStandingFraction=0; InitialCPR=0; InitialCNR=65
            Report: same as Validation.2019_PulseAdaptation.Walgett19_.Walgett19.Field.Report
            Report HarvestReport: EventNames=[Chickpea].Harvesting
              VariableNames:
                [Clock].Today
                [Chickpea].Phenology.CurrentStageName as Stage
                [Chickpea].Phenology.FloweringDAS as FloweringDAS
                [Chickpea].Phenology.MaturityDAS as MaturityDAS
                [Chickpea].Grain.Live.Wt as GrainWt
                [Chickpea].AboveGround.Wt
            Manager Harvesting: same as Validation.2019_PulseAdaptation.Emerald19_.Emerald19_.Field.Harvesting
            Plant Chickpea
            Manager Sowing: same as Validation.2019_PulseAdaptation.Greenethorpe_2019_.Greenethorpe_2019_.Field.Sowing
            Manager Reset on date: same as Validation.2019_PulseAdaptation.Greenethorpe_2019_.Greenethorpe_2019_.Field.Reset on date
            Manager Fertilise at sowing: same as Validation.2019_PulseAdaptation.Greenethorpe_2019_.Greenethorpe_2019_.Field.Fertilise at sowing
            Manager IrrigateOnSow_TOS2only: same as Validation.2019_PulseAdaptation.Greenethorpe_2019_.Greenethorpe_2019_.Field.IrrigateOnSow_TOS2only
            Manager IrrigateFixedDates: same as Validation.2019_PulseAdaptation.Greenethorpe_2019_.Greenethorpe_2019_.Field.IrrigateFixedDates
            Soil: SoilType=SNSW; Site=Front paddock; NearestTown=Young; Region=Southern NSW; State=NSW; Country=Australia; Latitude=0; Longitude=0; DataSource=Kirkegaard/Lilley
              Memo: same as Validation.2019_PulseAdaptation.Greenethorpe_2019_.Greenethorpe_2019_.Field.soil.memo
              Physical
                Thickness  BD    AirDry  LL15   DUL    SAT
                100        1.5   0.08    0.08   0.25   0.28
                100        1.53  0.08    0.102  0.211  0.241
                200        1.56  0.1     0.156  0.232  0.262
                200        1.54  0.1     0.213  0.287  0.317
                200        1.54  0.15    0.241  0.311  0.341
                200        1.6   0.15    0.253  0.35   0.369
                200        1.62  0.15    0.258  0.35   0.369
                200        1.71  0.15    0.256  0.35   0.355
                200        1.69  0.15    0.268  0.35   0.357
                200        1.77  0.15    0.268  0.33   0.332
                200        1.7   0.15    0.268  0.335  0.344
                SoilCrop LentilSoil: same as Validation.2019_PulseAdaptation.GreenethorpePhen19_.GreenethorpePhen19.Field.soil.Physical.LentilSoil
                SoilCrop ChickpeaSoil
                  LL=[0.102, 0.102, 0.156, 0.213, 0.241, 0.253, 0.258, 0.256, 0.268, 0.268, 0.268]
                  KL=[0.045, 0.045, 0.045, 0.045, 0.02, 0.005, 0.02, 0.02, 0.02, 0.01, 0.01]
                  XF=[1, 1, 1, 1, 0.3, 0.1, 0, 0, 0, 0, 0]
                  LL source: Field measured and checked for sensibility
              WaterBalance SoilWater: same as Validation.2019_PulseAdaptation.Greenethorpe_2019_.Greenethorpe_2019_.Field.soil.SoilWater
              SoilNitrogen: same as Validation.2019_PulseAdaptation.Emerald19_.Emerald19_.Field.Vertosol_No8.SoilNitrogen
              Organic: same as Validation.2019_PulseAdaptation.GreenethorpePhen19_.GreenethorpePhen19.Field.soil.Organic
              Chemical: same as Validation.2019_PulseAdaptation.GreenethorpePhen19_.GreenethorpePhen19.Field.soil.Chemical
              CERESSoilTemperature Temperature
              Sample Initial Water: same as Validation.2019_PulseAdaptation.Greenethorpe_2019_.Greenethorpe_2019_.Field.soil.Initial Water
            Report RDDReport: EventNames=[Chickpea].Harvesting
              VariableNames:
                [Clock].Today
                [Chickpea].Phenology.RadDegDays
            Folder Management
              Operations Crop
      Experiment Narrabri19_
        Memo
          **Met file** - taken from SILO airport + field maxT, MinT and rain spliced in.

          **Irrigations from contractor** -
          17/05	25 mm just after TOS 1 planted (accidentally typed 17/06 but you can see in excel entry is before and after other may entries)
          17/06	30 mm - whole trial
          06/08	irrigation 25 mm - whole trial
          09/09	irrigation - 30mm irrigated part only
          24/09	irrigated only 30 mm
          25/10	irrigated only 30 mm

          Soil water characterisation is a bit uncertain - cores weren't dried at 100 degrees. Still waiting on recalibrated soilwater data as of 7Aug20
        Factors
          Memo: same as Validation.2019_PulseAdaptation.Greenethorpe_2019_.Factors.Memo
          Permutation
            Factor TOS
              CompositeFactor 1: Specifications=[Sowing].Script.SowDate = 16-May
              CompositeFactor 2: Specifications=[Sowing].Script.SowDate = 29-May
              CompositeFactor 3: Specifications=[Sowing].Script.SowDate = 2-Jul
            Factor Cv
              Specification=[Sowing].Script.CultivarName = Drummond, HatTrick, Kyabra, Genesis90, Kalkee, Monarch
            Factor Irr
              CompositeFactor 0: Specifications=[IrrigateForIrrTreatsOnly].Script.Amount = 0.0
              CompositeFactor 1: Specifications=[IrrigateForIrrTreatsOnly].Script.Amount = 30.0
        Simulation Narrabri19_
          Weather: FileName=NarrabriAWS_FieldTempRainCOMBO.met
          Memo met
            AP email 9/6/20: Use the airport for solar radiation and most things but use the onsite station (from the last worksheet in that spreadsheet) for temp and rainfall. So yes it will be a combo, if you can make it sure it gets labelled that way. Once you’ve combined them in excel you have to save it as *.prn file, then rename to .met.
          Clock: Start=2019-05-01; End=2019-12-30
          Summary summaryfile
          SoilArbitrator Soil Arbitrator
          Zone Field: Area=1; Slope=0; AspectAngle=0; Altitude=50
            MicroClimate: a_interception=0; b_interception=1; c_interception=0; d_interception=0; soil_albedo=0.13; SoilHeatFluxFraction=0.4; MinimumHeightDiffForNewLayer=0; NightInterceptionFraction=0.5; ReferenceHeight=2
            Irrigation
            Fertiliser
            SurfaceOrganicMatter: InitialResidueName=maize; InitialResidueType=maize; InitialResidueMass=500; InitialStandingFraction=0; InitialCPR=0; InitialCNR=65
            Report: same as Validation.2019_PulseAdaptation.Walgett19_.Walgett19.Field.Report
            Report HarvestReport: EventNames=[Chickpea].Harvesting
              VariableNames:
                [Clock].Today
                [Chickpea].Phenology.CurrentStageName as Stage
                [Chickpea].Phenology.FloweringDAS as FloweringDAS
                [Chickpea].Phenology.MaturityDAS as MaturityDAS
                [Chickpea].Grain.Live.Wt as GrainWt
                [Chickpea].AboveGround.Wt
            Manager Harvesting: same as Validation.2019_PulseAdaptation.Emerald19_.Emerald19_.Field.Harvesting
            Plant Chickpea
            Manager Sowing: same as Validation.2019_PulseAdaptation.GreenethorpePhen19_.GreenethorpePhen19.Field.Sowing
            Manager Reset on date
              ResetDate = 22-may
              ResetWater = Yes
              ResetSOM = No
              script: same as in Validation.2019_PulseAdaptation.Caragabal19_.Caragabal19.Field.Reset on date
            Manager Fertilise at sowing: same as Validation.2019_PulseAdaptation.Greenethorpe_2019_.Greenethorpe_2019_.Field.Fertilise at sowing
            Manager IrrigateAllPlots1
              IrrigateDates = 17-may
              Amount = 25
              Depth = 0
              Efficiency = 1
              WillRunoff = False
              script: same as in Validation.2019_PulseAdaptation.Mildura19_.Mildura19.Field.Irrigate
            Manager IrrigateAllPlots2
              IrrigateDates = 17-jun
              Amount = 30
              Depth = 0
              Efficiency = 1
              WillRunoff = False
              script: same as in Validation.2019_PulseAdaptation.Mildura19_.Mildura19.Field.Irrigate
            Manager IrrigateAllPlots3
              IrrigateDates = 6-aug
              Amount = 25
              Depth = 0
              Efficiency = 1
              WillRunoff = False
              script: same as in Validation.2019_PulseAdaptation.Mildura19_.Mildura19.Field.Irrigate
            Manager IrrigateForIrrTreatsOnly
              IrrigateDates = 9-sep,24-sep,25-oct
              Amount = 30
              Depth = 0
              Efficiency = 1
              WillRunoff = True
              script: same as in Validation.2019_PulseAdaptation.Mildura19_.Mildura19.Field.Irrigate
            Report RDDReport: EventNames=[Chickpea].Harvesting
              VariableNames:
                [Clock].Today
                [Chickpea].Phenology.RadDegDays
            Soil (disabled): ASCOrder=Vertosol; SoilType=Clay; Site=Generic-Qld; State=Generic; Country=Australia; NaturalVegetation=NA; ApsoilNumber=517-GENERIC; Latitude=-27.183286; Longitude=151.263748; LocationAccuracy=Regional Soil Type; DataSource=Generic soil. CSIRO Sustainable Ecosystems, Toowoomba
              Comments=Generic soil developed by Allan Peake. 'Typical Vertosol' soil properties have been calculated as the average of vertosols with similar characteristics from within the Apsoil database. Groupings were made on the basis of bulk density. Measured BD, DUL and CLL for the groups were then averaged to derive the characteristics of the typical Vertosols. They can then be used in conjunction with measured soil water to simplify the selection of appropriate Vertosols, for paddocks where full soil characterisations have not yet been completed. For more information see Peake et al. 2010: ‘A rapid method for estimating the plant available water capacity of Vertosols’, 2010 Australian Agronomy Conference. Typical Vertosols are different to 'Generic' soil types elsewhere in the Apsoil database, which are representative of certain soil types and districts, but have not been calculated from large numbers of similar, characterised soils.
              Memo
                Soil is: Vertosol No5 (PAWC-226 No517-Generic).
              Physical
                Thickness  BD    AirDry  LL15   DUL    SAT
                150        1.2   0.119   0.238  0.468  0.518
                150        1.23  0.197   0.246  0.457  0.507
                300        1.26  0.263   0.263  0.446  0.496
                300        1.3   0.263   0.263  0.43   0.48
                300        1.34  0.263   0.263  0.413  0.463
                300        1.37  0.263   0.263  0.403  0.453
                300        1.37  0.263   0.263  0.401  0.451
                SoilCrop WheatSoil: same as Validation.2019_PulseAdaptation.Caragabal19_.Caragabal19.Field.soil.Physical.WheatSoil
                SoilCrop CottonSoil: LL=[0.238, 0.246, 0.263, 0.276, 0.306, 0.337, 0.376]; KL=[0.1, 0.1, 0.1, 0.1, 0.09, 0.07, 0.05]; XF=[1, 1, 1, 1, 1, 1, 1]
                  LL source: Field measured and checked for sensibility
                SoilCrop SorghumSoil: LL=[0.238, 0.246, 0.263, 0.276, 0.306, 0.337, 0.376]; KL=[0.07, 0.07, 0.07, 0.05, 0.05, 0.04, 0.03]; XF=[1, 1, 1, 1, 1, 1, 1]
                  LL source: Field measured and checked for sensibility
                SoilCrop ChickpeaSoil: LL=[0.238, 0.246, 0.263, 0.276, 0.306, 0.337, 0.376]; KL=[0.045, 0.045, 0.045, 0.03, 0.02, 0.02, 0.01]; XF=[1, 1, 1, 1, 1, 1, 1]
                  LL source: Field measured and checked for sensibility
              WaterBalance SoilWater: same as Validation.2019_PulseAdaptation.Caragabal19_.Caragabal19.Field.soil.SoilWater
              SoilNitrogen: same as Validation.2019_PulseAdaptation.Caragabal19_.Caragabal19.Field.soil.SoilNitrogen
              Organic: same as Validation.2019_PulseAdaptation.Caragabal19_.Caragabal19.Field.soil.Organic
              Chemical: Thickness=[150, 150, 300, 300, 300, 300, 300]; PH=[6.7, 6.9, 7.7, 8.3, 8.5, 8.7, 8.5]
              CERESSoilTemperature Temperature
              Sample Initial Water: Thickness=[150, 150, 300, 300, 300, 300, 300]; SWUnits=Volumetric; OCUnits=Total; PHUnits=Water
                SW=[0.39475, 0.404227, 0.421424, 0.433743, 0.434, 0.434, 0.434]
            Soil Grey Vertosol (Narrabri No124): ASCOrder=Vertosol; ASCSubOrder=Grey; SoilType=Clay; Site=Narrabri; NearestTown=Narrabri, NSW 2390; Region=North West Slopes and Plains; State=New South Wales; Country=Australia; NaturalVegetation=Grasslands, Poplar Box; ApsoilNumber=124; Latitude=-30.57; Longitude=150.256; LocationAccuracy=+/- 20m; DataSource=CSIRO Plant Industry, Myall Vale (D Richards)
              Physical
                Thickness  BD    AirDry  LL15  DUL   SAT
                150        1.24  0.125   0.25  0.45  0.5
                150        1.24  0.2     0.25  0.45  0.5
                300        1.19  0.25    0.25  0.47  0.52
                300        1.2   0.25    0.25  0.47  0.52
                300        1.24  0.25    0.25  0.45  0.5
                300        1.28  0.25    0.25  0.44  0.49
                300        1.34  0.25    0.25  0.41  0.46
                SoilCrop ChickpeaSoil: LL=[0.25, 0.25, 0.26, 0.343333, 0.406667, 0.44, 0.41]; KL=[0.045, 0.045, 0.045, 0.03, 0.025, 0.02, 0.01]; XF=[1, 1, 1, 1, 1, 1, 1]
                  LL source: Field measured and checked for sensibility
                SoilCrop WheatSoil: LL=[0.25, 0.25, 0.26, 0.28, 0.32, 0.35, 0.39]; KL=[0.06, 0.06, 0.06, 0.04, 0.04, 0.02, 0.02]; XF=[1, 1, 1, 1, 1, 1, 1]
                  LL source: Field measured and checked for sensibility
                SoilCrop CottonSoil: LL=[0.25, 0.25, 0.25, 0.27, 0.3, 0.34, 0.35]; KL=[0.1, 0.1, 0.1, 0.1, 0.09, 0.07, 0.05]; XF=[1, 1, 1, 1, 1, 1, 1]
                  LL source: Field measured and checked for sensibility
                SoilCrop SorghumSoil: LL=[0.25, 0.25, 0.26, 0.28, 0.31, 0.34, 0.36]; KL=[0.07, 0.07, 0.07, 0.05, 0.05, 0.04, 0.03]; XF=[1, 1, 1, 1, 1, 1, 1]
                  LL source: Field measured and checked for sensibility
                SoilCrop MungbeanSoil: LL=[0.25, 0.25, 0.32, 0.39, 0.39, 0.44, 0.41]; KL=[0.06, 0.06, 0.06, 0.04, 0.04, 0.01, 0.01]; XF=[1, 1, 1, 1, 1, 1, 1]
                  LL source: Field measured and checked for sensibility
              WaterBalance SoilWater: SummerDate=1-Nov; SummerU=6; SummerCona=3.5; WinterDate=1-Apr; WinterU=4; WinterCona=2.5; DiffusConst=40; DiffusSlope=16; Salb=0.12; CN2Bare=73; CNRed=20; CNCov=0.8; Thickness=[150, 150, 300, 300, 300, 300, 300]; SWCON=[0.3, 0.3, 0.3, 0.3, 0.3, 0.3, 0.3]
              SoilNitrogen: same as Validation.2019_PulseAdaptation.Emerald19_.Emerald19_.Field.Vertosol_No8.SoilNitrogen
              Organic: FOMCNRatio=40
                Thickness  Carbon  SoilCNRatio  FBiom  FInert  FOM
                150        0.88    12           0.04   0.4     347.129
                150        0.76    12           0.02   0.6     270.344
                300        0.62    12           0.02   0.8     163.972
                300        0.32    12           0.02   1       99.4541
                300        0.12    12           0.01   1       60.322
                300        0.1     12           0.01   1       36.5871
                300        0.05    12           0.01   1       22.1912
              Chemical: Thickness=[150, 150, 300, 300, 300, 300, 300]; PH=[8.9, 9.2, 9.3, 9, 8.8, 7.5, 8.4]
              InitialWater Initial water: PercentMethod=0; FractionFull=1
              Sample Initial conditions: Depth=[0-180]; Thickness=[1800]; SWUnits=Volumetric; OCUnits=Total; PHUnits=Water
              CERESSoilTemperature Temperature
      Experiment Condobolin19_ (disabled)
        Factors
          Memo
            **Factors at Greenethorpe**

            ***Time of sowing***

            1. 30 April, 2019
            2. 21 May, 2019
            3. 12 June, 2019

            Initial SW at TOS based on 15/4 measurement for all TOS; measurement of SW for irrig and dryland treatments averaged for TOS since first irrigation not applied until after this measurement.

            ***Cultivar***

            **Desi:**
            HatTrick
            Striker
            Slasher

            *Not at site:*
            Kyabra
            Drummond
            Seamer
            Boundary
            Pistol

            *Kabuli:*
            Monarch
            Genesis90

            *Not at site:*
            Kalkee
            Almaz
          Permutation
            Factor TOS
              CompositeFactor 1: Specifications=[Sowing].Script.SowDate = 08-May
              CompositeFactor 2: Specifications=[Sowing].Script.SowDate = 31-May
              CompositeFactor 3: Specifications=[Sowing].Script.SowDate = 17-Jun
            Factor Cv
              Specification=[Sowing].Script.CultivarName = Genesis90, HatTrick, Monarch, Slasher, Striker
            Factor Irr
              CompositeFactor 0
                Specifications:
                  [IrrigationDry].Script.Amount = 15
                  [IrrigationWet].Script.Amount = 0
              CompositeFactor 1
                Specifications:
                  [IrrigationDry].Script.Amount = 0
                  [IrrigationWet].Script.Amount = 30
        Simulation Condobolin_2019_
          Weather: FileName=50052_CombGSE_Condobolin.met
          Clock: Start=2019-04-10; End=2019-12-30
          Summary summaryfile
          SoilArbitrator Soil Arbitrator
          Zone Field: Area=1; Slope=0; AspectAngle=0; Altitude=50
            MicroClimate: a_interception=0; b_interception=1; c_interception=0; d_interception=0; soil_albedo=0.13; SoilHeatFluxFraction=0.4; MinimumHeightDiffForNewLayer=0; NightInterceptionFraction=0.5; ReferenceHeight=2
            Irrigation
            Fertiliser
            SurfaceOrganicMatter: InitialResidueName=maize; InitialResidueType=maize; InitialResidueMass=500; InitialStandingFraction=0; InitialCPR=0; InitialCNR=65
            Report: same as Validation.2019_PulseAdaptation.Caragabal19_.Caragabal19.Field.Report
            Report HarvestReport: EventNames=[Chickpea].Harvesting
              VariableNames:
                [Clock].Today
                [Chickpea].Phenology.CurrentStageName as Stage
                [Chickpea].Phenology.FloweringDAS as FloweringDAS
                [Chickpea].Phenology.MaturityDAS as MaturityDAS
                [Chickpea].Grain.Live.Wt as GrainWt
                [Chickpea].AboveGround.Wt
            Manager IrrigateAllPlots
              IrrigateDates = 9-may, 1-jun, 25-jul, 20-aug
              Amount = 30
              Depth = 0
              Efficiency = 0.95
              WillRunoff = False
              script: same as in Validation.2019_PulseAdaptation.Mildura19_.Mildura19.Field.Irrigate
            Manager Harvesting: same as Validation.2019_PulseAdaptation.Caragabal19_.Caragabal19.Field.Harvesting
            Plant Chickpea
            Manager Sowing
              SowDate = 30-Apr
              CultivarName = Amethyst
              SowingDepth = 30
              RowSpacing = 300
              Population = 46
              script: same as in Validation.2019_PulseAdaptation.Caragabal19_.Caragabal19.Field.Sowing
            Manager Reset on date
              ResetDate = 15-apr
              ResetWater = Yes
              ResetSOM = No
              script: same as in Validation.2019_PulseAdaptation.Caragabal19_.Caragabal19.Field.Reset on date
            Manager Fertilise at sowing
              Crop = [Chickpea]
              FertiliserType = UreaN
              Amount = 4
              script: same as in Validation.2019_PulseAdaptation.Greenethorpe_2019_.Greenethorpe_2019_.Field.Fertilise at sowing
            Soil: SoilType=SNSW; Site=Front paddock; NearestTown=Young; Region=Southern NSW; State=NSW; Country=Australia; Latitude=0; Longitude=0; DataSource=Kirkegaard/Lilley
              Memo
                The soil for Greenethorpe was developed by Julianne Lilley:

                "Hi Elizabeth,

                Laura and I did a bit of playing around with this soil as I initially adapted something from a Young soil that I had characterised. The simulation I took it from was called Y:\WORK\OCP modelling\Greenethorpe_Iandra\greenethorpe_2013 and was saved on 16 jan 2019 , so this may be the last file we used. Jeremy has also been simulating at the Iandra site, so he may be worth asking, but I know he is not back at work yet.  Anyway this soil will be a good place to start.

                Cheers
                Julianne"

                **Chickpea soil properties** set same as for lentil.
              Physical
                Thickness  BD    AirDry  LL15   DUL    SAT
                100        1.5   0.04    0.08   0.25   0.28
                100        1.53  0.08    0.08   0.25   0.28
                200        1.56  0.1     0.143  0.31   0.34
                200        1.54  0.1     0.28   0.36   0.41
                200        1.54  0.15    0.28   0.36   0.4
                200        1.6   0.15    0.28   0.345  0.38
                200        1.6   0.15    0.27   0.38   0.39
                200        1.6   0.15    0.28   0.38   0.39
                200        1.6   0.15    0.3    0.38   0.39
                200        1.65  0.15    0.3    0.35   0.36
                200        1.65  0.15    0.3    0.35   0.36
                SoilCrop ChickpeaSoil
                  LL=[0.08, 0.1, 0.143, 0.315, 0.36, 0.345, 0.38, 0.38, 0.38, 0.35, 0.35]
                  KL=[0.045, 0.045, 0.045, 0.02, 0, 0, 0, 0, 0, 0, 0]
                  XF=[1, 1, 1, 1, 0.3, 0.1, 0, 0, 0, 0, 0]
                  LL source: Field measured and checked for sensibility
              WaterBalance SoilWater: SummerDate=1-Nov; SummerU=2; SummerCona=4.5; WinterDate=1-Apr; WinterU=2; WinterCona=3.9; DiffusConst=88; DiffusSlope=35; Salb=0.13; CN2Bare=73; CNRed=20; CNCov=0.8; Thickness=[100, 100, 200, 200, 200, 200, 200, 200, 200, 200, 200]; SWCON=[0.3, 0.3, 0.3, 0.3, 0.3, 0.3, 0.3, 0.3, 0.3, 0.3, 0.3]
              SoilNitrogen: same as Validation.2019_PulseAdaptation.Caragabal19_.Caragabal19.Field.soil.SoilNitrogen
              Organic: FOMCNRatio=40
                Thickness  Carbon  SoilCNRatio  FBiom  FInert  FOM
                100        1       12           0.06   0.01    347.129
                100        0.35    12           0.05   0.01    270.344
                200        0.22    12           0.035  0.35    163.972
                200        0.22    12           0.015  0.425   99.4541
                200        0.18    12           0.01   0.55    60.322
                200        0.135   12           0.01   0.75    36.5871
                200        0.105   12           0.01   0.95    22.1912
                200        0.1     12           0.01   0.99    22.191
                200        0.1     12           0.01   0.99    22.191
                200        0.07    12           0.01   0.99    22.191
                200        0.045   12           0.01   0.99    22.191
              Chemical: Thickness=[100, 100, 200, 200, 200, 200, 200, 200, 200, 200, 200]; PH=[5.8, 5.9, 6.7, 7.05, 7.25, 7.4, 7.7, 8.1, 8.35, 8.45, 8.5]
              CERESSoilTemperature Temperature
              Sample Initial Water: Thickness=[100, 100, 200, 200, 200, 200, 200, 200, 200, 200, 200]; SWUnits=Volumetric; OCUnits=Total; PHUnits=Water
                SW=[0.085, 0.128, 0.194, 0.311, 0.31, 0.304, 0.307, 0.33, 0.321, 0.321, 0.321]
            Report RDDReport: EventNames=[Chickpea].Harvesting
              VariableNames:
                [Clock].Today
                [Chickpea].Phenology.RadDegDays
            Manager IrrigationDry
              IrrigateDates = 5-sep, 27-sep
              Amount = 0
              Depth = 0
              Efficiency = 0.95
              WillRunoff = False
              script: same as in Validation.2019_PulseAdaptation.Mildura19_.Mildura19.Field.Irrigate
            Manager IrrigationWet
              IrrigateDates = 16-aug, 27-aug, 4-sep, 26-sep, 1-oct, 9-oct
              Amount = 0
              Depth = 0
              Efficiency = 0.95
              WillRunoff = False
              script: same as in Validation.2019_PulseAdaptation.Mildura19_.Mildura19.Field.Irrigate
      Experiment GT_HatTrick_WU_2019_1 (disabled)
        Memo
          Planting density information by TOS was available. It differed broadly by TOS and so average density for TOS used for all cvv.

          Initial SW across site is quite variable - question whether appropriate to model as factorial? Variability probably due to micro-environment variations at specific location fo soil cores, so factorial design was retained.

          **Met file** - based on SILO but used local TTag at trial for max/minT, because trial is at a different point in the landscape to the SILO station
        Factors
          Memo: same as Validation.2019_PulseAdaptation.Condobolin19_.Factors.Memo
          Permutation
            Factor TOS
              CompositeFactor 1_Dry
                Specifications:
                  [Crop]
                  [Clock]
                Operations Crop
                  2019-04-15  [SoilWater].SW = 0.219,0.236,0.263,0.310,0.317,0.287,0.277,0.281,0.292
                  2019-04-30  [Chickpea].Sow(population: 46, cultivar: "HatTrick", depth: 50, rowSpacing: 230)
                  2019-08-13  [SoilWater].SW = 0.100, 0.127,0.219,0.287,0.300,0.294,0.286,0.286,0.292
                Clock: Start=2019-04-10; End=2019-12-10
              CompositeFactor 2_Dry
                Specifications:
                  [Crop]
                  [Clock]
                Operations Crop
                  2019-04-15  [SoilWater].SW = 0.219,0.186,0.257,0.297,0.282,0.248,0.226,0.237,0.256
                  2019-05-21  [Chickpea].Sow(population: 46, cultivar: "HatTrick", depth: 50, rowSpacing: 230)
                  2019-08-13  [SoilWater].SW = 0.100, 0.170,0.246,0.291,0.299,0.277,0.264,0.253,0.256
                Clock: Start=2019-04-10; End=2019-12-10
              CompositeFactor 3_Dry
                Specifications:
                  [Crop]
                  [Clock]
                Operations Crop
                  2019-04-15  [SoilWater].SW = 0.219,0.188,0.256,0.299,0.277,0.272,0.259,0.263,0.286
                  2019-06-12  [Chickpea].Sow(population: 46, cultivar: "HatTrick", depth: 50, rowSpacing: 230)
                  2019-08-13  [SoilWater].SW = 0.100,0.178,0.248,0.288,0.275,0.297,0.282,0.279,0.288
                Clock: Start=2019-04-10; End=2019-12-10
              CompositeFactor 1_Wet
                Specifications:
                  [Crop]
                  [Clock]
                Operations Crop
                  2019-04-15  [SoilWater].SW = 0.219,0.198,0.266,0.291,0.262,0.220,0.236,0.244,0.236
                  2019-04-30  [Chickpea].Sow(population: 46, cultivar: "HatTrick", depth: 50, rowSpacing: 230)
                  2019-08-13  [SoilWater].SW = 0.100,0.132,0.218,0.272,0.262,0.239,0.261,0.251,0.248
                Clock: Start=2019-04-10; End=2019-12-10
              CompositeFactor 2_Wet
                Specifications:
                  [Crop]
                  [Clock]
                Operations Crop
                  2019-04-15  [SoilWater].SW = 0.219,0.197,0.261,0.285,0.249,0.209,0.212,0.238,0.271
                  2019-05-21  [Chickpea].Sow(population: 46, cultivar: "HatTrick", depth: 50, rowSpacing: 230)
                  2019-08-13  [SoilWater].SW = 0.100, 0.174,0.249,0.284,0.282,0.251,0.237,0.256,0.275
                Clock: Start=2019-04-10; End=2019-12-10
              CompositeFactor 3_Wet
                Specifications:
                  [Crop]
                  [Clock]
                Operations Crop
                  2019-04-15  [SoilWater].SW = 0.219,0.200,0.266,0.297,0.280,0.254,0.231,0.250,0.261
                  2019-05-21  [Chickpea].Sow(population: 46, cultivar: "HatTrick", depth: 50, rowSpacing: 230)
                  2019-08-13  [SoilWater].SW = 0.100, 0.192,0.251,0.288,0.277,0.270,0.267,0.260,0.272
                Clock: Start=2019-04-10; End=2019-12-10
            Factor TOS1
              CompositeFactor 1_Dry
                Specifications:
                  [Crop]
                  [Clock]
                Operations Crop
                  2019-04-15  [SoilWater].SW = 0.219,0.236,0.263,0.310,0.317,0.287,0.277,0.281,0.292
                  2019-05-21  [Chickpea].Sow(population: 46, cultivar: "HatTrick", depth: 50, rowSpacing: 230)
                  2019-08-13  [SoilWater].SW = 0.100, 0.127,0.219,0.287,0.300,0.294,0.286,0.286,0.292
                Clock: Start=2019-04-10; End=2019-12-10
              CompositeFactor 2_Dry
                Specifications:
                  2019-04-15 [SoilWater].SW = 0.219,0.186,0.257,0.297,0.282,0.248,0.226,0.237,0.256
                  [Sowing].Script.SowDate = 21-May
                  2019-08-13 [SoilWater].SW = 0.100, 0.170,0.246,0.291,0.299,0.277,0.264,0.253,0.256
              CompositeFactor 3_Dry
                Specifications:
                  2019-04-15 [SoilWater].SW = 0.219,0.188,0.256,0.299,0.277,0.272,0.259,0.263,0.286
                  [Sowing].Script.SowDate = 12-Jun
                  2019-08-13 [SoilWater].SW = 0.100, 0.178,0.248,0.288,0.275,0.297,0.282,0.279,0.288
              CompositeFactor 1_Wet
                Specifications:
                  2019-04-15 [SoilWater].SW = 0.219,0.198,0.266,0.291,0.262,0.220,0.236,0.244,0.236
                  [Sowing].Script.SowDate = 30-Apr
                  2019-08-13 [SoilWater].SW = 0.100, 0.132,0.218,0.272,0.262,0.239,0.261,0.251,0.248
              CompositeFactor 2_Wet
                Specifications:
                  2019-04-15 [SoilWater].SW = 0.219,0.197,0.261,0.285,0.249,0.209,0.212,0.238,0.271
                  [Sowing].Script.SowDate = 21-May
                  2019-08-13 [SoilWater].SW = 0.100, 0.174,0.249,0.284,0.282,0.251,0.237,0.256,0.275
              CompositeFactor 3_Wet
                Specifications:
                  2019-04-15 [SoilWater].SW = 0.219,0.200,0.266,0.297,0.280,0.254,0.231,0.250,0.261
                  [Sowing].Script.SowDate = 12-Jun
                  2019-08-13 [SoilWater].SW = 0.100, 0.192,0.251,0.288,0.277,0.270,0.267,0.260,0.272
        Simulation GT_HatTrick_WU_2019_1
          Weather: FileName=GreenethorpeTTagTemp.met
          Clock: Start=2019-04-10; End=2019-12-30
          Summary summaryfile
          SoilArbitrator Soil Arbitrator
          Zone Field: Area=1; Slope=0; AspectAngle=0; Altitude=50
            MicroClimate: a_interception=0; b_interception=1; c_interception=0; d_interception=0; soil_albedo=0.13; SoilHeatFluxFraction=0.4; MinimumHeightDiffForNewLayer=0; NightInterceptionFraction=0.5; ReferenceHeight=2
            Irrigation
            Fertiliser
            SurfaceOrganicMatter: InitialResidueName=maize; InitialResidueType=maize; InitialResidueMass=500; InitialStandingFraction=0; InitialCPR=0; InitialCNR=65
            Report: same as Validation.2019_PulseAdaptation.Caragabal19_.Caragabal19.Field.Report
            Report HarvestReport: EventNames=[Chickpea].Harvesting
              VariableNames:
                [Clock].Today
                [Chickpea].Phenology.CurrentStageName as Stage
                [Chickpea].Phenology.FloweringDAS as FloweringDAS
                [Chickpea].Phenology.MaturityDAS as MaturityDAS
                [Chickpea].Grain.Live.Wt as GrainWt
                [Chickpea].AboveGround.Wt
            Manager Harvesting: same as Validation.2019_PulseAdaptation.Caragabal19_.Caragabal19.Field.Harvesting
            Plant Chickpea
            Manager Sowing
              SowDate = 30-Apr
              CultivarName = Amethyst
              SowingDepth = 50
              RowSpacing = 230
              Population = 46
              script: same as in Validation.2019_PulseAdaptation.Caragabal19_.Caragabal19.Field.Sowing
            Manager Reset on date: same as Validation.2019_PulseAdaptation.Condobolin19_.Condobolin_2019_.Field.Reset on date
            Manager Fertilise at sowing: same as Validation.2019_PulseAdaptation.Condobolin19_.Condobolin_2019_.Field.Fertilise at sowing
            Manager IrrigateOnSow_TOS2only
              IrrigateDates = 21-may
              Amount = 15
              Depth = 0
              Efficiency = 0.8
              WillRunoff = False
              script: same as in Validation.2019_PulseAdaptation.Mildura19_.Mildura19.Field.Irrigate
            Manager IrrigateFixedDates
              IrrigateDates = 13-aug,14-aug,15-aug,26-aug,31-aug,03-sep,25-sep,30-sep,1-oct
              Amount = 10
              Depth = 0
              Efficiency = 0.8
              WillRunoff = True
              script: same as in Validation.2019_PulseAdaptation.Mildura19_.Mildura19.Field.Irrigate
            Soil: SoilType=SNSW; Site=Front paddock; NearestTown=Young; Region=Southern NSW; State=NSW; Country=Australia; Latitude=0; Longitude=0; DataSource=Kirkegaard/Lilley
              Memo: same as Validation.2019_PulseAdaptation.Condobolin19_.Condobolin_2019_.Field.soil.memo
              Physical
                Thickness  BD    AirDry  LL15   DUL    SAT
                100        1.5   0.08    0.08   0.25   0.28
                100        1.53  0.08    0.102  0.211  0.241
                200        1.56  0.1     0.156  0.232  0.262
                200        1.54  0.1     0.213  0.287  0.317
                200        1.54  0.15    0.241  0.311  0.341
                200        1.6   0.15    0.253  0.35   0.369
                200        1.62  0.15    0.258  0.35   0.369
                200        1.71  0.15    0.256  0.35   0.355
                200        1.69  0.15    0.268  0.35   0.357
                200        1.77  0.15    0.268  0.33   0.332
                200        1.7   0.15    0.268  0.335  0.344
                SoilCrop LentilSoil
                  LL=[0.102, 0.102, 0.156, 0.213, 0.241, 0.253, 0.258, 0.256, 0.268, 0.268, 0.268]
                  KL=[0.045, 0.045, 0.045, 0.045, 0.03, 0.02, 0.02, 0.02, 0.02, 0.01, 0.01]
                  XF=[1, 1, 1, 1, 1, 1, 0, 0, 0, 0, 0]
                  LL source: Field measured and checked for sensibility
                SoilCrop ChickpeaSoil
                  LL=[0.102, 0.102, 0.156, 0.213, 0.241, 0.253, 0.258, 0.256, 0.268, 0.268, 0.268]
                  KL=[0.045, 0.045, 0.045, 0.045, 0.02, 0.005, 0.02, 0.02, 0.02, 0.01, 0.01]
                  XF=[1, 1, 1, 1, 0.3, 0.1, 0, 0, 0, 0, 0]
                  LL source: Field measured and checked for sensibility
              WaterBalance SoilWater: same as Validation.2019_PulseAdaptation.Condobolin19_.Condobolin_2019_.Field.soil.SoilWater
              SoilNitrogen: same as Validation.2019_PulseAdaptation.Caragabal19_.Caragabal19.Field.soil.SoilNitrogen
              Organic: same as Validation.2019_PulseAdaptation.Condobolin19_.Condobolin_2019_.Field.soil.Organic
              Chemical: same as Validation.2019_PulseAdaptation.Condobolin19_.Condobolin_2019_.Field.soil.Chemical
              CERESSoilTemperature Temperature
              Sample Initial Water: Thickness=[100, 100, 200, 200, 200, 200, 200, 200, 200, 200, 200]; SWUnits=Volumetric; OCUnits=Total; PHUnits=Water
                SW=[0.218604, 0.218604, 0.262, 0.297604, 0.28928167, 0.265772, 0.253469, 0.256987, 0.24218885, 0.246785, 0.247]
            Report RDDReport: EventNames=[Chickpea].Harvesting
              VariableNames:
                [Clock].Today
                [Chickpea].Phenology.RadDegDays
            Folder Management
              Operations Crop
    Memo Combined Results
      ### Combined Results

      Simulation results for the combined datasets from the various growing regions are shown in the following graphs. The model is able to adequately capture the influence of growing conditions (e.g. soil, climate) and management (e.g. population, irrigation, sowing date).
    Folder SE Queensland
      Experiment Lawes1990
        Memo
          Peter Carberry unpublished data.  Creek bank soil. Varies in short distances.

          Note that Brinsmead paper says 1st sowing date was waterlogged, which would explain the delayed response on that experiment.

          Note - auto-irrigate function has been used as no record of actual irrigation? Probably that they ran out of water at the end and actually wouldn't have achieved the yields we simulated
        Factors
          Factor Sowing: Specification=[Sowing]
            Operations 1
              1990-05-20  [Chickpea].Sow(population:33.4, cultivar:"Amethyst", depth:50, rowSpacing:350);
              1990-07-29  [Irrigation].Apply(amount:100, depth:0,efficiency:1, willRunoff:false);
              1990-08-28  [Irrigation].Apply(amount:100, depth:0,efficiency:1, willRunoff:false);
              1990-09-27  [Irrigation].Apply(amount:100, depth:0,efficiency:1, willRunoff:false);
            Operations 2
              1990-08-06  [Chickpea].Sow(population:43, cultivar:"Amethyst", depth:50, rowSpacing:350);
              1990-09-17  [Irrigation].Apply(amount:100, depth:0,efficiency:1, willRunoff:false);
              1990-10-07  [Irrigation].Apply(amount:100, depth:0,efficiency:1, willRunoff:false);
              1990-10-27  [Irrigation].Apply(amount:100, depth:0,efficiency:1, willRunoff:false);
              1990-11-16  [Irrigation].Apply(amount:100, depth:0,efficiency:1, willRunoff:false);
              1990-11-26  [Irrigation].Apply(amount:100, depth:0,efficiency:1, willRunoff:false);
        Simulation Lawes1990
          Weather: FileName=cooper.met
          Clock: Start=1990-01-01; End=1990-12-31
          Summary summaryfile
          SoilArbitrator Soil Arbitrator
          Zone Field: Area=1; Slope=0; AspectAngle=0; Altitude=50
            MicroClimate: a_interception=0; b_interception=1; c_interception=0; d_interception=0; soil_albedo=0.13; SoilHeatFluxFraction=0.4; MinimumHeightDiffForNewLayer=0; NightInterceptionFraction=0.5; ReferenceHeight=2
            Irrigation
            Fertiliser
            SurfaceOrganicMatter: InitialResidueName=maize; InitialResidueType=maize; InitialResidueMass=500; InitialStandingFraction=0; InitialCPR=0; InitialCNR=65
            Operations Sowing
            Operations NRate
              1985-11-08  [Fertiliser].Apply(50, Fertiliser.Types.NH4NO3N, 10);
              1985-11-29  [Fertiliser].Apply(30, Fertiliser.Types.NH4NO3N, 10);
            Report: same as Validation.2019_PulseAdaptation.Emerald19_.Emerald19_.Field.Report
            Soil: Latitude=0; Longitude=0
              Physical
                Thickness  BD    AirDry  LL15   DUL    SAT
                150        1.32  0.1     0.31   0.413  0.453
                150        1.32  0.1     0.31   0.413  0.453
                150        1.38  0.26    0.313  0.454  0.479
                300        1.33  0.32    0.376  0.495  0.498
                300        1.33  0.3     0.356  0.495  0.498
                300        1.42  0.27    0.3    0.418  0.464
                300        1.33  0.24    0.303  0.4    0.457
                300        1.35  0.31    0.31   0.37   0.435
                400        1.4   0.16    0.16   0.29   0.38
                SoilCrop ChickpeaSoil: LL=[0.3, 0.3, 0.3, 0.35, 0.35, 0.27, 0.303, 0.31, 0.16]; KL=[0.045, 0.045, 0.045, 0.037, 0.25, 0.015, 0.01, 0, 0]; XF=[1, 1, 1, 1, 1, 1, 1, 1, 1]
              WaterBalance SoilWater: SummerDate=1-Nov; SummerU=6; SummerCona=3.5; WinterDate=1-Apr; WinterU=4; WinterCona=2.5; DiffusConst=40; DiffusSlope=16; Salb=0.13; CN2Bare=68; CNRed=20; CNCov=0.8; Thickness=[100, 100, 100, 200, 200, 200, 200, 200, 200]; SWCON=[0.5, 0.5, 0.5, 0.5, 0.5, 0.5, 0.5, 0.5, 0.5]
              SoilNitrogen: same as Validation.2019_PulseAdaptation.Emerald19_.Emerald19_.Field.Vertosol_No8.SoilNitrogen
              Organic: FOMCNRatio=45
                Thickness  Carbon  SoilCNRatio  FBiom  FInert  FOM
                100        1.2     14.5         0.02   0.42    268.216
                100        1       14.5         0.01   0.5     219.597
                100        0.86    14.5         0.01   0.58    179.791
                200        0.83    14.5         0.01   0.55    120.517
                200        0.58    14.5         0.01   0.86    80.7852
                200        0.54    14.5         0.01   0.9     54.1519
                200        0.47    14.5         0.01   0.95    36.2991
                200        0.5     14.5         0.01   0.95    24.332
                200        0.5     14.5         0.01   0.95    16.3103
              Chemical
                Thickness  NO3N   NH4N  PH
                100        14.4   0.6   6
                100        10.49  0.35  6
                100        6.58   0.1   6
                200        2.45   0.1   6.2
                200        1.765  0.1   6.5
                200        1.08   0.1   6.7
                200        0.15   0.1   6.8
                200        0.49   0.1   6.8
                200        0.83   0.1   6.8
              Sample InitialSW: Thickness=[150, 150, 300, 300, 300, 300, 300]; SW=[0.413, 0.45, 0.408, 0.374, 0.327, 0.325, 0.371]; SWUnits=Volumetric; OCUnits=Total; PHUnits=Water
              CERESSoilTemperature Temperature
            Report HarvestReport: EventNames=[Chickpea].Harvesting
              VariableNames:
                [Clock].Today
                [Chickpea].Phenology.CurrentStageName as Stage
                [Chickpea].Phenology.FloweringDAS as FloweringDAS
                [Chickpea].Phenology.MaturityDAS as MaturityDAS
                [Chickpea].Grain.Live.Wt as GrainWt
                [Chickpea].AboveGround.Wt
            Manager Harvesting: same as Validation.2019_PulseAdaptation.Emerald19_.Emerald19_.Field.Harvesting
            Plant Chickpea
            Manager AutoIrrigate
              FASW = 0
              WaterDeficit = 0
              AutoIrrigationOn = True
              StartStageName = Emergence
              EndStageName = EndGrainFill
              FASWThreshold = 0.9
              FASWDepth = 1000
```csharp
using Models.Interfaces;
using APSIM.Shared.Utilities;
using System.Xml.Serialization;
using Models;
using Models.PMF;
using Models.Soils;
using System.Text;
using System.Collections.Generic;
using Models.Core;
using System;
using Models.PMF.Phen;

namespace Models
{
    [Serializable] 
    public class Script : Model
    {
        [Link] private Plant Chickpea;
        [Link] private Zone zone;
        [Link] private Irrigation irrigation;
        [Link] private Soil soil;
        [Link(Type = LinkType.Path, Path = "[Chickpea].Phenology")]
        private Phenology phenology;
        [Link]
        private IPhysical soilPhysical;
        [Link]
        private ISoilWater waterBalance;
        public double FASW { get; set; }
        public double WaterDeficit  { get; set; }
    
        
        [Description("Auto irrigation on?")]
        public bool AutoIrrigationOn { get; set; }
        
        [Description("Irrigation window start stage")]
        public string StartStageName { get; set; }
        [Description("Irrigation window end stage")]
        public string EndStageName { get; set; }

        [Description("Threshold fraction available water (0-1)")]
        public double FASWThreshold { get; set; }

        [Description("Soil depth (mm) to which fraction available water is calculated")]
        public double FASWDepth { get; set; }

        [EventSubscribe("DoManagement")]
        private void OnDoManagement(object sender, EventArgs e)
        {
            CalculateFASW();
            if (AutoIrrigationOn && phenology.Between(StartStageName, EndStageName))
            {
                if (FASW < FASWThreshold)
                {
                    double amount = 10;
                    irrigation.Apply(WaterDeficit, depth: 0);
                }
            }
        }
        
        private void CalculateFASW()
        {
            double[] LL15 = MathUtilities.Multiply(soilPhysical.LL15, soilPhysical.Thickness);
            double[] DUL = MathUtilities.Multiply(soilPhysical.DUL, soilPhysical.Thickness);
        
            int nlayr = GetLayerIndex();
            double cumdep = MathUtilities.Sum(soilPhysical.Thickness, 0, nlayr, 0.0);

            double excess_fr = MathUtilities.Divide((cumdep - FASWDepth), soilPhysical.Thickness[nlayr], 0.0);

            // note that results may be strange if swdep < ll15
            double avail_sw = (MathUtilities.Sum(waterBalance.SWmm, 0, nlayr, 0.0)
                              - excess_fr * waterBalance.SWmm[nlayr])
                              - (MathUtilities.Sum(LL15, 0, nlayr, 0.0)
                              - excess_fr * LL15[nlayr]);


            double pot_avail_sw = (MathUtilities.Sum(DUL, 0, nlayr, 0.0)
                                  - excess_fr * DUL[nlayr])
                                  - (MathUtilities.Sum(LL15, 0, nlayr, 0.0)
                                  - excess_fr * LL15[nlayr]);

            FASW = MathUtilities.Divide(avail_sw, pot_avail_sw, 0.0);
            WaterDeficit = MathUtilities.Constrain(pot_avail_sw - avail_sw, 0.0, 100000);
        }

        private int GetLayerIndex()
        {
            double[] cumThickness = soilPhysical.ThicknessCumulative;
            for (int i = 1; i < cumThickness.Length; i++)
            {
                if (FASWDepth < cumThickness[i])
                    return i - 1;
            }
            
            return cumThickness.Length - 1;
        }

    }
}
```
            Report RDDReport: EventNames=[Chickpea].Harvesting
              VariableNames:
                [Clock].Today
                [Chickpea].Phenology.RadDegDays
        Report RDDReport: EventNames=[Chickpea].Harvesting
          VariableNames:
            [Clock].Today
            [Chickpea].Phenology.RadDegDays
      Experiment Lawes1991
        Memo
          Creek bank. Highly variable soil.

          Peter Carberry upublished data. Also known as APS2??

          Something weird here regarding TOS2. Can't balance MS leaf number with apparent correct sowing date amethyst phenology and measured grain weight development. So exclude.
        Factors Factors2
          Factor Sowing: Specification=[Sowing]
            Operations 1
              1991-05-29  [Chickpea].Sow(population:28, cultivar:"Amethyst", depth:50, rowSpacing:500);
              1991-05-29  [Irrigation].Apply(amount:40, depth:0,efficiency:1, willRunoff:false);
              1991-06-20  [Irrigation].Apply(amount:40, depth:0,efficiency:1, willRunoff:false);
              1991-07-10  [Irrigation].Apply(amount:40, depth:0,efficiency:1, willRunoff:false);
              1991-07-30  [Irrigation].Apply(amount:40, depth:0,efficiency:1, willRunoff:false);
              1991-08-19  [Irrigation].Apply(amount:40, depth:0,efficiency:1, willRunoff:false);
              1991-09-08  [Irrigation].Apply(amount:40, depth:0,efficiency:1, willRunoff:false);
              1991-09-28  [Irrigation].Apply(amount:40, depth:0,efficiency:1, willRunoff:false);
              1991-10-18  [Irrigation].Apply(amount:40, depth:0,efficiency:1, willRunoff:false);
              1991-11-07  [Irrigation].Apply(amount:40, depth:0,efficiency:1, willRunoff:false);
            Operations 2
              1991-07-28  [Chickpea].Sow(population:28, cultivar:"Amethyst", depth:50, rowSpacing:500);
              1991-05-29  [Irrigation].Apply(amount:40, depth:0,efficiency:1, willRunoff:false);
              1991-06-20  [Irrigation].Apply(amount:40, depth:0,efficiency:1, willRunoff:false);
              1991-07-10  [Irrigation].Apply(amount:40, depth:0,efficiency:1, willRunoff:false);
              1991-07-30  [Irrigation].Apply(amount:40, depth:0,efficiency:1, willRunoff:false);
              1991-08-19  [Irrigation].Apply(amount:40, depth:0,efficiency:1, willRunoff:false);
              1991-09-08  [Irrigation].Apply(amount:40, depth:0,efficiency:1, willRunoff:false);
              1991-09-28  [Irrigation].Apply(amount:40, depth:0,efficiency:1, willRunoff:false);
              1991-10-18  [Irrigation].Apply(amount:40, depth:0,efficiency:1, willRunoff:false);
              1991-11-07  [Irrigation].Apply(amount:40, depth:0,efficiency:1, willRunoff:false);
              Memo
                something weird here. Can't balance MS leaf number with apparent correct sowing date amethyst phenology and measured grain weight development. So exclude
        Simulation Lawes1991
          Weather: FileName=cooper.met
          Clock: Start=1991-01-01; End=1991-12-31
          Summary summaryfile
          SoilArbitrator Soil Arbitrator
          Zone Field: Area=1; Slope=0; AspectAngle=0; Altitude=50
            MicroClimate: a_interception=0; b_interception=1; c_interception=0; d_interception=0; soil_albedo=0.13; SoilHeatFluxFraction=0.4; MinimumHeightDiffForNewLayer=0; NightInterceptionFraction=0.5; ReferenceHeight=2
            Irrigation
            Fertiliser
            SurfaceOrganicMatter: InitialResidueName=maize; InitialResidueType=maize; InitialResidueMass=500; InitialStandingFraction=0; InitialCPR=0; InitialCNR=65
            Operations Sowing
            Operations NRate
              1985-11-08  [Fertiliser].Apply(50, Fertiliser.Types.NH4NO3N, 10);
              1985-11-29  [Fertiliser].Apply(30, Fertiliser.Types.NH4NO3N, 10);
            Report: EventNames=[Clock].DoReport
              VariableNames:
                [Clock].Today
                [Soil].SoilWater.SW
                [Soil].SoilWater.Eo
                [Soil].SoilWater.Es
                [Soil].SoilWater.Drainage
                [Soil].SoilWater.Runoff
                [Soil].SoilWater.pond
                sum([Soil].SoilWater.SWmm) as ProfileWater
                [Soil].SoilNitrogen.NO3.kgha
                [MicroClimate].net_radn
                [MicroClimate].peta
                [MicroClimate].petr
                [Chickpea].Leaf.LAI
                [Chickpea].Structure.LeafTipsAppeared
                [Chickpea].Structure.PlantTotalNodeNo
                [Chickpea].Leaf.SenescingCohortNo
                [Chickpea].Structure.TotalStemPopn
                [Chickpea].AboveGround.Wt
                [Chickpea].Leaf.Live.Wt
                [Chickpea].Stem.Live.Wt
            Soil: Latitude=0; Longitude=0
              Physical
                Thickness  BD    AirDry  LL15  DUL    SAT
                150        1.38  0.05    0.18  0.384  0.434
                150        1.38  0.19    0.19  0.381  0.431
                300        1.32  0.2     0.2   0.44   0.49
                300        1.46  0.22    0.22  0.424  0.448
                300        1.51  0.19    0.19  0.419  0.43
                300        1.49  0.17    0.17  0.376  0.426
                300        1.47  0.17    0.17  0.377  0.427
                SoilCrop ChickpeaSoil: LL=[0.25, 0.25, 0.23, 0.25, 0.2, 0.2, 0.2]; KL=[0.045, 0.045, 0.045, 0.03, 0.02, 0.01, 0.01]; XF=[1, 1, 1, 1, 1, 0, 0]
              WaterBalance SoilWater: SummerDate=1-Nov; SummerU=6; SummerCona=3.5; WinterDate=1-Apr; WinterU=4; WinterCona=2.5; DiffusConst=40; DiffusSlope=16; Salb=0.13; CN2Bare=50; CNRed=20; CNCov=0.8; Thickness=[100, 100, 100, 200, 200, 200, 200, 200, 200]; SWCON=[0.5, 0.5, 0.5, 0.5, 0.5, 0.5, 0.5, 0.5, 0.5]
              SoilNitrogen: same as Validation.2019_PulseAdaptation.Emerald19_.Emerald19_.Field.Vertosol_No8.SoilNitrogen
              Organic: same as Validation.SE Queensland.Lawes1990.Lawes1990.Field.soil.Organic
              Chemical
                Thickness  NO3N  NH4N  PH
                100        14.3  0     6
                100        10.1  0     6
                100        5.9   0     6
                200        1.8   0     6.2
                200        1.35  0     6.5
                200        0.9   0     6.7
                200        1     0     6.8
                200        0.6   0     6.8
                200        0.2   0     6.8
              Sample InitialSW: Thickness=[150, 150, 300, 300, 300, 300, 300]; SW=[0.384, 0.381, 0.44, 0.424, 0.419, 0.376, 0.377]; SWUnits=Volumetric; OCUnits=Total; PHUnits=Water
              CERESSoilTemperature Temperature
            Report HarvestReport: EventNames=[Chickpea].Harvesting
              VariableNames:
                [Clock].Today
                [Chickpea].Phenology.CurrentStageName as Stage
                [Chickpea].Phenology.FloweringDAS as FloweringDAS
                [Chickpea].Phenology.MaturityDAS as MaturityDAS
                [Chickpea].Grain.Live.Wt as GrainWt
            Manager Harvesting: same as Validation.2019_PulseAdaptation.Emerald19_.Emerald19_.Field.Harvesting
            Plant Chickpea
            Manager AutoIrrigate: same as Validation.SE Queensland.Lawes1990.Lawes1990.Field.AutoIrrigate
            Report RDDReport: EventNames=[Chickpea].Harvesting
              VariableNames:
                [Clock].Today
                [Chickpea].Phenology.RadDegDays
      Experiment Lawes1995
        Memo
          This version has modified kl values to see what would be necessary to reduce kls and achieve biomass from this experiment. Data from Yash dang suggests little deep water extraction from Chickpea - at odds with this experiment, that may have had tree roots encroaching on its area.

          Also known as APS27. Was sown adjacent to the APS26 wheat experiment and should theoretically have received the same irrigation. Creek bank. May have a problem with NMM calibration. WUE of APS26 wheat was not right, but their problem was too much biomass for the amount of water. We have opposite problem of model getting away too fast.

          May also need to drop leaves at end in order to correct biomass.

          Quite probable that the wet treatment developed disease issues or N fixation issues due to regular water, which might explain overprediction of biomass - and also explains why water use looks OK in this one. If biomass were higher (in absence of disease) then water use would increase and show the same bias between observed and predicted that we are seeing in the water limited treatment.
        Factors
          Factor Trt: Specification=[Sowing]
            Operations Wet
              1995-06-15  [Chickpea].Sow(population:37.3, cultivar:"Amethyst", depth:50, rowSpacing:350);
              1995-06-15  [Soil].SoilWater.SW = 0.329,0.347,0.379,0.318,0.358,0.332,0.292
              1995-07-05  [Irrigation].Apply(amount:26, depth:0,efficiency:0.8, willRunoff:false);
              1995-07-21  [Irrigation].Apply(amount:14, depth:0,efficiency:0.8, willRunoff:false);
              1995-08-01  [Irrigation].Apply(amount:28, depth:0,efficiency:0.8, willRunoff:false);
              1995-08-11  [Irrigation].Apply(amount:30, depth:0,efficiency:0.8, willRunoff:false);
              1995-08-25  [Irrigation].Apply(amount:15, depth:0,efficiency:0.8, willRunoff:false);
              1995-08-31  [Irrigation].Apply(amount:14, depth:0,efficiency:0.8, willRunoff:false);
              1995-09-04  [Irrigation].Apply(amount:15, depth:0,efficiency:0.8, willRunoff:false);
              1995-09-15  [Irrigation].Apply(amount:25, depth:0,efficiency:0.8, willRunoff:false);
              1995-09-22  [Irrigation].Apply(amount:20, depth:0,efficiency:0.8, willRunoff:false);
              1995-10-02  [Irrigation].Apply(amount:11, depth:0,efficiency:0.8, willRunoff:false);
            Operations Dry
              1995-06-14  [Chickpea].Sow(population:39.5, cultivar:"Amethyst", depth:50, rowSpacing:350);
              1995-06-05  [Irrigation].Apply(amount:175, depth:0,efficiency:1, willRunoff:false);
              1995-06-15  [Soil].SoilWater.SW = 0.341,0.346,0.309,0.324,0.304,0.296,0.280
        Simulation Lawes1995
          Weather: FileName=cooper.met
          Clock: Start=1995-06-14; End=1995-12-31
          Summary summaryfile
          SoilArbitrator Soil Arbitrator
          Zone Field: Area=1; Slope=0; AspectAngle=0; Altitude=50
            MicroClimate: a_interception=0; b_interception=1; c_interception=0; d_interception=0; soil_albedo=0.13; SoilHeatFluxFraction=0.4; MinimumHeightDiffForNewLayer=0; NightInterceptionFraction=0.5; ReferenceHeight=2
            Irrigation
            Fertiliser
            SurfaceOrganicMatter: InitialResidueName=maize; InitialResidueType=maize; InitialResidueMass=500; InitialStandingFraction=0; InitialCPR=0; InitialCNR=65
            Operations Sowing
            Report: same as Validation.2019_PulseAdaptation.Mildura19_.Mildura19.Field.Report
            Soil: Latitude=0; Longitude=0
              Physical
                Thickness  BD    AirDry  LL15  DUL    SAT
                150        1.38  0.05    0.18  0.36   0.455
                150        1.38  0.19    0.19  0.373  0.423
                300        1.35  0.2     0.2   0.389  0.439
                300        1.46  0.22    0.22  0.348  0.398
                300        1.42  0.19    0.19  0.365  0.415
                300        1.45  0.17    0.17  0.352  0.402
                300        1.47  0.17    0.17  0.327  0.377
                SoilCrop ChickpeaSoil: LL=[0.25, 0.25, 0.2, 0.23, 0.21, 0.21, 0.22]; KL=[0.045, 0.045, 0.045, 0.03, 0.02, 0.01, 0.01]; XF=[1, 1, 1, 1, 1, 1, 1]
              WaterBalance SoilWater: SummerDate=1-Nov; SummerU=2; SummerCona=4.5; WinterDate=1-Apr; WinterU=2; WinterCona=4; DiffusConst=40; DiffusSlope=16; Salb=0.13; CN2Bare=78; CNRed=20; CNCov=0.8; Thickness=[100, 100, 100, 200, 200, 200, 200, 200, 200]; SWCON=[0.3, 0.3, 0.3, 0.3, 0.3, 0.3, 0.3, 0.3, 0.3]
              SoilNitrogen: same as Validation.2019_PulseAdaptation.Emerald19_.Emerald19_.Field.Vertosol_No8.SoilNitrogen
              Organic: same as Validation.SE Queensland.Lawes1990.Lawes1990.Field.soil.Organic
              Chemical: same as Validation.SE Queensland.Lawes1991.Lawes1991.Field.soil.Chemical
              Sample InitialSW: Thickness=[150, 150, 300, 300, 300, 300, 300]; SW=[0.384, 0.381, 0.43, 0.39, 0.41, 0.376, 0.377]; SWUnits=Volumetric; OCUnits=Total; PHUnits=Water
              CERESSoilTemperature Temperature
            Report HarvestReport: EventNames=[Chickpea].Harvesting
              VariableNames:
                [Clock].Today
                [Chickpea].Phenology.CurrentStageName as Stage
                [Chickpea].Phenology.FloweringDAS as FloweringDAS
                [Chickpea].Phenology.MaturityDAS as MaturityDAS
                [Chickpea].Grain.Live.Wt as GrainWt
            Manager Harvesting: same as Validation.2019_PulseAdaptation.Emerald19_.Emerald19_.Field.Harvesting
            Plant Chickpea
            Report RDDReport: EventNames=[Chickpea].Harvesting
              VariableNames:
                [Clock].Today
                [Chickpea].Phenology.RadDegDays
        Memo
          Suspect that wet treatment may have become diseased due to excess irrigation. In which case would explain overprediction of biomass. Would also explain correct prediction of SW (when dry treatment underpredicts extraction) as if the wet treatment was disease limited, its observed SW use was less than it might have been
      Experiment Bremar_2003_
        Memo
          soil cores taken on row? or mid -inter row?

          On first glance, these simulations don't look great, however:

          (1) first biomass cut looks suspiciously similar to the second biomass cut.  Areas may have been incorrectly reported for first cut.

          (2) soil was incredibly variable, as per initial coring results from TOS1 and TOS2. The approach taken was to choose an average starting point that would go close to both TOS1 and TOS2, bearing in mind that increasing sowing soil water for TOS2 would increase overprediction.

          (3) the site was remote and biomass loss and shattering was likely during storms prior to harvest and probably greater in TOS1 due to increased delay in obtaining final biomass.

          (4) grain yield was not too bad.

          (5) some uncertainty around whether grower would actually have decreased plant pop for 350 row spacing, possibly may be double.
        Factors
          Factor S: Specification=[SowingRule]
            Manager 1R350
              SowDate = 15-May
              CultivarName = Amethyst
              SowingDepth = 100
              RowSpacing = 350
              Population = 20
```csharp
using APSIM.Shared.Utilities;
using Models.Utilities;
using Models.Soils;
using Models.PMF;
using Models.Core;
using System;

namespace Models
{
    [Serializable]
    public class Script : Model
    {
        [Link] Clock Clock;
        [Link] Fertiliser Fertiliser;
        [Link] Summary Summary;
        [Link] Plant Chickpea;
        [Link] Soil Soil;
        Accumulator accumulatedRain;
        
        [Description("Sowing date (d-mmm)")]
        public string SowDate { get; set; }
        [Description("Cultivar to be sown")]
        public string CultivarName { get; set; }
        [Description("Sowing depth (mm)")]
        public double SowingDepth { get; set; }
        [Description("Row spacing (mm)")]
        public double RowSpacing { get; set; }
        [Description("Plant population (/m2)")]
        public double Population { get; set; }
        
        


        [EventSubscribe("DoManagement")]
        private void OnDoManagement(object sender, EventArgs e)
        {
        
            
            if (DateUtilities.WithinDates(SowDate, Clock.Today, SowDate))
            {
                Chickpea.Sow(population: Population, cultivar: CultivarName, depth: SowingDepth, rowSpacing: RowSpacing);

                //SoilCrop soilCrop = Soil.Crop("Chickpea") as SoilCrop;
                //double[] kl = soilCrop.KL;
                //double modifier = Population / 40.0;
                //for (int i = 0; i < kl.Length; i++)
                    //kl[i] = kl[i] * modifier;
                //soilCrop.KL = kl;    
            }
        
        }
        
    }
}
```
            Manager 1R700
              SowDate = 15-May
              CultivarName = Amethyst
              SowingDepth = 100
              RowSpacing = 700
              Population = 18
              script: same as in Validation.SE Queensland.Bremar_2003_.Factors.S.1R350
            Manager 2R350
              SowDate = 1-Jun
              CultivarName = Amethyst
              SowingDepth = 100
              RowSpacing = 350
              Population = 20
              script: same as in Validation.SE Queensland.Bremar_2003_.Factors.S.1R350
            Manager 2R700
              SowDate = 1-Jun
              CultivarName = Amethyst
              SowingDepth = 100
              RowSpacing = 700
              Population = 18
              script: same as in Validation.SE Queensland.Bremar_2003_.Factors.S.1R350
        Simulation Bremar2003
          Memo
            soil cores taken on row? or mid -inter row?
          Weather: FileName=bremar2.met
          Clock: Start=2003-05-14; End=2003-12-30
          Summary summaryfile
          SoilArbitrator Soil Arbitrator
          Zone Field: Area=1; Slope=0; AspectAngle=0; Altitude=50
            MicroClimate: a_interception=0; b_interception=1; c_interception=0; d_interception=0; soil_albedo=0.13; SoilHeatFluxFraction=0.4; MinimumHeightDiffForNewLayer=0; NightInterceptionFraction=0.5; ReferenceHeight=2
            Irrigation
            Fertiliser
            SurfaceOrganicMatter: InitialResidueName=wheat; InitialResidueType=wheat; InitialResidueMass=1500; InitialStandingFraction=0; InitialCPR=0; InitialCNR=76
            Operations IrrigationSchedule
            Report: EventNames=[Clock].DoReport
              VariableNames:
                [Clock].Today
                [Soil].SoilWater.SW
                [Soil].SoilWater.Eo
                [Soil].SoilWater.Es
                [Soil].SoilWater.Drainage
                [Soil].SoilWater.Runoff
                [Soil].SoilWater.pond
                sum([Soil].SoilWater.SWmm) as ProfileWater
                [Soil].SoilNitrogen.NO3.kgha
                [MicroClimate].net_radn
                [MicroClimate].peta
                [MicroClimate].petr
                [Chickpea].AboveGround.Wt
                [Chickpea].Leaf.LAI
            Report HarvestReport: EventNames=[Chickpea].Harvesting
              VariableNames:
                [Clock].Today
                [Chickpea].Phenology.CurrentStageName as Stage
                [Chickpea].Phenology.FloweringDAS as FloweringDAS
                [Chickpea].Phenology.MaturityDAS as MaturityDAS
                [Chickpea].Grain.Live.Wt as GrainWt
            Manager Harvesting
              script: same as in Validation.2019_PulseAdaptation.Caragabal19_.Caragabal19.Field.Harvesting
            Plant Chickpea
            Manager SowingRule
              SowDate = 24-Jul
              CultivarName = Amethyst
              SowingDepth = 50
              RowSpacing = 750
              Population = 6
```csharp
using APSIM.Shared.Utilities;
using Models.Utilities;
using Models.Soils;
using Models.PMF;
using Models.Core;
using System;

namespace Models
{
    [Serializable]
    public class Script : Model
    {
        [Link] Clock Clock;
        [Link] Fertiliser Fertiliser;
        [Link] Summary Summary;
        [Link] Plant Chickpea;
        [Link] Soil Soil;
        Accumulator accumulatedRain;
        
        [Description("Sowing date (d-mmm)")]
        public string SowDate { get; set; }
        [Description("Cultivar to be sown")]
        public string CultivarName { get; set; }
        [Description("Sowing depth (mm)")]
        public double SowingDepth { get; set; }
        [Description("Row spacing (mm)")]
        public double RowSpacing { get; set; }
        [Description("Plant population (/m2)")]
        public double Population { get; set; }
        
        


        [EventSubscribe("DoManagement")]
        private void OnDoManagement(object sender, EventArgs e)
        {
        
            
            if (DateUtilities.WithinDates(SowDate, Clock.Today, SowDate))
            {
                Chickpea.Sow(population: Population, cultivar: CultivarName, depth: SowingDepth, rowSpacing: RowSpacing);    
            }
        
        }
        
    }
}
```
            Soil Red Chromosol Enarra No216: ASCOrder=Chromosol; ASCSubOrder=Red; SoilType=?; Site=Enarra; NearestTown=Meandarra; Region=Darling Downs and Granite Belt; State=Queensland; Country=Australia; NaturalVegetation=Brigalow scrub; ApsoilNumber=216; Latitude=-27.725; Longitude=149.822; LocationAccuracy=+/- 20m
              DataSource=Undertaken by Jeremy Whish, CSIRO Sustainable Ecosystems, Toowoomba in collaboration with MCA, Goondiwindi as part of GRDC Best Management Practice-Pulses project
              Comments=From a pond and tent done during GRDC Best Management Practice-Pulses project ; BD estimated, oc from soil (Billa Billa No. 036)
              Physical
                Thickness  BD     AirDry  LL15  DUL    SAT
                150        1.29   0.1     0.2   0.43   0.483
                150        1.29   0.176   0.22  0.43   0.483
                300        1.327  0.25    0.25  0.419  0.469
                300        1.32   0.25    0.25  0.42   0.472
                300        1.32   0.25    0.25  0.42   0.472
                300        1.4    0.25    0.25  0.39   0.442
                300        1.459  0.25    0.25  0.37   0.42
                SoilCrop ChickpeaSoil: LL=[0.2, 0.22, 0.25, 0.27, 0.36, 0.38, 0.37]; KL=[0.045, 0.045, 0.045, 0.03, 0.025, 0.02, 0.01]; XF=[1, 1, 1, 1, 1, 1, 1]
              WaterBalance SoilWater: SummerDate=1-Nov; SummerU=6; SummerCona=3.5; WinterDate=1-Apr; WinterU=4; WinterCona=2.5; DiffusConst=88; DiffusSlope=35; Salb=0.13; CN2Bare=78; CNRed=20; CNCov=0.8; Thickness=[150, 150, 300, 300, 300, 300, 300]; SWCON=[0.3, 0.3, 0.3, 0.3, 0.3, 0.3, 0.3]
              Organic: FOMCNRatio=40
                Thickness  Carbon    SoilCNRatio  FBiom  FInert  FOM
                150        0.953846  12           0.04   0.4     347.129
                150        0.953846  12           0.02   0.5     270.344
                300        0.961538  12           0.02   0.5     163.972
                300        0.846154  12           0.02   0.6     99.4541
                300        0.546154  12           0.01   0.6     60.322
                300        0.261538  12           0.01   0.7     36.5871
                300        0.261538  12           0.01   0.8     22.1912
              Chemical
                Thickness  NO3N   NH4N  PH
                150        9.69   0.3   8.6
                150        7.88   0.05  8.8
                300        9.29   0.05  8.8
                300        17.59  0.05  7.6
                300        17.49  0.05  5.1
                300        13.16  0.05  4.8
                300        10.02  0.05  4.8
              Sample ORIG inwat: Thickness=[150, 150, 300, 300, 300, 300, 300]; SW=[0.33, 0.36, 0.36, 0.33, 0.3, 0.28, 0.26]; SWUnits=Volumetric; OCUnits=Total; PHUnits=Water
              Sample ALTInitial water: Thickness=[150, 150, 300, 300, 300, 300, 300]; SW=[0.35, 0.38, 0.38, 0.33, 0.3, 0.28, 0.26]; SWUnits=Volumetric; OCUnits=Total; PHUnits=Water
              SoilNitrogen: same as Validation.2019_PulseAdaptation.Emerald19_.Emerald19_.Field.Vertosol_No8.SoilNitrogen
              CERESSoilTemperature Temperature
            Report RDDReport: EventNames=[Chickpea].Harvesting
              VariableNames:
                [Clock].Today
                [Chickpea].Phenology.RadDegDays
    Folder NewSouthWales
      Experiment Kulai_2003_
        Factors
          Factor S: Specification=[SowingRule]
            Manager 1R350
              SowDate = 2-May
              CultivarName = Amethyst
              SowingDepth = 50
              RowSpacing = 350
              Population = 28.5
              script: same as in Validation.SE Queensland.Bremar_2003_.Bremar2003.Field.SowingRule
            Manager 1R700
              SowDate = 2-May
              CultivarName = Amethyst
              SowingDepth = 50
              RowSpacing = 700
              Population = 24.5
              script: same as in Validation.SE Queensland.Bremar_2003_.Bremar2003.Field.SowingRule
            Manager 2R350
              SowDate = 15-May
              CultivarName = Amethyst
              SowingDepth = 50
              RowSpacing = 350
              Population = 33
              script: same as in Validation.SE Queensland.Bremar_2003_.Bremar2003.Field.SowingRule
            Manager 2R700
              SowDate = 15-May
              CultivarName = Amethyst
              SowingDepth = 50
              RowSpacing = 700
              Population = 22
              script: same as in Validation.SE Queensland.Bremar_2003_.Bremar2003.Field.SowingRule
        Simulation Kulai_2003
          Memo
            These simulations are based on data from two years of field trials done in Lincoln, Canterbury, New Zealand from 1998 to 2000. These trials used three cultivars of Kabuli chickpeas. However the results presented here are the average of cultivars for measurements that had no differences among cultivars tested. The experimental design was a split split plot with irrigation as main plot, sowing dates as sub plots and cultivars as sub sub plots.
            The first season, from 1998 until 1999, had two sowing dates (3rd if November and 7th of December) and eight irrigation treatments. Treatments were nil irrigation, full irrigation from emergence to physiological maturity, full from emergence to flowering, half irrigation from emergence to flowering, full from flowering to podding, half from flowering to podding, full from podding to physiological maturity and half from podding to physiological maturity. In these treatments irrigation was applied weekly and the fully irrigated treatment applied the same amount of water lost through evapotranspiration in the previous week. The half irrigation treatment replaced half of the amount lost in the previous week.
            Results from this season include biomass, grain yield, pods per plant, LAI, soil volumetric water content and flowering, podding and physsiological maturity dates.
            The second season, from 1999 to 2000, had two sowing dates (18th of October and 22nd of November) and four irrigation treatments. These were nil irrigation, full from emergence to physiological maturity, full from flowering to podding and full from podding to physiological maturity. The results from this season do not include LAI measurements.
            More information about the data is available in Anwar, M.R. 2001. Water use of Kabuli chickpea (Cicer arietinum L.) cultivars in Canterbury. (PhD thesis, Lincoln University).
          Weather: FileName=kulai2.met
          Clock: Start=2003-05-01; End=2003-12-30
          Summary summaryfile
          SoilArbitrator Soil Arbitrator
          Zone Field: Area=1; Slope=0; AspectAngle=0; Altitude=50
            MicroClimate: a_interception=0; b_interception=1; c_interception=0; d_interception=0; soil_albedo=0.13; SoilHeatFluxFraction=0.4; MinimumHeightDiffForNewLayer=0; NightInterceptionFraction=0.5; ReferenceHeight=2
            Irrigation
            Fertiliser
            SurfaceOrganicMatter: InitialResidueName=wheat; InitialResidueType=wheat; InitialResidueMass=1500; InitialStandingFraction=0; InitialCPR=0; InitialCNR=76
            Operations IrrigationSchedule
            Report: same as Validation.SE Queensland.Bremar_2003_.Bremar2003.Field.Report
            Report HarvestReport: EventNames=[Chickpea].Harvesting
              VariableNames:
                [Clock].Today
                [Chickpea].Phenology.CurrentStageName as Stage
                [Chickpea].Phenology.FloweringDAS as FloweringDAS
                [Chickpea].Phenology.MaturityDAS as MaturityDAS
                [Chickpea].Grain.Live.Wt as GrainWt
            Manager Harvesting: same as Validation.SE Queensland.Bremar_2003_.Bremar2003.Field.Harvesting
            Plant Chickpea
            Soil: Latitude=0; Longitude=0
              Physical
                Thickness  BD    AirDry  LL15  DUL   SAT
                150        1.45  0.06    0.17  0.35  0.4
                150        1.43  0.16    0.17  0.34  0.39
                300        1.34  0.16    0.17  0.31  0.36
                300        1.36  0.18    0.19  0.3   0.35
                300        1.41  0.22    0.23  0.35  0.4
                300        1.61  0.25    0.26  0.37  0.39
                300        1.61  0.31    0.33  0.36  0.39
                SoilCrop ChickpeaSoil: LL=[0.18, 0.18, 0.18, 0.2, 0.24, 0.27, 0.34]; KL=[0.045, 0.045, 0.045, 0.037, 0.025, 0, 0]; XF=[1, 1, 1, 1, 0.5, 0, 0]
              WaterBalance SoilWater: SummerDate=1-Nov; SummerU=6; SummerCona=3.5; WinterDate=1-Apr; WinterU=4; WinterCona=2.5; DiffusConst=40; DiffusSlope=16; Salb=0.13; CN2Bare=78; CNRed=20; CNCov=0.8; Thickness=[150, 150, 300, 300, 300, 300, 300]; SWCON=[0.3, 0.3, 0.3, 0.3, 0.3, 0.3, 0.3]
              SoilNitrogen: same as Validation.2019_PulseAdaptation.Emerald19_.Emerald19_.Field.Vertosol_No8.SoilNitrogen
              Organic: FOMCNRatio=50
                Thickness  Carbon  SoilCNRatio  FBiom  FInert  FOM
                150        1.19    12.5         0.05   0.39    347.129
                150        1.01    12.5         0.02   0.47    270.344
                300        0.45    12.5         0.015  0.52    163.972
                300        0.3     12.5         0.01   0.62    99.4541
                300        0.3     12.5         0.01   0.62    60.322
                300        0.2     12.5         0.01   0.74    36.5871
                300        0.16    12.5         0.01   0.83    22.1912
              Chemical
                Thickness  NO3N   NH4N  PH
                150        9.69   0.3   7.6
                150        7.88   0.05  7.9
                300        9.29   0.05  8.6
                300        17.59  0.05  8.7
                300        17.49  0.05  8.9
                300        13.16  0.05  8.9
                300        10.02  0.05  8.9
              Sample FakeInitialwater: Thickness=[150, 150, 300, 300, 300, 300, 300]; SW=[0.24, 0.29, 0.25, 0.293, 0.314, 0.302, 0.35]; SWUnits=Volumetric; OCUnits=Total; PHUnits=Water
              CERESSoilTemperature Temperature
              Sample Initial water: Thickness=[150, 150, 300, 300, 300, 300, 300]; SW=[0.216, 0.249, 0.251, 0.253, 0.261, 0.32, 0.32]; SWUnits=Volumetric; OCUnits=Total; PHUnits=Water
            Manager SowingRule: same as Validation.SE Queensland.Bremar_2003_.Bremar2003.Field.SowingRule
            Report RDDReport: EventNames=[Chickpea].Harvesting
              VariableNames:
                [Clock].Today
                [Chickpea].Phenology.RadDegDays
      Experiment Kulai_2004_
        Factors
          Factor S: Specification=[SowingRule]
            Manager 1R350
              SowDate = 22-May
              CultivarName = Amethyst
              SowingDepth = 50
              RowSpacing = 350
              Population = 23
              script: same as in Validation.SE Queensland.Bremar_2003_.Bremar2003.Field.SowingRule
            Manager 1R700
              SowDate = 22-May
              CultivarName = Amethyst
              SowingDepth = 50
              RowSpacing = 700
              Population = 18
              script: same as in Validation.SE Queensland.Bremar_2003_.Bremar2003.Field.SowingRule
            Manager 2R350
              SowDate = 22-Jun
              CultivarName = Amethyst
              SowingDepth = 50
              RowSpacing = 350
              Population = 17.5
              script: same as in Validation.SE Queensland.Bremar_2003_.Bremar2003.Field.SowingRule
            Manager 2R700
              SowDate = 22-Jun
              CultivarName = Amethyst
              SowingDepth = 50
              RowSpacing = 700
              Population = 13
              script: same as in Validation.SE Queensland.Bremar_2003_.Bremar2003.Field.SowingRule
        Simulation Kulai_2004
          Memo: same as Validation.NewSouthWales.Kulai_2003_.Kulai_2003.memo
          Weather: FileName=kulai2.met
          Clock: Start=2004-01-01; End=2004-12-30
          Summary summaryfile
          SoilArbitrator Soil Arbitrator
          Zone Field: Area=1; Slope=0; AspectAngle=0; Altitude=50
            MicroClimate: a_interception=0; b_interception=1; c_interception=0; d_interception=0; soil_albedo=0.13; SoilHeatFluxFraction=0.4; MinimumHeightDiffForNewLayer=0; NightInterceptionFraction=0.5; ReferenceHeight=2
            Irrigation
            Fertiliser
            SurfaceOrganicMatter: InitialResidueName=wheat; InitialResidueType=wheat; InitialResidueMass=1500; InitialStandingFraction=0; InitialCPR=0; InitialCNR=76
            Operations IrrigationSchedule
            Report: same as Validation.SE Queensland.Bremar_2003_.Bremar2003.Field.Report
            Report HarvestReport: EventNames=[Chickpea].Harvesting
              VariableNames:
                [Clock].Today
                [Chickpea].Phenology.CurrentStageName as Stage
                [Chickpea].Phenology.FloweringDAS as FloweringDAS
                [Chickpea].Phenology.MaturityDAS as MaturityDAS
                [Chickpea].Grain.Live.Wt as GrainWt
            Manager Harvesting: same as Validation.SE Queensland.Bremar_2003_.Bremar2003.Field.Harvesting
            Plant Chickpea
            Soil 2004soil056: Latitude=0; Longitude=0
              Physical
                Thickness  BD    AirDry  LL15  DUL   SAT
                150        1.37  0.06    0.17  0.4   0.45
                150        1.39  0.16    0.17  0.4   0.45
                300        1.37  0.16    0.17  0.4   0.45
                300        1.39  0.18    0.19  0.4   0.45
                300        1.42  0.22    0.23  0.38  0.43
                300        1.55  0.25    0.26  0.34  0.39
                300        1.54  0.31    0.33  0.34  0.38
                SoilCrop ChickpeaSoil: LL=[0.27, 0.27, 0.28, 0.32, 0.35, 0.34, 0.34]; KL=[0.045, 0.045, 0.045, 0.03, 0.02, 0, 0]; XF=[1, 1, 1, 1, 0.5, 0, 0]
              WaterBalance SoilWater: SummerDate=1-Nov; SummerU=6; SummerCona=3.5; WinterDate=1-Apr; WinterU=4; WinterCona=2.5; DiffusConst=40; DiffusSlope=16; Salb=0.13; CN2Bare=73; CNRed=20; CNCov=0.8; Thickness=[150, 150, 300, 300, 300, 300, 300]; SWCON=[0.3, 0.3, 0.3, 0.3, 0.3, 0.3, 0.3]
              SoilNitrogen: same as Validation.2019_PulseAdaptation.Emerald19_.Emerald19_.Field.Vertosol_No8.SoilNitrogen
              Organic: same as Validation.NewSouthWales.Kulai_2003_.Kulai_2003.Field.soil.Organic
              Chemical: same as Validation.NewSouthWales.Kulai_2003_.Kulai_2003.Field.soil.Chemical
              Sample Initial water: Thickness=[150, 150, 300, 300, 300, 300, 300]; SW=[0.356, 0.397, 0.413, 0.397, 0.343, 0.341, 0.33]; SWUnits=Volumetric; OCUnits=Total; PHUnits=Water
              CERESSoilTemperature Temperature
            Manager SowingRule: same as Validation.SE Queensland.Bremar_2003_.Bremar2003.Field.SowingRule
            Report RDDReport: EventNames=[Chickpea].Harvesting
              VariableNames:
                [Clock].Today
                [Chickpea].Phenology.RadDegDays
    Folder ICRISAT
      Experiment ICRISAT_18_19_BM8_
        Factors
          Factor Cv_: Specification=[SowingRule]
            Operations JAKI
              2018-11-21  [Chickpea].Sow(population:33, cultivar:"JAKI", depth:50, rowSpacing:300);
              2018-11-08  [Irrigation].Apply(amount:47, depth:0,efficiency:1, willRunoff:false);
              2018-11-22  [Irrigation].Apply(amount:42, depth:0,efficiency:1, willRunoff:false);
              2019-01-09  [Irrigation].Apply(amount:55, depth:0,efficiency:1, willRunoff:false);
            Operations ICCV2
              2018-11-21  [Chickpea].Sow(population:33, cultivar:"ICCV2", depth:50, rowSpacing:300);
              2018-11-08  [Irrigation].Apply(amount:47, depth:0,efficiency:1, willRunoff:false);
              2018-11-22  [Irrigation].Apply(amount:42, depth:0,efficiency:1, willRunoff:false);
              2019-01-09  [Irrigation].Apply(amount:55, depth:0,efficiency:1, willRunoff:false);
            Operations NBeG47
              2018-11-21  [Chickpea].Sow(population:33, cultivar:"NBeG47", depth:50, rowSpacing:300);
              2018-11-08  [Irrigation].Apply(amount:47, depth:0,efficiency:1, willRunoff:false);
              2018-11-22  [Irrigation].Apply(amount:42, depth:0,efficiency:1, willRunoff:false);
              2019-01-09  [Irrigation].Apply(amount:55, depth:0,efficiency:1, willRunoff:false);
            Operations NBeG119
              2018-11-21  [Chickpea].Sow(population:33, cultivar:"NBeG119", depth:30, rowSpacing:300);
              2018-11-08  [Irrigation].Apply(amount:47, depth:0,efficiency:1, willRunoff:false);
              2018-11-22  [Irrigation].Apply(amount:42, depth:0,efficiency:1, willRunoff:false);
              2019-01-09  [Irrigation].Apply(amount:55, depth:0,efficiency:1, willRunoff:false);
        Simulation ICRISAT_BM8
          Memo
            Experiment conducted by Amir Hajjapoor and Jana Kholova, data simulated by A Peake.
          Weather: FileName=Hyderabad.met
          Clock: Start=2018-11-01; End=2019-03-28
          Summary summaryfile
          SoilArbitrator Soil Arbitrator
          Zone Field: Area=1; Slope=0; AspectAngle=0; Altitude=50
            MicroClimate: a_interception=0; b_interception=1; c_interception=0; d_interception=0; soil_albedo=0.13; SoilHeatFluxFraction=0.4; MinimumHeightDiffForNewLayer=0; NightInterceptionFraction=0.5; ReferenceHeight=2
            Irrigation
            Fertiliser
            SurfaceOrganicMatter: InitialResidueName=wheat; InitialResidueType=wheat; InitialResidueMass=1500; InitialStandingFraction=0; InitialCPR=0; InitialCNR=76
            Operations IrrigationSchedule
            Report: same as Validation.SE Queensland.Bremar_2003_.Bremar2003.Field.Report
            Report HarvestReport: EventNames=[Chickpea].Harvesting
              VariableNames:
                [Clock].Today
                [Chickpea].Phenology.CurrentStageName as Stage
                [Chickpea].Phenology.FloweringDAS as FloweringDAS
                [Chickpea].Phenology.MaturityDAS as MaturityDAS
                [Chickpea].Grain.Live.Wt as GrainWt
            Manager Harvesting: same as Validation.SE Queensland.Bremar_2003_.Bremar2003.Field.Harvesting
            Plant Chickpea
            Manager SowingRule
              SowDate = 24-Jul
              CultivarName = Amethyst
              SowingDepth = 50
              RowSpacing = 300
              Population = 30
              script: same as in Validation.SE Queensland.Bremar_2003_.Bremar2003.Field.SowingRule
            Soil Vertosol_9_PAWC180: ASCOrder=Vertosol; SoilType=Clay; Site=Generic-Qld; State=Generic; Country=Australia; NaturalVegetation=NA; ApsoilNumber=521-GENERIC; Latitude=-27.183286; Longitude=151.263748; LocationAccuracy=Regional Soil Type; DataSource=Generic soil. CSIRO Sustainable Ecosystems, Toowoomba
              Comments=Generic soil developed by Allan Peake. 'Typical Vertosol' soil properties have been calculated as the average of vertosols with similar characteristics from within the Apsoil database. Groupings were made on the basis of bulk density. Measured BD, DUL and CLL for the groups were then averaged to derive the characteristics of the typical Vertosols. They can then be used in conjunction with measured soil water to simplify the selection of appropriate Vertosols, for paddocks where full soil characterisations have not yet been completed. For more information see Peake et al. 2010: ‘A rapid method for estimating the plant available water capacity of Vertosols’, 2010 Australian Agronomy Conference. Typical Vertosols are different to 'Generic' soil types elsewhere in the Apsoil database, which are representative of certain soil types and districts, but have not been calculated from large numbers of similar, characterised soils.
              Physical
                Thickness  BD    AirDry  LL15   DUL    SAT
                150        1.44  0.101   0.201  0.378  0.428
                150        1.43  0.167   0.209  0.379  0.429
                300        1.43  0.224   0.224  0.38   0.43
                300        1.46  0.224   0.224  0.368  0.418
                300        1.48  0.224   0.224  0.363  0.413
                300        1.49  0.224   0.224  0.357  0.407
                300        1.49  0.224   0.224  0.357  0.407
                SoilCrop ChickpeaSoil: LL=[0.201, 0.209, 0.224, 0.244, 0.31, 0.34, 0.357]; KL=[0.045, 0.045, 0.045, 0.03, 0.025, 0.02, 0.01]; XF=[1, 1, 1, 1, 1, 1, 1]
                  LL source: Field measured and checked for sensibility
                SoilCrop CottonSoil: LL=[0.201, 0.209, 0.224, 0.244, 0.279, 0.31, 0.341]; KL=[0.1, 0.1, 0.1, 0.1, 0.09, 0.07, 0.05]; XF=[1, 1, 1, 1, 1, 1, 1]
                  LL source: Field measured and checked for sensibility
                SoilCrop SorghumSoil: LL=[0.201, 0.209, 0.224, 0.244, 0.279, 0.31, 0.341]; KL=[0.07, 0.07, 0.07, 0.05, 0.05, 0.04, 0.03]; XF=[1, 1, 1, 1, 1, 1, 1]
                  LL source: Field measured and checked for sensibility
              WaterBalance SoilWater: SummerDate=1-Apr; SummerU=4; SummerCona=2.5; WinterDate=1-Oct; WinterU=6; WinterCona=3.5; DiffusConst=40; DiffusSlope=16; Salb=0.13; CN2Bare=78; CNRed=20; CNCov=0.8; Thickness=[150, 150, 300, 300, 300, 300, 300]; SWCON=[0.3, 0.3, 0.3, 0.3, 0.3, 0.3, 0.3]
              SoilNitrogen: same as Validation.2019_PulseAdaptation.Emerald19_.Emerald19_.Field.Vertosol_No8.SoilNitrogen
              Organic: FOMCNRatio=40
                Thickness  Carbon   SoilCNRatio  FBiom  FInert  FOM
                150        1.235    12           0.04   0.4     347.129
                150        0.988    12           0.02   0.6     270.344
                300        0.6175   12           0.02   0.8     163.972
                300        0.30875  12           0.02   1       99.4541
                300        0.18525  12           0.01   1       60.322
                300        0.1235   12           0.01   1       36.5871
                300        0.1235   12           0.01   1       22.1912
              Chemical: Thickness=[150, 150, 300, 300, 300, 300, 300]; PH=[8.1, 8.7, 8.9, 8, 7, 6.4, 5.8]
              Sample Initial water: Thickness=[150, 150, 300, 300, 300, 300, 300]; SW=[0.339, 0.346, 0.373, 0.4, 0.396, 0.396, 0.396]; SWUnits=Volumetric; OCUnits=Total; PHUnits=Water
              CERESSoilTemperature Temperature
            Report RDDReport: EventNames=[Chickpea].Harvesting
              VariableNames:
                [Clock].Today
                [Chickpea].Phenology.RadDegDays
        Memo
          4th biomass cut was taken almost at Phys. maturity - beginning to go yellow, may explain low SLA
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