Simulations: Version=171
  DataStore
    ExcelInput Obs_WaggaWagga: SheetNames=[Observed]
      FileNames=[Obs_WaggaWagga.xlsx, Observed\ForestHillObserved.xlsx, Observed\NorwinObserved.xlsx, Observed\ForestHillWheatObserved.xlsx]
    PredictedObserved: PredictedTableName=Report; ObservedTableName=Observed; FieldNameUsedForMatch=SimulationName; FieldName2UsedForMatch=Clock.Today; AllColumns=false
    ExcelInput Analytical: FileNames=[SoilTemperature-AnalyticalSolution.xlsx]; SheetNames=[AnalyticalDataForAPSIM]
    ExcelInput: FileNames=[NGObserved.xlsx]; SheetNames=[BareSoil, CornSoyCrop, CornSoySoil]
    PredictedObserved USAPredictedObserved: PredictedTableName=BareSoilReport; ObservedTableName=BareSoil; FieldNameUsedForMatch=SimulationName; FieldName2UsedForMatch=Date; AllColumns=false
    PredictedObserved USASoilPredObs: PredictedTableName=CSReport; ObservedTableName=CornSoySoil; FieldNameUsedForMatch=SimulationName; FieldName2UsedForMatch=Clock.Today; AllColumns=false
  Folder ValidationTests
    Folder ForestHill
      Simulation ForestHillWeatherStation
        Memo
          This simulation reproduces the soil conditions within the weather station at CSIRO Forest Hill.
        Weather: FileName=WeatherFiles\ForestHill.met
        Clock: Start=2023-01-01; End=2024-02-14
        Summary
        SoilArbitrator Soil Arbitrator
        MicroClimate: a_interception=0; b_interception=1; c_interception=0; d_interception=0; SoilHeatFluxFraction=0; MinimumHeightDiffForNewLayer=0; NightInterceptionFraction=0; ReferenceHeight=2
        Zone: Area=1; Slope=0; AspectAngle=0; Altitude=50
          Soil: Latitude=0; Longitude=0
            Water: Thickness=[50, 100, 100, 150, 200, 200, 400, 300]; InitialValues=[0.4, 0.4, 0.4, 0.4, 0.12, 0.12, 0.12, 0.12]; InitialPAWmm=157; RelativeTo=LL15; FilledFromTop=true
            Physical
              Thickness  ParticleSizeClay  BD   AirDry  LL15  DUL  SAT   KS
              50         40                1.3  0.1     0.2   0.4  0.45  25
              100        40                1.3  0.1     0.2   0.4  0.45  25
              100        40                1.3  0.1     0.2   0.4  0.45  25
              150        40                1.3  0.1     0.2   0.4  0.45  25
              200        10                1.6  0.05    0.05  0.1  0.29  100
              200        10                1.6  0.05    0.05  0.1  0.29  100
              400        10                1.6  0.05    0.05  0.1  0.29  100
              300        10                1.6  0.05    0.05  0.1  0.29  100
              SoilCrop SlurpSoil: LL=[0.2, 0.2, 0.2, 0.2, 0.05, 0.05, 0.05, 0.05]; KL=[0.06, 0.06, 0.06, 0.04, 0.04, 0.04, 0.04, 0]; XF=[1, 1, 1, 1, 1, 1, 1, 0]
            Swim3: Salb=0.16; CN2Bare=75; CNRed=20; CNCov=0.8; KDul=1; PSIDul=-330; VC=true; DTMin=0; DTMax=60; MaxWaterIncrement=1; SpaceWeightingFactor=0; SoluteSpaceWeightingFactor=0; Dis=15; Disp=1; A=1; DTHC=0; DTHP=1; Diagnostics=false
            LayerStructure: Thickness=[10, 20, 20, 25, 50, 125, 150, 200, 200, 400, 300]
            Organic: FOMCNRatio=60; CarbonUnits=Total
              Thickness  Carbon  SoilCNRatio  FBiom  FInert  FOM
              50         2       14.5         0.04   0.4     0.294
              100        1       14.5         0.03   0.5     0.253
              100        0.5     14.5         0.02   0.5     0.188
              150        0.2     14.5         0.01   0.5     0.114
              200        0.12    14.5         0.01   0.9     0.069
              200        0.1     14.5         0.01   0.99    0.042
              400        0.1     14.5         0.01   0.99    0.025
              300        0.1     14.5         0.01   0.99    0.025
            Chemical: Thickness=[50, 100, 100, 150, 200, 200, 400, 300]; PH=[5.8, 5.7, 5.7, 5.9, 5.7, 5.7, 5.7, 5.7]; PHUnits=Water
            Nutrient
            SoilTemperature Temperature: Thickness=[10, 20, 20, 25, 50, 125, 150, 200, 200, 400, 300]
              InitialValues=[23.5, 23.5, 23.5, 23.5, 23.5, 23, 22.7, 22.5, 22, 21.7, 21.5]
            Solute NO3: InitialValuesUnits=kg/ha; WaterTableConcentration=0; D0=0; DepthConstant=0; MaxDepthSoluteAccessible=0; RunoffEffectivenessAtMovingSolute=0; MaxEffectiveRunoff=0
              Thickness  InitialValues  Exco  FIP
              50         0.1            0     1
              100        0.1            0     1
              100        0.1            0     1
              150        0.01           0     1
              200        0.01           0     1
              200        0.01           0     1
              400        0.01           0     1
              300        0.01           0     1
            Solute NH4: InitialValuesUnits=kg/ha; WaterTableConcentration=0; D0=0; DepthConstant=0; MaxDepthSoluteAccessible=0; RunoffEffectivenessAtMovingSolute=0; MaxEffectiveRunoff=0
              Thickness  InitialValues  Exco  FIP
              50         0.01           0     1
              100        0.01           0     1
              100        0.01           0     1
              150        0.01           0     1
              200        0.01           0     1
              200        0.01           0     1
              400        0.01           0     1
              300        0.01           0     1
            Solute Urea: InitialValuesUnits=kg/ha; WaterTableConcentration=0; D0=0; DepthConstant=0; MaxDepthSoluteAccessible=0; RunoffEffectivenessAtMovingSolute=0; MaxEffectiveRunoff=0
              Thickness  InitialValues  Exco  FIP
              50         0              0     1
              100        0              0     1
              100        0              0     1
              150        0              0     1
              200        0              0     1
              200        0              0     1
              400        0              0     1
              300        0              0     1
          SurfaceOrganicMatter: InitialResidueName=Wheat; InitialResidueType=wheat; InitialResidueMass=1000; InitialStandingFraction=0; InitialCPR=0; InitialCNR=80
          Report: EventNames=[Clock].DoReport
            VariableNames:
              [Clock].Today
              [Soil].Temperature.AverageSoilTemp[5] as AverageSoilTemp@0100mm
              [Soil].Temperature.MaxSoilTemp[5] as MaxSoilTemp@0100mm
              [Soil].Temperature.MinSoilTemp[5] as MinSoilTemp@0100mm
              [Soil].Temperature.AverageSoilTemp[8] as AverageSoilTemp@0500mm
              [Soil].Temperature.MaxSoilTemp[8] as MaxSoilTemp@0500mm
              [Soil].Temperature.MinSoilTemp[8] as MinSoilTemp@0500mm
              [Soil].Temperature.AverageSoilTemp[10] as AverageSoilTemp@1000mm
              [Soil].Temperature.MaxSoilTemp[10] as MaxSoilTemp@1000mm
              [Soil].Temperature.MinSoilTemp[10] as MinSoilTemp@1000mm
          Plant Slurp
          Manager Slurp2Sow
            CultivarName = StaticCrop
            InitialRootDepth = 300
            SowingDate = 01/01/2023 00:00:00
```csharp
using Models.Soils;
using APSIM.Shared.Utilities;
using Models.PMF;
using Models.Core;
using System;
using System.Linq;
        
namespace Models
{
    [Serializable] 
    [System.Xml.Serialization.XmlInclude(typeof(Model))]
    public class Script : Model
    {
        [Link] Clock Clock;
        [Link] Zone zone;

        [Description("Cultivar")]
        public string CultivarName { get; set; }
        [Description("Initial Root Depth")]
        public double InitialRootDepth { get; set; }
        [Description("Sowing Date")]
        public DateTime SowingDate { get; set; }

               
        [EventSubscribe("DoManagement")]
        private void OnDoManagement(object sender, EventArgs e)
        {
            if (Clock.Today.Date == SowingDate)
            {
                foreach (Plant slurp in this.FindAllInScope<Plant>().OfType<IModel>().ToList())
                    slurp.Sow(cultivar: CultivarName, population: 1, depth: InitialRootDepth, rowSpacing: 150);
                object LAIResetValue = 1.0;
                zone.Set("Slurp.Leaf.Area.FixedValue", LAIResetValue);                                
                zone.Set("Slurp.Leaf.LaiDead.FixedValue", LAIResetValue); 
 
                object HeightResetValue = 50.0;
                zone.Set("Slurp.Leaf.HeightFunction.FixedValue", HeightResetValue); 
                 
            }
        }
    }
}
```
      Experiment ForestHillWheat
        Factors
          CompositeFactor TentHill
            Specifications:
              [Sow].Script.EmergenceDate = 05-jul
              [Sow].Script.Population= 70
              [Soil]
            Soil: SoilType=Black Vertosol; Site=Lawes; NearestTown=Lawes, Q 4343; Region=Lockyer; State=Queensland; Country=Australia; NaturalVegetation=Blue Gum, Moreton Bay Ash, Tea Tree; ApsoilNumber=37; Latitude=-27.537; Longitude=152.336; LocationAccuracy=+-20m; DataSource=CSIRO Sustainable Ecosystems, Toowoomba
              Comments=Soil naming structure: \State\Region\Classification-Local Name (Site/district and locator number); oc and ph estimated
              Physical
                Thickness  ParticleSizeClay  BD    AirDry  LL15  DUL   SAT   KS
                100        100               1.3   0.25    0.33  0.43  0.47  48
                100        100               1.3   0.33    0.33  0.43  0.48  48
                100        100               1.3   0.33    0.33  0.43  0.47  48
                100        100               1.3   0.32    0.32  0.43  0.47  48
                100        100               1.3   0.28    0.28  0.43  0.47  48
                100        100               1.35  0.27    0.27  0.4   0.47  48
                100        100               1.35  0.27    0.27  0.4   0.47  48
                100        100               1.35  0.27    0.27  0.4   0.47  48
                400        100               1.35  0.27    0.27  0.4   0.47  48
                400        100               1.35  0.27    0.27  0.4   0.47  48
                400        100               1.35  0.27    0.27  0.4   0.47  48
                SoilCrop WheatSoil
                  LL=[0.33, 0.33, 0.33, 0.32, 0.28, 0.27, 0.27, 0.27, 0.27, 0.27, 0.27]
                  KL=[0.06, 0.06, 0.06, 0.04, 0.03, 0.03, 0.03, 0.03, 0.03, 0.03, 0.03]
                  XF=[1, 1, 1, 1, 1, 1, 1, 1, 1, 1, 1]
              Organic: FOMCNRatio=40; CarbonUnits=Total
                Thickness  Carbon  SoilCNRatio  FBiom  FInert  FOM
                150        0.954   12           0.04   0.4     347.129
                150        0.954   12           0.02   0.6     270.344
                300        0.962   12           0.02   0.8     163.972
                300        0.846   12           0.02   1       99.454
                300        0.546   12           0.01   1       60.322
                300        0.262   12           0.01   1       36.587
                300        0.2     12           0.01   1       22.191
              Chemical: Thickness=[150, 150, 300, 300, 300, 300, 300]; PH=[8, 8, 8, 8, 8, 8, 8]; PHUnits=Water
              Water: Thickness=[100, 100, 100, 100, 100, 100, 100, 100, 400, 400, 400]; InitialPAWmm=251; RelativeTo=LL15; FilledFromTop=true
                InitialValues=[0.43, 0.43, 0.43, 0.43, 0.43, 0.4, 0.4, 0.4, 0.4, 0.4, 0.4]
              Nutrient
              Solute NO3: InitialValuesUnits=ppm; WaterTableConcentration=0; D0=0.05; DepthConstant=0; MaxDepthSoluteAccessible=0; RunoffEffectivenessAtMovingSolute=0; MaxEffectiveRunoff=0
                Thickness  InitialValues  Exco  FIP
                150        38.023         0     1
                150        12.955         0     1
                300        0.422          0     1
                300        0.422          0     1
                300        0.422          0     1
                300        0.422          0     1
                500        0.422          0     1
              Solute NH4: InitialValuesUnits=ppm; WaterTableConcentration=0; D0=0.05; DepthConstant=0; MaxDepthSoluteAccessible=0; RunoffEffectivenessAtMovingSolute=0; MaxEffectiveRunoff=0
                Thickness  InitialValues  Exco  FIP
                150        0.38           1     1
                150        0.155          1     1
                300        0.042          1     1
                300        0.042          1     1
                300        0.042          1     1
                300        0.042          1     1
                500        0.042          1     1
              Solute Urea: InitialValuesUnits=kg/ha; WaterTableConcentration=0; D0=0.05; DepthConstant=0; MaxDepthSoluteAccessible=0; RunoffEffectivenessAtMovingSolute=0; MaxEffectiveRunoff=0
                Thickness  InitialValues  Exco  FIP
                150        0              0     1
                150        0              0     1
                300        0              0     1
                300        0              0     1
                300        0              0     1
                300        0              0     1
                500        0              0     1
              Swim3: Salb=0.13; CN2Bare=75; CNRed=20; CNCov=0.8; KDul=0.1; PSIDul=-100; VC=true; DTMin=0; DTMax=1440; MaxWaterIncrement=5; SpaceWeightingFactor=0; SoluteSpaceWeightingFactor=1; Dis=0; Disp=1; A=2; DTHC=0.1; DTHP=2; Diagnostics=true
              LayerStructure
                Thickness=[10, 20, 40, 30, 100, 100, 100, 100, 100, 100, 100, 100, 100, 200, 300, 300, 200]
              SoilTemperature Temperature: Thickness=[100, 100, 100, 100, 100, 100, 100, 100]; InitialValues=[11, 11, 11, 11, 12, 13, 15.3, 14]
          CompositeFactor Cavendish
            Specifications:
              [Sow].Script.EmergenceDate = 28-jun
              [Sow].Script.Population=100
              [Soil]
            Soil: SoilType=Black Vertosol; Site=Lawes; NearestTown=Lawes, Q 4343; Region=Lockyer; State=Queensland; Country=Australia; NaturalVegetation=Blue Gum, Moreton Bay Ash, Tea Tree; ApsoilNumber=37; Latitude=-27.537; Longitude=152.336; LocationAccuracy=+-20m; DataSource=CSIRO Sustainable Ecosystems, Toowoomba
              Comments=Soil naming structure: \State\Region\Classification-Local Name (Site/district and locator number); oc and ph estimated
              Physical
                Thickness  ParticleSizeClay  BD   AirDry  LL15  DUL  SAT   KS
                100        1                 1.4  0.1     0.16  0.4  0.45  48
                100        1                 1.4  0.21    0.21  0.4  0.45  48
                100        1                 1.4  0.22    0.22  0.4  0.45  48
                100        1                 1.4  0.24    0.24  0.4  0.45  48
                100        1                 1.4  0.24    0.24  0.4  0.45  48
                100        1                 1.4  0.24    0.24  0.4  0.45  48
                100        1                 1.4  0.24    0.24  0.4  0.45  48
                100        1                 1.4  0.24    0.24  0.4  0.45  48
                400        1                 1.4  0.24    0.24  0.4  0.45  48
                400        1                 1.4  0.24    0.24  0.4  0.45  48
                400        1                 1.4  0.24    0.24  0.4  0.45  48
                400        1                 1.4  0.24    0.24  0.4  0.45  48
                SoilCrop WheatSoil
                  LL=[0.16, 0.21, 0.22, 0.24, 0.24, 0.24, 0.24, 0.26, 0.28, 0.3, 0.3, 0.3]
                  KL=[0.06, 0.06, 0.06, 0.04, 0.03, 0.03, 0.03, 0.03, 0.03, 0.03, 0.03, 0.03]
                  XF=[1, 1, 1, 1, 1, 1, 1, 1, 1, 1, 1, 1]
              Organic: same as ValidationTests.ForestHill.ForestHillWheat.Factors.TentHill.Soil.Organic
              Chemical: Thickness=[150, 150, 300, 300, 300, 300, 300]; PH=[8, 8, 8, 8, 8, 8, 8]; PHUnits=Water
              Water: Thickness=[150, 150, 300, 300, 300, 300, 300, 200, 200]; InitialValues=[0.4, 0.4, 0.4, 0.4, 0.4, 0.4, 0.4, 0.4, 0.4]; InitialPAWmm=365; RelativeTo=LL15; FilledFromTop=true
              Nutrient
              Solute NO3: same as ValidationTests.ForestHill.ForestHillWheat.Factors.TentHill.Soil.NO3
              Solute NH4: same as ValidationTests.ForestHill.ForestHillWheat.Factors.TentHill.Soil.NH4
              Solute Urea: same as ValidationTests.ForestHill.ForestHillWheat.Factors.TentHill.Soil.Urea
              Swim3: same as ValidationTests.ForestHill.ForestHillWheat.Factors.TentHill.Soil.Swim3
              LayerStructure
                Thickness=[10, 20, 40, 30, 100, 100, 100, 100, 100, 100, 100, 100, 100, 200, 300, 300, 200]
              SoilTemperature Temperature: Thickness=[100, 100, 100, 100, 100, 100, 100, 100]; InitialValues=[14, 14, 14, 14, 14.5, 15.3, 16.5, 17]
        Simulation ForestHillWheatBase
          Clock: Start=2022-06-20; End=2022-11-30
          Summary summaryfile
          Weather: FileName=WeatherFiles\ForestHill.met
          SoilArbitrator Soil Arbitrator
          MicroClimate: a_interception=0; b_interception=1; c_interception=0; d_interception=0; SoilHeatFluxFraction=0.4; MinimumHeightDiffForNewLayer=0; NightInterceptionFraction=0.5; ReferenceHeight=2
          Zone Field: Area=1; Slope=0; AspectAngle=0; Altitude=50
            Manager Sow
              SowDate = 20-Jun
              CultivarName = Hartog
              SowingDepth = 30
              RowSpacing = 250
              Population = 160
              EmergenceDate = 24-jun
```csharp
using APSIM.Shared.Utilities;
using Models.Utilities;
using Models.Soils;
using Models.PMF;
using Models.Core;
using System;

namespace Models
{
    [Serializable]
    public class Script : Model
    {
        [Link] Clock Clock;
        [Link] Fertiliser Fertiliser;
        [Link] Summary Summary;
        [Link] Soil Soil;
        [Link] Plant Wheat;        
        
        [Description("Sowing date (d-mmm)")]
        public string SowDate { get; set; }

        [Description("Emergence date (d-mmm)")]
        public string EmergenceDate { get; set; }


        [Display(Type = DisplayType.CultivarName)]
        [Description("Cultivar to be sown")]
        public string CultivarName { get; set; }

        [Description("Sowing depth (mm)")]
        public double SowingDepth { get; set; }

        [Description("Row spacing (mm)")]
        public double RowSpacing { get; set; }

        [Description("Plant population (/m2)")]
        public double Population { get; set; }

        [EventSubscribe("DoManagement")]
        private void OnDoManagement(object sender, EventArgs e)
        {
            if (DateUtilities.WithinDates(SowDate, Clock.Today, SowDate))
            {
                Wheat.Sow(population: Population, cultivar: CultivarName, depth: SowingDepth, rowSpacing: RowSpacing); 
                Wheat.Phenology.SetEmergenceDate(EmergenceDate);
            }
        }
    }
}
```
            Manager Harvest (disabled)
              Crop = [Wheat]
```csharp
using APSIM.Shared.Utilities;
using Models.Utilities;
using Models.Soils;
using Models.PMF;
using Models.Core;
using System;

namespace Models
{
    [Serializable] 
    public class Script : Model
    {
        [Description("Crop")]
        public IPlant Crop { get; set; }
        
        [EventSubscribe("DoManagement")]
        private void OnDoManagement(object sender, EventArgs e)
        {
            if (Crop.IsReadyForHarvesting)
            {
                Crop.Harvest();
                Crop.EndCrop();
            }
        }
    }
}
```
            Operations
            Irrigation
            Fertiliser
            Soil: SoilType=Black Vertosol; Site=Lawes; NearestTown=Lawes, Q 4343; Region=Lockyer; State=Queensland; Country=Australia; NaturalVegetation=Blue Gum, Moreton Bay Ash, Tea Tree; ApsoilNumber=37; Latitude=-27.537; Longitude=152.336; LocationAccuracy=+-20m; DataSource=CSIRO Sustainable Ecosystems, Toowoomba
              Comments=Soil naming structure: \State\Region\Classification-Local Name (Site/district and locator number); oc and ph estimated
              Physical
                Thickness  ParticleSizeClay  BD    AirDry  LL15  DUL   SAT   KS
                100        40                1.32  0.13    0.26  0.41  0.47  48
                300        40                1.3   0.208   0.26  0.43  0.48  48
                400        40                1.23  0.26    0.26  0.46  0.51  48
                800        40                1.23  0.26    0.26  0.46  0.51  48
                400        40                1.23  0.26    0.26  0.46  0.51  48
                SoilCrop WheatSoil: LL=[0.26, 0.26, 0.26, 0.35, 0.46]; KL=[0.06, 0.06, 0.06, 0.04, 0.03]; XF=[1, 1, 1, 1, 1]
              Organic: same as ValidationTests.ForestHill.ForestHillWheat.Factors.TentHill.Soil.Organic
              Chemical: Thickness=[150, 150, 300, 300, 300, 300, 300]; PH=[8, 8, 8, 8, 8, 8, 8]; PHUnits=Water
              Water: Thickness=[150, 150, 300, 300, 300, 300, 300, 200]; InitialValues=[0.417, 0.43, 0.45, 0.46, 0.46, 0.46, 0.46, 0.267]; InitialPAWmm=347.45; RelativeTo=LL15; FilledFromTop=true
              Nutrient
              Solute NO3: same as ValidationTests.ForestHill.ForestHillWheat.Factors.TentHill.Soil.NO3
              Solute NH4: same as ValidationTests.ForestHill.ForestHillWheat.Factors.TentHill.Soil.NH4
              Solute Urea: same as ValidationTests.ForestHill.ForestHillWheat.Factors.TentHill.Soil.Urea
              Swim3: same as ValidationTests.ForestHill.ForestHillWheat.Factors.TentHill.Soil.Swim3
              LayerStructure
                Thickness=[10, 20, 40, 30, 100, 100, 100, 100, 100, 100, 100, 100, 100, 200, 300, 300, 200]
              SoilTemperature Temperature: Thickness=[100, 100, 100, 100, 100, 100, 100, 100]; InitialValues=[14, 14, 14, 14, 14.5, 15, 15.3, 15.5]
            SurfaceOrganicMatter: InitialResidueName=wheat_stubble; InitialResidueType=wheat; InitialResidueMass=500; InitialStandingFraction=0; InitialCPR=0; InitialCNR=100
            Plant Wheat
            Report: EventNames=[CLock].DoReport
              VariableNames:
                [Clock].Today
                [Wheat].Phenology.HaunStage
                [Wheat].Phenology.CurrentStageName
                [Wheat].Leaf.LAI
                [Wheat].Leaf.LAITotal
                [Wheat].Leaf.Fw
                [Wheat].Leaf.Fn
                [Wheat].AboveGround.Wt
                [Wheat].Grain.Wt
                sum([Soil].Water.MM) as TotalSW
                [EMCalculator].Script.EMp100 as EMp100
                [EMCalculator].Script.FASW
                [Soil].Temperature.AverageSoilTemp[3] as AverageSoilTemp@050mm
                [Soil].Temperature.AverageSoilTemp[5] as AverageSoilTemp@150mm
                [Soil].Temperature.AverageSoilTemp[6] as AverageSoilTemp@250mm
                [Soil].Temperature.AverageSoilTemp[7] as AverageSoilTemp@350mm
                [Soil].Temperature.AverageSoilTemp[8] as AverageSoilTemp@450mm
                [Soil].Temperature.AverageSoilTemp[9] as AverageSoilTemp@550mm
                [Soil].Temperature.AverageSoilTemp[10] as AverageSoilTemp@650mm
                [Soil].Temperature.AverageSoilTemp[11] as AverageSoilTemp@750mm
                [Soil].Temperature.MinSoilTemp[3] as MinSoilTemp@050mm
                [Soil].Temperature.MinSoilTemp[5] as MinSoilTemp@150mm
                [Soil].Temperature.MinSoilTemp[6] as MinSoilTemp@250mm
                [Soil].Temperature.MinSoilTemp[7] as MinSoilTemp@350mm
                [Soil].Temperature.MinSoilTemp[8] as MinSoilTemp@450mm
                [Soil].Temperature.MinSoilTemp[9] as MinSoilTemp@550mm
                [Soil].Temperature.MinSoilTemp[10] as MinSoilTemp@650mm
                [Soil].Temperature.MinSoilTemp[11] as MinSoilTemp@750mm
                [Soil].Temperature.MaxSoilTemp[3] as MaxSoilTemp@050mm
                [Soil].Temperature.MaxSoilTemp[5] as MaxSoilTemp@150mm
                [Soil].Temperature.MaxSoilTemp[6] as MaxSoilTemp@250mm
                [Soil].Temperature.MaxSoilTemp[7] as MaxSoilTemp@350mm
                [Soil].Temperature.MaxSoilTemp[8] as MaxSoilTemp@450mm
                [Soil].Temperature.MaxSoilTemp[9] as MaxSoilTemp@550mm
                [Soil].Temperature.MaxSoilTemp[10] as MaxSoilTemp@650mm
                [Soil].Temperature.MaxSoilTemp[11] as MaxSoilTemp@750mm
            Manager Fertilise topup
              FertiliserType = NO3N
              Threshold = 100
```csharp
using Models.Soils;
using APSIM.Shared.Utilities;
using Models.Soils.Nutrients;
using Models.PMF;
using Models.Core;
using System;
using Models.Soils.Nutrients;
namespace Models
{
    [Serializable]
    public class Script : Model
    {
        [Link] Clock Clock;
        [Link] Fertiliser Fertiliser;
        [Link(ByName=true)] Solute NO3;

        [Description("Type of fertiliser to apply? ")] 
        public Fertiliser.Types FertiliserType { get; set; }
    
        [Description("Threshold amount of NO3 to topup to (kg/ha)")]
        public double Threshold { get; set;}
        
        [EventSubscribe("DoManagement")]
        private void OnDoManagement(object sender, EventArgs e)
        {
            double Amount = Threshold - MathUtilities.Sum(NO3.kgha);
            Fertiliser.Apply(Amount: Amount, Type: FertiliserType);
        }
    }
}
```
            Manager EMCalculator
              EMLL15 = 30
              EMp100 = 0
              FASW = 0
              EMRange = 0
```csharp
using System;
using Models.Core;
using Models.Interfaces;
using Models.PMF;
using APSIM.Shared.Utilities;
using Models.Soils;

namespace Models
{
    [Serializable]
    public class Script : Model
    {
        [Link] IClock Clock;
        [Link] ISummary Summary;
        [Link] Water water;
        [Link] Physical physical;
        [Link] private ISoilWater waterBalance;
        [Link] private ISoilTemperature soiltemperature;
        


        [Description("EM reading at LL15")]
        public double EMLL15 { get; set;}
        
        [Description("EM reading range")]
        public double EMRange { get; set;}


       [Description("Daily EMv100")]
        public double EMp100 { get; set;}


       [Description("Daily FASW")]
        public double FASW { get; set;}

        [EventSubscribe("DoManagement")]
        private void DoDailyCalculations(object sender, EventArgs e)
        {
            int numlayers = 8;
            double WFtot = 0;
            double top = 0;
            double bottom = 0;
            
            for (int i=0; i<numlayers; i++)
            {
               top = bottom;
               bottom = top +physical.Thickness[i] ;
               WFtot += Fcp(top/1000, bottom/1000);
            }

            top = 0;
            bottom = 0;       
            FASW = 0;     
            EMp100 = 0;
            for (int i=0; i<numlayers; i++)
            {
               top = bottom;
               bottom = top + physical.Thickness[i] ;
               double WtLayer = Fcp(top/1000, bottom/1000)/WFtot;

               double FASWLayer = (water.MM[i] - physical.LL15mm[i])/(physical.DULmm[i] - physical.LL15mm[i]);                              
               FASW += FASWLayer * WtLayer;
               
               double ST = soiltemperature.Value[i];
               double ECLayer = (EMLL15 + FASWLayer * EMRange)/TF(ST);   
               EMp100 += ECLayer * WtLayer;               
           
            }
        
            
        }
       

private double  phiv(double z )
{
return 4 * z * Math.Pow((4 * Math.Pow(z,2) + 1),-1.5);
}

private double  phih(double z ) 
{
return 2 - 4 * z * Math.Pow((4 * Math.Pow(z, 2) + 1),-0.5);
}

private double  Rv(double z ) 
{
return Math.Pow((4 * Math.Pow(z,2) + 1),-0.5);
}

private double  Rh(double z ) 
{
return Math.Pow((4 * Math.Pow(z,2) + 1),0.5) - 2 * z;
}

private double  Rp(double z ) 
{
return Math.Pow((4 * Math.Pow(z,2) + 1),0.5) * 2 * z;
}

private double  Fcv(double D1, double D2 )
{
return Rv(D1) - Rv(D2);
}


private double  Fch(double D1, double D2)
{
return Rh(D1) - Rh(D2);
}
        
private double  Fcp(double D1, double D2)
{
return Rp(D1) - Rp(D2);
}        
        
private double TF(double t)
{ 
 return 1 / (1 + 0.0191 * (t - 25));
}
        
        
    }
}
```
    Folder Wagga
      Simulation Wagga
        Memo
          This simulation is a duplicate of the Eucalyptus validation Wagga simulation. The only change is the addition of the soil temperature model.
        Weather: FileName=%root%\Tests\Validation\Eucalyptus\wwepp.met
        Clock: Start=1991-07-01; End=1995-06-30
        Summary
        SoilArbitrator Soil Arbitrator
        Zone Plantation: Area=1; Slope=0; AspectAngle=0; Altitude=50
          Soil: Latitude=0; Longitude=0
            Water: Thickness=[100, 300, 600, 1000, 1000, 1000, 1000, 1000]; InitialValues=[0.16, 0.15, 0.14, 0.13, 0.12, 0.12, 0.099, 0.05]; InitialPAWmm=364; RelativeTo=LL15; FilledFromTop=true
            Physical
              Thickness  ParticleSizeClay  BD    AirDry  LL15  DUL   SAT
              100        9                 1.5   0.01    0.05  0.16  0.29
              300        11                1.6   0.01    0.05  0.15  0.29
              600        13                1.68  0.01    0.05  0.14  0.29
              1000       14                1.75  0.02    0.05  0.13  0.29
              1000       25                1.7   0.05    0.05  0.12  0.29
              1000       35                1.7   0.05    0.05  0.12  0.29
              1000       42                1.7   0.05    0.05  0.12  0.29
              1000       40                1.7   0.05    0.05  0.12  0.29
              SoilCrop EucalyptusSoil: LL=[0.01, 0.01, 0.01, 0.01, 0.01, 0.01, 0.01, 0.01]; KL=[0.07, 0.07, 0.05, 0.02, 0.02, 0.02, 0.01, 0.01]; XF=[1, 1, 1, 1, 0.3, 0.2, 0, 0]
              SoilCrop SCRUMSoil: LL=[0.01, 0.01, 0.01, 0.01, 0.01, 0.01, 0.01, 0.01]; KL=[0.07, 0.07, 0.05, 0.02, 0.02, 0.02, 0.01, 0.01]; XF=[1, 1, 1, 1, 0.3, 0.2, 0, 0]
            WaterBalance SoilWater: SummerDate=1-Nov; SummerU=4; SummerCona=3.5; WinterDate=1-Apr; WinterU=4; WinterCona=3.5; DiffusConst=88; DiffusSlope=35.4; Salb=0.13; CN2Bare=65; CNRed=20; CNCov=0.8; DischargeWidth=0; CatchmentArea=0; PSIDul=-100
              Thickness  SWCON  KLAT
              100        0.9    0
              300        0.9    0
              600        0.9    0
              1000       0.6    0
              1000       0.6    0
              1000       0.6    0
              1000       0.6    0
              1000       0.6    0
            Organic: FOMCNRatio=60; CarbonUnits=Total
              Thickness  Carbon  SoilCNRatio  FBiom  FInert  FOM
              100        2       14.5         0.04   0.4     0.29407
              300        1       14.5         0.03   0.5     0.253108
              600        0.5     14.5         0.02   0.5     0.187507
              1000       0.2     14.5         0.01   0.5     0.113729
              1000       0.12    14.5         0.01   0.9     0.06898
              1000       0.1     14.5         0.01   0.99    0.0418385
              1000       0.1     14.5         0.01   0.99    0.0253763
              1000       0.1     14.5         0.01   0.99    0.0153915
            Chemical: Thickness=[100, 300, 600, 1000, 1000, 1000, 1000, 1000]; PH=[5.8, 5.7, 5.7, 5.9, 5.7, 5.7, 5.7, 5.7]; PHUnits=Water
            Nutrient
            SoilTemperature
            LayerStructure: Thickness=[1, 1, 1, 7, 10, 10, 120, 100, 100, 100, 100, 50]
            Solute NO3: Thickness=[100, 300, 600, 1000, 1000, 1000, 1000, 1000]; InitialValues=[0.1, 0.1, 0.1, 0.01, 0.01, 0.01, 0.01, 0.01]; InitialValuesUnits=kg/ha; WaterTableConcentration=0; D0=0; DepthConstant=0; MaxDepthSoluteAccessible=0; RunoffEffectivenessAtMovingSolute=0; MaxEffectiveRunoff=0
            Solute NH4: Thickness=[100, 300, 600, 1000, 1000, 1000, 1000, 1000]; InitialValues=[0.01, 0.01, 0.01, 0.01, 0.01, 0.01, 0.01, 0.01]; InitialValuesUnits=kg/ha; WaterTableConcentration=0; D0=0; DepthConstant=0; MaxDepthSoluteAccessible=0; RunoffEffectivenessAtMovingSolute=0; MaxEffectiveRunoff=0
            Solute Urea: Thickness=[100, 300, 600, 1000, 1000, 1000, 1000, 1000]; InitialValues=[0, 0, 0, 0, 0, 0, 0, 0]; InitialValuesUnits=kg/ha; WaterTableConcentration=0; D0=0; DepthConstant=0; MaxDepthSoluteAccessible=0; RunoffEffectivenessAtMovingSolute=0; MaxEffectiveRunoff=0
          Irrigation
          Fertiliser
          SurfaceOrganicMatter: InitialResidueName=Wheat; InitialResidueType=Wheat; InitialResidueMass=2000; InitialStandingFraction=0; InitialCPR=0; InitialCNR=80
          MicroClimate: a_interception=0; b_interception=1; c_interception=0; d_interception=0; SoilHeatFluxFraction=0; MinimumHeightDiffForNewLayer=0; NightInterceptionFraction=0; ReferenceHeight=2
          Plant Eucalyptus
          Plant SCRUM
          Manager TreeTransplantRule
            RowSpace = 3
            RowWidth = 3
            CultivarName = grandisCoffsHarbour
            SowingDate = 07/01/1991 00:00:00
```csharp
using Models.Soils;
using System;
using Models.Core;
using Models.PMF;
namespace Models
{
    [Serializable] 
    [System.Xml.Serialization.XmlInclude(typeof(Model))]
    public class Script : Model
    {
        [Link] Plant Plant;
        [Link] Clock Clock;

        [Description("Spacing (m) between plants within rows")]
        public double RowSpace { get; set; }
        [Description("Spacing (m) between rows")]
        public double RowWidth { get; set; }

        [Description("Cultivar")]
        [Display(Type=DisplayType.CultivarName)]
        public string CultivarName { get; set; }
        [Description("Sowing Date")]
        public DateTime SowingDate { get; set; }

        [EventSubscribe("DoManagement")]
        private void OnDoManagement(object sender, EventArgs e)
        {
            double PlantPopulation = 1 / (RowWidth * RowSpace);

            if (Clock.Today.Date == SowingDate)
                Plant.Sow(population: PlantPopulation, 
                    cultivar: CultivarName, 
                    depth: 100, 
                    rowSpacing: 150);
            //Plant.Sow(... Contains the following arguements:
            //Population  double  Required  Seeds sowing/m2
            //Cultivar    string  Required  "NameOfCultivar"
            //Depth       double  Optional  Depth (mm) seed sown.   Default is 100mm 
            //MaxCover    double  Optional  Proportion (0-1) of the ground row crop will cover.   Default is 1.0
            //BudNumber   double  Optional  Number of mainstems per seed sown.  Default is 1.0
            //RowSpacing  double  Optional  Spaceing (mm) between drill rows when crop is sown.  Default is 150mm
            //CropClass   string  Optional  Crop class to instantiate when crop is sown.  Default is "Plant"
        }
    }
}
```
          Operations WeedSowing
            1991-07-01  [SCRUM].Sow(population: 1, cultivar: Barley_Autumn, depth: 10, rowSpacing: 150);
          Operations FertiliserOperations
            1987-02-09  [Fertiliser].Apply(192, Fertiliser.Types.UreaN, 0);
            1987-05-20  [Fertiliser].Apply(192, Fertiliser.Types.UreaN, 0);
            1987-08-28  [Fertiliser].Apply(96, Fertiliser.Types.UreaN, 0);
            1987-12-06  [Fertiliser].Apply(256, Fertiliser.Types.UreaN, 0);
            1988-02-29  [Fertiliser].Apply(256, Fertiliser.Types.UreaN, 0);
            1988-07-18  [Fertiliser].Apply(128, Fertiliser.Types.UreaN, 0);
            1988-10-26  [Fertiliser].Apply(192, Fertiliser.Types.UreaN, 0);
            1989-06-09  [Fertiliser].Apply(128, Fertiliser.Types.UreaN, 0);
            1989-10-27  [Fertiliser].Apply(96, Fertiliser.Types.UreaN, 0);
          Report: EventNames=[Clock].DoReport
            VariableNames:
              [Clock].Today
              [Soil].SoilTemperature.AverageSoilTemp[2] as AverageSoilTemp@0003mm
              [Soil].SoilTemperature.AverageSoilTemp[5] as AverageSoilTemp@0025mm
          Manager AutoFertigate
            AutoIrrigationOn = True
            FASWThreshold = 0.95
            FASWDepth = 1000
            NConc = 3
```csharp
using Models.Interfaces;
using APSIM.Shared.Utilities;
using System.Xml.Serialization;
using Models;
using Models.PMF;
using Models.Soils;
using System.Text;
using System.Collections.Generic;
using Models.Core;
using System;
using Models.Soils.Nutrients;

namespace Models
{
    [Serializable] 
    public class Script : Model
    {
        [Link] private Plant Chickpea;
        [Link] private Zone zone;
        [Link] private Irrigation irrigation;
        [Link] private Fertiliser fertiliser;
        [Link] private Soil soil;
        [Link]
        private IPhysical soilPhysical;
        [Link]
        private ISoilWater waterBalance;
        public double FASW { get; set; }
        public double WaterDeficit  { get; set; }
    
        
        [Description("Auto irrigation on?")]
        public bool AutoIrrigationOn { get; set; }
        
        [Description("Threshold fraction available water (0-1)")]
        public double FASWThreshold { get; set; }

        [Description("Soil depth (mm) to which fraction available water is calculated")]
        public double FASWDepth { get; set; }

        [Description("N Concentration in irrigation water (ppm)")]
        public double NConc { get; set; }

        [EventSubscribe("DoManagement")]
        private void OnDoManagement(object sender, EventArgs e)
        {
            CalculateFASW();
            if (AutoIrrigationOn)
            {
                if (FASW < FASWThreshold)
                {
                    double amount = WaterDeficit * 10000.0 * NConc/1000000.0;
                    irrigation.Apply(WaterDeficit, depth: 0);
                    fertiliser.Apply(Amount: amount, Type: Fertiliser.Types.NO3N);
                }
            }
        }
        
        private void CalculateFASW()
        {
            double[] LL15 = MathUtilities.Multiply(soilPhysical.LL15, soilPhysical.Thickness);
            double[] DUL = MathUtilities.Multiply(soilPhysical.DUL, soilPhysical.Thickness);
        
            int nlayr = GetLayerIndex();
            double cumdep = MathUtilities.Sum(soilPhysical.Thickness, 0, nlayr, 0.0);

            double excess_fr = MathUtilities.Divide((cumdep - FASWDepth), soilPhysical.Thickness[nlayr], 0.0);

            // note that results may be strange if swdep < ll15
            double avail_sw = (MathUtilities.Sum(waterBalance.SWmm, 0, nlayr, 0.0)
                              - excess_fr * waterBalance.SWmm[nlayr])
                              - (MathUtilities.Sum(LL15, 0, nlayr, 0.0)
                              - excess_fr * LL15[nlayr]);


            double pot_avail_sw = (MathUtilities.Sum(DUL, 0, nlayr, 0.0)
                                  - excess_fr * DUL[nlayr])
                                  - (MathUtilities.Sum(LL15, 0, nlayr, 0.0)
                                  - excess_fr * LL15[nlayr]);

            FASW = MathUtilities.Divide(avail_sw, pot_avail_sw, 0.0);
            WaterDeficit = MathUtilities.Constrain(pot_avail_sw - avail_sw, 0.0, 100000);
        }

        private int GetLayerIndex()
        {
            double[] cumThickness = soilPhysical.ThicknessCumulative;
            for (int i = 1; i < cumThickness.Length; i++)
            {
                if (FASWDepth < cumThickness[i])
                    return i - 1;
            }
            
            return cumThickness.Length - 1;
        }

    }
}
```
          Manager Harvesting
            Crop = [Eucalyptus]
```csharp
using Models.Soils.Nutrients;
using System;
using Models.Core;
using Models.PMF;
using Models.Soils;
using Models.Soils.Nutrients;
using Models.Utilities;
using APSIM.Shared.Utilities;

namespace Models
{
    [Serializable] 
    public class Script : Model
    {
        [Description("Crop")]
        public IPlant Crop { get; set; }
        
        [EventSubscribe("DoManagement")]
        private void OnDoManagement(object sender, EventArgs e)
        {
            if (Crop.IsReadyForHarvesting)
            {
                Crop.Harvest();
                Crop.EndCrop();
            }
        }
    }
}
```
    Folder Norwin
      Simulation Norwin
        Clock: Start=2010-01-01; End=2010-12-31
        Summary SummaryFile
        Weather: FileName=WeatherFiles\Kurrowah_Norwin comp.met
        SoilArbitrator
        MicroClimate: a_interception=0; b_interception=1; c_interception=0; d_interception=0; SoilHeatFluxFraction=0.4; MinimumHeightDiffForNewLayer=0; NightInterceptionFraction=0.5; ReferenceHeight=2
        Zone Field: Area=1; Slope=0; AspectAngle=0; Altitude=50
          Report: EventNames=[Clock].DoReport
            VariableNames:
              [Clock].Today
              sum([Soil].Water.MM) as ProfileWater
              sum([Soil].Physical.DULmm) as DUL
              sum([Soil].Physical.LL15mm) as LL15
              (0.1 * [Soil].Temperature.Value[1] + 0.2 * [Soil].Temperature.Value[2] + 0.2 * [Soil].Temperature.Value[3] + 0.5 * [Soil].Temperature.Value[4]) as ST10cm
              [Soil].Temperature.Value[5] as ST20cm
              [Soil].Temperature.Value[6] as ST30cm
              [Soil].Temperature.Value[7] as ST50cm
          SurfaceOrganicMatter: InitialResidueName=wheat_stubble; InitialResidueType=wheat; InitialResidueMass=3000; InitialStandingFraction=0.8; InitialCPR=0; InitialCNR=80
          Soil: SoilType=Black Vertosol; Site=Bongeen; NearestTown=Bongeen, Q 4356; Region=Darling Downs; State=Queensland; Country=Australia; NaturalVegetation=Qld. Bluegrass, possible Qld. Blue gum; ApsoilNumber=1; Latitude=-27.629; Longitude=151.402; LocationAccuracy=+/-20m; DataSource=CSIRO Sustainable Ecosystems, Toowoomba
            Comments=Soil naming structure: \State\Region\Classification-Local Name (Site/district and locator number); oc and ph estimated
            Physical
              Thickness  ParticleSizeClay  BD    AirDry  LL15  DUL   SAT   KS
              100        70                0.99  0.1     0.26  0.55  0.61  100
              100        70                1.06  0.14    0.26  0.55  0.6   100
              100        70                1.06  0.14    0.26  0.55  0.6   100
              300        70                1.13  0.2     0.32  0.55  0.57  100
              300        70                1.11  0.2     0.33  0.5   0.55  100
            Chemical: Thickness=[150, 150, 300, 300, 300, 300, 300]; PH=[8, 8, 8, 8, 8, 8, 8]; PHUnits=Water
            Swim3: same as ValidationTests.ForestHill.ForestHillWeatherStation.Zone.Soil.Swim3
            Organic: FOMCNRatio=40; CarbonUnits=Total
              Thickness  Carbon  SoilCNRatio  FBiom  FInert  FOM
              150        1.24    12           0.04   0.4     1000
              150        1.24    12           0.02   0.6     400
              300        1.25    12           0.02   0.8     150
              300        1.1     12           0.02   1       100
              300        0.71    12           0.01   1       50
              300        0.34    12           0.01   1       50
              300        0.26    12           0.01   1       50
            Water: Thickness=[150, 150, 300, 300]; InitialValues=[0.19, 0.19, 0.26, 0.32]; InitialPAWmm=-42; RelativeTo=LL15; FilledFromTop=false
            Nutrient
            Solute NO3: InitialValuesUnits=ppm; WaterTableConcentration=0; D0=0; DepthConstant=0; MaxDepthSoluteAccessible=0; RunoffEffectivenessAtMovingSolute=0; MaxEffectiveRunoff=0
              Thickness  InitialValues  Exco  FIP
              100        2              0     1
              100        1              0     1
              100        1              0     1
              300        1              0     1
              300        1              0     1
            Solute NH4: InitialValuesUnits=ppm; WaterTableConcentration=0; D0=0; DepthConstant=0; MaxDepthSoluteAccessible=0; RunoffEffectivenessAtMovingSolute=0; MaxEffectiveRunoff=0
              Thickness  InitialValues  Exco  FIP
              100        0.658          1     1
              100        0.314          1     1
              100        0.029          1     1
              300        0.03           1     1
              300        0.2            1     1
            Solute Urea: InitialValuesUnits=kg/ha; WaterTableConcentration=0; D0=0; DepthConstant=0; MaxDepthSoluteAccessible=0; RunoffEffectivenessAtMovingSolute=0; MaxEffectiveRunoff=0
              Thickness  InitialValues  Exco  FIP
              100        0              0     1
              100        0              0     1
              100        0              0     1
              300        0              0     1
              300        0              0     1
            SoilTemperature Temperature
            LayerStructure: Thickness=[10, 20, 20, 50, 100, 100, 300, 300]
    Folder USA
      Folder BareSoil
        Experiment ST
          Factors
            Factor Year: Specification=[Clock]
              Clock 1982: Start=1982-01-01; End=1982-12-31
              Clock 1983: Start=1983-01-01; End=1983-12-31
              Clock 1984: Start=1984-01-01; End=1984-12-31
              Clock 1985: Start=1985-01-01; End=1985-12-31
              Clock 1986: Start=1986-01-01; End=1986-12-31
              Clock 1987: Start=1987-01-01; End=1987-12-31
              Clock 1988: Start=1988-01-01; End=1988-12-31
              Clock 1989: Start=1989-01-01; End=1989-12-31
              Clock 1990: Start=1990-01-01; End=1990-12-31
          Simulation
            Clock: Start=1989-01-01; End=1989-12-31
            Summary
            Weather: FileName=AmesSoilTempAllYears.met
            SoilArbitrator
            MicroClimate: a_interception=0; b_interception=1; c_interception=0; d_interception=0; SoilHeatFluxFraction=0.4; MinimumHeightDiffForNewLayer=0; NightInterceptionFraction=0.5; ReferenceHeight=2
            Zone Field: Area=1; Slope=0; AspectAngle=0; Altitude=50
              Report BareSoilReport: EventNames=[Clock].DoReport
                VariableNames:
                  [Clock].Today as Date
                  [Soil].Temperature.Value[1] as AverageSoilTemp@0025mm
                  [Soil].Temperature.Value[2] as AverageSoilTemp@0100mm
                  [Soil].Temperature.Value[3] as AverageSoilTemp@0200mm
                  [Soil].Temperature.Value[5] as AverageSoilTemp@0400mm
                  [Soil].Temperature.Value[7] as AverageSoilTemp@0850mm
                  [Soil].SoilWater.SW as sw
                  [Weather].MeanT as Air
                  sum of (1) from [Clock].StartOfSimulation to [Clock].EndOfSimulation as simulation_days
                  [Clock].Today.DayOfYear as day
                  [SurfaceOrganicMatter].Cover as surfaceom_cover
                  [SurfaceOrganicMatter].Wt as surfaceom_wt
                  [WaterBalance].Es as es
                  [Soil].Physical.LL15 as ll15
                  [Soil].SoilWater.Drainage as drain
                  [Soil].SoilWater.Runoff as runoff
                  (9.5) as AnnualAverage
              Soil: ASCOrder=Vertosol; ASCSubOrder=Black; SoilType=Clay; Site=Norwin; NearestTown=Norwin; Region=Darling Downs and Granite Belt; State=Queensland; Country=Australia; NaturalVegetation=Qld. Bluegrass, possible Qld. Blue gum; ApsoilNumber=900; Latitude=-27.581836; Longitude=151.320206; LocationAccuracy=+/- 20m; YearOfSampling=0
                DataSource=CSIRO Sustainable Ecosystems, Toowoomba; Characteriesd as part of the GRDC funded project"Doing it better, doing it smarter, managing soil water in Australian agriculture' 2011
                Comments=Clay - OC, CLL for all crops estimated-based on Bongeen Mywybilla Soil No1
                Physical
                  Thickness  ParticleSizeClay  ParticleSizeSand  ParticleSizeSilt  BD    AirDry  LL15   DUL    SAT
                  50         18                51                31                1.52  0.091   0.181  0.239  0.314
                  100        18                51                31                1.47  0.089   0.177  0.241  0.323
                  100        22                47                31                1.39  0.192   0.192  0.266  0.35
                  50         22                47                31                1.53  0.204   0.204  0.261  0.325
                  200        21                51                28                1.48  0.15    0.15   0.262  0.334
                  200        21                51                28                1.51  0.15    0.15   0.262  0.329
                  400        17                51                32                1.5   0.127   0.127  0.247  0.322
                  100        17                51                32                1.6   0.127   0.127  0.247  0.307
                WaterBalance SoilWater: SummerDate=1-Jun; SummerU=9; SummerCona=3.8; WinterDate=1-Dec; WinterU=9; WinterCona=3.8; DiffusConst=40; DiffusSlope=16; Salb=0.16; CN2Bare=91; CNRed=20; CNCov=0.8; PSIDul=-100; Thickness=[50, 100, 100, 50, 200, 200, 400, 100]; SWCON=[0.55, 0.55, 0.55, 0.55, 0.55, 0.55, 0.55, 0.55]
                Organic: FOMCNRatio=45; CarbonUnits=Total
                  Thickness  Carbon  SoilCNRatio  FBiom  FInert  FOM
                  50         2.03    12           0.4    0.035   347.129
                  100        2.03    12           0.4    0.035   270.344
                  100        2.03    12           0.48   0.02    163.972
                  50         2.03    12           0.54   0.016   99.454
                  200        0.44    12           0.64   0.014   60.322
                  200        0.44    12           0.8    0.01    36.587
                  400        0.15    12           0.8    0.01    22.191
                  100        0.15    12           0.8    0.01    5
                Chemical: Thickness=[50, 100, 100, 50, 200, 200, 400, 100]; PH=[6.4, 6.4, 6.4, 6.4, 6.7, 6.7, 7.9, 7.9]; PHUnits=Water
                Water: Thickness=[150, 150, 300, 300, 300, 300, 300]; InitialValues=[0.24, 0.264, 0.262, 0.252, 0.247, 0.247, 0.247]; InitialPAWmm=196.25; RelativeTo=LL15; FilledFromTop=true
                Nutrient
                Solute NO3: Thickness=[50, 100, 100, 50, 200, 200, 400, 100]; InitialValues=[5, 5, 5, 5, 5, 5, 5, 5]; InitialValuesUnits=ppm; WaterTableConcentration=0; D0=0; DepthConstant=0; MaxDepthSoluteAccessible=0; RunoffEffectivenessAtMovingSolute=0; MaxEffectiveRunoff=0
                Solute NH4: Thickness=[50, 100, 100, 50, 200, 200, 400, 100]; InitialValues=[2.5, 2.5, 2.5, 2.5, 2.5, 2.5, 2.5, 2.5]; InitialValuesUnits=ppm; WaterTableConcentration=0; D0=0; DepthConstant=0; MaxDepthSoluteAccessible=0; RunoffEffectivenessAtMovingSolute=0; MaxEffectiveRunoff=0
                Solute Urea: Thickness=[50, 100, 100, 50, 200, 200, 400, 100]; InitialValues=[0, 0, 0, 0, 0, 0, 0, 0]; InitialValuesUnits=kg/ha; WaterTableConcentration=0; D0=0; DepthConstant=0; MaxDepthSoluteAccessible=0; RunoffEffectivenessAtMovingSolute=0; MaxEffectiveRunoff=0
                SoilTemperature Temperature
              SurfaceOrganicMatter: InitialResidueName=wheat_stubble; InitialResidueType=wheat; InitialResidueMass=500; InitialStandingFraction=0; InitialCPR=0; InitialCNR=100
      Folder CornSoy
        Simulation COBSSystemCS
          Weather: FileName=COBS.met
          Clock: Start=2008-01-01; End=2013-12-31
          Summary
          SoilArbitrator
          MicroClimate: a_interception=0; b_interception=1; c_interception=0; d_interception=0; SoilHeatFluxFraction=0.4; MinimumHeightDiffForNewLayer=0; NightInterceptionFraction=0.5; ReferenceHeight=2
          Zone Paddock: Area=1; Slope=0; AspectAngle=0; Altitude=50
            SurfaceOrganicMatter: InitialResidueName=maize; InitialResidueType=soybean; InitialResidueMass=5000; InitialStandingFraction=0; InitialCPR=0; InitialCNR=40
            Fertiliser
            Plant Maize
            Plant Soybean
            Report CSReport: EventNames=[Clock].DoReport
              VariableNames:
                [Clock].Today
                sum([Soil].Swim.SW[1:2]) * 0.5 as sw_5
                [Soil].Swim.SW[3] as sw_10
                [Soil].Swim.SW[4] as sw_15
                [Soil].Swim.SW[6] as sw_35
                [Soil].Swim.SW[7] as sw_75
                sum([Soil].Temperature.Value[1:2]) * 0.5 as AverageSoilTemp@0038mm
                [Soil].Temperature.Value[3] as AverageSoilTemp@0100mm
                [Soil].Temperature.Value[4] as AverageSoilTemp@0170mm
                [Soil].Temperature.Value[6] as AverageSoilTemp@0350mm
                [Soil].Temperature.Value[7] as AverageSoilTemp@0500mm
                [Maize].Grain.Wt * 10 + [Soybean].Grain.Wt * 10 as CropYield
                [Maize].AboveGround.Wt * 10 + [Soybean].AboveGround.Wt * 10 as CropBiomass
                [SurfaceOrganicMatter].Wt
            Soil: NearestTown=Ames; State=Iowa; Country=US; ApsoilNumber=34; Latitude=0; Longitude=0; DataSource=web soil survey data revised by Ranae
              Physical
                Thickness  ParticleSizeClay  ParticleSizeSand  ParticleSizeSilt  BD     AirDry  LL15   DUL    SAT    KS
                37         25.67             38.29             36.04             1.21   0.12    0.14   0.263  0.387  500
                38         25.67             38.29             36.04             1.21   0.14    0.161  0.296  0.42   500
                50         26.43             37.95             35.65             1.39   0.11    0.11   0.256  0.42   500
                90         28.09             36.57             35.65             1.478  0.11    0.11   0.254  0.42   500
                85         28.5              36.23             35.65             1.5    0.12    0.12   0.293  0.434  500
                100        29                34                37                1.5    0.125   0.125  0.262  0.434  500
                200        29                34                37                1.5    0.132   0.132  0.262  0.41   500
                300        27                37                36                1.551  0.1     0.1    0.296  0.394  250
                300        27                37                36                1.551  0.11    0.11   0.296  0.394  250
                320        27                37                36                1.551  0.138   0.138  0.296  0.394  25
                300        27                37                36                1.551  0.165   0.165  0.296  0.394  2
                SoilCrop MaizeSoil
                  LL=[0.14, 0.161, 0.11, 0.11, 0.12, 0.125, 0.132, 0.1, 0.11, 0.138, 0.165]
                  KL=[0.08, 0.08, 0.08, 0.08, 0.08, 0.08, 0.08, 0.07, 0.06, 0.05, 0.05]
                  XF=[1, 1, 1, 1, 1, 1, 1, 1, 1, 1, 1]
                SoilCrop SoybeanSoil
                  LL=[0.14, 0.161, 0.11, 0.11, 0.12, 0.125, 0.132, 0.1, 0.11, 0.138, 0.165]
                  KL=[0.08, 0.08, 0.08, 0.08, 0.08, 0.08, 0.08, 0.07, 0.06, 0.05, 0.05]
                  XF=[1, 1, 1, 1, 1, 1, 1, 1, 1, 1, 1]
              Organic: FOMCNRatio=40; CarbonUnits=Total
                Thickness  Carbon  SoilCNRatio  FBiom  FInert  FOM
                37         2.835   11           0.035  0.34    176.333
                38         2.835   11           0.035  0.34    165.627
                50         2.625   11           0.019  0.383   152.524
                90         2.478   11           0.014  0.425   131.495
                85         2.216   11           0.013  0.468   114.304
                100        1.365   11           0.01   0.51    96.933
                200        1.365   11           0.01   0.637   69.711
                300        1.176   11           0.01   0.68    42.515
                300        0.493   11           0.01   0.711   25.928
                320        0.158   11           0.01   0.727   15.3
                300        0.105   11           0.01   0.74    9.331
              Chemical: Thickness=[37, 38, 50, 90, 85, 100, 200, 300, 300, 320, 300]; PHUnits=Water
                PH=[6.318, 6.318, 5.902, 5.948, 5.959, 6.7, 6.7, 7.9, 7.9, 7.9, 7.9]
              Water: Thickness=[37, 38, 50, 90, 85, 100, 200, 300, 300, 320, 300]; InitialPAWmm=216.692; RelativeTo=LL15; FilledFromTop=false
                InitialValues=[0.232, 0.262, 0.22, 0.218, 0.25, 0.228, 0.23, 0.247, 0.249, 0.257, 0.263]
              Swim3 Swim: Salb=0.13; CN2Bare=65; CNRed=20; CNCov=0.8; KDul=0.3; PSIDul=-100; VC=true; DTMin=0; DTMax=1440; MaxWaterIncrement=10; SpaceWeightingFactor=0; SoluteSpaceWeightingFactor=0; Dis=0; Disp=0; A=0; DTHC=0; DTHP=0; Diagnostics=false
                SwimSubsurfaceDrain: DrainDepth=1070; DrainSpacing=13500; DrainRadius=52; Klat=2800; ImpermDepth=3900
              Solute NO3: InitialValuesUnits=ppm; WaterTableConcentration=0; D0=0; DepthConstant=0; MaxDepthSoluteAccessible=0; RunoffEffectivenessAtMovingSolute=0; MaxEffectiveRunoff=0
                Thickness  InitialValues  Exco  FIP
                37         8.249          0     1
                38         14.22          0     1
                50         8.741          0     1
                90         3.759          0     1
                85         0              0     1
                100        0              0     1
                200        0              0     1
                300        0              0     1
                300        0              0     1
                320        0              0     1
                300        0              0     1
              Solute NH4: InitialValuesUnits=ppm; WaterTableConcentration=0; D0=0; DepthConstant=0; MaxDepthSoluteAccessible=0; RunoffEffectivenessAtMovingSolute=0; MaxEffectiveRunoff=0
                Thickness  InitialValues  Exco  FIP
                37         4.467          100   1
                38         19.574         100   1
                50         10.072         100   1
                90         3.759          100   1
                85         0              100   1
                100        0              100   1
                200        0              100   1
                300        0              100   1
                300        0              100   1
                320        0              100   1
                300        0              100   1
              Solute Urea: InitialValuesUnits=kg/ha; WaterTableConcentration=0; D0=0; DepthConstant=0; MaxDepthSoluteAccessible=0; RunoffEffectivenessAtMovingSolute=0; MaxEffectiveRunoff=0
                Thickness  InitialValues  Exco  FIP
                37         0              0     1
                38         0              0     1
                50         0              0     1
                90         0              0     1
                85         0              0     1
                100        0              0     1
                200        0              0     1
                300        0              0     1
                300        0              0     1
                320        0              0     1
                300        0              0     1
              Nutrient
              SoilTemperature Temperature
            MicroClimate: a_interception=0; b_interception=1; c_interception=0; d_interception=0; SoilHeatFluxFraction=0; MinimumHeightDiffForNewLayer=0; NightInterceptionFraction=0; ReferenceHeight=2
            Operations
              2008-05-15  [Maize].Sow(population: 7.9, cultivar: B_110, depth: 50, rowSpacing: 750)
              2008-05-15  [Fertiliser].Apply(65, Fertiliser.Types.UreaN, 10);
              2008-06-24  [Fertiliser].Apply(90, Fertiliser.Types.UreaN, 10);
              2009-05-08  [Soybean].Sow(population: 40, cultivar: Generic_MG2, depth: 50, rowSpacing: 750)
              2010-05-06  [Maize].Sow(population: 7.9, cultivar: B_110, depth: 50, rowSpacing: 750)
              2010-05-06  [Fertiliser].Apply(78, Fertiliser.Types.UreaN, 10);
              2010-06-17  [Fertiliser].Apply(16, Fertiliser.Types.UreaN, 10);
              2011-05-11  [Soybean].Sow(population: 40, cultivar: Generic_MG2, depth: 50, rowSpacing: 750)
              2012-05-11  [Maize].Sow(population: 7.9, cultivar: B_110, depth: 50, rowSpacing: 750)
              2012-05-11  [Fertiliser].Apply(65, Fertiliser.Types.UreaN, 10);
              2012-06-12  [Fertiliser].Apply(120, Fertiliser.Types.UreaN, 10);
              2013-05-17  [Soybean].Sow(population: 40, cultivar: Generic_MG2, depth: 50, rowSpacing: 750)
            Manager HarvestMaize
              Crop = [Maize]
```csharp
using APSIM.Shared.Utilities;
using Models.Utilities;
using Models.Soils;
using Models.PMF;
using Models.Core;
using System;
using System.Linq;

namespace Models
{
    [Serializable] 
    public class Script : Model
    {
        [Description("Crop")]
        public IPlant Crop { get; set; }
        
        [EventSubscribe("DoManagement")]
        private void OnDoManagement(object sender, EventArgs e)
        {
            if (Crop.IsReadyForHarvesting)
            {
                Crop.Harvest();
                Crop.EndCrop();
            }
        }
    }
}
```
            Manager HarvestSoy
              Crop = [Soybean]
              script: same as in ValidationTests.USA.CornSoy.COBSSystemCS.Paddock.HarvestMaize
  Folder SensibilityTests
    Experiment Analytical
      Factors
        Factor Site: Specification=[Weather].ExcelWorkSheetName=Dalby,Lincoln
      Simulation ComparisonWithAnalytical
        Memo
          The intention for the analytical solution is to test the numerics and also if the soil layering that most people use (many centimetres even at the surface) with SoilWater are causing any issues with the quality of the solution. This would be under highly idealised conditions but is a necessary step - the advantage is that it is only testing the soil temperature solution (not the water, crop, ...).

          * set up the soil water model such that the profile is uniform (all the same water content, bulk density, texture, carbon) with no crop and there are no changes in water content with time. I can't exactly remember how I did this last time but I would try setting it up with the soil at LL15 (are going to need a few different levels of this for testing) and if that didn't work then at SAT with Ksat and swcon = 0

          * need a couple of artificial weather files at latitude = 0 degrees, no rainfall, no radiation, and with air temperature of varying amplitude and average as from the spreadsheet

          Need to start with soil layers of about 1 cm each (where are pretty confident that the solution will work) but be set up to expand these out to more normal layering (can probably use the layering component for these).

          With the above, use the spreadsheet outputs as validation/testing data for the idealised setting for various depths in the soil. Would also like to understand how well the model copes with initial soil temperatures.

          After that, test things that should affect damping depth (bulk density, carbon, water content, texture ...)

          Notes:

          * The simulation reads dummy weather data from AnalyticalWeather.xlsx.

          * The soil physical node has a uniform profile specified.

          * The water balance component has been replaced by a manager script (DummyWaterBalance) that ensures water content (a user specified parameter) does not change during the simulation.

          * A 'LayerStructure' component can be added to the soil to get 1cm layers. There is a 'LayerStructure' component in the Wagga simulation that can be copied/pasted.
        Clock: Start=2000-01-01; End=2000-12-31
        Weather: FileName=AnalyticalWeather.xlsx; ExcelWorkSheetName=Sheet1
        Summary
        Zone Field: Area=1; Slope=0; AspectAngle=0; Altitude=50
          MicroClimate: a_interception=0; b_interception=0; c_interception=0; d_interception=0; SoilHeatFluxFraction=0; MinimumHeightDiffForNewLayer=0; NightInterceptionFraction=0; ReferenceHeight=2
          Manager DummyWaterBalance
            SW = 0.05, 0.05, 0.05, 0.05, 0.05, 0.05, 0.05, 0.05
            Eos = 0
            Es = 0
            Eo = 0
            Salb = 0
```csharp
using Models.PMF;
using Models.Core;
using System;
using Models.Interfaces;
using Models.Soils;
using APSIM.Shared.Utilities;

namespace Models
{
    [Serializable] 
    public class Script : Model, ISoilWater
    {
        [Link]
        private Physical physical;
        [Link]
        private IPhysical soilPhysical;

        ///<summary>Gets or sets soil thickness for each layer (mm)(</summary>
        public double[] Thickness { get { return soilPhysical.Thickness; } }

        ///<summary>Gets or sets soil thickness for each layer (mm)(</summary>
        public double[] LayerThickness { get { return soilPhysical.Thickness; } }

        ///<summary>Gets or sets volumetric soil water content (mm/mm)(</summary>
        [Description("Soil water content (mm/mm), comma separated values")]
        public double[] SW { get; set; }

        ///<summary>Gets soil water content (mm)</summary>
        public double[] SWmm { get { return MathUtilities.Multiply(SW, Thickness); } }

        ///<summary>Gets extractable soil water relative to LL15(mm)</summary>
        public double[] ESW { get { throw new NotImplementedException(); } }

        ///<summary>Gets extractable soil water relative to LL15(mm)</summary>
        public double[] PSI { get { throw new NotImplementedException(); } }

        ///<summary>Gets K</summary>
        public double[] K { get { throw new NotImplementedException(); } }
        
        ///<summary>Gets PoreInteractionIndex</summary>
        public double[] PoreInteractionIndex { get { throw new NotImplementedException(); } set { throw new NotImplementedException(); }}
                
        ///<summary>Gets potential evaporation from soil surface (mm)</summary>
        [Description("Eos (mm)")]
        public double Eos { get; set; }

        /// <summary>Gets the actual (realised) soil water evaporation (mm)</summary>
        [Description("Es (mm)")]
        public double Es { get; set; }

        /// <summary>Gets potential evapotranspiration of the whole soil-plant system (mm)</summary>
        [Description("Eo (mm)")]
        public double Eo { get; set; }

        /// <summary>Gets the amount of water runoff (mm)</summary>
        public double Runoff { get { return 0; } }
        
        /// <summary>Gets the amount of water drainage from bottom of profile(mm)</summary>
        public double Drainage { get { return 0; } }

        /// <summary>Fraction of incoming radiation reflected from bare soil</summary>
        [Description("Salb")]
        public double Salb { get; set; }

        /// <summary>Amount of water moving laterally out of the profile (mm)</summary>
        public double[] LateralOutflow { get { throw new NotImplementedException(); } }

        /// <summary>Amount of N leaching as NO3-N from the deepest soil layer (kg /ha)</summary>
        public double LeachNO3 { get { return 0; } }

        /// <summary>Amount of N leaching as NH4-N from the deepest soil layer (kg /ha)</summary>
        public double LeachNH4 { get { return 0; } }
        
        /// <summary>Amount of N leaching as urea-N  from the deepest soil layer (kg /ha)</summary>
        public double LeachUrea { get { return 0; } }

        /// <summary>Amount of Cl leaching  from the deepest soil layer (kg /ha)</summary>
        public double LeachCl { get { return 0; } }
        
        /// <summary>Amount of N leaching as NO3 from each soil layer (kg /ha)</summary>
        public double[] FlowNO3 { get { throw new NotImplementedException(); } }

        /// <summary>Amount of N leaching as NH4 from each soil layer (kg /ha)</summary>
        public double[] FlowNH4 { get { throw new NotImplementedException(); } }

        /// <summary>Amount of N leaching as urea from each soil layer (kg /ha)</summary>
        public double[] FlowUrea { get { throw new NotImplementedException(); } }

        /// <summary>Amount of N leaching as urea from each soil layer (kg /ha)</summary>
        public double[] FlowCl { get { throw new NotImplementedException(); } }

        /// <summary>Amount of water moving upward from each soil layer during unsaturated flow (negative value means downward movement) (mm)</summary>
        public double[] Flow  { get { throw new NotImplementedException(); } }

        /// <summary>Amount of water moving downward out of each soil layer due to gravity drainage (above DUL) (mm)</summary>
        public double[] Flux { get { throw new NotImplementedException(); } }

        /// <summary> This is set by Microclimate and is rainfall less that intercepted by the canopy and residue components </summary>
        public double PotentialInfiltration { get; set; }
        
        /// <summary> The amount of rainfall intercepted by crop and residue canopies </summary>
        public double PrecipitationInterception { get; set; }

        /// <summary>Water table depth (mm)</summary>
        public double WaterTable { get; set; }
        
        /// <summary>Pond depth (mm)</summary>
        public double Pond { get; set; }

        /// <summary>Pond depth (mm)</summary>
        public double SubsurfaceDrain { get; set; }

        /// <summary>Sets the water table.</summary>
        /// <param name="InitialDepth">The initial depth.</param> 
        public void SetWaterTable(double InitialDepth)
        {
            throw new NotImplementedException();
        }

        /// <summary>The efficiency (0-1) that solutes move down with water.</summary>
        public double[] SoluteFluxEfficiency { get; set; }

        /// <summary>The efficiency (0-1) that solutes move up with water.</summary>
        public double[] SoluteFlowEfficiency { get; set; }

        ///<summary>Perform a reset</summary>
        public void Reset()
        {
            throw new NotImplementedException();
        }

        ///<summary>Perform tillage</summary>
        public void Tillage(TillageType Data)
        {
            throw new NotImplementedException();
        }

        ///<summary>Perform tillage</summary>
        public void Tillage(string tillageType)
        {
            throw new NotImplementedException();
        }

        ///<summary>Remove water from the profile</summary>
        public void RemoveWater(double[] amountToRemove)
        {
            throw new NotImplementedException();
        }
        public void Standardise(double[] targetThickness)
        {
        
        
        }
        
        /// <summary>Plant available water SW-LL15 (mm/mm).</summary>
        [Units("mm/mm")]
        public double[] PAW
        {
            get
            {
                return SoilUtilities.CalcPAWC(soilPhysical.Thickness,
                                              soilPhysical.LL15,
                                              SW,
                                              null);
            }
        }

        /// <summary>Plant available water SW-LL15 (mm).</summary>
        [Units("mm")]
        public double[] PAWmm
        {
            get
            {
                return MathUtilities.Multiply(PAW, soilPhysical.Thickness);
            }
        }

    }
}
```
          Soil: Latitude=0; Longitude=0
            Water: Thickness=[100, 100, 200, 300, 300, 300, 200, 300]; InitialValues=[0.16, 0.16, 0.16, 0.16, 0.16, 0.16, 0.16, 0.16]; InitialPAWmm=198; RelativeTo=LL15; FilledFromTop=true
            Physical
              Thickness  ParticleSizeClay  BD   AirDry  LL15  DUL   SAT
              100        9                 1.5  0.01    0.05  0.16  0.29
              100        9                 1.5  0.01    0.05  0.16  0.29
              200        9                 1.5  0.01    0.05  0.16  0.29
              300        9                 1.5  0.01    0.05  0.16  0.29
              300        9                 1.5  0.01    0.05  0.16  0.29
              300        9                 1.5  0.01    0.05  0.16  0.29
              200        9                 1.5  0.01    0.05  0.16  0.29
              300        9                 1.5  0.01    0.05  0.16  0.29
            Organic: FOMCNRatio=60; CarbonUnits=Total
              Thickness  Carbon  SoilCNRatio  FBiom  FInert  FOM
              100        2       14.5         0.04   0.4     0.29407
              300        2       14.5         0.04   0.4     0.294
              600        2       14.5         0.04   0.4     0.294
              1000       2       14.5         0.04   0.4     0.294
              1000       2       14.5         0.04   0.4     0.294
              1000       2       14.5         0.04   0.4     0.294
              1000       2       14.5         0.04   0.4     0.294
              1000       2       14.5         0.04   0.4     0.294
            Chemical: Thickness=[100, 300, 600, 1000, 1000, 1000, 1000, 1000]; PH=[6.5, 6.5, 6.5, 6.5, 6.5, 6.5, 6.5, 6.5]; PHUnits=Water
            SoilTemperature
            Solute NO3: same as ValidationTests.Wagga.Wagga.Plantation.Soil.NO3
            Solute NH4: same as ValidationTests.Wagga.Wagga.Plantation.Soil.NH4
            Solute Urea: same as ValidationTests.Wagga.Wagga.Plantation.Soil.Urea
          Report AnalyticalReport: EventNames=[Clock].DoReport
            VariableNames:
              [Clock].Today as Date
              [Soil].SoilTemperature.AverageSoilTemp
              [Soil].SoilTemperature.AverageSoilTemp[1] as SoilTemperature@1
              [Soil].SoilTemperature.AverageSoilTemp[2] as SoilTemperature@20
              [Soil].SoilTemperature.AverageSoilTemp[6] as SoilTemperature@150
    Experiment SoilType
      Factors
        CompositeFactor Clay: Specifications=[Soil]
          Soil: Latitude=0; Longitude=0
            Physical
              Thickness  ParticleSizeClay  BD   AirDry  LL15  DUL   SAT   KS
              100        80                1    0.1     0.24  0.47  0.53  240
              200        80                1.1  0.1     0.28  0.49  0.54  240
              200        80                1.1  0.1     0.28  0.52  0.57  120
              200        80                1.1  0.1     0.29  0.52  0.55  120
              200        80                1.1  0.1     0.29  0.51  0.54  120
              200        80                1.2  0.1     0.29  0.5   0.53  120
              200        80                1.2  0.1     0.29  0.5   0.53  120
              200        80                1.2  0.1     0.33  0.48  0.51  120
              200        80                1.2  0.1     0.33  0.48  0.51  60
              200        80                1.2  0.1     0.35  0.48  0.51  60
              200        80                1.2  0.1     0.35  0.47  0.5   60
              200        80                1.2  0.1     0.35  0.45  0.48  60
              200        80                1.3  0.1     0.35  0.45  0.48  60
              200        80                1.3  0.1     0.35  0.45  0.48  60
              200        80                1.3  0.1     0.35  0.45  0.48  60
              200        80                1.3  0.1     0.35  0.45  0.48  60
              SoilCrop WheatSoil
                LL=[0.25, 0.3, 0.3, 0.33, 0.33, 0.35, 0.35, 0.4, 0.4, 0.4, 0.4, 0.4, 0.4, 0.4, 0.4, 0.4]
                KL=[0.06, 0.06, 0.06, 0.06, 0.06, 0.06, 0.06, 0.06, 0.06, 0.06, 0, 0, 0, 0, 0, 0]
                XF=[1, 1, 1, 1, 1, 1, 1, 1, 1, 1, 0, 0, 0, 0, 0, 0]
            Organic: FOMCNRatio=40; CarbonUnits=Total
              Thickness  Carbon  SoilCNRatio  FBiom  FInert  FOM
              100        1.4     14.5         0.2    0.32    1.84299
              200        1.4     14.5         0.03   0.5     1.51868
              200        1.4     14.5         0.02   0.6     1.25144
              200        1.35    14.5         0.015  0.7     1.03122
              200        0.95    14.5         0.01   0.85    0.849759
              200        1       14.5         0.01   0.9     0.700227
              200        0.8     14.5         0.01   0.99    0.577008
              200        0.45    14.5         0.01   0.99    0.475472
              200        0.45    14.5         0.01   0.99    0.391803
              200        0.45    14.5         0.01   0.99    0.322858
              200        0.45    14.5         0.01   0.99    0.266044
              200        0.45    14.5         0.01   0.99    0.219228
              200        0.45    14.5         0.01   0.99    0.180651
              200        0.45    14.5         0.01   0.99    0.148862
              200        0.45    14.5         0.01   0.99    0.122667
              200        0.45    14.5         0.01   0.99    0.101081
            Chemical: PH=[6, 6.4, 6.8, 7.2, 7.6, 8, 8, 8, 8, 8, 8, 8, 8, 8, 8, 8]; PHUnits=Water
              Thickness=[100, 200, 200, 200, 200, 200, 200, 200, 200, 200, 200, 200, 200, 200, 200, 200]
            Water: InitialPAWmm=437; RelativeTo=LL15; FilledFromTop=false
              Thickness=[100, 200, 200, 200, 200, 200, 200, 200, 200, 200, 200, 200, 200, 200, 200, 200]
              InitialValues=[0.434, 0.43, 0.48, 0.47, 0.46, 0.46, 0.46, 0.485, 0.49, 0.474, 0.457, 0.453, 0.447, 0.465, 0.457, 0.43]
            LayerStructure
              Thickness=[10, 20, 30, 40, 200, 200, 200, 200, 200, 200, 200, 200, 200, 200, 200, 200, 200, 200, 200]
            Solute CL: InitialValuesUnits=ppm; WaterTableConcentration=0; D0=0.05; DepthConstant=0; MaxDepthSoluteAccessible=0; RunoffEffectivenessAtMovingSolute=0; MaxEffectiveRunoff=0
              Thickness  InitialValues  Exco  FIP
              100        18             0     1
              200        13             0     1
              200        11             0     1
              200        11             0     1
              200        16             0     1
              200        28             0     1
              200        66             0     1
              200        122            0     1
              200        181            0     1
              200        232            0     1
              200        270            0     1
              200        292            0     1
              200        293            0     1
              200        270            0     1
              200        292            0     1
              200        293            0     1
            Nutrient
            Solute NO3: InitialValuesUnits=ppm; WaterTableConcentration=0; D0=0.05; DepthConstant=0; MaxDepthSoluteAccessible=0; RunoffEffectivenessAtMovingSolute=0; MaxEffectiveRunoff=0
              Thickness  InitialValues  Exco  FIP
              100        10.7           0     1
              200        9.99           0     1
              200        7.87           0     1
              200        6.2            0     1
              200        4.85           0     1
              200        3.56           0     1
              200        2.72           0     1
              200        2.34           0     1
              200        2.47           0     1
              200        3.24           0     1
              200        4.25           0     1
              200        4.94           0     1
              200        5.2            0     1
              200        4.95           0     1
              200        4.52           0     1
              200        4.24           0     1
            Solute NH4: InitialValuesUnits=ppm; WaterTableConcentration=0; D0=0.05; DepthConstant=0; MaxDepthSoluteAccessible=0; RunoffEffectivenessAtMovingSolute=0; MaxEffectiveRunoff=0
              Thickness  InitialValues  Exco  FIP
              100        0.3            1     1
              200        0.3            1     1
              200        0.3            1     1
              200        0.3            1     1
              200        0.3            1     1
              200        0.3            1     1
              200        0.3            1     1
              200        0.3            1     1
              200        0.3            1     1
              200        0.3            1     1
              200        0.3            1     1
              200        0.3            1     1
              200        0.3            1     1
              200        0.3            1     1
              200        0.3            1     1
              200        0.3            1     1
            Solute Urea: InitialValuesUnits=kg/ha; WaterTableConcentration=0; D0=0.05; DepthConstant=0; MaxDepthSoluteAccessible=0; RunoffEffectivenessAtMovingSolute=0; MaxEffectiveRunoff=0
              Thickness  InitialValues  Exco  FIP
              100        0              0     1
              200        0              0     1
              200        0              0     1
              200        0              0     1
              200        0              0     1
              200        0              0     1
              200        0              0     1
              200        0              0     1
              200        0              0     1
              200        0              0     1
              200        0              0     1
              200        0              0     1
              200        0              0     1
              200        0              0     1
              200        0              0     1
              200        0              0     1
            SoilTemperature Temperature
        CompositeFactor Sand: Specifications=[Soil]
          Soil: Latitude=0; Longitude=0
            Physical
              Thickness  ParticleSizeClay  BD   AirDry  LL15  DUL   SAT   KS
              100        5                 1.8  0.01    0.02  0.08  0.32  200
              100        5                 1.8  0.01    0.02  0.08  0.32  200
              100        5                 1.8  0.01    0.02  0.08  0.32  200
              300        5                 1.8  0.01    0.02  0.08  0.32  200
              300        5                 1.8  0.01    0.02  0.08  0.32  200
              300        5                 1.8  0.01    0.02  0.08  0.32  200
              300        5                 1.8  0.01    0.02  0.08  0.32  200
              500        5                 1.8  0.01    0.02  0.07  0.32  200
              500        5                 1.8  0.01    0.02  0.07  0.32  200
              500        5                 1.8  0.01    0.02  0.07  0.32  200
              700        5                 1.8  0.01    0.02  0.07  0.32  200
            Organic: FOMCNRatio=40; CarbonUnits=Total
              Thickness  Carbon  SoilCNRatio  FBiom  FInert  FOM
              150        0.915   12           0.04   0.4     390.598
              150        0.777   12           0.02   0.6     289.362
              300        0.346   12           0.02   0.8     158.805
              300        0.231   12           0.02   1       87.154
              300        0.154   12           0.01   1       47.831
              300        0.123   12           0.01   1       26.25
            Chemical: Thickness=[150, 150, 300, 300, 300, 300]; PH=[8, 8, 8, 8, 8, 8]; PHUnits=Water
            Water: Thickness=[50, 100, 150, 300, 300, 300, 2500]; InitialValues=[0.02, 0.02, 0.02, 0.03, 0.05, 0.06, 0.07]; InitialPAWmm=149; RelativeTo=LL15; FilledFromTop=false
            LayerStructure
              Thickness=[10, 20, 30, 40, 200, 200, 200, 200, 200, 200, 200, 200, 200, 200, 200, 200, 200, 200, 200]
            Solute CL: same as SensibilityTests.SoilType.Factors.Clay.Soil.CL
            Nutrient
            Solute NO3: same as SensibilityTests.SoilType.Factors.Clay.Soil.NO3
            Solute NH4: same as SensibilityTests.SoilType.Factors.Clay.Soil.NH4
            Solute Urea: same as SensibilityTests.SoilType.Factors.Clay.Soil.Urea
            SoilTemperature Temperature
      Simulation SoilTypeBase
        Clock: Start=2010-01-01; End=2020-12-31
        Summary summaryfile
        Weather: FileName=WeatherFiles\Gatton.met
        SoilArbitrator Soil Arbitrator
        MicroClimate: a_interception=0; b_interception=1; c_interception=0; d_interception=0; SoilHeatFluxFraction=0.4; MinimumHeightDiffForNewLayer=0; NightInterceptionFraction=0.5; ReferenceHeight=2
        Zone Field: Area=1; Slope=0; AspectAngle=0; Altitude=50
          Manager DummyWaterBalance
            SW = 0.3, 0.3, 0.3, 0.3, 0.3, 0.3, 0.3, 0.3, 0.3, 0.3, 0.3, 0.3, 0.3, 0.3, 0.3, 0.3, 0.3, 0.3, 0.3
            Eos = 0
            Es = 0
            Eo = 0
            Salb = 0
            script: same as in SensibilityTests.Analytical.ComparisonWithAnalytical.Field.DummyWaterBalance
          Soil: SoilType=Black Vertosol; Site=Hudson; Latitude=0; Longitude=0
            Physical
              Thickness  BD   AirDry  LL15  DUL   SAT
              100        1    0.1     0.24  0.47  0.53
              200        1.1  0.1     0.28  0.49  0.54
              200        1.1  0.1     0.28  0.52  0.57
              200        1.1  0.1     0.29  0.52  0.55
              200        1.1  0.1     0.29  0.51  0.54
              200        1.2  0.1     0.29  0.5   0.53
              200        1.2  0.1     0.29  0.5   0.53
              200        1.2  0.1     0.33  0.48  0.51
              200        1.2  0.1     0.33  0.48  0.51
              200        1.2  0.1     0.35  0.48  0.51
              200        1.2  0.1     0.35  0.47  0.5
              200        1.2  0.1     0.35  0.45  0.48
              200        1.3  0.1     0.35  0.45  0.48
              200        1.3  0.1     0.35  0.45  0.48
              200        1.3  0.1     0.35  0.45  0.48
              200        1.3  0.1     0.35  0.45  0.48
              SoilCrop WheatSoil: same as SensibilityTests.SoilType.Factors.Clay.Soil.Physical.WheatSoil
            Organic: FOMCNRatio=40; CarbonUnits=Total
              Thickness  Carbon  SoilCNRatio  FBiom  FInert  FOM
              100        1.4     14.5         0.2    0.32    1.843
              200        1.4     14.5         0.03   0.5     1.519
              200        1.4     14.5         0.02   0.6     1.251
              200        1.35    14.5         0.015  0.7     1.031
              200        0.95    14.5         0.01   0.85    0.85
              200        1       14.5         0.01   0.9     0.7
              200        0.8     14.5         0.01   0.99    0.577
              200        0.45    14.5         0.01   0.99    0.475
              200        0.45    14.5         0.01   0.99    0.392
              200        0.45    14.5         0.01   0.99    0.323
              200        0.45    14.5         0.01   0.99    0.266
              200        0.45    14.5         0.01   0.99    0.219
              200        0.45    14.5         0.01   0.99    0.181
              200        0.45    14.5         0.01   0.99    0.149
              200        0.45    14.5         0.01   0.99    0.123
              200        0.45    14.5         0.01   0.99    0.101
            Chemical: same as SensibilityTests.SoilType.Factors.Clay.Soil.Chemical
            Water: Thickness=[150, 150, 300, 300, 300, 300, 300, 200]; InitialValues=[0.417, 0.43, 0.45, 0.46, 0.46, 0.46, 0.46, 0.267]; InitialPAWmm=262.45; RelativeTo=LL15; FilledFromTop=true
            Nutrient
            Solute NO3: same as ValidationTests.ForestHill.ForestHillWheat.Factors.TentHill.Soil.NO3
            Solute NH4: same as ValidationTests.ForestHill.ForestHillWheat.Factors.TentHill.Soil.NH4
            Solute Urea: same as ValidationTests.ForestHill.ForestHillWheat.Factors.TentHill.Soil.Urea
            Swim3: same as ValidationTests.ForestHill.ForestHillWheat.Factors.TentHill.Soil.Swim3
            LayerStructure
              Thickness=[10, 20, 20, 100, 100, 100, 100, 100, 100, 100, 100, 100, 100, 200, 300, 300, 200]
            SoilTemperature Temperature: Thickness=[100, 100, 100, 100, 100, 100, 100, 100]; InitialValues=[14, 14, 14, 14, 14.5, 15, 15.3, 15.5]
          SurfaceOrganicMatter: InitialResidueName=wheat_stubble; InitialResidueType=wheat; InitialResidueMass=500; InitialStandingFraction=0; InitialCPR=0; InitialCNR=100
          Report: EventNames=[CLock].DoReport
            VariableNames:
              [Clock].Today
              [Soil].Temperature.AverageSoilTemp[3] as AverageSoilTemp@0045mm
              [Soil].Temperature.AverageSoilTemp[6] as AverageSoilTemp@0400mm
              [Soil].Temperature.AverageSoilTemp[9] as AverageSoilTemp@1000mm
              [Soil].Temperature.AverageSoilTemp[14] as AverageSoilTemp@2000mm
              [Soil].Temperature.AverageSoilTemp[19] as AverageSoilTemp@3000mm
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