Simulations: Version=171
  DataStore
  Simulation Blank
    Clock: Start=2000-01-01; End=2006-12-31
    Weather: FileName=AnalyticalWeather.xlsx; ExcelWorkSheetName=CoolAdd2WeeklyOsc
    MicroClimate: a_interception=0; b_interception=0; c_interception=0; d_interception=0; SoilHeatFluxFraction=0; MinimumHeightDiffForNewLayer=0; NightInterceptionFraction=0; ReferenceHeight=2
    Summary
    Zone Field: Area=1; Slope=0; AspectAngle=0; Altitude=50
      Manager DummyWaterBalance
        SW = 0.15, 0.15, 0.15, 0.15, 0.15, 0.15, 0.15, 0.15, 0.15, 0.15, 0.15, 0.15, 0.15, 0.15, 0.15, 0.15, 0.15, 0.15, 0.15
        Eos = 0
        Es = 0
        Eo = 0
        Salb = 0
```csharp
using Models.PMF;
using Models.Core;
using System;
using Models.Interfaces;
using Models.Soils;
using APSIM.Shared.Utilities;
using Newtonsoft.Json;

namespace Models
{
    [Serializable] 
    public class Script : Model, ISoilWater
    {
        [Link]
        private Physical physical;
        [Link]
        private IPhysical soilPhysical;

        ///<summary>Gets or sets soil thickness for each layer (mm)(</summary>
        public double[] Thickness { get { return soilPhysical.Thickness; } }

        ///<summary>Gets or sets soil thickness for each layer (mm)(</summary>
        public double[] LayerThickness { get { return soilPhysical.Thickness; } }

        ///<summary>Gets or sets volumetric soil water content (mm/mm)(</summary>
        [Description("Soil water content (mm/mm), comma separated values")]
        public double[] SW { get; set; }

        ///<summary>Gets soil water content (mm)</summary>
        public double[] SWmm { get { return MathUtilities.Multiply(SW, Thickness); } }

        ///<summary>Gets extractable soil water relative to LL15(mm)</summary>
        public double[] ESW { get { throw new NotImplementedException(); } }

        ///<summary>Gets extractable soil water relative to LL15(mm)</summary>
        public double[] PSI { get { throw new NotImplementedException(); } }

        ///<summary>Gets K</summary>
        public double[] K { get { throw new NotImplementedException(); } }
        
        ///<summary>Gets PoreInteractionIndex</summary>
        [JsonIgnore]
        public double[] PoreInteractionIndex { get { throw new NotImplementedException(); } set { throw new NotImplementedException(); }}
                
        ///<summary>Gets potential evaporation from soil surface (mm)</summary>
        [Description("Eos (mm)")]
        public double Eos { get; set; }

        /// <summary>Gets the actual (realised) soil water evaporation (mm)</summary>
        [Description("Es (mm)")]
        public double Es { get; set; }

        /// <summary>Gets potential evapotranspiration of the whole soil-plant system (mm)</summary>
        [Description("Eo (mm)")]
        public double Eo { get; set; }

        /// <summary>Gets the amount of water runoff (mm)</summary>
        public double Runoff { get { return 0; } }
        
        /// <summary>Gets the amount of water drainage from bottom of profile(mm)</summary>
        public double Drainage { get { return 0; } }

        /// <summary>Fraction of incoming radiation reflected from bare soil</summary>
        [Description("Salb")]
        public double Salb { get; set; }

        /// <summary>Amount of water moving laterally out of the profile (mm)</summary>
        public double[] LateralOutflow { get { throw new NotImplementedException(); } }

        /// <summary>Amount of N leaching as NO3-N from the deepest soil layer (kg /ha)</summary>
        public double LeachNO3 { get { return 0; } }

        /// <summary>Amount of N leaching as NH4-N from the deepest soil layer (kg /ha)</summary>
        public double LeachNH4 { get { return 0; } }
        
        /// <summary>Amount of N leaching as urea-N  from the deepest soil layer (kg /ha)</summary>
        public double LeachUrea { get { return 0; } }

        /// <summary>Amount of Cl leaching  from the deepest soil layer (kg /ha)</summary>
        public double LeachCl { get { return 0; } }
        
        /// <summary>Amount of N leaching as NO3 from each soil layer (kg /ha)</summary>
        public double[] FlowNO3 { get { throw new NotImplementedException(); } }

        /// <summary>Amount of N leaching as NH4 from each soil layer (kg /ha)</summary>
        public double[] FlowNH4 { get { throw new NotImplementedException(); } }

        /// <summary>Amount of N leaching as urea from each soil layer (kg /ha)</summary>
        public double[] FlowUrea { get { throw new NotImplementedException(); } }

        /// <summary>Amount of N leaching as urea from each soil layer (kg /ha)</summary>
        public double[] FlowCl { get { throw new NotImplementedException(); } }

        /// <summary>Amount of water moving upward from each soil layer during unsaturated flow (negative value means downward movement) (mm)</summary>
        public double[] Flow  { get { throw new NotImplementedException(); } }

        /// <summary>Amount of water moving downward out of each soil layer due to gravity drainage (above DUL) (mm)</summary>
        public double[] Flux { get { throw new NotImplementedException(); } }

        /// <summary> This is set by Microclimate and is rainfall less that intercepted by the canopy and residue components </summary>
        public double PotentialInfiltration { get; set; }
        
        /// <summary> The amount of rainfall intercepted by crop and residue canopies </summary>
        public double PrecipitationInterception { get; set; }

        /// <summary>Water table depth (mm)</summary>
        public double WaterTable { get; set; }
        
        /// <summary>Pond depth (mm)</summary>
        public double Pond { get; set; }

        /// <summary>Pond depth (mm)</summary>
        public double SubsurfaceDrain { get; set; }

        /// <summary>Sets the water table.</summary>
        /// <param name="InitialDepth">The initial depth.</param> 
        public void SetWaterTable(double InitialDepth)
        {
            throw new NotImplementedException();
        }

        /// <summary>The efficiency (0-1) that solutes move down with water.</summary>
        public double[] SoluteFluxEfficiency { get; set; }

        /// <summary>The efficiency (0-1) that solutes move up with water.</summary>
        public double[] SoluteFlowEfficiency { get; set; }

        ///<summary>Perform a reset</summary>
        public void Reset()
        {
            throw new NotImplementedException();
        }

        ///<summary>Perform tillage</summary>
        public void Tillage(TillageType Data)
        {
            throw new NotImplementedException();
        }

        ///<summary>Perform tillage</summary>
        public void Tillage(string tillageType)
        {
            throw new NotImplementedException();
        }

        ///<summary>Remove water from the profile</summary>
        public void RemoveWater(double[] amountToRemove)
        {
            throw new NotImplementedException();
        }
        public void Standardise(double[] targetThickness)
        {
        
        
        }
        
        /// <summary>Plant available water SW-LL15 (mm/mm).</summary>
        [Units("mm/mm")]
        public double[] PAW
        {
            get
            {
                return SoilUtilities.CalcPAWC(soilPhysical.Thickness,
                                              soilPhysical.LL15,
                                              SW,
                                              null);
            }
        }

        /// <summary>Plant available water SW-LL15 (mm).</summary>
        [Units("mm")]
        public double[] PAWmm
        {
            get
            {
                return MathUtilities.Multiply(PAW, soilPhysical.Thickness);
            }
        }

    }
}
```
      Manager SetLowerBCDepth
        LowerBCDepth = 20
```csharp
using Models.Soils;
using System;
using System.Linq;
using Models.Core;
using Models.PMF;
using APSIM.Shared.Utilities;
using Models.Soils.SoilTemp;

namespace Models
{
    [Serializable]
    public class Script : Model
    {
        [Link] Clock Clock;
        [Link] SoilTemperature soilTemperature;
        
        [Description("Depth of constant temperature BC? (m)")] 
        public double LowerBCDepth { get; set; }

        
        [EventSubscribe("StartOfSimulation")]
        private void OnStartOfSimulation(object sender, EventArgs e)
        {
        	soilTemperature.CONSTANT_TEMPdepth = LowerBCDepth;
        }
    }
}
```
      Soil: Latitude=0; Longitude=0
        Water: Thickness=[100, 100, 800, 5000]; InitialValues=[0.16, 0.16, 0.16, 0.16]; InitialPAWmm=660; RelativeTo=LL15; FilledFromTop=true
        Physical
          Thickness  ParticleSizeClay  BD   AirDry  LL15  DUL   SAT
          100        9                 1.5  0.01    0.05  0.16  0.29
          100        9                 1.5  0.01    0.05  0.16  0.29
          800        9                 1.5  0.01    0.05  0.16  0.29
          5000       9                 1.5  0.01    0.05  0.16  0.29
          999999     -                 -    -       -     -     -
          999999     -                 -    -       -     -     -
          999999     -                 -    -       -     -     -
          999999     -                 -    -       -     -     -
        Organic: FOMCNRatio=60; CarbonUnits=Total
          Thickness  Carbon  SoilCNRatio  FBiom  FInert  FOM
          100        2       14.5         0.04   0.4     0.294
          100        2       14.5         0.04   0.4     0.294
          800        2       14.5         0.04   0.4     0.294
          5000       2       14.5         0.04   0.4     0.294
        Chemical: Thickness=[100, 100, 800, 5000]; PH=[6.5, 6.5, 6.5, 6.5]; PHUnits=Water
        SoilTemperature: CONSTANT_TEMPdepth=0
        Solute NO3: Thickness=[6000]; InitialValues=[0.1]; InitialValuesUnits=kg/ha; WaterTableConcentration=0; D0=0; DepthConstant=0; MaxDepthSoluteAccessible=0; RunoffEffectivenessAtMovingSolute=0; MaxEffectiveRunoff=0
        Solute NH4: Thickness=[2000]; InitialValues=[1]; InitialValuesUnits=kg/ha; WaterTableConcentration=0; D0=0; DepthConstant=0; MaxDepthSoluteAccessible=0; RunoffEffectivenessAtMovingSolute=0; MaxEffectiveRunoff=0
        Solute Urea: Thickness=[6000]; InitialValues=[0]; InitialValuesUnits=kg/ha; WaterTableConcentration=0; D0=0; DepthConstant=0; MaxDepthSoluteAccessible=0; RunoffEffectivenessAtMovingSolute=0; MaxEffectiveRunoff=0
        LayerStructure
          Thickness=[25, 50, 50, 75, 200, 200, 300, 200, 300, 200, 200, 200, 500, 500, 500, 500, 500, 400, 200]
      Report
        VariableNames:
          [Clock].Today as Date
          [Weather].MaxT as MaxT
          [Weather].MinT as MinT
          [Soil].SoilTemperature.AverageSoilTemp[1] as AverageSoilTemp@0012mm
          [Soil].SoilTemperature.AverageSoilTemp[2] as AverageSoilTemp@0050mm
          [Soil].SoilTemperature.AverageSoilTemp[3] as AverageSoilTemp@0100mm
          [Soil].SoilTemperature.AverageSoilTemp[4] as AverageSoilTemp@0160mm
          [Soil].SoilTemperature.AverageSoilTemp[5] as AverageSoilTemp@0300mm
          [Soil].SoilTemperature.AverageSoilTemp[6] as AverageSoilTemp@0500mm
          [Soil].SoilTemperature.AverageSoilTemp[7] as AverageSoilTemp@0750mm
          [Soil].SoilTemperature.AverageSoilTemp[8] as AverageSoilTemp@1000mm
          [Soil].SoilTemperature.AverageSoilTemp[9] as AverageSoilTemp@1250mm
          [Soil].SoilTemperature.AverageSoilTemp[10] as AverageSoilTemp@1500mm
          [Soil].SoilTemperature.AverageSoilTemp[11] as AverageSoilTemp@1700mm
          [Soil].SoilTemperature.AverageSoilTemp[12] as AverageSoilTemp@1900mm
          [Soil].SoilTemperature.AverageSoilTemp[13] as AverageSoilTemp@2250mm
          [Soil].SoilTemperature.AverageSoilTemp[14] as AverageSoilTemp@2750mm
          [Soil].SoilTemperature.AverageSoilTemp[15] as AverageSoilTemp@3250mm
          [Soil].SoilTemperature.AverageSoilTemp[16] as AverageSoilTemp@3750mm
          [Soil].SoilTemperature.AverageSoilTemp[17] as AverageSoilTemp@4250mm
          [Soil].SoilTemperature.AverageSoilTemp[18] as AverageSoilTemp@4700mm
          [Soil].SoilTemperature.AverageSoilTemp[19] as AverageSoilTemp@5000mm
          [Soil].SoilTemperature.MaxSoilTemp[1] as MaxSoilTemp@0012mm
          [Soil].SoilTemperature.MaxSoilTemp[2] as MaxSoilTemp@0050mm
          [Soil].SoilTemperature.MaxSoilTemp[3] as MaxSoilTemp@0100mm
          [Soil].SoilTemperature.MaxSoilTemp[4] as MaxSoilTemp@0160mm
          [Soil].SoilTemperature.MaxSoilTemp[5] as MaxSoilTemp@0300mm
          [Soil].SoilTemperature.MaxSoilTemp[6] as MaxSoilTemp@0500mm
          [Soil].SoilTemperature.MaxSoilTemp[7] as MaxSoilTemp@0750mm
          [Soil].SoilTemperature.MaxSoilTemp[8] as MaxSoilTemp@1000mm
          [Soil].SoilTemperature.MaxSoilTemp[9] as MaxSoilTemp@1250mm
          [Soil].SoilTemperature.MaxSoilTemp[10] as MaxSoilTemp@1500mm
          [Soil].SoilTemperature.MaxSoilTemp[11] as MaxSoilTemp@1700mm
          [Soil].SoilTemperature.MaxSoilTemp[12] as MaxSoilTemp@1900mm
          [Soil].SoilTemperature.MaxSoilTemp[13] as MaxSoilTemp@2250mm
          [Soil].SoilTemperature.MaxSoilTemp[14] as MaxSoilTemp@2750mm
          [Soil].SoilTemperature.MaxSoilTemp[15] as MaxSoilTemp@3250mm
          [Soil].SoilTemperature.MaxSoilTemp[16] as MaxSoilTemp@3750mm
          [Soil].SoilTemperature.MaxSoilTemp[17] as MaxSoilTemp@4250mm
          [Soil].SoilTemperature.MaxSoilTemp[18] as MaxSoilTemp@4700mm
          [Soil].SoilTemperature.MaxSoilTemp[19] as MaxSoilTemp@5000mm
        EventNames:
          Clock.Today >= new DateTime(2005, 1, 1)
          //[Clock].EndOfDay
  Folder ClayContent
    Experiment ExpClay
      Factors
        Factor ClayContent
          CompositeFactor Clay10
            Specifications=[Soil].Physical.ParticleSizeClay = 10, 10, 10, 10, 10, 10, 10, 10
          CompositeFactor Clay90: Specifications=[Soil].Physical.ParticleSizeClay = 95,95,95,95,95,95,95,95
      Simulation ClayContent
        Clock: Start=2000-01-01; End=2006-12-31
        Weather: FileName=AnalyticalWeather.xlsx; ExcelWorkSheetName=CoolAdd2WeeklyOsc
        MicroClimate: a_interception=0; b_interception=0; c_interception=0; d_interception=0; SoilHeatFluxFraction=0; MinimumHeightDiffForNewLayer=0; NightInterceptionFraction=0; ReferenceHeight=2
        Summary
        Zone Field: Area=1; Slope=0; AspectAngle=0; Altitude=50
          Manager DummyWaterBalance: same as Blank.Field.DummyWaterBalance
          Soil: same as Blank.Field.Soil
          Report: same as Blank.Field.Report
  Folder LowerBC
    Experiment ExpLowerBC
      Factors
        Factor LowerBC: Specification=[SetLowerBCDepth].Script.LowerBCDepth = 10, 100, 200, 300
      Simulation LowerBC
        Clock: Start=2000-01-01; End=2006-12-31
        Weather: FileName=AnalyticalWeather.xlsx; ExcelWorkSheetName=CoolAdd2WeeklyOsc
        MicroClimate: a_interception=0; b_interception=0; c_interception=0; d_interception=0; SoilHeatFluxFraction=0; MinimumHeightDiffForNewLayer=0; NightInterceptionFraction=0; ReferenceHeight=2
        Summary
        Zone Field: Area=1; Slope=0; AspectAngle=0; Altitude=50
          Manager DummyWaterBalance
            SW = 0.15, 0.15, 0.15, 0.15, 0.15, 0.15, 0.15, 0.15, 0.15, 0.15, 0.15, 0.15
            Eos = 0
            Es = 0
            Eo = 0
            Salb = 0
            script: same as in Blank.Field.DummyWaterBalance
          Manager SetLowerBCDepth: same as Blank.Field.SetLowerBCDepth
          Soil: Latitude=0; Longitude=0
            Water: Thickness=[100, 100, 800, 5000]; InitialValues=[0.16, 0.16, 0.16, 0.16]; InitialPAWmm=660; RelativeTo=LL15; FilledFromTop=true
            Physical
              Thickness  ParticleSizeClay  BD   AirDry  LL15  DUL   SAT
              100        10                1.5  0.01    0.05  0.16  0.29
              100        10                1.5  0.01    0.05  0.16  0.29
              800        10                1.5  0.01    0.05  0.16  0.29
              5000       10                1.5  0.01    0.05  0.16  0.29
              999999     -                 -    -       -     -     -
              999999     -                 -    -       -     -     -
              999999     -                 -    -       -     -     -
              999999     -                 -    -       -     -     -
            Organic: FOMCNRatio=60; CarbonUnits=Total
              Thickness  Carbon  SoilCNRatio  FBiom  FInert  FOM
              100        2       14.5         0.04   0.4     0.294
              100        2       14.5         0.04   0.4     0.294
              800        2       14.5         0.04   0.4     0.294
              5000       2       14.5         0.04   0.4     0.294
            Chemical: Thickness=[100, 100, 800, 5000]; PH=[6.5, 6.5, 6.5, 6.5]; PHUnits=Water
            SoilTemperature: CONSTANT_TEMPdepth=0
            Solute NO3: Thickness=[6000]; InitialValues=[0.1]; InitialValuesUnits=kg/ha; WaterTableConcentration=0; D0=0; DepthConstant=0; MaxDepthSoluteAccessible=0; RunoffEffectivenessAtMovingSolute=0; MaxEffectiveRunoff=0
            Solute NH4: Thickness=[2000]; InitialValues=[1]; InitialValuesUnits=kg/ha; WaterTableConcentration=0; D0=0; DepthConstant=0; MaxDepthSoluteAccessible=0; RunoffEffectivenessAtMovingSolute=0; MaxEffectiveRunoff=0
            Solute Urea: Thickness=[6000]; InitialValues=[0]; InitialValuesUnits=kg/ha; WaterTableConcentration=0; D0=0; DepthConstant=0; MaxDepthSoluteAccessible=0; RunoffEffectivenessAtMovingSolute=0; MaxEffectiveRunoff=0
            LayerStructure: Thickness=[25, 50, 50, 75, 200, 200, 300, 200, 300, 200, 200, 200]
          Report
            VariableNames:
              [Clock].Today as Date
              [Weather].MaxT as MaxT
              [Weather].MinT as MinT
              [Soil].SoilTemperature.AverageSoilTemp[1] as AverageSoilTemp@0012mm
              [Soil].SoilTemperature.AverageSoilTemp[2] as AverageSoilTemp@0050mm
              [Soil].SoilTemperature.AverageSoilTemp[3] as AverageSoilTemp@0100mm
              [Soil].SoilTemperature.AverageSoilTemp[4] as AverageSoilTemp@0160mm
              [Soil].SoilTemperature.AverageSoilTemp[5] as AverageSoilTemp@0300mm
              [Soil].SoilTemperature.AverageSoilTemp[6] as AverageSoilTemp@0500mm
              [Soil].SoilTemperature.AverageSoilTemp[7] as AverageSoilTemp@0750mm
              [Soil].SoilTemperature.AverageSoilTemp[8] as AverageSoilTemp@1000mm
              [Soil].SoilTemperature.AverageSoilTemp[9] as AverageSoilTemp@1250mm
              [Soil].SoilTemperature.AverageSoilTemp[10] as AverageSoilTemp@1500mm
              [Soil].SoilTemperature.AverageSoilTemp[11] as AverageSoilTemp@1700mm
              [Soil].SoilTemperature.AverageSoilTemp[12] as AverageSoilTemp@1900mm
              [Soil].SoilTemperature.MaxSoilTemp[1] as MaxSoilTemp@0012mm
              [Soil].SoilTemperature.MaxSoilTemp[2] as MaxSoilTemp@0050mm
              [Soil].SoilTemperature.MaxSoilTemp[3] as MaxSoilTemp@0100mm
              [Soil].SoilTemperature.MaxSoilTemp[4] as MaxSoilTemp@0160mm
              [Soil].SoilTemperature.MaxSoilTemp[5] as MaxSoilTemp@0300mm
              [Soil].SoilTemperature.MaxSoilTemp[6] as MaxSoilTemp@0500mm
              [Soil].SoilTemperature.MaxSoilTemp[7] as MaxSoilTemp@0750mm
              [Soil].SoilTemperature.MaxSoilTemp[8] as MaxSoilTemp@1000mm
              [Soil].SoilTemperature.MaxSoilTemp[9] as MaxSoilTemp@1250mm
              [Soil].SoilTemperature.MaxSoilTemp[10] as MaxSoilTemp@1500mm
              [Soil].SoilTemperature.MaxSoilTemp[11] as MaxSoilTemp@1700mm
              [Soil].SoilTemperature.MaxSoilTemp[12] as MaxSoilTemp@1900mm
            EventNames:
              Clock.Today >= new DateTime(2005, 1, 1)
              //[Clock].EndOfDay
  Folder LowerBC1
    Experiment ExpLowerBC1
      Factors
        Factor LowerBC
          Specification=[SetLowerBCDepth].Script.LowerBCDepth = 10, 20, 30, 100, 200, 300
      Simulation LowerBC1
        Clock: Start=2000-01-01; End=2006-12-31
        Weather: FileName=AnalyticalWeather.xlsx; ExcelWorkSheetName=CoolAdd2WeeklyOsc
        MicroClimate: a_interception=0; b_interception=0; c_interception=0; d_interception=0; SoilHeatFluxFraction=0; MinimumHeightDiffForNewLayer=0; NightInterceptionFraction=0; ReferenceHeight=2
        Summary
        Zone Field: Area=1; Slope=0; AspectAngle=0; Altitude=50
          Manager DummyWaterBalance
            SW = 0.15, 0.15, 0.15, 0.15, 0.15, 0.15, 0.15, 0.15, 0.15, 0.15, 0.15, 0.15, 0.15, 0.15, 0.15, 0.15, 0.15, 0.15, 0.15, 0.15, 0.15
            Eos = 0
            Es = 0
            Eo = 0
            Salb = 0
            script: same as in Blank.Field.DummyWaterBalance
          Manager SetLowerBCDepth: same as Blank.Field.SetLowerBCDepth
          Soil: Latitude=0; Longitude=0
            Water: Thickness=[100, 100, 800, 9000]; InitialValues=[0.16, 0.16, 0.16, 0.16]; InitialPAWmm=1100; RelativeTo=LL15; FilledFromTop=true
            Physical
              Thickness  ParticleSizeClay  BD   AirDry  LL15  DUL   SAT
              100        10                1.5  0.01    0.05  0.16  0.29
              100        10                1.5  0.01    0.05  0.16  0.29
              800        10                1.5  0.01    0.05  0.16  0.29
              9000       10                1.5  0.01    0.05  0.16  0.29
              999999     -                 -    -       -     -     -
              999999     -                 -    -       -     -     -
              999999     -                 -    -       -     -     -
              999999     -                 -    -       -     -     -
            Organic: FOMCNRatio=60; CarbonUnits=Total
              Thickness  Carbon  SoilCNRatio  FBiom  FInert  FOM
              100        2       14.5         0.04   0.4     0.294
              100        2       14.5         0.04   0.4     0.294
              800        2       14.5         0.04   0.4     0.294
              9000       2       14.5         0.04   0.4     0.294
            Chemical: Thickness=[100, 100, 800, 9000]; PH=[6.5, 6.5, 6.5, 6.5]; PHUnits=Water
            SoilTemperature: CONSTANT_TEMPdepth=0
            Solute NO3: Thickness=[6000]; InitialValues=[0.1]; InitialValuesUnits=kg/ha; WaterTableConcentration=0; D0=0; DepthConstant=0; MaxDepthSoluteAccessible=0; RunoffEffectivenessAtMovingSolute=0; MaxEffectiveRunoff=0
            Solute NH4: Thickness=[2000]; InitialValues=[1]; InitialValuesUnits=kg/ha; WaterTableConcentration=0; D0=0; DepthConstant=0; MaxDepthSoluteAccessible=0; RunoffEffectivenessAtMovingSolute=0; MaxEffectiveRunoff=0
            Solute Urea: Thickness=[6000]; InitialValues=[0]; InitialValuesUnits=kg/ha; WaterTableConcentration=0; D0=0; DepthConstant=0; MaxDepthSoluteAccessible=0; RunoffEffectivenessAtMovingSolute=0; MaxEffectiveRunoff=0
            LayerStructure
              Thickness=[25, 50, 50, 75, 200, 200, 300, 200, 300, 200, 200, 200, 500, 500, 1000, 1000, 1000, 1000, 1000, 1000, 1000]
          Report: same as LowerBC.ExpLowerBC.LowerBC.Field.Report
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