Simulations: Version=154
  DataStore
    ParallelPostSimulationTool
      SerialPostSimulationTool PredictedObserved
        ParallelPostSimulationTool ReadInputs
          ExcelInput: FileNames=[obs\Observed.xlsx]; SheetNames=[Observed]
          ExcelInput DailyObserved: FileNames=[obs\DailyObserved.xlsx]; SheetNames=[DailyObserved]
        ParallelPostSimulationTool MergeWithPredictions
          PredictedObserved: PredictedTableName=HarvestReport; ObservedTableName=Observed; FieldNameUsedForMatch=Stage; AllColumns=false
          PredictedObserved DailyPredictedObserved: PredictedTableName=DailyReport; ObservedTableName=DailyObserved; FieldNameUsedForMatch=Date; AllColumns=false
      Probability: TableName=BugeseraSensibility; Exceedence=false; FieldToSplitOn=SimulationName
      Probability WaterByNProbability: TableName=WaterByNSensibilityReport; Exceedence=false; FieldToSplitOn=SimulationName
      Input OldApsimFixed: FileNames=[old\combined_fixed.csv]
        Memo
          Daily outputs from the old apsim test set using fixed/static tillering (via fertile tiller number supplied in the sowing rule).
      Input OldApsimDynamic: FileNames=[old\combined_dynamic.csv]
        Memo
          Daily outputs from the old apsim test set using dynamic tillering.
      Input Multiyear_HE1_T1: FileNames=[old\multiyear_he1_t1.out]
  Folder Replacements
    Plant Sorghum: PlantType=Sorghum; IsEnding=false; DaysAfterEnding=0
      Memo Introduction
        Hammer, G.L., McLean, G., Brider, J., van Oosterom, E., Wu, A., Holzworth, D.

        The APSIM-sorghum model is based on a framework of the physiological determinants of crop growth and development (Charles-Edwards, 1982) and is focused at organ scale. It generates the phenotype of a crop as a consequence of underlying physiological processes (Fig. 1) by using the concept of supply and demand balances for light, carbon, water, and nitrogen (Hammer et al., 2001b).
        The approach is focused around quantifying capture and use of radiation, water, and nitrogen within a framework that predicts the dynamics of crop development and the realized growth of major organs based on their potential growth and whether the supply of carbohydrate and nitrogen can satisfy this potential. Demand for resources is defined by potential organ growth and potential supply by resource capture (Monteith, 1977; Passioura, 1983; Monteith, 1986) (Fig. 1).

        Arbitration rules and organ level responses are invoked when resource capture cannot satisfy demand. The APSIM-sorghum model retains some features and concepts of earlier models (Sinclair, 1986; Rosenthal et al., 1989; Birch et al., 1990; Sinclair and Amir, 1992; Chapman et al., 1993; Hammer and Muchow, 1994), but has been adapted and redesigned to generate a more explanatory approach to the modeling of the underlying physiology (Hammer et al., 2006).

        ![Schematic representation of crop growth and development dynamics (a) and crop nitrogen dynamics (b) in Agricultural Production System sIMulator (APSIM)-sorghum model. Connection points between the two schematics are shown by theshaded boxes. After Hammer et al. (2010). SLN, specific leaf nitrogen](SorghumModel.png)

        **Crop Nitrogen Dynamics**

        Crop N dynamics are modeled based on a physiological approach that accounts for the fact that the bulk of reduced N present in leaves is associated with photosynthesis structures and enzymes (Grindlay, 1997) (Fig. 1b). The rate of light-saturated net photosynthesis has been shown to be a linear function of the amount of leaf N per unit leaf area (specific leaf nitrogen [SLN]), until a species-specific maximum rate of photosynthesis has been reached (Sinclair and Horie,1989; Anten et al., 1995; Grindlay, 1997). Expressing crop N demand relative to canopy expansion thus provides a physiological link between crop N status, light interception, and dry mater accumulation. In addition, the cardinal SLN values for new leaf growth and for leaf death in response to N deficiency are independent of growth stage (van Oosterom et al., 2010a).

        During the pre-anthesis period, only stems (including rachis) and leaves are expanding, and their N demand is met in a hierarchical fashion (van Oosterom etal., 2010a). First, structural N demand of the stem (and rachis) is met, as structural stem mass is required to support leaf growth. Structural stem N demand is represented by the minimum stem N concentration. If insuﬃcient N has been taken up to meet structural stem N requirement, N can be translocated from leaves by dilution or, in extreme cases of early season N deficiency, by leaf senescence. Second, the N demand of expanding new leaves will be met, and this is determined from their critical SLN. Any additional N uptake will first be allocated to leaves to meet their target SLN and then to stem. For leaves, this N uptake represents "luxury" uptake that can occur after full expansion of a leaf, and which does not aﬀect growth and development (van Oosterom et al., 2010a). This hierarchical allocation of N is consistent with observations that under N stress are relatively larger proportion of N is allocated to the leaves (van Oosterom et al.,2010a). Hence, pre-anthesis N allocation ratios are a consequence of model dynamics, rather than a model input.

        After anthesis, grain becomes the major sink for N, and grain N demand is determined as the product of grain number and N demand per grain. During the first part of grain filling, N demand per grain is constant and independent of grain growth rate and N status of the crop (van Oosterom et al., 2010b). At this time endosperm cells are dividing, so that the accumulation of structural (metabolic) proteins in the grain is the key driver. During the second half of grain filling,grain N demand is linked with grain growth rate as cell division and simultaneous storage of carbohydrate and proteins assumes a greater role (Martre et al.,2006). Grain protein content can thus vary depending on the N supply–demand balance and the carbohydrate supply to the grain. Grain N demand is initially met through stem (plus rachis) N translocation, and if this becomes insuﬃcient,then N translocation from leaf can occur. Maximum N translocation rates from stem and per unit leaf area are a function of the N status of these organs, so that sink demand determines the amount of leaf area that is senescing at any one time(van Oosterom et al., 2010b). The source regulation of N translocation follows a first-order kinetic relationship that is representative of enzyme activity. Leaf SLN thus declines to its structural (minimum) level, and the amount of leaf area senesced, in the absence of other factors that can aﬀect senescence, such as water limitation and shading, depends on the N supply–demand balance.

        The daily rate of crop N uptake is the minimum of demand for N by the crop and potential supply of N from the soil and senescing leaves, capped at a maximum N uptake rate (van Oosterom et al., 2010a). Potential N supply from the soil depends on the available soil N through the profile and on the extent to which roots have explored the soil. N supply from the soil is calculated from the combination of passive uptake, through massﬂow of N taken up with the transpiration stream, and active uptake (van Keulen and Seligman, 1987). Soil N transformations and their modeling in APSIM have been detailed by Probert et al. (1998).
      OrganArbitrator Arbitrator
        BiomassTypeArbitrator DMArbitration
          Folder PotentialPartitioningMethods
            ReallocationMethod
            AllocateFixationMethod
            RetranslocationMethod
            SendPotentialDMAllocationsMethod
          Folder AllocationMethods
            DryMatterAllocationsMethod
          PrioritythenRelativeAllocation ArbitrationMethod
        BiomassTypeArbitrator NArbitration
          Folder PotentialPartitioningMethods
            ReallocationMethod
          Folder ActualPartitioningMethods
            AllocateFixationMethod
            C4RetranslocationMethod
          Folder AllocationMethods
            NitrogenAllocationsMethod
          SorghumArbitratorN ArbitrationMethod
          AllocateUptakesMethod
        C4WaterUptakeMethod WaterUptakeMethod: SDRatio=0
        C4NitrogenUptakeMethod NitrogenUptakeMethod
          Constant MaxNUptakeRate: FixedValue=0.029
          Constant MaxDiffusion: FixedValue=2
          Constant NSupplyFraction: FixedValue=5
          Constant NUptakeCease: FixedValue=570
        VariableReference SDRatio: VariableName=[Arbitrator].WaterUptakeMethod.SDRatio
        VariableReference WDemand: VariableName=[Arbitrator].WaterUptakeMethod.WDemand
        VariableReference WSupply: VariableName=[Arbitrator].WaterUptakeMethod.WSupply
        VariableReference WAllocated: VariableName=[Arbitrator].WaterUptakeMethod.WAllocated
        VariableReference WatSupply: VariableName=[Arbitrator].WaterUptakeMethod.WatSupply
        BoundFunction SDRatioBound
          VariableReference SDRatio: VariableName=[Arbitrator].WaterUptakeMethod.SDRatio
          Constant Lower: FixedValue=0
          Constant Upper: FixedValue=1.1
      Phenology
        Memo Description
          Phenology is simulated through a number of development stages by using a thermal time approach (Muchow and Carberry, 1990; Hammer and Muchow, 1994),
          with the temperature response characterized by a base (Tb), optimum (Topt), and maximum (Tm) temperature. Hammer et al. (1993) and Carberry et al. (1993) reported values of Tb, Topt, and Tm for sorghum of 11, 32, and 42°C, respectively.
          The thermal time target for the phase between emergence and panicle initiation is also a function of day length (Hammer et al., 1989; Ravi Kumar et al., 2009), and its duration, when divided by the plastochron (°Cd per leaf), determines total leaf number once an allowance for leaf initials in the embryo has been included.

          Total leaf number multiplied by the phyllochron (°Cd per leaf) determines the thermal time to reach flag leaf stage, which is thus an emergent property of the model. The duration of the phases between the stages of flag leaf, anthesis, and start and end of grain filling are also simulated through thermal time targets (Muchow and Carberry, 1990; Hammer and Muchow, 1994; Ravi Kumar et al., 2009). Drought stress and N stress can both reduce the leaf appearance rate and hence delay phenology during the vegetative stages (Craufurd et al., 1993; van Oosterom et al., 2010a).
        PhaseLookup ThermalTime
          PhaseLookupValue BeforeFlowering: Start=Germination; End=Flowering
            VariableReference DltTT: VariableName=[Phenology].DltTT
          PhaseLookupValue PostFlowering: Start=Flowering; End=Maturity
            VariableReference DltTTFM: VariableName=[Phenology].DltTTFM
          PhaseLookupValue MaturityToRipe: Start=Maturity; End=HarvestRipe
            VariableReference DltTT: VariableName=[Phenology].DltTT
        MultiplyFunction DltTT
          HourlyInterpolation ThermalTime: agregationMethod=0
            XYPairs Response: X=[11, 30, 42]; Y=[0, 19, 0]
            ThreeHourSin InterpolationMethod
          PhaseLookup Stress
            PhaseLookupValue SowingToEndJuvenile: Start=Sowing; End=EndJuvenile
              VariableReference PhenoWaterStress: VariableName=[Phenology].PhenoWaterStress
            PhaseLookupValue EndJuveToFlag: Start=EndJuvenile; End=FlagLeaf
              MinimumFunction
                VariableReference PhenoWaterStress: VariableName=[Phenology].PhenoWaterStress
                VariableReference NitrogenPhenoStress: VariableName=[Leaf].NitrogenPhenoStress
            PhaseLookupValue FlagToFlowering: Start=FlagLeaf; End=Flowering
              VariableReference PhenoWaterStress: VariableName=[Phenology].PhenoWaterStress
            PhaseLookupValue PostFlowering: Start=Flowering; End=HarvestRipe
              Constant: FixedValue=1
        WeightedTemperatureFunction DltTTFM: MaximumTemperatureWeighting=0.5
          XYPairs: X=[5.7, 23.5]; Y=[0, 17.8]
        GerminatingPhase Germinating: Start=Sowing; End=Germination
        EmergingPhase Emerging: Start=Germination; End=Emergence; TTForTimeStep=0
          VariableReference ThermalTime: VariableName=[Phenology].ThermalTime
          AddFunction Target
            Constant ShootLag: FixedValue=15
            MultiplyFunction DepthxRate
              VariableReference SowingDepth: VariableName=[Plant].SowingData.Depth
              Constant ShootRate: FixedValue=0.6
        GenericPhase Juvenile: Start=Emergence; End=EndJuvenile
          Constant Target: FixedValue=100
          VariableReference Progression: VariableName=[Phenology].ThermalTime
        GenericPhase JuvenileToFloralInit: Start=EndJuvenile; End=FloralInitiation
          VariableReference Progression: VariableName=[Phenology].ThermalTime
          VariableReference Target: VariableName=[Phenology].TTTargetPhotoSensitive
        GenericPhase FloralInitToFlagLeaf: Start=FloralInitiation; End=FlagLeaf
          VariableReference Progression: VariableName=[Phenology].ThermalTime
          SubtractFunction Target
            VariableReference TTEmergToFlag: VariableName=[Phenology].TTEmergToFlagLeaf
            VariableReference TTJuvenile: VariableName=[Phenology].Juvenile.Target
            VariableReference TTJuvToFloralInit: VariableName=[Phenology].JuvenileToFloralInit.Target
        GenericPhase FlagLeafToFlowering: Start=FlagLeaf; End=Flowering
          Constant Target: FixedValue=170
          VariableReference Progression: VariableName=[Phenology].ThermalTime
        GenericPhase FloweringToGrainFilling: Start=Flowering; End=StartGrainFill
          Constant Target: FixedValue=80
          VariableReference Progression: VariableName=[Phenology].DltTTFM
        GenericPhase GrainFilling: Start=StartGrainFill; End=EndGrainFill
          VariableReference Progression: VariableName=[Phenology].DltTTFM
          SubtractFunction Target
            VariableReference FlowerToMaturity: VariableName=[Phenology].TTFlowerToMaturity
            VariableReference FlowerToGrainFill: VariableName=[Phenology].FloweringToGrainFilling.Target
            VariableReference GrainFillToMaturity: VariableName=[Phenology].TTGrainFillToMaturity
        GenericPhase Maturing: Start=EndGrainFill; End=Maturity
          VariableReference Progression: VariableName=[Phenology].DltTTFM
          VariableReference Target: VariableName=[Phenology].TTGrainFillToMaturity
        GenericPhase MaturityToHarvestRipe: Start=Maturity; End=HarvestRipe
          VariableReference Progression: VariableName=[Phenology].ThermalTime
          Constant Target: FixedValue=1
        EndPhase ReadyForHarvesting: Start=HarvestRipe; End=Unused
          VariableReference ThermalTime: VariableName=[Phenology].ThermalTime
        PhotoperiodFunction Photoperiod: Twilight=-2.2; DayLength=0
        OnEventFunction FloweringDAS: SetEvent=Flowering; ReSetEvent=never
          Memo
            A function is used to provide flowering date as days after sowing(DAS).
          Constant PreEventValue: FixedValue=0
          VariableReference PostEventValue: VariableName=[Plant].DaysAfterSowing
        OnEventFunction MaturityDAS: SetEvent=Maturity; ReSetEvent=never
          Memo
            A function is used to provide maturity date as days after sowing(DAS).
          Constant PreEventValue: FixedValue=0
          VariableReference PostEventValue: VariableName=[Plant].DaysAfterSowing
        Constant TTEndJuvToInit: FixedValue=160
        Constant TTFlowerToMaturity: FixedValue=761
        MultiplyFunction TTGrainFillToMaturity
          VariableReference FlowerToMaturity: VariableName=[Phenology].TTFlowerToMaturity
          Constant Proportion: FixedValue=0.05
        PhaseLookup TTTargetPhotoSensitive
          PhaseLookupValue: Start=Sowing; End=Emergence
            VariableReference PreEventValue: VariableName=[Phenology].TTEndJuvToInit
          PhaseLookupValue EmergenceToEndJuve: Start=Emergence; End=EndJuvenile
            AddFunction Add
              VariableReference PhotoModifier: VariableName=[Phenology].PhotoModifier
              VariableReference TTEndJuvToInit: VariableName=[Phenology].TTEndJuvToInit
          PhaseLookupValue EndJuveToMaturity: Start=EndJuvenile; End=HarvestRipe
            OnEventFunction TTTargetPhoto: SetEvent=EndJuvenile; ReSetEvent=never
              VariableReference PreEventValue: VariableName=[Phenology].TTEndJuvToInit
              AddFunction PostEventValue
                VariableReference PhotoModifier: VariableName=[Phenology].PhotoModifier
                VariableReference TTEndJuvToInit: VariableName=[Phenology].TTEndJuvToInit
        LinearInterpolationFunction PhotoModifier
          XYPairs: X=[11.5, 13.5]; Y=[0, 23]
          VariableReference XValue: VariableName=[Phenology].Photoperiod
        AddFunction TTEmergToFlagLeaf
          MultiplyFunction LeafAppearingPhase1
            SubtractFunction NoLeavesRate1
              VariableReference FinalLeafNo: VariableName=[Leaf].FinalLeafNo
              VariableReference LeafNoAtEmergence: VariableName=[Leaf].Parameters.LeafNoAtEmergence
              VariableReference LeafNoRateChange: VariableName=[Leaf].Parameters.noRateChange1
            VariableReference LeafAppearanceRate1: VariableName=[Leaf].Parameters.appearanceRate1
          MultiplyFunction LeafAppearingPhase2
            VariableReference LeafAppearanceRate2: VariableName=[Leaf].Parameters.appearanceRate2
            VariableReference LeafNoRateChange: VariableName=[Leaf].Parameters.noRateChange1
        AddFunction TTEmergToFloralInit
          VariableReference TTTargetJuvenille: VariableName=[Phenology].Juvenile.Target
          VariableReference TTTargetJuvToFI: VariableName=[Phenology].JuvenileToFloralInit.Target
        AddFunction TTToFlowering
          VariableReference GerminatingTarget: VariableName=[Emerging].Target
          VariableReference TTEmergToFlagLeaf: VariableName=[TTEmergToFlagLeaf]
          VariableReference FlagLeafToFlowering: VariableName=[FlagLeafToFlowering].Target
        AccumulateFunction TTFromEmergence: StartStageName=Emergence; EndStageName=Maturity; FractionRemovedOnCut=0; FractionRemovedOnHarvest=0; FractionRemovedOnGraze=0; FractionRemovedOnPrune=0
          VariableReference ThermalTime: VariableName=[Phenology].CurrentPhase.ProgressionForTimeStep
        AccumulateFunction TTFMFromFlowering: StartStageName=Flowering; EndStageName=Maturity; FractionRemovedOnCut=0; FractionRemovedOnHarvest=0; FractionRemovedOnGraze=0; FractionRemovedOnPrune=0
          VariableReference ThermalTime: VariableName=[Phenology].CurrentPhase.ProgressionForTimeStep
        AccumulateFunction TTFMSgfToMaturity: StartStageName=StartGrainFill; EndStageName=Maturity; FractionRemovedOnCut=0; FractionRemovedOnHarvest=0; FractionRemovedOnGraze=0; FractionRemovedOnPrune=0
          VariableReference ThermalTime: VariableName=[Phenology].CurrentPhase.ProgressionForTimeStep
        LinearInterpolationFunction PhenoWaterStress
          XYPairs: X=[0, 0.7, 1]; Y=[0, 1, 1]
          VariableReference XValue: VariableName=[Arbitrator].SDRatio
        LinearInterpolationFunction PhenoNitrogenStress
          Memo
            Don't use this variable for reporting as this function will be re-evaluated at the end of the day and will therefore be evaluated using todays SLN value.
            When phenology is calculated, it will be using yesterday's SLN.
            Leaf(NitrogenPhenoStress)is used to ensure consistency.

            Original function: phenoStress = (0.5 + 0.5 / 0.3 * (SLN - 0.7));

            Bound by Min of 0.5, Max of 1.0
          XYPairs: X=[0, 0.7, 1]; Y=[0.5, 0.5, 1]
          VariableReference XValue: VariableName=[Leaf].SLN
      ReproductiveOrgan Grain: GrowthRespiration=0; MaintenanceRespiration=0
        Biomass Live
        Biomass Dead
        Memo Introduction
          Maximum grain number is a function of the change in plant biomass between panicle initiation and start grain filling (Rosenthal et al., 1989), while grain size is determined by grain growth rate, eﬀective grain filling period, and redistribution of assimilates post-anthesis (Heiniger et al., 1997b). If grain mass demand for a day exceeds the daily increase in biomass, the shortfall will first be met through translocation from stem and, if that is insuﬃcient to meet demand of the grain, through translocation from leaves, accelerating their senescence. Conversely, if the daily increase in biomass exceeds the grain mass demand, the excess biomass production is allocated to the stem.
        Constant InitialGrainProportion: FixedValue=0.05
        Constant MaximumPotentialGrainSize: FixedValue=0.3
        Constant MinimumNConc: FixedValue=0.008
        PhaseLookup MaximumNConc
          PhaseLookupValue InitialPhase: Start=Flowering; End=StartGrainFill
            Constant InitialNconc: FixedValue=0.05
          PhaseLookupValue LinearPhase: Start=StartGrainFill; End=Maturity
            Constant FinalNconc: FixedValue=0.0175
        Constant WaterContent: FixedValue=0.13
        PhaseLookup NFillingRate
          Memo
            First half of the Grainfilling Period is calculated using Grain Filling Rate.
            2nd half is calculated using the maximum N Concentration of todays Biomass

            Amount of N filled per day is limited by the Target N Concentration at all times.
          PhaseLookupValue GrainFilling: Start=StartGrainFill; End=Maturity
            LessThanFunction
              DivideFunction gfFract
                VariableReference TTGrainFillToMaturity: VariableName=[Phenology].TTFMSgfToMaturity
                AddFunction TTTargetSgfToNow
                  VariableReference GrainFilling: VariableName=[Phenology].GrainFilling.Target
                  VariableReference Maturity: VariableName=[Phenology].Maturing.Target
              Constant GrainFillFraction: FixedValue=0.5; Units=g/g
              MinimumFunction InitialGrainFilling
                MultiplyFunction FillingRate
                  VariableReference NumberFunction: VariableName=[Grain].NumberFunction
                  VariableReference ThermalTime: VariableName=[Phenology].DltTTFM
                  DivideFunction
                    Constant GrainFillRate: FixedValue=0.001; Units=mg/grain/dd
                    Constant Thousand: FixedValue=1000; Units=mg/g
                MultiplyFunction FinalGrainFilling
                  VariableReference dltDmGreen: VariableName=[Grain].potentialDMAllocation.Structural
                  VariableReference maxNConc: VariableName=[Grain].MaximumNConc
              MultiplyFunction FinalGrainFilling
                VariableReference dltDmGreen: VariableName=[Grain].potentialDMAllocation.Structural
                VariableReference maxNConc: VariableName=[Grain].MaximumNConc
        Constant DMPerSeed: FixedValue=0.00083
        OnEventFunction FinalGrainNum: SetEvent=StartGrainFill; ReSetEvent=Germination
          Constant PreEventValue: FixedValue=0
          DivideFunction PostEventValue
            DivideFunction GrowthRate
              MaximumFunction PlantGrowth
                Memo
                  Maximum function here prevents grain from returning negative dm demand in the event that plant growth is negative.
                SubtractFunction PlantGrowthSinceFloralInit
                  VariableReference TotalBiomass: VariableName=[Sorghum].Total.Wt
                  OnEventFunction GreenWtAtFI: SetEvent=FloralInitiation; ReSetEvent=Germination
                    Constant PreEventValue: FixedValue=0
                    VariableReference PostEventValue: VariableName=[Sorghum].Total.Wt
                      Memo
                        Definitely [Sorghum].Total.Wt
                Constant Zero: FixedValue=0
              AccumulateFunction DaysFIToStartGrainFill: StartStageName=FloralInitiation; EndStageName=StartGrainFill; FractionRemovedOnCut=0; FractionRemovedOnHarvest=0; FractionRemovedOnGraze=0; FractionRemovedOnPrune=0
                Constant One: FixedValue=1
            VariableReference DMPerSeed: VariableName=[Grain].DMPerSeed
        GrainNumberFunction NumberFunction
          VariableReference PotentialGrainNumber: VariableName=[Grain].FinalGrainNum
          MinimumFunction GrowthRateFactor
            DivideFunction GrowthRate
              VariableReference TTStartGrainToNow: VariableName=[Phenology].TTFMSgfToMaturity
              Constant RampTT: FixedValue=100
            Constant One: FixedValue=1
          DecumulateFunction StressFactor: InitialValue=1; MinValue=0; StartStageName=FlagLeaf; ResetStageName=Emergence
            MultiplyFunction
              Memo
                Stress is accumulated during the specified window.
              ThermalTimeWindowFunction StressWindow
                SubtractFunction TTWindowStart
                  VariableReference TTToFlowering: VariableName=[Phenology].TTToFlowering
                  Constant PreAnthesis: FixedValue=50
                AddFunction TTWindowEnd
                  VariableReference TTToFlowering: VariableName=[Phenology].TTToFlowering
                  Constant PostAnthesis: FixedValue=100
                VariableReference ThermalTime: VariableName=[Phenology].TTFromEmergence
                VariableReference dltThermalTime: VariableName=[Phenology].DLTTTFM
              LinearInterpolationFunction SevereHeatResponse
                XYPairs: X=[0, 32, 33, 36, 38]; Y=[0, 0, 0.14, 0.23, 0.65]
                VariableReference XValue: VariableName=[Weather].MaxT
        DivideFunction DMCaryopsis
          VariableReference DMFixationSupply: VariableName=[Arbitrator].DM.TotalFixationSupply
          VariableReference GrainNumber: VariableName=[Grain].NumberFunction
          VariableReference ThermalTime: VariableName=[Phenology].DltTTFM
        MinimumFunction PotGrainFillRate
          MultiplyFunction
            AddFunction
              MultiplyFunction
                VariableReference DMCaryopsis: VariableName=[Grain].DMCaryopsis
                Constant: FixedValue=0.4026
              Constant: FixedValue=3.19e-05
            Constant: FixedValue=1000
          Constant MaxGrainFillRate: FixedValue=0.09
        PhaseLookup DMDemandFunction
          PhaseLookupValue SowingToMaturity: Start=Sowing; End=Maturity
            MultiplyFunction DMDemandFunction
              VariableReference GrainFillRate: VariableName=[Grain].PotGrainFillRate
              VariableReference ThermalTime: VariableName=[Phenology].DltTTFM
              VariableReference GrainNumber: VariableName=[Grain].NumberFunction
              Constant: FixedValue=0.001
        BiomassRemoval BiomassRemovalDefaults
          OrganBiomassRemovalType Harvest: FractionLiveToRemove=1; FractionDeadToRemove=0; FractionLiveToResidue=0; FractionDeadToResidue=0
          OrganBiomassRemovalType Cut: FractionLiveToRemove=1; FractionDeadToRemove=0; FractionLiveToResidue=0; FractionDeadToResidue=0
          OrganBiomassRemovalType Prune: FractionLiveToRemove=0; FractionDeadToRemove=0; FractionLiveToResidue=0.8; FractionDeadToResidue=0
          OrganBiomassRemovalType Graze: FractionLiveToRemove=0.6; FractionDeadToRemove=0; FractionLiveToResidue=0.2; FractionDeadToResidue=0
        Constant DMConversionEfficiency: FixedValue=1
        Constant RemobilisationCost: FixedValue=0
        Constant CarbonConcentration: FixedValue=0.4
        BiomassDemand DMDemandPriorityFactors
          Constant Structural: FixedValue=1
          Constant Metabolic: FixedValue=1
          Constant Storage: FixedValue=1
        BiomassDemand NDemandPriorityFactors: same as Replacements.Sorghum.Grain.DMDemandPriorityFactors
      Root: GrowthRespiration=0; MaintenanceRespiration=0
        RootShapeSemiCircleSorghum RootShape
        LinearInterpolationFunction KLModifier
          Memo
            The parameter KL is is described by Meinke et al (1993) to combine elements of soil conductivity (K) with root length (L) in determining root water uptake.  Peake et al (2013) demonstrated that in sorghum KL varied with plant population through impacts on root length density.  Here we adjust KL linearly with plant population.
          XYPairs: X=[0, 10]; Y=[1, 1]
          VariableReference XValue: VariableName=[Sorghum].Population
        Constant SoilWaterEffect: FixedValue=1
          Memo
            No effect of soil water content on root growth is currently captured in the model.
        Constant TemperatureEffect: FixedValue=1
          Memo
            No effect of temperature on root growth is currently captured in the model.
        Constant MaxDailyNUptake: FixedValue=20
          Memo
            Maximum daily N uptake is set to an arbitrarily high value.
        Constant SenescenceRate: FixedValue=0.002
          Memo
            Jones and Kiniry (1986) used a constant root senescence fraction in the CERES-Sorghum model.
        Constant MaximumNConc: FixedValue=0.02
        Constant MinimumNConc: FixedValue=0.002
        VariableReference CriticalNConc: VariableName=[Root].MinimumNConc
        Constant MaximumRootDepth: FixedValue=1000000
        MultiplyFunction RootFrontVelocity
          PhaseLookup PotentialRootFrontVelocity
            Memo
              Hammer et al (2009) used a constant extraction front velocity of 2.5cm per day in their analysis of historical sorghum yield trends in the US corn belt.
            PhaseLookupValue PreGrainFill: Start=Germination; End=StartGrainFill
              Constant Function: FixedValue=27
            PhaseLookupValue GrainfillToMaturity: Start=StartGrainFill; End=Maturity
              Constant Function: FixedValue=0
          LinearInterpolationFunction RootDepthStressFactor
            XYPairs: X=[0, 0.25]; Y=[0, 1]
            VariableReference XValue: VariableName=[Root].SWAvailabilityRatio
        PhaseLookupValue NitrogenDemandSwitch: Start=Germination; End=Maturity
          Constant: FixedValue=1
        LinearInterpolationFunction KNO3
          XYPairs: X=[0, 0.003]; Y=[0.03, 0.03]
          VariableReference XValue: VariableName=[Root].LengthDensity
        LinearInterpolationFunction NUptakeSWFactor
          XYPairs: X=[0, 0.2, 1]; Y=[1, 1, 1]
          VariableReference XValue: VariableName=[Root].RWC
        LinearInterpolationFunction KNH4
          XYPairs: X=[0, 0.003]; Y=[0.03, 0.03]
          VariableReference XValue: VariableName=[Root].LengthDensity
        Constant SpecificRootLength: FixedValue=100000; Units=m/g
        BiomassRemoval BiomassRemovalDefaults
          OrganBiomassRemovalType Harvest: FractionLiveToRemove=0; FractionDeadToRemove=0; FractionLiveToResidue=0.2; FractionDeadToResidue=0
          OrganBiomassRemovalType Cut: FractionLiveToRemove=0; FractionDeadToRemove=0; FractionLiveToResidue=0.3; FractionDeadToResidue=0
          OrganBiomassRemovalType Prune: FractionLiveToRemove=0; FractionDeadToRemove=0; FractionLiveToResidue=0.1; FractionDeadToResidue=0
          OrganBiomassRemovalType Graze: FractionLiveToRemove=0; FractionDeadToRemove=0; FractionLiveToResidue=0.15; FractionDeadToResidue=0
        Constant DMConversionEfficiency: FixedValue=1
        Constant MaintenanceRespirationFunction: FixedValue=1
        Constant RemobilisationCost: FixedValue=0
        Constant CarbonConcentration: FixedValue=0.4
        BiomassDemandAndPriority DMDemands
          MultiplyFunction Structural
            PhaseLookup ratioRootShoot
              Memo
                This is a straight lookup table not an lineaer relationship
              PhaseLookupValue BetweenEmergenceAndFloralInit: Start=Emergence; End=FloralInitiation
                Constant rootFraction: FixedValue=1; Units=0-1
              PhaseLookupValue BetweenFloralInitAndFlowering: Start=FloralInitiation; End=Flowering
                Constant rootFraction: FixedValue=0.33; Units=0-1
              PhaseLookupValue BetweenFloweringAndGrainFill: Start=Flowering; End=StartGrainFill
                Constant rootFraction: FixedValue=0.087; Units=0-1
              PhaseLookupValue BetweenGrainFillAndHarvest: Start=StartGrainFill; End=HarvestRipe
                Constant rootFraction: FixedValue=0; Units=0-1
            VariableReference LeafSupplyFunction: VariableName=[Leaf].DMSupplyFunction
          Constant Metabolic: FixedValue=0
          Constant Storage: FixedValue=0
          Constant QStructuralPriority: FixedValue=1
          Constant QMetabolicPriority: FixedValue=1
          Constant QStoragePriority: FixedValue=1
        BiomassDemandAndPriority NDemands
          MaximumFunction Structural
            Constant zero: FixedValue=0
            SubtractFunction NRequiredToMaintainMinConcenctration
              MultiplyFunction NRequired
                VariableReference MinNconc: VariableName=[Root].minimumNconc
                AddFunction CurrentDM
                  VariableReference dltDmGreen: VariableName=[Root].potentialDMAllocation.Structural
                  VariableReference dmGreen: VariableName=[Root].Live.Wt
              VariableReference nGreen: VariableName=[Root].Live.N
          Constant Metabolic: FixedValue=0
          Constant Storage: FixedValue=0
          Constant QStructuralPriority: FixedValue=1
          Constant QMetabolicPriority: FixedValue=1
          Constant QStoragePriority: FixedValue=1
        ProtectedDivideFunction SWAvailabilityRatio: NumeratorErrVal=0; DenominatorErrVal=10
          VariableReference extractable: VariableName=[Soil].SoilWater.ESW
          SubtractFunction capacity
            VariableReference dulDep: VariableName=[Soil].Physical.DULmm
            VariableReference llDep: VariableName=[Soil].Physical.LL15mm
        BiomassDemand InitialWt
          Constant Structural: FixedValue=0.1; Units=g/plant
          Constant Metabolic: FixedValue=0
          Constant Storage: FixedValue=0
      SorghumLeaf Leaf: InitialDMWeight=0.1; InitialLAI=200; InitialSLN=1.5; NewLeafSLN=1; SenescedLeafSLN=0.3; NDilutionIntercept=-0.0017; NDilutionSlope=0.0043; CanopyWidth=1000; Gsmax350=0.009; LeafInitialisationStage=Emergence; MicroClimatePresent=false; KDead=0.03; PhosphorusStress=1
        zero: TilleringMethod, FertileTillerNumber, Albedo, R50, MicroClimateSetting, BaseHeight, Width, PotentialEP, DltLAI, DltPotentialLAI, DltStressedLAI, LAI, SLN, SLN0, CoverGreen, CoverDead, Height, WaterDemand, BiomassRUE, BiomassTE, LAIDead, NitrogenPhotoStress, NitrogenPhenoStress, SowingDensity, LossFromExpansionStress, SenescedLai, DltRetranslocatedN, DltSenescedN, DltSenescedLaiN, DltSenescedLai, DltSenescedLaiLight, DltSenescedLaiWater, DltSenescedLaiFrost, DltSenescedLaiAge
        Memo Introduction
          Aboveground biomass accumulation is simulated as the minimum of light-limited or water-limited growth. In the absence of water limitation, biomass accumulation is the product of the amount of intercepted radiation (IR) and its conversion efficiency, the radiation use efficiency (RUE). The fraction of incident radiation intercepted is a function of the LAI and the canopy extinction coefficient(k), which is a measure of canopy structure (Lafarge and Hammer, 2002). The eﬀects of N supply on crop growth are implicitly incorporated in this approach. Nitrogen limitation will reduce leaf area growth and hence LAI and IR. It can also reduce RUE, which is a function of the N status of the leaves (Muchow and Sinclair, 1994; Sinclair and Amir, 1992). Sinclair and Muchow (1998) reviewed studies that had measured RUE in many crops and noted a consistent value of 1.25 g MJ−1 for triple dwarf sorghum under optimum growing conditions.

          Under water limitation, above ground biomass accumulation is the product of realized transpiration and its conversion efficiency, biomass produced per unitof water transpired, or transpiration efficiency (TE). It is necessary to adjust TE to allow for the prevailing vapor pressure deﬁcit (vpd) (Tanner and Sinclair, 1983;Kemanian et al., 2005). Numerous studies in sorghum (Tanner and Sinclair, 1983; Hammer et al., 1997) have found a standard value of 9 Pa for the TE coefficient insorghum, so that at a vpd of 2 kPa a TE of 4.5 gm−2 mm−1 results. As RUE and TE are based on aboveground biomass only, root mass is not explicitly modeled, but is added to the aboveground biomass accumulation according to a root/shoot ratio that declines with successive growth stages of the crop.
        LeafCulms: dltLeafNo=0; TilleringMethod=0; FinalLeafNo=0; dltPotentialLAI=0; dltStressedLAI=0
          Memo Introduction
            Tillers

            Fixed Tillering
            Dynamic Tillering
          DynamicTillering: CurrentTillerNumber=0; DltTillerNumber=0
            C4LeafArea AreaCalc
              VariableReference A0: VariableName=[Leaf].Parameters.A0
              VariableReference A1: VariableName=[Leaf].Parameters.A1
              VariableReference B0: VariableName=[Leaf].Parameters.B0
              VariableReference B1: VariableName=[Leaf].Parameters.B1
              VariableReference aX0: VariableName=[Leaf].Parameters.aX0
              VariableReference aMaxS: VariableName=[Leaf].Parameters.aMaxSlope
              VariableReference aMaxI: VariableName=[Leaf].Parameters.aMaxIntercept
              VariableReference largestLeafPlateau: VariableName=[Leaf].Parameters.largestLeafPlateau
              VariableReference leafNoCorrection: VariableName=[Leaf].Parameters.leafNoCorrection
            VariableReference slaMax: VariableName=[Leaf].Parameters.slaMax
            VariableReference tillerSdIntercept: VariableName=[Leaf].Parameters.tillerSdIntercept
            VariableReference tillerSdSlope: VariableName=[Leaf].Parameters.tillerSdSlope
            VariableReference tillerSlaBound: VariableName=[Leaf].Parameters.tillerSlaBound
            VariableReference maxLAIForTillerAddition: VariableName=[Leaf].Parameters.maxLAIForTillerAddition
            VariableReference maxDailyTillerReduction: VariableName=[Leaf].Parameters.maxDailyTillerReduction
          FixedTillering: FertileTillerNumber=0; CurrentTillerNumber=0
            C4LeafArea AreaCalc: same as Replacements.Sorghum.Leaf.LeafCulms.DynamicTillering.AreaCalc
            VariableReference slaMax: VariableName=[Leaf].Parameters.slaMax
          MinimumFunction ExpansionStress
            LinearInterpolationFunction WaterStressEffect
              XYPairs: X=[0.1, 1.1]; Y=[0, 1]
              VariableReference XValue: VariableName=[Arbitrator].SDRatio
            Constant NitrogenStressEffect: FixedValue=1
            Constant PhosphorusStressEffect: FixedValue=1
          VariableReference appearanceRate1: VariableName=[Leaf].Parameters.appearanceRate1
          VariableReference appearanceRate2: VariableName=[Leaf].Parameters.appearanceRate2
          VariableReference appearanceRate3: VariableName=[Leaf].Parameters.appearanceRate3
          VariableReference noRateChange1: VariableName=[Leaf].Parameters.noRateChange1
          VariableReference noRateChange2: VariableName=[Leaf].Parameters.noRateChange2
          VariableReference leafNoAtEmergence: VariableName=[Leaf].Parameters.leafNoAtEmergence
          VariableReference MaxVerticalTillerAdjustment: VariableName=[Leaf].Parameters.MaxVerticalTillerAdjustment
          VariableReference VerticalTillerAdjustment: VariableName=[Leaf].Parameters.VerticalTillerAdjustment
        MultiplyFunction ExtinctionCoefficientFunction
          LinearInterpolationFunction PotentialExtinctionCoeff
            XYPairs: X=[200, 500, 1000]; Y=[0.7, 0.4, 0.4]
            VariableReference XValue: VariableName=[Sorghum].SowingData.RowSpacing
        RUEModel Photosynthesis
          Constant RUE: FixedValue=1.25
          WeightedTemperatureFunction FT: MaximumTemperatureWeighting=0.5
            XYPairs: X=[0, 8, 20, 35, 50]; Y=[0, 0, 1, 1, 0]
          VariableReference FN: VariableName=[Leaf].NitrogenPhotoStress
          VariableReference RadnInt: VariableName=[Leaf].RadiationIntercepted
          Constant FVPD: FixedValue=1
          Constant FW: FixedValue=1
          RUECO2Function FCO2: PhotosyntheticPathway=C4
            Memo
              When pathway is set to "C4", this model modifier will be have the same as the `double Plant::rue_cow_modifier()` function in the APSIM Classic sorghum model.
        MinimumFunction FRGR
          VariableReference RUE_FT: VariableName=[Leaf].Photosynthesis.FT
          MinimumFunction Others
            VariableReference RUE_FN: VariableName=[Leaf].Photosynthesis.FN
            VariableReference RUE_FVPD: VariableName=[Leaf].Photosynthesis.FVPD
        LinearInterpolationFunction HeightFunction
          XYPairs: X=[0, 80]; Y=[0, 2000]
          Memo
            [Stem].Live.Wt is in the wrong units - it's out by a factor of 10 vs old apsim.

            To overcome this, we re-scale the x-values.
          VariableReference XValue: VariableName=[Stem].dmGreenStem
        SubtractFunction DMRemaining
          VariableReference DMFixationSupply: VariableName=[Leaf].DMSupplyFunction
          VariableReference LeafDMDemand: VariableName=[Leaf].DMDemands.Structural.DMDemandFunction
          Memo
            Referenced from Rachis DMDemands
        TEWaterDemandFunction WaterDemandFunction
          Constant SVPFrac: FixedValue=0.75
          Constant TranspirationEfficiencyCoefficient: FixedValue=0.009
          VariableReference Photosynthesis: VariableName=[Leaf].Photosynthesis
        MultiplyFunction DMSupplyFixation
          PhaseLookup ratioRootShoot
            PhaseLookupValue BetweenEmergenceAndFloralInit: Start=Emergence; End=FloralInitiation
              Constant rootFraction: FixedValue=2; Units=0-1
            PhaseLookupValue BetweenFloralInitAndFlowering: Start=FloralInitiation; End=Flowering
              Constant rootFraction: FixedValue=1.33; Units=0-1
            Memo
              This is a straight lookup table not an lineaer relationship
            PhaseLookupValue BetweenFloweringAndGrainFill: Start=Flowering; End=StartGrainFill
              Constant rootFraction: FixedValue=1.087; Units=0-1
            PhaseLookupValue BetweenGrainFillAndHarvestRipe: Start=StartGrainFill; End=HarvestRipe
              Constant rootFraction: FixedValue=1; Units=0-1
          VariableReference DMSupplyFunction: VariableName=[Leaf].DMSupplyFunction
        MinimumFunction DMSupplyFunction
          VariableReference BiomassTE: VariableName=[Leaf].BiomassTE
          VariableReference BiomassRUE: VariableName=[Leaf].BiomassRUE
        MultiplyFunction PotentialBiomassTEFunction
          DivideFunction TE
            VariableReference TECoeff
              VariableName=[Leaf].WaterDemandFunction.TranspirationEfficiencyCoefficient
            VariableReference VPD: VariableName=[Leaf].WaterDemandFunction.VPD
            Constant g2mm: FixedValue=0.001
          VariableReference WaterSupply: VariableName=[Arbitrator].WatSupply
          LinearInterpolationFunction CO2Modifier
            XYPairs: X=[0, 350]; Y=[1, 1]
            VariableReference XValue: VariableName=[Weather].CO2
        BiomassDemand DMDemands
          MultiplyFunction Structural
            PhaseLookup DMDemandFunction
              PhaseLookupValue BetweenEmergenceAndFlag: Start=Emergence; End=FlagLeaf
                MinimumFunction
                  MultiplyFunction
                    DivideFunction LeafPartitioningCoefficient
                      Constant One: FixedValue=1
                      AddFunction
                        Constant One: FixedValue=1
                        MultiplyFunction
                          VariableReference PartitionRate: VariableName=[Leaf].Parameters.PartitionRate
                          PowerFunction: Exponent=2
                            VariableReference LeafNumber: VariableName=[Leaf].LeafNo
                    VariableReference DMSupplyFunction: VariableName=[Leaf].DMSupplyFunction
                  DivideFunction dltDmLeafMax
                    VariableReference DltStressedLAI: VariableName=[Leaf].DltStressedLAI
                    MultiplyFunction
                      VariableReference SlaMin: VariableName=[Leaf].Parameters.SlaMin
                      Constant smm2sm: FixedValue=1e-06
            Constant StructuralFraction: FixedValue=1; Units=0-1
          Constant Metabolic: FixedValue=0
          StorageDMDemandFunction Storage
            SubtractFunction StorageFraction
              Constant One: FixedValue=1
              VariableReference StructuralFraction: VariableName=[Leaf].DMDemands.Structural.StructuralFraction
        BiomassDemand NDemands
          PhaseLookup Structural
            PhaseLookupValue BetweenEmergenceAndFlower: Start=Emergence; End=Flowering
              MultiplyFunction NewLeafNDemand
                VariableReference dltLAI: VariableName=[Leaf].DltLAI
                VariableReference newLeafSLN: VariableName=[Leaf].NewLeafSLN
          MaximumFunction Metabolic
            SubtractFunction
              MultiplyFunction nRequired
                SubtractFunction laiToday
                  Memo
                    laiToday = lai + dltLai - dltSlai
                  AddFunction
                    VariableReference LAI: VariableName=[Leaf].LAI
                    VariableReference DltLAI: VariableName=[Leaf].DltLAI
                  VariableReference dltSlai: VariableName=[Leaf].DltSenescedLai
                VariableReference TargetSLN: VariableName=[Leaf].TargetSLN
              VariableReference nGreen: VariableName=[Leaf].Live.N
            Constant Zero: FixedValue=0
          Constant Storage: FixedValue=0
        PhaseLookup DltLAIFunction
          Memo
            // dh - this is actually calculated in LeafCulms_Fixed::areaActual(void).
            // This version of the function is slightly different to Leaf::areaActual(void)
            // in that the end stage is flag, not maturity.

            if(stage >= endJuv && stage < flag)
                dltLAI = Min(dltStressedLAI,dltDmGreen * slaMax * smm2sm);
            else
                dltLAI = dltStressedLAI;
          PhaseLookupValue BetweenEndJuvenileAndMaturity: Start=EndJuvenile; End=FlagLeaf
            MinimumFunction MinFunction
              VariableReference DltStressedLAI: VariableName=[Leaf].dltStressedLAI
              MultiplyFunction LimitedSLN
                AddFunction dltDMGreen
                  VariableReference Structural: VariableName=[Leaf].DMPotentialAllocation.Structural
                  VariableReference Metabolic: VariableName=[Leaf].DMPotentialAllocation.Metabolic
                Constant slaMax: FixedValue=45000
                Constant smm2sm: FixedValue=1e-06
          PhaseLookupValue BetweenEmergenceAndEndJuvenile: Start=Emergence; End=EndJuvenile
            VariableReference DltStressedLAI: VariableName=[Leaf].dltStressedLAI
          PhaseLookupValue AllOtherTimes: Start=FlagLeaf; End=HarvestRipe
            VariableReference DltStressedLAI: VariableName=[Leaf].dltStressedLAI
        LiveOnEventFunction TargetSLN: SetEvent=FlagLeaf; ReSetEvent=Germination
          Constant PreEventValue: FixedValue=1.5
          VariableReference PostEventValue: VariableName=[Leaf].SlnAtFlag
        OnEventFunction MinPlantWt: SetEvent=Flowering
          Constant PreEventValue: FixedValue=0
          MultiplyFunction PostEventValue
            DivideFunction
              VariableReference LiveWt: VariableName=[Leaf].Live.Wt
              VariableReference Density: VariableName=[Sorghum].SowingData.Population
                Memo
                  This assumes paddock area is 1ha...
            SubtractFunction
              Constant base: FixedValue=1
              Constant RetranslocationFactor: FixedValue=0.15
        OnEventFunction SlnAtFlag: SetEvent=FlagLeaf; ReSetEvent=Germination
          Memo
            This seems like a terrible idea...
          VariableReference PreEventValue: VariableName=[Leaf].SLN
          VariableReference PostEventValue: VariableName=[Leaf].SLN
        OnEventFunction LaiAnth: SetEvent=Flowering
          Constant PreEventValue: FixedValue=0
          VariableReference PostEventValue: VariableName=[Leaf].LAI
          Memo
            Used as an output variable for Predicted/Observed
        MaximumFunction NPhotoStressFunction
          Memo
            photoStress = (2.0/(1.0 + exp(-6.05*(SLN-0.41)))-1.0);
          Constant Zero: FixedValue=0
          SubtractFunction
            DivideFunction
              Constant Two: FixedValue=2
              ExponentialFunction: A=1; B=1; C=-6.05
                SubtractFunction
                  VariableReference SLN: VariableName=[Leaf].SLN
                  Constant point41: FixedValue=0.41
            Constant One: FixedValue=1
        DivideFunction StomatalConductanceCO2Modifier
          VariableReference FCO2: VariableName=[Leaf].Photosynthesis.FCO2
          ExpressionFunction RelativeCO2Gradient
            Expression=([IWeather].CO2 - [Leaf].CO2internal)/(350 - [Leaf].CO2internal)
        ExpressionFunction CO2internal: Expression=(163 - [IWeather].MeanT)/(5 - 0.1*[IWeather].MeanT)
        BiomassRemoval BiomassRemovalDefaults
          OrganBiomassRemovalType Harvest: FractionLiveToRemove=0; FractionDeadToRemove=0; FractionLiveToResidue=0.3; FractionDeadToResidue=0
          OrganBiomassRemovalType Cut: FractionLiveToRemove=0.8; FractionDeadToRemove=0; FractionLiveToResidue=0; FractionDeadToResidue=0
          OrganBiomassRemovalType Prune: FractionLiveToRemove=0; FractionDeadToRemove=0; FractionLiveToResidue=0.6; FractionDeadToResidue=0
          OrganBiomassRemovalType Graze: FractionLiveToRemove=0.6; FractionDeadToRemove=0; FractionLiveToResidue=0.1; FractionDeadToResidue=0
        LightSenescenceFunction LightSenescence
          Constant senRadnCrit: FixedValue=2; Units=Mj/m^2
            Memo
              radiation level for onset of light senescence
          Constant SenLightTimeConst: FixedValue=10
            Memo
              delay factor for light senescence
        WaterSenescenceFunction WaterSenescence
          Constant SenWaterTimeConst: FixedValue=10
          Constant SenThreshold: FixedValue=0.25
          ProtectedDivideFunction SDRatio: NumeratorErrVal=0; DenominatorErrVal=1
            VariableReference WaterSupply: VariableName=[Arbitrator].WatSupply
            VariableReference WaterDemand: VariableName=[Arbitrator].WDemand
        FrostSenescenceFunction FrostSenescence
          Constant FrostKill: FixedValue=1
          Constant FrostKillSevere: FixedValue=-3.5
        AgeSenescenceFunction AgeSenescence
          Constant LeafNoDeadIntercept: FixedValue=0
            Memo
              Intercept for age-based slai calculation

              Not used by sorghum - so set to 0.
              Is used by maize
          Constant LeafNoDeadSlope: FixedValue=0
            Memo
              Slope for age-based slai calculation

              Not used by sorghum - so set to 0.
              Is used by maize
        LiveOnEventFunction NumberOfLeaves: SetEvent=FloralInitiation; ReSetEvent=Germination
          BoundFunction PreEventValue
            Constant Lower: FixedValue=10
            Constant Upper: FixedValue=40
            AddFunction
              DivideFunction LeavesInitiated
                VariableReference TTFloralInit: VariableName=[Phenology].TTEmergToFloralInit
                VariableReference leafInitRate: VariableName=[NumberOfLeaves].leafInitRate
              VariableReference leafNumSeed: VariableName=[NumberOfLeaves].leafNumSeed
          VariableReference PostEventValue: VariableName=[LeafCulms].FinalLeafNo
          VariableReference leafInitRate: VariableName=[Leaf].Parameters.LeafInitRate
          VariableReference leafNumSeed: VariableName=[Leaf].Parameters.LeafNumSeed
        Folder Parameters
          Constant PartitionRate: FixedValue=0.006; Units=(0-1)
            Memo
              coefficient of sigmoidal function between leaf partition fraction and internode no**2

              partition_rate_leaf in Classic

              referenced in LeafPartitioningCoefficient
          Constant leafInitRate: FixedValue=21.6; Units=oCd
            Memo Description
              Degree days to initiate each leaf primordium until floral init (deg day)
          Constant leafNumSeed: FixedValue=4
          Constant LeafNoAtEmergence: FixedValue=1
          Constant appearanceRate1: FixedValue=41
          Constant appearanceRate2: FixedValue=20
          Constant appearanceRate3: FixedValue=20
          Constant leafNoCorrection: FixedValue=1.52
          Constant noRateChange1: FixedValue=3.5
          Constant noRateChange2: FixedValue=3.5
          Constant aMaxVert: FixedValue=0.3
          Constant aTillerVert: FixedValue=0.05
          Constant A0: FixedValue=-0.009
            Memo
              bellCurveParams[0]
          Constant A1: FixedValue=-0.2
            Memo
              bellCurveParams[1]
          Constant B0: FixedValue=0.0006
            Memo
              bellCurveParams[2]
          Constant B1: FixedValue=-0.43
            Memo
              bellCurveParams[3]
          Constant AMaxA: FixedValue=0
            Memo
              Required by maize. Not used in sorghum, but it's a nonoptional link.
          Constant AMaxB: FixedValue=0
            Memo
              Required by maize. Not used in sorghum, but it's a nonoptional link.
          Constant AMaxC: FixedValue=0
            Memo
              Required by maize. Not used in sorghum, but it's a nonoptional link.
          Constant aX0: FixedValue=0.687
          Constant aMaxSlope: FixedValue=22.25
          Constant aMaxIntercept: FixedValue=92.45
          Constant minLeafNo: FixedValue=10
          Constant maxLeafNo: FixedValue=40
          Constant slaMax: FixedValue=45000
          Constant SlaMin: FixedValue=8000
            Memo
              Called by DMDemands
          Constant MaxVerticalTillerAdjustment: FixedValue=0.3
          Constant VerticalTillerAdjustment: FixedValue=0.05
          Constant largestLeafPlateau: FixedValue=49.25
          Constant tillerSdIntercept: FixedValue=0.329
          Constant tillerSdSlope: FixedValue=0.3
          Constant tillerSlaBound: FixedValue=30; Units=%
          Constant maxLAIForTillerAddition: FixedValue=0.325
          Constant maxDailyTillerReduction: FixedValue=0.3
      GenericOrgan Rachis: IsAboveGround=true
        Constant InitialNConcFunction: FixedValue=0
        Constant NReallocationFactor: FixedValue=0
        RetranslocateAvailableN RetranslocateNitrogen
          MaximumFunction RetranslocateFunction
            MinimumFunction
              MultiplyFunction availableDilnN
                DivideFunction
                  MultiplyFunction dltStemNConc
                    AddFunction
                      MultiplyFunction
                        Constant dilnNSlope: FixedValue=0.0062
                        MultiplyFunction stemNConc
                          DivideFunction divide
                            VariableReference nGreen: VariableName=[Rachis].Live.N
                            AddFunction DMToday
                              VariableReference dltDmGreen: VariableName=[Rachis].potentialDMAllocation.Structural
                              VariableReference dmGreen: VariableName=[Rachis].Live.Wt
                          Constant Percentage: FixedValue=100
                      Constant dilnNInt: FixedValue=-0.001
                    VariableReference ThermalTime: VariableName=[Phenology].DltTT
                  Constant: FixedValue=100
                AddFunction DMToday
                  VariableReference dltDmGreen: VariableName=[Rachis].potentialDMAllocation.Structural
                  VariableReference dmGreen: VariableName=[Rachis].Live.Wt
              SubtractFunction
                VariableReference NGreen: VariableName=[Rachis].Live.N
                VariableReference StructuralN: VariableName=[Rachis].NDemands.Structural
            Constant Zero: FixedValue=0
          Constant RetranslocateDMFunction: FixedValue=0
        DivideFunction NRetranslocationFactor
          MaximumFunction NRetranslocationAmount
            MinimumFunction
              MultiplyFunction availableDilnN
                DivideFunction
                  MultiplyFunction dltStemNConc
                    AddFunction: same as Replacements.Sorghum.Rachis.RetranslocateNitrogen.RetranslocateFunction.MinimumFunction.availableDilnN.DivideFunction.dltStemNConc.AddFunction
                    VariableReference ThermalTime: VariableName=[Phenology].ThermalTime
                  Constant: FixedValue=100
                AddFunction DMToday
                  VariableReference dltDmGreen: VariableName=[Rachis].potentialDMAllocation.Structural
                  VariableReference dmGreen: VariableName=[Rachis].Live.Wt
              SubtractFunction
                VariableReference NGreen: VariableName=[Rachis].Live.N
                VariableReference StructuralN: VariableName=[Rachis].NDemands.Structural
            Constant Zero: FixedValue=0
        Constant SenescenceRate: FixedValue=0; Units=/d
        LinearInterpolationFunction ExpansionStress
          XYPairs: X=[0, 0.6]; Y=[1, 1]
          VariableReference XValue: VariableName=[Sorghum].Leaf.Fw
        Constant DetachmentRateFunction: FixedValue=0; Units=/d
        Constant MaintenanceRespirationFunction: FixedValue=0; Units=0-1
        Constant DMConversionEfficiency: FixedValue=1; Units=0-1
        BiomassRemoval BiomassRemovalDefaults
          OrganBiomassRemovalType Harvest: FractionLiveToRemove=0.5; FractionDeadToRemove=0; FractionLiveToResidue=0.1; FractionDeadToResidue=0
          OrganBiomassRemovalType Cut: FractionLiveToRemove=0.8; FractionDeadToRemove=0; FractionLiveToResidue=0; FractionDeadToResidue=0
          OrganBiomassRemovalType Prune: FractionLiveToRemove=0; FractionDeadToRemove=0; FractionLiveToResidue=0.6; FractionDeadToResidue=0
          OrganBiomassRemovalType Graze: FractionLiveToRemove=0.6; FractionDeadToRemove=0; FractionLiveToResidue=0.2; FractionDeadToResidue=0
        Constant DMReallocationFactor: FixedValue=0
        Constant DMRetranslocationFactor: FixedValue=0
        Constant RemobilisationCost: FixedValue=0
        Constant CarbonConcentration: FixedValue=0.4
        BiomassDemandAndPriority DMDemands
          MultiplyFunction Structural
            PhaseLookup DMDemandFunction
              PhaseLookupValue BetweenFIAndFlower: Start=FloralInitiation; End=Flowering
                MultiplyFunction
                  VariableReference DMRemainingAfterLeaf: VariableName=[Leaf].DMRemaining
                  VariableReference Stem2FlowerFrac: VariableName=[Stem].StemToFlowerFrac
              PhaseLookupValue BetweenFlagAndFlowering: Start=FlagLeaf; End=Flowering
                MultiplyFunction
                  VariableReference DMFixationSupply: VariableName=[Arbitrator].DM.TotalSupplyFunction
                  VariableReference Stem2FlowerFrac: VariableName=[Stem].StemToFlowerFrac
            Constant StructuralFraction: FixedValue=1
          Constant Metabolic: FixedValue=0
          Constant Storage: FixedValue=0
          Constant QStructuralPriority: FixedValue=1
          Constant QMetabolicPriority: FixedValue=1
          Constant QStoragePriority: FixedValue=1
        BiomassDemandAndPriority NDemands
          MaximumFunction Structural
            Constant zero: FixedValue=0
            SubtractFunction
              MultiplyFunction requiredN
                VariableReference MinNconc: VariableName=[Rachis].minimumNconc
                AddFunction
                  VariableReference dltDmGreen: VariableName=[Rachis].potentialDMAllocation.Structural
                  VariableReference dmGreen: VariableName=[Rachis].Live.Wt
                VariableReference NitrogenDemandSwitch: VariableName=[Rachis].nitrogenDemandSwitch
              VariableReference nGreen: VariableName=[Rachis].Live.N
          MaximumFunction Metabolic
            Constant zero: FixedValue=0
            SubtractFunction
              MultiplyFunction RequiredN
                VariableReference CritNconc: VariableName=[Rachis].criticalNConc
                AddFunction
                  VariableReference dltDmGreen: VariableName=[Rachis].potentialDMAllocation.Structural
                  VariableReference dmGreen: VariableName=[Rachis].Live.Wt
                VariableReference NitrogenDemandSwitch: VariableName=[Rachis].nitrogenDemandSwitch
              VariableReference nGreen: VariableName=[Rachis].Live.N
          StorageNDemandFunction Storage
            VariableReference NitrogenDemandSwitch: VariableName=[Rachis].nitrogenDemandSwitch
            VariableReference MaxNconc: VariableName=[Rachis].maximumNconc
          Constant QStructuralPriority: FixedValue=1
          Constant QMetabolicPriority: FixedValue=1
          Constant QStoragePriority: FixedValue=1
        Constant MinimumNConc: FixedValue=0.003
        Constant CriticalNConc: FixedValue=0.01
        Constant MaximumNConc: FixedValue=0.008
        PhaseLookupValue NitrogenDemandSwitch: Start=Emergence; End=StartGrainFill
          Constant: FixedValue=1
        BiomassDemand InitialWt
          Constant Structural: FixedValue=0; Units=g/plant
          Constant Metabolic: FixedValue=0
          Constant Storage: FixedValue=0
        Constant Photosynthesis: FixedValue=0
      GenericOrgan Stem: IsAboveGround=true
        Constant initialNConcFunction: FixedValue=0.01
        Constant NReallocationFactor: FixedValue=0
        RetranslocateAvailableN RetranslocateNitrogen
          MaximumFunction RetranslocateFunction
            MinimumFunction
              MultiplyFunction availableDilnN
                DivideFunction
                  MultiplyFunction dltStemNConc
                    AddFunction
                      MultiplyFunction
                        Constant dilnNSlope: FixedValue=0.0062
                        MultiplyFunction stemNConcPct
                          DivideFunction divide
                            VariableReference nGreen: VariableName=[Stem].Live.N
                            AddFunction DMToday
                              VariableReference dltDmGreen: VariableName=[Stem].potentialDMAllocation.Structural
                              VariableReference dmGreen: VariableName=[Stem].Live.Wt
                          Constant Percentage: FixedValue=100
                      Constant dilnNInt: FixedValue=-0.001
                    VariableReference ThermalTime: VariableName=[Phenology].DltTT
                  Constant: FixedValue=100
                AddFunction DMToday
                  VariableReference dltDmGreen: VariableName=[Stem].potentialDMAllocation.Structural
                  VariableReference dmGreen: VariableName=[Stem].Live.Wt
              SubtractFunction
                VariableReference NGreen: VariableName=[Stem].Live.N
                MultiplyFunction
                  AddFunction DMToday
                    VariableReference dltDmGreen: VariableName=[Stem].potentialDMAllocation.Structural
                    VariableReference dmGreen: VariableName=[Stem].Live.Wt
                  VariableReference StructuralN: VariableName=[Stem].CriticalNConc
            Constant Zero: FixedValue=0
          MaximumFunction RetranslocateDMFunction
            MultiplyFunction StemWtAvail
              SubtractFunction
                AddFunction DMToday
                  VariableReference dltDmGreen: VariableName=[Stem].potentialDMAllocation.Structural
                  VariableReference dmGreen: VariableName=[Stem].Live.Wt
                MultiplyFunction
                  OnEventFunction PlantMinDM: SetEvent=Flowering
                    Constant PreEventValue: FixedValue=0
                    MultiplyFunction PostEventValue
                      DivideFunction dmPlantStem
                        VariableReference dmGreen: VariableName=[Stem].Live.Wt
                        VariableReference density: VariableName=[Plant].SowingData.Population
                      SubtractFunction
                        Constant One: FixedValue=1
                        Constant translocFrac: FixedValue=0.2
                  VariableReference density: VariableName=[Plant].SowingData.Population
              Constant retransRate: FixedValue=0.15
            Constant Zero: FixedValue=0
        DivideFunction NRetranslocationFactor
          MaximumFunction NRetranslocationAmount
            MinimumFunction
              MultiplyFunction availableDilnN
                DivideFunction
                  MultiplyFunction dltStemNConc
                    AddFunction: same as Replacements.Sorghum.Stem.RetranslocateNitrogen.RetranslocateFunction.MinimumFunction.availableDilnN.DivideFunction.dltStemNConc.AddFunction
                    VariableReference ThermalTime: VariableName=[Phenology].ThermalTime
                  Constant: FixedValue=100
                AddFunction DMToday
                  VariableReference dltDmGreen: VariableName=[Stem].potentialDMAllocation.Structural
                  VariableReference dmGreen: VariableName=[Stem].Live.Wt
              SubtractFunction
                VariableReference NGreen: VariableName=[Stem].Live.N
                MultiplyFunction
                  AddFunction DMToday
                    VariableReference dltDmGreen: VariableName=[Stem].potentialDMAllocation.Structural
                    VariableReference dmGreen: VariableName=[Stem].Live.Wt
                  VariableReference StructuralN: VariableName=[Stem].MinimumNconc
            Constant Zero: FixedValue=0
          VariableReference dmGreen: VariableName=[Stem].Live.Wt
        DivideFunction DMRetranslocationFactor
          MaximumFunction DMRetranslocationAmount
            MultiplyFunction StemWtAvail
              SubtractFunction
                AddFunction DMToday
                  VariableReference dltDmGreen: VariableName=[Stem].potentialDMAllocation.Structural
                  VariableReference dmGreen: VariableName=[Stem].Live.Wt
                MultiplyFunction
                  OnEventFunction PlantMinDM: SetEvent=Flowering
                    Constant PreEventValue: FixedValue=0
                    MultiplyFunction PostEventValue: same as Replacements.Sorghum.Stem.RetranslocateNitrogen.RetranslocateDMFunction.StemWtAvail.SubtractFunction.MultiplyFunction.PlantMinDM.PostEventValue
                  VariableReference density: VariableName=[Plant].SowingData.Population
              Constant retransRate: FixedValue=0.15
            Constant Zero: FixedValue=0
          VariableReference dmGreen: VariableName=[Stem].Live.Wt
        Constant StemToFlowerFrac: FixedValue=0.3
        Constant SenescenceRate: FixedValue=0; Units=/d
        Constant DetachmentRateFunction: FixedValue=0; Units=/d
        Constant MaintenanceRespirationFunction: FixedValue=0; Units=0-1
        Constant DMConversionEfficiency: FixedValue=1; Units=0-1
        BiomassRemoval BiomassRemovalDefaults
          OrganBiomassRemovalType Harvest: FractionLiveToRemove=0; FractionDeadToRemove=0; FractionLiveToResidue=0.1; FractionDeadToResidue=0
          OrganBiomassRemovalType Cut: FractionLiveToRemove=0.8; FractionDeadToRemove=0; FractionLiveToResidue=0; FractionDeadToResidue=0
          OrganBiomassRemovalType Prune: FractionLiveToRemove=0; FractionDeadToRemove=0; FractionLiveToResidue=0.6; FractionDeadToResidue=0
          OrganBiomassRemovalType Graze: FractionLiveToRemove=0.6; FractionDeadToRemove=0; FractionLiveToResidue=0.2; FractionDeadToResidue=0
        Constant DMReallocationFactor: FixedValue=0
        Constant RemobilisationCost: FixedValue=0
        Constant CarbonConcentration: FixedValue=0.4
        BiomassDemandAndPriority DMDemands
          MultiplyFunction Structural
            MaximumFunction DMDemandFunction
              SubtractFunction DMDemandFunction
                VariableReference DMSupplyFunction: VariableName=[Leaf].DMSupplyFunction
                VariableReference LeafDemand: VariableName=[Leaf].DMDemand.Structural
                VariableReference RachisDemand: VariableName=[Rachis].DMDemand.Structural
                VariableReference GrainDemand: VariableName=[Grain].DMDemand.Structural
              Constant Zero: FixedValue=0
            Constant StructuralFraction: FixedValue=1
          Constant Metabolic: FixedValue=0
          Constant Storage: FixedValue=0
          Constant QStructuralPriority: FixedValue=1
          Constant QMetabolicPriority: FixedValue=1
          Constant QStoragePriority: FixedValue=1
        BiomassDemandAndPriority NDemands
          MaximumFunction Structural
            Constant zero: FixedValue=0
            SubtractFunction
              MultiplyFunction RequiredN
                VariableReference CriticalNconc: VariableName=[Stem].CriticalNConc
                AddFunction
                  VariableReference dltDmGreen: VariableName=[Stem].potentialDMAllocation.Structural
                  VariableReference dmGreen: VariableName=[Stem].Live.Wt
                VariableReference NitrogenDemandSwitch: VariableName=[Stem].nitrogenDemandSwitch
              VariableReference nGreen: VariableName=[Stem].Live.N
          MaximumFunction Metabolic
            Constant zero: FixedValue=0
            SubtractFunction
              MultiplyFunction RequiredN
                VariableReference MinimumNconc: VariableName=[Stem].MinimumNConc
                AddFunction
                  VariableReference dltDmGreen: VariableName=[Stem].potentialDMAllocation.Structural
                  VariableReference dmGreen: VariableName=[Stem].Live.Wt
                VariableReference NitrogenDemandSwitch: VariableName=[Stem].nitrogenDemandSwitch
              VariableReference nGreen: VariableName=[Stem].Live.N
          Constant Storage: FixedValue=0
          Constant QStructuralPriority: FixedValue=1
          Constant QMetabolicPriority: FixedValue=1
          Constant QStoragePriority: FixedValue=1
        LinearInterpolationFunction CriticalNConc
          XYPairs: X=[3, 5, 7, 10]; Y=[0.012, 0.012, 0.005, 0.0015]
          VariableReference XValue: VariableName=[Phenology].Stage
        LinearInterpolationFunction MinimumNconc
          XYPairs: X=[3, 5, 7, 10]; Y=[0.055, 0.016, 0.01, 0.005]
          VariableReference XValue: VariableName=[Phenology].Stage
        LinearInterpolationFunction MaximumNconc
          XYPairs: X=[3, 5, 7, 10]; Y=[0.055, 0.016, 0.01, 0.005]
          VariableReference XValue: VariableName=[Phenology].Stage
        Constant NitrogenDemandSwitch: FixedValue=1
        DivideFunction dmGreenStem
          VariableReference StemWt: VariableName=[Stem].Live.Wt
          VariableReference Destiny: VariableName=[Leaf].SowingDensity
        BiomassDemand InitialWt
          MultiplyFunction Structural
            Constant InitialPlantWt: FixedValue=0.1; Units=g/plant
            VariableReference Population: VariableName=[Plant].Population
          Constant Metabolic: FixedValue=0
          Constant Storage: FixedValue=0
        Constant Photosynthesis: FixedValue=0
      AddFunction TotalPlantDemand
        VariableReference LeafDemand: VariableName=[Leaf].DMDemands.Structural.DMDemandFunction
        VariableReference StemDemand: VariableName=[Stem].DMDemands.Structural.DMDemandFunction
        VariableReference RachisDemand: VariableName=[Rachis].DMDemands.Structural.DMDemandFunction
        VariableReference GrainDemand: VariableName=[Grain].DMDemands.Structural.DMDemandFunction
      CompositeBiomass AboveGround: OrganNames=[Leaf, Stem, Rachis, Grain]; IncludeLive=true; IncludeDead=true
      CompositeBiomass AboveGroundLive: OrganNames=[Leaf, Stem, Grain, Rachis]; IncludeLive=true; IncludeDead=false
        Memo
          The AboveGroundLive composite biomass object includes the Live pools of all organs occurring above the soil surface to allow output for total dry matter and Nutrient contents, including total structural, non-structural and metabolic pools.
      CompositeBiomass AboveGroundDead: OrganNames=[Leaf, Stem, Grain, Rachis]; IncludeLive=false; IncludeDead=true
        Memo
          The AboveGroundDead composite biomass object includes the Dead pools of all organs occurring above the soil surface to allow output for total dry matter and Nutrient contents, including total structural, non-structural and metabolic pools.
      CompositeBiomass BelowGround: OrganNames=[Root]; IncludeLive=true; IncludeDead=true
      CompositeBiomass Total: OrganNames=[Leaf, Stem, Root, Rachis, Grain]; IncludeLive=true; IncludeDead=true
      CompositeBiomass TotalLive: OrganNames=[Leaf, Stem, Root, Rachis, Grain]; IncludeLive=true; IncludeDead=false
      CompositeBiomass TotalDead: OrganNames=[Leaf, Stem, Root, Rachis, Grain]; IncludeLive=false; IncludeDead=true
      CultivarFolder Cultivars
        CultivarFolder Australia
          Cultivar Buster
            Command:
              [Leaf].Parameters.aX0.FixedValue = 0.786
              [Leaf].Parameters.aMaxSlope.FixedValue = 46.312
              [Leaf].Parameters.aMaxIntercept.FixedValue = -321.13
          Cultivar early
            Command:
              [Phenology].TTEndJuvToInit.FixedValue = 114
              [Leaf].Parameters.aMaxIntercept.FixedValue = -321.13
              [Leaf].Parameters.aMaxSlope.FixedValue = 46.312
              [Leaf].Parameters.aX0.FixedValue = 0.786
          Cultivar medium
            Command:
              [Phenology].TTEndJuvToInit.FixedValue = 157
              [Leaf].Parameters.aMaxIntercept.FixedValue = -321.13
              [Leaf].Parameters.aMaxSlope.FixedValue = 46.312
              [Leaf].Parameters.aX0.FixedValue = 0.786
          Cultivar late
            Command:
              [Phenology].TTEndJuvToInit.FixedValue = 201
              [Leaf].Parameters.aMaxIntercept.FixedValue = -321.13
              [Leaf].Parameters.aMaxSlope.FixedValue = 46.312
              [Leaf].Parameters.aX0.FixedValue = 0.786
          Cultivar ATX623xRTX430
            Command:
              [Phenology].PhotoModifier.XYPairs.Y[2] = 26
              [Phenology].TTEndJuvToInit.FixedValue = 202
              [Leaf].Parameters.aMaxSlope.FixedValue = 0
              [Leaf].Parameters.aMaxIntercept.FixedValue = 450
              [Leaf].Parameters.tillerSdIntercept.FixedValue = -0.265
              [Leaf].Parameters.tillerSdSlope.FixedValue = 0.247
          Cultivar A35xQL36
            Command:
              [Phenology].PhotoModifier.XYPairs.X[1] = 11.8
              [Phenology].PhotoModifier.XYPairs.X[2] = 14
              [Phenology].PhotoModifier.XYPairs.Y[2] = 87.34
              [Phenology].TTEndJuvToInit.FixedValue = 134.4
              [Leaf].Parameters.aMaxSlope.FixedValue = 0
              [Leaf].Parameters.aMaxIntercept.FixedValue = 450
              [Leaf].Parameters.tillerSdIntercept.FixedValue = -0.265
              [Leaf].Parameters.tillerSdSlope.FixedValue = 0.247
          Cultivar QL41xQL36
            Command:
              [Phenology].PhotoModifier.XYPairs.Y[2] = 25
              [Phenology].TTEndJuvToInit.FixedValue = 179
              [Leaf].Parameters.aMaxSlope.FixedValue = 0
              [Leaf].Parameters.aMaxIntercept.FixedValue = 450
              [Leaf].Parameters.tillerSdIntercept.FixedValue = -0.265
              [Leaf].Parameters.tillerSdSlope.FixedValue = 0.247
          Cultivar QL39xQL36
            Command:
              [Phenology].PhotoModifier.XYPairs.X[1] = 11.8
              [Phenology].PhotoModifier.XYPairs.X[2] = 14
              [Phenology].PhotoModifier.XYPairs.Y[2] = 87.34
              [Phenology].TTEndJuvToInit.FixedValue = 114.4
              [Leaf].Parameters.aMaxIntercept.FixedValue = -321.13
              [Leaf].Parameters.aMaxSlope.FixedValue = 46.312
              [Leaf].Parameters.aX0.FixedValue = 0.786
              [Leaf].Parameters.tillerSdIntercept.FixedValue = -0.265
              [Leaf].Parameters.tillerSdSlope.FixedValue = 0.247
          Cultivar M35-1
            Command:
              [Phenology].PhotoModifier.XYPairs.Y[2] = 122
              [Phenology].TTEndJuvToInit.FixedValue = 252
              [Grain].DMPerSeed.FixedValue = 0.001427844
              [Arbitrator].NitrogenUptakeMethod.NUptakeCease.FixedValue = 10
              [Leaf].TargetSLN.PreEventValue.FixedValue = 1.2
              [Leaf].Parameters.PartitionRate.FixedValue = 0.018
              [Leaf].Parameters.leafInitRate.FixedValue = 26.1
              [Leaf].Parameters.aMaxSlope.FixedValue = 8.9
              [Leaf].Parameters.aMaxIntercept.FixedValue = 245.3
              [Leaf].Parameters.tillerSdIntercept.FixedValue = -1.363
              [Leaf].Parameters.tillerSdSlope.FixedValue = 0.206
          Cultivar CSH13R
            Command:
              [Phenology].PhotoModifier.XYPairs.Y[2] = 34
              [Phenology].TTEndJuvToInit.FixedValue = 228
              [Grain].DMPerSeed.FixedValue = 0.0015
              [Leaf].Photosynthesis.RUE.FixedValue = 1.6
              [Leaf].Parameters.PartitionRate.FixedValue = 0.018
              [Leaf].TargetSLN.PreEventValue.FixedValue = 1.2
              [Leaf].Parameters.leafInitRate.FixedValue = 23.2
              [Leaf].Parameters.tillerSdIntercept.FixedValue = -0.818
              [Leaf].Parameters.tillerSdSlope.FixedValue = 0.159
          Cultivar dekalb_DK55
            Command:
              [Phenology].PhotoModifier.XYPairs.X[1] = 11
              [Phenology].PhotoModifier.XYPairs.X[2] = 13
              [Phenology].PhotoModifier.XYPairs.Y[2] = 0
              [Phenology].TTEndJuvToInit.FixedValue = 205
              [Phenology].FlagLeafToFlowering.Target.FixedValue = 100
              [Phenology].FloweringToGrainFilling.Target.FixedValue = 30
              [Phenology].TTFlowerToMaturity.FixedValue = 695
              [Leaf].Parameters.aMaxIntercept.FixedValue = -321.13
              [Leaf].Parameters.aMaxSlope.FixedValue = 46.312
              [Leaf].Parameters.aX0.FixedValue = 0.786
          Cultivar texas_RS610
            Command:
              [Phenology].PhotoModifier.XYPairs.X[1] = 12.3
              [Phenology].PhotoModifier.XYPairs.X[2] = 14.6
              [Phenology].PhotoModifier.XYPairs.Y[2] = 88.32
              [Phenology].TTEndJuvToInit.FixedValue = 120
              [Phenology].FlagLeafToFlowering.Target.FixedValue = 100
              [Phenology].FloweringToGrainFilling.Target.FixedValue = 30
              [Phenology].TTFlowerToMaturity.FixedValue = 695
              [Leaf].Parameters.aMaxIntercept.FixedValue = -321.13
              [Leaf].Parameters.aMaxSlope.FixedValue = 46.312
              [Leaf].Parameters.aX0.FixedValue = 0.786
          Cultivar pioneer_s34
            Command:
              [Phenology].PhotoModifier.XYPairs.X[1] = 12.3
              [Phenology].PhotoModifier.XYPairs.X[2] = 14.6
              [Phenology].PhotoModifier.XYPairs.Y[2] = 57.5
              [Phenology].TTEndJuvToInit.FixedValue = 115
              [Phenology].FlagLeafToFlowering.Target.FixedValue = 100
              [Phenology].FloweringToGrainFilling.Target.FixedValue = 30
              [Phenology].TTFlowerToMaturity.FixedValue = 695
              [Leaf].Parameters.aMaxIntercept.FixedValue = -321.13
              [Leaf].Parameters.aMaxSlope.FixedValue = 46.312
              [Leaf].Parameters.aX0.FixedValue = 0.786
          Cultivar texas_671
            Command:
              [Phenology].PhotoModifier.XYPairs.X[1] = 12.3
              [Phenology].PhotoModifier.XYPairs.X[2] = 14.6
              [Phenology].PhotoModifier.XYPairs.Y[2] = 34.96
              [Phenology].TTEndJuvToInit.FixedValue = 159
              [Phenology].FlagLeafToFlowering.Target.FixedValue = 100
              [Phenology].FloweringToGrainFilling.Target.FixedValue = 30
              [Phenology].TTFlowerToMaturity.FixedValue = 695
              [Leaf].Parameters.aMaxIntercept.FixedValue = -321.13
              [Leaf].Parameters.aMaxSlope.FixedValue = 46.312
              [Leaf].Parameters.aX0.FixedValue = 0.786
          Cultivar Scorpio
            Command:
              [Phenology].PhotoModifier.XYPairs.Y[2] = 0
              [Phenology].TTEndJuvToInit.FixedValue = 130
              [Phenology].FlagLeafToFlowering.Target.FixedValue = 120
              [Phenology].TTFlowerToMaturity.FixedValue = 810
              [Grain].DMPerSeed.FixedValue = 0.00065
              [Leaf].Parameters.aX0.FixedValue = 0.83
              [Leaf].Parameters.aMaxSlope.FixedValue = 2.3
              [Leaf].Parameters.aMaxIntercept.FixedValue = 514
              [Leaf].Photosynthesis.RUE.FixedValue = 1.75
          Cultivar Apollo
            Command:
              [Phenology].PhotoModifier.XYPairs.Y[2] = 0
              [Phenology].TTEndJuvToInit.FixedValue = 185
              [Phenology].FlagLeafToFlowering.Target.FixedValue = 130
              [Phenology].TTFlowerToMaturity.FixedValue = 810
              [Leaf].Parameters.aX0.FixedValue = 0.71
              [Leaf].Parameters.aMaxSlope.FixedValue = 37
              [Leaf].Parameters.aMaxIntercept.FixedValue = -101
              [Leaf].Photosynthesis.RUE.FixedValue = 1.75
          Cultivar Bazley: same as Replacements.Sorghum.Cultivars.Australia.Apollo
          Cultivar Taurus
            Command:
              [Phenology].PhotoModifier.XYPairs.Y[2] = 15
              [Phenology].TTEndJuvToInit.FixedValue = 118
              [Phenology].FlagLeafToFlowering.Target.FixedValue = 150
              [Phenology].TTFlowerToMaturity.FixedValue = 810
              [Grain].DMPerSeed.FixedValue = 0.00065
              [Leaf].Parameters.aX0.FixedValue = 0.8
              [Leaf].Parameters.aMaxSlope.FixedValue = 1
              [Leaf].Parameters.aMaxIntercept.FixedValue = 451
          Cultivar P85G33
            Command:
              [Phenology].PhotoModifier.XYPairs.Y[2] = 0
              [Phenology].TTEndJuvToInit.FixedValue = 118
              [Phenology].FlagLeafToFlowering.Target.FixedValue = 150
              [Phenology].TTFlowerToMaturity.FixedValue = 810
              [Grain].DMPerSeed.FixedValue = 0.0006
              [Leaf].Parameters.aX0.FixedValue = 0.86
              [Leaf].Parameters.aMaxSlope.FixedValue = 0
              [Leaf].Parameters.aMaxIntercept.FixedValue = 542
          Cultivar P84G22
            Command:
              [Phenology].PhotoModifier.XYPairs.Y[2] = 0
              [Phenology].FlagLeafToFlowering.Target.FixedValue = 140
              [Phenology].TTFlowerToMaturity.FixedValue = 810
              [Grain].DMPerSeed.FixedValue = 0.0006
              [Leaf].Parameters.aX0.FixedValue = 0.81
              [Leaf].Parameters.aMaxSlope.FixedValue = 0
              [Leaf].Parameters.aMaxIntercept.FixedValue = 578
          Cultivar P84G99
            Command:
              [Phenology].PhotoModifier.XYPairs.Y[2] = 0
              [Phenology].TTEndJuvToInit.FixedValue = 135
              [Phenology].FlagLeafToFlowering.Target.FixedValue = 140
              [Phenology].TTFlowerToMaturity.FixedValue = 810
              [Grain].DMPerSeed.FixedValue = 0.0005
              [Leaf].Parameters.aX0.FixedValue = 0.84
              [Leaf].Parameters.aMaxSlope.FixedValue = 0
              [Leaf].Parameters.aMaxIntercept.FixedValue = 495
          Cultivar P86G56
            Command:
              [Phenology].PhotoModifier.XYPairs.Y[2] = 20
              [Phenology].TTEndJuvToInit.FixedValue = 138
              [Phenology].FlagLeafToFlowering.Target.FixedValue = 150
              [Phenology].TTFlowerToMaturity.FixedValue = 810
              [Grain].DMPerSeed.FixedValue = 0.0005
              [Leaf].Parameters.aX0.FixedValue = 0.84
              [Leaf].Parameters.aMaxSlope.FixedValue = 0
              [Leaf].Parameters.aMaxIntercept.FixedValue = 495
          Cultivar MR43
            Command:
              [Phenology].PhotoModifier.XYPairs.Y[2] = 15
              [Phenology].TTEndJuvToInit.FixedValue = 118
              [Phenology].FlagLeafToFlowering.Target.FixedValue = 150
              [Phenology].TTFlowerToMaturity.FixedValue = 810
              [Leaf].Parameters.aX0.FixedValue = 0.71
              [Leaf].Parameters.aMaxSlope.FixedValue = 37
              [Leaf].Parameters.aMaxIntercept.FixedValue = -101
          Cultivar N_14NUS01
            Command:
              [Phenology].PhotoModifier.XYPairs.Y[2] = 0
              [Phenology].TTEndJuvToInit.FixedValue = 180
              [Phenology].FlagLeafToFlowering.Target.FixedValue = 140
              [Phenology].TTFlowerToMaturity.FixedValue = 810
              [Grain].DMPerSeed.FixedValue = 0.0007
              [Leaf].Parameters.aX0.FixedValue = 0.82
              [Leaf].Parameters.aMaxSlope.FixedValue = 8.5
              [Leaf].Parameters.aMaxIntercept.FixedValue = 378
          Cultivar N_14NUS02
            Command:
              [Phenology].PhotoModifier.XYPairs.Y[2] = 20
              [Phenology].TTEndJuvToInit.FixedValue = 174
              [Phenology].FlagLeafToFlowering.Target.FixedValue = 150
              [Phenology].TTFlowerToMaturity.FixedValue = 810
              [Grain].DMPerSeed.FixedValue = 0.0006
              [Leaf].Parameters.aX0.FixedValue = 0.82
              [Leaf].Parameters.aMaxSlope.FixedValue = 8.5
              [Leaf].Parameters.aMaxIntercept.FixedValue = 378
          Cultivar N_14NUS03
            Command:
              [Phenology].PhotoModifier.XYPairs.Y[2] = 15
              [Phenology].TTEndJuvToInit.FixedValue = 110
              [Phenology].FlagLeafToFlowering.Target.FixedValue = 100
              [Phenology].TTFlowerToMaturity.FixedValue = 810
              [Grain].DMPerSeed.FixedValue = 0.00045
              [Leaf].Parameters.aX0.FixedValue = 0.84
              [Leaf].Parameters.aMaxSlope.FixedValue = 9.3
              [Leaf].Parameters.aMaxIntercept.FixedValue = 384
          Cultivar N_14NUS04
            Command:
              [Phenology].PhotoModifier.XYPairs.Y[2] = 0
              [Phenology].TTEndJuvToInit.FixedValue = 120
              [Phenology].FlagLeafToFlowering.Target.FixedValue = 120
              [Phenology].TTFlowerToMaturity.FixedValue = 810
              [Grain].DMPerSeed.FixedValue = 0.00045
              [Leaf].Parameters.aX0.FixedValue = 0.81
              [Leaf].Parameters.aMaxSlope.FixedValue = 0
              [Leaf].Parameters.aMaxIntercept.FixedValue = 445
      Constant MortalityRate: FixedValue=0
      Constant SeedMortalityRate: FixedValue=0
    Report DailyReport: EventNames=[Clock].DoReport
      VariableNames:
        [Clock].Today
        [Clock].Today.Year as Year
        [Clock].Today.DayOfYear as day_of_year
        [Clock].Today.Date as Date
        [Phenology].DltTTFM as DltTTFM
        [Phenology].ThermalTime as TT
        [Phenology].DltTTFM
        [Phenology].PhenoWaterStress
        [Sorghum].DaysAfterSowing as Das
        [Sorghum].Phenology.Stage as Stage
        [Sorghum].Phenology.CurrentStageName
        [Sorghum].Phenology.CurrentPhase.Name
        [Sorghum].AboveGround.Wt
        [Sorghum].TotalLive.Wt
        [Sorghum].TotalDead.Wt
        [Sorghum].AboveGround.Wt as BiomassWt
        [Sorghum].AboveGround.N as BiomassN
        [Sorghum].Total.Wt
        [Sorghum].Root.Live.Wt as RootGreenWt
        [Sorghum].Root.Live.N as RootGreenN
        [Leaf].Senesced.Wt
        [Leaf].Senesced.N
        [Leaf].Dead.Wt
        [Leaf].Dead.N
        [Leaf].NitrogenPhenoStress
        [Sorghum].Leaf.Live.Wt as LeafGreenWt
        [Sorghum].Leaf.Live.N as LeafGreenN
        [Sorghum].Stem.Live.Wt as StemGreenWt
        [Sorghum].Stem.Live.N as StemGreenN
        [Sorghum].Rachis.Live.Wt as RachisGreenWt
        [Sorghum].Rachis.Live.N as RachisGreenN
        [Sorghum].Grain.Live.Wt as GrainGreenWt
        [Sorghum].Grain.Live.N as GrainGreenN
        [Sorghum].Grain.Live.NConc * 100 as GrainGreenNConc // old apsim grain nconc is in percent
        [Sorghum].Grain.NumberFunction as GrainNo
        [Sorghum].Grain.Size * 1000 as GrainSize
        [Soil].Water.Volumetric
        sum([Soil].SoilWater.ESW) as ESW
        [Sorghum].Phenology.Juvenile.Target
        sum([Soil].NO3.kgha) as NO3
        sum([Soil].Water.Volumetric) as sw
        [Soil].NO3.kgha
        [Soil].NH4.kgha
        [Sorghum].Leaf.Photosynthesis.FW as RUEStress
        [Phenology].Emerging.Target
        [Phenology].Juvenile.Target
        [Phenology].JuvenileToFloralInit.Target
        [Phenology].FloralInitToFlagLeaf.Target
        [Phenology].FlagLeafToFlowering.Target
        [Phenology].FloweringToGrainFilling.Target
        [Phenology].GrainFilling.Target
        [Phenology].Maturing.Target
        [Phenology].MaturityToHarvestRipe.Target
        [Phenology].TTFromEmergence
        [Phenology].ThermalTime
        [Leaf].CoverGreen
        [Leaf].CoverTotal
        [Leaf].CoverDead
        [Leaf].RadiationIntercepted
        [Leaf].WaterDemand
        [Leaf].WaterAllocation
        [Leaf].Photosynthesis
        ([Leaf].LAITotal / ([Sorghum].Population + 0.00001) * 10000 as TPLA // gpla + spla as per old apsim. this assumes paddock area = 1ha
        [Leaf].NDemands.Structural
        [Leaf].DMPotentialAllocation.Total
        [Leaf].SLN as SLN
        [Phenology].TTEmergToFlagLeaf
        [Weather].Radn
        [Arbitrator].DM.TotalFixationSupply
        [Arbitrator].N.TotalFixationSupply
        [Arbitrator].N.TotalPlantSupply
        [Arbitrator].N.SupplyDemandRatioN
        [Arbitrator].N.UptakeSupply
        [Arbitrator].N.Uptake
        [Arbitrator].SDRatio
        [Arbitrator].SDRatioBound
        [Arbitrator].WatSupply
        [Grain].Live.Wt
        [Grain].Live.N
        [Grain].Size
        [Grain].LiveFWt
        [Grain].NDemand.Total
        [Grain].PotGrainFillRate
        [Grain].DMCaryopsis
        [Grain].NumberFunction
        [Leaf].DMDemands.Structural.DMDemandFunction
        [Stem].DMDemands.Structural.DMDemandFunction
        [Rachis].DMDemands.Structural.DMDemandFunction
        [Leaf].DMRemaining
        [Leaf].DMSupplyFixation
        [Leaf].DMSupplyFunction
        ([Leaf].DMSupplyFixation - [Leaf].DMSupplyFunction)
        [Leaf].Photosynthesis
        [Leaf].WaterDemandFunction
        [Leaf].WaterAllocation
        [Leaf].DMDemands.Structural.DMDemandFunction
        [Leaf].Photosynthesis
        [Leaf].LAI
        [Leaf].SenescedLai
        [Leaf].LAI as LAI
        [Leaf].SenescedLai as SLAI
        [Leaf].Live.N
        [Leaf].DMPotentialAllocation.Structural
        [Leaf].NDemand.Total
        [Leaf].NDemand.Structural
        [Leaf].NDemand.Metabolic
        [Leaf].NDemand.Storage
        [Leaf].NDemand.Total
        [Leaf].Allocated.StructuralN
        [Leaf].Allocated.MetabolicN
        [Leaf].Allocated.StorageN
        [Leaf].Senesced.Wt
        [Leaf].FinalLeafNo as FinalLeafNo
        [Leaf].LeafNo as LeafNo
        [Stem].Live.Wt
        [Stem].Dead.Wt
        [Stem].Senesced.Wt
        [Stem].NDemand.Total
        [Stem].NDemand.Structural
        [Stem].NDemand.Metabolic
        [Stem].NDemand.Storage
        [Stem].NDemand.Total
        [Stem].Allocated.StructuralN
        [Stem].Allocated.MetabolicN
        [Stem].Allocated.StorageN
        [Root].NSupply.Total
        [Rachis].NDemand.Total
        [Leaf].NDemand.Total
        [Root].potentialDMAllocation.Structural
        [Root].NDemand.Structural
        [Root].NDemand.Metabolic
        [Root].NDemand.Storage
        [Root].NDemand.Total
        [Root].Allocated.StructuralN
        [Root].Allocated.MetabolicN
        [Root].Allocated.StorageN
        [Root].DMDemand.Total
        [Root].DMDemand.Structural
        [Root].Depth
        [Root].NTakenUp
        [Root].NUptake
        [Root].Senesced.Wt
        [Root].Senesced.N
        [Root].Dead.Wt
        [Root].Senesced.StructuralWt
        [Root].Detached.N
        [Root].Detached.Wt
        [Root].PlantZone.NUptakeSupply
        [Sorghum].TotalLive.N
        [Arbitrator].N.Allocated
        [Arbitrator].DM.NotAllocated
        [Root].NDemand.Structural + [Stem].NDemand.Structural as StructuralDemandB4Rachis
        [Root].PlantZone.DeltaNO3
        ([Arbitrator].N.TotalPlantDemand - [Leaf].NDemand.Structural) as PlantDemand
        [Arbitrator].N.TotalPlantDemand as TotalPlantNDemand
        [Phenology].DltTT.Stress as stress
        [Arbitrator].NitrogenUptakeMethod.NDiffusionSupply as NDiffusionSupply
        [Arbitrator].NitrogenUptakeMethod.NMassFlowSupply as NMassFlowSupply
    Report HarvestReport: EventNames=[Sorghum].Harvesting
      VariableNames:
        [Sorghum].DaysAfterSowing as Das
        [Sorghum].Phenology.CurrentStageName as Stage
        [Sorghum].AboveGround.Wt as BiomassWt
        [Sorghum].AboveGround.N as biomass_n
        [Sorghum].Grain.Size * 1000 as GrainSize // FIXME!
        [Sorghum].Grain.NumberFunction as GrainNoFunc
        [Sorghum].Grain.Number as GrainNo
        [Sorghum].Leaf.LAI as LAI
        [Sorghum].Root.Live.Wt as RootGreenWt
        [Sorghum].Leaf.Live.Wt as LeafGreenWt
        [Sorghum].Stem.Live.Wt as StemGreenWt
        [Sorghum].Rachis.Live.Wt as RachisGreenWt
        [Sorghum].Grain.Live.Wt as GrainGreenWt
        [Sorghum].Root.Live.N as RootGreenN
        [Sorghum].Leaf.Live.N as LeafGreenN
        [Sorghum].Stem.Live.N as StemGreenN
        [Sorghum].Rachis.Live.N as RachisGreenN
        [Sorghum].Grain.Live.N as GrainGreenN
        [Sorghum].Grain.Live.NConc * 100 as GrainGreenNConc // old apsim grain nconc is in percent
        //[Sorghum].Leaf.Number as LeafNo
        sum([Soil].SoilWater.ESW) as ESW
        sum([Soil].NO3.kgha) as NO3
        [Sorghum].Leaf.SLN as SLN
        sum([Soil].Water.Volumetric) as sw
        // HI
        [Sorghum].Leaf.LAI / [Sorghum].Population * 10000 as GPLA
        [Sorghum].Leaf.LAIDead / [Sorghum].Population * 10000 as SPLA
        ([Sorghum].Leaf.SenescedLai / [Sorghum].Population + [Sorghum].Leaf.LAI / [Sorghum].Population) * 10000 as TPLA // gpla + spla as per old apsim. this assumes paddock area = 1ha
        [Sorghum].Leaf.LAIDead as SPLA
        // Yield
        [Sorghum].AboveGround.Wt // g/m2 - Biomass (kg/ha) in old Apsim
        [Sorghum].Leaf.LaiAnth as LaiAnth
        max of [Sorghum].Leaf.LAI from [Sorghum].Sowing to [Sorghum].Harvesting as LAImax
  Folder Validation
    Folder Combined Results
      Memo Combined Results
        Simulation results for the combined datasets from the various countries are shown in the following graphs.  The model is able to adequately capture the influence of growing conditions (soil, climate) and management (population, Nitrogen, irrigation, sowing date).
    Folder Hermitage
      Experiment HE1
        Memo HE1 Description
          Experiment: HE1

          Description: HE1 - High N/Irrig. - 3 Indian/Aust. Cultivars

          Start Date: 1/12/1996

          End Date: 30/06/1997

          |SimulationName       |Cultivar |
          |---------------------|---------|
          |Sorghum_HE1_T1       |QL41xQL36|
          |Sorghum_HE1_T2       |Buster   |
          |Sorghum_HE1_T3       |M35-1    |
        Factors
          Factor Cultivar
            CompositeFactor QL41xQL36
              Specifications:
                [SowingRule].Script.Cultivar = QL41xQL36
                [SowingRule].Script.Ftn = 0
            CompositeFactor Buster
              Specifications:
                [SowingRule].Script.Cultivar = Buster
                [SowingRule].Script.Ftn = 0.2
            CompositeFactor M35-1
              Specifications:
                [SowingRule].Script.Cultivar = M35-1
                [SowingRule].Script.Ftn = 0
        Simulation HE1Base
          Clock: Start=1996-12-01; End=1997-06-30
          Summary
          Weather: FileName=Met\HE1.met
          SoilArbitrator
          Zone Paddock: Area=1; Slope=0; AspectAngle=0; Altitude=50
            Report DailyReport
              VariableNames:
                GrainTempFactor
                GrainTempFactor
            Report HarvestReport: EventNames=[Sorghum].Harvesting
            Folder Manager folder
              Manager SowingRule
                Cultivar = QL41xQL36
                Ftn = 0
                Date = 01/09/1997 00:00:00
                Density = 10
                Depth = 30
                RowSpacing = 500
                RowConfiguration = Solid
                TilleringMethod = FixedTillering
```csharp
using Models.Soils;
using System;
using Models.Core;
using Models.PMF;
using APSIM.Shared.Utilities;

namespace Models
{
    [Serializable]
    public class Script : Model
    {
        [Description("Enter sowing date (dd/mm/yyyy) : ")]
        public DateTime Date { get; set; }

        [Description("Enter sowing density  (plants/m2) : ")]
        public double Density { get; set; }

        [Description("Enter sowing depth  (mm) : ")]
        public double Depth { get; set; }

        [Description("Enter cultivar : ")]
        [Display(Type = DisplayType.CultivarName)]
        public string Cultivar { get; set; }

        [Description("Enter row spacing (mm) : ")]
        public double RowSpacing { get; set; }

        [Description("Enter skip row configuration : ")]
        public RowConfigurationType RowConfiguration { get; set; }

        [Description("Tillering Method")]
        public TilleringMethodType TilleringMethod { get; set; } = 0;

        [Description("Enter Fertile Tiller No. : ")]
        public double Ftn { get; set; }

        public enum TilleringMethodType 
        {
            RuleOfThumb = -1,
            FixedTillering = 0,
            DynamicTillering = 1
        }
        public enum RowConfigurationType 
        {
            Solid, SingleSkip, DoubleSkip
        }

        [Link]
        private Zone paddock;

        [Link]
        private Clock clock;

        [Link]
        private Plant crop;

        [EventSubscribe("DoManagement")]
        private void OnDoManagement(object sender, EventArgs e)
        {
            if (clock.Today == Date /* && isFallow */)
            {
                double population = Density * paddock.Area;
                crop.Sow(cultivar:Cultivar, population:population, depth:Depth, rowSpacing:RowSpacing, rowConfig: (double)RowConfiguration, tillering:(int)TilleringMethod, ftn:Ftn);
            }
        }
    }
}
```
              Manager HarvestingRule
```csharp
using Models.Soils;
using System;
using Models.Core;
using Models.PMF;

namespace Models
{
    [Serializable]

    public class Script : Model
    {
        [Link]
        private Clock clock;

        [Link]
        private IPlant crop;

        [EventSubscribe("DoManagement")]
        private void OnDoCalculations(object sender, EventArgs e)
        {
            if (crop.IsReadyForHarvesting)
            {
                crop.Harvest();
                crop.EndCrop();
            }
            /*
                

           if [crop].StageName = 'harvest_ripe' or [crop].plant_status = 'dead' then
              [crop]  harvest
              [crop]  end_crop
           endif

            
            */
        }
    }
}
```
            Operations FertiliserSchedule
              1996-12-20  [Fertiliser].Apply(33, Fertiliser.Types.NO3N, 50);
              1996-12-23  [Fertiliser].Apply(0, Fertiliser.Types.NO3N, 50);
              1996-12-23  [Fertiliser].Apply(119, Fertiliser.Types.NO3N, 50);
              1997-02-12  [Fertiliser].Apply(59, Fertiliser.Types.NO3N, 50);
              1997-03-21  [Fertiliser].Apply(59, Fertiliser.Types.NO3N, 50);
            Operations IrrigationSchedule
              1997-01-09  [Irrigation].Apply(52);
              1997-01-16  [Irrigation].Apply(36);
              1997-01-21  [Irrigation].Apply(18);
              1997-01-29  [Irrigation].Apply(20);
              1997-02-07  [Irrigation].Apply(14);
              1997-03-13  [Irrigation].Apply(30);
              1997-03-21  [Irrigation].Apply(45);
              1997-04-10  [Irrigation].Apply(27);
              1997-04-17  [Irrigation].Apply(42);
              1997-05-02  [Irrigation].Apply(27);
            Irrigation
            Fertiliser
            MicroClimate: a_interception=0; b_interception=1; c_interception=0; d_interception=0; SoilHeatFluxFraction=0.4; MinimumHeightDiffForNewLayer=0; NightInterceptionFraction=0.5; ReferenceHeight=2
            Soil HRS: SoilType=HMM; Site=HRS; NearestTown=Unknown; Region=SE Queensland; NaturalVegetation=Unknown; Latitude=0; Longitude=0
              Physical
                Thickness  BD    AirDry  LL15   DUL   SAT
                100        1.34  0.08    0.226  0.42  0.45
                100        1.34  0.19    0.226  0.42  0.45
                200        1.33  0.23    0.258  0.46  0.48
                200        1.38  0.26    0.27   0.46  0.47
                200        1.4   0.26    0.268  0.43  0.45
                200        1.55  0.28    0.304  0.4   0.41
                200        1.59  0.25    0.335  0.37  0.38
                200        1.63  0.28    0.33   0.33  0.37
                200        1.66  0.3     0.32   0.32  0.37
                200        1.68  0.31    0.33   0.33  0.36
                SoilCrop SorghumSoil
                  LL=[0.226, 0.226, 0.258, 0.27, 0.268, 0.304, 0.335, 0.33, 0.32, 0.33]
                  KL=[0.07, 0.07, 0.07, 0.07, 0.06, 0.06, 0.06, 0.05, 0.05, 0.04]
                  XF=[1, 1, 1, 1, 1, 1, 1, 1, 1, 1]
              WaterBalance SoilWater: SummerDate=1-Nov; SummerU=1.5; SummerCona=6.5; WinterDate=1-Apr; WinterU=1.5; WinterCona=6.5; DiffusConst=40; DiffusSlope=16; Salb=0.2; CN2Bare=85; CNRed=20; CNCov=0.8; PSIDul=-100; Thickness=[100, 100, 200, 200, 200, 200, 200, 200, 200, 200]; SWCON=[0.3, 0.3, 0.3, 0.3, 0.3, 0.3, 0.3, 0.3, 0.3, 0.3]
              Nutrient
              Organic: FOMCNRatio=50; CarbonUnits=Total
                Thickness  Carbon  SoilCNRatio  FBiom  FInert  FOM
                100        1.19    12.5         0.05   0.3     260.587
                100        0.59    12.5         0.02   0.45    220.582
                200        0.45    12.5         0.01   0.6     158.054
                200        0.3     12.5         0.01   0.75    113.251
                200        0.2     12.5         0.01   0.9     81.1478
                200        0.16    12.5         0.01   0.9     58.1449
                200        0.17    12.5         0.01   0.9     41.6626
                200        0.17    12.5         0.05   0.9     29.8526
                200        0.17    12.5         0.02   0.9     21.3903
                200        0.17    12.5         0.01   0.9     15.3268
              Chemical: Thickness=[100, 100, 200, 200, 200, 200, 200, 200, 200, 200]; PH=[6.3, 6.4, 6.5, 6.6, 6.6, 6.5, 6.5, 6.5, 6.5, 6.5]; PHUnits=Water
              Water: Thickness=[100, 100, 200, 200, 200, 200, 200, 200, 200, 200]; FilledFromTop=false
                InitialValues=[0.235, 0.252, 0.27, 0.3, 0.268, 0.304, 0.335, 0.33, 0.32, 0.33]
              CERESSoilTemperature Temperature
              Solute NO3: Thickness=[100, 100, 200, 200, 200, 200, 200, 200, 200, 200]; InitialValuesUnits=ppm; WaterTableConcentration=0; D0=0
                InitialValues=[10.4, 1.633, 1.233, 0.9, 1.1, 1.467, 3.633, 5.667, 5.8, 7.267]
              Solute NH4: Thickness=[100, 100, 200, 200, 200, 200, 200, 200, 200, 200]; InitialValues=[0.1, 0.1, 0.1, 0.1, 0.1, 0.1, 0.1, 0.1, 0.1, 0.1]; InitialValuesUnits=ppm; WaterTableConcentration=0; D0=0
              Solute Urea: Thickness=[100, 100, 200, 200, 200, 200, 200, 200, 200, 200]; InitialValues=[0, 0, 0, 0, 0, 0, 0, 0, 0, 0]; InitialValuesUnits=kg/ha; WaterTableConcentration=0; D0=0
            Plant Sorghum: IsEnding=false; DaysAfterEnding=0
            SurfaceOrganicMatter: InitialResidueName=wheat_stubble; InitialResidueType=wheat; InitialResidueMass=0; InitialStandingFraction=0; InitialCPR=0; InitialCNR=80
      Experiment HE2
        Memo HE2 Description
          Experiment: HE2

          Description: HE2 - Low N/Irrig. - 3 Indian/Aust. Cultivars

          Start Date: 1/12/1996

          End Date: 30/06/1997

          |SimulationName       |Cultivar |
          |---------------------|---------|
          |Sorghum_HE1_T1       |QL41xQL36|
          |Sorghum_HE1_T2       |Buster   |
          |Sorghum_HE1_T3       |M35-1    |
        Factors
          Factor Cultivar
            CompositeFactor QL41xQL36: Specifications=[SowingRule].Script.Cultivar = QL41xQL36
            CompositeFactor Buster: Specifications=[SowingRule].Script.Cultivar = Buster
            CompositeFactor M35-1
              Specifications:
                [SowingRule].Script.Cultivar = M35-1
                [FertiliserSchedule]
              Operations FertiliserSchedule
                1996-12-20  [Fertiliser].Apply(3, Fertiliser.Types.NO3N, 50);
                1996-12-23  [Fertiliser].Apply(0, Fertiliser.Types.NO3N, 50);
                1996-12-23  [Fertiliser].Apply(10, Fertiliser.Types.NO3N, 50);
        Simulation HE2Base
          Clock: Start=1996-12-01; End=1997-06-30
          Summary
          Weather: FileName=Met/HE2.met
          SoilArbitrator
          Zone Paddock: Area=1; Slope=0; AspectAngle=0; Altitude=50
            Report DailyReport
              VariableNames:
                GrainTempFactor
                GrainTempFactor
            Report HarvestReport: EventNames=[Sorghum].Harvesting
            Folder Manager folder
              Manager SowingRule
                Date = 01/09/1997 00:00:00
                Density = 10
                Depth = 30
                Cultivar = QL41xQL36
                RowSpacing = 500
                RowConfiguration = Solid
                TilleringMethod = FixedTillering
                Ftn = 0
                script: same as in Validation.Hermitage.HE1.HE1Base.Paddock.Manager folder.SowingRule
              Manager HarvestingRule: same as Validation.Hermitage.HE1.HE1Base.Paddock.Manager folder.HarvestingRule
            Operations FertiliserSchedule
              1996-12-20  [Fertiliser].Apply(0, Fertiliser.Types.NO3N, 50);
              1996-12-23  [Fertiliser].Apply(0, Fertiliser.Types.NO3N, 50);
              1996-12-23  [Fertiliser].Apply(10, Fertiliser.Types.NO3N, 50);
            Operations IrrigationSchedule
              1997-01-09  [Irrigation].Apply(54);
              1997-01-16  [Irrigation].Apply(37);
              1997-01-21  [Irrigation].Apply(19);
              1997-01-29  [Irrigation].Apply(20);
              1997-02-07  [Irrigation].Apply(14);
              1997-03-13  [Irrigation].Apply(30);
              1997-03-21  [Irrigation].Apply(46);
              1997-04-10  [Irrigation].Apply(24);
              1997-04-17  [Irrigation].Apply(41);
              1997-05-02  [Irrigation].Apply(25);
            Irrigation
            Fertiliser
            MicroClimate: a_interception=0; b_interception=1; c_interception=0; d_interception=0; SoilHeatFluxFraction=0.4; MinimumHeightDiffForNewLayer=0; NightInterceptionFraction=0.5; ReferenceHeight=2
            Soil HRS: SoilType=HMM; Site=HRS; NearestTown=Unknown; Region=SE Queensland; NaturalVegetation=Unknown; Latitude=0; Longitude=0
              Physical: same as Validation.Hermitage.HE1.HE1Base.Paddock.HRS.Physical
              WaterBalance SoilWater: same as Validation.Hermitage.HE1.HE1Base.Paddock.HRS.SoilWater
              Nutrient
              Organic: same as Validation.Hermitage.HE1.HE1Base.Paddock.HRS.Organic
              Chemical: Thickness=[100, 100, 200, 200, 200, 200, 200, 200, 200, 200]; PH=[6.3, 6.4, 6.5, 6.6, 6.6, 6.5, 6.5, 6.5, 6.5, 6.5]; PHUnits=Water
              Water: Thickness=[100, 100, 200, 200, 200, 200, 200, 200, 200, 200]; FilledFromTop=false
                InitialValues=[0.235, 0.252, 0.27, 0.3, 0.268, 0.304, 0.335, 0.33, 0.32, 0.33]
              CERESSoilTemperature Temperature
              Solute NO3: Thickness=[100, 100, 200, 200, 200, 200, 200, 200, 200, 200]; InitialValuesUnits=ppm; WaterTableConcentration=0; D0=0
                InitialValues=[0.1, 0.026, 0.05, 0.058, 0.394, 0.187, 0.512, 0.762, 0.719, 0.7]
              Solute NH4: Thickness=[100, 100, 200, 200, 200, 200, 200, 200, 200, 200]; InitialValues=[0.1, 0.1, 0.1, 0.1, 0.1, 0.1, 0.1, 0.1, 0.1, 0.1]; InitialValuesUnits=ppm; WaterTableConcentration=0; D0=0
              Solute Urea: Thickness=[100, 100, 200, 200, 200, 200, 200, 200, 200, 200]; InitialValues=[0, 0, 0, 0, 0, 0, 0, 0, 0, 0]; InitialValuesUnits=kg/ha; WaterTableConcentration=0; D0=0
            Plant Sorghum: IsEnding=false; DaysAfterEnding=0
            SurfaceOrganicMatter: InitialResidueName=wheat_stubble; InitialResidueType=wheat; InitialResidueMass=0; InitialStandingFraction=0; InitialCPR=0; InitialCNR=80
      Experiment HE3
        Memo HE3 Description
          Experiment: HE3

          Description: HE3 - High N/No Irrig. - 3 Indian/Aust. Cultivars

          Start Date: 1/12/1996

          End Date: 30/06/1997

          |SimulationName       |Cultivar |
          |---------------------|---------|
          |Sorghum_HE3_T1       |QL41xQL36|
          |Sorghum_HE3_T2       |Buster   |
          |Sorghum_HE3_T3       |M35-1    |
        Factors
          Factor Cultivar: Specification=[SowingRule].Script.Cultivar = QL41xQL36, Buster, M35-1
        Simulation HE3Base
          Clock: Start=1997-01-09; End=1997-06-30
          Summary
          Weather: FileName=Met/HE3.met
          SoilArbitrator
          Zone Paddock: Area=1; Slope=0; AspectAngle=0; Altitude=50
            Report DailyReport
              VariableNames:
                GrainTempFactor
                GrainTempFactor
            Report HarvestReport: EventNames=[Sorghum].Harvesting
            Folder Manager folder
              Manager SowingRule
                Date = 01/09/1997 00:00:00
                Density = 10
                Depth = 15
                Cultivar = QL41xQL36
                RowSpacing = 500
                RowConfiguration = Solid
                TilleringMethod = FixedTillering
                Ftn = 0
                script: same as in Validation.Hermitage.HE1.HE1Base.Paddock.Manager folder.SowingRule
              Manager HarvestingRule: same as Validation.Hermitage.HE1.HE1Base.Paddock.Manager folder.HarvestingRule
            Operations FertiliserSchedule
              1996-12-20  [Fertiliser].Apply(33, Fertiliser.Types.NO3N, 50);
              1996-12-23  [Fertiliser].Apply(0, Fertiliser.Types.NO3N, 50);
              1996-12-23  [Fertiliser].Apply(119, Fertiliser.Types.NO3N, 50);
            Operations IrrigationSchedule
              1996-12-23  [Irrigation].Apply(69);
              1996-12-27  [Irrigation].Apply(9);
              1997-01-09  [Irrigation].Apply(33);
              1997-01-16  [Irrigation].Apply(28);
              1997-01-31  [Irrigation].Apply(19);
            Irrigation
            Fertiliser
            MicroClimate: a_interception=0; b_interception=1; c_interception=0; d_interception=0; SoilHeatFluxFraction=0.4; MinimumHeightDiffForNewLayer=0; NightInterceptionFraction=0.5; ReferenceHeight=2
            Soil HRS: SoilType=HMM; Site=HRS; NearestTown=Unknown; Region=SE Queensland; NaturalVegetation=Unknown; Latitude=0; Longitude=0
              Physical
                Thickness  BD    AirDry  LL15   DUL   SAT
                100        1.34  0.08    0.226  0.42  0.45
                100        1.34  0.19    0.226  0.42  0.45
                200        1.33  0.23    0.258  0.46  0.48
                200        1.38  0.26    0.27   0.46  0.47
                200        1.4   0.26    0.268  0.43  0.45
                200        1.55  0.28    0.304  0.4   0.41
                200        1.59  0.32    0.335  0.37  0.38
                200        1.63  0.32    0.33   0.33  0.37
                200        1.66  0.32    0.32   0.32  0.37
                200        1.68  0.33    0.33   0.33  0.36
                SoilCrop SorghumSoil
                  LL=[0.226, 0.226, 0.258, 0.27, 0.268, 0.304, 0.335, 0.33, 0.32, 0.33]
                  KL=[0.07, 0.07, 0.07, 0.07, 0.06, 0.06, 0.06, 0.05, 0.05, 0.04]
                  XF=[1, 1, 1, 1, 1, 1, 1, 1, 1, 1]
              WaterBalance SoilWater: same as Validation.Hermitage.HE1.HE1Base.Paddock.HRS.SoilWater
              Nutrient
              Organic: same as Validation.Hermitage.HE1.HE1Base.Paddock.HRS.Organic
              Chemical: Thickness=[100, 100, 200, 200, 200, 200, 200, 200, 200, 200]; PH=[6.3, 6.4, 6.5, 6.6, 6.6, 6.5, 6.5, 6.5, 6.5, 6.5]; PHUnits=Water
              Water: Thickness=[100, 100, 200, 200, 200, 200, 200, 200, 200, 200]; FilledFromTop=false
                InitialValues=[0.217, 0.357, 0.375, 0.401, 0.349, 0.351, 0.359, 0.33, 0.322, 0.347]
              CERESSoilTemperature Temperature
              Solute NO3: Thickness=[100, 100, 200, 200, 200, 200, 200, 200, 200, 200]; InitialValuesUnits=ppm; WaterTableConcentration=0; D0=0
                InitialValues=[12.233, 1.867, 1.4, 0.867, 0.9, 2.833, 3.833, 3.9, 4.233, 3.767]
              Solute NH4: Thickness=[100, 100, 200, 200, 200, 200, 200, 200, 200, 200]; InitialValues=[0.1, 0.1, 0.1, 0.1, 0.1, 0.1, 0.1, 0.1, 0.1, 0.1]; InitialValuesUnits=ppm; WaterTableConcentration=0; D0=0
              Solute Urea: Thickness=[100, 100, 200, 200, 200, 200, 200, 200, 200, 200]; InitialValues=[0, 0, 0, 0, 0, 0, 0, 0, 0, 0]; InitialValuesUnits=kg/ha; WaterTableConcentration=0; D0=0
            Plant Sorghum: IsEnding=false; DaysAfterEnding=0
            SurfaceOrganicMatter: InitialResidueName=wheat_stubble; InitialResidueType=wheat; InitialResidueMass=0; InitialStandingFraction=0; InitialCPR=0; InitialCNR=80
      Experiment HE4
        Memo HE4 Description
          Experiment: HE4

          Description: HE4 - Low N/No Irrig. - 3 Indian/Aust. Cultivars

          Start Date: 1/12/1996

          End Date: 30/06/1997

          |SimulationName       |Cultivar |
          |---------------------|---------|
          |Sorghum_HE4_T1       |QL41xQL36|
          |Sorghum_HE4_T2       |Buster   |
          |Sorghum_HE4_T3       |M35-1    |
        Factors
          Factor Cultivar
            CompositeFactor QL41xQL36
              Specifications:
                [SowingRule].Script.Cultivar = QL41xQL36
                [SowingRule].Script.Ftn = 0
                [SowingRule].Script.Depth = 15
            CompositeFactor Buster
              Specifications:
                [SowingRule].Script.Cultivar = Buster
                [SowingRule].Script.Ftn = 0.2
                [SowingRule].Script.Depth = 30
            CompositeFactor M35-1
              Specifications:
                [SowingRule].Script.Cultivar = M35-1
                [SowingRule].Script.Ftn = 0
                [SowingRule].Script.Depth = 30
        Simulation HE4Base
          Clock: Start=1996-12-01; End=1997-06-30
          Summary
          Weather: FileName=Met/HE4.met
          SoilArbitrator
          Zone Paddock: Area=1; Slope=0; AspectAngle=0; Altitude=50
            Report DailyReport
              VariableNames:
                GrainTempFactor
                GrainTempFactor
            Report HarvestReport: EventNames=[Sorghum].Harvesting
            Folder Manager folder: same as Validation.Hermitage.HE2.HE2Base.Paddock.Manager folder
            Operations FertiliserSchedule
              1996-12-20  [Fertiliser].Apply(0, Fertiliser.Types.NO3N, 50);
              1996-12-23  [Fertiliser].Apply(10, Fertiliser.Types.NO3N, 50);
              1997-12-23  [Fertiliser].Apply(0, Fertiliser.Types.NO3N, 50);
            Operations IrrigationSchedule: same as Validation.Hermitage.HE3.HE3Base.Paddock.IrrigationSchedule
            Irrigation
            Fertiliser
            MicroClimate: a_interception=0; b_interception=1; c_interception=0; d_interception=0; SoilHeatFluxFraction=0.4; MinimumHeightDiffForNewLayer=0; NightInterceptionFraction=0.5; ReferenceHeight=2
            Soil HRS: SoilType=HMM; Site=HRS; NearestTown=Unknown; Region=SE Queensland; NaturalVegetation=Unknown; Latitude=0; Longitude=0
              Water: Thickness=[100, 100, 200, 200, 200, 200, 200, 200, 200, 200]; FilledFromTop=true
                InitialValues=[0.42, 0.42, 0.46, 0.4014, 0.268, 0.304, 0.335, 0.33, 0.32, 0.33]
              Physical: same as Validation.Hermitage.HE1.HE1Base.Paddock.HRS.Physical
              WaterBalance SoilWater: same as Validation.Hermitage.HE1.HE1Base.Paddock.HRS.SoilWater
              Nutrient
              Organic: same as Validation.Hermitage.HE1.HE1Base.Paddock.HRS.Organic
              Chemical: Thickness=[100, 100, 200, 200, 200, 200, 200, 200, 200, 200]; PH=[6.3, 6.4, 6.5, 6.6, 6.6, 6.5, 6.5, 6.5, 6.5, 6.5]; PHUnits=Water
              CERESSoilTemperature Temperature
              Solute NO3: Thickness=[100, 100, 200, 200, 200, 200, 200, 200, 200, 200]; InitialValuesUnits=ppm; WaterTableConcentration=0; D0=0
                InitialValues=[18.4607, 2.89869, 2.18866, 1.59756, 1.95258, 2.60403, 6.44883, 10.0593, 10.2954, 12.8994]
              Solute NH4: Thickness=[100, 100, 200, 200, 200, 200, 200, 200, 200, 200]; InitialValuesUnits=ppm; WaterTableConcentration=0; D0=0
                InitialValues=[0.468732, 0.468732, 0.468732, 0.468732, 0.468732, 0.468732, 0.468732, 0.468732, 0.468732, 0.468732]
              Solute Urea: Thickness=[100, 100, 200, 200, 200, 200, 200, 200, 200, 200]; InitialValues=[0, 0, 0, 0, 0, 0, 0, 0, 0, 0]; InitialValuesUnits=kg/ha; WaterTableConcentration=0; D0=0
            Plant Sorghum: IsEnding=false; DaysAfterEnding=0
            SurfaceOrganicMatter: InitialResidueName=wheat_stubble; InitialResidueType=wheat; InitialResidueMass=0; InitialStandingFraction=0; InitialCPR=0; InitialCNR=80
      Experiment HE5
        Memo HE5 Description
          Experiment: HE5

          Description: HE5 - High N/Irrig. - 3 Indian/Aust. Cultivars

          Start Date: 18/11/1997

          End Date: 15/04/1998

          |SimulationName       |Cultivar|
          |---------------------|--------|
          |Sorghum_HE5_T1       |Buster  |
          |Sorghum_HE5_T2       |M35-1   |
          |Sorghum_HE5_T3       |CSH13R  |
        Factors
          Factor Cultivar
            CompositeFactor Buster
              Specifications:
                [SowingRule].Script.Cultivar = Buster
                [SowingRule].Script.Ftn = 0.1
            CompositeFactor M35-1
              Specifications:
                [SowingRule].Script.Cultivar = M35-1
                [SowingRule].Script.Ftn = 0.2
            CompositeFactor CSH13R
              Specifications:
                [SowingRule].Script.Cultivar = CSH13R
                [SowingRule].Script.Ftn = 0
                [FertiliserSchedule]
              Operations FertiliserSchedule
                1997-11-26  [Fertiliser].Apply(0, Fertiliser.Types.NO3N, 50);
                1997-11-26  [Fertiliser].Apply(33, Fertiliser.Types.NO3N, 50);
                1998-02-20  [Fertiliser].Apply(59, Fertiliser.Types.NO3N, 50);
        Simulation HE5Base
          Clock: Start=1997-11-18; End=1998-04-15
          Summary
          Weather: FileName=Met/HE5.met
          SoilArbitrator
          Zone Paddock: Area=1; Slope=0; AspectAngle=0; Altitude=50
            Report DailyReport
              VariableNames:
                GrainTempFactor
                GrainTempFactor
            Report HarvestReport: EventNames=[Sorghum].Harvesting
            Folder Manager folder
              Manager SowingRule
                Cultivar = Buster
                Date = 11/27/1997 00:00:00
                Density = 10
                Depth = 30
                RowSpacing = 500
                RowConfiguration = Solid
                TilleringMethod = FixedTillering
                Ftn = 0.1
```csharp
using Models.Soils;
using System;
using Models.Core;
using Models.PMF;
using APSIM.Shared.Utilities;

namespace Models
{
    [Serializable]
    public class Script : Model
    {
        [Description("Enter sowing date (dd/mm/yyyy) : ")]
        public DateTime Date { get; set; }

        [Description("Enter sowing density  (plants/m2) : ")]
        public double Density { get; set; }

        [Description("Enter sowing depth  (mm) : ")]
        public double Depth { get; set; }

        [Description("Enter cultivar : ")]
        [Display(Type = DisplayType.CultivarName)]
        public string Cultivar { get; set; } // QL41xQL36

        [Description("Enter row spacing (mm) : ")]
        public double RowSpacing { get; set; }

        [Description("Enter skip row configuration : ")]
        public RowConfigurationType RowConfiguration { get; set; }

        [Description("Tillering Method")]
        public TilleringMethodType TilleringMethod { get; set; } = 0;

        [Description("Enter Fertile Tiller No. : ")]
        public double Ftn { get; set; }

        public enum TilleringMethodType 
        {
            RuleOfThumb = -1,
            FixedTillering = 0,
            DynamicTillering = 1
        }
        public enum RowConfigurationType 
        {
            Solid, SingleSkip, DoubleSkip
        }

        [Link]
        private Zone paddock;

        [Link]
        private Clock clock;

        [Link]
        private Plant crop;

        [EventSubscribe("DoManagement")]
        private void OnDoManagement(object sender, EventArgs e)
        {
            if (clock.Today == Date /* && isFallow */)
            {
                double population = Density * paddock.Area;
                crop.Sow(cultivar:Cultivar, population:population, depth:Depth, rowSpacing:RowSpacing, rowConfig: (double)RowConfiguration, tillering:(int)TilleringMethod, ftn:Ftn);
            }
        }
    }
}
```
              Manager HarvestingRule: same as Validation.Hermitage.HE1.HE1Base.Paddock.Manager folder.HarvestingRule
            Operations FertiliserSchedule
              1997-11-26  [Fertiliser].Apply(3, Fertiliser.Types.NO3N, 50);
              1998-02-20  [Fertiliser].Apply(59, Fertiliser.Types.NO3N, 50);
            Operations IrrigationSchedule
              1997-11-28  [Irrigation].Apply(16);
              1997-12-02  [Irrigation].Apply(25);
              1997-12-04  [Irrigation].Apply(13);
              1997-12-08  [Irrigation].Apply(21);
              1997-12-18  [Irrigation].Apply(28);
              1998-01-06  [Irrigation].Apply(26);
              1998-01-12  [Irrigation].Apply(46);
              1998-01-27  [Irrigation].Apply(25);
              1998-02-20  [Irrigation].Apply(26);
              1998-02-27  [Irrigation].Apply(55);
              1998-03-13  [Irrigation].Apply(22);
              1998-03-18  [Irrigation].Apply(39);
              1998-03-20  [Irrigation].Apply(21);
            Irrigation
            Fertiliser
            MicroClimate: a_interception=0; b_interception=1; c_interception=0; d_interception=0; SoilHeatFluxFraction=0.4; MinimumHeightDiffForNewLayer=0; NightInterceptionFraction=0.5; ReferenceHeight=2
            Soil HRS: SoilType=HMM; Site=HRS; NearestTown=Unknown; Region=SE Queensland; NaturalVegetation=Unknown; Latitude=0; Longitude=0
              Physical: same as Validation.Hermitage.HE1.HE1Base.Paddock.HRS.Physical
              WaterBalance SoilWater: same as Validation.Hermitage.HE1.HE1Base.Paddock.HRS.SoilWater
              Nutrient
              Organic: same as Validation.Hermitage.HE1.HE1Base.Paddock.HRS.Organic
              Chemical: Thickness=[100, 100, 200, 200, 200, 200, 200, 200, 200, 200]; PH=[6.3, 6.4, 6.5, 6.6, 6.6, 6.5, 6.5, 6.5, 6.5, 6.5]; PHUnits=Water
              Water: Thickness=[100, 100, 200, 200, 200, 200, 200, 200, 200, 200]; FilledFromTop=false
                InitialValues=[0.217, 0.357, 0.375, 0.401, 0.349, 0.351, 0.359, 0.33, 0.322, 0.347]
              CERESSoilTemperature Temperature
              Solute NO3: Thickness=[100, 100, 200, 200, 200, 200, 200, 200, 200, 200]; InitialValuesUnits=ppm; WaterTableConcentration=0; D0=0
                InitialValues=[8.421, 8.054, 7.001, 3.824, 2.759, 3.429, 8.668, 11.576, 8.816, 11.758]
              Solute NH4: Thickness=[100, 100, 200, 200, 200, 200, 200, 200, 200, 200]; InitialValues=[0.1, 0.1, 0.1, 0.1, 0.1, 0.1, 0.1, 0.1, 0.1, 0.1]; InitialValuesUnits=ppm; WaterTableConcentration=0; D0=0
              Solute Urea: Thickness=[100, 100, 200, 200, 200, 200, 200, 200, 200, 200]; InitialValues=[0, 0, 0, 0, 0, 0, 0, 0, 0, 0]; InitialValuesUnits=kg/ha; WaterTableConcentration=0; D0=0
            Plant Sorghum: IsEnding=false; DaysAfterEnding=0
            SurfaceOrganicMatter: InitialResidueName=wheat_stubble; InitialResidueType=wheat; InitialResidueMass=0; InitialStandingFraction=0; InitialCPR=0; InitialCNR=80
      Experiment HE6
        Memo HE6 Description
          Experiment: HE6

          Description: HE6 - Low N/Irrig. - 3 Indian/Aust. Cultivars

          Start Date: 18/11/1997

          End Date: 15/04/1998

          |SimulationName       |Cultivar|
          |---------------------|--------|
          |Sorghum_HE6_T1       |Buster  |
          |Sorghum_HE6_T2       |M35-1   |
          |Sorghum_HE6_T3       |CSH13R  |
        Factors
          Factor Cultivar: Specification=[SowingRule].Script.Cultivar = Buster, M35-1, CSH13R
        Simulation HE6Base
          Clock: Start=1997-11-18; End=1998-04-15
          Summary
          Weather: FileName=Met/HE6.met
          SoilArbitrator
          Zone Paddock: Area=1; Slope=0; AspectAngle=0; Altitude=50
            Report DailyReport
              VariableNames:
                GrainTempFactor
                GrainTempFactor
            Report HarvestReport: EventNames=[Sorghum].Harvesting
            Folder Manager folder
              Manager SowingRule
                Date = 11/27/1997 00:00:00
                Density = 10
                Depth = 30
                Cultivar = Buster
                RowSpacing = 500
                RowConfiguration = Solid
                TilleringMethod = FixedTillering
                Ftn = 0
                script: same as in Validation.Hermitage.HE5.HE5Base.Paddock.Manager folder.SowingRule
              Manager HarvestingRule: same as Validation.Hermitage.HE1.HE1Base.Paddock.Manager folder.HarvestingRule
            Operations FertiliserSchedule
              1997-11-26  [Fertiliser].Apply(10, Fertiliser.Types.NO3N, 50);
            Operations IrrigationSchedule
              1997-11-28  [Irrigation].Apply(16);
              1997-12-02  [Irrigation].Apply(24);
              1997-12-04  [Irrigation].Apply(13);
              1997-12-08  [Irrigation].Apply(21);
              1997-12-18  [Irrigation].Apply(28);
              1998-01-06  [Irrigation].Apply(26);
              1998-01-12  [Irrigation].Apply(47);
              1998-01-27  [Irrigation].Apply(25);
              1998-02-20  [Irrigation].Apply(20);
              1998-02-27  [Irrigation].Apply(38);
              1998-03-13  [Irrigation].Apply(22);
              1998-03-18  [Irrigation].Apply(40);
            Irrigation
            Fertiliser
            MicroClimate: a_interception=0; b_interception=1; c_interception=0; d_interception=0; SoilHeatFluxFraction=0.4; MinimumHeightDiffForNewLayer=0; NightInterceptionFraction=0.5; ReferenceHeight=2
            Soil HRS: SoilType=HMM; Site=HRS; NearestTown=Unknown; Region=SE Queensland; NaturalVegetation=Unknown; Latitude=0; Longitude=0
              Physical: same as Validation.Hermitage.HE1.HE1Base.Paddock.HRS.Physical
              WaterBalance SoilWater: same as Validation.Hermitage.HE1.HE1Base.Paddock.HRS.SoilWater
              Nutrient
              Organic: FOMCNRatio=50; CarbonUnits=Total
                Thickness  Carbon  SoilCNRatio  FBiom  FInert  FOM
                100        1.19    12.5         0.05   0.45    260.587
                100        0.59    12.5         0.02   0.6     220.582
                200        0.45    12.5         0.01   0.75    158.054
                200        0.3     12.5         0.01   0.9     113.251
                200        0.2     12.5         0.01   0.9     81.1478
                200        0.16    12.5         0.01   0.9     58.1449
                200        0.17    12.5         0.01   0.9     41.6626
                200        0.17    12.5         0.05   0.9     29.8526
                200        0.17    12.5         0.02   0.9     21.3903
                200        0.17    12.5         0.01   0.9     15.3268
              Chemical: Thickness=[100, 100, 200, 200, 200, 200, 200, 200, 200, 200]; PH=[6.3, 6.4, 6.5, 6.6, 6.6, 6.5, 6.5, 6.5, 6.5, 6.5]; PHUnits=Water
              Water: Thickness=[100, 100, 200, 200, 200, 200, 200, 200, 200, 200]; FilledFromTop=false
                InitialValues=[0.217, 0.357, 0.375, 0.401, 0.349, 0.351, 0.359, 0.33, 0.322, 0.347]
              CERESSoilTemperature Temperature
              Solute NO3: Thickness=[100, 100, 200, 200, 200, 200, 200, 200, 200, 200]; InitialValuesUnits=ppm; WaterTableConcentration=0; D0=0
                InitialValues=[1.493, 1.633, 1.233, 0.9, 1.1, 1.467, 2.516, 3.067, 3.012, 2.976]
              Solute NH4: Thickness=[100, 100, 200, 200, 200, 200, 200, 200, 200, 200]; InitialValues=[0.1, 0.1, 0.1, 0.1, 0.1, 0.1, 0.1, 0.1, 0.1, 0.1]; InitialValuesUnits=ppm; WaterTableConcentration=0; D0=0
              Solute Urea: Thickness=[100, 100, 200, 200, 200, 200, 200, 200, 200, 200]; InitialValues=[0, 0, 0, 0, 0, 0, 0, 0, 0, 0]; InitialValuesUnits=kg/ha; WaterTableConcentration=0; D0=0
            Plant Sorghum: IsEnding=false; DaysAfterEnding=0
            SurfaceOrganicMatter: InitialResidueName=wheat_stubble; InitialResidueType=wheat; InitialResidueMass=0; InitialStandingFraction=0; InitialCPR=0; InitialCNR=80
      Experiment HE7
        Memo HE7 Description
          Experiment: HE7

          Description: HE7 - High N/No Irrig. - 3 Indian/Aust. Cultivars

          Start Date: 18/11/1997

          End Date: 15/04/1998

          |SimulationName       |Cultivar|
          |---------------------|--------|
          |Sorghum_HE7_T1       |Buster  |
          |Sorghum_HE7_T2       |M35-1   |
          |Sorghum_HE7_T3       |CSH13R  |
        Factors
          Factor Cultivar
            CompositeFactor Buster
              Specifications:
                [SowingRule].Script.Cultivar = Buster
                [Soil].Water.InitialValues = 0.307, 0.326, 0.444, 0.429, 0.363, 0.351, 0.336, 0.343, 0.352, 0.347
                [FertiliserSchedule]
              Operations FertiliserSchedule
                1997-11-26  [Fertiliser].Apply(3, Fertiliser.Types.NO3N, 50);
                1997-11-26  [Fertiliser].Apply(119, Fertiliser.Types.NO3N, 50);
            CompositeFactor M35-1
              Specifications:
                [SowingRule].Script.Cultivar = M35-1
                [Soil].Water.InitialValues = 0.323, 0.407, 0.388, 0.342, 0.341, 0.321, 0.324, 0.332, 0.339, 0.341
            CompositeFactor CSH13R
              Specifications:
                [SowingRule].Script.Cultivar = CSH13R
                [Soil].Water.InitialValues = 0.307, 0.377, 0.385, 0.382, 0.376, 0.337, 0.346, 0.359, 0.348, 0.35
        Simulation HE7Base
          Clock: Start=1997-11-25; End=1998-04-15
          Summary
          Weather: FileName=Met/HE7.met
          SoilArbitrator
          Zone Paddock: Area=1; Slope=0; AspectAngle=0; Altitude=50
            Report DailyReport
              VariableNames:
                GrainTempFactor
                GrainTempFactor
            Report HarvestReport: EventNames=[Sorghum].Harvesting
            Folder Manager folder
              Manager SowingRule
                Date = 11/27/1997 00:00:00
                Density = 10
                Depth = 15
                Cultivar = Buster
                RowSpacing = 500
                RowConfiguration = Solid
                TilleringMethod = FixedTillering
                Ftn = 0
                script: same as in Validation.Hermitage.HE5.HE5Base.Paddock.Manager folder.SowingRule
              Manager HarvestingRule: same as Validation.Hermitage.HE1.HE1Base.Paddock.Manager folder.HarvestingRule
            Operations FertiliserSchedule
              1997-11-26  [Fertiliser].Apply(33, Fertiliser.Types.NO3N, 50);
              1997-11-26  [Fertiliser].Apply(119, Fertiliser.Types.NO3N, 50);
            Operations IrrigationSchedule
              1997-11-28  [Irrigation].Apply(65);
              1997-12-16  [Irrigation].Apply(90);
            Irrigation
            Fertiliser
            MicroClimate: a_interception=0; b_interception=1; c_interception=0; d_interception=0; SoilHeatFluxFraction=0.4; MinimumHeightDiffForNewLayer=0; NightInterceptionFraction=0.5; ReferenceHeight=2
            Soil HRS: SoilType=HMM; Site=HRS; NearestTown=Unknown; Region=SE Queensland; NaturalVegetation=Unknown; Latitude=0; Longitude=0
              Physical: same as Validation.Hermitage.HE3.HE3Base.Paddock.HRS.Physical
              WaterBalance SoilWater: same as Validation.Hermitage.HE1.HE1Base.Paddock.HRS.SoilWater
              Nutrient
              Organic: same as Validation.Hermitage.HE1.HE1Base.Paddock.HRS.Organic
              Chemical: Thickness=[100, 100, 200, 200, 200, 200, 200, 200, 200, 200]; PH=[6.3, 6.4, 6.5, 6.6, 6.6, 6.5, 6.5, 6.5, 6.5, 6.5]; PHUnits=Water
              Water: Thickness=[100, 100, 200, 200, 200, 200, 200, 200, 200, 200]; FilledFromTop=false
                InitialValues=[0.307, 0.326, 0.444, 0.429, 0.363, 0.351, 0.336, 0.343, 0.352, 0.347]
              CERESSoilTemperature Temperature
              Solute NO3: Thickness=[100, 100, 200, 200, 200, 200, 200, 200, 200, 200]; InitialValuesUnits=ppm; WaterTableConcentration=0; D0=0
                InitialValues=[25.798, 6.921, 9.285, 2.823, 2.286, 3.196, 3.695, 4.41, 2.743, 4.891]
              Solute NH4: Thickness=[100, 100, 200, 200, 200, 200, 200, 200, 200, 200]; InitialValues=[0.1, 0.1, 0.1, 0.1, 0.1, 0.1, 0.1, 0.1, 0.1, 0.1]; InitialValuesUnits=ppm; WaterTableConcentration=0; D0=0
              Solute Urea: Thickness=[100, 100, 200, 200, 200, 200, 200, 200, 200, 200]; InitialValues=[0, 0, 0, 0, 0, 0, 0, 0, 0, 0]; InitialValuesUnits=kg/ha; WaterTableConcentration=0; D0=0
            Plant Sorghum: IsEnding=false; DaysAfterEnding=0
            SurfaceOrganicMatter: InitialResidueName=wheat_stubble; InitialResidueType=wheat; InitialResidueMass=0; InitialStandingFraction=0; InitialCPR=0; InitialCNR=80
      Experiment HE8
        Memo HE8 Description
          Experiment: HE8

          Description: HE8 - Low N/No Irrig - 3 Indian/Aust. Cultivars

          Start Date: 17/11/1997

          End Date: 15/04/1998

          |SimulationName       |Cultivar|
          |---------------------|--------|
          |Sorghum_HE8_T1       |Buster  |
          |Sorghum_HE8_T2       |M35-1   |
          |Sorghum_HE8_T3       |CSH13R  |
        Factors
          Factor Cultivar
            CompositeFactor Buster
              Specifications:
                [SowingRule].Script.Cultivar = Buster
                [Soil].Water.InitialValues = 0.294, 0.381, 0.367, 0.306, 0.29, 0.319, 0.33, 0.343, 0.337, 0.344
                [FertiliserSchedule]
              Operations FertiliserSchedule
                1997-11-26  [Fertiliser].Apply(3, Fertiliser.Types.NO3N, 50);
                1997-11-26  [Fertiliser].Apply(10, Fertiliser.Types.NO3N, 50);
            CompositeFactor M35-1
              Specifications:
                [SowingRule].Script.Cultivar = M35-1
                [Soil].Water.InitialValues = 0.338, 0.364, 0.359, 0.376, 0.364, 0.351, 0.358, 0.351, 0.346, 0.343
            CompositeFactor CSH13R
              Specifications:
                [SowingRule].Script.Cultivar = CSH13R
                [Soil].Water.InitialValues = 0.31, 0.387, 0.329, 0.308, 0.317, 0.33, 0.329, 0.348, 0.341, 0.345
        Simulation HE8Base
          Clock: Start=1997-11-25; End=1998-04-15
          Summary
          Weather: FileName=Met/HE8.met
          SoilArbitrator
          Zone Paddock: Area=1; Slope=0; AspectAngle=0; Altitude=50
            Report DailyReport
              VariableNames:
                GrainTempFactor
                GrainTempFactor
            Report HarvestReport: EventNames=[Sorghum].Harvesting
            Folder Manager folder
              Manager SowingRule
                Date = 11/27/1997 00:00:00
                Density = 10
                Depth = 15
                Cultivar = Buster
                RowSpacing = 500
                RowConfiguration = Solid
                TilleringMethod = FixedTillering
                Ftn = 0
```csharp
using Models.Soils;
using System;
using Models.Core;
using Models.PMF;
using APSIM.Shared.Utilities;

namespace Models
{
    [Serializable]
    public class Script : Model
    {
        [Description("Enter sowing date (dd/mm/yyyy) : ")]
        public DateTime Date { get; set; }

        [Description("Enter sowing density  (plants/m2) : ")]
        public double Density { get; set; }

        [Description("Enter sowing depth  (mm) : ")]
        public double Depth { get; set; }

        [Description("Enter cultivar : ")]
        [Display(Type = DisplayType.CultivarName)]
        public string Cultivar { get; set; } 

        [Description("Enter row spacing (mm) : ")]
        public double RowSpacing { get; set; }

        [Description("Enter skip row configuration : ")]
        public RowConfigurationType RowConfiguration { get; set; }

        [Description("Tillering Method : ")]
        public TilleringMethodType TilleringMethod { get; set; } = 0;

        [Description("Enter Fertile Tiller No. : ")]
        public double Ftn { get; set; }

        public enum TilleringMethodType 
        {
            RuleOfThumb = -1,
            FixedTillering = 0,
            DynamicTillering = 1
        }
        public enum RowConfigurationType 
        {
            Solid, SingleSkip, DoubleSkip
        }

        [Link]
        private Zone paddock;

        [Link]
        private Clock clock;

        [Link]
        private Plant crop;

        [EventSubscribe("DoManagement")]
        private void OnDoManagement(object sender, EventArgs e)
        {
            if (clock.Today == Date)
            {
                double population = Density * paddock.Area;
                crop.Sow(cultivar:Cultivar, population:population, depth:Depth, rowSpacing:RowSpacing, rowConfig: (double)RowConfiguration, tillering:(int)TilleringMethod, ftn:Ftn);
            }
        }
    }
}
```
              Manager HarvestingRule: same as Validation.Hermitage.HE1.HE1Base.Paddock.Manager folder.HarvestingRule
            Operations FertiliserSchedule
              1997-11-26  [Fertiliser].Apply(33, Fertiliser.Types.NO3N, 50);
              1997-11-26  [Fertiliser].Apply(10, Fertiliser.Types.NO3N, 50);
            Operations IrrigationSchedule
              1997-11-28  [Irrigation].Apply(65);
              1997-12-16  [Irrigation].Apply(90);
            Irrigation
            Fertiliser
            MicroClimate: a_interception=0; b_interception=1; c_interception=0; d_interception=0; SoilHeatFluxFraction=0.4; MinimumHeightDiffForNewLayer=0; NightInterceptionFraction=0.5; ReferenceHeight=2
            Soil HRS: SoilType=HMM; Site=HRS; NearestTown=Unknown; Region=SE Queensland; NaturalVegetation=Unknown; Latitude=0; Longitude=0
              Physical: same as Validation.Hermitage.HE3.HE3Base.Paddock.HRS.Physical
              WaterBalance SoilWater: same as Validation.Hermitage.HE1.HE1Base.Paddock.HRS.SoilWater
              Nutrient
              Organic: same as Validation.Hermitage.HE1.HE1Base.Paddock.HRS.Organic
              Chemical: Thickness=[100, 100, 200, 200, 200, 200, 200, 200, 200, 200]; PH=[6.3, 6.4, 6.5, 6.6, 6.6, 6.5, 6.5, 6.5, 6.5, 6.5]; PHUnits=Water
              Water: Thickness=[100, 100, 200, 200, 200, 200, 200, 200, 200, 200]; FilledFromTop=false
                InitialValues=[0.31, 0.387, 0.329, 0.308, 0.317, 0.33, 0.329, 0.348, 0.341, 0.345]
              CERESSoilTemperature Temperature
              Solute NO3: same as Validation.Hermitage.HE7.HE7Base.Paddock.HRS.NO3
              Solute NH4: Thickness=[100, 100, 200, 200, 200, 200, 200, 200, 200, 200]; InitialValues=[0.1, 0.1, 0.1, 0.1, 0.1, 0.1, 0.1, 0.1, 0.1, 0.1]; InitialValuesUnits=ppm; WaterTableConcentration=0; D0=0
              Solute Urea: Thickness=[100, 100, 200, 200, 200, 200, 200, 200, 200, 200]; InitialValues=[0, 0, 0, 0, 0, 0, 0, 0, 0, 0]; InitialValuesUnits=kg/ha; WaterTableConcentration=0; D0=0
            Plant Sorghum: IsEnding=false; DaysAfterEnding=0
            SurfaceOrganicMatter: InitialResidueName=wheat_stubble; InitialResidueType=wheat; InitialResidueMass=0; InitialStandingFraction=0; InitialCPR=0; InitialCNR=80
    Folder Icrisat
      Experiment BW5
        DisabledSimNames=[BW5CvM35-1FertMedIrrigHigh, BW5CvCSH13RFertMedIrrigHigh, BW5CvAtx623xRTX430FertMedIrrigHigh, BW5CvQL41xQL36FertMedIrrigHigh, BW5CvM35-1FertLowIrrigHigh, BW5CvCSH13RFertLowIrrigHigh, BW5CvAtx623xRTX430FertLowIrrigHigh, BW5CvQL41xQL36FertLowIrrigHigh, BW5CvM35-1FertHighIrrigLow, BW5CvCSH13RFertHighIrrigLow, BW5CvAtx623xRTX430FertHighIrrigLow, BW5CvQL41xQL36FertHighIrrigLow, IcrisatBW5CvM35-1FertHighIrrigLow, IcrisatBW5CvCSH13RFertHighIrrigLow, IcrisatBW5CvAtx623xRTX430FertHighIrrigLow, IcrisatBW5CvQL41xQL36FertHighIrrigLow, IcrisatBW5CvM35-1FertMedIrrigHigh, IcrisatBW5CvCSH13RFertMedIrrigHigh, IcrisatBW5CvAtx623xRTX430FertMedIrrigHigh, IcrisatBW5CvQL41xQL36FertMedIrrigHigh, IcrisatBW5CvM35-1FertLowIrrigHigh, IcrisatBW5CvCSH13RFertLowIrrigHigh, IcrisatBW5CvAtx623xRTX430FertLowIrrigHigh, IcrisatBW5CvQL41xQL36FertLowIrrigHigh]
        Memo IcrisatBW5 Description
          Experiment: BW5_GxE

          Description: Genotype x Management Environment (Rabi Sorghum)

          Start Date: 26/09/1996

          End Date: 20/02/1997

          |Treatment                  |Cultivar            |N Rates   |Irrigation      |
          |---------------------------|--------------------|----------|----------------|
          |Sorghum_BW5_GxE_T1         |M35-1               |240       |Irrigated       |
          |Sorghum_BW5_GxE_T2         |CSH13R              |240       |Irrigated       |
          |Sorghum_BW5_GxE_T3         |ATx623/RTx430       |240       |Irrigated       |
          |Sorghum_BW5_GxE_T4         |QL41/QL36           |240       |Irrigated       |
          |Sorghum_BW5_GxE_T5         |M35-1               |120       |Dryland         |
          |Sorghum_BW5_GxE_T6         |CSH13R              |120       |Dryland         |
          |Sorghum_BW5_GxE_T7         |ATx623/RTx430       |120       |Dryland         |
          |Sorghum_BW5_GxE_T8         |QL41/QL36           |120       |Dryland         |
          |Sorghum_BW5_GxE_T9         |M35-1               |10        |Dryland         |
          |Sorghum_BW5_GxE_T10        |CSH13R              |10        |Dryland         |
          |Sorghum_BW5_GxE_T11        |ATx623/RTx430       |10        |Dryland         |
          |Sorghum_BW5_GxE_T12        |QL41/QL36           |10        |Dryland         |
        Factors
          Permutation
            Factor Cv
              Specification=[SowingRule].Script.Cultivar = M35-1, CSH13R, Atx623xRTX430, QL41xQL36
            Factor Fert: Specification=[FertiliserSchedule]
              Operations High
                1996-09-27  [Fertiliser].Apply(10, Fertiliser.Types.NO3N, 50);
                1996-10-09  [Fertiliser].Apply(13, Fertiliser.Types.NO3N, 50);
                1996-10-16  [Fertiliser].Apply(99, Fertiliser.Types.NO3N, 50);
                1996-11-11  [Fertiliser].Apply(59, Fertiliser.Types.NO3N, 50);
                1996-12-11  [Fertiliser].Apply(59, Fertiliser.Types.NO3N, 50);
              Operations Med
                1996-09-27  [Fertiliser].Apply(10, Fertiliser.Types.NO3N, 50);
                1996-10-09  [Fertiliser].Apply(13, Fertiliser.Types.NO3N, 50);
                1996-10-16  [Fertiliser].Apply(99, Fertiliser.Types.NO3N, 50);
              Operations Low
                1996-09-27  [Fertiliser].Apply(10, Fertiliser.Types.NO3N, 50);
            Factor Irrig: Specification=[IrrigationSchedule]
              Operations High
                1996-11-21  [Irrigation].Apply(29);
                1996-12-02  [Irrigation].Apply(45);
                1996-12-11  [Irrigation].Apply(45);
                1997-01-08  [Irrigation].Apply(65);
                1997-01-09  [Irrigation].Apply(50);
              Operations Low
        Simulation IcrisatBW5Base
          Clock: Start=1996-09-26; End=1997-02-20
          Summary
          Weather: FileName=Met\BW5_GxE.met
          SoilArbitrator
          Zone Paddock: Area=1; Slope=0; AspectAngle=0; Altitude=50
            Report DailyReport: EventNames=[Clock].DoReport
            Report HarvestReport: EventNames=[Sorghum].Harvesting
            Folder Manager folder
              Manager SowingRule
                Date = 10/10/1996 00:00:00
                Density = 10
                Depth = 30
                Cultivar = M35-1
                RowSpacing = 500
                RowConfiguration = Solid
                TilleringMethod = FixedTillering
                Ftn = 0
                script: same as in Validation.Hermitage.HE8.HE8Base.Paddock.Manager folder.SowingRule
              Manager HarvestingRule
```csharp
using Models.Soils;
using System;
using Models.Core;
using Models.PMF;

namespace Models
{
    [Serializable]

    public class Script : Model
    {
        [Link]
        private Clock clock;

        [Link]
        private IPlant crop;

        [EventSubscribe("DoManagement")]
        private void OnDoCalculations(object sender, EventArgs e)
        {
            if (crop.IsReadyForHarvesting)
            {
                crop.Harvest();
                crop.EndCrop();
            }
        }
    }
}
```
            Operations FertiliserSchedule
            Operations IrrigationSchedule
            Fertiliser
            Irrigation
            MicroClimate: a_interception=0; b_interception=1; c_interception=0; d_interception=0; SoilHeatFluxFraction=0.4; MinimumHeightDiffForNewLayer=0; NightInterceptionFraction=0.5; ReferenceHeight=2
            Soil IC_BW5: SoilType=BW5; Site=ICRISAT; NearestTown=Unknown; Region=Hyderabad; NaturalVegetation=Unknown; Latitude=0; Longitude=0
              Physical
                Thickness  BD    AirDry  LL15  DUL   SAT
                150        1.32  0.1     0.21  0.42  0.44
                150        1.49  0.21    0.22  0.39  0.41
                150        1.54  0.23    0.24  0.36  0.38
                150        1.54  0.23    0.24  0.36  0.38
                150        1.49  0.22    0.23  0.39  0.41
                150        1.47  0.22    0.23  0.42  0.44
                150        1.38  0.22    0.23  0.43  0.45
                150        1.37  0.21    0.22  0.43  0.45
                150        1.33  0.22    0.22  0.45  0.47
                150        1.35  0.22    0.22  0.43  0.45
                150        1.35  0.22    0.22  0.43  0.45
                150        1.33  0.22    0.22  0.45  0.47
                150        1.33  0.22    0.22  0.45  0.47
                SoilCrop SorghumSoil
                  LL=[0.21, 0.22, 0.24, 0.24, 0.23, 0.23, 0.23, 0.22, 0.22, 0.22, 0.22, 0.22, 0.22]
                  KL=[0.07, 0.07, 0.07, 0.07, 0.07, 0.07, 0.07, 0.07, 0.07, 0.04, 0.04, 0.04, 0.04]
                  XF=[1, 1, 1, 1, 1, 1, 1, 1, 1, 1, 1, 1, 1]
              WaterBalance SoilWater: SummerDate=1-Nov; SummerU=6; SummerCona=3.5; WinterDate=1-Apr; WinterU=6; WinterCona=3.5; DiffusConst=40; DiffusSlope=16; Salb=0.11; CN2Bare=85; CNRed=0.8; CNCov=0.2; PSIDul=-100
                Thickness=[150, 150, 150, 150, 150, 150, 150, 150, 150, 150, 150, 150, 150]
                SWCON=[0.16, 0.11, 0.14, 0.14, 0.11, 0.11, 0.1, 0.1, 0.1, 0.12, 0.12, 0.1, 0.1]
              Nutrient
              Organic: FOMCNRatio=45; CarbonUnits=Total
                Thickness  Carbon  SoilCNRatio  FBiom  FInert  FOM
                150        0.45    14.5         0.05   0.39    216.875
                150        0.32    14.5         0.02   0.47    172.182
                150        0.29    14.5         0.01   0.52    136.699
                150        0.23    14.5         0.01   0.62    108.529
                150        0.27    14.5         0.01   0.74    86.1633
                150        0.3     14.5         0.01   0.83    68.407
                150        0.23    14.5         0.01   0.93    54.3098
                150        0.22    14.5         0.01   0.93    43.1178
                150        0.19    14.5         0.01   0.93    34.2322
                150        0.12    14.5         0.01   0.93    27.1777
                150        0.12    14.5         0.01   0.93    21.577
                150        0.14    14.5         0.01   0.93    17.1305
                150        0.14    14.5         0.01   0.93    13.6003
              Chemical: PHUnits=Water
                Thickness=[150, 150, 150, 150, 150, 150, 150, 150, 150, 150, 150, 150, 150]
                PH=[8.35, 8.52, 8.8, 8.95, 9, 9, 9, 9, 8.92, 8.97, 8.97, 8.82, 8.82]
              Water: FilledFromTop=false
                Thickness=[150, 150, 150, 150, 150, 150, 150, 150, 150, 150, 150, 150, 150]
                InitialValues=[0.281, 0.338, 0.353, 0.36, 0.39, 0.407, 0.43, 0.43, 0.45, 0.43, 0.43, 0.45, 0.45]
              CERESSoilTemperature Temperature
              Solute NO3: InitialValues=[6.1, 5.6, 4, 3.3, 3.2, 3.7, 5, 3, 3, 2, 2, 2, 2]; InitialValuesUnits=ppm; WaterTableConcentration=0; D0=0
                Thickness=[150, 150, 150, 150, 150, 150, 150, 150, 150, 150, 150, 150, 150]
              Solute NH4: InitialValuesUnits=ppm; WaterTableConcentration=0; D0=0
                Thickness=[150, 150, 150, 150, 150, 150, 150, 150, 150, 150, 150, 150, 150]
                InitialValues=[0.1, 0.1, 0.1, 0.1, 0.1, 0.1, 0.1, 0.1, 0.1, 0.1, 0.1, 0.1, 0.1]
              Solute Urea: InitialValues=[0, 0, 0, 0, 0, 0, 0, 0, 0, 0, 0, 0, 0]; InitialValuesUnits=kg/ha; WaterTableConcentration=0; D0=0
                Thickness=[150, 150, 150, 150, 150, 150, 150, 150, 150, 150, 150, 150, 150]
            Plant Sorghum: IsEnding=false; DaysAfterEnding=0
            SurfaceOrganicMatter: InitialResidueName=wheat_stubble; InitialResidueType=wheat; InitialResidueMass=0; InitialStandingFraction=0; InitialCPR=0; InitialCNR=80
      Experiment BW8
        DisabledSimNames=[BW8CvM35-1FertMedIrrigOn, BW8CvCSH13RFertMedIrrigOn, BW8CvATX623xRTX430FertMedIrrigOn, BW8CvQL41xQL36FertMedIrrigOn, BW8CvM35-1FertLowIrrigOn, BW8CvCSH13RFertLowIrrigOn, BW8CvATX623xRTX430FertLowIrrigOn, BW8CvQL41xQL36FertLowIrrigOn, BW8CvM35-1FertHighIrrigOff, BW8CvCSH13RFertHighIrrigOff, BW8CvATX623xRTX430FertHighIrrigOff, BW8CvQL41xQL36FertHighIrrigOff, IcrisatBW8CvATX623xRTX430FertHighIrrigOff, IcrisatBW8CvATX623xRTX430FertLowIrrigOn, IcrisatBW8CvATX623xRTX430FertMedIrrigOn, IcrisatBW8CvM35-1FertHighIrrigOff, IcrisatBW8CvCSH13RFertHighIrrigOff, IcrisatBW8CvATx623xRTx430FertHighIrrigOff, IcrisatBW8CvQL41xQL36FertHighIrrigOff, IcrisatBW8CvM35-1FertMedIrrigOn, IcrisatBW8CvCSH13RFertMedIrrigOn, IcrisatBW8CvATx623xRTx430FertMedIrrigOn, IcrisatBW8CvQL41xQL36FertMedIrrigOn, IcrisatBW8CvM35-1FertLowIrrigOn, IcrisatBW8CvCSH13RFertLowIrrigOn, IcrisatBW8CvATx623xRTx430FertLowIrrigOn, IcrisatBW8CvQL41xQL36FertLowIrrigOn]
        Memo BW8 Description
          Experiment: BW8_GxE

          Description: BW8 - GENO x ENVIRON (RABI SORGHUM)

          Start Date: 26/09/1996

          End Date: 20/02/1997

          |Treatment                  |Cultivar            |N Rates   |Irrigation      |
          |---------------------------|--------------------|----------|----------------|
          |Sorghum_BW8_GxE_T1         |M35-1               |240       |Irrigated       |
          |Sorghum_BW8_GxE_T2         |CSH13R              |240       |Irrigated       |
          |Sorghum_BW8_GxE_T3         |ATx623/RTx430       |240       |Irrigated       |
          |Sorghum_BW8_GxE_T4         |QL41/QL36           |240       |Irrigated       |
          |Sorghum_BW8_GxE_T5         |M35-1               |120       |Dryland         |
          |Sorghum_BW8_GxE_T6         |CSH13R              |120       |Dryland         |
          |Sorghum_BW8_GxE_T7         |ATx623/RTx430       |120       |Dryland         |
          |Sorghum_BW8_GxE_T8         |QL41/QL36           |120       |Dryland         |
          |Sorghum_BW8_GxE_T9         |M35-1               |20        |Dryland         |
          |Sorghum_BW8_GxE_T10        |CSH13R              |20        |Dryland         |
          |Sorghum_BW8_GxE_T11        |ATx623/RTx430       |20        |Dryland         |
          |Sorghum_BW8_GxE_T12        |QL41/QL36           |20        |Dryland         |
        Factors
          Permutation
            Factor Cv
              Specification=[SowingRule].Script.Cultivar = M35-1, CSH13R, ATX623xRTX430, QL41xQL36
            Factor Fert: Specification=[FertiliserSchedule]
              Operations High
                1996-09-25  [Fertiliser].Apply(20, Fertiliser.Types.NO3N, 50);
                1996-10-17  [Fertiliser].Apply(99, Fertiliser.Types.NO3N, 50);
                1996-11-06  [Fertiliser].Apply(59, Fertiliser.Types.NO3N, 50);
                1996-12-10  [Fertiliser].Apply(59, Fertiliser.Types.NO3N, 50);
              Operations Med
                1996-09-25  [Fertiliser].Apply(20, Fertiliser.Types.NO3N, 50);
                1996-10-17  [Fertiliser].Apply(99, Fertiliser.Types.NO3N, 50);
              Operations Low
                1996-09-25  [Fertiliser].Apply(20, Fertiliser.Types.NO3N, 50);
            Factor Irrig: Specification=[IrrigationSchedule]
              Operations On
                1996-11-19  [Irrigation].Apply(28);
                1996-11-28  [Irrigation].Apply(58);
                1996-12-10  [Irrigation].Apply(49);
                1996-12-24  [Irrigation].Apply(57);
                1997-01-07  [Irrigation].Apply(67);
              Operations Off
        Simulation IcrisatBW8Base
          Clock: Start=1996-09-26; End=1997-02-20
          Summary
          Weather: FileName=Met\BW8_GxE.met
          SoilArbitrator
          Zone Paddock: Area=1; Slope=0; AspectAngle=0; Altitude=50
            Report DailyReport
            Report HarvestReport
            Folder Manager folder
              Manager SowingRule
                Cultivar = M35-1
                Date = 10/07/1996 00:00:00
                Density = 10
                Depth = 30
                RowSpacing = 500
                RowConfiguration = Solid
                TilleringMethod = FixedTillering
                Ftn = 0
                script: same as in Validation.Hermitage.HE8.HE8Base.Paddock.Manager folder.SowingRule
              Manager HarvestingRule: same as Validation.Hermitage.HE1.HE1Base.Paddock.Manager folder.HarvestingRule
            Operations FertiliserSchedule
            Operations IrrigationSchedule
            Fertiliser
            Irrigation
            MicroClimate: a_interception=0; b_interception=1; c_interception=0; d_interception=0; SoilHeatFluxFraction=0.4; MinimumHeightDiffForNewLayer=0; NightInterceptionFraction=0.5; ReferenceHeight=2
            Soil IC_BW8: SoilType=BW8; Site=ICRISAT; NearestTown=Unknown; Region=Hyderabad; NaturalVegetation=Unknown; Latitude=0; Longitude=0
              Water: Thickness=[150, 150, 150, 150, 150, 150, 150, 150, 150, 300, 300]; FilledFromTop=true
                InitialValues=[0.32, 0.35, 0.35, 0.28, 0.31, 0.25, 0.13, 0.12, 0.13, 0.13, 0.13]
              Physical
                Thickness  BD    AirDry  LL15  DUL   SAT
                150        1.49  0.12    0.16  0.32  0.43
                150        1.41  0.15    0.19  0.35  0.46
                150        1.41  0.15    0.19  0.35  0.46
                150        1.56  0.1     0.14  0.28  0.41
                150        1.49  0.11    0.15  0.31  0.43
                150        1.52  0.13    0.17  0.33  0.42
                150        1.61  0.09    0.13  0.26  0.39
                150        1.68  0.08    0.12  0.22  0.36
                150        1.63  0.09    0.13  0.24  0.38
                300        1.62  0.09    0.13  0.24  0.38
                300        1.62  0.09    0.13  0.24  0.38
                SoilCrop SorghumSoil
                  LL=[0.16, 0.19, 0.19, 0.14, 0.15, 0.17, 0.13, 0.12, 0.13, 0.13, 0.13]
                  KL=[0.07, 0.07, 0.07, 0.07, 0.07, 0.07, 0.07, 0.07, 0.07, 0.04, 0.04]
                  XF=[1, 1, 1, 1, 1, 1, 1, 1, 1, 1, 1]
              WaterBalance SoilWater: SummerDate=1-Nov; SummerU=6; SummerCona=3.5; WinterDate=1-Apr; WinterU=6; WinterCona=3.5; DiffusConst=40; DiffusSlope=16; Salb=0.11; CN2Bare=85; CNRed=0.8; CNCov=0.2; PSIDul=-100; Thickness=[150, 150, 150, 150, 150, 150, 150, 150, 150, 300, 300]
                SWCON=[0.16, 0.11, 0.14, 0.14, 0.11, 0.11, 0.1, 0.1, 0.1, 0.12, 0.1]
              Nutrient
              Organic: FOMCNRatio=45; CarbonUnits=Total
                Thickness  Carbon  SoilCNRatio  FBiom  FInert  FOM
                150        0.49    14.5         0.05   0.39    226.93
                150        0.45    14.5         0.02   0.47    180.165
                150        0.28    14.5         0.01   0.52    143.037
                150        0.18    14.5         0.01   0.62    113.56
                150        0.14    14.5         0.01   0.74    90.158
                150        0.11    14.5         0.01   0.83    71.5785
                150        0.09    14.5         0.01   0.93    56.8278
                150        0.07    14.5         0.01   0.93    45.1169
                150        0.06    14.5         0.01   0.93    35.8193
                300        0.05    14.5         0.01   0.93    22.5774
                300        0.03    14.5         0.01   0.93    14.2308
              Chemical: Thickness=[150, 150, 150, 150, 150, 150, 150, 150, 150, 300, 300]; PH=[8.35, 8.52, 8.8, 8.95, 9, 9, 9, 9, 8.92, 8.97, 8.82]; PHUnits=Water
              CERESSoilTemperature Temperature
              Solute NO3: Thickness=[150, 150, 150, 150, 150, 150, 150, 150, 150, 300, 300]; InitialValues=[9, 11, 8, 6, 4, 3, 3, 3, 6, 4, 5]; InitialValuesUnits=ppm; WaterTableConcentration=0; D0=0
              Solute NH4: Thickness=[150, 150, 150, 150, 150, 150, 150, 150, 150, 300, 300]; InitialValues=[0.1, 0.1, 0.1, 0.1, 0.1, 0.1, 0.1, 0.1, 0.1, 0.1, 0.1]; InitialValuesUnits=ppm; WaterTableConcentration=0; D0=0
              Solute Urea: Thickness=[150, 150, 150, 150, 150, 150, 150, 150, 150, 300, 300]; InitialValues=[0, 0, 0, 0, 0, 0, 0, 0, 0, 0, 0]; InitialValuesUnits=kg/ha; WaterTableConcentration=0; D0=0
            Plant Sorghum: IsEnding=false; DaysAfterEnding=0
            SurfaceOrganicMatter: InitialResidueName=wheat_stubble; InitialResidueType=wheat; InitialResidueMass=0; InitialStandingFraction=0; InitialCPR=0; InitialCNR=80
    Folder Lawes
      Experiment LE13
        Memo LE13 Description
          Experiment: LE13

          Description: 2 Cultivars x 2 Water regimes x 2 N Potential Yield

          Start Date: 28/11/1995

          End Date: 1/05/1996

          |SimulationName                    |Irrigation                              |N Rates     |Cultivar|
          |----------------------------------|----------------------------------------|------------|--------|
          |Lawes1995FertLowirrigOffCvBuster  |Irrigation to establish & fert inco     |10 N        |Buster  |
          |Lawes1995FertHighIrrigOffCvBuster |Irrigation to establish & fert inco     |240 N       |Buster  |
          |Lawes1995FertHighIrrigOnCvBuster  |Irrigated                               |240 N       |Buster  |
          |Lawes1995FertLowIrrigOffCvM351    |Irrigation to establish & fert inco     |10 N        |M35-1   |
          |Lawes1995FertHighIrrigOffCvM351   |Irrigation to establish & fert inco     |240 N       |M35-1   |
          |Lawes1995FertHighIrrigOnCvM351    |Irrigated                               |240 N       |M35-1   |
        Factors
          CompositeFactor FertLowIrrigOffCvBuster
            Specifications:
              [SowingRule].Script.Cultivar = Buster
              [SowingRule].Script.Ftn = 0
              [FertiliserSchedule]
              [IrrigationSchedule]
            Operations FertiliserSchedule
            Operations IrrigationSchedule
              1995-11-29  [Irrigation].Apply(14);
              1995-12-01  [Irrigation].Apply(10);
              1995-12-03  [Irrigation].Apply(13);
              1995-12-05  [Irrigation].Apply(8);
              1996-02-07  [Irrigation].Apply(6);
          CompositeFactor FertHighIrrigOffCvBuster
            Specifications:
              [SowingRule].Script.Cultivar = Buster
              [SowingRule].Script.Ftn = 0.35
              [FertiliserSchedule]
              [IrrigationSchedule]
            Operations FertiliserSchedule
              1995-11-29  [Fertiliser].Apply(119, Fertiliser.Types.NO3N, 50);
              1995-12-28  [Fertiliser].Apply(59, Fertiliser.Types.NO3N, 50);
              1996-02-07  [Fertiliser].Apply(59, Fertiliser.Types.NO3N, 50);
              1995-11-28  [Fertiliser].Apply(0, Fertiliser.Types.NO3N, 50);
              1995-11-28  [Fertiliser].Apply(122, Fertiliser.Types.NO3N, 50);
            Operations IrrigationSchedule: same as Validation.Lawes.LE13.Factors.FertLowIrrigOffCvBuster.IrrigationSchedule
          CompositeFactor FertHighIrrigOnCvBuster
            Specifications:
              [SowingRule].Script.Cultivar = Buster
              [SowingRule].Script.Ftn = 0.2
              [FertiliserSchedule]
              [IrrigationSchedule]
            Operations FertiliserSchedule
              1995-11-28  [Fertiliser].Apply(122, Fertiliser.Types.NO3N, 50);
              1995-12-28  [Fertiliser].Apply(59, Fertiliser.Types.NO3N, 50);
              1996-02-07  [Fertiliser].Apply(59, Fertiliser.Types.NO3N, 50);
              1995-11-28  [Fertiliser].Apply(0, Fertiliser.Types.NO3N, 50);
            Operations IrrigationSchedule
              1995-11-29  [Irrigation].Apply(14);
              1995-12-01  [Irrigation].Apply(10);
              1995-12-03  [Irrigation].Apply(13);
              1995-12-05  [Irrigation].Apply(8);
              1996-02-07  [Irrigation].Apply(6);
              1996-02-12  [Irrigation].Apply(33);
              1996-02-26  [Irrigation].Apply(20);
              1996-03-06  [Irrigation].Apply(18);
              1996-03-18  [Irrigation].Apply(25);
          CompositeFactor FertLowIrrigOffCvM351
            Specifications:
              [SowingRule].Script.Cultivar = M35-1
              [SowingRule].Script.Ftn = 0.2
              [FertiliserSchedule]
              [IrrigationSchedule]
            Operations FertiliserSchedule
              1995-11-28  [Fertiliser].Apply(12, Fertiliser.Types.NO3N, 50);
            Operations IrrigationSchedule: same as Validation.Lawes.LE13.Factors.FertLowIrrigOffCvBuster.IrrigationSchedule
          CompositeFactor FertHighIrrigOffCvM351
            Specifications:
              [SowingRule].Script.Cultivar = M35-1
              [SowingRule].Script.Ftn = 0
              [FertiliserSchedule]
              [IrrigationSchedule]
            Operations FertiliserSchedule: same as Validation.Lawes.LE13.Factors.FertHighIrrigOffCvBuster.FertiliserSchedule
            Operations IrrigationSchedule: same as Validation.Lawes.LE13.Factors.FertLowIrrigOffCvBuster.IrrigationSchedule
          CompositeFactor FertHighIrrigOnCvM351
            Specifications:
              [SowingRule].Script.Cultivar = M35-1
              [SowingRule].Script.Ftn = 0
              [FertiliserSchedule]
              [IrrigationSchedule]
            Operations FertiliserSchedule: same as Validation.Lawes.LE13.Factors.FertHighIrrigOnCvBuster.FertiliserSchedule
            Operations IrrigationSchedule: same as Validation.Lawes.LE13.Factors.FertHighIrrigOnCvBuster.IrrigationSchedule
        Simulation Lawes1995Base
          Clock: Start=1995-11-28; End=1996-05-01
          Summary
          Weather: FileName=Met\LE13.met
          SoilArbitrator
          Zone Paddock: Area=1; Slope=0; AspectAngle=0; Altitude=50
            Report DailyReport
              VariableNames:
                GrainTempFactor
                GrainTempFactor
            Report HarvestReport: EventNames=[Sorghum].Harvesting
            Folder Manager folder
              Manager SowingRule
                Date = 11/29/1995 00:00:00
                Density = 16
                Depth = 20
                Cultivar = Buster
                RowSpacing = 500
                RowConfiguration = Solid
                TilleringMethod = FixedTillering
                Ftn = 0
                script: same as in Validation.Hermitage.HE8.HE8Base.Paddock.Manager folder.SowingRule
              Manager HarvestingRule: same as Validation.Hermitage.HE1.HE1Base.Paddock.Manager folder.HarvestingRule
            Operations FertiliserSchedule
            Operations IrrigationSchedule
            Irrigation
            Fertiliser
            MicroClimate: a_interception=0; b_interception=1; c_interception=0; d_interception=0; SoilHeatFluxFraction=0.4; MinimumHeightDiffForNewLayer=0; NightInterceptionFraction=0.5; ReferenceHeight=2
            Soil GLH Field: SoilType=GLHSoil; Site=Cooper Lab; NearestTown=Unknown; Region=Gatton; NaturalVegetation=Unknown; Latitude=0; Longitude=0
              Physical
                Thickness  BD    AirDry  LL15  DUL   SAT
                200        1.32  0.1     0.3   0.41  0.46
                200        1.3   0.15    0.3   0.43  0.48
                200        1.23  0.28    0.35  0.46  0.51
                300        1.27  0.28    0.32  0.44  0.49
                300        1.37  0.28    0.29  0.4   0.45
                300        1.35  0.3     0.31  0.41  0.46
                300        1.35  0.3     0.31  0.38  0.43
                SoilCrop SorghumSoil: LL=[0.3, 0.3, 0.35, 0.32, 0.29, 0.31, 0.31]; KL=[0.08, 0.08, 0.08, 0.08, 0.06, 0.04, 0.02]; XF=[1, 1, 1, 1, 1, 1, 1]
              WaterBalance SoilWater: SummerDate=1-Nov; SummerU=6; SummerCona=3.5; WinterDate=1-Apr; WinterU=6; WinterCona=3.5; DiffusConst=88; DiffusSlope=35.4; Salb=0.13; CN2Bare=91; CNRed=20; CNCov=0.8; PSIDul=-100; Thickness=[200, 200, 200, 300, 300, 300, 300]; SWCON=[0.5, 0.5, 0.5, 0.5, 0.5, 0.5, 0.5]
              Nutrient
              Organic: FOMCNRatio=30; CarbonUnits=Total
                Thickness  Carbon  SoilCNRatio  FBiom  FInert  FOM
                200        1.3     12.5         0.03   0.31    514.709
                200        0.65    12.5         0.01   0.38    368.805
                200        0.32    12.5         0      0.47    264.26
                300        0.11    12.5         0      0.7     160.282
                300        0.11    12.5         0      0.9     97.2159
                300        0.11    12.5         0      0.95    58.9644
                300        0.11    12.5         0      0.95    35.7637
              Chemical: Thickness=[200, 200, 200, 300, 300, 300, 300]; PH=[8.2, 8.7, 8.9, 8.1, 8, 8, 8]; PHUnits=Water
              Water: Thickness=[200, 200, 200, 300, 300, 300, 300]; InitialValues=[0.385, 0.47, 0.467, 0.459, 0.394, 0.399, 0.38]; FilledFromTop=false
              CERESSoilTemperature Temperature
              Solute NO3: Thickness=[200, 200, 200, 300, 300, 300, 300]; InitialValues=[9, 2.48, 2.79, 1.28, 2.98, 2.965, 1.387]; InitialValuesUnits=ppm; WaterTableConcentration=0; D0=0
              Solute NH4: Thickness=[200, 200, 200, 300, 300, 300, 300]; InitialValues=[0.1, 0.1, 0.1, 0.1, 0.1, 0.1, 0.1]; InitialValuesUnits=ppm; WaterTableConcentration=0; D0=0
              Solute Urea: Thickness=[200, 200, 200, 300, 300, 300, 300]; InitialValues=[0, 0, 0, 0, 0, 0, 0]; InitialValuesUnits=kg/ha; WaterTableConcentration=0; D0=0
            Plant Sorghum: IsEnding=false; DaysAfterEnding=0
            SurfaceOrganicMatter: InitialResidueName=wheat_stubble; InitialResidueType=wheat; InitialResidueMass=0; InitialStandingFraction=0; InitialCPR=0; InitialCNR=80
      Experiment LE14
        Memo LE14 Description
          Experiment: LE14

          Description: Early Sow - 3 Indian/Aust Cultivars

          Start Date: 5/09/1996

          End Date: 19/02/1997

          |SimulationName             |Cultivar |
          |---------------------------|---------|
          |Lawes1996EarlyCvBuster     |Buster   |
          |Lawes1996EarlyCvM351       |M35-1    |
          |Lawes1996EarlyCvQL41xQL36  |QL41xQL36|
        Factors
          Factor Cv
            CompositeFactor Buster: Specifications=[SowingRule].Script.Cultivar = Buster
            CompositeFactor M35-1
              Specifications:
                [SowingRule].Script.Cultivar = M35-1
                [SowingRule].Script.Ftn = 0.1
            CompositeFactor QL41xQL36: Specifications=[SowingRule].Script.Cultivar = QL41xQL36
        Simulation Lawes1996EarlyBase
          Clock: Start=1996-09-05; End=1997-02-19
          Summary
          Weather: FileName=Met\LE14.met
          SoilArbitrator
          Zone Paddock: Area=1; Slope=0; AspectAngle=0; Altitude=50
            Report DailyReport
            Report HarvestReport
            Folder Manager folder
              Manager SowingRule
                Date = 10/11/1996 00:00:00
                Density = 10
                Depth = 20
                Cultivar = Buster
                RowSpacing = 500
                RowConfiguration = Solid
                TilleringMethod = FixedTillering
                Ftn = 0.4
                script: same as in Validation.Hermitage.HE8.HE8Base.Paddock.Manager folder.SowingRule
              Manager HarvestingRule: same as Validation.Hermitage.HE1.HE1Base.Paddock.Manager folder.HarvestingRule
            Operations
              1996-09-06  [Fertiliser].Apply(0, Fertiliser.Types.NO3N, 50);
              1996-09-06  [Fertiliser].Apply(126, Fertiliser.Types.NO3N, 50);
              1996-09-16  [Fertiliser].Apply(105, Fertiliser.Types.NO3N, 50);
              1996-11-15  [Fertiliser].Apply(73, Fertiliser.Types.NO3N, 50);
              1996-12-31  [Fertiliser].Apply(59, Fertiliser.Types.NO3N, 50);
            Manager Automatic irrigation based on water deficit
              AutoIrrigationOn = True
              FASWThreshold = 1
              FASWDepth = 1800
```csharp
using Models.Interfaces;
using System;
using Models.Core;
using System.Collections.Generic;
using System.Text;
using Models.Soils;
using Models.PMF;
using Models;
using System.Xml.Serialization;
using APSIM.Shared.Utilities;

namespace Models
{
    [Serializable] 
    public class Script : Model
    {
        [Link] private Zone zone;
        [Link] private Irrigation irrigation;
        [Link] private Soil soil;
        [Link]
        private IPhysical soilPhysical;
        [Link]
        private ISoilWater waterBalance;
        public double FASW { get; set; }
        public double WaterDeficit  { get; set; }
    
        
        [Description("Auto irrigation on?")]
        public bool AutoIrrigationOn { get; set; }

        [Description("Threshold fraction available water (0-1)")]
        public double FASWThreshold { get; set; }

        [Description("Soil depth (mm) to which fraction available water is calculated")]
        public double FASWDepth { get; set; }

        [EventSubscribe("DoManagement")]
        private void OnDoManagement(object sender, EventArgs e)
        {
            CalculateFASW();
            if (AutoIrrigationOn)
            {
                if (FASW < FASWThreshold)
                {
                    double amount = 10;
                    irrigation.Apply(WaterDeficit, depth: 0);
                }
            }
        }
        
        private void CalculateFASW()
        {
            double[] LL15 = MathUtilities.Multiply(soilPhysical.LL15, soilPhysical.Thickness);
            double[] DUL = MathUtilities.Multiply(soilPhysical.DUL, soilPhysical.Thickness);
        
            int nlayr = GetLayerIndex();
            double cumdep = MathUtilities.Sum(soilPhysical.Thickness, 0, nlayr, 0.0);

            double excess_fr = MathUtilities.Divide((cumdep - FASWDepth), soilPhysical.Thickness[nlayr], 0.0);

            // note that results may be strange if swdep < ll15
            double avail_sw = (MathUtilities.Sum(waterBalance.SWmm, 0, nlayr, 0.0)
                              - excess_fr * waterBalance.SWmm[nlayr])
                              - (MathUtilities.Sum(LL15, 0, nlayr, 0.0)
                              - excess_fr * LL15[nlayr]);


            double pot_avail_sw = (MathUtilities.Sum(DUL, 0, nlayr, 0.0)
                                  - excess_fr * DUL[nlayr])
                                  - (MathUtilities.Sum(LL15, 0, nlayr, 0.0)
                                  - excess_fr * LL15[nlayr]);

            FASW = MathUtilities.Divide(avail_sw, pot_avail_sw, 0.0);
            WaterDeficit = MathUtilities.Constrain(pot_avail_sw - avail_sw, 0.0, 100000);
        }

        private int GetLayerIndex()
        {
            double[] cumThickness = soilPhysical.ThicknessCumulative;
            for (int i = 1; i < cumThickness.Length; i++)
            {
                if (FASWDepth < cumThickness[i])
                    return i - 1;
            }
            
            return cumThickness.Length - 1;
        }

    }
}
```
            Irrigation
            Fertiliser
            MicroClimate: a_interception=0; b_interception=1; c_interception=0; d_interception=0; SoilHeatFluxFraction=0.4; MinimumHeightDiffForNewLayer=0; NightInterceptionFraction=0.5; ReferenceHeight=2
            Soil GLH Field: SoilType=GLHSoil; Site=Cooper Lab; NearestTown=Unknown; Region=Gatton; NaturalVegetation=Unknown; Latitude=0; Longitude=0
              Physical: same as Validation.Lawes.LE13.Lawes1995Base.Paddock.GLH Field.Physical
              WaterBalance SoilWater: same as Validation.Lawes.LE13.Lawes1995Base.Paddock.GLH Field.SoilWater
              Nutrient
              Organic: same as Validation.Lawes.LE13.Lawes1995Base.Paddock.GLH Field.Organic
              Chemical: Thickness=[200, 200, 200, 300, 300, 300, 300]; PH=[8.2, 8.7, 8.9, 8.1, 8, 8, 8]; PHUnits=Water
              Water: Thickness=[200, 200, 200, 300, 300, 300, 300]; InitialValues=[0.385, 0.47, 0.467, 0.459, 0.394, 0.399, 0.38]; FilledFromTop=false
              CERESSoilTemperature Temperature
              Solute NO3: Thickness=[200, 200, 200, 300, 300, 300, 300]; InitialValues=[11.624, 5.732, 2.974, 1.645, 1.902, 2.246, 1.942]; InitialValuesUnits=ppm; WaterTableConcentration=0; D0=0
              Solute NH4: Thickness=[200, 200, 200, 300, 300, 300, 300]; InitialValues=[0.1, 0.1, 0.1, 0.1, 0.1, 0.1, 0.1]; InitialValuesUnits=ppm; WaterTableConcentration=0; D0=0
              Solute Urea: Thickness=[200, 200, 200, 300, 300, 300, 300]; InitialValues=[0, 0, 0, 0, 0, 0, 0]; InitialValuesUnits=kg/ha; WaterTableConcentration=0; D0=0
            Plant Sorghum: IsEnding=false; DaysAfterEnding=0
            SurfaceOrganicMatter: InitialResidueName=wheat_stubble; InitialResidueType=wheat; InitialResidueMass=0; InitialStandingFraction=0; InitialCPR=0; InitialCNR=80
      Experiment LE15
        Memo LE15 Description
          Experiment: LE15

          Description: Late Sow - 3 Indian/Aust Cultivars

          Start Date: 5/09/1996

          End Date: 8/05/1997

          |SimulationName             |Cultivar |
          |---------------------------|---------|
          |Lawes1996LateCvBuster      |Buster   |
          |Lawes1996LateCvM351       |M35-1    |
          |Lawes1996LateCvQL41xQL36   |QL41xQL36|
        Factors
          Factor Cv
            CompositeFactor Buster
              Specifications:
                [SowingRule].Script.Cultivar = Buster
                [SowingRule].Script.Ftn = 0.5
            CompositeFactor M35-1
              Specifications:
                [SowingRule].Script.Cultivar = M35-1
                [SowingRule].Script.Ftn = 0
            CompositeFactor QL41xQL36
              Specifications:
                [SowingRule].Script.Cultivar = QL41xQL36
                [SowingRule].Script.Ftn = 0.5
        Simulation Lawes1996LateBase
          Clock: Start=1996-09-05; End=1997-05-08
          Summary
          Weather: FileName=Met\LE15.met
          SoilArbitrator
          Zone Paddock: Area=1; Slope=0; AspectAngle=0; Altitude=50
            Report DailyReport
            Report HarvestReport
            Folder Manager folder
              Manager SowingRule
                Date = 01/06/1997 00:00:00
                Density = 10
                Depth = 25
                Cultivar = Buster
                RowSpacing = 500
                RowConfiguration = Solid
                TilleringMethod = FixedTillering
                Ftn = 0.5
                script: same as in Validation.Hermitage.HE8.HE8Base.Paddock.Manager folder.SowingRule
              Manager HarvestingRule: same as Validation.Hermitage.HE1.HE1Base.Paddock.Manager folder.HarvestingRule
            Operations
              1997-01-06  [Irrigation].Apply(31);
              1997-01-08  [Irrigation].Apply(14);
              1997-01-10  [Irrigation].Apply(14);
              1997-01-12  [Irrigation].Apply(14);
              1997-01-14  [Irrigation].Apply(11);
              1997-01-17  [Irrigation].Apply(14);
              1997-01-20  [Irrigation].Apply(7);
              1997-01-22  [Irrigation].Apply(8);
              1997-01-24  [Irrigation].Apply(17);
              1997-02-04  [Irrigation].Apply(8);
              1997-02-12  [Irrigation].Apply(24);
              1997-02-26  [Irrigation].Apply(29);
              1997-03-11  [Irrigation].Apply(22);
              1997-03-19  [Irrigation].Apply(27);
              1997-03-27  [Irrigation].Apply(25);
              1997-04-03  [Irrigation].Apply(20);
              1997-04-09  [Irrigation].Apply(32);
              1997-04-18  [Irrigation].Apply(35);
              1997-04-27  [Irrigation].Apply(22);
              1997-01-03  [Fertiliser].Apply(0, Fertiliser.Types.NO3N, 50);
              1997-01-03  [Fertiliser].Apply(45, Fertiliser.Types.NO3N, 50);
              1997-01-03  [Fertiliser].Apply(116, Fertiliser.Types.NO3N, 50);
              1997-02-04  [Fertiliser].Apply(59, Fertiliser.Types.NO3N, 50);
              1997-03-11  [Fertiliser].Apply(59, Fertiliser.Types.NO3N, 50);
            Irrigation
            Fertiliser
            MicroClimate: a_interception=0; b_interception=1; c_interception=0; d_interception=0; SoilHeatFluxFraction=0.4; MinimumHeightDiffForNewLayer=0; NightInterceptionFraction=0.5; ReferenceHeight=2
            Soil GLH Field: SoilType=GLHSoil; Site=Cooper Lab; NearestTown=Unknown; Region=Gatton; NaturalVegetation=Unknown; Latitude=0; Longitude=0
              Physical: same as Validation.Lawes.LE13.Lawes1995Base.Paddock.GLH Field.Physical
              WaterBalance SoilWater: same as Validation.Lawes.LE13.Lawes1995Base.Paddock.GLH Field.SoilWater
              Nutrient
              Organic: same as Validation.Lawes.LE13.Lawes1995Base.Paddock.GLH Field.Organic
              Chemical: Thickness=[200, 200, 200, 300, 300, 300, 300]; PH=[8.2, 8.7, 8.9, 8.1, 8, 8, 8]; PHUnits=Water
              Water: Thickness=[200, 200, 200, 300, 300, 300, 300]; InitialValues=[0.39, 0.47, 0.479, 0.422, 0.393, 0.379, 0.405]; FilledFromTop=false
              CERESSoilTemperature Temperature
              Solute NO3: Thickness=[200, 200, 200, 300, 300, 300, 300]; InitialValues=[11.624, 5.732, 2.974, 1.645, 1.902, 2.246, 1.942]; InitialValuesUnits=ppm; WaterTableConcentration=0; D0=0
              Solute NH4: Thickness=[200, 200, 200, 300, 300, 300, 300]; InitialValues=[0.1, 0.1, 0.1, 0.1, 0.1, 0.1, 0.1]; InitialValuesUnits=ppm; WaterTableConcentration=0; D0=0
              Solute Urea: Thickness=[200, 200, 200, 300, 300, 300, 300]; InitialValues=[0, 0, 0, 0, 0, 0, 0]; InitialValuesUnits=kg/ha; WaterTableConcentration=0; D0=0
            Plant Sorghum: IsEnding=false; DaysAfterEnding=0
            SurfaceOrganicMatter: InitialResidueName=wheat_stubble; InitialResidueType=wheat; InitialResidueMass=0; InitialStandingFraction=0; InitialCPR=0; InitialCNR=80
      Experiment LE17
        Memo LE17 Description
          Experiment: LE17

          Description: LE17 Growth Analysis- Late Sow - 2 Indian/ 1 Aust. Cultivars

          Start Date: 27/11/1997

          End Date: 27/04/1998

          |SimulationName             |Cultivar|
          |---------------------------|--------|
          |Lawes1997LateCvBuster      |Buster  |
          |Lawes1997LateCvM351        |M35-1   |
          |Lawes1997LateCvCSH13R      |CSH13R  |
        Factors
          Factor Cv
            CompositeFactor Buster: Specifications=[SowingRule].Script.Cultivar = Buster
            CompositeFactor M35-1: Specifications=[SowingRule].Script.Cultivar = M35-1
            CompositeFactor CSH13R: Specifications=[SowingRule].Script.Cultivar = CSH13R
        Simulation Lawes1997LateBase
          Clock: Start=1997-11-27; End=1998-04-09
          Summary
          Weather: FileName=Met\LE17.met
          SoilArbitrator
          Zone Paddock: Area=1; Slope=0; AspectAngle=0; Altitude=50
            Report DailyReport
            Report HarvestReport
            Folder Manager folder
              Manager SowingRule
                Date = 12/04/1997 00:00:00
                Density = 10
                Depth = 25
                Cultivar = Buster
                RowSpacing = 500
                RowConfiguration = Solid
                TilleringMethod = FixedTillering
                Ftn = 0
                script: same as in Validation.Hermitage.HE8.HE8Base.Paddock.Manager folder.SowingRule
              Manager HarvestingRule: same as Validation.Hermitage.HE1.HE1Base.Paddock.Manager folder.HarvestingRule
            Operations
              1997-12-04  [Irrigation].Apply(72);
              1997-12-17  [Irrigation].Apply(22);
              1997-12-29  [Irrigation].Apply(27);
              1998-01-06  [Irrigation].Apply(44);
              1998-01-19  [Irrigation].Apply(40);
              1998-02-10  [Irrigation].Apply(17);
              1998-03-05  [Irrigation].Apply(43);
              1998-03-18  [Irrigation].Apply(37);
              1997-12-03  [Fertiliser].Apply(0, Fertiliser.Types.NO3N, 50);
              1997-12-03  [Fertiliser].Apply(40, Fertiliser.Types.NO3N, 50);
              1997-12-04  [Fertiliser].Apply(147, Fertiliser.Types.NO3N, 50);
              1998-01-06  [Fertiliser].Apply(59, Fertiliser.Types.NO3N, 50);
              1998-02-10  [Fertiliser].Apply(59, Fertiliser.Types.NO3N, 50);
            Irrigation
            Fertiliser
            MicroClimate: a_interception=0; b_interception=1; c_interception=0; d_interception=0; SoilHeatFluxFraction=0.4; MinimumHeightDiffForNewLayer=0; NightInterceptionFraction=0.5; ReferenceHeight=2
            Soil CooperLab: SoilType=Gatton; Site=Gatton CSIRO; NearestTown=Unknown; Region=SE Queensland; NaturalVegetation=Unknown; Latitude=0; Longitude=0
              Physical: same as Validation.Lawes.LE13.Lawes1995Base.Paddock.GLH Field.Physical
              WaterBalance SoilWater: same as Validation.Lawes.LE13.Lawes1995Base.Paddock.GLH Field.SoilWater
              Nutrient
              Organic: same as Validation.Lawes.LE13.Lawes1995Base.Paddock.GLH Field.Organic
              Chemical: Thickness=[200, 200, 200, 300, 300, 300, 300]; PH=[7.7, 8.3, 8.4, 8.5, 8.5, 8.5, 8.6]; PHUnits=Water
              Water: Thickness=[200, 200, 200, 300, 300, 300, 300]; InitialValues=[0.34, 0.412, 0.439, 0.434, 0.405, 0.399, 0.389]; FilledFromTop=false
              CERESSoilTemperature Temperature
              Solute NO3: Thickness=[200, 200, 200, 300, 300, 300, 300]; InitialValues=[5.187, 2.413, 6.5, 6.344, 6.814, 6.703, 3.092]; InitialValuesUnits=ppm; WaterTableConcentration=0; D0=0
              Solute NH4: Thickness=[200, 200, 200, 300, 300, 300, 300]; InitialValues=[0.1, 0.1, 0.1, 0.1, 0.1, 0.1, 0.1]; InitialValuesUnits=ppm; WaterTableConcentration=0; D0=0
              Solute Urea: Thickness=[200, 200, 200, 300, 300, 300, 300]; InitialValues=[0, 0, 0, 0, 0, 0, 0]; InitialValuesUnits=kg/ha; WaterTableConcentration=0; D0=0
            Plant Sorghum: IsEnding=false; DaysAfterEnding=0
            Manager AutoIrrigation
              AutoIrrigationOn = False
              FASWThreshold = 0.5
              FASWDepth = 600
              script: same as in Validation.Lawes.LE14.Lawes1996EarlyBase.Paddock.Automatic irrigation based on water deficit
            SurfaceOrganicMatter: InitialResidueName=wheat_stubble; InitialResidueType=wheat; InitialResidueMass=0; InitialStandingFraction=0; InitialCPR=0; InitialCNR=80
      Experiment LE19
        Memo LE19 Description
          Experiment: LE19

          Description: LE19 - Genotypic variation in Radiation Use Efficiency

          Start Date: 9/11/1998

          End Date: 7/03/1999

          |SimulationName             |N Rates        |Cultivar|
          |---------------------------|---------------|--------|
          |Lawes1998FertOffBuster     |0 kg/ha        |Buster  |
          |Lawes1998FertLowBuster     |120 kg/ha      |Buster  |
          |Lawes1998FertMedBuster     |240 kg/ha      |Buster  |
          |Lawes1998FertHighBuster    |360 kg/ha      |Buster  |
          |Lawes1998FertOffCSH13R     |0 kg/ha        |CSH13R  |
          |Lawes1998FertLowCSH13R     |120 kg/ha      |CSH13R  |
          |Lawes1998FertMedCSH13R     |240 kg/ha      |CSH13R  |
          |Lawes1998FertHighCSH13R    |360 kg/ha      |CSH13R  |
        Factors
          CompositeFactor FertOffCvBuster
            Specifications:
              [SowingRule].Script.Cultivar = Buster
              [SowingRule].Script.Ftn = 0
              [FertiliserSchedule]
            Operations FertiliserSchedule
          CompositeFactor FertLowCvBuster
            Specifications:
              [SowingRule].Script.Cultivar = Buster
              [SowingRule].Script.Ftn = 0.2
              [FertiliserSchedule]
            Operations FertiliserSchedule
              1998-11-11  [Fertiliser].Apply(55, Fertiliser.Types.NO3N, 50);
          CompositeFactor FertMedCvBuster
            Specifications:
              [SowingRule].Script.Cultivar = Buster
              [SowingRule].Script.Ftn = 0.3
              [FertiliserSchedule]
            Operations FertiliserSchedule
              1998-11-11  [Fertiliser].Apply(55, Fertiliser.Types.NO3N, 50);
              1998-12-13  [Fertiliser].Apply(27, Fertiliser.Types.NO3N, 50);
              1999-01-14  [Fertiliser].Apply(27, Fertiliser.Types.NO3N, 50);
          CompositeFactor FertHighCvBuster
            Specifications:
              [SowingRule].Script.Cultivar = Buster
              [SowingRule].Script.Ftn = 0.4
              [FertiliserSchedule]
            Operations FertiliserSchedule
              1998-11-11  [Fertiliser].Apply(55, Fertiliser.Types.NO3N, 50);
              1998-12-13  [Fertiliser].Apply(55, Fertiliser.Types.NO3N, 50);
              1999-01-14  [Fertiliser].Apply(55, Fertiliser.Types.NO3N, 50);
          CompositeFactor FertOffCvCSH13R
            Specifications:
              [SowingRule].Script.Cultivar = CSH13R
              [SowingRule].Script.Ftn = 0
              [FertiliserSchedule]
            Operations FertiliserSchedule
          CompositeFactor FertLowCvCSH13R
            Specifications:
              [SowingRule].Script.Cultivar = CSH13R
              [SowingRule].Script.Ftn = 0.2
              [FertiliserSchedule]
            Operations FertiliserSchedule
              1998-11-11  [Fertiliser].Apply(55, Fertiliser.Types.NO3N, 50);
          CompositeFactor FertMedCvCSH13R
            Specifications:
              [SowingRule].Script.Cultivar = CSH13R
              [SowingRule].Script.Ftn = 0.3
              [FertiliserSchedule]
            Operations FertiliserSchedule
              1998-11-11  [Fertiliser].Apply(55, Fertiliser.Types.NO3N, 50);
              1998-12-17  [Fertiliser].Apply(27, Fertiliser.Types.NO3N, 50);
              1999-01-23  [Fertiliser].Apply(27, Fertiliser.Types.NO3N, 50);
          CompositeFactor FertHighCvCSH13R
            Specifications:
              [SowingRule].Script.Cultivar = CSH13R
              [SowingRule].Script.Ftn = 0.3
              [FertiliserSchedule]
            Operations FertiliserSchedule
              1998-11-11  [Fertiliser].Apply(55, Fertiliser.Types.NO3N, 50);
              1998-12-17  [Fertiliser].Apply(55, Fertiliser.Types.NO3N, 50);
              1999-01-23  [Fertiliser].Apply(55, Fertiliser.Types.NO3N, 50);
        Simulation Lawes1998Base
          Clock: Start=1998-11-09; End=1999-03-07
          Summary
          Weather: FileName=Met\LE19.met
          SoilArbitrator
          Zone Paddock: Area=1; Slope=0; AspectAngle=0; Altitude=50
            Report DailyReport
            Report HarvestReport
            Folder Manager folder
              Manager SowingRule
                Date = 11/11/1998 00:00:00
                Density = 10
                Depth = 30
                Cultivar = Buster
                RowSpacing = 500
                RowConfiguration = Solid
                TilleringMethod = FixedTillering
                Ftn = 0
                script: same as in Validation.Hermitage.HE8.HE8Base.Paddock.Manager folder.SowingRule
              Manager HarvestingRule: same as Validation.Hermitage.HE1.HE1Base.Paddock.Manager folder.HarvestingRule
            Fertiliser
            Irrigation
            Operations FertiliserSchedule
            Manager Automatic irrigation based on water deficit
              AutoIrrigationOn = True
              FASWThreshold = 0.75
              FASWDepth = 600
              script: same as in Validation.Lawes.LE14.Lawes1996EarlyBase.Paddock.Automatic irrigation based on water deficit
            MicroClimate: a_interception=0; b_interception=1; c_interception=0; d_interception=0; SoilHeatFluxFraction=0.4; MinimumHeightDiffForNewLayer=0; NightInterceptionFraction=0.5; ReferenceHeight=2
            Soil CooperLab: SoilType=Gatton; Site=Gatton CSIRO; NearestTown=Unknown; Region=SE Queensland; NaturalVegetation=Unknown; Latitude=0; Longitude=0
              Physical: same as Validation.Lawes.LE13.Lawes1995Base.Paddock.GLH Field.Physical
              WaterBalance SoilWater: same as Validation.Lawes.LE13.Lawes1995Base.Paddock.GLH Field.SoilWater
              Nutrient
              Organic: same as Validation.Lawes.LE13.Lawes1995Base.Paddock.GLH Field.Organic
              Chemical: Thickness=[200, 200, 200, 300, 300, 300, 300]; PH=[7.7, 8.3, 8.4, 8.5, 8.5, 8.5, 8.6]; PHUnits=Water
              Water: Thickness=[200, 200, 200, 300, 300, 300, 300]; InitialValues=[0.293, 0.388, 0.371, 0.315, 0.307, 0.35, 0.374]; FilledFromTop=false
              CERESSoilTemperature Temperature
              Solute NO3: Thickness=[200, 200, 200, 300, 300, 300, 300]; InitialValues=[8.581, 5.84, 1.684, 0.665, 0.363, 0.439, 0.582]; InitialValuesUnits=ppm; WaterTableConcentration=0; D0=0
              Solute NH4: Thickness=[200, 200, 200, 300, 300, 300, 300]; InitialValues=[0.1, 0.1, 0.1, 0.1, 0.1, 0.1, 0.1]; InitialValuesUnits=ppm; WaterTableConcentration=0; D0=0
              Solute Urea: Thickness=[200, 200, 200, 300, 300, 300, 300]; InitialValues=[0, 0, 0, 0, 0, 0, 0]; InitialValuesUnits=kg/ha; WaterTableConcentration=0; D0=0
            Plant Sorghum: IsEnding=false; DaysAfterEnding=0
            SurfaceOrganicMatter: InitialResidueName=wheat_stubble; InitialResidueType=wheat; InitialResidueMass=0; InitialStandingFraction=0; InitialCPR=0; InitialCNR=80
      Experiment LE20 (disabled)
        Memo LE20 Description
          Dynamic Tillering is still under development.

          Experiment: LE20

          Description: LE20 - Density

          Start Date: 9/11/1998

          End Date: 7/03/1999

          |SimulationName |Density        |
          |---------------|---------------|
          |Density_1      | 2 plants/m2   |
          |Density_2      | 4 plants/m2   |
          |Density_2      | 8 plants/m2   |
          |Density_3      |16 plants/m2   |
        Factors
          CompositeFactor Density_1
            Specifications:
              [SowingRule].Script.Cultivar = Buster
              [SowingRule].Script.Density = 2
              [Leaf].TilleringMethod = 2
          CompositeFactor Density_2
            Specifications:
              [SowingRule].Script.Cultivar = Buster
              [SowingRule].Script.Density = 4
              [Leaf].TilleringMethod = 2
          CompositeFactor Density_3
            Specifications:
              [SowingRule].Script.Cultivar = Buster
              [SowingRule].Script.Density = 8
              [Leaf].TilleringMethod = 2
          CompositeFactor Density_4
            Specifications:
              [SowingRule].Script.Cultivar = Buster
              [SowingRule].Script.Density = 16
              [Leaf].TilleringMethod = 2
        Simulation Lawes20Base
          Clock: Start=1998-10-23; End=1999-02-21
          Summary
          Weather: FileName=Met\Gatton_Tiller_x_Density.met
          SoilArbitrator
          Zone Paddock: Area=1; Slope=0; AspectAngle=0; Altitude=50
            Report DailyReport
            Report HarvestReport
            Folder Manager folder
              Manager SowingRule
                Cultivar = Buster
                Date = 10/23/1998 00:00:00
                Density = 2
                Depth = 30
                RowSpacing = 500
                RowConfiguration = Solid
                TilleringMethod = DynamicTillering
                Ftn = 0
                script: same as in Validation.Hermitage.HE8.HE8Base.Paddock.Manager folder.SowingRule
              Manager HarvestingRule
                script: same as in Validation.Icrisat.BW5.IcrisatBW5Base.Paddock.Manager folder.HarvestingRule
            Fertiliser
            Irrigation
            Operations FertiliserSchedule
              1998-10-23  [Fertiliser].Apply(240, Fertiliser.Types.NO3N, 50);
            Operations IrrigationSchedule
              1998-10-26  [Irrigation].Apply(6);
              1998-10-27  [Irrigation].Apply(0);
              1998-10-28  [Irrigation].Apply(0);
              1998-10-29  [Irrigation].Apply(2);
              1998-10-30  [Irrigation].Apply(2);
              1998-10-31  [Irrigation].Apply(3);
              1998-11-01  [Irrigation].Apply(0);
              1998-11-02  [Irrigation].Apply(1);
              1998-11-13  [Irrigation].Apply(1);
              1998-11-14  [Irrigation].Apply(21);
              1998-11-19  [Irrigation].Apply(5);
              1998-11-23  [Irrigation].Apply(10);
              1998-11-24  [Irrigation].Apply(0);
              1998-11-25  [Irrigation].Apply(43);
              1998-11-26  [Irrigation].Apply(9);
              1998-11-27  [Irrigation].Apply(0);
              1998-11-29  [Irrigation].Apply(14);
              1998-12-16  [Irrigation].Apply(30);
              1998-12-17  [Irrigation].Apply(4);
              1998-12-19  [Irrigation].Apply(10);
              1998-12-20  [Irrigation].Apply(14);
              1998-12-21  [Irrigation].Apply(8);
              1998-12-22  [Irrigation].Apply(0);
              1998-12-24  [Irrigation].Apply(1);
              1998-12-25  [Irrigation].Apply(8);
              1998-12-26  [Irrigation].Apply(0);
              1999-01-01  [Irrigation].Apply(3);
              1999-01-02  [Irrigation].Apply(22);
              1999-01-03  [Irrigation].Apply(21);
              1999-01-04  [Irrigation].Apply(0);
              1999-01-05  [Irrigation].Apply(9);
              1999-01-06  [Irrigation].Apply(4);
              1999-01-10  [Irrigation].Apply(79);
              1999-01-11  [Irrigation].Apply(5);
              1999-01-12  [Irrigation].Apply(0);
              1999-01-13  [Irrigation].Apply(1);
              1999-01-16  [Irrigation].Apply(1);
              1999-01-21  [Irrigation].Apply(1);
              1999-01-22  [Irrigation].Apply(0);
              1999-01-28  [Irrigation].Apply(0);
              1999-01-29  [Irrigation].Apply(0);
              1999-01-30  [Irrigation].Apply(8);
              1999-01-31  [Irrigation].Apply(3);
              1999-02-01  [Irrigation].Apply(5);
              1999-02-02  [Irrigation].Apply(13);
              1999-02-08  [Irrigation].Apply(23);
              1999-02-09  [Irrigation].Apply(103);
              1999-02-10  [Irrigation].Apply(8);
              1999-02-11  [Irrigation].Apply(0);
              1999-02-12  [Irrigation].Apply(1);
              1999-02-25  [Irrigation].Apply(14);
              1999-02-26  [Irrigation].Apply(2);
              1999-03-01  [Irrigation].Apply(12);
              1999-03-02  [Irrigation].Apply(24);
              1999-03-03  [Irrigation].Apply(16);
              1999-03-04  [Irrigation].Apply(35);
              1999-03-12  [Irrigation].Apply(0);
              1999-03-23  [Irrigation].Apply(0);
              1999-04-05  [Irrigation].Apply(0);
              1999-04-06  [Irrigation].Apply(1);
              1999-04-07  [Irrigation].Apply(0);
              1999-04-18  [Irrigation].Apply(0);
              1999-04-19  [Irrigation].Apply(5);
            Manager Automatic irrigation based on water deficit
              AutoIrrigationOn = True
              FASWThreshold = 0.75
              FASWDepth = 600
              script: same as in Validation.Lawes.LE14.Lawes1996EarlyBase.Paddock.Automatic irrigation based on water deficit
            MicroClimate: a_interception=0; b_interception=1; c_interception=0; d_interception=0; SoilHeatFluxFraction=0.4; MinimumHeightDiffForNewLayer=0; NightInterceptionFraction=0.5; ReferenceHeight=2
            Plant Sorghum: IsEnding=false; DaysAfterEnding=0
            SurfaceOrganicMatter: InitialResidueName=wheat_stubble; InitialResidueType=wheat; InitialResidueMass=0; InitialStandingFraction=0; InitialCPR=0; InitialCNR=80
            Soil LawesBlackVertosol: SoilType=LawesBlackVertosol; Site=Gatton RS; NearestTown=Unknown; Region=Gatton; NaturalVegetation=Unknown; Latitude=0; Longitude=0
              Physical
                Thickness  BD    AirDry  LL15  DUL   SAT
                150        1.32  0.1     0.26  0.41  0.46
                150        1.3   0.15    0.26  0.43  0.48
                300        1.23  0.25    0.26  0.46  0.51
                300        1.27  0.26    0.26  0.44  0.49
                300        1.37  0.25    0.25  0.4   0.45
                300        1.35  0.28    0.28  0.41  0.46
                300        1.35  0.31    0.31  0.38  0.43
                SoilCrop SorghumSoil: LL=[0.26, 0.26, 0.26, 0.26, 0.25, 0.28, 0.31]; KL=[0.08, 0.08, 0.08, 0.08, 0.06, 0.04, 0.02]; XF=[1, 1, 1, 1, 1, 1, 1]
              WaterBalance SoilWater: SummerDate=1-Nov; SummerU=6; SummerCona=3.5; WinterDate=1-Apr; WinterU=6; WinterCona=3.5; DiffusConst=88; DiffusSlope=35.4; Salb=0.13; CN2Bare=91; CNRed=20; CNCov=0.8; PSIDul=-100; Thickness=[150, 150, 300, 300, 300, 300, 300]; SWCON=[0.5, 0.5, 0.5, 0.5, 0.5, 0.5, 0.5]
              Nutrient
              CERESSoilTemperature Temperature
              Organic: FOMCNRatio=30; CarbonUnits=Total
                Thickness  Carbon  SoilCNRatio  FBiom  FInert  FOM
                150        1.3     12.5         0.03   0.31    520.694
                150        0.65    12.5         0.01   0.38    405.517
                300        0.32    12.5         0      0.47    245.958
                300        0.11    12.5         0      0.7     149.181
                300        0.11    12.5         0      0.9     90.483
                300        0.11    12.5         0      0.95    54.8807
                300        0.11    12.5         0      0.95    33.2868
              Chemical: Thickness=[150, 150, 300, 300, 300, 300, 300]; PH=[8.2, 8.7, 8.9, 8.1, 8, 8, 8]; PHUnits=Water
              Water: Thickness=[150, 150, 300, 300, 300, 300, 300]; InitialValues=[0.41, 0.43, 0.46, 0.44, 0.4, 0.41, 0.38]; FilledFromTop=true
              Solute NO3: Thickness=[150, 150, 300, 300, 300, 300, 300]; InitialValues=[7, 5, 4, 2, 1.5, 1, 0.5]; InitialValuesUnits=ppm; WaterTableConcentration=0; D0=0
              Solute NH4: Thickness=[150, 150, 300, 300, 300, 300, 300]; InitialValues=[1, 0.5, 0.3, 0.2, 0.2, 0.2, 0.2]; InitialValuesUnits=ppm; WaterTableConcentration=0; D0=0
              Solute Urea: Thickness=[150, 150, 300, 300, 300, 300, 300]; InitialValues=[0, 0, 0, 0, 0, 0, 0]; InitialValuesUnits=kg/ha; WaterTableConcentration=0; D0=0
      Experiment LE21
        Memo LE21 Description
          Experiment: Gatton_RUE

          Description: N Rates x Genotype LE21

          Start Date: 22/11/1999

          End Date: 3/04/2000

          |SimulationName                 |Cultivar       |N Rates |
          |-------------------------------|---------------|--------|
          |Lawes1999FertLowCvCSH13R       |CSH13R         |0kg/ha  |
          |Lawes1999FertLowCvA35xQL36     |A35xQL36       |0kg/ha  |
          |Lawes1999FertLowCvQL39xQL36    |QL39xQL36      |0kg/ha  |
          |Lawes1999FertMedCvCSH13R       |CSH13R         |45kg/ha |
          |Lawes1999FertMedCvA35xQL36     |A35xQL36       |45kg/ha |
          |Lawes1999FertMedCvQL39xQL36    |QL39xQL36      |45kg/ha |
          |Lawes1999FertHighCvCSH13R      |CSH13R         |360kg/ha|
          |Lawes1999FertHighCvA35xQL36    |A35xQL36       |360kg/ha|
          |Lawes1999FertHighCvQL39xQL36   |QL39xQL36      |360kg/ha|
        Factors
          Permutation
            Factor Cv: Specification=[SowingRule].Script.Cultivar = CSH13R, A35xQL36, QL39xQL36
            Factor Fert: Specification=[FertiliserSchedule]
              Operations Low
              Operations Med
                1999-11-29  [Fertiliser].Apply(44, Fertiliser.Types.NO3N, 50);
              Operations High
                1999-11-29  [Fertiliser].Apply(117, Fertiliser.Types.NO3N, 50);
                2000-01-07  [Fertiliser].Apply(119, Fertiliser.Types.NO3N, 50);
                2000-02-11  [Fertiliser].Apply(119, Fertiliser.Types.NO3N, 50);
        Simulation Lawes1999Base
          Clock: Start=1999-11-22; End=2000-04-03
          Summary
          Weather: FileName=Met\Gatton_RUE.met
          SoilArbitrator
          Zone Paddock: Area=1; Slope=0; AspectAngle=0; Altitude=50
            Report DailyReport
            Report HarvestReport
            Folder Manager folder
              Manager SowingRule
                Cultivar = CSH13R
                Date = 12/02/1999 00:00:00
                Density = 10
                Depth = 40
                RowSpacing = 500
                RowConfiguration = Solid
                TilleringMethod = FixedTillering
                Ftn = 0
```csharp
using Models.Soils;
using Models.PMF.Organs;
using System;
using Models.Core;
using Models.PMF;
using APSIM.Shared.Utilities;

namespace Models
{
    [Serializable]
    public class Script : Model
    {
        [Description("Enter sowing date (dd/mm/yyyy) : ")]
        public DateTime Date { get; set; }

        [Description("Enter sowing density  (plants/m2) : ")]
        public double Density { get; set; }

        [Description("Enter sowing depth  (mm) : ")]
        public double Depth { get; set; }

        [Description("Enter cultivar : ")]
        [Display(Type = DisplayType.CultivarName)]
        public string Cultivar { get; set; } 

        [Description("Enter row spacing (mm) : ")]
        public double RowSpacing { get; set; }

        [Description("Enter skip row configuration : ")]
        public RowConfigurationType RowConfiguration { get; set; }

        [Description("Tillering Method : ")]
        public TilleringMethodType TilleringMethod { get; set; } = 0;

        [Description("Enter Fertile Tiller No. : ")]
        public double Ftn { get; set; }

        public enum TilleringMethodType 
        {
            RuleOfThumb = -1,
            FixedTillering = 0,
            DynamicTillering = 1
        }
        public enum RowConfigurationType 
        {
            Solid, SingleSkip, DoubleSkip
        }

        [Link]
        private Zone paddock;

        [Link]
        private Clock clock;

        [Link]
        private Plant crop;
        
        [Link(ByName = true)] 
        private Operations fertiliserSchedule;

        [EventSubscribe("DoManagement")]
        private void OnDoManagement(object sender, EventArgs e)
        {
            if (clock.Today == Date)
            {
                double tmpFtn = Ftn;
                if(TilleringMethod == TilleringMethodType.FixedTillering)
                {
                    //hack to set fixed tillers inside of experiment
                    if (fertiliserSchedule.Operation.Count == 3)
                    {
                        if(Cultivar == "CSH13R")
                        {
                            tmpFtn = 0.2;
                        }
                        else
                        {
                            tmpFtn = 0.9;
                        }
                    }
                } 
                crop.Sow(cultivar:Cultivar, population:Density, depth:Depth, rowSpacing:RowSpacing, rowConfig: (double)RowConfiguration, tillering:(int)TilleringMethod, ftn:tmpFtn);
            }
        }
    }
}
```
              Manager HarvestingRule: same as Validation.Hermitage.HE1.HE1Base.Paddock.Manager folder.HarvestingRule
            Operations IrrigationSchedule
              1999-12-03  [Irrigation].Apply(17);
              1999-12-06  [Irrigation].Apply(20);
              1999-12-17  [Irrigation].Apply(20);
              2000-01-07  [Irrigation].Apply(10);
              2000-01-14  [Irrigation].Apply(48);
              2000-01-27  [Irrigation].Apply(21);
              2000-02-04  [Irrigation].Apply(17);
              2000-02-11  [Irrigation].Apply(30);
              2000-02-25  [Irrigation].Apply(41);
              2000-03-03  [Irrigation].Apply(15);
            Operations FertiliserSchedule
            Irrigation
            Fertiliser
            MicroClimate: a_interception=0; b_interception=1; c_interception=0; d_interception=0; SoilHeatFluxFraction=0.4; MinimumHeightDiffForNewLayer=0; NightInterceptionFraction=0.5; ReferenceHeight=2
            Soil Ian's Paddock: SoilType=LawesBlackVertosol; Site=Gatton RS; NearestTown=Unknown; Region=Gatton; NaturalVegetation=Unknown; Latitude=0; Longitude=0
              Water: Thickness=[150, 150, 300, 300, 300, 300, 300]; InitialValues=[0.41, 0.43, 0.46, 0.44, 0.4, 0.41, 0.38]; FilledFromTop=true
              Physical
                Thickness  BD    AirDry  LL15  DUL   SAT
                150        1.32  0.1     0.26  0.41  0.46
                150        1.3   0.15    0.26  0.43  0.48
                300        1.23  0.25    0.26  0.46  0.51
                300        1.27  0.26    0.26  0.44  0.49
                300        1.37  0.25    0.25  0.4   0.45
                300        1.35  0.28    0.28  0.41  0.46
                300        1.35  0.31    0.31  0.38  0.43
                SoilCrop SorghumSoil: LL=[0.26, 0.26, 0.26, 0.26, 0.25, 0.28, 0.31]; KL=[0.08, 0.08, 0.08, 0.08, 0.06, 0.04, 0.02]; XF=[1, 1, 1, 1, 1, 1, 1]
              WaterBalance SoilWater: SummerDate=1-Nov; SummerU=6; SummerCona=3.5; WinterDate=1-Apr; WinterU=6; WinterCona=3.5; DiffusConst=88; DiffusSlope=35.4; Salb=0.13; CN2Bare=91; CNRed=20; CNCov=0.8; PSIDul=-100; Thickness=[150, 150, 300, 300, 300, 300, 300]; SWCON=[0.5, 0.5, 0.5, 0.5, 0.5, 0.5, 0.5]
              Nutrient
              Organic: FOMCNRatio=30; CarbonUnits=Total
                Thickness  Carbon  SoilCNRatio  FBiom  FInert  FOM
                150        1.3     12.5         0.03   0.31    520.694
                150        0.65    12.5         0.01   0.38    405.517
                300        0.32    12.5         0      0.47    245.958
                300        0.11    12.5         0      0.7     149.181
                300        0.11    12.5         0      0.9     90.483
                300        0.11    12.5         0      0.95    54.8807
                300        0.11    12.5         0      0.95    33.2868
              Chemical: Thickness=[150, 150, 300, 300, 300, 300, 300]; PH=[8.2, 8.7, 8.9, 8.1, 8, 8, 8]; PHUnits=Water
              CERESSoilTemperature Temperature
              Solute NO3: Thickness=[150, 150, 300, 300, 300, 300, 300]; InitialValues=[9.202, 4.403, 2.239, 1.237, 1.266, 1.77, 2.064]; InitialValuesUnits=ppm; WaterTableConcentration=0; D0=0
              Solute NH4: Thickness=[150, 150, 300, 300, 300, 300, 300]; InitialValues=[0.1, 0.1, 0.1, 0.1, 0.1, 0.1, 0.1]; InitialValuesUnits=ppm; WaterTableConcentration=0; D0=0
              Solute Urea: Thickness=[150, 150, 300, 300, 300, 300, 300]; InitialValues=[0, 0, 0, 0, 0, 0, 0]; InitialValuesUnits=kg/ha; WaterTableConcentration=0; D0=0
            Plant Sorghum: IsEnding=false; DaysAfterEnding=0
            SurfaceOrganicMatter: InitialResidueName=wheat_stubble; InitialResidueType=wheat; InitialResidueMass=0; InitialStandingFraction=0; InitialCPR=0; InitialCNR=80
    Memo fixme
      Some data is missing from daily observed data:

      - slai
      - Leaf wt
      - water sd ratio

      Other problems:

      - Should yield be live or total wt?
      - Which observed variables are rachis variables?
      - Are predicted dm/N variables live or total? And are they aboveground or total?
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