Simulations: Version=78
  Replacements
    Plant Soybean: CropType=Soybean; IsEnding=false; DaysAfterEnding=0
      OrganArbitrator Arbitrator
        RelativeAllocation NArbitrator
        RelativeAllocation DMArbitrator
      Phenology
        Memo Introduction
          In the new model we simplified phenology by taking out stages that are not measurable (e.g. end of juvenile stage) and by adding new stages that are measurable (e.g. start pod).
          The new phenology follows the V/R staging system
        AirTemperatureFunction VegetativeThermalTime
          XYPairs: X=[10, 20, 30, 40]; Y=[0, 10, 20, 0]
        LinearInterpolationFunction VegetativePhotoperiodModifier
          XYPairs: X=[14.43, 21.19]; Y=[1, 0]
          Memo
            These parameters are overridden by cultivar parameter descriptions to capture the difference between individual cultivars in terms of their phenological development.  Responses shown here are only indicative.  See cultivar descriptions for more information.
          VariableReference XValue: VariableName=[Phenology].Photoperiod
        AirTemperatureFunction ReproductiveThermalTime
          XYPairs: X=[10, 15, 30, 40]; Y=[5, 5, 20, 0]
        LinearInterpolationFunction ReproductivePhotoperiodModifier: same as Replacements.Soybean.Phenology.VegetativePhotoperiodModifier
        PhaseLookup ThermalTime
          PhaseLookupValue PreEmergence: Start=Sowing; End=Emergence
            VariableReference Base: VariableName=[Phenology].VegetativeThermalTime
          PhaseLookupValue VegetativeGrowth: Start=Emergence; End=EndCanopyDevelopment
            MultiplyFunction TT
              VariableReference Base: VariableName=[Phenology].VegetativeThermalTime
              VariableReference PPModifier: VariableName=[Phenology].VegetativePhotoperiodModifier
          PhaseLookupValue ReproductiveGrowth: Start=EndCanopyDevelopment; End=HarvestRipe
            MultiplyFunction TT
              VariableReference Base: VariableName=[Phenology].ReproductiveThermalTime
              VariableReference PPModifier: VariableName=[Phenology].ReproductivePhotoperiodModifier
        PhotoperiodFunction Photoperiod: Twilight=0; DayLength=0
        GerminatingPhase Germinating: Start=Sowing; End=Germination
        EmergingPhase Emerging: ShootLag=10; ShootRate=1; Start=Germination; End=Emergence; TTForTimeStep=0
          VariableReference ThermalTime: VariableName=[Phenology].VegetativeThermalTime
        GenericPhase Vegetative: Start=Emergence; End=StartFlowering
          Constant Target: FixedValue=200
          VariableReference Progression: VariableName=[Phenology].ThermalTime
        GenericPhase EarlyFlowering: Start=StartFlowering; End=StartPodDevelopment
          Memo
            The duration of the grain filling phase has been taken from the model of Robertson et al (2002).
          Constant Target: FixedValue=200
          VariableReference Progression: VariableName=[Phenology].ThermalTime
        GenericPhase EarlyPodDevelopment: Start=StartPodDevelopment; End=StartGrainFilling
          Memo
            The duration of the grain filling phase has been taken from the model of Robertson et al (2002).
          Constant Target: FixedValue=140
          VariableReference Progression: VariableName=[Phenology].ThermalTime
        GenericPhase EarlyGrainFilling: Start=StartGrainFilling; End=EndCanopyDevelopment
          MultiplyFunction Target
            Constant FractionofGrainfilling: FixedValue=0.05
            VariableReference EntireGrainfilling
              VariableName=[Phenology].LateGrainFilling.Target.EntireGrainfillPeriod.FixedValue
          VariableReference Progression: VariableName=[Phenology].ThermalTime
        GenericPhase MidGrainFilling: Start=EndCanopyDevelopment; End=EndPodDevelopment
          MultiplyFunction Target
            Constant FractionofMidToLateGrainfilling: FixedValue=0.5
            SubtractFunction MidToLateGrainfilling
              VariableReference EntireGrainfilling
                VariableName=[Phenology].LateGrainFilling.Target.EntireGrainfillPeriod.FixedValue
              VariableReference EarlyGrainfilling: VariableName=[Phenology].EarlyGrainFilling.Target
          VariableReference Progression: VariableName=[Phenology].ThermalTime
        GenericPhase LateGrainFilling: Start=EndPodDevelopment; End=EndGrainFill
          SubtractFunction Target
            Constant EntireGrainfillPeriod: FixedValue=500
            VariableReference EarlyGrainFillingTarget: VariableName=[Phenology].EarlyGrainFilling.Target
            VariableReference MidGrainFillingTarget: VariableName=[Phenology].MidGrainFilling.Target
          VariableReference Progression: VariableName=[Phenology].ThermalTime
        GenericPhase Maturing: Start=EndGrainFill; End=Maturity
          Constant Target: FixedValue=45
          VariableReference Progression: VariableName=[Phenology].ThermalTime
        GenericPhase Ripening: Start=Maturity; End=HarvestRipe
          Constant Target: FixedValue=45
          VariableReference Progression: VariableName=[Phenology].ThermalTime
        EndPhase ReadyForHarvesting: Start=HarvestRipe; End=Unused
          VariableReference ThermalTime: VariableName=[Phenology].ThermalTime
        OnEventFunction EmergenceDAS: SetEvent=Emergence; ReSetEvent=never
          Memo
            A function is used to provide maturity date as days after sowing(DAS).
          Constant PreEventValue: FixedValue=0
          VariableReference PostEventValue: VariableName=[Phenology].DaysAfterSowing
        OnEventFunction FloweringDAS: SetEvent=StartFlowering; ReSetEvent=never
          Memo
            A function is used to provide flowering date as days after sowing(DAS).
          Constant PreEventValue: FixedValue=0
          VariableReference PostEventValue: VariableName=[Phenology].DaysAfterSowing
        OnEventFunction MaturityDAS: SetEvent=Maturity; ReSetEvent=never
          Memo
            A function is used to provide maturity date as days after sowing(DAS).
          Constant PreEventValue: FixedValue=0
          VariableReference PostEventValue: VariableName=[Phenology].DaysAfterSowing
      SimpleLeaf Leaf: Albedo=0.25; Gsmax350=0.015; R50=150; LeafInitialisationStage=Emergence; Height=0; BaseHeight=0; Width=0; FRGR=0; PotentialEP=0; WaterDemand=0; KDead=0; LAIDead=0
        Memo Description
          Stover represents any part of the crop that is not removed at harvest (i.e not part of the product).
        RUEModel Photosynthesis
          Constant RUE: FixedValue=1.2
          WeightedTemperatureFunction FT: MaximumTemperatureWeighting=0.5
            XYPairs: X=[10, 20, 30, 40]; Y=[0, 1, 1, 0]
          LinearInterpolationFunction FVPD
            XYPairs: X=[0, 10, 50]; Y=[1, 1, 1]
            VariableReference XValue: VariableName=[Leaf].Photosynthesis.VPD
          LinearInterpolationFunction FN
            XYPairs: X=[0, 1, 1.5]; Y=[0, 1, 1]
            VariableReference XValue: VariableName=[Leaf].Fn
          LinearInterpolationFunction FW
            XYPairs: X=[0, 1]; Y=[0, 1]
            VariableReference XValue: VariableName=[Leaf].Fw
          RUECO2Function FCO2: PhotosyntheticPathway=C3
          VariableReference RadnInt: VariableName=[Leaf].RadIntTot
        ExpressionFunction CO2internal: Expression=(163 - [IWeather].MeanT)/(5 - 0.1*[IWeather].MeanT)
        DivideFunction StomatalConductanceCO2Modifier
          VariableReference FCO2: VariableName=[Leaf].Photosynthesis.FCO2
          ExpressionFunction RelativeCO2Gradient
            Expression=([IWeather].CO2 - [Leaf].CO2internal.Value())/(350 - [Leaf].CO2internal.Value())
        MultiplyFunction Area
          VariableReference SLA: VariableName=[Leaf].SpecificArea
          VariableReference LeafLiveWt: VariableName=[Leaf].Live.Wt
        MinimumFunction FRGR
          VariableReference RUE_FT: VariableName=[Leaf].Photosynthesis.FT
          MinimumFunction Others
            VariableReference RUE_FN: VariableName=[Leaf].Photosynthesis.FN
            VariableReference RUE_FVPD: VariableName=[Leaf].Photosynthesis.FVPD
        LinearInterpolationFunction ExtinctionCoefficient
          XYPairs: X=[200, 1000]; Y=[0.6, 0.4]
          VariableReference XValue: VariableName=[Soybean].SowingData.RowSpacing
        LinearInterpolationFunction Tallness
          XYPairs: X=[1, 2, 3, 4, 5, 6, 9]; Y=[0, 0, 50, 400, 700, 900, 1000]
          VariableReference XValue: VariableName=[Phenology].Stage
        AccumulateFunction NodeNumber: StartStageName=Emergence; EndStageName=EndCanopyDevelopment; FractionRemovedOnCut=1; FractionRemovedOnHarvest=1; FractionRemovedOnGraze=1; FractionRemovedOnPrune=0
          DivideFunction DeltaNode
            VariableReference ThermalTime: VariableName=[Phenology].VegetativeThermalTime
            VariableReference Phyllochron: VariableName=[Leaf].Phyllochron
        Constant NReallocationFactor: FixedValue=1
          Memo
            This model assumes that all metabolic and storage N is available for reallocation from senescing leaves.
        PhaseLookup SenescenceRate
          PhaseLookupValue Vegetative: Start=Emergence; End=EndCanopyDevelopment
            Constant Rate: FixedValue=0
          PhaseLookupValue Reproductive: Start=EndCanopyDevelopment; End=Maturity
            Memo
              Leaf senescence rate is calculated to ensure that all leaves are senesced by crop maturity.
            DivideFunction Rate
              VariableReference TT: VariableName=[Phenology].ThermalTime
              SubtractFunction TTRemaining
                ExpressionFunction TTRequired
                  Expression=[Phenology].MidGrainFilling.Target + [Phenology].LateGrainFilling.Target + [Phenology].Maturing.Target
                ExpressionFunction TTComplete
                  Expression=[Phenology].MidGrainFilling.ProgressThroughPhase + [Phenology].LateGrainFilling.ProgressThroughPhase + [Phenology].Maturing.ProgressThroughPhase
        Constant DetachmentRate: FixedValue=1; Units=/d
        Constant InitialWt: FixedValue=1
        Constant LaiDead: FixedValue=0; Units=m^2/m^2
        LinearInterpolationFunction MaximumNConc
          XYPairs: X=[3, 4, 9]; Y=[0.06, 0.05, 0.03]
          VariableReference XValue: VariableName=[Phenology].Stage
        LinearInterpolationFunction CriticalNConc
          XYPairs: X=[3, 4, 9]; Y=[0.06, 0.05, 0.03]
          VariableReference XValue: VariableName=[Phenology].Stage
        Constant MinimumNConc: FixedValue=0.02
        Constant MaintenanceRespiration: FixedValue=0; Units=0-1
        Constant DMConversionEfficiency: FixedValue=1; Units=0-1
        BiomassRemoval BiomassRemovalDefaults
          OrganBiomassRemovalType Harvest: FractionLiveToRemove=0; FractionDeadToRemove=0; FractionLiveToResidue=0.3; FractionDeadToResidue=0
          OrganBiomassRemovalType Cut: FractionLiveToRemove=0.95; FractionDeadToRemove=0; FractionLiveToResidue=0; FractionDeadToResidue=0
          OrganBiomassRemovalType Prune: FractionLiveToRemove=0; FractionDeadToRemove=0; FractionLiveToResidue=0.6; FractionDeadToResidue=0
          OrganBiomassRemovalType Graze: FractionLiveToRemove=0.6; FractionDeadToRemove=0; FractionLiveToResidue=0.1; FractionDeadToResidue=0
        Constant NRetranslocationFactor: FixedValue=0.5
        Constant DMReallocationFactor: FixedValue=0
        Constant DMRetranslocationFactor: FixedValue=0.5
        Constant RemobilisationCost: FixedValue=0
        Constant CarbonConcentration: FixedValue=0.4
        BiomassDemand DMDemands
          DivideFunction Structural
            VariableReference DeltaLAI: VariableName=[Leaf].DeltaLAI
            VariableReference SLA: VariableName=[Leaf].SpecificArea
            Memo
              Growth in leaf area is used to calculate the leaf dry matter demand.  Note that leaf biomass is assumed to consist of entirely structural dry matter.
          Constant Storage: FixedValue=0
          Constant Metabolic: FixedValue=0
        BiomassDemand NDemands
          MultiplyFunction Structural
            VariableReference MinNconc: VariableName=[Leaf].minimumNconc
            VariableReference PotentialDMAllocation: VariableName=[Leaf].potentialDMAllocation.Structural
          MultiplyFunction Metabolic
            SubtractFunction MetabolicNconc
              VariableReference CritNconc: VariableName=[Leaf].criticalNConc
              VariableReference MinNconc: VariableName=[Leaf].minimumNconc
            VariableReference PotentialDMAllocation: VariableName=[Leaf].potentialDMAllocation.Structural
          StorageNDemandFunction Storage
            Constant NitrogenDemandSwitch: FixedValue=1
            VariableReference MaxNconc: VariableName=[Leaf].maximumNconc
        LinearInterpolationFunction FrostFraction
          XYPairs: X=[-4, 4]; Y=[1, 0]
          VariableReference XValue: VariableName=[Weather].MinT
        LinearInterpolationFunction SpecificArea
          XYPairs: X=[0.1, 6]; Y=[0.03, 0.03]
          VariableReference XValue: VariableName=[Leaf].LAI
        PhaseLookup DeltaLAI
          PhaseLookupValue Vegetative: Start=Emergence; End=EndCanopyDevelopment
            MultiplyFunction Delta
              VariableReference AreaLargestLeaf: VariableName=[Leaf].AreaLargestLeaf
              PhaseLookup RelativeArea
                PhaseLookupValue BeforeEndPod: Start=Emergence; End=StartPodDevelopment
                  LinearInterpolationFunction RelativeArea
                    XYPairs: X=[2, 7, 10, 18]; Y=[0.6666, 1, 1, 0.83]
                    VariableReference XValue: VariableName=[Leaf].NodeNumber
                PhaseLookupValue AfterEndPod: Start=StartPodDevelopment; End=EndCanopyDevelopment
                  Constant RelativeArea: FixedValue=0.4
              VariableReference PlantNumber: VariableName=[Soybean].SowingData.Population
              LinearInterpolationFunction Branches
                XYPairs: X=[0, 6, 7, 8, 9]; Y=[1, 1, 2, 2, 2]
                VariableReference XValue: VariableName=[Leaf].NodeNumber
              DivideFunction LAR
                VariableReference TT: VariableName=[Phenology].VegetativeThermalTime
                VariableReference Phyllochron: VariableName=[Leaf].Phyllochron
          PhaseLookupValue Reproductive: Start=EndCanopyDevelopment; End=Maturity
            Constant: FixedValue=0
        Constant AreaLargestLeaf: FixedValue=0.006
        Constant Phyllochron: FixedValue=45
      ReproductiveOrgan Grain: GrowthRespiration=0; MaintenanceRespiration=0
        Biomass Live: DMDOfStructural=0.6
        Biomass Dead: DMDOfStructural=0.6
        Constant PotentialHarvestIndex: FixedValue=0.5
        AddFunction FillingDuration
          VariableReference EarlyGrainFillingDuration: VariableName=[Phenology].EarlyGrainFilling.Target
          VariableReference MidGrainFillingDuration: VariableName=[Phenology].MidGrainFilling.Target
          VariableReference LateGrainFillingDuration: VariableName=[Phenology].LateGrainFilling.Target
        PhaseLookup DMDemandFunction
          PhaseLookupValue GrainFilling: Start=StartGrainFilling; End=EndGrainFill
            MultiplyFunction HIGrainDemand
              VariableReference AboveGroundWt: VariableName=[AboveGround].Wt
              DivideFunction HarvestIndexIncrease
                VariableReference PotentialHarvestIndex: VariableName=[Grain].PotentialHarvestIndex
                VariableReference FillingDuration: VariableName=[Grain].FillingDuration
              VariableReference ThermalTime: VariableName=[Phenology].ThermalTime
        Constant MinimumNConc: FixedValue=0.05
        Constant MaximumNConc: FixedValue=0.058
        Constant WaterContent: FixedValue=0.12
        MultiplyFunction NFillingRate
          VariableReference NConc: VariableName=[Grain].MaximumNConc
          VariableReference DMDemand: VariableName=[Grain].DMDemandFunction
          VariableReference DMConversionEfficiency: VariableName=[Grain].DMConversionEfficiency
        BiomassRemoval BiomassRemovalDefaults
          OrganBiomassRemovalType Harvest: FractionLiveToRemove=1; FractionDeadToRemove=0; FractionLiveToResidue=0; FractionDeadToResidue=0
          OrganBiomassRemovalType Cut: FractionLiveToRemove=1; FractionDeadToRemove=0; FractionLiveToResidue=0; FractionDeadToResidue=0
          OrganBiomassRemovalType Prune: FractionLiveToRemove=0; FractionDeadToRemove=0; FractionLiveToResidue=0.8; FractionDeadToResidue=0
          OrganBiomassRemovalType Graze: FractionLiveToRemove=0.6; FractionDeadToRemove=0; FractionLiveToResidue=0.2; FractionDeadToResidue=0
        Constant DMConversionEfficiency: FixedValue=0.89
        Constant RemobilisationCost: FixedValue=0
        Constant CarbonConcentration: FixedValue=0.4
        DivideFunction HarvestIndex
          VariableReference GrainWt: VariableName=[Grain].Wt
          VariableReference AboveGroundWt: VariableName=[AboveGround].Wt
        Constant MaximumPotentialGrainSize: FixedValue=0
          Memo
            This parameter is not used.  Grain growth is calculated from harvest index increase.
        Constant NumberFunction: FixedValue=0
          Memo
            Grain number is not estimated by this model.
      Root: GrowthRespiration=0; MaintenanceRespiration=0; RootAngle=45
        LinearInterpolationFunction KLModifier
          XYPairs: X=[0, 3]; Y=[1, 1]
          VariableReference XValue: VariableName=[Leaf].LAI
        AirTemperatureFunction TemperatureEffect
          XYPairs: X=[0, 26, 35]; Y=[1, 1, 1]
        LinearInterpolationFunction MaxDailyNUptake
          XYPairs: X=[0, 5]; Y=[1, 3]
          VariableReference XValue: VariableName=[Leaf].LAI
        Constant SenescenceRate: FixedValue=0.005
        Constant MaximumRootDepth: FixedValue=1000000
        PhaseLookup RootFrontVelocity
          PhaseLookupValue PreEmergence: Start=Germination; End=Emergence
            Constant Function: FixedValue=5
          PhaseLookupValue early: Start=Emergence; End=StartGrainFilling
            Constant Function: FixedValue=30
          PhaseLookupValue late: Start=StartGrainFilling; End=Maturity
            Constant Function: FixedValue=5
        Constant MaximumNConc: FixedValue=0.01
        Constant MinimumNConc: FixedValue=0.005
        PhaseBasedSwitch NitrogenDemandSwitch: Start=Emergence; End=EndGrainFill
        LinearInterpolationFunction KNO3
          XYPairs: X=[0, 0.003]; Y=[0.02, 0.02]
          VariableReference XValue: VariableName=[Root].LengthDensity
        LinearInterpolationFunction KNH4
          XYPairs: X=[0, 0.003]; Y=[0, 0]
          VariableReference XValue: VariableName=[Root].LengthDensity
        BiomassRemoval BiomassRemovalDefaults
          OrganBiomassRemovalType Harvest: FractionLiveToRemove=0; FractionDeadToRemove=0; FractionLiveToResidue=0.2; FractionDeadToResidue=0
          OrganBiomassRemovalType Cut: FractionLiveToRemove=0; FractionDeadToRemove=0; FractionLiveToResidue=0.3; FractionDeadToResidue=0
          OrganBiomassRemovalType Prune: FractionLiveToRemove=0; FractionDeadToRemove=0; FractionLiveToResidue=0.1; FractionDeadToResidue=0
          OrganBiomassRemovalType Graze: FractionLiveToRemove=0; FractionDeadToRemove=0; FractionLiveToResidue=0.15; FractionDeadToResidue=0
        LinearInterpolationFunction NUptakeSWFactor
          XYPairs: X=[0, 1]; Y=[0, 1]
          VariableReference XValue: VariableName=[Root].RWC
        Constant InitialDM: FixedValue=0.2; Units=g/plant
        Constant SpecificRootLength: FixedValue=40; Units=m/g
        Constant DMConversionEfficiency: FixedValue=1
        Constant MaintenanceRespirationFunction: FixedValue=1
        Constant RemobilisationCost: FixedValue=0
        Constant CarbonConcentration: FixedValue=0.4
        BiomassDemand DMDemands
          MultiplyFunction Structural
            PartitionFractionDemandFunction DMDemandFunction
              PhaseLookup PartitionFraction
                PhaseLookupValue Early: Start=Emergence; End=StartFlowering
                  Constant Function: FixedValue=0.2
                PhaseLookupValue Middle: Start=StartFlowering; End=StartGrainFilling
                  Constant Function: FixedValue=0.2
                PhaseLookupValue Late: Start=StartGrainFilling; End=Maturity
                  Constant Function: FixedValue=0.05
            Constant StructuralFraction: FixedValue=1
          Constant Metabolic: FixedValue=0
          StorageDMDemandFunction Storage
            SubtractFunction StorageFraction
              Constant One: FixedValue=1
              VariableReference StructuralFraction: VariableName=[Root].DMDemands.Structural.StructuralFraction
        BiomassDemand NDemands
          MultiplyFunction Structural
            VariableReference MinNconc: VariableName=[Root].minimumNconc
            VariableReference PotentialDMAllocation: VariableName=[Root].potentialDMAllocation.Structural
          MultiplyFunction Metabolic
            SubtractFunction MetabolicNconc
              VariableReference CritNconc: VariableName=[Root].criticalNConc
              VariableReference MinNconc: VariableName=[Root].minimumNconc
            VariableReference PotentialDMAllocation: VariableName=[Root].potentialDMAllocation.Structural
          StorageNDemandFunction Storage
            VariableReference NitrogenDemandSwitch: VariableName=[Root].nitrogenDemandSwitch
            VariableReference MaxNconc: VariableName=[Root].maximumNconc
      Nodule
        Constant FixationMetabolicCost: FixedValue=0
        Constant MaximumNConc: FixedValue=0.02
        Constant MinimumNConc: FixedValue=0.01
        Constant SenescenceRate: FixedValue=0
        Constant NReallocationFactor: FixedValue=0
        PhaseBasedSwitch NitrogenDemandSwitch: Start=Emergence; End=EndGrainFill
        BiomassRemoval BiomassRemovalDefaults
          OrganBiomassRemovalType Harvest: FractionLiveToRemove=0.5; FractionDeadToRemove=0; FractionLiveToResidue=0.1; FractionDeadToResidue=0
          OrganBiomassRemovalType Cut: FractionLiveToRemove=0.8; FractionDeadToRemove=0; FractionLiveToResidue=0; FractionDeadToResidue=0
          OrganBiomassRemovalType Prune: FractionLiveToRemove=0; FractionDeadToRemove=0; FractionLiveToResidue=0.6; FractionDeadToResidue=0
          OrganBiomassRemovalType Graze: FractionLiveToRemove=0.6; FractionDeadToRemove=0; FractionLiveToResidue=0.2; FractionDeadToResidue=0
        Constant InitialWtFunction: FixedValue=0; Units=g/m^2
        Constant DetachmentRateFunction: FixedValue=0; Units=/d
        Constant MaintenanceRespirationFunction: FixedValue=0; Units=0-1
        Constant DMConversionEfficiency: FixedValue=1; Units=0-1
        Constant NRetranslocationFactor: FixedValue=0
        Constant DMReallocationFactor: FixedValue=0
        Constant DMRetranslocationFactor: FixedValue=0
        VariableReference CriticalNConc: VariableName=[Nodule].MinimumNConc
        Constant RemobilisationCost: FixedValue=0
        Constant CarbonConcentration: FixedValue=0.4
        HoldFunction FixationRate: WhenToHold=StartGrainFilling
          MinimumFunction DailyPotentialFixationRate
            MultiplyFunction PotentialFixationRate
              VariableReference LiveBiomass: VariableName=[AboveGroundLive].Wt
              PhaseLookup SpecificFixationRate
                PhaseLookupValue VegetativeGrowth: Start=Emergence; End=StartFlowering
                  Constant Rate: FixedValue=0.006
                PhaseLookupValue ReproductiveGrowth: Start=StartFlowering; End=EndGrainFill
                  Constant Rate: FixedValue=0.002
            Constant MaximumFixationRate: FixedValue=0.6
        BiomassDemand DMDemands
          MultiplyFunction Structural
            PartitionFractionDemandFunction DMDemandFunction
              PhaseLookup PartitionFraction
                PhaseLookupValue Early: Start=Emergence; End=StartFlowering
                  Constant Function: FixedValue=0.03
                PhaseLookupValue Middle: Start=StartFlowering; End=StartGrainFilling
                  Constant Function: FixedValue=0.02
                PhaseLookupValue Late: Start=StartGrainFilling; End=Maturity
                  Constant Function: FixedValue=0
            Constant StructuralFraction: FixedValue=1; Units=g/g
          Constant Metabolic: FixedValue=0
          StorageDMDemandFunction Storage
            SubtractFunction StorageFraction
              Constant One: FixedValue=1
              VariableReference StructuralFraction: VariableName=[Nodule].DMDemands.Structural.StructuralFraction
        BiomassDemand NDemands
          MultiplyFunction Structural
            VariableReference MinNconc: VariableName=[Nodule].minimumNconc
            VariableReference PotentialDMAllocation: VariableName=[Nodule].potentialDMAllocation.Structural
          MultiplyFunction Metabolic
            SubtractFunction MetabolicNconc
              VariableReference CritNconc: VariableName=[Nodule].criticalNConc
              VariableReference MinNconc: VariableName=[Nodule].minimumNconc
            VariableReference PotentialDMAllocation: VariableName=[Nodule].potentialDMAllocation.Structural
          StorageNDemandFunction Storage
            VariableReference NitrogenDemandSwitch: VariableName=[Nodule].nitrogenDemandSwitch
            VariableReference MaxNconc: VariableName=[Nodule].maximumNconc
      GenericOrgan Shell: IsAboveGround=true
        Constant NReallocationFactor: FixedValue=1
        Constant NRetranslocationFactor: FixedValue=0.5
        Constant MaximumNConc: FixedValue=0.045
        VariableReference CriticalNConc: VariableName=[Shell].MinimumNConc
        Constant MinimumNConc: FixedValue=0.01
        Constant DMRetranslocationFactor: FixedValue=0.1
        PhaseBasedSwitch NitrogenDemandSwitch: Start=StartPodDevelopment; End=EndPodDevelopment
        BiomassRemoval BiomassRemovalDefaults: same as Replacements.Soybean.Nodule.BiomassRemovalDefaults
        Constant InitialWtFunction: FixedValue=0; Units=g/m^2
        PhaseLookup SenescenceRate
          PhaseLookupValue ReproductivePhase: Start=StartPodDevelopment; End=Maturity
            MinimumFunction Rate
              DivideFunction Fraction
                VariableReference TT: VariableName=[Phenology].ThermalTime
                SubtractFunction TTRemaining
                  ExpressionFunction ReproductiveTT
                    Expression=[Phenology].EarlyPodDevelopment.Target+[Phenology].EarlyGrainFilling.Target+[Phenology].MidGrainFilling.Target+[Phenology].LateGrainFilling.Target
                  ExpressionFunction ReproductiveTT1Complete
                    Expression=[Phenology].EarlyPodDevelopment.ProgressThroughPhase+[Phenology].EarlyGrainFilling.ProgressThroughPhase+[Phenology].MidGrainFilling.ProgressThroughPhase+[Phenology].LateGrainFilling.ProgressThroughPhase
              Constant One: FixedValue=1
        Constant DetachmentRateFunction: FixedValue=0; Units=/d
        Constant MaintenanceRespirationFunction: FixedValue=0; Units=0-1
        Constant DMConversionEfficiency: FixedValue=1; Units=0-1
        Constant DMReallocationFactor: FixedValue=0
        Constant RemobilisationCost: FixedValue=0
        Constant CarbonConcentration: FixedValue=0.4
        Constant PotentialHarvestIndex: FixedValue=0.2
        AddFunction FillingDuration
          VariableReference EarlyPodDevelopmentDuration: VariableName=[Phenology].EarlyPodDevelopment.Target
          VariableReference EarlyGrainFillingDuration: VariableName=[Phenology].EarlyGrainFilling.Target
          VariableReference MidGrainFillingDuration: VariableName=[Phenology].MidGrainFilling.Target
        BiomassDemand DMDemands
          MultiplyFunction Structural
            PhaseLookup DMDemandFunction
              PhaseLookupValue PodDevelopment: Start=StartPodDevelopment; End=EndPodDevelopment
                MultiplyFunction HIPodDemand
                  VariableReference AboveGroundWt: VariableName=[AboveGround].Wt
                  DivideFunction HarvestIndexIncrease
                    VariableReference PotentialHarvestIndex: VariableName=[Shell].PotentialHarvestIndex
                    VariableReference FillingDuration: VariableName=[Shell].FillingDuration
                  VariableReference ThermalTime: VariableName=[Phenology].ThermalTime
            Constant StructuralFraction: FixedValue=1
          Constant Metabolic: FixedValue=0
          StorageDMDemandFunction Storage
            SubtractFunction StorageFraction
              Constant One: FixedValue=1
              VariableReference StructuralFraction: VariableName=[Shell].DMDemands.Structural.StructuralFraction
        BiomassDemand NDemands
          MultiplyFunction Structural
            VariableReference MinNconc: VariableName=[Shell].minimumNconc
            VariableReference PotentialDMAllocation: VariableName=[Shell].potentialDMAllocation.Structural
          StorageNDemandFunction Storage
            VariableReference NitrogenDemandSwitch: VariableName=[Shell].nitrogenDemandSwitch
            VariableReference MaxNconc: VariableName=[Shell].maximumNconc
          Constant Metabolic: FixedValue=0
        RetranslocateNonStructural RetranslocateNitrogen
      GenericOrgan Stem: IsAboveGround=true
        Constant NReallocationFactor: FixedValue=1
        Constant NRetranslocationFactor: FixedValue=0.5
        PhaseLookup DMRetranslocationFactor
          PhaseLookupValue GrainFilling: Start=EndCanopyDevelopment; End=EndGrainFill
            Constant RetranslocationFactor: FixedValue=0.2
        LinearInterpolationFunction MaximumNConc
          XYPairs: X=[3, 4, 5]; Y=[0.025, 0.02, 0.015]
          VariableReference XValue: VariableName=[Phenology].Stage
        Constant MinimumNConc: FixedValue=0.006
        PhaseBasedSwitch NitrogenDemandSwitch: Start=Emergence; End=StartGrainFilling
        BiomassRemoval BiomassRemovalDefaults: same as Replacements.Soybean.Nodule.BiomassRemovalDefaults
        Constant InitialWtFunction: FixedValue=0; Units=g/m^2
        PhaseLookup SenescenceRate
          PhaseLookupValue PostCanopyPhase: Start=EndCanopyDevelopment; End=Maturity
            MinimumFunction Rate
              DivideFunction Fraction
                VariableReference TT: VariableName=[Phenology].ThermalTime
                SubtractFunction TTRemaining
                  ExpressionFunction PostCanopyTT
                    Expression=[Phenology].EarlyPodDevelopment.Target+[Phenology].EarlyGrainFilling.Target+[Phenology].MidGrainFilling.Target+[Phenology].LateGrainFilling.Target
                  ExpressionFunction PostCanopyTTComplete
                    Expression=[Phenology].MidGrainFilling.ProgressThroughPhase+[Phenology].LateGrainFilling.ProgressThroughPhase
              Constant One: FixedValue=1
        Constant DetachmentRateFunction: FixedValue=0; Units=/d
        Constant MaintenanceRespirationFunction: FixedValue=0; Units=0-1
        Constant DMConversionEfficiency: FixedValue=1; Units=0-1
        Constant DMReallocationFactor: FixedValue=0
        VariableReference CriticalNConc: VariableName=[Stem].MinimumNConc
        Constant RemobilisationCost: FixedValue=0
        Constant CarbonConcentration: FixedValue=0.4
        BiomassDemand DMDemands
          MultiplyFunction Structural
            PhaseLookup Fraction
              PhaseLookupValue StemGrowthPhase: Start=Emergence; End=StartPodDevelopment
                Constant Fraction: FixedValue=0.75
              PhaseLookupValue PodAndGrainGrowth: Start=StartPodDevelopment; End=EndGrainFill
                Constant Fraction: FixedValue=0
            VariableReference DMDemand: VariableName=[Stem].PotentialGrowth
          Constant Metabolic: FixedValue=0
          MultiplyFunction Storage
            VariableReference DMDemand: VariableName=[Stem].PotentialGrowth
            SubtractFunction StorageFraction
              Constant One: FixedValue=1
              VariableReference StructuralFraction: VariableName=[Stem].DMDemands.Structural.Fraction
        BiomassDemand NDemands
          MultiplyFunction Structural
            VariableReference MinNconc: VariableName=[Stem].minimumNconc
            VariableReference PotentialDMAllocation: VariableName=[Stem].potentialDMAllocation.Structural
          MultiplyFunction Metabolic
            SubtractFunction MetabolicNconc
              VariableReference CritNconc: VariableName=[Stem].criticalNConc
              VariableReference MinNconc: VariableName=[Stem].minimumNconc
            VariableReference PotentialDMAllocation: VariableName=[Stem].potentialDMAllocation.Structural
          StorageNDemandFunction Storage
            VariableReference NitrogenDemandSwitch: VariableName=[Stem].nitrogenDemandSwitch
            VariableReference MaxNconc: VariableName=[Stem].maximumNconc
        PartitionFractionDemandFunction PotentialGrowth
          PhaseLookup PartitionFraction
            PhaseLookupValue StemGrowthPhase: Start=Emergence; End=EndPodDevelopment
              Constant StemFraction: FixedValue=0.4
            PhaseLookupValue GrainFilling: Start=EndPodDevelopment; End=EndGrainFill
              Constant StemFraction: FixedValue=0
        RetranslocateNonStructural RetranslocateNitrogen
      CompositeBiomass AboveGround: DMDOfStructural=0.6
        Propertys=[[Leaf].Live, [Leaf].Dead, [Stem].Live, [Stem].Dead, [Grain].Live, [Grain].Dead, [Shell].Live, [Shell].Dead]
      CompositeBiomass BelowGround: Propertys=[[Root].Live, [Root].Dead, [Nodule].Live, [Nodule].Dead]; DMDOfStructural=0.6
      CompositeBiomass AboveGroundLive: Propertys=[[Leaf].Live, [Stem].Live, [Grain].Live, [Shell].Live]; DMDOfStructural=0.6
      CompositeBiomass Total: DMDOfStructural=0.6
        Propertys=[[Leaf].Live, [Leaf].Dead, [Stem].Live, [Stem].Dead, [Grain].Live, [Grain].Dead, [Shell].Live, [Shell].Dead, [Root].Live, [Root].Dead, [Nodule].Live, [Nodule].Dead]
      CompositeBiomass TotalLive: DMDOfStructural=0.6
        Propertys=[[Leaf].Live, [Stem].Live, [Grain].Live, [Shell].Live, [Root].Live, [Nodule].Live]
      CompositeBiomass TotalDead: DMDOfStructural=0.6
        Propertys=[[Leaf].Dead, [Stem].Dead, [Grain].Dead, [Shell].Dead, [Root].Dead, [Nodule].Dead]
      CompositeBiomass Pod: Propertys=[[Shell].Live, [Shell].Dead, [Grain].Live, [Grain].Dead]; DMDOfStructural=0.6
      Memo
        ## References

        ### **Ayaz S, McKenzie BA, McNeil DL, Hill GD.** **2004**. Light interception and utilization of four grain legumes sown at different plant populations and depths. _Journal of Agricultural Science,_ **142**: 297-308.
         **Ayaz S, McKenzie BA, Hill GD, McNeil DL.** **2004**. Variability in yield of four grain legume species in a subhumid temperate environment. II. Yield components. _Journal of Agricultural Science,_ **142**: 21-28.
         **Ayaz S, McKenzie BA, Hill GD, McNeil DL.** **2004**. Nitrogen distribution in four grain legumes. _Journal of Agricultural Science,_ **142**: 309-317.
         **Wilson DR, Robertson MJ.** **1996.** Pea phenology responses to temperature and photoperiod. _Australian Agronomy Society_.
      CultivarFolder Australia
        Cultivar Buchanan
          Command:
            [Phenology].Vegetative.Target.FixedValue = 480
            [Phenology].EarlyFlowering.Target.FixedValue = 100
            [Phenology].EarlyGrainFilling.Target.FractionofGrainfilling.FixedValue = 0.015
            [Phenology].LateGrainFilling.Target.EntireGrainfillPeriod.FixedValue = 467
            [Phenology].VegetativePhotoperiodModifier.XYPairs.X = 12.39, 15.61
            [Phenology].ReproductivePhotoperiodModifier.XYPairs.X = 12.39, 15.61
            [Phenology].MidGrainFilling.Target.FractionofMidToLateGrainfilling.FixedValue=0.33
            [Grain].MaximumNConc.FixedValue = 0.067
            [Stem].PotentialGrowth.PartitionFraction.StemGrowthPhase.StemFraction.FixedValue = 0.5
            [Leaf].AreaLargestLeaf.FixedValue=0.009
        Cultivar Djakal
          Command:
            [Phenology].Vegetative.Target.FixedValue = 380
            [Phenology].EarlyFlowering.Target.FixedValue = 100
            [Phenology].EarlyGrainFilling.Target.FractionofGrainfilling.FixedValue = 0.05
            [Phenology].LateGrainFilling.Target.EntireGrainfillPeriod.FixedValue = 405
            [Phenology].VegetativePhotoperiodModifier.XYPairs.X = 13.75, 17
            [Phenology].ReproductivePhotoperiodModifier.XYPairs.X = 11.9, 15.5
            [Leaf].AreaLargestLeaf.FixedValue=0.009
        Cultivar Davis
          Command:
            [Phenology].Vegetative.Target.FixedValue = 480
            [Phenology].EarlyFlowering.Target.FixedValue = 100
            [Phenology].EarlyGrainFilling.Target.FractionofGrainfilling.FixedValue = 0.015
            [Phenology].LateGrainFilling.Target.EntireGrainfillPeriod.FixedValue = 467
            [Phenology].VegetativePhotoperiodModifier.XYPairs.X = 12.39, 15.61
            [Phenology].ReproductivePhotoperiodModifier.XYPairs.X = 12.39, 15.61
            [Phenology].MidGrainFilling.Target.FractionofMidToLateGrainfilling.FixedValue=0.33
            [Grain].MaximumNConc.FixedValue = 0.067
            [Stem].PotentialGrowth.PartitionFraction.StemGrowthPhase.StemFraction.FixedValue = 0.5
            [Leaf].AreaLargestLeaf.FixedValue=0.012
        Cultivar Hooper_MG40
          Command:
            [Phenology].Vegetative.Target.FixedValue = 380
            [Phenology].EarlyFlowering.Target.FixedValue = 80
            [Phenology].EarlyGrainFilling.Target.FractionofGrainfilling.FixedValue = 0.05
            [Phenology].LateGrainFilling.Target.EntireGrainfillPeriod.FixedValue = 440
            [Phenology].VegetativePhotoperiodModifier.XYPairs.X = 13.26, 16.67
            [Phenology].ReproductivePhotoperiodModifier.XYPairs.X = 13.26, 16.67
            [Leaf].AreaLargestLeaf.FixedValue=0.009
        Cultivar Stephens_MG40
          Command:
            [Phenology].Vegetative.Target.FixedValue = 360
            [Phenology].EarlyFlowering.Target.FixedValue = 80
            [Phenology].EarlyGrainFilling.Target.FractionofGrainfilling.FixedValue = 0.05
            [Phenology].LateGrainFilling.Target.EntireGrainfillPeriod.FixedValue = 440
            [Phenology].VegetativePhotoperiodModifier.XYPairs.X = 13.26, 16.67
            [Phenology].ReproductivePhotoperiodModifier.XYPairs.X = 13.26, 16.67
            [Leaf].AreaLargestLeaf.FixedValue=0.009
        Cultivar FiskebyV
          Command:
            [Phenology].Vegetative.Target.FixedValue = 285
            [Phenology].EarlyFlowering.Target.FixedValue = 80
            [Phenology].EarlyGrainFilling.Target.FractionofGrainfilling.FixedValue = 0.05
            [Phenology].LateGrainFilling.Target.EntireGrainfillPeriod.FixedValue = 405
            [Phenology].VegetativePhotoperiodModifier.XYPairs.X = 13.75, 18
            [Phenology].ReproductivePhotoperiodModifier.XYPairs.X = 13.75, 18
          Memo
            Early-maturing, photoperiod-insensitive cultivar developed in Sweden for high latitude environments
        Cultivar F148_7
          Command:
            [Phenology].Vegetative.Target.FixedValue = 314
            [Phenology].EarlyFlowering.Target.FixedValue = 80
            [Phenology].EarlyGrainFilling.Target.FractionofGrainfilling.FixedValue = 0.05
            [Phenology].LateGrainFilling.Target.EntireGrainfillPeriod.FixedValue = 485
            [Phenology].VegetativePhotoperiodModifier.XYPairs.X = 13.75, 17
            [Phenology].ReproductivePhotoperiodModifier.XYPairs.X = 12, 18
            [Leaf].AreaLargestLeaf.FixedValue=0.009
          Memo
            Indeterminate breeding selection from the national soybean breeding program combining phytophthora resistance, earliness,
            culinary quality, and yield
        Cultivar Bowyer
          Command:
            [Phenology].Vegetative.Target.FixedValue = 377
            [Phenology].EarlyFlowering.Target.FixedValue = 80
            [Phenology].EarlyGrainFilling.Target.FractionofGrainfilling.FixedValue = 0.05
            [Phenology].LateGrainFilling.Target.EntireGrainfillPeriod.FixedValue = 405
            [Phenology].VegetativePhotoperiodModifier.XYPairs.X = 13.75, 15.5
            [Phenology].ReproductivePhotoperiodModifier.XYPairs.X = 11.9, 15.5
          Memo
            Brown hilum cultivar, adapted to southern New South Wales, released by K McWhirter in 1982
        Cultivar Bunya
          Command:
            [Phenology].Vegetative.Target.FixedValue = 550
            [Phenology].EarlyFlowering.Target.FixedValue = 80
            [Phenology].EarlyGrainFilling.Target.FractionofGrainfilling.FixedValue = 0.05
            [Phenology].LateGrainFilling.Target.EntireGrainfillPeriod.FixedValue = 405
            [Phenology].VegetativePhotoperiodModifier.XYPairs.X = 13.75, 18
            [Phenology].ReproductivePhotoperiodModifier.XYPairs.X = 10.9, 15.5
            [Leaf].AreaLargestLeaf.FixedValue=0.009
          Memo
            Culinary cultivar released in 2006 by CSIRO with broad adaptation from northern New South Wales to northern Queensland
        Cultivar Cowrie
          Command:
            [Phenology].Vegetative.Target.FixedValue = 390
            [Phenology].EarlyFlowering.Target.FixedValue = 80
            [Phenology].EarlyGrainFilling.Target.FractionofGrainfilling.FixedValue = 0.05
            [Phenology].LateGrainFilling.Target.EntireGrainfillPeriod.FixedValue = 425
            [Phenology].VegetativePhotoperiodModifier.XYPairs.X = 12.75, 16
            [Phenology].ReproductivePhotoperiodModifier.XYPairs.X = 12.75, 16
            [Leaf].AreaLargestLeaf.FixedValue=0.009
          Memo
            Light hilum cultivar released by theNewSouth Wales Department of Agriculture for the coastal Northern Rivers District inNewSouth Wales
        Cultivar Soya791
          Command:
            [Phenology].Vegetative.Target.FixedValue = 430
            [Phenology].EarlyFlowering.Target.FixedValue = 80
            [Phenology].EarlyGrainFilling.Target.FractionofGrainfilling.FixedValue = 0.05
            [Phenology].LateGrainFilling.Target.EntireGrainfillPeriod.FixedValue = 425
            [Phenology].VegetativePhotoperiodModifier.XYPairs.X = 12.75, 15.3
            [Phenology].ReproductivePhotoperiodModifier.XYPairs.X = 12.75, 15.3
            [Leaf].AreaLargestLeaf.FixedValue=0.009
        Cultivar Manark
          Command:
            [Phenology].Vegetative.Target.FixedValue = 440
            [Phenology].EarlyFlowering.Target.FixedValue = 80
            [Phenology].EarlyGrainFilling.Target.FractionofGrainfilling.FixedValue = 0.05
            [Phenology].LateGrainFilling.Target.EntireGrainfillPeriod.FixedValue = 425
            [Phenology].VegetativePhotoperiodModifier.XYPairs.X = 12.75, 15
            [Phenology].ReproductivePhotoperiodModifier.XYPairs.X = 12.75, 15
            [Leaf].AreaLargestLeaf.FixedValue=0.009
        Cultivar Warrigal
          Command:
            [Phenology].Vegetative.Target.FixedValue = 490
            [Phenology].EarlyFlowering.Target.FixedValue = 80
            [Phenology].EarlyGrainFilling.Target.FractionofGrainfilling.FixedValue = 0.05
            [Phenology].LateGrainFilling.Target.EntireGrainfillPeriod.FixedValue = 425
            [Phenology].VegetativePhotoperiodModifier.XYPairs.X = 12.75, 15
            [Phenology].ReproductivePhotoperiodModifier.XYPairs.X = 12.75, 15
            [Leaf].AreaLargestLeaf.FixedValue=0.009
        Cultivar Leichhardt
          Command:
            [Phenology].Vegetative.Target.FixedValue = 806
            [Phenology].EarlyFlowering.Target.FixedValue = 80
            [Phenology].EarlyGrainFilling.Target.FractionofGrainfilling.FixedValue = 0.05
            [Phenology].LateGrainFilling.Target.EntireGrainfillPeriod.FixedValue = 425
            [Phenology].VegetativePhotoperiodModifier.XYPairs.X = 12.75, 14.7
            [Phenology].ReproductivePhotoperiodModifier.XYPairs.X = 12.75, 14.7
            [Leaf].AreaLargestLeaf.FixedValue=0.009
        Cultivar Djakal1
          Command:
            [Phenology].Vegetative.Target.FixedValue = 332
            [Phenology].EarlyFlowering.Target.FixedValue = 80
            [Phenology].EarlyGrainFilling.Target.FractionofGrainfilling.FixedValue = 0.05
            [Phenology].LateGrainFilling.Target.EntireGrainfillPeriod.FixedValue = 440
            [Phenology].VegetativePhotoperiodModifier.XYPairs.X = 13.26, 16.67
            [Phenology].ReproductivePhotoperiodModifier.XYPairs.X = 13.26, 16.67
            [Leaf].AreaLargestLeaf.FixedValue=0.009
      CultivarFolder USA
        Cultivar Trial_MG00
          Command:
            [Phenology].Vegetative.Target.FixedValue = 268
            [Phenology].EarlyFlowering.Target.FixedValue = 76
            [Phenology].EarlyGrainFilling.Target.FractionofGrainfilling.FixedValue = 0.05
            [Phenology].LateGrainFilling.Target.EntireGrainfillPeriod.FixedValue = 432
            [Phenology].VegetativePhotoperiodModifier.XYPairs.X = 14.43, 21.19
            [Phenology].ReproductivePhotoperiodModifier.XYPairs.X = 14.43, 21.19
        Cultivar Lambert_MG0
          Command:
            [Phenology].Vegetative.Target.FixedValue = 294
            [Phenology].EarlyFlowering.Target.FixedValue = 81
            [Phenology].EarlyGrainFilling.Target.FractionofGrainfilling.FixedValue = 0.05
            [Phenology].LateGrainFilling.Target.EntireGrainfillPeriod.FixedValue = 442
            [Phenology].VegetativePhotoperiodModifier.XYPairs.X = 14.29, 20.14
            [Phenology].ReproductivePhotoperiodModifier.XYPairs.X = 14.29, 20.14
        Cultivar IA1006_MG10
          Command:
            [Phenology].Vegetative.Target.FixedValue = 336
            [Phenology].EarlyFlowering.Target.FixedValue = 118
            [Phenology].EarlyGrainFilling.Target.FractionofGrainfilling.FixedValue = 0.05
            [Phenology].LateGrainFilling.Target.EntireGrainfillPeriod.FixedValue = 518
            [Phenology].VegetativePhotoperiodModifier.XYPairs.X = 14.37, 19.30
            [Phenology].ReproductivePhotoperiodModifier.XYPairs.X = 14.37, 19.30
        Cultivar IA2008_MG20
          Command:
            [Phenology].Vegetative.Target.FixedValue = 329
            [Phenology].EarlyFlowering.Target.FixedValue = 150
            [Phenology].EarlyGrainFilling.Target.FractionofGrainfilling.FixedValue = 0.05
            [Phenology].LateGrainFilling.Target.EntireGrainfillPeriod.FixedValue = 580
            [Phenology].VegetativePhotoperiodModifier.XYPairs.X = 13.92, 17.93
            [Phenology].ReproductivePhotoperiodModifier.XYPairs.X = 13.92, 17.93
        Cultivar PioneerP22T61_MG22
          Command:
            [Phenology].Vegetative.Target.FixedValue = 328
            [Phenology].EarlyFlowering.Target.FixedValue = 106
            [Phenology].EarlyGrainFilling.Target.FractionofGrainfilling.FixedValue = 0.3
            [Phenology].LateGrainFilling.Target.EntireGrainfillPeriod.FixedValue = 499
            [Phenology].VegetativePhotoperiodModifier.XYPairs.X = 13.59, 17.6
            [Phenology].ReproductivePhotoperiodModifier.XYPairs.X = 13.59, 17.6
        Cultivar PioneerP22T69R_MG22
          Command:
            [Phenology].Vegetative.Target.FixedValue = 328
            [Phenology].EarlyFlowering.Target.FixedValue = 106
            [Phenology].EarlyGrainFilling.Target.FractionofGrainfilling.FixedValue = 0.35
            [Phenology].LateGrainFilling.Target.EntireGrainfillPeriod.FixedValue = 580
            [Phenology].VegetativePhotoperiodModifier.XYPairs.X = 13.59, 17.6
            [Phenology].ReproductivePhotoperiodModifier.XYPairs.X = 13.59, 17.6
        Cultivar Pioneer92MGI_MG26
          Command:
            [Phenology].Vegetative.Target.FixedValue = 271
            [Phenology].EarlyFlowering.Target.FixedValue = 120
            [Phenology].EarlyGrainFilling.Target.FractionofGrainfilling.FixedValue = 0.125
            [Phenology].LateGrainFilling.Target.EntireGrainfillPeriod.FixedValue = 529
            [Phenology].VegetativePhotoperiodModifier.XYPairs.X = 13.77, 17.57
            [Phenology].ReproductivePhotoperiodModifier.XYPairs.X = 13.77, 17.57
        Cultivar PioneerP92Y75_MG27
          Command:
            [Phenology].Vegetative.Target.FixedValue = 328
            [Phenology].EarlyFlowering.Target.FixedValue = 106
            [Phenology].EarlyGrainFilling.Target.FractionofGrainfilling.FixedValue = 0.14
            [Phenology].LateGrainFilling.Target.EntireGrainfillPeriod.FixedValue = 499
            [Phenology].VegetativePhotoperiodModifier.XYPairs.X = 13.59, 17.6
            [Phenology].ReproductivePhotoperiodModifier.XYPairs.X = 13.59, 17.6
        Cultivar Macon_MG30
          Command:
            [Phenology].Vegetative.Target.FixedValue = 367
            [Phenology].EarlyFlowering.Target.FixedValue = 163
            [Phenology].EarlyGrainFilling.Target.FractionofGrainfilling.FixedValue = 0.175
            [Phenology].LateGrainFilling.Target.EntireGrainfillPeriod.FixedValue = 607
            [Phenology].VegetativePhotoperiodModifier.XYPairs.X = 14.05, 17.56
            [Phenology].ReproductivePhotoperiodModifier.XYPairs.X = 14.05, 17.56
        Cultivar PioneerP93M11_MG31
          Command:
            [Phenology].Vegetative.Target.FixedValue = 250
            [Phenology].EarlyFlowering.Target.FixedValue = 110
            [Phenology].EarlyGrainFilling.Target.FractionofGrainfilling.FixedValue = 0.30
            [Phenology].LateGrainFilling.Target.EntireGrainfillPeriod.FixedValue = 457
            [Phenology].VegetativePhotoperiodModifier.XYPairs.X = 13.4, 16.0
            [Phenology].ReproductivePhotoperiodModifier.XYPairs.X = 13.4, 16.0
            [Grain].MaximumNConc.FixedValue = 0.065
            [Shell].PotentialHarvestIndex.FixedValue = 0.5
            [Leaf].AreaLargestLeaf.FixedValue=0.013
        Cultivar Becks321NRR_MG32
          Command:
            [Phenology].Vegetative.Target.FixedValue = 272
            [Phenology].EarlyFlowering.Target.FixedValue = 117
            [Phenology].EarlyGrainFilling.Target.FractionofGrainfilling.FixedValue = 0.20
            [Phenology].LateGrainFilling.Target.EntireGrainfillPeriod.FixedValue = 522
            [Phenology].VegetativePhotoperiodModifier.XYPairs.X = 13.45, 18.0
            [Phenology].ReproductivePhotoperiodModifier.XYPairs.X = 13.45, 18.0
        Cultivar PioneerP932T16R_MG32
          Command:
            [Phenology].Vegetative.Target.FixedValue = 328
            [Phenology].EarlyFlowering.Target.FixedValue = 106
            [Phenology].EarlyGrainFilling.Target.FractionofGrainfilling.FixedValue = 0.40
            [Phenology].LateGrainFilling.Target.EntireGrainfillPeriod.FixedValue = 499
            [Phenology].VegetativePhotoperiodModifier.XYPairs.X = 13.59, 17.6
            [Phenology].ReproductivePhotoperiodModifier.XYPairs.X = 13.59, 17.6
        Cultivar Becks367NRR_MG37
          Command:
            [Phenology].Vegetative.Target.FixedValue = 267
            [Phenology].EarlyFlowering.Target.FixedValue = 112
            [Phenology].EarlyGrainFilling.Target.FractionofGrainfilling.FixedValue = 0.26
            [Phenology].LateGrainFilling.Target.EntireGrainfillPeriod.FixedValue = 506
            [Phenology].VegetativePhotoperiodModifier.XYPairs.X = 13.27, 17.2
            [Phenology].ReproductivePhotoperiodModifier.XYPairs.X = 13.27, 17.2
        Cultivar AsgrowAG4403_MG40
          Command:
            [Phenology].Vegetative.Target.FixedValue = 292
            [Phenology].EarlyFlowering.Target.FixedValue = 123
            [Phenology].EarlyGrainFilling.Target.FractionofGrainfilling.FixedValue = 0.30
            [Phenology].LateGrainFilling.Target.EntireGrainfillPeriod.FixedValue = 535
            [Phenology].VegetativePhotoperiodModifier.XYPairs.X = 13.09, 16.49
            [Phenology].ReproductivePhotoperiodModifier.XYPairs.X = 13.09, 16.49
        Cultivar HornbeckHBK4891_MG40: same as Replacements.Soybean.USA.AsgrowAG4403_MG40
        Cultivar Pioneer94B01_MG40
          Command:
            [Phenology].Vegetative.Target.FixedValue = 322
            [Phenology].EarlyFlowering.Target.FixedValue = 143
            [Phenology].EarlyGrainFilling.Target.FractionofGrainfilling.FixedValue = 0.30
            [Phenology].LateGrainFilling.Target.EntireGrainfillPeriod.FixedValue = 567
            [Phenology].VegetativePhotoperiodModifier.XYPairs.X = 13.05, 16.46
            [Phenology].ReproductivePhotoperiodModifier.XYPairs.X = 13.05, 16.46
        Cultivar PioneerP9504_MG50
          Command:
            [Phenology].Vegetative.Target.FixedValue = 404
            [Phenology].EarlyFlowering.Target.FixedValue = 112
            [Phenology].EarlyGrainFilling.Target.FractionofGrainfilling.FixedValue = 0.30
            [Phenology].LateGrainFilling.Target.EntireGrainfillPeriod.FixedValue = 505
            [Phenology].VegetativePhotoperiodModifier.XYPairs.X = 12.83, 16.13
            [Phenology].ReproductivePhotoperiodModifier.XYPairs.X = 12.83, 16.13
        Cultivar AsgrowAG5701_MG50
          Command:
            [Phenology].Vegetative.Target.FixedValue = 404
            [Phenology].EarlyFlowering.Target.FixedValue = 131
            [Phenology].EarlyGrainFilling.Target.FractionofGrainfilling.FixedValue = 0.30
            [Phenology].LateGrainFilling.Target.EntireGrainfillPeriod.FixedValue = 549
            [Phenology].VegetativePhotoperiodModifier.XYPairs.X = 12.83, 16.13
            [Phenology].ReproductivePhotoperiodModifier.XYPairs.X = 12.83, 16.13
        Cultivar Hutcheson_MG50
          Command:
            [Phenology].Vegetative.Target.FixedValue = 438
            [Phenology].EarlyFlowering.Target.FixedValue = 112
            [Phenology].EarlyGrainFilling.Target.FractionofGrainfilling.FixedValue = 0.30
            [Phenology].LateGrainFilling.Target.EntireGrainfillPeriod.FixedValue = 505
            [Phenology].VegetativePhotoperiodModifier.XYPairs.X = 12.58, 15.88
            [Phenology].ReproductivePhotoperiodModifier.XYPairs.X = 12.58, 15.88
        Cultivar NK622_MG60
          Command:
            [Phenology].Vegetative.Target.FixedValue = 436
            [Phenology].EarlyFlowering.Target.FixedValue = 93
            [Phenology].EarlyGrainFilling.Target.FractionofGrainfilling.FixedValue = 0.30
            [Phenology].LateGrainFilling.Target.EntireGrainfillPeriod.FixedValue = 467
            [Phenology].VegetativePhotoperiodModifier.XYPairs.X = 12.39, 15.61
            [Phenology].ReproductivePhotoperiodModifier.XYPairs.X = 12.39, 15.61
      CultivarFolder Generic
        Cultivar Generic_MG000
          Command:
            [Phenology].Vegetative.Target.FixedValue = 310
            [Phenology].EarlyFlowering.Target.FixedValue = 100
            [Phenology].EarlyGrainFilling.Target.FractionofGrainfilling.FixedValue = 0.475
            [Phenology].LateGrainFilling.Target.EntireGrainfillPeriod.FixedValue = 590
            [Phenology].VegetativePhotoperiodModifier.XYPairs.X = 14.6, 22.35
            [Phenology].ReproductivePhotoperiodModifier.XYPairs.X = 14.6, 22.35
        Cultivar Generic_MG00
          Command:
            [Phenology].Vegetative.Target.FixedValue = 320
            [Phenology].EarlyFlowering.Target.FixedValue = 100
            [Phenology].EarlyGrainFilling.Target.FractionofGrainfilling.FixedValue = 0.467
            [Phenology].LateGrainFilling.Target.EntireGrainfillPeriod.FixedValue = 600
            [Phenology].VegetativePhotoperiodModifier.XYPairs.X = 14.35, 21.11
            [Phenology].ReproductivePhotoperiodModifier.XYPairs.X = 14.35, 21.11
        Cultivar Generic_MG0
          Command:
            [Phenology].Vegetative.Target.FixedValue = 336
            [Phenology].EarlyFlowering.Target.FixedValue = 120
            [Phenology].EarlyGrainFilling.Target.FractionofGrainfilling.FixedValue = 0.422
            [Phenology].LateGrainFilling.Target.EntireGrainfillPeriod.FixedValue = 616
            [Phenology].VegetativePhotoperiodModifier.XYPairs.X = 14.1, 19.95
            [Phenology].ReproductivePhotoperiodModifier.XYPairs.X = 14.1, 19.95
        Cultivar Generic_MG1
          Command:
            [Phenology].Vegetative.Target.FixedValue = 340
            [Phenology].EarlyFlowering.Target.FixedValue = 120
            [Phenology].EarlyGrainFilling.Target.FractionofGrainfilling.FixedValue = 0.411
            [Phenology].LateGrainFilling.Target.EntireGrainfillPeriod.FixedValue = 632
            [Phenology].VegetativePhotoperiodModifier.XYPairs.X = 13.84, 18.77
            [Phenology].ReproductivePhotoperiodModifier.XYPairs.X = 13.84, 18.77
        Cultivar Generic_MG2
          Command:
            [Phenology].Vegetative.Target.FixedValue = 348
            [Phenology].EarlyFlowering.Target.FixedValue = 120
            [Phenology].EarlyGrainFilling.Target.FractionofGrainfilling.FixedValue = 0.386
            [Phenology].LateGrainFilling.Target.EntireGrainfillPeriod.FixedValue = 648
            [Phenology].VegetativePhotoperiodModifier.XYPairs.X = 13.59, 17.61
            [Phenology].ReproductivePhotoperiodModifier.XYPairs.X = 13.59, 17.61
        Cultivar Generic_MG3
          Command:
            [Phenology].Vegetative.Target.FixedValue = 380
            [Phenology].EarlyFlowering.Target.FixedValue = 120
            [Phenology].EarlyGrainFilling.Target.FractionofGrainfilling.FixedValue = 0.361
            [Phenology].LateGrainFilling.Target.EntireGrainfillPeriod.FixedValue = 664
            [Phenology].VegetativePhotoperiodModifier.XYPairs.X = 13.4, 16.91
            [Phenology].ReproductivePhotoperiodModifier.XYPairs.X = 13.4, 16.91
        Cultivar Generic_MG4
          Command:
            [Phenology].Vegetative.Target.FixedValue = 388
            [Phenology].EarlyFlowering.Target.FixedValue = 140
            [Phenology].EarlyGrainFilling.Target.FractionofGrainfilling.FixedValue = 0.324
            [Phenology].LateGrainFilling.Target.EntireGrainfillPeriod.FixedValue = 664
            [Phenology].VegetativePhotoperiodModifier.XYPairs.X = 13.1, 16.49
            [Phenology].ReproductivePhotoperiodModifier.XYPairs.X = 13.1, 16.49
        Cultivar Generic_MG5
          Command:
            [Phenology].Vegetative.Target.FixedValue = 396
            [Phenology].EarlyFlowering.Target.FixedValue = 160
            [Phenology].EarlyGrainFilling.Target.FractionofGrainfilling.FixedValue = 0.072
            [Phenology].LateGrainFilling.Target.EntireGrainfillPeriod.FixedValue = 696
            [Phenology].VegetativePhotoperiodModifier.XYPairs.X = 12.83, 16.13
            [Phenology].ReproductivePhotoperiodModifier.XYPairs.X = 12.83, 16.13
        Cultivar Generic_MG6
          Command:
            [Phenology].Vegetative.Target.FixedValue = 404
            [Phenology].EarlyFlowering.Target.FixedValue = 180
            [Phenology].EarlyGrainFilling.Target.FractionofGrainfilling.FixedValue = 0.056
            [Phenology].LateGrainFilling.Target.EntireGrainfillPeriod.FixedValue = 712
            [Phenology].VegetativePhotoperiodModifier.XYPairs.X = 12.58, 15.8
            [Phenology].ReproductivePhotoperiodModifier.XYPairs.X = 12.58, 15.8
        Cultivar Generic_MG7
          Command:
            [Phenology].Vegetative.Target.FixedValue = 416
            [Phenology].EarlyFlowering.Target.FixedValue = 200
            [Phenology].EarlyGrainFilling.Target.FractionofGrainfilling.FixedValue = 0.055
            [Phenology].LateGrainFilling.Target.EntireGrainfillPeriod.FixedValue = 728
            [Phenology].VegetativePhotoperiodModifier.XYPairs.X = 12.33, 15.46
            [Phenology].ReproductivePhotoperiodModifier.XYPairs.X = 12.33, 15.46
        Cultivar Generic_MG8
          Command:
            [Phenology].Vegetative.Target.FixedValue = 430
            [Phenology].EarlyFlowering.Target.FixedValue = 200
            [Phenology].EarlyGrainFilling.Target.FractionofGrainfilling.FixedValue = 0.054
            [Phenology].LateGrainFilling.Target.EntireGrainfillPeriod.FixedValue = 744
            [Phenology].VegetativePhotoperiodModifier.XYPairs.X = 12.07, 15.1
            [Phenology].ReproductivePhotoperiodModifier.XYPairs.X = 12.07, 15.1
        Cultivar Generic_MG9
          Command:
            [Phenology].Vegetative.Target.FixedValue = 460
            [Phenology].EarlyFlowering.Target.FixedValue = 200
            [Phenology].EarlyGrainFilling.Target.FractionofGrainfilling.FixedValue = 0.053
            [Phenology].LateGrainFilling.Target.EntireGrainfillPeriod.FixedValue = 748
            [Phenology].VegetativePhotoperiodModifier.XYPairs.X = 11.88, 14.82
            [Phenology].ReproductivePhotoperiodModifier.XYPairs.X = 11.88, 14.82
        Cultivar Generic_MG10
          Command:
            [Phenology].Vegetative.Target.FixedValue = 470
            [Phenology].EarlyFlowering.Target.FixedValue = 200
            [Phenology].EarlyGrainFilling.Target.FractionofGrainfilling.FixedValue = 0.053
            [Phenology].LateGrainFilling.Target.EntireGrainfillPeriod.FixedValue = 748
            [Phenology].VegetativePhotoperiodModifier.XYPairs.X = 11.78, 14.65
            [Phenology].ReproductivePhotoperiodModifier.XYPairs.X = 11.78, 14.65
  DataStore
  Simulation
    Clock: Start=1990-01-01; End=2019-12-31
    Summary summaryfile
    Weather: FileName=%root%\Examples\WeatherFiles\Gatton.met
    SoilArbitrator Soil Arbitrator
    MicroClimate: a_interception=0; b_interception=1; c_interception=0; d_interception=0; soil_albedo=0.23; SoilHeatFluxFraction=0.4; NightInterceptionFraction=0.5; ReferenceHeight=2
    Zone paddock: Area=1; Slope=0; AspectAngle=0; Altitude=50
      Irrigation
      Fertiliser
      SurfaceOrganicMatter: InitialResidueName=maize; InitialResidueType=maize; InitialResidueMass=100; InitialStandingFraction=0; InitialCPR=0; InitialCNR=55; FractionFaecesAdded=1
      Report HarvestReport: EventNames=[Soybean].Harvesting
        VariableNames:
          [Clock].Today
          [Soybean].AboveGround.Wt
          [Soybean].Grain.Wt
      Plant Soybean: CropType=Soybean; IsEnding=false; DaysAfterEnding=0
      Soil: SoilType=APS6Soil; LocalName=APS6Site; Site=APS6Site; NearestTown=Unknown; Region=Lawes; NaturalVegetation=Unknown; Latitude=0; Longitude=0
        Physical
          Thickness  BD    AirDry  LL15  DUL   SAT
          150        1.38  0.1     0.2   0.38  0.43
          150        1.34  0.1     0.2   0.38  0.43
          300        1.35  0.1     0.22  0.4   0.43
          300        1.5   0.1     0.18  0.4   0.43
          300        1.49  0.1     0.14  0.39  0.42
          300        1.46  0.1     0.2   0.38  0.4
          300        1.46  0.1     0.2   0.38  0.4
          SoilCrop SoybeanSoil: LL=[0.2, 0.2, 0.22, 0.18, 0.14, 0.25, 0.28]; KL=[0.06, 0.05, 0.05, 0.04, 0.04, 0.06, 0.06]; XF=[1, 1, 1, 1, 1, 1, 1]
        SoilWater: SummerDate=1-Nov; SummerU=6; SummerCona=3.5; WinterDate=1-Apr; WinterU=6; WinterCona=3.5; DiffusConst=88; DiffusSlope=35.4; Salb=0.13; CN2Bare=60; CNRed=20; CNCov=0.8; slope=0; discharge_width=0; catchment_area=0; max_pond=0; PrecipitationInterception=0
          Thickness  SWCON  KLAT
          150        0.3    0
          150        0.3    0
          300        0.3    0
          300        0.3    0
          300        0.3    0
          300        0.3    0
          300        0.3    0
        Organic: FOMCNRatio=60
          Thickness  Carbon  SoilCNRatio  FBiom  FInert  FOM
          150        2.2     14.5         0.03   0.45    34.7129
          150        1.6     14.5         0.02   0.6     27.0344
          300        1.15    14.5         0.01   0.78    16.3972
          300        1       14.5         0.01   0.9     9.94541
          300        0.8     14.5         0.01   0.99    6.0322
          300        0.45    14.5         0.01   0.99    3.65871
          300        0.45    14.5         0.01   0.99    2.21912
        Chemical
          Thickness  NO3N  NH4N  PH
          150        10    3     7.5
          150        5     2     8
          300        3     1     8
          300        2     0.8   8
          300        1     0.8   8
          300        0.1   0.5   8
          300        0.1   0.5   8
        Sample Initial Water: Thickness=[150, 150, 300, 300, 300, 300, 300]; SW=[0.326, 0.326, 0.346, 0.333, 0.315, 0.326, 0.326]; SWUnits=Volumetric; OCUnits=Total; PHUnits=Water
        Sample Initial Nitrogen: Thickness=[150, 150, 300, 300, 300, 300, 300]; SWUnits=Volumetric; OCUnits=Total; PHUnits=Water
        CERESSoilTemperature
        Nutrient
          DirectedGraphInfo={Nodes=[{Name=Inert, OutlineColour=Black}, {Name=SurfaceResidue, OutlineColour=Black}, {Name=FOMLignin, OutlineColour=Black}, {Name=FOMCellulose, OutlineColour=Black}, {Name=FOMCarbohydrate, OutlineColour=Black}, {Name=Microbial, OutlineColour=Black}, {Name=Humic, OutlineColour=Black}, {Name=Urea, OutlineColour=Black}, {Name=NO3, OutlineColour=Black}, {Name=NH4, OutlineColour=Black}, {Name=Atmosphere, OutlineColour=White}, {Name=PlantAvailableNO3, OutlineColour=Black}, {Name=PlantAvailableNH4, OutlineColour=Black}], Arcs=[{SourceName=SurfaceResidue, DestinationName=Microbial}, {SourceName=SurfaceResidue, DestinationName=Humic}, {SourceName=FOMLignin, DestinationName=Microbial}, {SourceName=FOMLignin, DestinationName=Humic}, {SourceName=FOMCellulose, DestinationName=Microbial}, {SourceName=FOMCellulose, DestinationName=Humic}, {SourceName=FOMCarbohydrate, DestinationName=Microbial}, {SourceName=FOMCarbohydrate, DestinationName=Humic}, {SourceName=Microbial, DestinationName=Microbial}, {SourceName=Microbial, DestinationName=Humic}, {SourceName=Humic, DestinationName=Microbial}, {SourceName=Urea, DestinationName=NH4}, {SourceName=NO3, DestinationName=Atmosphere}, {SourceName=NH4, DestinationName=NO3}]}
      Manager SowingRule
        StartDate = 1-sep
        EndDate = 1-dec
        MinESW = 50
        MinRain = 25
        RainDays = 7
        CultivarName = Davis
        SowingDepth = 50
        RowSpacing = 750
        Population = 38
```csharp
using System;
using Models.Core;
using Models.PMF;
using Models.Soils;
using Models.Soils.Nutrients;
using Models.Utilities;
using APSIM.Shared.Utilities;

namespace Models
{
    [Serializable]
    public class Script : Model
    {
        [Link] Clock Clock;
        [Link] Fertiliser Fertiliser;
        [Link] Summary Summary;
        [Link] Plant Soybean;
        [Link] Soil Soil;
        Accumulator accumulatedRain;
        
        [Description("Start of sowing window (d-mmm)")]
        public string StartDate { get; set; }
        [Description("End of sowing window (d-mmm)")]
        public string EndDate { get; set; }
        [Description("Minimum extractable soil water for sowing (mm)")]
        public double MinESW { get; set; }
        [Description("Accumulated rainfall required for sowing (mm)")]
        public double MinRain { get; set; }
        [Description("Duration of rainfall accumulation (d)")]
        public int RainDays { get; set; }
        [Description("Cultivar to be sown")]
        [Display(Type=DisplayType.CultivarName, PlantName = "Soybean")]
        public string CultivarName { get; set; }
        [Description("Sowing depth (mm)")]
        public double SowingDepth { get; set; }
        [Description("Row spacing (mm)")]
        public double RowSpacing { get; set; }
        [Description("Plant population (/m2)")]
        public double Population { get; set; }
        
        
        [EventSubscribe("Commencing")]
        private void OnSimulationCommencing(object sender, EventArgs e)
        {
            accumulatedRain = new Accumulator(this, "[Weather].Rain", RainDays);
        }
        

        [EventSubscribe("DoManagement")]
        private void OnDoManagement(object sender, EventArgs e)
        {
            accumulatedRain.Update();
            
            if (DateUtilities.WithinDates(StartDate, Clock.Today, EndDate) &&
                !Soybean.IsAlive &&
                MathUtilities.Sum(Soil.SoilWater.ESW) > MinESW &&
                accumulatedRain.Sum > MinRain)
            {
                Soybean.Sow(population: Population, cultivar: CultivarName, depth: SowingDepth, rowSpacing: RowSpacing);    
            }
        
        }
        
    }
}
```
      Manager Harvesting
```csharp
using System;
using Models.Core;
using System.Collections.Generic;
using System.Text;
using Models.Soils;
using Models.Soils.Nutrients;
using Models.PMF;
using Models;
using System.Xml.Serialization;
using APSIM.Shared.Utilities;

namespace Models
{
    [Serializable] 
    public class Script : Model
    {
        [Link] Plant Soybean;
        [Link] Zone zone;
                    
        
        [EventSubscribe("Commencing")]
        private void OnSimulationCommencing(object sender, EventArgs e)
        {
        }
        
        [EventSubscribe("DoManagement")]
        private void OnDoManagement(object sender, EventArgs e)
        {
            if (Soybean.Phenology.CurrentPhaseName == "ReadyForHarvesting")
            {
                Soybean.Harvest();
                Soybean.EndCrop();
            }
        }
        
        [EventSubscribe("DoManagementCalculations")]
        private void OnDoManagementCalculations(object sender, EventArgs e)
        {
            
        }
    }
}
```
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