Simulations: Version=168
  Simulation Base
    Clock: Start=2017-01-01; End=2018-01-01
    Summary
    MicroClimate: a_interception=0; b_interception=1; c_interception=0; d_interception=0; SoilHeatFluxFraction=0.4; MinimumHeightDiffForNewLayer=0; NightInterceptionFraction=0.5; ReferenceHeight=2
    Zone Field: Area=1; Slope=0; AspectAngle=0; Altitude=50
      Operations
        2017-01-01  [Fertiliser].Apply(50, Fertiliser.Types.NO3N, 50);
        2017-02-01  [Fertiliser].Apply(50, Fertiliser.Types.NO3N, 50);
        2017-03-01  [Fertiliser].Apply(50, Fertiliser.Types.NO3N, 50);
        2017-04-01  [Fertiliser].Apply(50, Fertiliser.Types.NO3N, 50);
        2017-05-01  [Fertiliser].Apply(50, Fertiliser.Types.NO3N, 50);
        2017-06-01  [Fertiliser].Apply(50, Fertiliser.Types.NO3N, 50);
        2017-07-01  [Fertiliser].Apply(50, Fertiliser.Types.NO3N, 50);
        2017-08-01  [Fertiliser].Apply(50, Fertiliser.Types.NO3N, 50);
        2017-09-01  [Fertiliser].Apply(50, Fertiliser.Types.NO3N, 50);
        2017-10-01  [Fertiliser].Apply(50, Fertiliser.Types.NO3N, 50);
        2017-11-01  [Fertiliser].Apply(50, Fertiliser.Types.NO3N, 50);
        2017-12-01  [Fertiliser].Apply(50, Fertiliser.Types.NO3N, 50);
        2017-01-01  [Irrigation].Apply(50);
        2017-02-01  [Irrigation].Apply(50);
        2017-03-01  [Irrigation].Apply(50);
        2017-04-01  [Irrigation].Apply(50);
        2017-05-01  [Irrigation].Apply(50);
        2017-06-01  [Irrigation].Apply(50);
        2017-07-01  [Irrigation].Apply(50);
        2017-08-01  [Irrigation].Apply(50);
        2017-09-01  [Irrigation].Apply(50);
        2017-10-01  [Irrigation].Apply(50);
        2017-11-01  [Irrigation].Apply(50);
        2017-12-01  [Irrigation].Apply(50);
      Manager FertiliserRule
        ApplicationAmount = 500
        FertType = NO3N
        ApplicationDate = 12/30/2017 00:00:00
```csharp
using Models.Soils;
using System;
using Models.Core;
using Models.PMF;
        namespace Models
        {
            [Serializable]
            public class Script : Model
            {      
               [Link] Fertiliser Fertiliser;
               [Link] Clock Clock;

               [Description("Amount (kg/ha) of fertiliser to apply")]
               public double ApplicationAmount {get; set;} //= 500;
               [Description("Type of fertiliser to apply")]
               public Fertiliser.Types FertType {get; set;}//= "NO3_N";
               [Description("Date of fertiliser application")]
               public DateTime ApplicationDate {get; set;} //= new DateTime(2003, 12, 30, 0, 0, 0);

               [EventSubscribe("DoManagement")]
               private void OnDoManagement(object sender, EventArgs e)
               {
               if (Clock.Today.Date.Equals(ApplicationDate))
                    Fertiliser.Apply(Amount:ApplicationAmount,Type:FertType);
               }
            }
        }
```
      Irrigation
      Fertiliser
      Report ReportOnFertilisation: EventNames=[Fertiliser].Fertilised
        VariableNames:
          [Clock].Today
          [Clock].Today.DayOfYear as doy
      Report ReportOnIrrigation: EventNames=[Irrigation].Irrigated
        VariableNames:
          [Clock].Today
          [Clock].Today.DayOfYear as doy
      Soil: SoilType=Black Vertosol; LocalName=Waco; Site=Jimbour; NearestTown=Jimbour, Q 4352; Region=South East Queensland; NaturalVegetation=Grassland, mainly Qld bluegrass; Latitude=0; Longitude=0
        Physical
          Thickness  BD    AirDry  LL15  DUL   SAT
          150        1.02  0.15    0.29  0.54  0.59
          150        1.03  0.26    0.29  0.53  0.58
          300        1.02  0.29    0.29  0.54  0.59
          300        1.02  0.29    0.29  0.54  0.58
          300        1.06  0.3     0.3   0.52  0.57
          300        1.11  0.31    0.31  0.5   0.55
          300        1.12  0.32    0.32  0.5   0.55
          300        1.15  0.33    0.33  0.48  0.53
          300        1.18  0.34    0.34  0.47  0.52
          300        1.2   0.35    0.35  0.46  0.51
          300        1.25  0.36    0.36  0.44  0.49
          SoilCrop WheatSoil
            LL=[0.29, 0.29, 0.32, 0.38, 0.39, 0.39, 0.41, 0.48, 0.47, 0.46, 0.44]
            KL=[0.1, 0.1, 0.08, 0.06, 0.04, 0.02, 0.01, 0, 0, 0, 0]
            XF=[1, 1, 1, 1, 1, 1, 1, 0, 0, 0, 0]
          SoilCrop BarleySoil
            LL=[0.29, 0.29, 0.36, 0.43, 0.51, 0.5, 0.5, 0.48, 0.47, 0.46, 0.44]
            KL=[0.1, 0.1, 0.08, 0.06, 0.04, 0.02, 0.01, 0, 0, 0, 0]
            XF=[1, 1, 1, 1, 1, 1, 1, 0, 0, 0, 0]
          SoilCrop PotatoSoil
            LL=[0.29, 0.29, 0.36, 0.43, 0.51, 0.5, 0.5, 0.48, 0.47, 0.46, 0.44]
            KL=[0.1, 0.1, 0.08, 0.06, 0.04, 0.02, 0.01, 0, 0, 0, 0]
            XF=[1, 1, 1, 1, 1, 1, 1, 0, 0, 0, 0]
        WaterBalance SoilWater: SummerDate=1-Nov; SummerU=6; SummerCona=3; WinterDate=1-Apr; WinterU=6; WinterCona=3; DiffusConst=40; DiffusSlope=16; Salb=0.13; CN2Bare=73; CNRed=20; CNCov=0.8; DischargeWidth=0; CatchmentArea=0; PSIDul=-100
          Thickness  SWCON  KLAT
          150        0.3    0
          150        0.3    0
          300        0.3    0
          300        0.3    0
          300        0.3    0
          300        0.3    0
          300        0.3    0
          300        0.3    0
          300        0.3    0
          300        0.3    0
          300        0.3    0
        Organic: FOMCNRatio=40; CarbonUnits=Total
          Thickness  Carbon  SoilCNRatio  FBiom  FInert  FOM
          150        1.04    12.5         0.025  0.4     48.1286
          150        0.89    12.5         0.02   0.6     41.4247
          300        0.89    12.5         0.015  0.8     30.6882
          300        0.89    12.5         0.01   0.9     22.7344
          300        0.77    12.5         0.01   0.95    16.842
          300        0.45    12.5         0.01   0.95    12.4769
          300        0.27    12.5         0.01   0.95    9.2431
          300        0.22    12.5         0.01   0.95    6.84746
          300        0.16    12.5         0.01   0.95    5.07272
          300        0.13    12.5         0.01   0.95    3.75796
          300        0.12    12.5         0.01   0.95    2.78397
        Chemical: PHUnits=Water
          Thickness  PH   EC
          150        8.4  0.2
          150        8.8  0.25
          300        9    0.31
          300        9.2  0.4
          300        9.2  0.59
          300        9.1  0.84
          300        9    0.93
          300        9    1.01
          300        8.9  1.06
          300        8.9  1.05
          300        8.9  1.01
        Water: Thickness=[150, 150, 300, 300, 300, 300, 300, 300, 300, 300, 300]; InitialPAWmm=541.5; RelativeTo=LL15; FilledFromTop=true
          InitialValues=[0.54, 0.53, 0.54, 0.54, 0.52, 0.5, 0.5, 0.48, 0.47, 0.46, 0.44]
        CERESSoilTemperature Temperature
        Nutrient
        Solute NO3: Thickness=[150, 150, 300, 300, 300, 300, 300, 300, 300, 300, 300]; InitialValuesUnits=ppm; WaterTableConcentration=0; D0=0; DepthConstant=0; MaxDepthSoluteAccessible=0; RunoffEffectivenessAtMovingSolute=0; MaxEffectiveRunoff=0
          InitialValues=[6.503, 2.101, 2.101, 1.701, 1.701, 1.701, 1.701, 1.701, 1.701, 1.701, 1.701]
        Solute NH4: Thickness=[150, 150, 300, 300, 300, 300, 300, 300, 300, 300, 300]; InitialValuesUnits=ppm; WaterTableConcentration=0; D0=0; DepthConstant=0; MaxDepthSoluteAccessible=0; RunoffEffectivenessAtMovingSolute=0; MaxEffectiveRunoff=0
          InitialValues=[0.599004, 0.100001, 0.100001, 0.100001, 0.100001, 0.100001, 0.100001, 0.100001, 0.100001, 0.100001, 0.100001]
        Solute Urea: Thickness=[150, 150, 300, 300, 300, 300, 300, 300, 300, 300, 300]; InitialValues=[0, 0, 0, 0, 0, 0, 0, 0, 0, 0, 0]; InitialValuesUnits=kg/ha; WaterTableConcentration=0; D0=0; DepthConstant=0; MaxDepthSoluteAccessible=0; RunoffEffectivenessAtMovingSolute=0; MaxEffectiveRunoff=0
      SurfaceOrganicMatter: InitialResidueName=Potato; InitialResidueType=Potato; InitialResidueMass=1000; InitialStandingFraction=0; InitialCPR=0; InitialCNR=80
  DataStore
