Simulations: Version=70
  DataStore
  Simulation BiomassTest
    Memo
      Di Mayberry (10/5/18)

      Sheep grazing wheat and fed in feedlot
      -

      In this simulation sheep are bought and sold on a specified date. There is also working code that allows sheep to be sold based on age and purchased to maintain flock size. This was causing some errors with supplement feeding, so was turned off.

      There are two paddocks. A feedlot that contains sheep fed supplement, and a continous wheat crop. Sheep are moved from the feedlot onto the wheat crop based on crop biomass and zadok stage.

      Manage_stock
      -
      1. Buy animals at start of year & put in feedlot
      2. Move animals from feedlot to crop when ready to graze
      3. Move animals from crop to feedlot
      4. Shear all animals on specified date
      5. Sell all animals at end of year

      Manage_supplement
      -
      1. Feeds stock supplement at set amount in feedlot only
      2. Restocks supplement store when reaches minimum level

      Errors to fix
      -
      1. When an animal dies, extra supplement is fed (see spikes in supp intake graph)
      2. When sheep are culled for age + purchased to maintain stocking rate, several groups of sheep are created.
      This causes irregular amounts of supplement to be fed.
    Clock: Start=2000-01-01; End=2000-03-31
    Summary SummaryFile
    Weather: FileName=%root%\Examples\WeatherFiles\lincoln.met
    SoilArbitrator
    Stock: RandSeed=9999
      GenoTypes:
        {DeathRate=[0, 0], Conceptions=[0, 1, 0, 0], GenotypeName=NZFriesianCross, DamBreed=Friesian, SireBreed=Jersey, Generation=1, SRW=550, PotFleeceWt=0, MaxFibreDiam=0, FleeceYield=0, PeakMilk=35}
      PaddockList:
        {Area=1, Slope=0}
    Supplement: SpoilageTime=0
      Stores:
        Name            Stored  IsRoughage  DMContent  DMD  MEContent  CPConc  ProtDg  PConc   SConc   EEConc  ADIP2CP  AshAlk  MaxPassage
        fodder          0       true        0.85       0    0          0       0       0       0       0       0        0       0
        wheat, crushed  500000  false       1          0.9  13.8       0.14    0.92    0.0038  0.0014  0.02    0.02     0.18    0
    Manager GrazeForageCrop
      Genotype = NZFriesianCross
      Sex = Female
      Age = 12
      Weight = 280
      Pregnant = 0
      Lactating = 0
      YoungNumber = 0
      YoungWt = 0
      StockingRate = 1
      CurrentLocation = Away
      PreGrazingDM = 2800
      PostGrazingDM = 1900
      MinGrazingDays = 0
      DoNoGrazingWindow = False
      NoGrazeStart = 15-jun
      NoGrazeEnd = 31-jul
      SupplementName = silage
      SupplementFirst = False
      SupplementEveryDay = 0
      SupplementOnPastureMass = 0
      TriggerPastureMass = 2100
      NumStock = 0
      GrazingSeasonIsOpen = False
      HarvestableBiomass = 0
```csharp
using System;
using Models;
using Models.Core;
using Models.Utilities;
using Models.GrazPlan;
using APSIM.Shared.Utilities;
using System.Xml.Serialization;
using Models.PMF;
using Models.Soils; 
using System.Collections;
using System.Collections.Generic;
using System.Linq;
using Models.AgPasture;
using System.Diagnostics;
using Models.PMF.Interfaces;

namespace Models
{

    [Serializable]
    public class Script : Model
    {
        [Link] Clock clock;
        [Link] Stock stock;
        [Link] Supplement supplement;
        [Link] List<Zone> paddocks;
        [Link] ISummary summary;
        [Link] Simulation farm;
        [Link] List<IPlantDamage> forages = null;

        private int CurrentGroupNum = 1;    // animal group number
        private int CurrentLocationNum { get; set; }

        [Separator("Stock type info, the same type of stock are brought onto the paddock at each grazing")]

        [Description("Stock: genotype (e.g. Small Merino, Angus, Friesian):")] 
        [Display(Values="GetGenotypes")]
        public string Genotype { get; set; }

		[Description("Stock: sex (Female, Male, Castrate):")] 
        public ReproductiveType Sex { get; set; }

        [Description("Stock: age (months):")] 
        public double Age { get; set; }

        [Description("Stock: weight (kg liveweight /head):")] 
        public double Weight { get; set; }

        [Description("Stock: fertility status (0 if non-pregnant or days since conception):")] 
        public int Pregnant { get; set; }

        [Description("Stock: lactation status (0 if non-lactating or days since parturition):")]
        public int Lactating { get; set; }

        [Description("Stock: number of unweaned young:")]
        public int YoungNumber { get; set; }

        [Description("Stock: weight of unweaned young:")] 
        public double YoungWt { get; set; }

        [Separator("Grazing event information")]

        [Description("Paddock stocking rate (head/ha): ")] 
        public double StockingRate { get; set; }

        [Description("Initial location of the cows (give either the paddock name or 'Away'): ")] 
        public string CurrentLocation { get; set; }

        [Description("Standing biomass at which to bring the stock into the simulation (kg DM/ha): ")] 
        public double PreGrazingDM { get; set; }

        [Description("Standing biomass at which to exit  stock from the simulation (kg DM/ha): ")] 
        public double PostGrazingDM { get; set; }

        [Description("Don't move the stock onto the crop unless there is approx. X days of grazable forage available: ")] 
        public int MinGrazingDays { get; set; }

        [Description("Implement a no-grazing window? (tick for yes): ")] 
        public bool DoNoGrazingWindow { get; set; }

        [Description("Start of the no-grazing window (dd-MMM)")] 
        public string NoGrazeStart { get; set; }

        [Description("End of the no-grazing window (dd-MMM)")] 
        public string NoGrazeEnd { get; set; }

        [Separator("Supplementary feeding")]

        [Description("Name of the supplement to feed: ")] 
        public string SupplementName { get; set; }

        [Description("Feed the supplement first (i.e. before the new forage is available to the stock)?: ")] 
        public bool SupplementFirst { get; set; }

        [Description("Amount of supplementary feeding offered every day (kg DM /head /day): ")] 
        public double SupplementEveryDay { get; set; }

        [Description("Additional amount of supplement offered when available biomass is low (kg DM /head /day): ")] 
        public double SupplementOnPastureMass { get; set; }

        [Description("Trigger biomass for above rule (kg DM /ha): ")] 
        public double TriggerPastureMass { get; set; }

        public int NumStock { get; set; }
        public bool GrazingSeasonIsOpen { get; set; } // number of cows on the whole farm
        public double HarvestableBiomass { get; set; }

        // Return a list of genotypes to the properties tab.
        public string[] GetGenotypes()
        {
        	if (stock != null)
        		return stock.GenotypeNamesAll();
    		return null;
        }

        [EventSubscribe("StartOfSimulation")]
        private void OnStartOfSimulation(object sender, EventArgs e)
        {

            //Debugger.Break();

            summary.WriteMessage(this, "Initialising the paddock information");

            NumStock = (int)(Math.Round(StockingRate * farm.Area, 0));

            if ((CurrentLocation.ToLower() != "away") && (NumStock > 0))
            {
                BuyStock();
                stock.Move(CurrentGroupNum, CurrentLocation);
                summary.WriteMessage(this, " The Stock have been moved to " + CurrentLocation);
            }

            summary.WriteMessage(this, "     The number of animals has been rounded to " + NumStock + " from " + (StockingRate * farm.Area));
            summary.WriteMessage(this, "     The animals will begin in " + CurrentLocation + " which is paddock number " + CurrentLocationNum + " in the simulation");
            summary.WriteMessage(this, "     The area of the whole farm is " + farm.Area + " ha");

        }

        [EventSubscribe("DoManagement")]
        private void OnDoManagement(object sender, EventArgs e)
        {
            GrazingSeasonIsOpen = true;
            if (DoNoGrazingWindow)
                GrazingSeasonIsOpen = !DateUtilities.WithinDates(NoGrazeStart, clock.Today, NoGrazeEnd);

            bool sellSomeStock = false;
            if (!GrazingSeasonIsOpen)
                sellSomeStock = true;

            // Calculate forage mass in the paddock
            HarvestableBiomass = 0.0;
            foreach (var forage in forages)
                foreach (var forageOrgan in forage.Organs)
                	if (forageOrgan.IsAboveGround)
                    	HarvestableBiomass += forageOrgan.Live.Wt + forageOrgan.Dead.Wt;
            HarvestableBiomass *= 10;  // Convert to kg/ha

            if (HarvestableBiomass <= PostGrazingDM)
                sellSomeStock = true;

            if (CurrentLocation == "Away")
                sellSomeStock = false;

            double minFodder = 0.03 * MinGrazingDays * NumStock * Weight; // The 0.03 is the propostion of body mass that the stock might eat
            if (CurrentLocation == "Away" && NumStock > 0 && (HarvestableBiomass >= PreGrazingDM) && HarvestableBiomass >= (PostGrazingDM + minFodder) && GrazingSeasonIsOpen)
            {
                CurrentLocation = paddocks[0].Name;
                CurrentLocationNum = paddocks[0].Index;
                BuyStock();
                stock.Move(CurrentGroupNum, CurrentLocation);
                summary.WriteMessage(this, "     Buying stock ");
            }

            if (sellSomeStock)
            {
                CurrentLocation = "Away";
                CurrentLocationNum = -1;
                SellStock();
                summary.WriteMessage(this, "     Selling stock ");
            }

            if (CurrentLocation != "Away")
            {
                if (SupplementEveryDay > 0)
                {
                    double silageOnHand = supplement.Stores[2 - 1].Stored;
                    if (silageOnHand < SupplementEveryDay * stock.NumberAll)
                    {
                        supplement.Buy(SupplementEveryDay * 30.0 * stock.NumberAll, SupplementName);  // i.e. 1 months worth
                        summary.WriteMessage(this, "SupplementEveryDay: Buying " + SupplementName + " of total amount : " + (SupplementEveryDay * 90 * stock.NumberAll) + " kg DM");
                    }
                    supplement.Feed(SupplementName, SupplementEveryDay * stock.NumberAll, CurrentLocation, SupplementFirst);
                }

                if (SupplementOnPastureMass > 0 && HarvestableBiomass <= TriggerPastureMass)
                {
                    double silageOnHand = supplement.Stores[2 - 1].Stored;
                    if (silageOnHand < SupplementOnPastureMass * stock.NumberAll)
                    {
                        supplement.Buy(SupplementOnPastureMass * 30.0 * stock.NumberAll, SupplementName);  // i.e. 1 months worth
                        summary.WriteMessage(this, "SupplementOnBiomass: Buying " + SupplementName + " of total amount : " + (SupplementOnPastureMass * 90 * stock.NumberAll) + " kg DM");
                    }
                    supplement.Feed(SupplementName, SupplementOnPastureMass * stock.NumberAll, CurrentLocation, SupplementFirst);
                }
            }
        }


        public void BuyStock()
        {
            CurrentGroupNum = stock.NoGroups + 1;
            StockBuy purchase = new StockBuy();
            purchase.Genotype = Genotype;
            purchase.Number = NumStock;
            purchase.Sex = Sex;
            purchase.Age = Age;       // age in months
            purchase.Weight = Weight;  // live weight in kg
            purchase.UseTag = CurrentGroupNum + 1;
            purchase.MatedTo = purchase.Genotype;
            purchase.Pregnant = Pregnant;  // days pregnant, 0 = non pregnant, 1 = pregnant
            purchase.Lactating = Lactating;  // 0 for dry, 1 for lactating
            purchase.NumYoung = YoungNumber;
            purchase.YoungWt = YoungWt;

            stock.Buy(purchase);
        }

        public void SellStock()
        {
            int NumGroups = stock.NoGroups;

            NumGroups = stock.NoGroups;
            for (int gg = 1; gg <= NumGroups; gg++)
            {
                stock.Sell(gg, stock.Number[gg - 1]);
            }
        }
    }
}
```
    Manager ManageSupplement
      SupplementAmount = 50
      SuppType = wheat, crushed
      SupplementThreshold = 500
```csharp
/*--------------------------------------------------------------------------------------------------
Sheep grazing wheat when conditions are suitable, and in feedlot fed supplement the rest of the time.
----------------------------------------------------------------------------------------------------

This manager:
1. Feeds stock supplement at set amount in feedlot only
2. Restocks supplement store when reaches minimum level

--------------------------------------------------------------------------------------------------*/


using System;
using Models.Core;
using Models.PMF;
using Models.Soils;
using Models.Utilities;
using Models.GrazPlan;
using APSIM.Shared.Utilities;

namespace Models
{
	[Serializable]
	public class Script : Model
	{
		[Link] Clock clock;
		[Link] Stock Animals;
		[Link] Supplement Feed;
		[Link] Summary Summary;
		[Link] Plant Wheat;
		[Link] Soil Soil;
		[Link] Zone Paddock;


		private int group_count;
		private int g;

		private string buy_date;
		private string buy_name;
		private double buy_amount;

		[Description("Amount supplement to feed (kg/animal). Supplement fed is as-is (fresh weight) basis.")]
		public double SupplementAmount { get; set; }

		[Description("Supplement type")]
		public string SuppType { get; set; }

		[Description("Minimum amount of supplement in store (kg)")]
		public double SupplementThreshold { get; set; }

		//////////////////////////////////////////////////////
		// Management that happens every day.
		//////////////////////////////////////////////////////

		[EventSubscribe("DoManagement")]
		private void OnDoManagement(object sender, EventArgs e)
		{
			// Feed animals supplement in feedot only
			for (int g = 0; g < Animals.NoGroups; g++)
			{
				// Check if animals are currently in feedlot. If so then offer supplement
				if (string.Compare(Animals.Paddock[g], "Feedlot", true) == 0)   {                                                                
					Feed.Feed(SuppType, SupplementAmount * Animals.NumberAll, "Feedlot");     
				}
			}

			// Stock supplement store
			if (Feed.Stores[1].Stored <= SupplementThreshold)
			{
				Feed.Buy(5000, SuppType);           // Amount (kg) and type of supplement to buy
				Summary.WriteMessage(this, string.Format("Buy supplement: {0:0.00} kg of {1}", 5000, "wheat, crushed"));
			}
		}
	}
}
```
    Manager GetChanges
      DiffOfBiomass = 0
```csharp
using System;
using Models;
using Models.Core;
using Models.Utilities;
using Models.GrazPlan;
using APSIM.Shared.Utilities;
using System.Xml.Serialization;
using Models.PMF;
using Models.PMF.Organs;
using Models.Soils; 
using System.Collections;
using System.Collections.Generic;
using System.Linq;
using Models.AgPasture;
using System.Diagnostics;
using Models.PMF.Interfaces;

namespace Models
{

    [Serializable]
    public class Script : Model
    {
        [Link] Clock clock;
        [Link] Plant Slurp;
        [Link] Supplement supplement;
        //[Link] List<Zone> paddocks;
        [Link] Zone paddocks;
        [Link] ISummary summary;
        [Link] Simulation farm;
        //[Link] List<IPlantDamage> forages = null;

        private double StartOfDayBiomass;
        private double EndOfDayBiomass;
        public double DiffOfBiomass  { get; set; }

        //[Separator("?????")]

        // Return a list of genotypes to the properties tab.
        [EventSubscribe("StartOfSimulation")]
        private void OnStartOfSimulation(object sender, EventArgs e)
        {
        }

        [EventSubscribe("DoManagement")]
        private void OnDoManagement(object sender, EventArgs e)
        {
        	StartOfDayBiomass = (Slurp.Leaf as SimpleLeaf).Live.Wt * 10.0;
        }

        [EventSubscribe("DoManagementCalculations")]
        private void OnDoManagementCalculations(object sender, EventArgs e)
        {
        	EndOfDayBiomass = (Slurp.Leaf as SimpleLeaf).Live.Wt * 10.0;
        	DiffOfBiomass = StartOfDayBiomass - EndOfDayBiomass;
        }
    }
}
```
    Report: EventNames=[Clock].EndOfDay
      VariableNames:
        [Clock].Today as Date
        [Paddock].Slurp.Leaf.Live.Wt * 10.0 as Biomass
        [Paddock].Slurp.Leaf.Live.N * 10.0 as BiomassN
        [GetChanges].Script.DiffOfBiomass as DltBiomass
        [Stock].IntakeAll.Weight * [Stock].NumberAll as Intake
        ([Stock].IntakeAll.Weight * [Stock].NumberAll) - [GetChanges].Script.DiffOfBiomass as LostBiomass
        [Stock].Intake
    Zone Paddock: Area=1; Slope=0; AspectAngle=0; Altitude=50
      Manager SlurpPreGrazingSet
        GrazedArea = 0
        SupplementOffered = 0
```csharp
using System;
using Models.Core;
using Models.Utilities;
using Models.GrazPlan;
using APSIM.Shared.Utilities;
using Models.PMF;
using Models.PMF.Organs;
using System.Data;
using System.IO;
using System.Diagnostics;
    
namespace Models
{
	[Serializable]
	public class Script : Model
	{
		[Link] Clock clock;
		[Link] Plant slurp;
		[Link] Simulation simulation;
		[Link] Zone paddock;
		[Link] Stock stock;
		[Link] Supplement supplement;
		[Link] Summary summary;

		[NonSerialized]
		private DataView data;

		[NonSerialized]
		private SimpleLeaf slurpLeaf;

		[Separator("Slurp will be automatically 'sown' at the sart of the simulation")]

        //[Description("EXCEL file name with the resetting data (must be .xlsx)")]
        //[Display(Type=DisplayType.FileName)]
		//public string SSheetFileName { get; set; }

		//[Description ("Name of worksheet containing the data")]
		//public string SSheetWorksheetName { get; set; }

		public double GrazedArea { get; set; }

		public double SupplementOffered { get; set; }

		[EventSubscribe("StartOfSimulation")]
		private void OnStartOfSimulation(object sender, EventArgs e)
		{
			//var fullFileName = SSheetFileName;
			//if (simulation != null && simulation.FileName != null)
            //    fullFileName = PathUtilities.GetAbsolutePath(SSheetFileName, simulation.FileName);

			//if (!File.Exists(fullFileName))
			//	throw new Exception("Cannot find file: " + fullFileName);
			//data = new DataView(ExcelUtilities.ReadExcelFileData(fullFileName, SSheetWorksheetName, headerRow:true));

			slurpLeaf = Apsim.Child(slurp, typeof(SimpleLeaf)) as SimpleLeaf;

			double wt = 500;
			slurpLeaf.Live.StructuralWt = wt;
			slurpLeaf.Live.StorageWt = 0;
			slurpLeaf.Live.StructuralN = wt * slurpLeaf.MinNconc;
			slurpLeaf.Live.StorageN = wt * slurpLeaf.MaxNconc - slurpLeaf.Live.StructuralN;

			supplement.SpoilageTime = 0.0; //days
		}

		[EventSubscribe("DoManagement")]
		private void OnDoManagement(object sender, EventArgs e)
		{
			/*double DM = 0.0;
			double digestibility = 0.0;


			if (digestibility == 0)
				digestibility = 0.84;

			if (DM > 0)
			{
				slurpLeaf.Live.StructuralWt = DM;
				slurpLeaf.Live.StorageWt = 0;
				slurpLeaf.Live.DMDOfStructural = digestibility;
				slurpLeaf.Live.StructuralN = DM * slurpLeaf.MinNconc;
				slurpLeaf.Live.StorageN = DM * slurpLeaf.MaxNconc - slurpLeaf.Live.StructuralN;
			}*/

		}
    }
}
```
      Plant Slurp: CropType=Slurp; IsEnding=false; DaysAfterEnding=0
      SurfaceOrganicMatter: InitialResidueName=wheat_stubble; InitialResidueType=wheat; InitialResidueMass=0; InitialStandingFraction=0; InitialCPR=0; InitialCNR=100; FractionFaecesAdded=0.5
      Soil: ASCOrder=Vertosol; ASCSubOrder=Black; SoilType=Clay; Site=Norwin; NearestTown=Norwin; Region=Darling Downs and Granite Belt; State=Queensland; Country=Australia; NaturalVegetation=Qld. Bluegrass, possible Qld. Blue gum; ApsoilNumber=900; Latitude=-27.581836; Longitude=151.320206; LocationAccuracy=+/- 20m
        DataSource=CSIRO Sustainable Ecosystems, Toowoomba; Characteriesd as part of the GRDC funded project"Doing it better, doing it smarter, managing soil water in Australian agriculture' 2011
        Comments=OC, CLL for all crops estimated-based on Bongeen Mywybilla Soil No1
        Physical
          Thickness  BD       AirDry    LL15      DUL       SAT       KS
          150        1.01056  0.13025   0.2605    0.521     0.588655  20
          150        1.07146  0.198689  0.248362  0.496723  0.565677  20
          300        1.09394  0.28      0.28      0.488438  0.557193  20
          300        1.15861  0.28      0.28      0.480297  0.532787  20
          300        1.17301  0.28      0.28      0.471584  0.527354  20
          300        1.16287  0.28      0.28      0.457071  0.53118   20
          300        1.1875   0.28      0.28      0.452332  0.521888  20
          SoilCrop SlurpSoil: LL=[0.261, 0.248, 0.28, 0.306, 0.36, 0.392, 0.446]; KL=[0.06, 0.06, 0.06, 0.04, 0.04, 0.02, 0.01]; XF=[1, 1, 1, 1, 1, 1, 1]
        SoilWater: SummerDate=1-Nov; SummerU=5; SummerCona=5; WinterDate=1-Apr; WinterU=5; WinterCona=5; DiffusConst=40; DiffusSlope=16; Salb=0.12; CN2Bare=73; CNRed=20; CNCov=0.8; max_pond=0; Thickness=[150, 150, 300, 300, 300, 300, 300]; SWCON=[0.3, 0.3, 0.3, 0.3, 0.3, 0.3, 0.3]; PrecipitationInterception=0
        SoilNitrogen: fom_types=[default, manure, mucuna, lablab, shemp, stable]; fract_carb=[0.2, 0.3, 0.54, 0.57, 0.45, 0]; fract_cell=[0.7, 0.3, 0.37, 0.37, 0.47, 0.1]; fract_lign=[0.1, 0.4, 0.09, 0.06, 0.08, 0.9]
          SoilNitrogenNO3 NO3
          SoilNitrogenNH4 NH4
          SoilNitrogenUrea Urea
          SoilNitrogenPlantAvailableNO3 PlantAvailableNO3
          SoilNitrogenPlantAvailableNH4 PlantAvailableNH4
        Organic: FOMCNRatio=40
          Thickness  Carbon  SoilCNRatio  FBiom  FInert  FOM
          150        1.2     12           0.04   0.4     347.129
          150        0.96    12           0.02   0.6     270.344
          300        0.6     12           0.02   0.8     163.972
          300        0.3     12           0.02   1       99.4541
          300        0.18    12           0.01   1       60.322
          300        0.12    12           0.01   1       36.5871
          300        0.12    12           0.01   1       22.1912
        Chemical
          Thickness  NO3N  NH4N  PH
          150        1     0.1   8
          150        1     0.1   8
          300        1     0.1   8
          300        1     0.1   8
          300        1     0.1   8
          300        1     0.1   8
          300        1     0.1   8
        InitialWater: PercentMethod=1; FractionFull=1
        Sample InitialN: Thickness=[150, 150, 300, 300, 300, 300, 300]; SWUnits=Volumetric; OCUnits=Total; PHUnits=Water
        CERESSoilTemperature
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