Simulations: Version=162
  Folder Replacements
    Report DailyReport: EventNames=[Clock].DoReport
      VariableNames:
        [Clock].Today
        [IWeather].Radn
        [IWeather].MeanT
        [Barley].Phenology.Photoperiod
        [Barley].Structure.HaunStage
        ([Barley].Leaf.Transpiration + [Soil].SoilWater.Es + [MicroClimate].PrecipitationInterception) as ET
        [Barley].AboveGround.N
        [Barley].AboveGround.Wt
        [Barley].AboveGroundLive.N
        [Barley].AboveGroundLive.Wt
        [Barley].Ear.N
        [Barley].Ear.Nconc
        [Barley].Ear.Wt
        [Barley].Grain.N
        [Barley].Grain.NConc
        [Barley].Grain.Number
        [Barley].Grain.Size
        [Barley].Grain.Wt
        [Barley].Leaf.CohortArea
        [Barley].Leaf.CoverGreen
        [Barley].Leaf.CoverTotal
        [Barley].Leaf.Dead.Wt
        [Barley].Leaf.ExpandedCohortNo
        [Barley].Leaf.LAI
        [Barley].Leaf.Live.NConc
        [Barley].Leaf.Live.Wt
        [Barley].Leaf.SenescingCohortNo
        [Barley].Leaf.SpecificArea
        [Barley].Phenology.AccumulatedEmergedTT
        [Barley].Phenology.CurrentStageName
        [Barley].Phenology.FlagLeafDAS
        [Barley].Phenology.FloweringDAS
        [Barley].Phenology.MaturityDAS
        [Barley].Phenology.Stage
        [Barley].Phenology.Zadok.Stage
        [Barley].SowingData.Cultivar
        [Barley].Spike.Wt
        [Barley].Stem.NConc
        [Barley].Stem.Wt
        [Barley].Structure.HaunStage
        [Barley].Structure.Height
        [Barley].Structure.LeafTipsAppeared
        [Barley].Structure.MainStemPopn
        [Soil].SoilNitrogen.mineral_n
        [Soil].Water.Volumetric
        [Soil].Water.MM
        sum([Soil].SoilNitrogen.mineral_n) as ProfileN
        sum([Soil].Water.MM) as ProfileWater
    Report HarvestReport: EventNames=[Barley].Harvesting
      VariableNames:
        [Clock].Today
        [Barley].Phenology.CurrentPhase.Name
        [Barley].Phenology.CurrentStageName
        [Barley].Phenology.EmergenceDAS
        [Barley].Phenology.FlagLeafDAS
        [Barley].Phenology.FloweringDAS
        [Barley].Phenology.MaturityDAS
        [Barley].Grain.Wt
        [Barley].Grain.N
        [Barley].Grain.Number
        [Barley].Grain.Nconc
        [Barley].AboveGround.Wt
        [Barley].AboveGround.N
        [Barley].Grain.Protein
        [Barley].Grain.Size
        [Barley].Structure.HaunStage
        [Barley].Structure.FinalLeafNumber
        [Barley].Structure.MainStemPopn
        [Barley].SowingData.Cultivar
        [Barley].SowingDate.DayOfYear
        [Barley].Leaf.CohortMaxSize
        [Clock].StartDate
    Manager Harvesting
```csharp
using Models.PMF.Phen;
using System;
using Models.Core;
using System.Collections.Generic;
using System.Text;
using Models.Soils;
using Models.PMF;
using Models;
using System.Xml.Serialization;
using APSIM.Shared.Utilities;

namespace Models
{
    [Serializable] 
    public class Script : Model
    {
        [Link] private Plant Barley;
        [Link(Type = LinkType.Path, Path = "[Barley].Phenology")]
        private Phenology phenology;
        [EventSubscribe("DoManagement")]
        private void OnDoManagement(object sender, EventArgs e)
        {
            if (phenology.CurrentPhase.Name == "Maturing")
            {
                Barley.Harvest();
                Barley.EndCrop();
            }
        }
    }
}
```
    Report SowingReport: EventNames=[Barley].Sowing
      VariableNames:
        [Clock].Today
        [Barley].SowingData.Cultivar
        [IWeather].Latitude
        [IWeather].Longitude
  DataStore
    ExcelInput Observed: SheetNames=[Observed]
      FileNames=[Observed.xlsx, LaTrobeCE_Obs.xlsx, Obs_APSIMX_NPIField2019_Barley.xlsx, Obs_APSIMX_NPIField2020_Barley.xlsx]
    ExcelInput LeafSize: FileNames=[LeafSizeObserved.xlsx]; SheetNames=[LeafSize]
    PredictedObserved HarvestObsPred: PredictedTableName=HarvestReport; ObservedTableName=Observed; FieldNameUsedForMatch=SimulationName; FieldName2UsedForMatch=Barley.Phenology.CurrentStageName; AllColumns=false
    PredictedObserved DailyObsPred: PredictedTableName=DailyReport; ObservedTableName=Observed; FieldNameUsedForMatch=SimulationName; FieldName2UsedForMatch=Clock.Today; AllColumns=false
    PredictedObserved LeafSizeObsPred: PredictedTableName=MaxLeafSizeReport; ObservedTableName=LeafSize; FieldNameUsedForMatch=SimulationName; FieldName2UsedForMatch=MaxLeafSize.Script.LeafPosition; AllColumns=false
    Probability: TableName=SensibilityReport; Exceedence=false; FieldToSplitOn=SimulationName
  Folder Validation
    Memo
      A test dataset has been developed to test the APSIM barley model for a range of environmental (soil and climate) conditions, management options (sowing dates, populations, nitrogen rates, irrigation) and genetic backgrounds (different regions, cultivar types).  These tests have been groups into various geographical regions to allow the user to evaluate the suitability of the model for their particular region of interest.  Graphs of model performance are provided for yield, biomass production, canopy development, phenological development, water and nitrogen uptake, and grain yield components.
    Folder NewZealand
      Experiment MCPD09_10
        Memo Experimental details
          This experiment was conducted in A Block near Lincoln, New Zealand to determine if there were any differences in the water use efficiency of different commercial varieties of barley.  The results are un-published to date.

          Four cultivars of Barley ('Omaka', 'Dash', 'Sherwood' and 'Booma') were sown on the 1st of October 2009 in a randomised complete block design with 4 replicates and two other factors, Irrigation and Nitrogen.  The irrigation treatments consisted of full irrigation (to replace measured evapotranspiration) or nil irrigation (recieving only rainfall).  The nitrogen treatments were 150 kg N broadcast in the early vegetative stage or nil fertiliser.
          Biomass accumulation, organ N content, Leaf area index, radiation interception and soil water content were measured at regular frequencies throughout the experiment.
        Factors
          Permutation
            Factor Cult: Specification=[Sowing].Script.Cultivar = Dash,Omaka,Booma,Sherwood
            Factor Nit
              CompositeFactor 0: Specifications=[FertiliserEvents]
                Operations FertiliserEvents
                  2009-11-23  [Fertiliser].Apply(0, Fertiliser.Types.NO3N,10);
              CompositeFactor 150: Specifications=[FertiliserEvents]
                Operations FertiliserEvents
                  2009-11-23  [Fertiliser].Apply(150, Fertiliser.Types.NO3N,10);
            Factor Irr
              CompositeFactor Nil: Specifications=[IrrigationEvents]
                Operations IrrigationEvents
              CompositeFactor Full: Specifications=[IrrigationEvents]
                Operations Irrigtion Events
                  2009-11-11  [Irrigation].Apply(20);
                  2009-11-19  [Irrigation].Apply(25);
                  2009-11-26  [Irrigation].Apply(25);
                  2009-12-11  [Irrigation].Apply(20);
                  2009-12-21  [Irrigation].Apply(35);
                  2009-12-29  [Irrigation].Apply(40);
                  2010-01-07  [Irrigation].Apply(35);
                  2010-01-13  [Irrigation].Apply(30);
        Simulation Ablock
          Weather: FileName=lincoln.met
          Clock: Start=2009-09-01; End=2010-04-01
          Summary summaryfile
          SoilArbitrator Soil Arbitrator
          Zone Paddock: Area=1; Slope=0; AspectAngle=0; Altitude=50
            Manager DAS
              DAS = 0
```csharp
using Models.Soils;
using System;
using Models.Core;
using System.Collections.Generic;
using System.Text;
using Models.PMF;
using Models;
using System.Xml.Serialization;
using APSIM.Shared.Utilities;
using System.Data;

namespace Models
{
    [Serializable] 
    //[System.Xml.Serialization.XmlInclude(typeof(Model))]
    public class Script : Model
    {
        
    
        
        
        [Description("Days after sowing")]
        public double DAS { get; set; }
        
        [EventSubscribe("DoInitialSummary")]
        private void OnDoInitialSummary(object sender, EventArgs e)
        {
            DAS = 0;
        }
        
        [EventSubscribe("DoReportCalculations")]
        private void OnDoReportCalculations(object sender, EventArgs e)
        {
            DAS += 1;
        }
    
    }
}
```
            Soil: SoilType=NZ_sedementary; Region=Plains; State=Canterbury; Country=New Zealnd; Latitude=0; Longitude=0
              Chemical: Thickness=[150, 150, 300, 300, 300, 300]; PH=[6.6, 6.2, 5.7, 5.5, 5.5, 5.5]; PHUnits=Water
              Physical
                Thickness  BD   AirDry  LL15  DUL   SAT   KS
                200        1.1  0.05    0.07  0.33  0.48  4832.039
                200        1.1  0.1     0.1   0.28  0.48  389.229
                200        1.3  0.08    0.08  0.26  0.4   97
                200        1.2  0.1     0.1   0.27  0.38  97.995
                200        1.2  0.12    0.12  0.28  0.37  97.995
                200        1.2  0.12    0.12  0.28  0.36  97.995
                200        1.2  0.12    0.12  0.26  0.36  98
                200        1.2  0.12    0.12  0.25  0.36  98
                400        1.2  0.12    0.12  0.25  0.36  98
                SoilCrop BarleySoil: LL=[0.07, 0.1, 0.08, 0.1, 0.12, 0.12, 0.12, 0.12, 0.12]; KL=[0.1, 0.07, 0.06, 0.05, 0.04, 0.03, 0.03, 0.03, 0.02]; XF=[1, 1, 1, 1, 1, 1, 1, 1, 1]
              WaterBalance SoilWater: SummerDate=1-Nov; SummerU=6; SummerCona=2; WinterDate=1-Apr; WinterU=9; WinterCona=4.4; DiffusConst=0; DiffusSlope=0; Salb=0.18; CN2Bare=68; CNRed=20; CNCov=0.8; DischargeWidth=0; CatchmentArea=0; PSIDul=-100
                Thickness  SWCON  KLAT
                150        0.9    0
                150        0.9    0
                300        0.9    0
                300        0.9    0
                300        0.9    0
                300        0.9    0
              SoilNitrogen: fom_types=[default, manure, mucuna, lablab, shemp, stable]; fract_carb=[0.2, 0.3, 0.54, 0.57, 0.45, 0]; fract_cell=[0.7, 0.3, 0.37, 0.37, 0.47, 0.1]; fract_lign=[0.1, 0.4, 0.09, 0.06, 0.08, 0.9]; NPartitionApproach=0
              Organic: FOMCNRatio=20; CarbonUnits=Total
                Thickness  Carbon  SoilCNRatio  FBiom  FInert  FOM
                150        2.7     11           0.025  0.45    390.598
                150        2.5     11           0.025  0.6     289.362
                300        1.45    11           0.015  0.75    158.805
                300        0.32    11           0.01   0.9     87.1541
                300        0.24    11           0.01   0.96    47.8312
                300        0.24    11           0.01   0.96    26.2503
              CERESSoilTemperature Temperature
              Water: Thickness=[200, 200, 200, 200, 200, 200, 200, 200, 400]; InitialValues=[0.31, 0.28, 0.26, 0.27, 0.28, 0.28, 0.26, 0.25, 0.25]; InitialPAWmm=324; RelativeTo=LL15; FilledFromTop=false
              SoilNitrogenNO3 NO3: Thickness=[150, 150, 300, 300, 300, 300]; InitialValues=[14.6, 17.8, 6.8, 7.6, 10.2, 11.2]; InitialValuesUnits=ppm; WaterTableConcentration=0; D0=0; DepthConstant=0; MaxDepthSoluteAccessible=0; RunoffEffectivenessAtMovingSolute=0; MaxEffectiveRunoff=0
              SoilNitrogenNH4 NH4: Thickness=[150, 150, 300, 300, 300, 300]; InitialValues=[1.8, 1.9, 1.5, 1.3, 1.3, 0.9]; InitialValuesUnits=ppm; WaterTableConcentration=0; D0=0; DepthConstant=0; MaxDepthSoluteAccessible=0; RunoffEffectivenessAtMovingSolute=0; MaxEffectiveRunoff=0
              SoilNitrogenUrea Urea: Thickness=[150, 150, 300, 300, 300, 300]; InitialValues=[0, 0, 0, 0, 0, 0]; InitialValuesUnits=kg/ha; WaterTableConcentration=0; D0=0; DepthConstant=0; MaxDepthSoluteAccessible=0; RunoffEffectivenessAtMovingSolute=0; MaxEffectiveRunoff=0
            Plant Barley
            SurfaceOrganicMatter Surface Organic Matter: InitialResidueName=Barley_stubble; InitialResidueType=Barley; InitialResidueMass=1500; InitialStandingFraction=0; InitialCPR=0; InitialCNR=80
            MicroClimate: a_interception=0; b_interception=1; c_interception=0; d_interception=0; SoilHeatFluxFraction=0.4; MinimumHeightDiffForNewLayer=0; NightInterceptionFraction=0.5; ReferenceHeight=2
            Irrigation
            Fertiliser
            Folder Manager folder
              Manager Sowing
                InitialRootDepth = 10
                Cultivar = Booma
                SowingDate = 2009-10-01
```csharp
using Models.Soils;
using System;
using Models.Core;
using System.Collections.Generic;
using System.Text;
using Models.PMF;
using Models;
using System.Xml.Serialization;
using APSIM.Shared.Utilities;
using System.Data;
using Models.PMF.Interfaces;
using Models.Surface;

namespace Models
{
    [Serializable] 
    //[System.Xml.Serialization.XmlInclude(typeof(Model))]
    public class Script : Model
    {
        [Link] Plant Barley;
        [Link] Clock Clock;
        [Link] Zone zone;
        [Link] Simulation Simulation;
        [Link] SurfaceOrganicMatter SurfOM;
        
                
        [Description("Initial Root Depth")]
        public double InitialRootDepth { get; set; }
        [Description("Cultivar name")]
        public string Cultivar { get; set; }
        [Description("Sowing Date")]
        public DateTime SowingDate { get; set; }
        
        
        [EventSubscribe("DoManagement")]
        private void OnDoManagement(object sender, EventArgs e)
        {
            if (Clock.Today.Date == SowingDate)
            {
                Barley.Sow(cultivar: Cultivar, population: 280, depth: InitialRootDepth, rowSpacing: 150);
                
            }
        }
    }
}
```
              Operations IrrigationEvents
                2009-11-11  [Irrigation].Apply(20);
                2009-11-19  [Irrigation].Apply(25);
                2009-11-26  [Irrigation].Apply(25);
                2009-12-11  [Irrigation].Apply(20);
                2009-12-21  [Irrigation].Apply(35);
                2009-12-29  [Irrigation].Apply(40);
                2010-01-05  [Irrigation].Apply(35);
                2010-01-13  [Irrigation].Apply(30);
                2010-03-02  [Irrigation].Apply(40);
                2010-03-03  [Irrigation].Apply(40);
              Operations FertiliserEvents
                2009-11-23  [Fertiliser].Apply(150, Fertiliser.Types.NO3N,10);
              Operations Harvest
                2010-02-23  [Barley].Harvest();
            Report DailyReport: EventNames=[Clock].DoReport
              VariableNames:
                [Clock].Today
                [Weather].MeanT
                [Soil].Water.Volumetric
                [Soil].Water.MM
                sum([Soil].Water.MM) as ProfileWater
                [Barley].AboveGround.N
                [Barley].AboveGround.Wt
                [Barley].AboveGroundLive.N
                [Barley].AboveGroundLive.N*10 as AboveGroundN
                [Barley].AboveGroundLive.Wt
                [Barley].AboveGroundDead.N
                [Barley].AboveGroundDead.Wt
                [Barley].Arbitrator.DMDemand
                [Barley].Arbitrator.DM.TotalFixationSupply
                [Barley].Ear.N
                [Barley].Ear.Nconc
                [Barley].Ear.Wt
                [Barley].Grain.N
                [Barley].Grain.NConc
                [Barley].Grain.Number
                [Barley].Grain.Size
                [Barley].Grain.Wt
                [Barley].Grain.Live.Wt
                [Barley].Leaf.AppearedCohortNo
                [Barley].Leaf.CoverDead
                [Barley].Leaf.CoverGreen
                [Barley].Leaf.CoverTotal
                [Barley].Leaf.Dead.N
                [Barley].Leaf.Dead.NConc
                [Barley].Leaf.Dead.Wt
                [Barley].Leaf.DeadCohortNo
                [Barley].Leaf.SenescingCohortNo
                [Barley].Leaf.ExpandedCohortNo
                [Barley].Leaf.Fn
                [Barley].Leaf.Fw
                [Barley].Leaf.Height
                [Barley].Leaf.InitialisedCohortNo
                [Barley].Leaf.LAI
                [Barley].Leaf.Live.N
                [Barley].Leaf.Live.NConc
                [Barley].Leaf.Live.Wt
                [Barley].Leaf.SpecificArea
                [Barley].Leaf.Transpiration
                [Barley].Phenology.CurrentPhase.Name
                [Barley].Phenology.CurrentStageName
                [Barley].Phenology.DailyVernalisation
                [Weather].MeanT
                [Barley].Phenology.Photoperiod
                [Barley].Phenology.Stage
                [Barley].Phenology.ThermalTime
                [Barley].Phenology.ThermalTime.Value
                [Barley].Phenology.Vrn1
                [Barley].Phenology.Vrn2
                [Barley].Phenology.Vrn4
                [Barley].Phenology.Zadok.Stage
                [Barley].Root.Depth
                [Barley].Root.N
                [Barley].Root.Wt
                [Barley].Root.Nconc
                [Barley].Root.WaterUptake
                [Barley].Spike.N
                [Barley].Spike.NConc
                [Barley].Spike.Wt
                [Barley].Spike.Live.StorageWt
                [Barley].Stem.N
                [Barley].Stem.NConc
                [Barley].Stem.Wt
                [Barley].Stem.PercentWSC
                [Barley].Stem.Live.StorageWt
                [Barley].StemPlusSpike.Wt
                [Barley].StemPlusSpike.N
                [Barley].SowingData.Cultivar
                [Barley].Structure.HaunStage.ValueTerminalSpikelet
                [Barley].Structure.HaunStage
                [Barley].Structure.Height
                [Barley].Structure.LeafTipsAppeared
                [Barley].Structure.FinalLeafNumber
                [Barley].Structure.FinalLeafNumber.ValueToHold.PhotoPLeaves
                [Barley].Structure.MainStemPopn
                [Barley].Structure.MeanTillerGrowthRate
                [Barley].Structure.TotalStemPopn
                [Barley].Total.N
                [Barley].Total.Wt
                [SurfaceOrganicMatter].Wt
                ([Barley].Leaf.Transpiration + [Soil].SoilWater.Es + [MicroClimate].PrecipitationInterception) as ET
                sum([Soil].NO3.kgha) as TotalSoilNitrogen
                [Barley].Phenology.FlagLeafDAS
                [Barley].Phenology.FloweringDAS
                [Barley].Phenology.MaturityDAS
                [Barley].Phenology.PhotoPeriod
                [Barley].Phenology.PhotoPeriodDeltaFunction
                [Barley].Phenology.Stage
                [Barley].Phenology.SoilTemperatureFunction
                [Barley].Population
            Report HarvestReport: EventNames=[Clock].EndOfSimulation
              VariableNames:
                [Barley].Structure.LeafTipsAppeared
                [Barley].Structure.FinalLeafNumber
                [Barley].Phenology.FlagLeafDAS
                [Barley].Phenology.FloweringDAS
                [Barley].Phenology.MaturityDAS
                [Script].CalcVals.SowMonth
            Report SowingReport: EventNames=[Barley].Sowing
              VariableNames:
                [Clock].Today
                [Barley].SowingData.Cultivar
      Experiment MCPD10_11
        Memo Experimental details
          Following on from MCPD09_10, this experiment was conducted in A Block near Lincoln, New Zealand to test a wider range of barley genotypes for differences in water use efficiency.  The results are un-published to date.

          Treatments were simply 8 commercially available varieties of barley ('Booma','County','Dash','Hooded','Omaka','Optic','Quench' and 'Retriever')

          Biomass accumulation, Leaf area index, radiation interception and soil water content were measured at regular frequencies throughout the experiment.
        Factors
          Factor Cult
            Specification=[Sowing].Script.Cultivar = Booma,County,Dash,Hooded,Omaka,Optic,Quench,Retriever
        Simulation Field10_11
          Weather: FileName=lincoln.met
          Clock: Start=2010-08-01; End=2011-02-01
          Summary summaryfile
          SoilArbitrator Soil Arbitrator
          Zone Paddock: Area=1; Slope=0; AspectAngle=0; Altitude=50
            Soil: SoilType=NZ_sedementary; Region=Plains; State=Canterbury; Country=New Zealnd; Latitude=0; Longitude=0
              Chemical: Thickness=[150, 150, 300, 300, 300, 300]; PH=[6.6, 6.2, 5.7, 5.5, 5.5, 5.5]; PHUnits=Water
              Physical
                Thickness  BD   AirDry  LL15  DUL   SAT   KS
                200        1.2  0.14    0.14  0.33  0.48  4832.039
                200        1.2  0.14    0.14  0.33  0.48  389.229
                200        1.3  0.08    0.08  0.26  0.4   16.362
                200        1.4  0.13    0.13  0.27  0.38  97.995
                200        1.5  0.2     0.2   0.28  0.37  97.995
                200        1.5  0.2     0.2   0.28  0.36  97.995
                200        1.4  0.18    0.18  0.26  0.36  98
                200        1.4  0.19    0.19  0.25  0.36  98
                SoilCrop BarleySoil: LL=[0.14, 0.14, 0.08, 0.13, 0.2, 0.2, 0.18, 0.19]; KL=[0.1, 0.1, 0.1, 0.1, 0.1, 0.1, 0.1, 0.1]; XF=[1, 1, 1, 1, 1, 1, 1, 1]
              WaterBalance SoilWater: SummerDate=1-Nov; SummerU=6; SummerCona=2; WinterDate=1-Apr; WinterU=9; WinterCona=4.4; DiffusConst=0; DiffusSlope=0; Salb=0.18; CN2Bare=68; CNRed=20; CNCov=0.8; DischargeWidth=0; CatchmentArea=0; PSIDul=-100
                Thickness  SWCON  KLAT
                150        0.9    0
                150        0.6    0
                300        0.4    0
                300        0.4    0
                300        0.4    0
                300        0.9    0
              SoilNitrogen: fom_types=[default, manure, mucuna, lablab, shemp, stable]; fract_carb=[0.2, 0.3, 0.54, 0.57, 0.45, 0]; fract_cell=[0.7, 0.3, 0.37, 0.37, 0.47, 0.1]; fract_lign=[0.1, 0.4, 0.09, 0.06, 0.08, 0.9]; NPartitionApproach=0
              Organic: FOMCNRatio=20; CarbonUnits=Total
                Thickness  Carbon  SoilCNRatio  FBiom  FInert  FOM
                150        2.7     11           0.025  0.45    1171.79
                150        2.5     11           0.025  0.6     868.085
                300        1.4     11           0.015  0.75    476.415
                300        0.33    11           0.01   0.9     261.462
                300        0.24    11           0.01   0.96    143.494
                300        0.24    11           0.01   0.96    78.7509
              CERESSoilTemperature Temperature
              Water: Thickness=[200, 200, 200, 200, 200, 200, 200, 200]; InitialValues=[0.31, 0.31, 0.26, 0.27, 0.28, 0.28, 0.26, 0.25]; InitialPAWmm=192; RelativeTo=LL15; FilledFromTop=false
              SoilNitrogenNO3 NO3: Thickness=[150, 150, 300, 300, 300, 300]; InitialValues=[9.7, 11.8667, 8.3, 7.7, 10.5, 8]; InitialValuesUnits=ppm; WaterTableConcentration=0; D0=0; DepthConstant=0; MaxDepthSoluteAccessible=0; RunoffEffectivenessAtMovingSolute=0; MaxEffectiveRunoff=0
              SoilNitrogenNH4 NH4: Thickness=[150, 150, 300, 300, 300, 300]; InitialValues=[2.2, 2.2, 1.8, 1.4, 1.2, 1.1]; InitialValuesUnits=ppm; WaterTableConcentration=0; D0=0; DepthConstant=0; MaxDepthSoluteAccessible=0; RunoffEffectivenessAtMovingSolute=0; MaxEffectiveRunoff=0
              SoilNitrogenUrea Urea: same as Validation.NewZealand.MCPD09_10.Ablock.Paddock.Soil.Urea
            SurfaceOrganicMatter Surface Organic Matter: InitialResidueName=Barley_stubble; InitialResidueType=Barley; InitialResidueMass=1500; InitialStandingFraction=0; InitialCPR=0; InitialCNR=80
            MicroClimate: a_interception=0; b_interception=1; c_interception=0; d_interception=0; SoilHeatFluxFraction=0.4; MinimumHeightDiffForNewLayer=0; NightInterceptionFraction=0.5; ReferenceHeight=2
            Irrigation
            Fertiliser
            Plant Barley
            Folder Manager folder
              Manager Sowing
                InitialRootDepth = 40
                Cultivar = Dash
                SowingDate = 2010-08-26
```csharp
using Models.Soils;
using System;
using Models.Core;
using System.Collections.Generic;
using System.Text;
using Models.PMF;
using Models;
using System.Xml.Serialization;
using APSIM.Shared.Utilities;
using System.Data;
using Models.PMF.Interfaces;
using Models.Surface;

namespace Models
{
    [Serializable] 
    //[System.Xml.Serialization.XmlInclude(typeof(Model))]
    public class Script : Model
    {
        [Link] Plant Barley;
        [Link] Clock Clock;
        [Link] Zone zone;
        [Link] Simulation Simulation;
        [Link] SurfaceOrganicMatter SurfOM;
        
                
        [Description("Initial Root Depth")]
        public double InitialRootDepth { get; set; }
        [Description("Cultivar name")]
        public string Cultivar { get; set; }
        [Description("Sowing Date")]
        public DateTime SowingDate { get; set; }
        
        
        [EventSubscribe("DoManagement")]
        private void OnDoManagement(object sender, EventArgs e)
        {
            if (Clock.Today.Date == SowingDate)
            {
                Barley.Sow(cultivar: Cultivar, population: 240, depth: InitialRootDepth, rowSpacing: 150);
                
            }
                    
            
        }
    }
}
```
              Operations IrrigationEvents
                2010-10-28  [Irrigation].Apply(20);
                2010-11-03  [Irrigation].Apply(10);
                2010-11-18  [Irrigation].Apply(20);
                2010-12-03  [Irrigation].Apply(20);
              Operations FertiliserEvents
                2010-08-25  [Fertiliser].Apply(22.5, Fertiliser.Types.NO3N,10);
                2010-10-20  [Fertiliser].Apply(50, Fertiliser.Types.NO3N,10);
                2010-11-03  [Fertiliser].Apply(50, Fertiliser.Types.NO3N,10);
              Manager SetSoilParams
```csharp
using System;
using Models.Core;
using System.Collections.Generic;
using System.Text;
using Models.Soils;
using Models.PMF;
using Models;
using System.Xml.Serialization;
using APSIM.Shared.Utilities;
using Models.Interfaces;

namespace Models
{
    [Serializable] 
    public class Script : Model
    {
        [Link(ByName = true)]
        private SoilNitrogen SoilNitrogen;
        [Link] Soils.Soil Soil;

        [EventSubscribe("DoInitialSummary")]
        private void OnDoInitialSummary(object sender, EventArgs e)
        {
            //SoilNitrogen.rd_hum = new double[] { 0.000363, 0.00007 };
            //SoilNitrogen.rd_lign = new double[] { 0.001392, 0.003 };
            //SoilNitrogen.rd_cell = new double[] { 0.05, 0.25 };
            //SoilNitrogen.rd_carb = new double[] { 0.756438, 0.1 };
            //SoilNitrogen.rd_biom = new double[] { 0.010295, 0.004 };
            //SoilNitrogen.opt_temp = new double[] { 26.5, 32.0 };
            //SoilNitrogen.stfMiner_FctrZero = new double[] { 0.05, 0.0 }; 
            //SoilNitrogen.swfMiner_y = new double[] { 0.0, 0.5, 0.9, 1.0, 1.0 };

            SoilNitrogen.AHumusTurnOverRate = new double[] { 0.000363, 0.00007 };
            SoilNitrogen.Pool3FOMTurnOverRate = new double[] { 0.001392, 0.003 };
            SoilNitrogen.Pool2FOMTurnOverRate = new double[] { 0.05, 0.25 };
            SoilNitrogen.Pool1FOMTurnOverRate = new double[] { 0.756438, 0.1 };
            SoilNitrogen.MBiomassTurnOverRate = new double[] { 0.010295, 0.004 };
            SoilNitrogen.FOMDecomp_TOptimum = new double[] { 26.5, 32.0 };
            SoilNitrogen.SOMMiner_TOptimum = new double[] { 26.5, 32.0 };
            SoilNitrogen.Nitrification_TOptimum = new double[] { 26.5, 32.0 };
            //SoilNitrogen.SOMMiner_FactorAtZero = new double[] { 0.05, 0.0 }; 
            //SoilNitrogen.SOMMiner_MoistureFactors = new double[] { 0.0, 0.5, 0.9, 1.0, 1.0 };
        }
            
    }
}
```
              Operations Harvest
                2011-01-18  [Barley].Harvest();
            Report DailyReport: same as Validation.NewZealand.MCPD09_10.Ablock.Paddock.DailyReport
            Report HarvestReport: EventNames=[Clock].EndOfSimulation
              VariableNames:
                [Barley].Structure.LeafTipsAppeared
                [Barley].Structure.FinalLeafNumber
                [Barley].Phenology.FlagLeafDAS
                [Barley].Phenology.FloweringDAS
                [Barley].Phenology.MaturityDAS
                [Script].CalcVals.SowMonth
            Report SowingReport: EventNames=[Barley].Sowing
              VariableNames:
                [Clock].Today
                [Barley].SowingData.Cultivar
      Experiment MCPD11_12
        Memo Experimental details
          Following on from MCPD10_11, this experiment was conducted in A Block near Lincoln, New Zealand to test the effects of sowing time on apparent water use efficiency of three varieties of Barley.  The results are un-published to date.

          Treatments were simply 3 commercially available varieties of barley ('Booma','Dash' and 'Omaka') sown on three different sowing dates (13 Aug, 9 Sep and 15 Nov).

          Biomass accumulation, Leaf appearance, leaf size, radiation interception and soil water content were measured at regular frequencies throughout the experiment.
        Factors
          Permutation
            Factor Cult: Specification=[Sowing].Script.Cultivar = Dash,Omaka,Booma
            Factor SD
              CompositeFactor 1
                Specifications:
                  [Sowing].Script.SowingDate = 2011-07-13
                  [FertiliserEvents]
                Operations FertiliserEvents
                  2011-09-09  [Fertiliser].Apply(32, Fertiliser.Types.NO3N,10);
                  2011-10-24  [Fertiliser].Apply(70, Fertiliser.Types.NO3N,10);
                  2011-11-07  [Fertiliser].Apply(70, Fertiliser.Types.NO3N,10);
              CompositeFactor 2
                Specifications:
                  [Sowing].Script.SowingDate = 2011-09-09
                  [FertiliserEvents]
                Operations FertiliserEvents
                  2011-07-08  [Fertiliser].Apply(32, Fertiliser.Types.NO3N,10);
                  2011-09-23  [Fertiliser].Apply(70, Fertiliser.Types.NO3N,10);
                  2011-10-18  [Fertiliser].Apply(70, Fertiliser.Types.NO3N,10);
              CompositeFactor 3
                Specifications:
                  [Sowing].Script.SowingDate = 2011-11-15
                  [FertiliserEvents]
                Operations FertiliserEvents
                  2011-11-15  [Fertiliser].Apply(32, Fertiliser.Types.NO3N,10);
                  2011-12-05  [Fertiliser].Apply(70, Fertiliser.Types.NO3N,10);
                  2011-12-15  [Fertiliser].Apply(70, Fertiliser.Types.NO3N,10);
        Simulation Field11_12
          Weather: FileName=lincoln.met
          Clock: Start=2011-07-01; End=2012-06-30
          Summary summaryfile
          SoilArbitrator Soil Arbitrator
          Zone Paddock: Area=1; Slope=0; AspectAngle=0; Altitude=50
            Soil: SoilType=NZ_sedementary; Region=Plains; State=Canterbury; Country=New Zealnd; Latitude=0; Longitude=0
              Chemical: Thickness=[150, 150, 300, 300, 300, 300]; PH=[6.6, 6.2, 5.7, 5.5, 5.5, 5.5]; PHUnits=Water
              Physical
                Thickness  BD    AirDry  LL15  DUL   SAT   KS
                200        1.23  0.14    0.14  0.33  0.48  4832.039
                200        1.23  0.14    0.14  0.33  0.48  389.229
                200        1.2   0.15    0.15  0.3   0.4   16.362
                200        1.2   0.16    0.16  0.31  0.38  97.995
                200        1.2   0.16    0.16  0.32  0.37  97.995
                200        1.2   0.21    0.21  0.33  0.36  97.995
                200        1.2   0.28    0.28  0.34  0.38  98
                200        1.2   0.28    0.28  0.33  0.38  98
                SoilCrop BarleySoil: LL=[0.14, 0.14, 0.15, 0.16, 0.16, 0.21, 0.28, 0.28]; KL=[0.1, 0.1, 0.1, 0.1, 0.1, 0.1, 0.1, 0.1]; XF=[1, 1, 1, 1, 1, 1, 1, 1]
              WaterBalance SoilWater: same as Validation.NewZealand.MCPD10_11.Field10_11.Paddock.Soil.SoilWater
              SoilNitrogen: fom_types=[default, manure, mucuna, lablab, shemp, stable]; fract_carb=[0.2, 0.3, 0.54, 0.57, 0.45, 0]; fract_cell=[0.7, 0.3, 0.37, 0.37, 0.47, 0.1]; fract_lign=[0.1, 0.4, 0.09, 0.06, 0.08, 0.9]; NPartitionApproach=0
              Organic: FOMCNRatio=31.5; CarbonUnits=Total
                Thickness  Carbon  SoilCNRatio  FBiom  FInert  FOM
                150        2.68    11           0.025  0.45    585.896
                150        2.78    11           0.025  0.6     434.043
                300        1.45    11           0.015  0.75    238.208
                300        0.38    11           0.01   0.9     130.731
                300        0.24    11           0.01   0.96    71.7468
                300        0.24    11           0.01   0.96    39.3755
              CERESSoilTemperature Temperature
              Water: Thickness=[200, 200, 200, 200, 200, 200, 200, 200]; InitialValues=[0.33, 0.33, 0.3, 0.31, 0.32, 0.33, 0.34, 0.34]; InitialPAWmm=216; RelativeTo=LL15; FilledFromTop=false
              SoilNitrogenNO3 NO3: Thickness=[150, 150, 300, 300, 300, 300]; InitialValues=[4.55285, 6.28726, 2.75482, 3.05556, 2.5, 0.833333]; InitialValuesUnits=ppm; WaterTableConcentration=0; D0=0; DepthConstant=0; MaxDepthSoluteAccessible=0; RunoffEffectivenessAtMovingSolute=0; MaxEffectiveRunoff=0
              SoilNitrogenNH4 NH4: Thickness=[150, 150, 300, 300, 300, 300]; InitialValuesUnits=ppm; WaterTableConcentration=0; D0=0; DepthConstant=0; MaxDepthSoluteAccessible=0; RunoffEffectivenessAtMovingSolute=0; MaxEffectiveRunoff=0
                InitialValues=[1.08401, 0.325203, 0.220386, 0.0833333, 0.0555556, 0.111111]
              SoilNitrogenUrea Urea: same as Validation.NewZealand.MCPD09_10.Ablock.Paddock.Soil.Urea
            Plant Barley
            SurfaceOrganicMatter Surface Organic Matter: InitialResidueName=Barley_stubble; InitialResidueType=Barley; InitialResidueMass=1500; InitialStandingFraction=0; InitialCPR=0; InitialCNR=80
            MicroClimate: a_interception=0; b_interception=1; c_interception=0; d_interception=0; SoilHeatFluxFraction=0.4; MinimumHeightDiffForNewLayer=0; NightInterceptionFraction=0.5; ReferenceHeight=2
            Irrigation
            Fertiliser
            Folder Manager folder
              Manager MaxLeafSize
```csharp
using Models.Soils;
using Models.PMF.Struct;
using System;
using System.Collections.Generic;
using System.Xml.Serialization;
using Models.Core;
using Models.Interfaces;
using Models.PMF;
using Models.PMF.Organs;
using Models.Soils.Arbitrator;
using APSIM.Shared.Utilities;
using Newtonsoft.Json;



namespace Models
{
    [Serializable] 
    public class Script : Model
    {
        [Link] private Clock Clock;
        [Link] private Plant Barley;
        public  event EventHandler LeafReport;
        [Link(Type = LinkType.Path, Path = "[Barley].Structure")]
        private Structure structure;
        
        
        [JsonIgnore] public int LeafPosition { get; set; }
        [JsonIgnore] public double MaxLeafSize { get; set; }
        
        [EventSubscribe("DoManagement")]
        private void OnDoManagement(object sender, EventArgs e)
        {
            var leaf = Barley.Leaf as Leaf;
            if ((leaf.ExpandedCohortNo > LeafPosition) & (structure.NextLeafProportion == 1))
            {
                LeafPosition = (int)
                leaf.ExpandedCohortNo;
                MaxLeafSize = leaf.CohortSize[LeafPosition - 1];
                LeafReport.Invoke(this, new EventArgs());
            }
        }
    }
}
```
              Manager Sowing
                InitialRootDepth = 20
                Cultivar = Dash
                SowingDate = 2011-07-13
                script: same as in Validation.NewZealand.MCPD09_10.Ablock.Paddock.Manager folder.Sowing
              Operations IrrigationEvents
                2011-11-07  [Irrigation].Apply(25);
                2011-11-28  [Irrigation].Apply(25);
                2011-12-14  [Irrigation].Apply(25);
                2011-12-29  [Irrigation].Apply(30);
                2012-01-04  [Irrigation].Apply(30);
                2012-01-19  [Irrigation].Apply(25);
              Operations FertiliserEvents: same as Validation.NewZealand.MCPD11_12.Factors.Permutation.SD.2.FertiliserEvents
              Manager SetSoilParams: same as Validation.NewZealand.MCPD10_11.Field10_11.Paddock.Manager folder.SetSoilParams
              Operations Harvest
                2012-03-16  [Barley].Harvest()
            Report DailyReport: same as Validation.NewZealand.MCPD09_10.Ablock.Paddock.DailyReport
            Report HarvestReport: EventNames=[Clock].EndOfSimulation
              VariableNames:
                [Barley].Structure.LeafTipsAppeared
                [Barley].Structure.FinalLeafNumber
                [Barley].Phenology.FlagLeafDAS
                [Barley].Phenology.FloweringDAS
                [Barley].Phenology.MaturityDAS
                [Script].CalcVals.SowMonth
            Report MaxLeafSizeReport: EventNames=[MaxLeafSize].Script.LeafReport
              VariableNames:
                [MaxLeafSize].Script.MaxLeafSize
                [MaxLeafSize].Script.LeafPosition
            Report SowingReport: EventNames=[Barley].Sowing
              VariableNames:
                [Clock].Today
                [Barley].SowingData.Cultivar
        Memo
          There were some inconsistencies in the leaf number observations so don't expect to good of a fit with the model
      Experiment RS2014_15
        Memo Experimental details
          This was a field experiment established at the New Zealand Institute for Plant & Food Research Limited rain-out shelter in October 2014. Barley cultivars cv Dash and cv Omaka, differing canopy characteristics and water extraction capabilities were established with a range of irrigation treatments aimed at producing a range of soil moisture deficits.

          - High =Full replacement irrigation: replace weekly, measured crop water use;
          - Mid =Intermediate replacement with reduced frequency and higher volume e.g. monthly application of ½ measured crop water use;
          - Low =Nil (or near nil) irrigation, e.g.  irrigated once at anthesis.

          The treatments were monitored for:

          - Soil water - this was measured continuously using auto logging TDR and weekly using a neutron probe;
          - Canopy light interception;
          - Biomass - quantified four times during crop growth and at final harvest
          - Leaf area index
        Factors
          Permutation
            Factor Cult: Specification=[Sowing].Script.Cultivar = Dash,Omaka
            Factor Irr: Specification=[IrrigationEvents]
              Operations Low
                2014-11-18  [Irrigation].Apply(0);
                2014-11-26  [Irrigation].Apply(0);
                2014-11-27  [Irrigation].Apply(0);
                2014-12-02  [Irrigation].Apply(36.7);
                2014-12-10  [Irrigation].Apply(0);
                2014-12-16  [Irrigation].Apply(0);
                2014-12-23  [Irrigation].Apply(0);
                2014-12-30  [Irrigation].Apply(0);
                2015-01-06  [Irrigation].Apply(0);
              Operations Med
                2014-11-18  [Irrigation].Apply(0);
                2014-11-26  [Irrigation].Apply(0);
                2014-11-27  [Irrigation].Apply(0);
                2014-12-02  [Irrigation].Apply(71);
                2014-12-10  [Irrigation].Apply(0);
                2014-12-16  [Irrigation].Apply(0);
                2014-12-23  [Irrigation].Apply(0);
                2014-12-30  [Irrigation].Apply(76);
                2015-01-06  [Irrigation].Apply(0);
              Operations High
                2014-11-18  [Irrigation].Apply(40);
                2014-11-26  [Irrigation].Apply(45);
                2014-11-27  [Irrigation].Apply(45);
                2014-12-02  [Irrigation].Apply(36.7);
                2014-12-10  [Irrigation].Apply(36);
                2014-12-16  [Irrigation].Apply(32);
                2014-12-23  [Irrigation].Apply(43);
                2014-12-30  [Irrigation].Apply(40);
                2015-01-06  [Irrigation].Apply(60);
        Simulation Dash14
          Weather: FileName=lincoln.met
          Clock: Start=2014-10-15; End=2015-03-01
          Summary summaryfile
          SoilArbitrator Soil Arbitrator
          Zone Paddock: Area=1; Slope=0; AspectAngle=0; Altitude=50
            Manager DAS: same as Validation.NewZealand.MCPD09_10.Ablock.Paddock.DAS
            Soil: SoilType=NZ_sedementary; Region=Plains; State=Canterbury; Country=New Zealnd; Latitude=0; Longitude=0
              Chemical: Thickness=[100, 200, 300, 300, 300, 300]; PH=[6.6, 7, 7, 7, 7, 7]; PHUnits=Water
              Physical
                Thickness  BD    AirDry  LL15  DUL   SAT   KS
                150        1.23  0.08    0.1   0.33  0.48  4832.039
                150        1.1   0.09    0.1   0.33  0.48  389.229
                300        1.1   0.13    0.13  0.33  0.42  16.362
                300        1.1   0.11    0.11  0.35  0.45  97.995
                300        1.1   0.17    0.17  0.35  0.42  97.995
                300        1.1   0.2     0.2   0.37  0.45  97.995
                300        1.1   0.2     0.2   0.37  0.45  97.995
                SoilCrop BarleySoil: LL=[0.1, 0.1, 0.13, 0.11, 0.17, 0.2, 0.2]; KL=[0.1, 0.1, 0.06, 0.05, 0.02, 0.01, 0]; XF=[1, 1, 1, 1, 1, 1, 1]
              WaterBalance SoilWater: SummerDate=1-oct; SummerU=6; SummerCona=2; WinterDate=1-Apr; WinterU=8; WinterCona=4.4; DiffusConst=0; DiffusSlope=0; Salb=0.18; CN2Bare=68; CNRed=20; CNCov=0.8; DischargeWidth=0; CatchmentArea=0; PSIDul=-100
                Thickness  SWCON  KLAT
                200        0.9    0
                200        0.6    0
                200        0.4    0
                200        0.4    0
                200        0.4    0
                200        0.9    0
                200        0.9    0
                200        0.9    0
              SoilNitrogen: fom_types=[default, manure, mucuna, lablab, shemp, stable]; fract_carb=[0.2, 0.3, 0.54, 0.57, 0.45, 0]; fract_cell=[0.7, 0.3, 0.37, 0.37, 0.47, 0.1]; fract_lign=[0.1, 0.4, 0.09, 0.06, 0.08, 0.9]; NPartitionApproach=0
              Organic: FOMCNRatio=31.5; CarbonUnits=Total
                Thickness  Carbon  SoilCNRatio  FBiom  FInert  FOM
                100        2.7     11           0.025  0.45    536.934
                200        2.5     11           0.025  0.6     359.917
                300        1.45    11           0.015  0.75    197.527
                200        0.38    11           0.01   0.9     132.406
                100        0.24    11           0.01   0.96    108.405
                200        0.24    11           0.01   0.96    72.6661
                100        0.24    11           0.01   0.96    59.4939
                300        0.24    11           0.01   0.96    32.651
              Water: Thickness=[150, 150, 300, 300, 300, 300, 300]; InitialValues=[0.31, 0.25, 0.33, 0.35, 0.35, 0.37, 0.37]; InitialPAWmm=342; RelativeTo=LL15; FilledFromTop=false
              CERESSoilTemperature Temperature
              SoilNitrogenNO3 NO3: Thickness=[100, 200, 300, 300, 300, 300]; InitialValues=[19.5122, 14.4235, 0.606061, 0.454545, 0.454545, 0.333333]; InitialValuesUnits=ppm; WaterTableConcentration=0; D0=0; DepthConstant=0; MaxDepthSoluteAccessible=0; RunoffEffectivenessAtMovingSolute=0; MaxEffectiveRunoff=0
              SoilNitrogenNH4 NH4: Thickness=[100, 200, 300, 300, 300, 300]; InitialValues=[1.19241, 1.20719, 0.545455, 0.424242, 0.30303, 0.272727]; InitialValuesUnits=ppm; WaterTableConcentration=0; D0=0; DepthConstant=0; MaxDepthSoluteAccessible=0; RunoffEffectivenessAtMovingSolute=0; MaxEffectiveRunoff=0
              SoilNitrogenUrea Urea: Thickness=[100, 200, 300, 300, 300, 300]; InitialValues=[0, 0, 0, 0, 0, 0]; InitialValuesUnits=kg/ha; WaterTableConcentration=0; D0=0; DepthConstant=0; MaxDepthSoluteAccessible=0; RunoffEffectivenessAtMovingSolute=0; MaxEffectiveRunoff=0
            Plant Barley
            SurfaceOrganicMatter Surface Organic Matter: InitialResidueName=Barley_stubble; InitialResidueType=Barley; InitialResidueMass=1500; InitialStandingFraction=0; InitialCPR=0; InitialCNR=80
            MicroClimate: a_interception=0; b_interception=1; c_interception=0; d_interception=0; SoilHeatFluxFraction=0.4; MinimumHeightDiffForNewLayer=0; NightInterceptionFraction=0.5; ReferenceHeight=2
            Irrigation
            Fertiliser
            Folder Manager folder
              Manager Sowing
                InitialRootDepth = 20
                Cultivar =
                SowingDate = 2014-10-15
```csharp
using Models.Soils;
using System;
using Models.Core;
using System.Collections.Generic;
using System.Text;
using Models.PMF;
using Models;
using System.Xml.Serialization;
using APSIM.Shared.Utilities;
using System.Data;
using Models.PMF.Interfaces;
using Models.Surface;

namespace Models
{
    [Serializable] 
    //[System.Xml.Serialization.XmlInclude(typeof(Model))]
    public class Script : Model
    {
        [Link] Plant Barley;
        [Link] Clock Clock;
        [Link] Zone zone;
        [Link] Simulation Simulation;
        [Link] SurfaceOrganicMatter SurfOM;
        
                
        [Description("Initial Root Depth")]
        public double InitialRootDepth { get; set; }
        [Description("Cultivar")]
        public string Cultivar { get; set; }
        [Description("Sowing Date")]
        public DateTime SowingDate { get; set; }

        
        
        [EventSubscribe("DoManagement")]
        private void OnDoManagement(object sender, EventArgs e)
        {
            if (Clock.Today.Date == SowingDate)
            {
                Barley.Sow(cultivar: Cultivar, population: 250, depth: InitialRootDepth, rowSpacing: 150);
                
            }

        }
    }
}
```
              Operations IrrigationEvents
              Operations FertiliserEvents
                2014-09-16  [Fertiliser].Apply(30, Fertiliser.Types.NO3N,0);
                2014-10-10  [Fertiliser].Apply(30, Fertiliser.Types.NO3N,0);
                2014-12-02  [Fertiliser].Apply(50, Fertiliser.Types.NO3N,0);
              Manager SetSoilParams
```csharp
using System;
using Models.Core;
using System.Collections.Generic;
using System.Text;
using Models.Soils;
using Models.PMF;
using Models;
using System.Xml.Serialization;
using APSIM.Shared.Utilities;
using Models.Interfaces;

namespace Models
{
    [Serializable] 
    public class Script : Model
    {
        [Link(ByName = true)]
        private SoilNitrogen SoilNitrogen;
        [Link] Soils.Soil Soil;

        [EventSubscribe("DoInitialSummary")]
        private void OnDoInitialSummary(object sender, EventArgs e)
        {
            SoilNitrogen.AHumusTurnOverRate = new double[] { 0.000363, 0.00007 };
            SoilNitrogen.Pool3FOMTurnOverRate = new double[] { 0.001392, 0.003 };
            SoilNitrogen.Pool2FOMTurnOverRate = new double[] { 0.05, 0.25 };
            SoilNitrogen.Pool1FOMTurnOverRate = new double[] { 0.756438, 0.1 };
            SoilNitrogen.MBiomassTurnOverRate = new double[] { 0.010295, 0.004 };
            SoilNitrogen.FOMDecomp_TOptimum = new double[] { 26.5, 32.0 };
            SoilNitrogen.SOMMiner_TOptimum = new double[] { 26.5, 32.0 };
            SoilNitrogen.Nitrification_TOptimum = new double[] { 26.5, 32.0 };
        }
            
    }
}
```
              Operations Harvest
                2015-02-13  [Barley].Harvest();
            Manager ClimateControl
              StartDate = 2014-10-25
              EndDate = 2015-04-01
              CCOnOff = True
```csharp
using Models.Soils;
using System.Xml.Serialization;
using Models;
using Models.PMF;
using System.Text;
using System.Collections.Generic;
using APSIM.Shared.Utilities;
using Models.Core;
using System;
using Models.Climate;

namespace Models
{
    [Serializable] 
    [System.Xml.Serialization.XmlInclude(typeof(Model))]
    public class Script : Model
    {
        [Link] Weather Met;
        [Link] Clock Clock;
    
        [Description("Start Date")]
        public DateTime StartDate { get; set; }
        
        [Description("End Date")]
        public DateTime EndDate { get; set; }

        [Description("Turn on or off")]
        public bool CCOnOff { get; set; }
 
        [EventSubscribe("PreparingNewWeatherData")]
        private void OnPreparingNewWeatherData(object sender, EventArgs e)
        {
            if (CCOnOff == true)
            if ((Clock.Today.Date >= StartDate) && (Clock.Today.Date <= EndDate))
                Met.Rain = 0;        
        }
    }
}
```
            Report DailyReport: EventNames=[Clock].DoReport
              VariableNames:
                [Clock].Today
                [Weather].MeanT
                [Soil].Water.Volumetric
                [Soil].Water.MM
                sum([Soil].Water.MM) as ProfileWater
                [Barley].AboveGround.N
                [Barley].AboveGround.Wt
                [Barley].AboveGroundLive.N
                [Barley].AboveGroundLive.N*10 as AboveGroundN
                [Barley].AboveGroundLive.Wt
                [Barley].AboveGroundDead.N
                [Barley].AboveGroundDead.Wt
                [Barley].Arbitrator.DMDemand
                [Barley].Arbitrator.DM.TotalFixationSupply
                [Barley].Ear.N
                [Barley].Ear.Nconc
                [Barley].Ear.Wt
                [Barley].Grain.N
                [Barley].Grain.NConc
                [Barley].Grain.Number
                [Barley].Grain.Size
                [Barley].Grain.Wt
                [Barley].Grain.Live.Wt
                [Barley].Leaf.AppearedCohortNo
                [Barley].Leaf.CoverDead
                [Barley].Leaf.CoverGreen
                [Barley].Leaf.CoverTotal
                [Barley].Leaf.Dead.N
                [Barley].Leaf.Dead.NConc
                [Barley].Leaf.Dead.Wt
                [Barley].Leaf.DeadCohortNo
                [Barley].Leaf.SenescingCohortNo
                [Barley].Leaf.ExpandedCohortNo
                [Barley].Leaf.Fn
                [Barley].Leaf.Fw
                [Barley].Leaf.Height
                [Barley].Leaf.InitialisedCohortNo
                [Barley].Leaf.LAI
                [Barley].Leaf.Live.N
                [Barley].Leaf.Live.NConc
                [Barley].Leaf.Live.Wt
                [Barley].Leaf.SpecificArea
                [Barley].Leaf.Transpiration
                [Barley].Phenology.CurrentPhase.Name
                [Barley].Phenology.CurrentStageName
                [Barley].Phenology.DailyVernalisation
                [Weather].MeanT
                [Barley].Phenology.Photoperiod
                [Barley].Phenology.Stage
                [Barley].Phenology.ThermalTime
                [Barley].Phenology.ThermalTime.Value
                [Barley].Phenology.Vrn1
                [Barley].Phenology.Vrn2
                [Barley].Phenology.Vrn4
                [Barley].Phenology.Zadok.Stage
                [Barley].Root.Depth
                [Barley].Root.N
                [Barley].Root.Wt
                [Barley].Root.Nconc
                [Barley].Root.WaterUptake
                [Barley].Spike.N
                [Barley].Spike.NConc
                [Barley].Spike.Wt
                [Barley].Spike.Live.StorageWt
                [Barley].Stem.N
                [Barley].Stem.NConc
                [Barley].Stem.Wt
                [Barley].Stem.PercentWSC
                [Barley].Stem.Live.StorageWt
                [Barley].StemPlusSpike.Wt
                [Barley].StemPlusSpike.N
                [Barley].SowingData.Cultivar
                [Barley].Structure.HaunStage.ValueTerminalSpikelet
                [Barley].Structure.HaunStage
                [Barley].Structure.Height
                [Barley].Structure.LeafTipsAppeared
                [Barley].Structure.FinalLeafNumber
                [Barley].Structure.FinalLeafNumber.ValueToHold.PhotoPLeaves
                [Barley].Structure.MainStemPopn
                [Barley].Structure.MeanTillerGrowthRate
                [Barley].Structure.TotalStemPopn
                [Barley].Total.N
                [Barley].Total.Wt
                [SurfaceOrganicMatter].Wt
                ([Barley].Leaf.Transpiration + [Soil].SoilWater.Es + [MicroClimate].PrecipitationInterception) as ET
                sum([Soil].NO3.kgha) as TotalSoilNitrogen
                [Barley].Phenology.FlagLeafDAS
                [Barley].Phenology.FloweringDAS
                [Barley].Phenology.MaturityDAS
                [Barley].Phenology.PhotoPeriod
                [Barley].Phenology.PhotoPeriodDeltaFunction
                [Barley].Phenology.Stage
                [Barley].Phenology.SoilTemperatureFunction
                [Barley].Population
                [Soil].SoilNitrogen.TotalN
            Report HarvestReport: EventNames=[Clock].EndOfSimulation
              VariableNames:
                [Barley].Structure.LeafTipsAppeared
                [Barley].Structure.FinalLeafNumber
                [Barley].Phenology.FlagLeafDAS
                [Barley].Phenology.FloweringDAS
                [Barley].Phenology.MaturityDAS
                [Script].CalcVals.SowMonth
            Report SowingReport: EventNames=[Barley].Sowing
              VariableNames:
                [Clock].Today
                [Barley].SowingData.Cultivar
        Memo
          Total biomass data is suspect
      Experiment RS1988_89
        Memo Trial details
          This experiment was conducted in the rainshelter at Plant and Food Research in Lincoln, New Zealand. The objective was to evaluate the effect of drought on the yield of barley crops. The experiment is fully described by Jamieson et al. (1995).  Briefly, 'Triumph' barley was sown at 188kg/ha on 07 September 1988. This sowing rate resulted in a population of 291 ± 6 plants/m2.  Plants were evaluated for their response to drought of varying duration. The treatments were:

          - Full irrigation – measured ET replaced weekly (06 October to 29 December)
          - Early Drought 1 – irrigated from 03 November to 05 January
          - Early Drought 2 – irrigated from 17 November to 19 January
          - Early Drought 3 – irrigated from 24 November to 19 January
          - Early Drought 3 – irrigated from 01 December to 09 February
          - Middle Drought 1 – irrigated (06/10/1988 to 03/11/1988) and (24/11/1988 to 29/12/1989)
          - Middle Drought 2 – irrigated (06/10/1988 to 03/11/1988) and (01/12/1988 to 29/12/1989)
          - Middle Drought 3 – irrigated (06/10/1988 to 03/11/1988) and (15/12/1988 to 29/12/1989)
          - Middle Drought 3 – irrigated (06/10/1988 to 03/11/1988)
          - Late Drought 1 – irrigated (06/10/1988 to 17/11/1988)
          - Late Drought 2 – irrigated (06/10/1988 to 24/11/1988)
          - Late Drought 3 – irrigated (06/10/1988 to 01/12/1989)
        Factors
          Factor Irr
            CompositeFactor Control
              Specifications:
                [ClimateControl]
                [IrrigationEvents]
              Manager ClimateControl
                StartDate = 1988-09-01
                EndDate = 1989-12-31
                CCOnOff = False
                script: same as in Validation.NewZealand.RS2014_15.Dash14.Paddock.ClimateControl
              Operations IrrigationEvents
                1988-10-06  [Irrigation].Apply(27);
                1988-10-13  [Irrigation].Apply(10);
                1988-10-20  [Irrigation].Apply(30);
                1988-10-27  [Irrigation].Apply(25);
                1988-11-03  [Irrigation].Apply(25);
                1988-11-10  [Irrigation].Apply(47);
                1988-11-17  [Irrigation].Apply(32);
                1988-11-24  [Irrigation].Apply(18);
                1988-12-01  [Irrigation].Apply(35);
                1988-12-08  [Irrigation].Apply(24);
                1988-12-15  [Irrigation].Apply(43);
                1988-12-22  [Irrigation].Apply(32);
                1988-12-29  [Irrigation].Apply(36);
            CompositeFactor EarlyDrought1
              Specifications:
                [IrrigationEvents]
                [ClimateControl]
              Operations IrrigationEvents
                1988-11-03  [Irrigation].Apply(45);
                1988-11-10  [Irrigation].Apply(47);
                1988-11-17  [Irrigation].Apply(32);
                1988-11-24  [Irrigation].Apply(18);
                1988-12-01  [Irrigation].Apply(35);
                1988-12-08  [Irrigation].Apply(24);
                1988-12-15  [Irrigation].Apply(43);
                1988-12-22  [Irrigation].Apply(32);
                1988-12-29  [Irrigation].Apply(36);
                1989-01-05  [Irrigation].Apply(35);
              Manager ClimateControl
                StartDate = 1988-09-01
                EndDate = 1989-12-31
                CCOnOff = True
                script: same as in Validation.NewZealand.RS2014_15.Dash14.Paddock.ClimateControl
            CompositeFactor EarlyDrought4
              Specifications:
                [IrrigationEvents]
                [ClimateControl]
              Operations IrrigationEvents
                1988-12-01  [Irrigation].Apply(35);
                1988-12-08  [Irrigation].Apply(50);
                1988-12-15  [Irrigation].Apply(43);
                1988-12-22  [Irrigation].Apply(32);
                1988-12-29  [Irrigation].Apply(36);
                1989-01-05  [Irrigation].Apply(35);
                1989-01-12  [Irrigation].Apply(26);
                1989-01-19  [Irrigation].Apply(22);
                1989-01-26  [Irrigation].Apply(20);
                1989-02-02  [Irrigation].Apply(17);
                1989-02-09  [Irrigation].Apply(15);
              Manager ClimateControl: same as Validation.NewZealand.RS1988_89.Factors.Irr.EarlyDrought1.ClimateControl
            CompositeFactor MiddleDrought3
              Specifications:
                [IrrigationEvents]
                [ClimateControl]
              Operations IrrigationEvents
                1988-10-06  [Irrigation].Apply(27);
                1988-10-13  [Irrigation].Apply(10);
                1988-10-20  [Irrigation].Apply(30);
                1988-10-27  [Irrigation].Apply(25);
                1988-12-15  [Irrigation].Apply(43);
                1988-12-22  [Irrigation].Apply(32);
                1988-12-29  [Irrigation].Apply(46);
              Manager ClimateControl: same as Validation.NewZealand.RS1988_89.Factors.Irr.EarlyDrought1.ClimateControl
            CompositeFactor LateDrought1
              Specifications:
                [IrrigationEvents]
                [ClimateControl]
              Operations IrrigationEvents
                1988-10-06  [Irrigation].Apply(27);
                1988-10-13  [Irrigation].Apply(10);
                1988-10-20  [Irrigation].Apply(30);
                1988-10-27  [Irrigation].Apply(25);
                1988-11-03  [Irrigation].Apply(25);
              Manager ClimateControl: same as Validation.NewZealand.RS1988_89.Factors.Irr.EarlyDrought1.ClimateControl
            CompositeFactor LateDrought3
              Specifications:
                [IrrigationEvents]
                [ClimateControl]
              Operations IrrigationEvents
                1988-10-06  [Irrigation].Apply(27);
                1988-10-13  [Irrigation].Apply(10);
                1988-10-20  [Irrigation].Apply(30);
                1988-10-27  [Irrigation].Apply(25);
                1988-11-03  [Irrigation].Apply(25);
                1988-11-10  [Irrigation].Apply(47);
                1988-11-17  [Irrigation].Apply(32);
                1988-11-24  [Irrigation].Apply(18);
                1988-12-01  [Irrigation].Apply(35);
              Manager ClimateControl: same as Validation.NewZealand.RS1988_89.Factors.Irr.EarlyDrought1.ClimateControl
        Simulation FullIrrig
          Weather: FileName=lincoln.met
          Clock: Start=1988-09-01; End=1989-03-01
          Summary summaryfile
          SoilArbitrator Soil Arbitrator
          Zone Paddock: Area=1; Slope=0; AspectAngle=0; Altitude=50
            Soil: Region=Plains; State=Canterbury; Country=New Zealand; Latitude=0; Longitude=0
              DataSource=Generic profile descriptions provided by Trevor Webb and data for functional horizions based on SWAMP project results
              Comments=Bulk density values were measured on the fine earth fraction so values entered into apsim soil are adjusted down to account for stone content (assuming stones are inert from all soil process so their mass and volume is removed from model paramaters).  SAT, DUL, LL15 and Air dry have been adjusted down to account for stone content.  OC has not been adjusted so the model will get the correct carbon and N amounts using the adjusted BD.
              Chemical: Thickness=[100, 200, 200, 100, 300, 200, 100, 300]; PH=[6, 6, 6, 6, 6, 6, 6, 6]; PHUnits=Water
              Physical
                Thickness  BD     AirDry  LL15  DUL   SAT
                200        1.23   0.09    0.09  0.3   0.48
                200        1.23   0.13    0.13  0.3   0.48
                200        1.59   0.13    0.13  0.29  0.4
                200        1.57   0.17    0.17  0.22  0.38
                200        1.57   0.22    0.22  0.27  0.366
                200        1.6    0.17    0.17  0.2   0.358
                200        1.6    0.2     0.2   0.25  0.358
                200        1.601  0.2     0.2   0.22  0.316
                SoilCrop BarleySoil: LL=[0.09, 0.13, 0.13, 0.17, 0.22, 0.17, 0.2, 0.2]; KL=[0.1, 0.07, 0.05, 0.03, 0.02, 0.02, 0.01, 0.01]; XF=[1, 1, 1, 1, 1, 0, 0, 0]
              WaterBalance SoilWater: SummerDate=1-oct; SummerU=9; SummerCona=4.4; WinterDate=1-Apr; WinterU=2; WinterCona=1.5; DiffusConst=88; DiffusSlope=35; Salb=0.13; CN2Bare=73; CNRed=20; CNCov=0.8; PSIDul=-100; Thickness=[100, 200, 300, 200, 100, 200, 100, 300]; SWCON=[0.9, 0.6, 0.4, 0.4, 0.4, 0.9, 0.9, 0.9]
              SoilNitrogen: fom_types=[default, manure, mucuna, lablab, shemp, stable]; fract_carb=[0.2, 0.3, 0.54, 0.57, 0.45, 0]; fract_cell=[0.7, 0.3, 0.37, 0.37, 0.47, 0.1]; fract_lign=[0.1, 0.4, 0.09, 0.06, 0.08, 0.9]; NPartitionApproach=0
              Organic: FOMCNRatio=31.5; CarbonUnits=Total
                Thickness  Carbon  SoilCNRatio  FBiom  FInert  FOM
                100        2.677   11           0.025  0.45    536.934
                200        2.784   11           0.025  0.6     359.917
                300        1.454   11           0.015  0.75    197.527
                200        0.383   11           0.01   0.9     132.406
                100        0.243   11           0.01   0.96    108.405
                200        0.243   11           0.01   0.96    72.6661
                100        0.243   11           0.01   0.96    59.4939
                300        0.243   11           0.01   0.96    32.651
              CERESSoilTemperature Temperature
              Water: Thickness=[200, 200, 200, 200, 200, 200, 200, 200]; InitialValues=[0.3, 0.3, 0.29, 0.22, 0.27, 0.2, 0.25, 0.22]; InitialPAWmm=148; RelativeTo=LL15; FilledFromTop=true
              SoilNitrogenNO3 NO3: Thickness=[100, 200, 200, 100, 300, 200, 100, 300]; InitialValuesUnits=ppm; WaterTableConcentration=0; D0=0; DepthConstant=0; MaxDepthSoluteAccessible=0; RunoffEffectivenessAtMovingSolute=0; MaxEffectiveRunoff=0
                InitialValues=[24.3902, 6.09756, 3.40136, 3.40136, 3.18471, 1.57729, 3.125, 1.04145]
              SoilNitrogenNH4 NH4: Thickness=[100, 200, 200, 100, 300, 200, 100, 300]; InitialValues=[4.06504, 0.203252, 0.113379, 0.113379, 0, 0, 0, 0]; InitialValuesUnits=ppm; WaterTableConcentration=0; D0=0; DepthConstant=0; MaxDepthSoluteAccessible=0; RunoffEffectivenessAtMovingSolute=0; MaxEffectiveRunoff=0
              SoilNitrogenUrea Urea: Thickness=[100, 200, 200, 100, 300, 200, 100, 300]; InitialValues=[0, 0, 0, 0, 0, 0, 0, 0]; InitialValuesUnits=kg/ha; WaterTableConcentration=0; D0=0; DepthConstant=0; MaxDepthSoluteAccessible=0; RunoffEffectivenessAtMovingSolute=0; MaxEffectiveRunoff=0
            Plant Barley
            SurfaceOrganicMatter Surface Organic Matter: InitialResidueName=Barley_stubble; InitialResidueType=Barley; InitialResidueMass=1000; InitialStandingFraction=0; InitialCPR=0; InitialCNR=80
            MicroClimate: a_interception=0; b_interception=1; c_interception=0; d_interception=0; SoilHeatFluxFraction=0.4; MinimumHeightDiffForNewLayer=0; NightInterceptionFraction=0.5; ReferenceHeight=2
            Irrigation
            Fertiliser
            Folder Manager folder
              Operations SowingEvent
                1988-09-07  [Barley].Sow(population:291, cultivar:"Triumph", depth:50, rowSpacing:150);
                Memo
                  Crop was sown on 9th of september and emerged on the 20th.  Have set sowing depth to 50cm to achieve the observed sowing date.  Plant population at establishement was 291 plants/m2
              Operations IrrigationEvents: same as Validation.NewZealand.RS1988_89.Factors.Irr.Control.IrrigationEvents
              Operations FertiliserEvents
                1988-09-26  [Fertiliser].Apply(50, Fertiliser.Types.NO3N,10);
                1988-11-02  [Fertiliser].Apply(70, Fertiliser.Types.NO3N,10);
              Manager ClimateControl: same as Validation.NewZealand.RS1988_89.Factors.Irr.Control.ClimateControl
              Manager SetSoilParams: same as Validation.NewZealand.MCPD10_11.Field10_11.Paddock.Manager folder.SetSoilParams
              Operations Harvest
                1989-02-07  [Barley].Harvest();
            Report DailyReport: EventNames=[Clock].DoReport
              VariableNames:
                [Clock].Today
                [Weather].MeanT
                [Soil].Water.Volumetric
                [Soil].Water.MM
                sum([Soil].Water.MM) as ProfileWater
                [Barley].AboveGround.N
                [Barley].AboveGround.Wt
                [Barley].AboveGroundLive.N
                [Barley].AboveGroundLive.N*10 as AboveGroundN
                [Barley].AboveGroundLive.Wt
                [Barley].AboveGroundDead.N
                [Barley].AboveGroundDead.Wt
                [Barley].Arbitrator.DMDemand
                [Barley].Arbitrator.DM.TotalFixationSupply
                [Barley].Ear.N
                [Barley].Ear.Nconc
                [Barley].Ear.Wt
                [Barley].Grain.N
                [Barley].Grain.NConc
                [Barley].Grain.Number
                [Barley].Grain.Size
                [Barley].Grain.Wt
                [Barley].Grain.Live.Wt
                [Barley].Leaf.AppearedCohortNo
                [Barley].Leaf.CoverDead
                [Barley].Leaf.CoverGreen
                [Barley].Leaf.CoverTotal
                [Barley].Leaf.Dead.N
                [Barley].Leaf.Dead.NConc
                [Barley].Leaf.Dead.Wt
                [Barley].Leaf.DeadCohortNo
                [Barley].Leaf.SenescingCohortNo
                [Barley].Leaf.ExpandedCohortNo
                [Barley].Leaf.Fn
                [Barley].Leaf.Fw
                [Barley].Leaf.Height
                [Barley].Leaf.InitialisedCohortNo
                [Barley].Leaf.LAI
                [Barley].Leaf.Live.N
                [Barley].Leaf.Live.NConc
                [Barley].Leaf.Live.Wt
                [Barley].Leaf.SpecificArea
                [Barley].Leaf.Transpiration
                [Barley].Phenology.CurrentPhase.Name
                [Barley].Phenology.CurrentStageName
                [Barley].Phenology.DailyVernalisation
                [Weather].MeanT
                [Barley].Phenology.Photoperiod
                [Barley].Phenology.Stage
                [Barley].Phenology.ThermalTime
                [Barley].Phenology.ThermalTime.Value
                [Barley].Phenology.Vrn1
                [Barley].Phenology.Vrn2
                [Barley].Phenology.Vrn4
                [Barley].Phenology.Zadok.Stage
                [Barley].Root.Depth
                [Barley].Root.N
                [Barley].Root.Wt
                [Barley].Root.Nconc
                [Barley].Root.WaterUptake
                [Barley].Spike.N
                [Barley].Spike.NConc
                [Barley].Spike.Wt
                [Barley].Spike.Live.StorageWt
                [Barley].Stem.N
                [Barley].Stem.NConc
                [Barley].Stem.Wt
                [Barley].Stem.PercentWSC
                [Barley].Stem.Live.StorageWt
                [Barley].StemPlusSpike.Wt
                [Barley].StemPlusSpike.N
                [Barley].SowingData.Cultivar
                [Barley].Structure.HaunStage.ValueTerminalSpikelet
                [Barley].Structure.HaunStage
                [Barley].Structure.Height
                [Barley].Structure.LeafTipsAppeared
                [Barley].Structure.FinalLeafNumber
                [Barley].Structure.FinalLeafNumber.ValueToHold.PhotoPLeaves
                [Barley].Structure.MainStemPopn
                [Barley].Structure.MeanTillerGrowthRate
                [Barley].Structure.TotalStemPopn
                [Barley].Total.N
                [Barley].Total.Wt
                [SurfaceOrganicMatter].Wt
                ([Barley].Leaf.Transpiration + [Soil].SoilWater.Es + [MicroClimate].PrecipitationInterception) as ET
                sum([Soil].NO3.kgha) as TotalSoilNitrogen
                [Barley].Phenology.FlagLeafDAS
                [Barley].Phenology.FloweringDAS
                [Barley].Phenology.MaturityDAS
                [Barley].Phenology.PhotoPeriod
                [Barley].Phenology.PhotoPeriodDeltaFunction
                [Barley].Phenology.Stage
                [Barley].Phenology.SoilTemperatureFunction
            Report HarvestReport: EventNames=[Clock].EndOfSimulation
              VariableNames:
                [Barley].Structure.LeafTipsAppeared
                [Barley].Structure.FinalLeafNumber
                [Barley].Phenology.FlagLeafDAS
                [Barley].Phenology.FloweringDAS
                [Barley].Phenology.MaturityDAS
                [Script].CalcVals.SowMonth
            Report SowingReport: EventNames=[Barley].Sowing
              VariableNames:
                [Clock].Today
                [Barley].SowingData.Cultivar
      Experiment RS1995_96
        Memo Trial details
          This is a water response trial conducted inside and outside the rain shelter at the New Zealand Institute for Plant & Food Research in Lincoln and described in De Ruiter et al (1999). Briefly, a vernalisation insensitive barley, variety "Valetta", was sown at 280 plant/m^2^ on 20 October 1995 and subjected to five water treatments as follows:

          - Full drought (in rain shelter) – was not irrigated except for 17 mm rainfall as a result of shelter failure 42 days after sowing;
          - Early drought (in rain shelter) – also receive 17 mm rainfall and the drought was fully relieved at the onset stem elongation;
          - Late drought (in rain shelter) – fully irrigated (i.e. net crop water use + soil water evaporation) up to stem elongation and nil irrigation thereafter;
          - Rain-fed (outside the rain shelter) – received all the rain but no irrigation;
          - Full irrigation (located outside the rain shelter) – received all the rain and irrigation to replace ET.
        Factors
          Permutation
            Factor Water
              CompositeFactor Rainfed
                Specifications:
                  [IrrigationEvents]
                  [ClimateControl]
                Manager ClimateControl
                  StartDate = 10/20/1995 00:00:00
                  EndDate = 04/01/1996 00:00:00
                  CCOnOff = False
                  script: same as in Validation.NewZealand.RS2014_15.Dash14.Paddock.ClimateControl
                Operations IrrigationEvents
              CompositeFactor Fullirrigation
                Specifications:
                  [IrrigationEvents]
                  [ClimateControl]
                Operations IrrigationEvents
                  1995-10-28  [Irrigation].Apply(2);
                  1995-11-04  [Irrigation].Apply(3.8);
                  1995-11-15  [Irrigation].Apply(5.2);
                  1995-11-28  [Irrigation].Apply(49.3);
                  1995-12-05  [Irrigation].Apply(5.3);
                  1995-12-12  [Irrigation].Apply(32);
                  1995-12-18  [Irrigation].Apply(5);
                  1995-12-19  [Irrigation].Apply(40.3);
                  1995-12-27  [Irrigation].Apply(5.3);
                  1996-01-03  [Irrigation].Apply(80);
                  1996-01-09  [Irrigation].Apply(50.3);
                  1996-01-16  [Irrigation].Apply(36);
                  1996-01-23  [Irrigation].Apply(24.8);
                  1996-01-30  [Irrigation].Apply(21.4);
                  1996-02-07  [Irrigation].Apply(15.9);
                  1996-02-12  [Irrigation].Apply(11.3);
                Manager ClimateControl: same as Validation.NewZealand.RS1995_96.Factors.Permutation.Water.Rainfed.ClimateControl
              CompositeFactor Earlydrought
                Specifications:
                  [IrrigationEvents]
                  [ClimateControl]
                Operations IrrigationEvents
                  1995-10-28  [Irrigation].Apply(2);
                  1995-11-04  [Irrigation].Apply(0);
                  1995-11-15  [Irrigation].Apply(0);
                  1995-11-28  [Irrigation].Apply(31.2);
                  1995-12-05  [Irrigation].Apply(5);
                  1995-12-12  [Irrigation].Apply(5);
                  1995-12-18  [Irrigation].Apply(0);
                  1995-12-19  [Irrigation].Apply(32.1);
                  1995-12-27  [Irrigation].Apply(0);
                  1996-01-03  [Irrigation].Apply(79.3);
                  1996-01-09  [Irrigation].Apply(44.7);
                  1996-01-16  [Irrigation].Apply(38.8);
                  1996-01-23  [Irrigation].Apply(30);
                  1996-01-30  [Irrigation].Apply(21.4);
                  1996-02-07  [Irrigation].Apply(0);
                  1996-02-12  [Irrigation].Apply(0);
                Manager ClimateControl
                  StartDate = 10/20/1995 00:00:00
                  EndDate = 04/01/1996 00:00:00
                  CCOnOff = True
                  script: same as in Validation.NewZealand.RS2014_15.Dash14.Paddock.ClimateControl
              CompositeFactor Latedrought
                Specifications:
                  [IrrigationEvents]
                  [ClimateControl]
                Operations IrrigationEvents
                  1995-10-28  [Irrigation].Apply(2);
                  1995-11-04  [Irrigation].Apply(0);
                  1995-11-15  [Irrigation].Apply(0);
                  1995-11-28  [Irrigation].Apply(47);
                  1995-12-05  [Irrigation].Apply(5);
                  1995-12-12  [Irrigation].Apply(30.5);
                  1995-12-18  [Irrigation].Apply(5);
                  1995-12-19  [Irrigation].Apply(3.1);
                  1995-12-27  [Irrigation].Apply(0);
                  1996-01-03  [Irrigation].Apply(0);
                  1996-01-09  [Irrigation].Apply(0);
                  1996-01-16  [Irrigation].Apply(0);
                  1996-01-23  [Irrigation].Apply(0);
                  1996-01-30  [Irrigation].Apply(0);
                  1996-02-07  [Irrigation].Apply(0);
                  1996-02-12  [Irrigation].Apply(0);
                Manager ClimateControl: same as Validation.NewZealand.RS1995_96.Factors.Permutation.Water.Earlydrought.ClimateControl
            Factor N: Specification=[FertiliserEvents]
              Operations 0
              Operations 150
                1995-10-20  [Fertiliser].Apply(50, Fertiliser.Types.NO3N,0);
                1995-11-08  [Fertiliser].Apply(50, Fertiliser.Types.NO3N,0);
                1995-12-05  [Fertiliser].Apply(50, Fertiliser.Types.NO3N,0);
        Simulation Rainfed
          Weather: FileName=lincoln.met
          Clock: Start=1995-10-19; End=1996-03-31
          Summary summaryfile
          SoilArbitrator Soil Arbitrator
          Zone Paddock: Area=1; Slope=0; AspectAngle=0; Altitude=50
            Manager DAS: same as Validation.NewZealand.MCPD09_10.Ablock.Paddock.DAS
            Soil: SoilType=NZ_sedementary; Region=Plains; State=Canterbury; Country=New Zealnd; Latitude=0; Longitude=0
              Chemical: Thickness=[100, 200, 300, 300, 300, 300]; PH=[6.6, 6.2, 5.7, 5.5, 5.5, 5.5]; PHUnits=Water
              Physical
                Thickness  BD    AirDry  LL15  DUL   SAT   KS
                200        1     0.09    0.09  0.3   0.48  4832.039
                100        1.15  0.09    0.09  0.28  0.48  389.229
                100        1.15  0.11    0.11  0.27  0.4   97
                100        1.3   0.11    0.11  0.27  0.38  97.995
                100        1.3   0.17    0.17  0.27  0.37  97.995
                100        1.3   0.17    0.17  0.3   0.36  97.995
                100        1.3   0.17    0.17  0.3   0.36  97.995
                100        1.3   0.17    0.17  0.3   0.36  97.995
                300        1.3   0.17    0.17  0.3   0.36  97
                300        1.3   0.17    0.17  0.3   0.36  97
                SoilCrop BarleySoil
                  LL=[0.09, 0.09, 0.11, 0.11, 0.17, 0.17, 0.17, 0.17, 0.17, 0.17]
                  KL=[0.1, 0.07, 0.06, 0.05, 0.03, 0.03, 0.02, 0.02, 0.01, 0.01]
                  XF=[1, 1, 1, 1, 1, 1, 1, 1, 1, 1]
              WaterBalance SoilWater: SummerDate=1-Nov; SummerU=6; SummerCona=2; WinterDate=1-Apr; WinterU=9; WinterCona=4.4; DiffusConst=0; DiffusSlope=0; Salb=0.18; CN2Bare=68; CNRed=20; CNCov=0.8; DischargeWidth=0; CatchmentArea=0; PSIDul=-100
                Thickness  SWCON  KLAT
                200        0.9    0
                200        0.9    0
                200        0.9    0
                200        0.9    0
                200        0.9    0
                200        0.9    0
                200        0.9    0
                200        0.9    0
              SoilNitrogen: fom_types=[default, manure, mucuna, lablab, shemp, stable]; fract_carb=[0.2, 0.3, 0.54, 0.57, 0.45, 0]; fract_cell=[0.7, 0.3, 0.37, 0.37, 0.47, 0.1]; fract_lign=[0.1, 0.4, 0.09, 0.06, 0.08, 0.9]; NPartitionApproach=0
              Organic: FOMCNRatio=31.5; CarbonUnits=Total
                Thickness  Carbon  SoilCNRatio  FBiom  FInert  FOM
                100        2.68    11           0.025  0.45    536.934
                200        2.78    11           0.025  0.6     359.917
                300        1.45    11           0.015  0.75    197.527
                200        0.38    11           0.01   0.9     132.406
                100        0.24    11           0.01   0.96    108.405
                200        0.24    11           0.01   0.96    72.6661
                100        0.24    11           0.01   0.96    59.4939
                300        0.24    11           0.01   0.96    32.651
              CERESSoilTemperature Temperature
              Water: Thickness=[200, 100, 100, 100, 100, 100, 100, 100, 300, 300]; InitialValues=[0.3, 0.28, 0.27, 0.27, 0.27, 0.3, 0.3, 0.3, 0.3, 0.3]; InitialPAWmm=220; RelativeTo=LL15; FilledFromTop=false
              SoilNitrogenNO3 NO3: Thickness=[100, 200, 300, 300, 300, 300]; InitialValues=[7.4, 5.85, 3.23333, 0.3, 0.3, 0.3]; InitialValuesUnits=ppm; WaterTableConcentration=0; D0=0; DepthConstant=0; MaxDepthSoluteAccessible=0; RunoffEffectivenessAtMovingSolute=0; MaxEffectiveRunoff=0
              SoilNitrogenNH4 NH4: Thickness=[100, 200, 300, 300, 300, 300]; InitialValues=[5.2, 5.5, 5.46667, 0.1, 0.1, 0.1]; InitialValuesUnits=ppm; WaterTableConcentration=0; D0=0; DepthConstant=0; MaxDepthSoluteAccessible=0; RunoffEffectivenessAtMovingSolute=0; MaxEffectiveRunoff=0
              SoilNitrogenUrea Urea: same as Validation.NewZealand.RS2014_15.Dash14.Paddock.Soil.Urea
            Plant Barley
            SurfaceOrganicMatter Surface Organic Matter: InitialResidueName=Barley_stubble; InitialResidueType=Barley; InitialResidueMass=1500; InitialStandingFraction=0; InitialCPR=0; InitialCNR=80
            MicroClimate: a_interception=0; b_interception=1; c_interception=0; d_interception=0; SoilHeatFluxFraction=0.4; MinimumHeightDiffForNewLayer=0; NightInterceptionFraction=0.5; ReferenceHeight=2
            Irrigation
            Fertiliser
            Folder Manager folder
              Operations SowingEvent
                1995-10-20  [Barley].Sow(population:280, cultivar:"Triumph", depth:20, rowSpacing:150);
              Operations IrrigationEvents
              Operations FertiliserEvents
              Operations Harvest
                1996-02-13  [Barley].Harvest();
            Manager ClimateControl
              StartDate = 1995-10-15
              EndDate = 1996-04-01
              CCOnOff = False
              script: same as in Validation.NewZealand.RS2014_15.Dash14.Paddock.ClimateControl
            Report DailyReport: EventNames=[Clock].DoReport
              VariableNames:
                [Clock].Today
                [Weather].MeanT
                [Soil].Water.Volumetric
                [Soil].Water.MM
                sum([Soil].Water.MM) as ProfileWater
                [Barley].AboveGround.N
                [Barley].AboveGround.Wt
                [Barley].AboveGroundLive.N
                [Barley].AboveGroundLive.N*10 as AboveGroundN
                [Barley].AboveGroundLive.Wt
                [Barley].AboveGroundDead.N
                [Barley].AboveGroundDead.Wt
                [Barley].Arbitrator.DMDemand
                [Barley].Arbitrator.DM.TotalFixationSupply
                [Barley].Ear.N
                [Barley].Ear.Nconc
                [Barley].Ear.Wt
                [Barley].Grain.N
                [Barley].Grain.NConc
                [Barley].Grain.Number
                [Barley].Grain.Size
                [Barley].Grain.Wt
                [Barley].Grain.Live.Wt
                [Barley].Leaf.AppearedCohortNo
                [Barley].Leaf.CoverDead
                [Barley].Leaf.CoverGreen
                [Barley].Leaf.CoverTotal
                [Barley].Leaf.Dead.N
                [Barley].Leaf.Dead.NConc
                [Barley].Leaf.Dead.Wt
                [Barley].Leaf.DeadCohortNo
                [Barley].Leaf.SenescingCohortNo
                [Barley].Leaf.ExpandedCohortNo
                [Barley].Leaf.Fn
                [Barley].Leaf.Fw
                [Barley].Leaf.Height
                [Barley].Leaf.InitialisedCohortNo
                [Barley].Leaf.LAI
                [Barley].Leaf.Live.N
                [Barley].Leaf.Live.NConc
                [Barley].Leaf.Live.Wt
                [Barley].Leaf.SpecificArea
                [Barley].Leaf.Transpiration
                [Barley].Phenology.CurrentPhase.Name
                [Barley].Phenology.CurrentStageName
                [Barley].Phenology.DailyVernalisation
                [Weather].MeanT
                [Barley].Phenology.Photoperiod
                [Barley].Phenology.Stage
                [Barley].Phenology.ThermalTime
                [Barley].Phenology.ThermalTime.Value
                [Barley].Phenology.Vrn1
                [Barley].Phenology.Vrn2
                [Barley].Phenology.Vrn4
                [Barley].Phenology.Zadok.Stage
                [Barley].Root.Depth
                [Barley].Root.N
                [Barley].Root.Wt
                [Barley].Root.Nconc
                [Barley].Root.WaterUptake
                [Barley].Spike.N
                [Barley].Spike.NConc
                [Barley].Spike.Wt
                [Barley].Spike.Live.StorageWt
                [Barley].Stem.N
                [Barley].Stem.NConc
                [Barley].Stem.Wt
                [Barley].Stem.PercentWSC
                [Barley].Stem.Live.StorageWt
                [Barley].StemPlusSpike.Wt
                [Barley].StemPlusSpike.N
                [Barley].SowingData.Cultivar
                [Barley].Structure.HaunStage.ValueTerminalSpikelet
                [Barley].Structure.HaunStage
                [Barley].Structure.Height
                [Barley].Structure.LeafTipsAppeared
                [Barley].Structure.FinalLeafNumber
                [Barley].Structure.FinalLeafNumber.ValueToHold.PhotoPLeaves
                [Barley].Structure.MainStemPopn
                [Barley].Structure.MeanTillerGrowthRate
                [Barley].Structure.TotalStemPopn
                [Barley].Total.N
                [Barley].Total.Wt
                [SurfaceOrganicMatter].Wt
                ([Barley].Leaf.Transpiration + [Soil].SoilWater.Es + [MicroClimate].PrecipitationInterception) as ET
                sum([Soil].NO3.kgha) as TotalSoilNitrogen
                [Barley].Phenology.FlagLeafDAS
                [Barley].Phenology.FloweringDAS
                [Barley].Phenology.MaturityDAS
                [Barley].Phenology.PhotoPeriod
                [Barley].Phenology.PhotoPeriodDeltaFunction
                [Barley].Phenology.Stage
                [Barley].Phenology.SoilTemperatureFunction
                [Barley].Population
                [Soil].SoilNitrogen.TotalN
                sum([Soil].Water.MM) as sw_dep
            Report HarvestReport: EventNames=[Clock].EndOfSimulation
              VariableNames:
                [Barley].Structure.LeafTipsAppeared
                [Barley].Structure.FinalLeafNumber
                [Barley].Phenology.FlagLeafDAS
                [Barley].Phenology.FloweringDAS
                [Barley].Phenology.MaturityDAS
                [Script].CalcVals.SowMonth
            Report ProfileWaterReport: EventNames=[Clock].DoReport
              VariableNames:
                [Clock].Today
                sum([Soil].Water.MM[1:8]) as ProfileWater_0_90
            Report SowingReport: EventNames=[Barley].Sowing
              VariableNames:
                [Clock].Today
                [Barley].SowingData.Cultivar
      Experiment LUDF2015_16
        Memo Experimental Details
          This is the mineral nitrogen (N) validation trial conducted by the New Zealannd Institure for Plant & Food Research from September 2015 to February 2016. The experiment was established at the Lincoln University Dairy Farm on a deep well-drained Templeton silt loam soil. Five N fertiliser treatments were evaluated:

          - Nil (0%) N - the crop did not get any fertiliser N
          - 50% N - the crop received 50% of the required fertiliser N
          - 75% N - the crop received 75% of the required fertiliser N
          - 100% N - the crop received the required fertiliser N as estimated by the fertiliser calculator
          - 125% N - the crop received 25% fertiliser N above the requirement.
        Factors
          Factor NProp
            CompositeFactor 0: Specifications=[FertiliserEvents]
              Operations FertiliserEvents
                2015-11-10  [Fertiliser].Apply(0, Fertiliser.Types.NO3N,0);
                2015-11-29  [Fertiliser].Apply(0, Fertiliser.Types.NO3N,0);
                2015-12-16  [Fertiliser].Apply(0, Fertiliser.Types.NO3N,0);
            CompositeFactor 50: Specifications=[FertiliserEvents]
              Operations FertiliserEvents
                2015-11-10  [Fertiliser].Apply(23, Fertiliser.Types.NO3N,0);
                2015-11-29  [Fertiliser].Apply(23, Fertiliser.Types.NO3N,0);
                2015-12-16  [Fertiliser].Apply(23, Fertiliser.Types.NO3N,0);
            CompositeFactor 75: Specifications=[FertiliserEvents]
              Operations FertiliserEvents
                2015-11-10  [Fertiliser].Apply(34, Fertiliser.Types.NO3N,0);
                2015-11-29  [Fertiliser].Apply(34, Fertiliser.Types.NO3N,0);
                2015-12-16  [Fertiliser].Apply(34, Fertiliser.Types.NO3N,0);
            CompositeFactor 100: Specifications=[FertiliserEvents]
              Operations FertiliserEvents
                2015-11-10  [Fertiliser].Apply(45, Fertiliser.Types.NO3N,0);
                2015-11-29  [Fertiliser].Apply(45, Fertiliser.Types.NO3N,0);
                2015-12-16  [Fertiliser].Apply(45, Fertiliser.Types.NO3N,0);
            CompositeFactor 125: Specifications=[FertiliserEvents]
              Operations FertiliserEvents
                2015-11-10  [Fertiliser].Apply(56, Fertiliser.Types.NO3N,0);
                2015-11-29  [Fertiliser].Apply(56, Fertiliser.Types.NO3N,0);
                2015-12-16  [Fertiliser].Apply(56, Fertiliser.Types.NO3N,0);
        Simulation Base_ZeroN
          Weather: FileName=lincoln.met
          Clock: Start=2015-09-11; End=2016-03-31
          Summary summaryfile
          SoilArbitrator Soil Arbitrator
          Zone Paddock: Area=1; Slope=0; AspectAngle=0; Altitude=50
            Manager DAS: same as Validation.NewZealand.MCPD09_10.Ablock.Paddock.DAS
            Soil: SoilType=NZ_sedementary; Region=Plains; State=Canterbury; Country=New Zealnd; Latitude=0; Longitude=0
              Chemical: Thickness=[150, 150, 300, 300, 300, 300]; PH=[6.6, 6.2, 5.7, 5.5, 5.5, 5.5]; PHUnits=Water
              Physical
                Thickness  BD   AirDry  LL15  DUL   SAT   KS
                150        1    0.05    0.14  0.33  0.48  4832.039
                150        1.1  0.05    0.14  0.33  0.48  389.229
                300        1.2  0.16    0.16  0.29  0.4   16.362
                300        1.2  0.17    0.17  0.28  0.38  97.995
                300        1.3  0.17    0.17  0.3   0.37  97.995
                300        1.3  0.17    0.17  0.3   0.36  97.995
                SoilCrop BarleySoil: LL=[0.1, 0.1, 0.16, 0.17, 0.173, 0.17]; KL=[0.1, 0.1, 0.1, 0.1, 0.1, 0.1]; XF=[1, 1, 1, 1, 1, 1]
              WaterBalance SoilWater: same as Validation.NewZealand.MCPD10_11.Field10_11.Paddock.Soil.SoilWater
              SoilNitrogen: fom_types=[default, manure, mucuna, lablab, shemp, stable]; fract_carb=[0.2, 0.3, 0.54, 0.57, 0.45, 0]; fract_cell=[0.7, 0.3, 0.37, 0.37, 0.47, 0.1]; fract_lign=[0.1, 0.4, 0.09, 0.06, 0.08, 0.9]; NPartitionApproach=0
              Organic: FOMCNRatio=15; CarbonUnits=Total
                Thickness  Carbon  SoilCNRatio  FBiom  FInert  FOM
                150        2.5     11           0.025  0.45    1562.39
                150        1.8     11           0.025  0.6     1157.45
                300        1.1     11           0.015  0.7     635.22
                300        0.38    11           0.01   0.9     348.616
                300        0.24    11           0.01   0.96    191.325
                300        0.24    11           0.01   0.96    105.001
              CERESSoilTemperature Temperature
              Water: Thickness=[150, 150, 300, 300, 300, 300]; InitialValues=[0.33, 0.33, 0.29, 0.28, 0.3, 0.3]; InitialPAWmm=207; RelativeTo=LL15; FilledFromTop=false
              SoilNitrogenNO3 NO3: Thickness=[150, 150, 300, 300, 300, 300]; InitialValues=[4.3, 2.9, 1.5, 1.7, 1.4, 0.7]; InitialValuesUnits=ppm; WaterTableConcentration=0; D0=0; DepthConstant=0; MaxDepthSoluteAccessible=0; RunoffEffectivenessAtMovingSolute=0; MaxEffectiveRunoff=0
              SoilNitrogenNH4 NH4: Thickness=[150, 150, 300, 300, 300, 300]; InitialValues=[2.7, 4.1, 1.6, 1.4, 0.9, 0.1]; InitialValuesUnits=ppm; WaterTableConcentration=0; D0=0; DepthConstant=0; MaxDepthSoluteAccessible=0; RunoffEffectivenessAtMovingSolute=0; MaxEffectiveRunoff=0
              SoilNitrogenUrea Urea: same as Validation.NewZealand.MCPD09_10.Ablock.Paddock.Soil.Urea
            Plant Barley
            SurfaceOrganicMatter Surface Organic Matter: InitialResidueName=pasture_residual; InitialResidueType=pasture; InitialResidueMass=2500; InitialStandingFraction=0; InitialCPR=0; InitialCNR=15
            MicroClimate: a_interception=0; b_interception=1; c_interception=0; d_interception=0; SoilHeatFluxFraction=0.4; MinimumHeightDiffForNewLayer=0; NightInterceptionFraction=0.5; ReferenceHeight=2
            Irrigation
            Fertiliser
            Folder Manager folder
              Operations SowingEvent
                2015-09-28  [Barley].Sow(population:180, cultivar:"Bumpa", depth:20, rowSpacing:150);
              Operations IrrigationEvents
                2015-10-19  [Irrigation].Apply(25);
                2015-11-26  [Irrigation].Apply(0);
                2015-12-01  [Irrigation].Apply(25);
                2015-12-10  [Irrigation].Apply(25);
              Operations FertiliserEvents
                2015-11-10  [Fertiliser].Apply(0, Fertiliser.Types.NO3N,0);
                2015-11-29  [Fertiliser].Apply(0, Fertiliser.Types.NO3N,0);
                2015-12-16  [Fertiliser].Apply(0, Fertiliser.Types.NO3N,0);
                2015-12-16  [Fertiliser].Apply(0, Fertiliser.Types.NO3N,0);
              Manager SetSoilParams: same as Validation.NewZealand.RS2014_15.Dash14.Paddock.Manager folder.SetSoilParams
              Operations Harvest
                2016-02-11  [Barley].Harvest();
            Report DailyReport: same as Validation.NewZealand.MCPD09_10.Ablock.Paddock.DailyReport
            Report HarvestReport: EventNames=[Clock].EndOfSimulation
              VariableNames:
                [Barley].Structure.LeafTipsAppeared
                [Barley].Structure.FinalLeafNumber
                [Barley].Phenology.FlagLeafDAS
                [Barley].Phenology.FloweringDAS
                [Barley].Phenology.MaturityDAS
                [Script].CalcVals.SowMonth
            Report SowingReport: EventNames=[Barley].Sowing
              VariableNames:
                [Clock].Today
                [Barley].SowingData.Cultivar
        Memo
          Total biomass data is suspect
        Memo
          Total biomass data is suspect
        Memo
          Total biomass data is suspect
      Experiment ABlock99_00
        Memo Experimental Details
          This was a sowing date by irrigation trial conducted at Lincoln. The following were evaluated:

          - Two water treatments; Rainfed (nil irrigation) and irrigated (310 mm)
          - Two fertiliser N treatments; 0N (no fertiliser) and 150N (150 kg N/ha)
        Factors
          Permutation
            Factor Sow
              CompositeFactor May
                Specifications:
                  [Sowing].Script.SowingDate = 1999-05-28
                  [FertAndIrrig]
                Operations FertAndIrrig
                  1999-10-28  [Irrigation].Apply(25);
                  1999-12-01  [Irrigation].Apply(40);
                  1999-12-17  [Irrigation].Apply(40);
                  1999-08-06  [Fertiliser].Apply(50, Fertiliser.Types.NO3N,10);
                  1999-08-31  [Fertiliser].Apply(50, Fertiliser.Types.NO3N,10);
                  1999-10-07  [Fertiliser].Apply(50, Fertiliser.Types.NO3N,10);
              CompositeFactor Aug
                Specifications:
                  [Sowing].Script.SowingDate = 1999-08-30
                  [FertAndIrrig]
                Operations FertAndIrrig
                  1999-10-28  [Irrigation].Apply(25);
                  1999-12-01  [Irrigation].Apply(40);
                  1999-12-17  [Irrigation].Apply(40);
                  1999-10-06  [Fertiliser].Apply(50, Fertiliser.Types.NO3N,10);
                  1999-10-29  [Fertiliser].Apply(50, Fertiliser.Types.NO3N,10);
                  1999-11-24  [Fertiliser].Apply(50, Fertiliser.Types.NO3N,10);
              CompositeFactor Nov
                Specifications:
                  [Sowing].Script.SowingDate = 1999-11-24
                  [FertAndIrrig]
                Operations FertAndIrrig
                  1999-12-17  [Irrigation].Apply(40);
                  2000-02-17  [Irrigation].Apply(40);
                  1999-11-24  [Fertiliser].Apply(50, Fertiliser.Types.NO3N,10);
                  1999-12-14  [Fertiliser].Apply(50, Fertiliser.Types.NO3N,10);
                  2000-01-12  [Fertiliser].Apply(50, Fertiliser.Types.NO3N,10);
            Factor Pop: Specification=[Sowing].Script.Popn = 100,200,300,400
        Simulation AblockSD
          Weather: FileName=lincoln.met
          Clock: Start=1999-05-20; End=2000-05-30
          Summary summaryfile
          SoilArbitrator Soil Arbitrator
          Zone Paddock: Area=1; Slope=0; AspectAngle=0; Altitude=50
            Soil: SoilType=NZ_sedementary; Region=Plains; State=Canterbury; Country=New Zealnd; Latitude=0; Longitude=0
              Chemical: Thickness=[150, 150, 300, 300, 300, 300]; PH=[6.6, 6.2, 5.7, 5.5, 5.5, 5.5]; PHUnits=Water
              Physical: same as Validation.NewZealand.MCPD11_12.Field11_12.Paddock.Soil.Physical
              WaterBalance SoilWater: same as Validation.NewZealand.MCPD10_11.Field10_11.Paddock.Soil.SoilWater
              SoilNitrogen: fom_types=[default, manure, mucuna, lablab, shemp, stable]; fract_carb=[0.2, 0.3, 0.54, 0.57, 0.45, 0]; fract_cell=[0.7, 0.3, 0.37, 0.37, 0.47, 0.1]; fract_lign=[0.1, 0.4, 0.09, 0.06, 0.08, 0.9]; NPartitionApproach=0
              Organic: same as Validation.NewZealand.MCPD11_12.Field11_12.Paddock.Soil.Organic
              CERESSoilTemperature Temperature
              Water: Thickness=[200, 200, 200, 200, 200, 200, 200, 200]; InitialValues=[0.33, 0.33, 0.3, 0.31, 0.32, 0.33, 0.34, 0.33]; InitialPAWmm=214; RelativeTo=LL15; FilledFromTop=false
              SoilNitrogenNO3 NO3: same as Validation.NewZealand.MCPD11_12.Field11_12.Paddock.Soil.NO3
              SoilNitrogenNH4 NH4: same as Validation.NewZealand.MCPD11_12.Field11_12.Paddock.Soil.NH4
              SoilNitrogenUrea Urea: same as Validation.NewZealand.MCPD09_10.Ablock.Paddock.Soil.Urea
            Plant Barley
            SurfaceOrganicMatter Surface Organic Matter: InitialResidueName=Barley_stubble; InitialResidueType=Barley; InitialResidueMass=1500; InitialStandingFraction=0; InitialCPR=0; InitialCNR=80
            MicroClimate: a_interception=0; b_interception=1; c_interception=0; d_interception=0; SoilHeatFluxFraction=0.4; MinimumHeightDiffForNewLayer=0; NightInterceptionFraction=0.5; ReferenceHeight=2
            Irrigation
            Fertiliser
            Folder Manager folder
              Manager Sowing
                SowingDate = 1999-05-28
                Popn = 300
                SowDepth = 20
                CultivarName = Dash
```csharp
using Models.Soils;
using System;
using Models.Core;
using System.Collections.Generic;
using System.Text;
using Models.PMF;
using Models;
using System.Xml.Serialization;
using APSIM.Shared.Utilities;
using System.Data;
using Models.PMF.Interfaces;
using Models.Surface;

namespace Models
{
    [Serializable] 
    public class Script : Model
    {
        [Link] Plant Barley;
        [Link] Clock Clock;
                
        [Description("SowDepth")]
        public double SowDepth { get; set; }
        [Description("Population")]
        public double Popn { get; set; }
        [Description("Sowing Date")]
        public DateTime SowingDate { get; set; }
        [Description("Cultivar")]
        [Display(Type=DisplayType.CultivarName)]
        public string CultivarName { get; set; }

        
        [EventSubscribe("DoManagement")]
        private void OnDoManagement(object sender, EventArgs e)
        {
            if (Clock.Today.Date == SowingDate)
            {
                Barley.Sow(cultivar: CultivarName, population: Popn, depth: SowDepth, rowSpacing: 150);
            }
        }
    }
}
```
              Operations FertAndIrrig
                1999-10-29  Irrigation.Apply(
              Manager SetSoilParams: same as Validation.NewZealand.MCPD10_11.Field10_11.Paddock.Manager folder.SetSoilParams
              Operations Harvest
                2000-03-18  [Barley].Harvest();
            Report DailyReport: same as Validation.NewZealand.MCPD09_10.Ablock.Paddock.DailyReport
            Report HarvestReport: EventNames=[Clock].EndOfSimulation
              VariableNames:
                [Barley].Structure.LeafTipsAppeared
                [Barley].Structure.FinalLeafNumber
                [Barley].Phenology.FlagLeafDAS
                [Barley].Phenology.FloweringDAS
                [Barley].Phenology.MaturityDAS
                [Script].CalcVals.SowMonth
            Report SowingReport: EventNames=[Barley].Sowing
              VariableNames:
                [Clock].Today
                [Barley].SowingData.Cultivar
      Folder CPT
        Memo Trial details
          This was a cultivar evaluation trial conducted in Lincoln New Zealand between 2003 and 2006. Crops were sown in either May or September. Observations made were of (i) DAS to flag leaf appearance and (ii) DAS to flowering.
        Experiment CPT
          Factors
            Permutation
              Factor Cult
                Specification=[SowAndHarvest].Script.Cultivar = Boss,Cellar,County,Dash,Doyen,Omaka,Optic,Pyramid,Sherwood,Tavern,Vortex
              Factor SD
                Specification=[Clock].StartDate  = 2002-05-15,2002-09-09,2003-05-21,2003-09-02,2004-05-28,2004-09-06,2005-05-27,2005-09-05,2006-05-10,2006-10-11
          Simulation Boss
            Weather: FileName=lincoln.met
            Clock: Start=2003-05-01; End=2007-12-31
            Summary summaryfile
            SoilArbitrator Soil Arbitrator
            Manager DAS: same as Validation.NewZealand.MCPD09_10.Ablock.Paddock.DAS
            Zone Paddock: Area=1; Slope=0; AspectAngle=0; Altitude=50
              Soil: SoilType=NZ_sedementary; Region=Plains; State=Canterbury; Country=New Zealnd; Latitude=0; Longitude=0
                Chemical: Thickness=[100, 200, 300, 300, 300, 300]; PH=[6.6, 6.2, 5.7, 5.5, 5.5, 5.5]; PHUnits=Water
                Physical
                  Thickness  BD    AirDry  LL15  DUL   SAT   KS
                  200        1.23  0.05    0.14  0.33  0.48  4832.039
                  200        1.23  0.05    0.14  0.33  0.48  389.229
                  200        1.59  0.1     0.16  0.29  0.4   16.362
                  200        1.57  0.1     0.17  0.28  0.38  97.995
                  200        1.57  0.1     0.17  0.3   0.37  97.995
                  200        1.6   0.1     0.17  0.3   0.36  97.995
                  200        1.6   0.05    0.17  0.3   0.36  97.995
                  200        1.6   0.05    0.12  0.3   0.32  97.995
                  SoilCrop BarleySoil: LL=[0.14, 0.14, 0.16, 0.17, 0.17, 0.17, 0.17, 0.12]; KL=[0.1, 0.1, 0.1, 0.1, 0.1, 0.1, 0.1, 0.1]; XF=[1, 1, 1, 1, 1, 1, 1, 1]
                WaterBalance SoilWater: SummerDate=1-Nov; SummerU=6; SummerCona=2; WinterDate=1-Apr; WinterU=9; WinterCona=4.4; DiffusConst=0; DiffusSlope=0; Salb=0.18; CN2Bare=68; CNRed=20; CNCov=0.8; DischargeWidth=0; CatchmentArea=0; PSIDul=-100
                  Thickness  SWCON  KLAT
                  200        0.9    0
                  200        0.6    0
                  200        0.4    0
                  200        0.4    0
                  200        0.4    0
                  200        0.9    0
                  200        0.9    0
                  200        0.9    0
                SoilNitrogen: fom_types=[default, manure, mucuna, lablab, shemp, stable]; fract_carb=[0.2, 0.3, 0.54, 0.57, 0.45, 0]; fract_cell=[0.7, 0.3, 0.37, 0.37, 0.47, 0.1]; fract_lign=[0.1, 0.4, 0.09, 0.06, 0.08, 0.9]; NPartitionApproach=0
                Organic: same as Validation.NewZealand.RS1995_96.Rainfed.Paddock.Soil.Organic
                Water: Thickness=[200, 200, 200, 200, 200, 200, 200, 200]; InitialValues=[0.31, 0.31, 0.16, 0.15, 0.2, 0.2, 0.2, 0.2]; InitialPAWmm=98; RelativeTo=LL15; FilledFromTop=false
                CERESSoilTemperature Temperature
                SoilNitrogenNO3 NO3: Thickness=[100, 200, 300, 300, 300, 300]; InitialValues=[18.6992, 7.31707, 3.40136, 0.636943, 0.627957, 0.208333]; InitialValuesUnits=ppm; WaterTableConcentration=0; D0=0; DepthConstant=0; MaxDepthSoluteAccessible=0; RunoffEffectivenessAtMovingSolute=0; MaxEffectiveRunoff=0
                SoilNitrogenNH4 NH4: Thickness=[100, 200, 300, 300, 300, 300]; InitialValuesUnits=ppm; WaterTableConcentration=0; D0=0; DepthConstant=0; MaxDepthSoluteAccessible=0; RunoffEffectivenessAtMovingSolute=0; MaxEffectiveRunoff=0
                  InitialValues=[1.78862, 0.813008, 0.408163, 0.467091, 0.210108, 0.0208333]
                SoilNitrogenUrea Urea: same as Validation.NewZealand.RS2014_15.Dash14.Paddock.Soil.Urea
              Plant Barley
              SurfaceOrganicMatter Surface Organic Matter: InitialResidueName=Barley_stubble; InitialResidueType=Barley; InitialResidueMass=1500; InitialStandingFraction=0; InitialCPR=0; InitialCNR=80
              MicroClimate: a_interception=0; b_interception=1; c_interception=0; d_interception=0; SoilHeatFluxFraction=0.4; MinimumHeightDiffForNewLayer=0; NightInterceptionFraction=0.5; ReferenceHeight=2
              Irrigation
              Fertiliser
              Manager Auto_Irrigation
                Trigger_Def = 30
                Irrigation_Amount = 30
                Top_Depth = 1000
```csharp
using Newtonsoft.Json;
using Models.PMF.Organs;
using System;
using Models.Core;
using Models.PMF;
using Models.Soils;
using System.Xml.Serialization;
using APSIM.Shared.Utilities;
using Models.Interfaces;

        
namespace Models
{
    [Serializable] 
    [System.Xml.Serialization.XmlInclude(typeof(Model))]
    public class Script : Model
    {
        [Link] private ISummary summary;
        [Link] private Irrigation Irrig;
        [Link] private Clock Clock;
        [Link] private Soils.Soil soil;
        [Link] private Plant Barley;
        [Link] private Simulation Simulation;
        [Link(Type = LinkType.Path, Path = "[Barley].Root")]
        private Root root;
        [Link]
        private IPhysical soilPhysical;
        [Link]
        private ISoilWater waterBalance;
        //Communication to other modules
        
       
        //User inputs from properties tab

        [Description("Deficit to trigger irrigation Y(mm)")]
        public double Trigger_Def { get; set; }
        [Description("Irrigation application Y(mm)")]
        public double Irrigation_Amount { get; set; }
        [Description("Depth to calculate Deficit (mm)")]
        public double Top_Depth { get; set; }
        
        //private
        [JsonIgnore] public bool SoilIsDry { get; set; }
        [JsonIgnore] public double Top_DUL { get; set; }
        [JsonIgnore] public double Top_Refull { get; set; }
        [JsonIgnore] public double Top_Trigger { get; set; }
        [JsonIgnore] public double Top_LL { get; set; }
        [JsonIgnore] public double Top_SW { get; set; }
        [JsonIgnore] public double Accumulated_depth { get; set; }
        [JsonIgnore] public double Current_Deficit { get; set; }
        
        
       
    
        //Calculate static soil variables
        [EventSubscribe("StartOfSimulation")]
        private void OnStartOfSimulation(object sender, EventArgs e)
        {   
            //Calculated soil water variables
            Accumulated_depth = 0;
            for (int layer = 0; Accumulated_depth < Top_Depth; layer++)
            {
                Top_LL += soilPhysical.LL15mm[layer];
                Top_DUL += soilPhysical.DULmm[layer];
                Accumulated_depth += soilPhysical.Thickness[layer];
            }
            Top_Trigger = Top_DUL - Trigger_Def;
            //SeasonIsOpen = false;
        
        }
       
      
        //Determine daily requirement for irrigation
        [EventSubscribe("DoManagement")]
        private void OnDoManagement(object sender, EventArgs e)
        {
            //double DAS = (double)Simulation.FindByPath("DAS.Script.DAS").Value;
                        
        
        
        
            
              
            //Is the soil dry enough to require irrigation?
            SoilIsDry = false;
            double CurrentRootDepth = 0;
            double RootDepth = root.Depth;
            CurrentRootDepth = Math.Max(RootDepth, CurrentRootDepth);
          
            Accumulated_depth = 0;
            Top_SW = 0;
            for (int layer = 0; Accumulated_depth < Top_Depth; layer++)
            {
                Top_SW += waterBalance.SWmm[layer];
                Accumulated_depth += soilPhysical.Thickness[layer];
            }
            
            if (Top_SW <= Top_Trigger)
                SoilIsDry = true;
            
                
            
            if (SoilIsDry) //Set Deficit-based irrigation
            {
                
                
                Irrig.Apply(Irrigation_Amount);
                summary.WriteMessage(this, "Automatic Irrigation", MessageType.Diagnostic);
                
                            
            }
        }
    }
}
```
              Manager ApplyN_at_sowing
```csharp
using Newtonsoft.Json;
using System;
using Models.Core;
using System.Collections.Generic;
using System.Text;
using Models.Soils;
using Models.PMF;
using Models;
using System.Xml.Serialization;
using APSIM.Shared.Utilities;

namespace Models
{
    [Serializable] 
    public class Script : Model
    {
        [Link] Clock Clock;
        [Link] Fertiliser Fertiliser;
        [Link] Irrigation Irrig;
        [Link] Simulation Simulation;
        
                    
        [JsonIgnore] public bool InitialDay { get; set; }
        //[JsonIgnore] public double FertN { get; set; }
        
        [EventSubscribe("StartOfSimulation")]
        private void OnSimulationCommencing(object sender, EventArgs e)
        {
            InitialDay = true;
        }
        
        [EventSubscribe("DoManagement")]
        private void OnDoManagement(object sender, EventArgs e)
        {
            double DAS = (double)Simulation.FindByPath("DAS.Script.DAS").Value;
            if (DAS == 1)
                Fertiliser.Apply(100, Fertiliser.Types.NO3N, 50);
        }
    }
    
}
```
              Manager SowAndHarvest
                Cultivar = Otane
```csharp
using Models.Soils;
using Models.PMF.Phen;
using System;
using Models.Core;
using Models.PMF;
using APSIM.Shared.Utilities;
using System.Xml.Serialization;
using Newtonsoft.Json;
        
namespace Models
{
    [Serializable] 
    [System.Xml.Serialization.XmlInclude(typeof(Model))]
    public class Script : Model
    {
        [Link] private Plant Barley;
        [Link] private Clock Clock;
        [Link] private Simulation sim;
        [Link] private Summary Summary;
        [Link(Type = LinkType.Path, Path = "[Barley].Phenology")]
        private Phenology phenology;
        
        [Description("Cultivar")]
        public string Cultivar { get; set; }
        
        [JsonIgnore] public bool Sown { get; set; }
        [JsonIgnore] public bool Harvested { get; set; }
        [JsonIgnore] public bool EndSet { get; set; }
        
        [EventSubscribe("StartOfSimulation")]
        private void OnSimulationCommencing(object sender, EventArgs e)
        {
            Sown = false;
            Harvested = false;
            EndSet = false;
        }
        
        [EventSubscribe("DoManagement")]
        private void OnDoManagement(object sender, EventArgs e)
        {
            if (Sown == false)
            {
                Barley.Sow(population: 200, cultivar: Cultivar, depth: 20, rowSpacing: 150, budNumber: 1);
                Sown = true;
            }
            
            if (phenology.CurrentPhase.Name == "ReadyForHarvesting")
            {
                Barley.Harvest();
                Barley.EndCrop();
                Harvested = true;
                Summary.WriteMessage(this, "Flowering reached so setting end date to stop simulation", MessageType.Diagnostic);
            }
            
            if ((Harvested == true) && (EndSet == false))
            {
                sim.Set("Clock.EndDate", Clock.Today.AddDays(1));
                EndSet = true;
            }
        }
    }
}
```
              Report HarvestReport: EventNames=[Clock].EndOfSimulation
              Report DailyReport: EventNames=[Clock].DoReport
              Report SowingReport: EventNames=[Barley].Sowing
                VariableNames:
                  [Clock].Today
                  [Barley].SowingData.Cultivar
      PredictedObserved NewZealandHarvestObsPred: PredictedTableName=HarvestReport; ObservedTableName=Observed; FieldNameUsedForMatch=SimulationName; FieldName2UsedForMatch=Barley.Phenology.CurrentStageName; AllColumns=false
    Folder Australia
      Folder MCVP
        Memo
          This experiment was funded as part of the Australian Managing Climate Variability Program.  Barley cultivars were sown at two planting dates at three sites for the purpose of improving APSIM predictions of the phenology of commercial cultivars.  The locations included Gatton in Queensland (subtropical location), Birchip in Victoria (temperate inland location) and Tarlee in South Australia (temperate location).
        Experiment Gatton2011
          Factors
            Permutation
              Factor TOS: Specification=[SowingRule].Script.TOS = 1, 2
              Factor Cv
                Specification=[SowingRule].Script.Cultivar = Baudin, Buloke, Capstan, Commander, Fleet, Hindmarsh, Keel, Oxford
          Simulation Gatton2011Base
            Clock: Start=2011-05-05; End=2011-11-12
            Summary summaryfile
            Weather: FileName=Gatton2011.met
            SoilArbitrator Soil Arbitrator
            Zone Field: Area=1; Slope=0; AspectAngle=0; Altitude=50
              Irrigation
              Fertiliser
              Soil APS6Field: SoilType=APS6Soil; LocalName=APS6Site; Site=APS6Site; NearestTown=Unknown; Region=Lawes; NaturalVegetation=Unknown; Latitude=0; Longitude=0
                Physical
                  Thickness  BD    AirDry  LL15  DUL   SAT
                  150        1.38  0.1     0.2   0.38  0.43
                  150        1.34  0.1     0.2   0.38  0.43
                  300        1.35  0.1     0.22  0.4   0.43
                  300        1.5   0.1     0.18  0.4   0.43
                  300        1.49  0.1     0.14  0.39  0.42
                  300        1.46  0.1     0.2   0.38  0.4
                  300        1.46  0.1     0.2   0.38  0.4
                  SoilCrop BarleySoil: LL=[0.2, 0.2, 0.22, 0.18, 0.14, 0.25, 0.28]; KL=[0.06, 0.06, 0.06, 0.06, 0.06, 0.06, 0.06]; XF=[1, 1, 1, 1, 1, 1, 1]
                WaterBalance SoilWater: SummerDate=1-Nov; SummerU=6; SummerCona=3.5; WinterDate=1-Apr; WinterU=6; WinterCona=3.5; DiffusConst=88; DiffusSlope=35.4; Salb=0.13; CN2Bare=60; CNRed=20; CNCov=0.8; DischargeWidth=0; CatchmentArea=0; PSIDul=-100
                  Thickness  SWCON  KLAT
                  150        0.3    0
                  150        0.3    0
                  300        0.3    0
                  300        0.3    0
                  300        0.3    0
                  300        0.3    0
                  300        0.3    0
                SoilNitrogen: fom_types=[default, manure, mucuna, lablab, shemp, stable]; fract_carb=[0.2, 0.3, 0.54, 0.57, 0.45, 0]; fract_cell=[0.7, 0.3, 0.37, 0.37, 0.47, 0.1]; fract_lign=[0.1, 0.4, 0.09, 0.06, 0.08, 0.9]; NPartitionApproach=0
                Organic: FOMCNRatio=60; CarbonUnits=Total
                  Thickness  Carbon  SoilCNRatio  FBiom  FInert  FOM
                  150        2.2     14.5         0.03   0.45    694.258
                  150        1.6     14.5         0.02   0.6     540.689
                  300        1.15    14.5         0.01   0.78    327.944
                  300        1       14.5         0.01   0.9     198.908
                  300        0.8     14.5         0.01   0.99    120.644
                  300        0.45    14.5         0.01   0.99    73.1743
                  300        0.45    14.5         0.01   0.99    44.3824
                Chemical: Thickness=[150, 150, 300, 300, 300, 300, 300]; PH=[7.5, 8, 8, 8, 8, 8, 8]; PHUnits=Water
                Water: Thickness=[150, 150, 300, 300, 300, 300, 300]; InitialValues=[0.326, 0.326, 0.346, 0.333, 0.315, 0.326, 0.326]; InitialPAWmm=249.6; RelativeTo=LL15; FilledFromTop=false
                CERESSoilTemperature Temperature
                SoilNitrogenNO3 NO3: Thickness=[150, 150, 300, 300, 300, 300, 300]; InitialValues=[1.3, 0.6, 0.25, 0.2, 0.1, 0.1, 0.1]; InitialValuesUnits=ppm; WaterTableConcentration=0; D0=0; DepthConstant=0; MaxDepthSoluteAccessible=0; RunoffEffectivenessAtMovingSolute=0; MaxEffectiveRunoff=0
                SoilNitrogenNH4 NH4: Thickness=[150, 150, 300, 300, 300, 300, 300]; InitialValues=[1.3, 1, 1, 0.8, 0.8, 0.5, 0.5]; InitialValuesUnits=ppm; WaterTableConcentration=0; D0=0; DepthConstant=0; MaxDepthSoluteAccessible=0; RunoffEffectivenessAtMovingSolute=0; MaxEffectiveRunoff=0
                SoilNitrogenUrea Urea: Thickness=[150, 150, 300, 300, 300, 300, 300]; InitialValues=[0, 0, 0, 0, 0, 0, 0]; InitialValuesUnits=kg/ha; WaterTableConcentration=0; D0=0; DepthConstant=0; MaxDepthSoluteAccessible=0; RunoffEffectivenessAtMovingSolute=0; MaxEffectiveRunoff=0
              Manager SowingRule
                TOS = 1
                Cultivar = Hartog
```csharp
using Models.Soils;
using System;
using Models.Core;
using Models.PMF;
namespace Models
{
           
    [Serializable] 
    [System.Xml.Serialization.XmlInclude(typeof(Model))]
    public class Script : Model
    {
    
        [Link] Plant Barley;
        [Link] Clock Clock;
            
        [Description("Time of Sowing")]
        public int TOS { get; set; }

        [Description("Cultivar")]
        public String Cultivar { get; set; }
        
        [EventSubscribe("DoManagement")]
        private void OnDoManagement(object sender, EventArgs e)
        {
            if (((Clock.Today.DayOfYear == 136) && (TOS == 1)) ||
                ((Clock.Today.DayOfYear == 177) && (TOS == 2)))
            {
                Barley.Sow(population: 100, cultivar: Cultivar, depth: 30, rowSpacing: 250);
            }
        }


    }
}
```
              Operations
                2011-05-13  [Fertiliser].Apply(Amount: 55, Type: Fertiliser.Types.UreaN);
                2011-05-13  [Irrigation].Apply(amount:11);
                2011-06-30  [Fertiliser].Apply(Amount: 43, Type: Fertiliser.Types.UreaN);
                2011-08-08  [Fertiliser].Apply(Amount: 90, Type: Fertiliser.Types.UreaN);
              SurfaceOrganicMatter: InitialResidueName=wheat_stubble; InitialResidueType=wheat; InitialResidueMass=500; InitialStandingFraction=0; InitialCPR=0; InitialCNR=100
              MicroClimate: a_interception=0; b_interception=1; c_interception=0; d_interception=0; SoilHeatFluxFraction=0.4; MinimumHeightDiffForNewLayer=0; NightInterceptionFraction=0.5; ReferenceHeight=2
              Report DailyReport
              Plant Barley
              Report HarvestReport: EventNames=[Barley].Harvesting
                VariableNames:
                  [Clock].Today
                  [Barley].Phenology.CurrentPhase.Name
                  [Barley].Phenology.CurrentStageName
                  [Barley].Phenology.FlagLeafDAS
                  [Barley].Phenology.FloweringDAS
                  [Barley].Phenology.MaturityDAS
                  [Barley].Grain.Wt
                  [Barley].Grain.N
                  [Barley].Grain.Number
                  [Barley].Grain.Nconc
                  [Barley].AboveGround.Wt
                  [Barley].AboveGround.N
                  [Barley].Grain.Protein
                  [Barley].Grain.Size
                  [Barley].Structure.HaunStage
                  [Barley].Structure.FinalLeafNumber
                  [Barley].Structure.MainStemPopn
                  [Barley].SowingData.Cultivar
                  [Barley].SowingDate.DayOfYear
                  [Barley].Leaf.CohortMaxSize
                  [Clock].StartDate
              Manager Harvesting
```csharp
using Models.PMF.Phen;
using System;
using Models.Core;
using System.Collections.Generic;
using System.Text;
using Models.Soils;
using Models.PMF;
using Models;
using System.Xml.Serialization;
using APSIM.Shared.Utilities;

namespace Models
{
    [Serializable] 
    public class Script : Model
    {
        [Link] private Plant Barley;
        [Link(Type = LinkType.Path, Path = "[Barley].Phenology")]
        private Phenology phenology;
        [EventSubscribe("DoManagement")]
        private void OnDoManagement(object sender, EventArgs e)
        {
            if (phenology.CurrentPhase.Name == "Ripening")
            {
                Barley.Harvest();
                Barley.EndCrop();
            }
        }
    }
}
```
              Report SowingReport: EventNames=[Barley].Sowing
                VariableNames:
                  [Clock].Today
                  [Barley].SowingData.Cultivar
        Experiment Birchip2011
          Factors: same as Validation.Australia.MCVP.Gatton2011.Factors
          Simulation Birchip2011Base
            Clock: Start=2011-05-05; End=2011-12-29
            Summary summaryfile
            Weather: FileName=Birchip2011.met
            SoilArbitrator Soil Arbitrator
            Zone Field: Area=1; Slope=0; AspectAngle=0; Altitude=50
              Irrigation
              Fertiliser
              Manager SowingRule
                TOS = 1
                Cultivar = Hartog
```csharp
using Models.Soils;
using System;
using Models.Core;
using Models.PMF;
namespace Models
{
           
    [Serializable] 
    [System.Xml.Serialization.XmlInclude(typeof(Model))]
    public class Script : Model
    {
    
        [Link] Plant Barley;
        [Link] Clock Clock;
            
        [Description("Time of Sowing")]
        public int TOS { get; set; }

        [Description("Cultivar")]
        public String Cultivar { get; set; }
        
        [EventSubscribe("DoManagement")]
        private void OnDoManagement(object sender, EventArgs e)
        {
            if (((Clock.Today.DayOfYear == 133) && (TOS == 1)) ||
                ((Clock.Today.DayOfYear == 179) && (TOS == 2)))
            {
                Barley.Sow(population: 100, cultivar: Cultivar, depth: 30, rowSpacing: 250);
            }
        }


    }
}
```
              Operations: same as Validation.Australia.MCVP.Gatton2011.Gatton2011Base.Field.Operations
              SurfaceOrganicMatter: InitialResidueName=wheat_stubble; InitialResidueType=wheat; InitialResidueMass=500; InitialStandingFraction=0; InitialCPR=0; InitialCNR=100
              MicroClimate: a_interception=0; b_interception=1; c_interception=0; d_interception=0; SoilHeatFluxFraction=0.4; MinimumHeightDiffForNewLayer=0; NightInterceptionFraction=0.5; ReferenceHeight=2
              Report DailyReport
              Soil: SoilType=Clay Loam; Site=Jil Jil; NearestTown=Jil Jil; Region=Mallee; State=Victoria; Country=Australia; ApsoilNumber=728; Latitude=-35.8822; Longitude=142.99226; LocationAccuracy=+/- 1000m; Comments=Medium SSC; GPS at paddock scale only; BCG systems trial
                DataSource=Based on Soil Characterisation undertaken by Birchip Cropping Group during 2005
                Physical
                  Thickness  BD     AirDry  LL15  DUL   SAT
                  100        1.33   0.085   0.17  0.36  0.43
                  150        1.36   0.168   0.21  0.37  0.44
                  150        1.39   0.2     0.2   0.4   0.45
                  150        1.415  0.2     0.2   0.41  0.45
                  150        1.437  0.2     0.2   0.41  0.45
                  300        1.428  0.2     0.2   0.44  0.46
                  300        1.41   0.2     0.2   0.46  0.467
                  SoilCrop BarleySoil: LL=[0.17, 0.21, 0.25, 0.26, 0.26, 0.44, 0.46]; KL=[0.07, 0.07, 0.07, 0.07, 0.05, 0.05, 0.03]; XF=[1, 0.5, 0.3, 0.2, 0.2, 0, 0]
                WaterBalance SoilWater: SummerDate=1-Nov; SummerU=6; SummerCona=3.5; WinterDate=1-Apr; WinterU=2; WinterCona=2; DiffusConst=40; DiffusSlope=16; Salb=0.13; CN2Bare=73; CNRed=20; CNCov=0.8; PSIDul=-100; Thickness=[100, 150, 150, 150, 150, 300, 300]; SWCON=[0.4, 0.4, 0.3, 0.3, 0.3, 0.3, 0.3]
                SoilNitrogen: fom_types=[default, manure, mucuna, lablab, shemp, stable]; fract_carb=[0.2, 0.3, 0.54, 0.57, 0.45, 0]; fract_cell=[0.7, 0.3, 0.37, 0.37, 0.47, 0.1]; fract_lign=[0.1, 0.4, 0.09, 0.06, 0.08, 0.9]; NPartitionApproach=0
                Organic: FOMCNRatio=40; CarbonUnits=Total
                  Thickness  Carbon  SoilCNRatio  FBiom  FInert  FOM
                  100        1.3     12           0.05   0.3     333.304
                  150        1       12           0.02   0.5     235.78
                  150        0.3     12           0.02   0.5     166.792
                  150        0.2     12           0.02   0.8     117.989
                  150        0.05    12           0.01   0.6     83.4659
                  300        0.01    12           0.01   0.7     41.768
                  300        0.01    12           0.01   0.8     20.9015
                Chemical: Thickness=[100, 150, 150, 150, 150, 300, 300]; PH=[8.6, 9.4, 9.6, 9.7, 9.7, 9.7, 9.3]; PHUnits=Water
                Water: Thickness=[100, 150, 150, 150, 150, 300, 300]; InitialValues=[0.36, 0.37, 0.4, 0.41, 0.41, 0.44, 0.46]; InitialPAWmm=286; RelativeTo=LL15; FilledFromTop=true
                CERESSoilTemperature Temperature
                SoilNitrogenNO3 NO3: Thickness=[100, 150, 150, 150, 150, 300, 300]; InitialValues=[1, 1, 1, 1, 1, 1, 1]; InitialValuesUnits=ppm; WaterTableConcentration=0; D0=0; DepthConstant=0; MaxDepthSoluteAccessible=0; RunoffEffectivenessAtMovingSolute=0; MaxEffectiveRunoff=0
                SoilNitrogenNH4 NH4: Thickness=[100, 150, 150, 150, 150, 300, 300]; InitialValues=[0, 0, 0, 0, 0, 0, 0]; InitialValuesUnits=ppm; WaterTableConcentration=0; D0=0; DepthConstant=0; MaxDepthSoluteAccessible=0; RunoffEffectivenessAtMovingSolute=0; MaxEffectiveRunoff=0
                SoilNitrogenUrea Urea: Thickness=[100, 150, 150, 150, 150, 300, 300]; InitialValues=[0, 0, 0, 0, 0, 0, 0]; InitialValuesUnits=kg/ha; WaterTableConcentration=0; D0=0; DepthConstant=0; MaxDepthSoluteAccessible=0; RunoffEffectivenessAtMovingSolute=0; MaxEffectiveRunoff=0
              Plant Barley
              Report HarvestReport: same as Validation.Australia.MCVP.Gatton2011.Gatton2011Base.Field.HarvestReport
              Manager Harvesting: same as Validation.Australia.MCVP.Gatton2011.Gatton2011Base.Field.Harvesting
              Report SowingReport: EventNames=[Barley].Sowing
                VariableNames:
                  [Clock].Today
                  [Barley].SowingData.Cultivar
        Experiment Tarlee2011
          Factors: same as Validation.Australia.MCVP.Gatton2011.Factors
          Simulation Tarlee2011Base
            Clock: Start=2011-05-05; End=2011-12-28
            Summary summaryfile
            Weather: FileName=Tarlee2011.met
            SoilArbitrator Soil Arbitrator
            Zone Field: Area=1; Slope=0; AspectAngle=0; Altitude=50
              Irrigation
              Fertiliser
              Manager SowingRule
                TOS = 1
                Cultivar = Hartog
```csharp
using Models.Soils;
using System;
using Models.Core;
using Models.PMF;
namespace Models
{
           
    [Serializable] 
    [System.Xml.Serialization.XmlInclude(typeof(Model))]
    public class Script : Model
    {
    
        [Link] Plant Barley;
        [Link] Clock Clock;
            
        [Description("Time of Sowing")]
        public int TOS { get; set; }

        [Description("Cultivar")]
        public String Cultivar { get; set; }
        
        [EventSubscribe("DoManagement")]
        private void OnDoManagement(object sender, EventArgs e)
        {
            if (((Clock.Today.DayOfYear == 140) && (TOS == 1)) ||
                ((Clock.Today.DayOfYear == 196) && (TOS == 2)))
            {
                Barley.Sow(population: 100, cultivar: Cultivar, depth: 30, rowSpacing: 250);
            }
        }


    }
}
```
              Operations: same as Validation.Australia.MCVP.Gatton2011.Gatton2011Base.Field.Operations
              SurfaceOrganicMatter: InitialResidueName=wheat_stubble; InitialResidueType=wheat; InitialResidueMass=500; InitialStandingFraction=0; InitialCPR=0; InitialCNR=100
              MicroClimate: a_interception=0; b_interception=1; c_interception=0; d_interception=0; SoilHeatFluxFraction=0.4; MinimumHeightDiffForNewLayer=0; NightInterceptionFraction=0.5; ReferenceHeight=2
              Report DailyReport
              Soil: SoilType=Sandy Loam; Site=Tarlee; NearestTown=Tarlee; Region=Mid North; State=South Australia; Country=Australia; ApsoilNumber=610; Latitude=-34.276; Longitude=138.759; LocationAccuracy=+/- 20m
                DataSource=Characterisation 2008 by University of Adelaide, CSIRO Sustainable Ecosystems and Allan Mayfield Consulting, Clare, SA
                Comments=LB Code:TAR; Strongly duplex low-moderate clay soil. Surface CEC low, moderate below. Texture change at about 7cm. Little chemical impediment to root growth, but high ESP below about 60cm may result in slaking or dispersion and high bulk density. DM Descr
                Physical
                  Thickness  BD    AirDry  LL15   DUL    SAT
                  100        1.54  0.055   0.11   0.223  0.389
                  200        1.41  0.167   0.209  0.388  0.438
                  300        1.53  0.22    0.22   0.342  0.393
                  300        1.57  0.22    0.22   0.293  0.378
                  350        1.6   0.22    0.22   0.264  0.366
                  SoilCrop BarleySoil: LL=[0.11, 0.209, 0.24, 0.225, 0.222]; KL=[0.06, 0.06, 0.06, 0.04, 0.04]; XF=[1, 1, 1, 1, 1]
                WaterBalance SoilWater: SummerDate=1-Nov; SummerU=6; SummerCona=3.5; WinterDate=1-Apr; WinterU=2; WinterCona=2; DiffusConst=88; DiffusSlope=35; Salb=0.13; CN2Bare=73; CNRed=20; CNCov=0.8; PSIDul=-100; Thickness=[100, 200, 300, 300, 350]; SWCON=[0.5, 0.5, 0.5, 0.5, 0.5]
                SoilNitrogen: fom_types=[default, manure, mucuna, lablab, shemp, stable]; fract_carb=[0.2, 0.3, 0.54, 0.57, 0.45, 0]; fract_cell=[0.7, 0.3, 0.37, 0.37, 0.47, 0.1]; fract_lign=[0.1, 0.4, 0.09, 0.06, 0.08, 0.9]; NPartitionApproach=0
                Organic: FOMCNRatio=40; CarbonUnits=Total
                  Thickness  Carbon  SoilCNRatio  FBiom  FInert  FOM
                  100        1.16    12           0.04   0.4     469.511
                  200        0.75    12           0.02   0.5     290.526
                  300        0.36    12           0.02   0.7     141.414
                  300        0.12    12           0.02   1       68.8336
                  350        0.12    12           0.01   1       29.7162
                Chemical: Thickness=[100, 200, 300, 300, 350]; PH=[7, 7.9, 8.9, 9.2, 9.2]; PHUnits=Water
                Water: Thickness=[100, 200, 300, 300, 350]; InitialValues=[0.223, 0.388, 0.342, 0.293, 0.264]; InitialPAWmm=121; RelativeTo=LL15; FilledFromTop=true
                CERESSoilTemperature Temperature
                SoilNitrogenNO3 NO3: Thickness=[100, 200, 300, 300, 350]; InitialValues=[0, 1, 1, 1, 1]; InitialValuesUnits=ppm; WaterTableConcentration=0; D0=0; DepthConstant=0; MaxDepthSoluteAccessible=0; RunoffEffectivenessAtMovingSolute=0; MaxEffectiveRunoff=0
                SoilNitrogenNH4 NH4: Thickness=[100, 200, 300, 300, 350]; InitialValues=[0, 0.2, 0.2, 0.2, 0.2]; InitialValuesUnits=ppm; WaterTableConcentration=0; D0=0; DepthConstant=0; MaxDepthSoluteAccessible=0; RunoffEffectivenessAtMovingSolute=0; MaxEffectiveRunoff=0
                SoilNitrogenUrea Urea: Thickness=[100, 200, 300, 300, 350]; InitialValues=[0, 0, 0, 0, 0]; InitialValuesUnits=kg/ha; WaterTableConcentration=0; D0=0; DepthConstant=0; MaxDepthSoluteAccessible=0; RunoffEffectivenessAtMovingSolute=0; MaxEffectiveRunoff=0
              Plant Barley
              Report HarvestReport: same as Validation.Australia.MCVP.Gatton2011.Gatton2011Base.Field.HarvestReport
              Manager Harvesting: same as Validation.Australia.MCVP.Gatton2011.Gatton2011Base.Field.Harvesting
              Report SowingReport: EventNames=[Barley].Sowing
                VariableNames:
                  [Clock].Today
                  [Barley].SowingData.Cultivar
      Folder HermitageRS
        Memo
          This rain-out shelter experiment was undertaken at the Hermitage Research Station near Warwick, Queensland.  Treatments included 3 irrigation experiments to provide combinations of early and later water stress.  The experiment was described by [Goyne1996].
        Experiment HermitageRS
          Factors
            Factor Irr: Specification=[IrrigationSchedule]
              Operations DD
                1991-07-07  [Irrigation].Apply(22)
                1991-07-10  [Irrigation].Apply(10)
              Operations DI
                1991-07-07  [Irrigation].Apply(22)
                1991-07-10  [Irrigation].Apply(10)
                1991-09-19  [Irrigation].Apply(96)
                1991-10-01  [Irrigation].Apply(62)
                1991-10-10  [Irrigation].Apply(48)
                1991-10-19  [Irrigation].Apply(63)
                1991-10-30  [Irrigation].Apply(135)
                1991-11-08  [Irrigation].Apply(40)
                1991-11-21  [Irrigation].Apply(32)
              Operations II
                1991-07-07  [Irrigation].Apply(22)
                1991-07-10  [Irrigation].Apply(10)
                1991-08-08  [Irrigation].Apply(19)
                1991-08-12  [Irrigation].Apply(56)
                1991-08-26  [Irrigation].Apply(40)
                1991-09-09  [Irrigation].Apply(50)
                1991-09-19  [Irrigation].Apply(50)
                1991-10-01  [Irrigation].Apply(54)
                1991-10-10  [Irrigation].Apply(35)
                1991-10-18  [Irrigation].Apply(1)
                1991-10-19  [Irrigation].Apply(60)
                1991-10-30  [Irrigation].Apply(60)
                1991-11-08  [Irrigation].Apply(37)
          Simulation HermitageRSBase
            Clock: Start=1991-06-24; End=1991-11-25
            Summary summaryfile
            Weather: FileName=HRSRO1991.met
            SoilArbitrator Soil Arbitrator
            Zone paddock: Area=1; Slope=0; AspectAngle=0; Altitude=50
              Soil: SoilType=HMM92; Site=HRS; NearestTown=Unknown; Region=Warwick; NaturalVegetation=Unknown; Latitude=0; Longitude=0
                Physical
                  Thickness  BD    AirDry  LL15  DUL   SAT
                  100        0.93  0.16    0.2   0.46  0.48
                  100        0.97  0.19    0.26  0.46  0.48
                  200        1     0.23    0.28  0.46  0.48
                  200        1.01  0.3     0.3   0.45  0.48
                  200        1.03  0.32    0.32  0.41  0.45
                  200        1.06  0.33    0.33  0.37  0.41
                  200        1.11  0.27    0.27  0.34  0.38
                  200        1.15  0.28    0.28  0.33  0.37
                  200        1.2   0.26    0.26  0.32  0.37
                  200        1.25  0.18    0.18  0.33  0.37
                  SoilCrop BarleySoil
                    LL=[0.2, 0.26, 0.28, 0.3, 0.32, 0.33, 0.27, 0.28, 0.26, 0.18]
                    KL=[0.05, 0.03, 0.08, 0.08, 0.05, 0.05, 0.07, 0.07, 0.05, 0.05]
                    XF=[1, 1, 1, 1, 1, 1, 1, 1, 1, 1]
                WaterBalance SoilWater: SummerDate=1-Sep; SummerU=6; SummerCona=2.5; WinterDate=1-Apr; WinterU=6; WinterCona=2.5; DiffusConst=20; DiffusSlope=10; Salb=0.2; CN2Bare=75; CNRed=20; CNCov=0.8; PSIDul=-100; Thickness=[100, 100, 200, 200, 200, 200, 200, 200, 200, 200]; SWCON=[0.3, 0.3, 0.3, 0.3, 0.3, 0.3, 0.3, 0.3, 0.3, 0.3]
                SoilNitrogen: fom_types=[default, manure, mucuna, lablab, shemp, stable]; fract_carb=[0.2, 0.3, 0.54, 0.57, 0.45, 0]; fract_cell=[0.7, 0.3, 0.37, 0.37, 0.47, 0.1]; fract_lign=[0.1, 0.4, 0.09, 0.06, 0.08, 0.9]; NPartitionApproach=0
                Organic: FOMCNRatio=50; CarbonUnits=Total
                  Thickness  Carbon  SoilCNRatio  FBiom  FInert  FOM
                  100        1.19    12.5         0.05   0.45    260.587
                  100        0.59    12.5         0.02   0.6     220.582
                  200        0.45    12.5         0.01   0.75    158.054
                  200        0.3     12.5         0.01   0.9     113.251
                  200        0.2     12.5         0.01   0.9     81.1478
                  200        0.16    12.5         0.01   0.9     58.1449
                  200        0.17    12.5         0.01   0.9     41.6626
                  200        0.17    12.5         0.05   0.9     29.8526
                  200        0.17    12.5         0.02   0.9     21.3903
                  200        0.17    12.5         0.01   0.9     15.3268
                Chemical: Thickness=[100, 100, 200, 200, 200, 200, 200, 200, 200, 200]; PH=[6.3, 6.4, 6.5, 6.6, 6.6, 6.5, 6.5, 6.5, 6.5, 6.5]; PHUnits=Water
                Water: Thickness=[100, 100, 200, 200, 200, 200, 200, 200, 200, 200]; InitialPAWmm=148.3; RelativeTo=LL15; FilledFromTop=false
                  InitialValues=[0.32, 0.405, 0.44, 0.45, 0.41, 0.37, 0.339, 0.31, 0.28, 0.23]
                CERESSoilTemperature Temperature
                SoilNitrogenNO3 NO3: Thickness=[100, 100, 200, 200, 200, 200, 200, 200, 200, 200]; InitialValuesUnits=ppm; WaterTableConcentration=0; D0=0; DepthConstant=0; MaxDepthSoluteAccessible=0; RunoffEffectivenessAtMovingSolute=0; MaxEffectiveRunoff=0
                  InitialValues=[1.717, 1.717, 0.687, 0.343, 0.343, 0.343, 0.343, 0.343, 0.343, 0.343]
                SoilNitrogenNH4 NH4: Thickness=[100, 100, 200, 200, 200, 200, 200, 200, 200, 200]; InitialValuesUnits=ppm; WaterTableConcentration=0; D0=0; DepthConstant=0; MaxDepthSoluteAccessible=0; RunoffEffectivenessAtMovingSolute=0; MaxEffectiveRunoff=0
                  InitialValues=[0.745, 0.124, 0.124, 0.124, 0.124, 0.124, 0.124, 0.124, 0.124, 0.124]
                SoilNitrogenUrea Urea: Thickness=[100, 100, 200, 200, 200, 200, 200, 200, 200, 200]; InitialValues=[0, 0, 0, 0, 0, 0, 0, 0, 0, 0]; InitialValuesUnits=kg/ha; WaterTableConcentration=0; D0=0; DepthConstant=0; MaxDepthSoluteAccessible=0; RunoffEffectivenessAtMovingSolute=0; MaxEffectiveRunoff=0
              Plant Barley
              SurfaceOrganicMatter: InitialResidueName=Barley_stubble; InitialResidueType=Barley; InitialResidueMass=0; InitialStandingFraction=0; InitialCPR=0; InitialCNR=80
              MicroClimate: a_interception=0; b_interception=1; c_interception=0; d_interception=0; SoilHeatFluxFraction=0.4; MinimumHeightDiffForNewLayer=0; NightInterceptionFraction=0.5; ReferenceHeight=2
              Folder Management
                Manager Sow_n_Harvest
                  SowingDate = 1991-06-30
                  Cultivar = Grimmett
```csharp
using Models.Soils;
using Models.PMF.Phen;
using System;
using Models.Core;
using Models.PMF;
using APSIM.Shared.Utilities;
using System.Xml.Serialization;
using Newtonsoft.Json;
        
namespace Models
{
    [Serializable] 
    [System.Xml.Serialization.XmlInclude(typeof(Model))]
    public class Script : Model
    {
        [Link] private Plant Barley;
        [Link] private Clock Clock;
        [Link] private Simulation sim;
        [Link] private Summary Summary;
        [Link(Type = LinkType.Path, Path = "[Barley].Phenology")]
        private Phenology phenology;
        
        [Description("Sowing Date")]
        public DateTime SowingDate { get; set; }
        [Description("Cultivar")]
        public string Cultivar { get; set; }
        
        
        [JsonIgnore] public bool Harvested { get; set; }
        [JsonIgnore] public bool EndSet { get; set; }
        
        [EventSubscribe("StartOfSimulation")]
        private void OnSimulationCommencing(object sender, EventArgs e)
        {
            Harvested = false;
            EndSet = false;
        }
        
        [EventSubscribe("DoManagement")]
        private void OnDoManagement(object sender, EventArgs e)
        {
            if (Clock.Today.Date == SowingDate)
            {
                Barley.Sow(population: 90, cultivar: Cultivar, depth: 40, rowSpacing: 500, budNumber: 1);
                
            }
            
            if (phenology.CurrentPhase.Name == "ReadyForHarvesting")
            {
                Barley.Harvest();
                Barley.EndCrop();
                Harvested = true;
                Summary.WriteMessage(this, "Flowering reached so setting end date to stop simulation", MessageType.Diagnostic);
            }
            
            if ((Harvested == true) && (EndSet == false))
            {
                sim.Set("Clock.EndDate", Clock.Today.AddDays(1));
                EndSet = true;
            }
        }
    }
}
```
                Manager ApplyN_at_sowing: same as Validation.NewZealand.CPT.CPT.Boss.Paddock.ApplyN_at_sowing
                Operations IrrigationSchedule
              Report DailyReport: same as Validation.NewZealand.MCPD09_10.Ablock.Paddock.DailyReport
              Report HarvestReport: EventNames=[Clock].EndOfSimulation
                VariableNames:
                  [Barley].Structure.LeafTipsAppeared
                  [Barley].Structure.FinalLeafNumber
                  [Barley].Phenology.FlagLeafDAS
                  [Barley].Phenology.FloweringDAS
                  [Barley].Phenology.MaturityDAS
                  [Script].CalcVals.SowMonth
              Irrigation
              Fertiliser
              Report SowingReport: EventNames=[Barley].Sowing
                VariableNames:
                  [Clock].Today
                  [Barley].SowingData.Cultivar
            Manager DAS: same as Validation.NewZealand.MCPD09_10.Ablock.Paddock.DAS
      Folder Wellcamp
        Memo
          This experiment provides information on biomass accumulation, canopy development and final yield for Barley sown on the eastern Darling Downs.  The experiment is explained in [Goyne1996].
        Experiment Wellcamp
          Factors
            Factor 1993: Specification=[Operations]
              Operations
                1993-06-29  [Barley].Sow(population: 90, cultivar: Grimmett, depth: 30, rowSpacing: 500, budNumber: 1);
                1993-06-29  [Fertiliser].Apply(100, Fertiliser.Types.NO3N, 50);
                1993-12-20  [Barley].Harvest();
                1993-12-20  [Barley].EndCrop();
          Simulation WellcampBase
            Clock: Start=1993-06-29; End=1993-12-21
            Summary summaryfile
            Weather: FileName=Well360.met
            SoilArbitrator Soil Arbitrator
            Zone paddock: Area=1; Slope=0; AspectAngle=0; Altitude=50
              Soil: SoilType=Wellcamp93; Site=Wellcamp; NearestTown=Unknown; Region=Jondaryan; NaturalVegetation=Unknown; Latitude=0; Longitude=0
                Physical
                  Thickness  BD    AirDry  LL15  DUL   SAT
                  150        0.9   0.11    0.22  0.52  0.59
                  150        1.01  0.306   0.34  0.53  0.59
                  300        1.02  0.38    0.38  0.54  0.59
                  300        1     0.36    0.36  0.54  0.59
                  300        1.06  0.4     0.4   0.52  0.57
                  300        1.14  0.36    0.36  0.49  0.54
                  300        1.23  0.38    0.38  0.46  0.51
                  SoilCrop BarleySoil: LL=[0.22, 0.34, 0.38, 0.36, 0.4, 0.36, 0.38]; KL=[0.9, 0.9, 0.9, 0.8, 0.7, 0.6, 0.5]; XF=[1, 1, 1, 1, 1, 1, 1]
                WaterBalance SoilWater: SummerDate=1-Nov; SummerU=6; SummerCona=3.5; WinterDate=1-Apr; WinterU=6; WinterCona=3.5; DiffusConst=88; DiffusSlope=35.4; Salb=0.13; CN2Bare=60; CNRed=20; CNCov=0.8; PSIDul=-100; Thickness=[150, 150, 300, 300, 300, 300, 300]; SWCON=[0.4, 0.4, 0.4, 0.4, 0.4, 0.4, 0.4]
                SoilNitrogen: fom_types=[default, manure, mucuna, lablab, shemp, stable]; fract_carb=[0.2, 0.3, 0.54, 0.57, 0.45, 0]; fract_cell=[0.7, 0.3, 0.37, 0.37, 0.47, 0.1]; fract_lign=[0.1, 0.4, 0.09, 0.06, 0.08, 0.9]; NPartitionApproach=0
                Organic: FOMCNRatio=40; CarbonUnits=Total
                  Thickness  Carbon  SoilCNRatio  FBiom  FInert  FOM
                  150        1       12.5         0.03   0.4     69.4258
                  150        0.9     12.5         0.03   0.4     54.0689
                  300        0.8     12.5         0.02   0.6     32.7944
                  300        0.8     12.5         0.02   0.6     19.8908
                  300        0.4     12.5         0.01   0.8     12.0644
                  300        0.3     12.5         0.01   0.9     7.31743
                  300        0.3     12.5         0.01   0.95    4.43824
                Chemical: Thickness=[150, 150, 300, 300, 300, 300, 300]; PH=[7, 7, 8.5, 8.5, 8.5, 8.5, 8.5]; PHUnits=Water
                Water: Thickness=[150, 150, 300, 300, 300, 300, 300]; InitialValues=[0.52, 0.53, 0.53, 0.48, 0.48, 0.48, 0.48]; InitialPAWmm=244.5; RelativeTo=LL15; FilledFromTop=false
                CERESSoilTemperature Temperature
                SoilNitrogenNO3 NO3: Thickness=[150, 150, 300, 300, 300, 300, 300]; InitialValues=[10.582, 9.43, 4.669, 4.45, 4.141, 3.58, 3.527]; InitialValuesUnits=ppm; WaterTableConcentration=0; D0=0; DepthConstant=0; MaxDepthSoluteAccessible=0; RunoffEffectivenessAtMovingSolute=0; MaxEffectiveRunoff=0
                SoilNitrogenNH4 NH4: Thickness=[150, 150, 300, 300, 300, 300, 300]; InitialValues=[0.317, 0.283, 0.14, 0.134, 0.124, 0.107, 0.106]; InitialValuesUnits=ppm; WaterTableConcentration=0; D0=0; DepthConstant=0; MaxDepthSoluteAccessible=0; RunoffEffectivenessAtMovingSolute=0; MaxEffectiveRunoff=0
                SoilNitrogenUrea Urea: same as Validation.Australia.MCVP.Gatton2011.Gatton2011Base.Field.APS6Field.Urea
              Plant Barley
              SurfaceOrganicMatter: InitialResidueName=Barley_stubble; InitialResidueType=Barley; InitialResidueMass=0; InitialStandingFraction=0; InitialCPR=0; InitialCNR=80
              MicroClimate: a_interception=0; b_interception=1; c_interception=0; d_interception=0; SoilHeatFluxFraction=0.4; MinimumHeightDiffForNewLayer=0; NightInterceptionFraction=0.5; ReferenceHeight=2
              Folder Management
                Operations
                  1993-06-29  [Barley].Sow(population: 106, cultivar: Grimmett, depth: 30, rowSpacing: 500, budNumber: 1);
                  1993-06-29  [Fertiliser].Apply(100, Fertiliser.Types.NO3N, 50);
                  1993-12-20  [Barley].Harvest();
                  1993-12-20  [Barley].EndCrop();
                Manager Auto_Irrigation: same as Validation.NewZealand.CPT.CPT.Boss.Paddock.Auto_Irrigation
              Report DailyReport: same as Validation.NewZealand.MCPD09_10.Ablock.Paddock.DailyReport
              Report HarvestReport: EventNames=[Clock].EndOfSimulation
                VariableNames:
                  [Barley].Structure.LeafTipsAppeared
                  [Barley].Structure.FinalLeafNumber
                  [Barley].Phenology.FlagLeafDAS
                  [Barley].Phenology.FloweringDAS
                  [Barley].Phenology.MaturityDAS
                  [Script].CalcVals.SowMonth
              Irrigation
              Fertiliser
              Report SowingReport: EventNames=[Barley].Sowing
                VariableNames:
                  [Clock].Today
                  [Barley].SowingData.Cultivar
            Manager DAS: same as Validation.NewZealand.MCPD09_10.Ablock.Paddock.DAS
      Folder Hermitage1990
        Memo
          This experiment was conducted at Hermitage Research Station near Warwick, Queensland.  Three sowing dates were used to study changes in phenology, biomass accumulation and canopy development.  The experiment is explained in [Goyne1993].
        Experiment Hermitage1990
          Factors
            Factor TOS: Specification=[SowingRule].Script.SowDate = 26-apr, 5-jun, 7-aug
          Simulation Hermitage1990Base
            Clock: Start=1990-04-26; End=1990-12-03
            Weather: FileName=Hermitage1990.met
            Summary summaryfile
            SoilArbitrator Soil Arbitrator
            Manager DAS: same as Validation.NewZealand.MCPD09_10.Ablock.Paddock.DAS
            Zone paddock: Area=1; Slope=0; AspectAngle=0; Altitude=50
              Soil: SoilType=HMM90; Site=HRS; NearestTown=Unknown; Region=Warwick; NaturalVegetation=Unknown; Latitude=0; Longitude=0
                Physical
                  Thickness  BD    AirDry  LL15  DUL   SAT
                  100        0.93  0.08    0.2   0.42  0.45
                  100        0.97  0.19    0.2   0.42  0.45
                  200        1     0.23    0.23  0.46  0.48
                  200        1.01  0.26    0.26  0.46  0.48
                  200        1.03  0.26    0.26  0.43  0.45
                  200        1.06  0.28    0.28  0.4   0.41
                  200        1.11  0.25    0.25  0.37  0.38
                  200        1.15  0.28    0.28  0.33  0.37
                  200        1.2   0.3     0.3   0.32  0.37
                  200        1.25  0.31    0.31  0.33  0.37
                  SoilCrop BarleySoil
                    LL=[0.2, 0.2, 0.23, 0.26, 0.26, 0.28, 0.25, 0.28, 0.3, 0.31]
                    KL=[0.09, 0.09, 0.09, 0.09, 0.08, 0.07, 0.06, 0.05, 0.05, 0.04]
                    XF=[1, 1, 1, 1, 1, 1, 1, 1, 1, 1]
                WaterBalance SoilWater: SummerDate=1-Nov; SummerU=2; SummerCona=6.5; WinterDate=1-Apr; WinterU=2; WinterCona=6.5; DiffusConst=88; DiffusSlope=35; Salb=0.2; CN2Bare=85; CNRed=20; CNCov=0.8; PSIDul=-100; Thickness=[100, 100, 200, 200, 200, 200, 200, 200, 200, 200]; SWCON=[0.3, 0.3, 0.3, 0.3, 0.3, 0.3, 0.3, 0.3, 0.3, 0.3]
                SoilNitrogen: fom_types=[default, manure, mucuna, lablab, shemp, stable]; fract_carb=[0.2, 0.3, 0.54, 0.57, 0.45, 0]; fract_cell=[0.7, 0.3, 0.37, 0.37, 0.47, 0.1]; fract_lign=[0.1, 0.4, 0.09, 0.06, 0.08, 0.9]; NPartitionApproach=0
                Organic: same as Validation.Australia.HermitageRS.HermitageRS.HermitageRSBase.paddock.Soil.Organic
                Chemical: Thickness=[100, 100, 200, 200, 200, 200, 200, 200, 200, 200]; PH=[6.3, 6.4, 6.5, 6.6, 6.6, 6.5, 6.5, 6.5, 6.5, 6.5]; PHUnits=Water
                Water: Thickness=[100, 100, 200, 200, 200, 200, 200, 200, 200, 200]; InitialValues=[0.42, 0.42, 0.46, 0.46, 0.43, 0.4, 0.37, 0.33, 0.32, 0.33]; InitialPAWmm=230; RelativeTo=LL15; FilledFromTop=false
                CERESSoilTemperature Temperature
                SoilNitrogenNO3 NO3: Thickness=[100, 100, 200, 200, 200, 200, 200, 200, 200, 200]; InitialValuesUnits=ppm; WaterTableConcentration=0; D0=0; DepthConstant=0; MaxDepthSoluteAccessible=0; RunoffEffectivenessAtMovingSolute=0; MaxEffectiveRunoff=0
                  InitialValues=[4.293, 4.293, 1.717, 0.859, 0.859, 0.859, 0.859, 0.859, 0.859, 0.859]
                SoilNitrogenNH4 NH4: Thickness=[100, 100, 200, 200, 200, 200, 200, 200, 200, 200]; InitialValuesUnits=ppm; WaterTableConcentration=0; D0=0; DepthConstant=0; MaxDepthSoluteAccessible=0; RunoffEffectivenessAtMovingSolute=0; MaxEffectiveRunoff=0
                  InitialValues=[0.596, 0.099, 0.099, 0.099, 0.099, 0.099, 0.099, 0.099, 0.099, 0.099]
                SoilNitrogenUrea Urea: same as Validation.Australia.HermitageRS.HermitageRS.HermitageRSBase.paddock.Soil.Urea
              Folder Management
                Manager ApplyN_at_sowing
```csharp
using Newtonsoft.Json;
using System;
using Models.Core;
using System.Collections.Generic;
using System.Text;
using Models.Soils;
using Models.PMF;
using Models;
using System.Xml.Serialization;
using APSIM.Shared.Utilities;

namespace Models
{
    [Serializable] 
    public class Script : Model
    {
        [Link] Clock Clock;
        [Link] Fertiliser Fertiliser;
        [Link] Irrigation Irrig;
        [Link] Simulation Simulation;
        
                    
        [JsonIgnore] public bool InitialDay { get; set; }
        //[JsonIgnore] public double FertN { get; set; }
        
        [EventSubscribe("StartOfSimulation")]
        private void OnSimulationCommencing(object sender, EventArgs e)
        {
            InitialDay = true;
        }
        
        [EventSubscribe("DoManagement")]
        private void OnDoManagement(object sender, EventArgs e)
        {
            double DAS = (double)Simulation.FindByPath("DAS.Script.DAS").Value;
            if (DAS == 1)
                Fertiliser.Apply(130, Fertiliser.Types.NO3N, 50);
        }
    }
    
}
```
                Manager SowingRule
                  SowDate =
                  CultivarName = Grimmett
                  SowingDepth = 30
                  RowSpacing = 250
                  Population = 120
```csharp
using APSIM.Shared.Utilities;
using Models.Utilities;
using Models.Soils;
using Models.PMF;
using Models.Core;
using System;

namespace Models
{
    [Serializable]
    public class Script : Model
    {
        [Link] Clock Clock;
        [Link] Fertiliser Fertiliser;
        [Link] Summary Summary;
        [Link] Plant Barley;
        [Link] Soil Soil; 

        [Description("Sowing Date (d-mmm)")]
        public string SowDate { get; set;}
        [Description("Cultivar to be sown")]
        public string CultivarName { get; set;}
        [Description("Sowing depth (mm)")]
        public double SowingDepth { get; set;}        
        [Description("Row spacing (mm)")]
        public double RowSpacing { get; set;}    
        [Description("Plant population (/m2)")]
        public double Population { get; set;}    
        
        
        [EventSubscribe("DoManagement")]
        private void OnDoManagement(object sender, EventArgs e)
        {
            if (DateUtilities.WithinDates(SowDate,Clock.Today,SowDate))
               Barley.Sow(population:Population, cultivar:CultivarName, depth:SowingDepth, rowSpacing:RowSpacing);    
        }
        
    }
}
```
                Manager Harvesting: same as Validation.Australia.MCVP.Gatton2011.Gatton2011Base.Field.Harvesting
                Manager Auto_Irrigation: same as Validation.NewZealand.CPT.CPT.Boss.Paddock.Auto_Irrigation
              Plant Barley
              SurfaceOrganicMatter: InitialResidueName=Barley_stubble; InitialResidueType=Barley; InitialResidueMass=0; InitialStandingFraction=0; InitialCPR=0; InitialCNR=80
              MicroClimate: a_interception=0; b_interception=1; c_interception=0; d_interception=0; SoilHeatFluxFraction=0.4; MinimumHeightDiffForNewLayer=0; NightInterceptionFraction=0.5; ReferenceHeight=2
              Irrigation
              Fertiliser
              Report DailyReport: same as Validation.NewZealand.MCPD09_10.Ablock.Paddock.DailyReport
              Report HarvestReport: EventNames=[Clock].EndOfSimulation
                VariableNames:
                  [Barley].Structure.LeafTipsAppeared
                  [Barley].Structure.FinalLeafNumber
                  [Barley].Phenology.FlagLeafDAS
                  [Barley].Phenology.FloweringDAS
                  [Barley].Phenology.MaturityDAS
                  [Script].CalcVals.SowMonth
              Report SowingReport: EventNames=[Barley].Sowing
                VariableNames:
                  [Clock].Today
                  [Barley].SowingData.Cultivar
      Folder Roma1988
        Memo
          This sowing date x plant population experiment was undertaken near Roma, Queensland.  Measurements include biomass accumulation, leaf area development and final grain yield.  The experiment is explained in [Goyne1996].
        Experiment Roma1988
          Memo
            NOTE: Sowing was 12-Mar but simulations are sown on 30 March to capture delayed germination until following rainfall event
          Factors
            Permutation
              Factor Sow: Specification=[SowingRule].Script.TOS = 2, 3, 4
              Factor Pop: Specification=[SowingRule].Script.Population = 36, 62, 160
          Simulation Roma1988Base
            Clock: Start=1988-03-12; End=1988-10-19
            Summary summaryfile
            Weather: FileName=Roma1988.met
            SoilArbitrator Soil Arbitrator
            Zone paddock: Area=1; Slope=0; AspectAngle=0; Altitude=50
              Soil Bay 0: SoilType=R88; Site=Roma; NearestTown=Unknown; Region=Roma; NaturalVegetation=Unknown; Latitude=0; Longitude=0
                Physical
                  Thickness  BD    AirDry  LL15  DUL   SAT
                  100        1.3   0.1     0.13  0.38  0.41
                  100        1.3   0.15    0.19  0.41  0.46
                  100        1.29  0.19    0.19  0.41  0.46
                  100        1.31  0.22    0.22  0.43  0.48
                  100        1.35  0.25    0.25  0.42  0.47
                  100        1.36  0.25    0.25  0.42  0.47
                  200        1.36  0.28    0.28  0.41  0.46
                  200        1.35  0.28    0.28  0.4   0.45
                  400        1.36  0.26    0.26  0.36  0.41
                  200        1.36  0.25    0.25  0.34  0.39
                  SoilCrop BarleySoil
                    LL=[0.13, 0.19, 0.19, 0.22, 0.25, 0.25, 0.28, 0.28, 0.26, 0.25]
                    KL=[0.09, 0.09, 0.09, 0.09, 0.08, 0.08, 0.07, 0.06, 0.03, 0.01]
                    XF=[1, 1, 1, 1, 1, 1, 1, 1, 1, 1]
                WaterBalance SoilWater: SummerDate=1-Nov; SummerU=6; SummerCona=3.5; WinterDate=1-Apr; WinterU=6; WinterCona=3.5; DiffusConst=88; DiffusSlope=35.4; Salb=0.13; CN2Bare=73; CNRed=20; CNCov=0.8; PSIDul=-100; Thickness=[100, 100, 100, 100, 100, 100, 200, 200, 400, 200]; SWCON=[0.1, 0.1, 0.1, 0.1, 0.1, 0.1, 0.1, 0.1, 0.1, 0.1]
                SoilNitrogen: fom_types=[default, manure, mucuna, lablab, shemp, stable]; fract_carb=[0.2, 0.3, 0.54, 0.57, 0.45, 0]; fract_cell=[0.7, 0.3, 0.37, 0.37, 0.47, 0.1]; fract_lign=[0.1, 0.4, 0.09, 0.06, 0.08, 0.9]; NPartitionApproach=0
                Organic: FOMCNRatio=40; CarbonUnits=Total
                  Thickness  Carbon  SoilCNRatio  FBiom  FInert  FOM
                  100        1.03    14.5         0.05   0.39    1.31821
                  100        0.86    14.5         0.02   0.47    1.09283
                  100        0.77    14.5         0.01   0.52    0.90599
                  100        0.65    14.5         0.01   0.62    0.751092
                  100        0.54    14.5         0.01   0.74    0.622677
                  100        0.48    14.5         0.01   0.83    0.516218
                  200        0.43    14.5         0.01   0.93    0.354791
                  200        0.54    14.5         0.01   0.93    0.243844
                  400        0.48    14.5         0.01   0.93    0.115184
                  200        0.43    14.5         0.01   0.93    0.0791645
                Chemical: Thickness=[100, 100, 100, 100, 100, 100, 200, 200, 400, 200]; PH=[8.2, 8.5, 8.6, 8.6, 7.4, 5.3, 5, 7.4, 5.3, 5]; PHUnits=Water
                Water: Thickness=[100, 100, 100, 100, 100, 100, 200, 200, 400, 200]; InitialPAWmm=132.9; RelativeTo=LL15; FilledFromTop=false
                  InitialValues=[0.1, 0.431, 0.407, 0.444, 0.403, 0.402, 0.341, 0.325, 0.295, 0.26]
                CERESSoilTemperature Temperature
                SoilNitrogenNO3 NO3: Thickness=[100, 100, 100, 100, 100, 100, 200, 200, 400, 200]; InitialValuesUnits=ppm; WaterTableConcentration=0; D0=0; DepthConstant=0; MaxDepthSoluteAccessible=0; RunoffEffectivenessAtMovingSolute=0; MaxEffectiveRunoff=0
                  InitialValues=[7.803, 1.133, 1.133, 0.818, 0.692, 1.007, 0.629, 0.629, 0.629, 0.629]
                SoilNitrogenNH4 NH4: Thickness=[100, 100, 100, 100, 100, 100, 200, 200, 400, 200]; InitialValues=[1.3, 1, 1, 0.8, 0.8, 0.5, 0.5, 0.5, 0.5, 0.5]; InitialValuesUnits=ppm; WaterTableConcentration=0; D0=0; DepthConstant=0; MaxDepthSoluteAccessible=0; RunoffEffectivenessAtMovingSolute=0; MaxEffectiveRunoff=0
                SoilNitrogenUrea Urea: Thickness=[100, 100, 100, 100, 100, 100, 200, 200, 400, 200]; InitialValues=[0, 0, 0, 0, 0, 0, 0, 0, 0, 0]; InitialValuesUnits=kg/ha; WaterTableConcentration=0; D0=0; DepthConstant=0; MaxDepthSoluteAccessible=0; RunoffEffectivenessAtMovingSolute=0; MaxEffectiveRunoff=0
              Plant Barley
              SurfaceOrganicMatter: InitialResidueName=Barley_stubble; InitialResidueType=Barley; InitialResidueMass=0; InitialStandingFraction=0; InitialCPR=0; InitialCNR=80
              MicroClimate: a_interception=0; b_interception=1; c_interception=0; d_interception=0; SoilHeatFluxFraction=0.4; MinimumHeightDiffForNewLayer=0; NightInterceptionFraction=0.5; ReferenceHeight=2
              Folder Management
                Manager ApplyN_at_sowing: same as Validation.NewZealand.CPT.CPT.Boss.Paddock.ApplyN_at_sowing
                Operations
                  1988-10-19  [Barley].Harvest();
                  1988-10-19  [Barley].EndCrop();
                Manager SowingRule
                  TOS = 1
                  Cultivar = Grimmett
                  Population = 120
```csharp
using Models.Soils;
using System;
using Models.Core;
using Models.PMF;
namespace Models
{
           
    [Serializable] 
    [System.Xml.Serialization.XmlInclude(typeof(Model))]
    public class Script : Model
    {
    
        [Link] Plant Barley;
        [Link] Clock Clock;
            
        [Description("Time of Sowing")]
        public int TOS { get; set; }

        [Description("Cultivar")]
        public String Cultivar { get; set; }

        [Description("Plant Population")]
        public int Population { get; set; }

        [EventSubscribe("DoManagement")]
        private void OnDoManagement(object sender, EventArgs e)
        {
            if (((Clock.Today.DayOfYear == 90) && (TOS == 1)) ||
                ((Clock.Today.DayOfYear == 111) && (TOS == 2)) ||
                ((Clock.Today.DayOfYear == 131) && (TOS == 3)) ||
                ((Clock.Today.DayOfYear == 159) && (TOS == 4)))
            {
                Barley.Sow(population: Population, cultivar: Cultivar, depth: 30, rowSpacing: 250);
            }
        }


    }
}
```
              Report DailyReport: same as Validation.NewZealand.MCPD09_10.Ablock.Paddock.DailyReport
              Irrigation
              Fertiliser
              Report HarvestReport: EventNames=[Clock].EndOfSimulation
                VariableNames:
                  [Barley].Structure.LeafTipsAppeared
                  [Barley].Structure.FinalLeafNumber
                  [Barley].Phenology.FlagLeafDAS
                  [Barley].Phenology.FloweringDAS
                  [Barley].Phenology.MaturityDAS
                  [Script].CalcVals.SowMonth
              Report SowingReport: EventNames=[Barley].Sowing
                VariableNames:
                  [Clock].Today
                  [Barley].SowingData.Cultivar
            Manager DAS: same as Validation.NewZealand.MCPD09_10.Ablock.Paddock.DAS
      Folder Gatton1984
        Memo
          This nitrogen rate (0 to 200 kg N/ha) experiment was conducted in 1984 at Gatton, Queensland. The experiment is explained in [Birch1990].
        Experiment Gatton1984
          Memo
            NOTE: High N treatment logdged.  Final grain sizes were less than expected.
          Factors
            Factor NRate: Specification=[ApplyFertiliser]
              Operations 0
              Operations 50
                1984-05-23  [Fertiliser].Apply(Amount: 50, Type: Fertiliser.Types.NO3N);
              Operations 100
                1984-05-23  [Fertiliser].Apply(Amount: 100, Type: Fertiliser.Types.NO3N);
              Operations 150
                1984-05-23  [Fertiliser].Apply(Amount: 150, Type: Fertiliser.Types.NO3N);
              Operations 200
                1984-05-23  [Fertiliser].Apply(Amount: 200, Type: Fertiliser.Types.NO3N);
          Simulation Gatton1984Base
            Clock: Start=1984-05-20; End=1984-12-31
            Summary summaryfile
            Weather: FileName=Gatton1984.met
            Zone paddock: Area=1; Slope=0; AspectAngle=0; Altitude=50
              Irrigation
              Fertiliser
              Soil: SoilType=APS6Soil; LocalName=APS6Site; Site=APS6Site; NearestTown=Unknown; Region=Lawes; NaturalVegetation=Unknown; Latitude=0; Longitude=0
                Physical
                  Thickness  BD    AirDry  LL15  DUL   SAT
                  150        1.38  0.1     0.2   0.38  0.43
                  150        1.34  0.1     0.2   0.38  0.43
                  300        1.35  0.1     0.22  0.4   0.43
                  300        1.5   0.1     0.18  0.4   0.43
                  300        1.49  0.1     0.14  0.39  0.42
                  300        1.46  0.1     0.2   0.38  0.4
                  300        1.46  0.1     0.2   0.38  0.4
                  SoilCrop BarleySoil: LL=[0.2, 0.2, 0.22, 0.18, 0.14, 0.25, 0.28]; KL=[0.06, 0.05, 0.05, 0.04, 0.04, 0.03, 0.03]; XF=[1, 1, 1, 1, 1, 1, 1]
                WaterBalance SoilWater: same as Validation.Australia.MCVP.Gatton2011.Gatton2011Base.Field.APS6Field.SoilWater
                SoilNitrogen: fom_types=[default, manure, mucuna, lablab, shemp, stable]; fract_carb=[0.2, 0.3, 0.54, 0.57, 0.45, 0]; fract_cell=[0.7, 0.3, 0.37, 0.37, 0.47, 0.1]; fract_lign=[0.1, 0.4, 0.09, 0.06, 0.08, 0.9]; NPartitionApproach=0
                Organic: same as Validation.Australia.MCVP.Gatton2011.Gatton2011Base.Field.APS6Field.Organic
                Chemical: Thickness=[150, 150, 300, 300, 300, 300, 300]; PH=[7.5, 8, 8, 8, 8, 8, 8]; PHUnits=Water
                Water: Thickness=[150, 150, 300, 300, 300, 300, 300]; InitialValues=[0.326, 0.326, 0.346, 0.333, 0.315, 0.326, 0.326]; InitialPAWmm=249.6; RelativeTo=LL15; FilledFromTop=false
                CERESSoilTemperature Temperature
                SoilNitrogenNO3 NO3: Thickness=[150, 150, 300, 300, 300, 300, 300]; InitialValues=[5, 3.5, 2, 0.2, 0.1, 0.1, 0.1]; InitialValuesUnits=ppm; WaterTableConcentration=0; D0=0; DepthConstant=0; MaxDepthSoluteAccessible=0; RunoffEffectivenessAtMovingSolute=0; MaxEffectiveRunoff=0
                SoilNitrogenNH4 NH4: Thickness=[150, 150, 300, 300, 300, 300, 300]; InitialValues=[5, 3.5, 2, 0.8, 0.8, 0.5, 0.5]; InitialValuesUnits=ppm; WaterTableConcentration=0; D0=0; DepthConstant=0; MaxDepthSoluteAccessible=0; RunoffEffectivenessAtMovingSolute=0; MaxEffectiveRunoff=0
                SoilNitrogenUrea Urea: same as Validation.Australia.MCVP.Gatton2011.Gatton2011Base.Field.APS6Field.Urea
              SurfaceOrganicMatter: InitialResidueName=wheat_stubble; InitialResidueType=wheat; InitialResidueMass=500; InitialStandingFraction=0; InitialCPR=0; InitialCNR=100
              Plant Barley
              Operations ApplyFertiliser
                1992-06-16  [Fertiliser].Apply(Amount: 0, Type: Fertiliser.Types.NO3N);
              Manager SowingRule
                SowDate = 25-may
                CultivarName = Grimmett
                SowingDepth = 30
                RowSpacing = 250
                Population = 120
                script: same as in Validation.Australia.Hermitage1990.Hermitage1990.Hermitage1990Base.paddock.Management.SowingRule
              MicroClimate: a_interception=0; b_interception=1; c_interception=0; d_interception=0; SoilHeatFluxFraction=0.4; MinimumHeightDiffForNewLayer=0; NightInterceptionFraction=0.5; ReferenceHeight=2
              Report DailyReport
              Report HarvestReport
              Operations
                1984-05-25  [Irrigation].Apply(30);
                1984-11-02  [Barley].Harvest();
                1984-11-02  [Barley].EndCrop();
              Report SowingReport: EventNames=[Barley].Sowing
                VariableNames:
                  [Clock].Today
                  [Barley].SowingData.Cultivar
            SoilArbitrator Soil Arbitrator
      Folder NPIField2019
        Experiment WaggaWagga2019
          Factors
            Permutation
              Factor TOS
                CompositeFactor 1
                  Specifications:
                    [Sowing].Script.SowDate = 4-Mar
                    [Clock].StartDate = 2019-03-04
                    [Sowing].Script.Treat = 1
                CompositeFactor 2
                  Specifications:
                    [Sowing].Script.SowDate = 18-Mar
                    [Clock].StartDate = 2019-03-18
                    [Sowing].Script.Treat = 2
                CompositeFactor 3
                  Specifications:
                    [Sowing].Script.SowDate = 1-Apr
                    [Clock].StartDate = 2019-04-01
                    [Sowing].Script.Treat = 3
                CompositeFactor 4
                  Specifications:
                    [Sowing].Script.SowDate = 15-Apr
                    [Clock].StartDate = 2019-04-15
                    [Sowing].Script.Treat = 4
                CompositeFactor 5
                  Specifications:
                    [Sowing].Script.SowDate = 29-Apr
                    [Clock].StartDate = 2019-04-29
                    [Sowing].Script.Treat = 5
                CompositeFactor 6
                  Specifications:
                    [Sowing].Script.SowDate = 13-May
                    [Clock].StartDate = 2019-05-13
                    [Sowing].Script.Treat = 6
                CompositeFactor 7
                  Specifications:
                    [Sowing].Script.SowDate = 27-May
                    [Clock].StartDate = 2019-05-27
                    [Sowing].Script.Treat = 7
                CompositeFactor 8
                  Specifications:
                    [Sowing].Script.SowDate = 12-Jun
                    [Clock].StartDate = 2019-06-12
                    [Sowing].Script.Treat = 8
              Factor Cv
                Specification=[Sowing].Script.CultivarName = Alestar, Banks, Bass, Baudin, Biere, Capstan, Cassiopee, Commander, Compass, CSIROB1, CSIROB3, Dash, Fathom, Fleet, Flinders, Franklin, Gairdner, Granger, Grout, Keel, Lockyer, Navigator, Oxford, Rosalind, Schooner, Scope, Shepherd, Stirling, Urambie, Westminster
          Simulation WaggaWagga2019Base
            Weather: FileName=WaggaWagga2019NPIfield.met
            Clock: Start=2019-02-25; End=2020-01-20
            Summary
            SoilArbitrator
            Zone Field: Area=1; Slope=0; AspectAngle=0; Altitude=50
              Soil: SoilType=Black Vertosol; Site=Lawes; NearestTown=Lawes, Q 4343; Region=Lockyer; State=Queensland; Country=Australia; NaturalVegetation=Blue Gum, Moreton Bay Ash, Tea Tree; ApsoilNumber=38; Latitude=-27.537; Longitude=152.336; LocationAccuracy=+-20m; DataSource=CSIRO Sustainable Ecosystems, Toowoomba
                Comments=Soil naming structure: \State\Region\Classification-Local Name (Site/district and locator number); oc and ph estimated
                Physical
                  Thickness  BD    AirDry  LL15  DUL   SAT
                  150        1.32  0.13    0.26  0.41  0.47
                  150        1.3   0.208   0.26  0.43  0.48
                  300        1.23  0.26    0.26  0.46  0.51
                  300        1.27  0.26    0.26  0.44  0.49
                  300        1.37  0.25    0.25  0.4   0.45
                  300        1.35  0.26    0.26  0.41  0.46
                  300        1.35  0.26    0.26  0.38  0.46
                  SoilCrop BarleySoil: LL=[0.26, 0.26, 0.26, 0.26, 0.25, 0.29, 0.36]; KL=[0.06, 0.06, 0.06, 0.04, 0.04, 0.02, 0.02]; XF=[1, 1, 1, 1, 1, 1, 1]
                WaterBalance SoilWater: SummerDate=1-Nov; SummerU=6; SummerCona=3.5; WinterDate=1-Apr; WinterU=4; WinterCona=2.5; DiffusConst=40; DiffusSlope=16; Salb=0.12; CN2Bare=73; CNRed=20; CNCov=0.8; PSIDul=-100; Thickness=[150, 150, 300, 300, 300, 300, 300]; SWCON=[0.3, 0.3, 0.3, 0.3, 0.3, 0.3, 0.3]
                Organic: FOMCNRatio=40; CarbonUnits=Total
                  Thickness  Carbon    SoilCNRatio  FBiom  FInert  FOM
                  150        0.953846  12           0.04   0.4     347.129
                  150        0.953846  12           0.02   0.6     270.344
                  300        0.961538  12           0.02   0.8     163.972
                  300        0.846154  12           0.02   1       99.4541
                  300        0.546154  12           0.01   1       60.322
                  300        0.261538  12           0.01   1       36.5871
                  300        0.2       12           0.01   1       22.1912
                Chemical: Thickness=[150, 150, 300, 300, 300, 300, 300]; PH=[8, 8, 8, 8, 8, 8, 8]; PHUnits=Water
                Water: Thickness=[150, 150, 300, 300, 300, 300, 300]; InitialValues=[0.41, 0.43, 0.46, 0.44, 0.4, 0.41, 0.38]; InitialPAWmm=288; RelativeTo=LL15; FilledFromTop=true
                CERESSoilTemperature Temperature
                SoilNitrogen: fom_types=[default, manure, mucuna, lablab, shemp, stable]; fract_carb=[0.2, 0.3, 0.54, 0.57, 0.45, 0]; fract_cell=[0.7, 0.3, 0.37, 0.37, 0.47, 0.1]; fract_lign=[0.1, 0.4, 0.09, 0.06, 0.08, 0.9]; NPartitionApproach=0
                SoilNitrogenNO3 NO3: Thickness=[150, 150, 300, 300, 300, 300, 300]; InitialValuesUnits=ppm; WaterTableConcentration=0; D0=0; DepthConstant=0; MaxDepthSoluteAccessible=0; RunoffEffectivenessAtMovingSolute=0; MaxEffectiveRunoff=0
                  InitialValues=[10.101, 10.2564, 2.71003, 0.787402, 0.486618, 0.246914, 0.246914]
                SoilNitrogenNH4 NH4: Thickness=[150, 150, 300, 300, 300, 300, 300]; InitialValuesUnits=ppm; WaterTableConcentration=0; D0=0; DepthConstant=0; MaxDepthSoluteAccessible=0; RunoffEffectivenessAtMovingSolute=0; MaxEffectiveRunoff=0
                  InitialValues=[0.505051, 0.512821, 0.271003, 0.262467, 0.243309, 0.246914, 0.246914]
                SoilNitrogenUrea Urea: same as Validation.Australia.MCVP.Gatton2011.Gatton2011Base.Field.APS6Field.Urea
              Report DailyReport: EventNames=[Wheat].Harvesting
                VariableNames:
                  [Clock].Today
                  [Wheat].Phenology.FloweringDAS
                  [Wheat].Phenology.FlagLeafDAS
                  [Wheat].Phenology.TerminalSpikeletDAS
              Report HarvestReport: EventNames=[Clock].DoReport
                VariableNames:
                  [Clock].Today
                  [Wheat].Phenology.Stage
                  [Wheat].Phenology.Zadok.Stage
                  [Wheat].Phenology.FloweringDAS
                  [Wheat].Phenology.FlagLeafDAS
                  [Wheat].Phenology.TerminalSpikeletDAS
              Fertiliser
              SurfaceOrganicMatter: InitialResidueName=wheat_stubble; InitialResidueType=wheat; InitialResidueMass=500; InitialStandingFraction=0; InitialCPR=0; InitialCNR=100
              MicroClimate: a_interception=0; b_interception=1; c_interception=0; d_interception=0; SoilHeatFluxFraction=0.4; MinimumHeightDiffForNewLayer=0; NightInterceptionFraction=0.5; ReferenceHeight=2
              Plant Barley
              Manager Sowing
                SowDate =
                Treat =
                CultivarName =
                SowingDepth = 50
                RowSpacing = 250
                Population = 150
                FilePath = %root%\Tests\Validation\Barley\WaggaWaggaEmergenceDates.csv
```csharp
using Newtonsoft.Json;
using System.Data;
using System.Xml.Serialization;
using Models;
using System.Text;
using System.Collections.Generic;
using Models.Interfaces;
using System.Globalization;
using System;
using Models.Core;
using Models.PMF;
using Models.Soils;
using Models.Utilities;
using APSIM.Shared.Utilities;

namespace Models
{
    [Serializable]
    public class Script : Model
    {
        [Link] Clock Clock;
        [Link] Fertiliser Fertiliser;
        [Link] Summary Summary;
        [Link] Soil Soil;
        [Link] Plant Barley;
        [Link] Simulation Simulation;
        Accumulator accumulatedRain;
        
        [Description("Sowing date (d-mmm)")]
        public string SowDate { get; set; }
        [Description("Treatment Name")]
        public string Treat { get; set; }
        [Display(Type = DisplayType.CultivarName)]
        [Description("Cultivar to be sown")]
        public string CultivarName { get; set; }
        [Description("Sowing depth (mm)")]
        public double SowingDepth { get; set; }
        [Description("Row spacing (mm)")]
        public double RowSpacing { get; set; }
        [Description("Plant population (/m2)")]
        public double Population { get; set; }

        [Description("Emergence Date File Path")]
        public string FilePath {get; set;}

        private DateTime EmergenceDate {get; set;}
        private string EmergenceString {get; set;}

        [JsonIgnore] private DataTable EmergDates{ get; set; }

        [EventSubscribe("StartOfSimulation")]
        private void OnStartOfSimulation(object sender, EventArgs e)
        {
            
            string fullFileName = PathUtilities.GetAbsolutePath(FilePath, Simulation.FileName);
            
            ApsimTextFile textFile = new ApsimTextFile();
            textFile.Open(fullFileName);
            EmergDates = textFile.ToTable();
            textFile.Close();
        }

        [EventSubscribe("DoManagement")]
        private void OnDoManagement(object sender, EventArgs e)
        {

            if (DateUtilities.WithinDates(SowDate, Clock.Today, SowDate))
            {
                
                foreach (DataRow row in EmergDates.Rows)
                {
                    string Env = Convert.ToString(row["TOS"]);
                    if (Env == Treat)
                    {
                        //EmergenceDate = Convert.ToDateTime(row[CultivarName]);
                        //EmergenceString = EmergenceDate.ToString("dd-MMM", CultureInfo.InvariantCulture);
                    }
                }

                Barley.Sow(population: Population, cultivar: CultivarName, depth: SowingDepth, rowSpacing: RowSpacing);    
                //Barley.Phenology.SetEmergenceDate(EmergenceString);
            }
        
        }
        
    }
}
```
              Manager SowingFertiliser
                Amount = 200
                CropName = barley
```csharp
using Models.Soils;
using System;
using Models.Core;
using Models.PMF;
namespace Models
{
    [Serializable]
    public class Script : Model
    {
        [Link] Clock Clock;
        [Link] Fertiliser Fertiliser;
        [Link] Summary Summary;
        
        
        [Description("Amount of fertiliser to be applied (kg/ha)")]
        public double Amount { get; set;}
        
        [Description("Crop to be fertilised")]
        public string CropName { get; set;}
        
        
        

        [EventSubscribe("Sowing")]
        private void OnSowing(object sender, EventArgs e)
        {
            Model crop = sender as Model;
            if (crop.Name.ToLower()==CropName.ToLower())
                Fertiliser.Apply(Amount: Amount, Type: Fertiliser.Types.NO3N);
        }
        
    }
}
```
              Report SowingReport
              Operations Management
              Irrigation
              Manager HarvestAtFlowering
```csharp
using Models.PMF.Phen;
using APSIM.Shared.Utilities;
using Models.Utilities;
using Models.Soils;
using Models.PMF;
using Models.Core;
using System;
using Models.Soils.Nutrients;

namespace Models
{
    [Serializable]
    public class Script : Model
    {
        [Link] private Plant Barley;
        [Link(Type = LinkType.Path, Path = "[Barley].Phenology")]
        private Phenology phenology;

        [EventSubscribe("DoManagement")]
        private void OnDoManagement(object sender, EventArgs e)
        {
            if (phenology.CurrentPhase.Name=="GrainFilling")
            {
               Barley.Harvest();
               Barley.EndCrop();    
            }
        
        }
        
    }
}
```
        Experiment Callington2019
          Factors
            Permutation
              Factor TOS
                CompositeFactor 1
                  Specifications:
                    [Sowing].Script.SowDate = 6-Mar
                    [Clock].StartDate = 2019-03-06
                    [Sowing].Script.Treat = 1
                CompositeFactor 2
                  Specifications:
                    [Sowing].Script.SowDate = 15-Mar
                    [Clock].StartDate = 2019-03-15
                    [Sowing].Script.Treat = 2
                CompositeFactor 3
                  Specifications:
                    [Sowing].Script.SowDate = 29-Mar
                    [Clock].StartDate = 2019-03-29
                    [Sowing].Script.Treat = 3
                CompositeFactor 4
                  Specifications:
                    [Sowing].Script.SowDate = 12-Apr
                    [Clock].StartDate = 2019-04-12
                    [Sowing].Script.Treat = 4
                CompositeFactor 5
                  Specifications:
                    [Sowing].Script.SowDate = 29-Apr
                    [Clock].StartDate = 2019-04-29
                    [Sowing].Script.Treat = 5
                CompositeFactor 6
                  Specifications:
                    [Sowing].Script.SowDate = 13-May
                    [Clock].StartDate = 2019-05-13
                    [Sowing].Script.Treat = 6
                CompositeFactor 7
                  Specifications:
                    [Sowing].Script.SowDate = 27-May
                    [Clock].StartDate = 2019-05-27
                    [Sowing].Script.Treat = 7
                CompositeFactor 8
                  Specifications:
                    [Sowing].Script.SowDate = 11-Jun
                    [Clock].StartDate = 2019-06-11
                    [Sowing].Script.Treat = 8
              Factor Cv
                Specification=[Sowing].Script.CultivarName = Alestar, Banks, Bass, Baudin, Biere, Capstan, Cassiopee, Commander, Compass, CSIROB1, CSIROB3, Dash, Fathom, Fleet, Flinders, Franklin, Gairdner, Granger, Grout, Keel, Lockyer, Navigator, Oxford, Rosalind, Schooner, Scope, Shepherd, Stirling, Urambie, Westminster
          Simulation Callington2019Base
            Weather: FileName=Callington2019NPIfield.met
            Clock: Start=2019-02-25; End=2020-01-20
            Summary
            SoilArbitrator
            Zone Field: Area=1; Slope=0; AspectAngle=0; Altitude=50
              Soil: same as Validation.Australia.NPIField2019.WaggaWagga2019.WaggaWagga2019Base.Field.Soil
              Report DailyReport: EventNames=[Wheat].Harvesting
                VariableNames:
                  [Clock].Today
                  [Wheat].Phenology.FloweringDAS
                  [Wheat].Phenology.FlagLeafDAS
                  [Wheat].Phenology.TerminalSpikeletDAS
              Report HarvestReport: EventNames=[Clock].DoReport
                VariableNames:
                  [Clock].Today
                  [Wheat].Phenology.Stage
                  [Wheat].Phenology.Zadok.Stage
                  [Wheat].Phenology.FloweringDAS
                  [Wheat].Phenology.FlagLeafDAS
                  [Wheat].Phenology.TerminalSpikeletDAS
              Fertiliser
              SurfaceOrganicMatter: InitialResidueName=wheat_stubble; InitialResidueType=wheat; InitialResidueMass=500; InitialStandingFraction=0; InitialCPR=0; InitialCNR=100
              Plant Barley
              MicroClimate: a_interception=0; b_interception=1; c_interception=0; d_interception=0; SoilHeatFluxFraction=0.4; MinimumHeightDiffForNewLayer=0; NightInterceptionFraction=0.5; ReferenceHeight=2
              Manager Sowing
                SowDate =
                Treat =
                CultivarName =
                SowingDepth = 50
                RowSpacing = 250
                Population = 150
                FilePath = %root%\Tests\Validation\Barley\CallingtonEmergenceDates.csv
                script: same as in Validation.Australia.NPIField2019.WaggaWagga2019.WaggaWagga2019Base.Field.Sowing
              Manager SowingFertiliser: same as Validation.Australia.NPIField2019.WaggaWagga2019.WaggaWagga2019Base.Field.SowingFertiliser
              Report SowingReport
              Operations Management
              Irrigation
              Manager HarvestAtFlowering: same as Validation.Australia.NPIField2019.WaggaWagga2019.WaggaWagga2019Base.Field.HarvestAtFlowering
        Experiment Dale2019
          Factors
            Permutation
              Factor TOS
                CompositeFactor 1
                  Specifications:
                    [Sowing].Script.SowDate = 20-Mar
                    [Clock].StartDate = 2019-03-20
                    [Sowing].Script.Treat = 1
                CompositeFactor 2
                  Specifications:
                    [Sowing].Script.SowDate = 10-Apr
                    [Clock].StartDate = 2019-04-10
                    [Sowing].Script.Treat = 2
                CompositeFactor 3
                  Specifications:
                    [Sowing].Script.SowDate = 17-Apr
                    [Clock].StartDate = 2019-04-17
                    [Sowing].Script.Treat = 3
                CompositeFactor 4
                  Specifications:
                    [Sowing].Script.SowDate = 1-May
                    [Clock].StartDate = 2019-05-01
                    [Sowing].Script.Treat = 4
                CompositeFactor 5
                  Specifications:
                    [Sowing].Script.SowDate = 17-May
                    [Clock].StartDate = 2019-05-17
                    [Sowing].Script.Treat = 5
                CompositeFactor 6
                  Specifications:
                    [Sowing].Script.SowDate = 28-May
                    [Clock].StartDate = 2019-05-28
                    [Sowing].Script.Treat = 6
                CompositeFactor 7
                  Specifications:
                    [Sowing].Script.SowDate = 12-Jun
                    [Clock].StartDate = 2019-06-12
                    [Sowing].Script.Treat = 7
                CompositeFactor 8
                  Specifications:
                    [Sowing].Script.SowDate = 1-Jul
                    [Clock].StartDate = 2019-07-01
                    [Sowing].Script.Treat = 8
              Factor Cv
                Specification=[Sowing].Script.CultivarName = Alestar, Banks, Bass, Baudin, Biere, Capstan, Cassiopee, Commander, Compass, CSIROB1, CSIROB3, Dash, Fathom, Fleet, Flinders, Franklin, Gairdner, Granger, Grout, Keel, Lockyer, Navigator, Oxford, Rosalind, Schooner, Scope, Shepherd, Stirling, Urambie, Westminster
          Simulation Dale2019Base
            Weather: FileName=dale2019NPIfield.met
            Clock: Start=2019-02-25; End=2020-01-20
            Summary
            SoilArbitrator
            Zone Field: Area=1; Slope=0; AspectAngle=0; Altitude=50
              Soil: same as Validation.Australia.NPIField2019.WaggaWagga2019.WaggaWagga2019Base.Field.Soil
              Report DailyReport: EventNames=[Wheat].Harvesting
                VariableNames:
                  [Clock].Today
                  [Wheat].Phenology.FloweringDAS
                  [Wheat].Phenology.FlagLeafDAS
                  [Wheat].Phenology.TerminalSpikeletDAS
              Report HarvestReport: EventNames=[Clock].DoReport
                VariableNames:
                  [Clock].Today
                  [Wheat].Phenology.Stage
                  [Wheat].Phenology.Zadok.Stage
                  [Wheat].Phenology.FloweringDAS
                  [Wheat].Phenology.FlagLeafDAS
                  [Wheat].Phenology.TerminalSpikeletDAS
              Fertiliser
              SurfaceOrganicMatter: InitialResidueName=wheat_stubble; InitialResidueType=wheat; InitialResidueMass=500; InitialStandingFraction=0; InitialCPR=0; InitialCNR=100
              Plant Barley
              MicroClimate: a_interception=0; b_interception=1; c_interception=0; d_interception=0; SoilHeatFluxFraction=0.4; MinimumHeightDiffForNewLayer=0; NightInterceptionFraction=0.5; ReferenceHeight=2
              Manager Sowing
                SowDate =
                Treat =
                CultivarName =
                SowingDepth = 50
                RowSpacing = 250
                Population = 150
                FilePath = %root%\Tests\Validation\Barley\DaleEmergenceDates.csv
                script: same as in Validation.Australia.NPIField2019.WaggaWagga2019.WaggaWagga2019Base.Field.Sowing
              Manager SowingFertiliser: same as Validation.Australia.NPIField2019.WaggaWagga2019.WaggaWagga2019Base.Field.SowingFertiliser
              Report SowingReport
              Operations Management
              Irrigation
              Manager HarvestAtFlowering: same as Validation.Australia.NPIField2019.WaggaWagga2019.WaggaWagga2019Base.Field.HarvestAtFlowering
        Experiment YanYean2019
          Factors
            Permutation
              Factor TOS
                CompositeFactor 1
                  Specifications:
                    [Sowing].Script.SowDate = 5-Mar
                    [Clock].StartDate = 2019-03-05
                    [Sowing].Script.Treat = 1
                CompositeFactor 9
                  Specifications:
                    [Sowing].Script.SowDate = 16-Jul
                    [Clock].StartDate = 2019-07-16
                    [Sowing].Script.Treat = 9
                CompositeFactor 3
                  Specifications:
                    [Sowing].Script.SowDate = 1-Apr
                    [Clock].StartDate = 2019-04-01
                    [Sowing].Script.Treat = 3
                CompositeFactor 4
                  Specifications:
                    [Sowing].Script.SowDate = 15-Apr
                    [Clock].StartDate = 2019-04-15
                    [Sowing].Script.Treat = 4
                CompositeFactor 5
                  Specifications:
                    [Sowing].Script.SowDate = 1-May
                    [Clock].StartDate = 2019-05-01
                    [Sowing].Script.Treat = 5
                CompositeFactor 6
                  Specifications:
                    [Sowing].Script.SowDate = 15-May
                    [Clock].StartDate = 2019-05-15
                    [Sowing].Script.Treat = 6
                CompositeFactor 7
                  Specifications:
                    [Sowing].Script.SowDate = 31-May
                    [Clock].StartDate = 2019-05-31
                    [Sowing].Script.Treat = 7
                CompositeFactor 8
                  Specifications:
                    [Sowing].Script.SowDate = 14-Jun
                    [Clock].StartDate = 2019-06-14
                    [Sowing].Script.Treat = 8
              Factor Cv
                Specification=[Sowing].Script.CultivarName = Alestar, Banks, Bass, Baudin, Biere, Capstan, Cassiopee, Commander, Compass, CSIROB1, CSIROB3, Dash, Fathom, Fleet, Flinders, Franklin, Gairdner, Granger, Grout, Keel, Lockyer, Navigator, Oxford, Rosalind, Schooner, Scope, Shepherd, Stirling, Urambie, Westminster
          Simulation YanYean2019Base
            Weather: FileName=yanyean2019NPIfield.met
            Clock: Start=2019-02-25; End=2020-01-20
            Summary
            SoilArbitrator
            Zone Field: Area=1; Slope=0; AspectAngle=0; Altitude=50
              Soil: same as Validation.Australia.NPIField2019.WaggaWagga2019.WaggaWagga2019Base.Field.Soil
              Report DailyReport: EventNames=[Wheat].Harvesting
                VariableNames:
                  [Clock].Today
                  [Wheat].Phenology.FloweringDAS
                  [Wheat].Phenology.FlagLeafDAS
                  [Wheat].Phenology.TerminalSpikeletDAS
              Report HarvestReport: EventNames=[Clock].DoReport
                VariableNames:
                  [Clock].Today
                  [Wheat].Phenology.Stage
                  [Wheat].Phenology.Zadok.Stage
                  [Wheat].Phenology.FloweringDAS
                  [Wheat].Phenology.FlagLeafDAS
                  [Wheat].Phenology.TerminalSpikeletDAS
              Fertiliser
              SurfaceOrganicMatter: InitialResidueName=wheat_stubble; InitialResidueType=wheat; InitialResidueMass=500; InitialStandingFraction=0; InitialCPR=0; InitialCNR=100
              Plant Barley
              MicroClimate: a_interception=0; b_interception=1; c_interception=0; d_interception=0; SoilHeatFluxFraction=0.4; MinimumHeightDiffForNewLayer=0; NightInterceptionFraction=0.5; ReferenceHeight=2
              Manager Sowing
                SowDate =
                Treat =
                CultivarName =
                SowingDepth = 50
                RowSpacing = 250
                Population = 150
                FilePath = %root%\Tests\Validation\Barley\YanYeanEmergenceDates.csv
                script: same as in Validation.Australia.NPIField2019.WaggaWagga2019.WaggaWagga2019Base.Field.Sowing
              Manager SowingFertiliser: same as Validation.Australia.NPIField2019.WaggaWagga2019.WaggaWagga2019Base.Field.SowingFertiliser
              Report SowingReport
              Operations Management
                2019-03-06  [Irrigation].Apply(amount:18);
                2019-03-18  [Irrigation].Apply(amount:18);
                2019-04-04  [Irrigation].Apply(amount:18);
                2019-04-17  [Irrigation].Apply(amount:18);
              Irrigation
              Manager HarvestAtFlowering: same as Validation.Australia.NPIField2019.WaggaWagga2019.WaggaWagga2019Base.Field.HarvestAtFlowering
      Folder NPIField2020
        Experiment WaggaWagga2020
          Factors
            Permutation
              Factor TOS
                CompositeFactor 1
                  Specifications:
                    [Sowing].Script.SowDate = 3-Mar
                    [Clock].StartDate = 2020-03-03
                    [Sowing].Script.Treat = 1
                CompositeFactor 2
                  Specifications:
                    [Sowing].Script.SowDate = 17-Mar
                    [Clock].StartDate = 2020-03-17
                    [Sowing].Script.Treat = 2
                CompositeFactor 3
                  Specifications:
                    [Sowing].Script.SowDate = 30-Mar
                    [Clock].StartDate = 2020-03-30
                    [Sowing].Script.Treat = 3
                CompositeFactor 4
                  Specifications:
                    [Sowing].Script.SowDate = 14-Apr
                    [Clock].StartDate = 2020-04-14
                    [Sowing].Script.Treat = 4
                CompositeFactor 5
                  Specifications:
                    [Sowing].Script.SowDate = 28-Apr
                    [Clock].StartDate = 2020-04-28
                    [Sowing].Script.Treat = 5
                CompositeFactor 6
                  Specifications:
                    [Sowing].Script.SowDate = 12-May
                    [Clock].StartDate = 2020-05-12
                    [Sowing].Script.Treat = 6
                CompositeFactor 7
                  Specifications:
                    [Sowing].Script.SowDate = 26-May
                    [Clock].StartDate = 2020-05-26
                    [Sowing].Script.Treat = 7
                CompositeFactor 8
                  Specifications:
                    [Sowing].Script.SowDate = 9-Jun
                    [Clock].StartDate = 2020-06-09
                    [Sowing].Script.Treat = 8
              Factor Cv
                Specification=[Sowing].Script.CultivarName = Alestar, Banks, Bass, Baudin, Biere, Capstan, Cassiopee, Commander, Compass, CSIROB1, CSIROB3, Dash, Fathom, Fleet, Flinders, Franklin, Gairdner, Granger, Grout, Keel, Lockyer, Navigator, Oxford, Rosalind, Schooner, Scope, Shepherd, Stirling, Urambie, Westminster
          Simulation WaggaWagga2020Base
            Weather: FileName=2020NPI_WaggaWagga.met
            Clock: Start=2020-03-03; End=2020-11-11
            Summary
            SoilArbitrator
            Manager LocationInfo
              Country = Australia
              State = New South Wales
              Region = NSW VIC Slopes
```csharp
using Models.Soils;
using System;
using Models.Core;
using Models.PMF;
using APSIM.Shared.Utilities;

namespace Models
{
    [Serializable]
    public class Script : Model
    {
        [Link] Clock Clock;
        [Link] Fertiliser Fertiliser;
        [Link] Summary Summary;
        
        [Description("Country")]
        public string Country { get; set; }

        [Description("State")]
        public string State { get; set; }

        [Description("Region")]
        public string Region { get; set; }

    }
}
```
            Zone Field: Area=1; Slope=0; AspectAngle=0; Altitude=50
              Soil: same as Validation.Australia.NPIField2019.WaggaWagga2019.WaggaWagga2019Base.Field.Soil
              Report DailyReport: EventNames=[Wheat].Harvesting
                VariableNames:
                  [Clock].Today
                  [Wheat].Phenology.FloweringDAS
                  [Wheat].Phenology.FlagLeafDAS
                  [Wheat].Phenology.TerminalSpikeletDAS
              Report HarvestReport: EventNames=[Clock].DoReport
                VariableNames:
                  [Clock].Today
                  [Wheat].Phenology.Stage
                  [Wheat].Phenology.Zadok.Stage
                  [Wheat].Phenology.FloweringDAS
                  [Wheat].Phenology.FlagLeafDAS
                  [Wheat].Phenology.TerminalSpikeletDAS
              Fertiliser
              SurfaceOrganicMatter: InitialResidueName=wheat_stubble; InitialResidueType=wheat; InitialResidueMass=500; InitialStandingFraction=0; InitialCPR=0; InitialCNR=100
              MicroClimate: a_interception=0; b_interception=1; c_interception=0; d_interception=0; SoilHeatFluxFraction=0.4; MinimumHeightDiffForNewLayer=0; NightInterceptionFraction=0.5; ReferenceHeight=2
              Plant Barley
              Manager Sowing
                SowDate =
                Treat =
                CultivarName =
                SowingDepth = 50
                RowSpacing = 250
                Population = 150
                FilePath = %root%\Tests\Validation\Barley\WaggaWaggaEmergenceDates2020.csv
                script: same as in Validation.Australia.NPIField2019.WaggaWagga2019.WaggaWagga2019Base.Field.Sowing
              Manager SowingFertiliser: same as Validation.Australia.NPIField2019.WaggaWagga2019.WaggaWagga2019Base.Field.SowingFertiliser
              Report SowingReport
              Operations Management
              Irrigation
              Manager HarvestAtFlowering: same as Validation.Australia.NPIField2019.WaggaWagga2019.WaggaWagga2019Base.Field.HarvestAtFlowering
        Experiment Urrbrae2020
          Factors
            Permutation
              Factor TOS
                CompositeFactor 1
                  Specifications:
                    [Sowing].Script.SowDate = 2-Mar
                    [Clock].StartDate = 2020-03-02
                    [Sowing].Script.Treat = 1
                CompositeFactor 2
                  Specifications:
                    [Sowing].Script.SowDate = 16-Mar
                    [Clock].StartDate = 2020-03-16
                    [Sowing].Script.Treat = 2
                CompositeFactor 3
                  Specifications:
                    [Sowing].Script.SowDate = 1-Apr
                    [Clock].StartDate = 2020-04-01
                    [Sowing].Script.Treat = 3
                CompositeFactor 4
                  Specifications:
                    [Sowing].Script.SowDate = 14-Apr
                    [Clock].StartDate = 2020-04-14
                    [Sowing].Script.Treat = 4
                CompositeFactor 5
                  Specifications:
                    [Sowing].Script.SowDate = 4-May
                    [Clock].StartDate = 2020-05-04
                    [Sowing].Script.Treat = 5
                CompositeFactor 6
                  Specifications:
                    [Sowing].Script.SowDate = 15-May
                    [Clock].StartDate = 2020-05-15
                    [Sowing].Script.Treat = 6
                CompositeFactor 7
                  Specifications:
                    [Sowing].Script.SowDate = 29-May
                    [Clock].StartDate = 2020-05-29
                    [Sowing].Script.Treat = 7
                CompositeFactor 8
                  Specifications:
                    [Sowing].Script.SowDate = 18-Jun
                    [Clock].StartDate = 2020-06-18
                    [Sowing].Script.Treat = 8
              Factor Cv
                Specification=[Sowing].Script.CultivarName = Alestar, Banks, Bass, Baudin, Biere, Capstan, Cassiopee, Commander, Compass, CSIROB1, CSIROB3, Dash, Fathom, Fleet, Flinders, Franklin, Gairdner, Granger, Grout, Keel, Lockyer, Navigator, Oxford, Rosalind, Schooner, Scope, Shepherd, Stirling, Urambie, Westminster
          Simulation Urrbrae2020Base
            Weather: FileName=2020NPI_Urrbrae.met
            Clock: Start=2020-03-02; End=2020-11-11
            Summary
            SoilArbitrator
            Manager LocationInfo
              Country = Australia
              State = South Australia
              Region = SA VIC Mallee
              script: same as in Validation.Australia.NPIField2020.WaggaWagga2020.WaggaWagga2020Base.LocationInfo
            Zone Field: Area=1; Slope=0; AspectAngle=0; Altitude=50
              Soil: same as Validation.Australia.NPIField2019.WaggaWagga2019.WaggaWagga2019Base.Field.Soil
              Report DailyReport: EventNames=[Wheat].Harvesting
                VariableNames:
                  [Clock].Today
                  [Wheat].Phenology.FloweringDAS
                  [Wheat].Phenology.FlagLeafDAS
                  [Wheat].Phenology.TerminalSpikeletDAS
              Report HarvestReport: EventNames=[Clock].DoReport
                VariableNames:
                  [Clock].Today
                  [Wheat].Phenology.Stage
                  [Wheat].Phenology.Zadok.Stage
                  [Wheat].Phenology.FloweringDAS
                  [Wheat].Phenology.FlagLeafDAS
                  [Wheat].Phenology.TerminalSpikeletDAS
              Fertiliser
              SurfaceOrganicMatter: InitialResidueName=wheat_stubble; InitialResidueType=wheat; InitialResidueMass=500; InitialStandingFraction=0; InitialCPR=0; InitialCNR=100
              MicroClimate: a_interception=0; b_interception=1; c_interception=0; d_interception=0; SoilHeatFluxFraction=0.4; MinimumHeightDiffForNewLayer=0; NightInterceptionFraction=0.5; ReferenceHeight=2
              Plant Barley
              Manager Sowing
                SowDate =
                Treat =
                CultivarName =
                SowingDepth = 50
                RowSpacing = 250
                Population = 150
                FilePath = %root%\Tests\Validation\Barley\UrrbraeEmergenceDates.csv
                script: same as in Validation.Australia.NPIField2019.WaggaWagga2019.WaggaWagga2019Base.Field.Sowing
              Manager SowingFertiliser: same as Validation.Australia.NPIField2019.WaggaWagga2019.WaggaWagga2019Base.Field.SowingFertiliser
              Report SowingReport
              Operations Management
              Irrigation
              Manager HarvestAtFlowering: same as Validation.Australia.NPIField2019.WaggaWagga2019.WaggaWagga2019Base.Field.HarvestAtFlowering
        Experiment Dale2020
          Factors
            Permutation
              Factor TOS
                CompositeFactor 1
                  Specifications:
                    [Sowing].Script.SowDate = 4-Mar
                    [Clock].StartDate = 2020-03-04
                    [Sowing].Script.Treat = 1
                CompositeFactor 2
                  Specifications:
                    [Sowing].Script.SowDate = 18-Mar
                    [Clock].StartDate = 2020-03-18
                    [Sowing].Script.Treat = 2
                CompositeFactor 3
                  Specifications:
                    [Sowing].Script.SowDate = 1-Apr
                    [Clock].StartDate = 2020-04-01
                    [Sowing].Script.Treat = 3
                CompositeFactor 4
                  Specifications:
                    [Sowing].Script.SowDate = 15-Apr
                    [Clock].StartDate = 2020-04-15
                    [Sowing].Script.Treat = 4
                CompositeFactor 5
                  Specifications:
                    [Sowing].Script.SowDate = 5-May
                    [Clock].StartDate = 2020-05-05
                    [Sowing].Script.Treat = 5
                CompositeFactor 6
                  Specifications:
                    [Sowing].Script.SowDate = 19-May
                    [Clock].StartDate = 2020-05-19
                    [Sowing].Script.Treat = 6
                CompositeFactor 7
                  Specifications:
                    [Sowing].Script.SowDate = 2-Jun
                    [Clock].StartDate = 2020-06-02
                    [Sowing].Script.Treat = 7
                CompositeFactor 8
                  Specifications:
                    [Sowing].Script.SowDate = 16-Jun
                    [Clock].StartDate = 2020-06-16
                    [Sowing].Script.Treat = 8
              Factor Cv
                Specification=[Sowing].Script.CultivarName = Alestar, Banks, Bass, Baudin, Biere, Capstan, Cassiopee, Commander, Compass, CSIROB1, CSIROB3, Dash, Fathom, Fleet, Flinders, Franklin, Gairdner, Granger, Grout, Keel, Lockyer, Navigator, Oxford, Rosalind, Schooner, Scope, Shepherd, Stirling, Urambie, Westminster
          Simulation Dale2020Base
            Weather: FileName=2020NPI_Dale.met
            Clock: Start=2020-03-02; End=2020-11-11
            Summary
            SoilArbitrator
            Manager LocationInfo
              Country = Australia
              State = Western Australia
              Region = WA Central Zone
              script: same as in Validation.Australia.NPIField2020.WaggaWagga2020.WaggaWagga2020Base.LocationInfo
            Zone Field: Area=1; Slope=0; AspectAngle=0; Altitude=50
              Soil: same as Validation.Australia.NPIField2019.WaggaWagga2019.WaggaWagga2019Base.Field.Soil
              Report DailyReport: EventNames=[Wheat].Harvesting
                VariableNames:
                  [Clock].Today
                  [Wheat].Phenology.FloweringDAS
                  [Wheat].Phenology.FlagLeafDAS
                  [Wheat].Phenology.TerminalSpikeletDAS
              Report HarvestReport: EventNames=[Clock].DoReport
                VariableNames:
                  [Clock].Today
                  [Wheat].Phenology.Stage
                  [Wheat].Phenology.Zadok.Stage
                  [Wheat].Phenology.FloweringDAS
                  [Wheat].Phenology.FlagLeafDAS
                  [Wheat].Phenology.TerminalSpikeletDAS
              Fertiliser
              SurfaceOrganicMatter: InitialResidueName=wheat_stubble; InitialResidueType=wheat; InitialResidueMass=500; InitialStandingFraction=0; InitialCPR=0; InitialCNR=100
              Plant Barley
              MicroClimate: a_interception=0; b_interception=1; c_interception=0; d_interception=0; SoilHeatFluxFraction=0.4; MinimumHeightDiffForNewLayer=0; NightInterceptionFraction=0.5; ReferenceHeight=2
              Manager Sowing
                SowDate =
                Treat =
                CultivarName =
                SowingDepth = 50
                RowSpacing = 250
                Population = 150
                FilePath = %root%\Tests\Validation\Barley\DaleEmergenceDates2020.csv
                script: same as in Validation.Australia.NPIField2019.WaggaWagga2019.WaggaWagga2019Base.Field.Sowing
              Manager SowingFertiliser: same as Validation.Australia.NPIField2019.WaggaWagga2019.WaggaWagga2019Base.Field.SowingFertiliser
              Report SowingReport
              Operations Management
              Irrigation
              Manager HarvestAtFlowering: same as Validation.Australia.NPIField2019.WaggaWagga2019.WaggaWagga2019Base.Field.HarvestAtFlowering
        Experiment YanYean2020
          Factors
            Permutation
              Factor TOS
                CompositeFactor 1
                  Specifications:
                    [Sowing].Script.SowDate = 2-Mar
                    [Clock].StartDate = 2020-03-02
                    [Sowing].Script.Treat = 1
                CompositeFactor 2
                  Specifications:
                    [Sowing].Script.SowDate = 16-Mar
                    [Clock].StartDate = 2020-03-16
                    [Sowing].Script.Treat = 2
                CompositeFactor 3
                  Specifications:
                    [Sowing].Script.SowDate = 1-Apr
                    [Clock].StartDate = 2020-04-01
                    [Sowing].Script.Treat = 3
                CompositeFactor 4
                  Specifications:
                    [Sowing].Script.SowDate = 15-Apr
                    [Clock].StartDate = 2020-04-15
                    [Sowing].Script.Treat = 4
                CompositeFactor 5
                  Specifications:
                    [Sowing].Script.SowDate = 28-Apr
                    [Clock].StartDate = 2020-04-28
                    [Sowing].Script.Treat = 5
                CompositeFactor 6 (disabled)
                  Specifications:
                    [Sowing].Script.SowDate = 15-May
                    [Clock].StartDate = 2020-05-15
                    [Sowing].Script.Treat = 6
                CompositeFactor 7
                  Specifications:
                    [Sowing].Script.SowDate = 29-May
                    [Clock].StartDate = 2020-05-29
                    [Sowing].Script.Treat = 7
                CompositeFactor 8
                  Specifications:
                    [Sowing].Script.SowDate = 15-Jun
                    [Clock].StartDate = 2020-06-15
                    [Sowing].Script.Treat = 8
              Factor Cv
                Specification=[Sowing].Script.CultivarName = Alestar, Banks, Bass, Baudin, Biere, Capstan, Cassiopee, Commander, Compass, CSIROB1, CSIROB3, Dash, Fathom, Fleet, Flinders, Franklin, Gairdner, Granger, Grout, Keel, Lockyer, Navigator, Oxford, Rosalind, Schooner, Scope, Shepherd, Stirling, Urambie, Westminster
          Simulation YanYean2020Base
            Weather: FileName=2020NPI_YanYean.met
            Clock: Start=2020-03-02; End=2020-11-11
            Summary
            SoilArbitrator
            Manager LocationInfo
              Country = Australia
              State = Victoria
              Region =
              script: same as in Validation.Australia.NPIField2020.WaggaWagga2020.WaggaWagga2020Base.LocationInfo
            Zone Field: Area=1; Slope=0; AspectAngle=0; Altitude=50
              Soil: same as Validation.Australia.NPIField2019.WaggaWagga2019.WaggaWagga2019Base.Field.Soil
              Report DailyReport: EventNames=[Wheat].Harvesting
                VariableNames:
                  [Clock].Today
                  [Wheat].Phenology.FloweringDAS
                  [Wheat].Phenology.FlagLeafDAS
                  [Wheat].Phenology.TerminalSpikeletDAS
              Report HarvestReport: EventNames=[Clock].DoReport
                VariableNames:
                  [Clock].Today
                  [Wheat].Phenology.Stage
                  [Wheat].Phenology.Zadok.Stage
                  [Wheat].Phenology.FloweringDAS
                  [Wheat].Phenology.FlagLeafDAS
                  [Wheat].Phenology.TerminalSpikeletDAS
              Fertiliser
              SurfaceOrganicMatter: InitialResidueName=wheat_stubble; InitialResidueType=wheat; InitialResidueMass=500; InitialStandingFraction=0; InitialCPR=0; InitialCNR=100
              Plant Barley
              MicroClimate: a_interception=0; b_interception=1; c_interception=0; d_interception=0; SoilHeatFluxFraction=0.4; MinimumHeightDiffForNewLayer=0; NightInterceptionFraction=0.5; ReferenceHeight=2
              Manager Sowing
                SowDate =
                Treat =
                CultivarName =
                SowingDepth = 50
                RowSpacing = 250
                Population = 150
                FilePath = %root%\Tests\Validation\Barley\YanYeanEmergenceDates2020.csv
                script: same as in Validation.Australia.NPIField2019.WaggaWagga2019.WaggaWagga2019Base.Field.Sowing
              Manager SowingFertiliser: same as Validation.Australia.NPIField2019.WaggaWagga2019.WaggaWagga2019Base.Field.SowingFertiliser
              Report SowingReport
              Operations Management: same as Validation.Australia.NPIField2019.YanYean2019.YanYean2019Base.Field.Management
              Irrigation
              Manager HarvestAtFlowering: same as Validation.Australia.NPIField2019.WaggaWagga2019.WaggaWagga2019Base.Field.HarvestAtFlowering
      PredictedObserved AustraliaHarvestObsPred: PredictedTableName=HarvestReport; ObservedTableName=Observed; FieldNameUsedForMatch=SimulationName; FieldName2UsedForMatch=Barley.Phenology.CurrentStageName; AllColumns=false
      Folder ControlledEnvironment
        Experiment LaTrobeCE
          Factors
            Permutation
              Factor Treat
                CompositeFactor LN
                  Specifications:
                    [Weather]
                    [SowingRule].Script.SowDate=10-may
                    [SowingRule].Script.Treat=LN
                    [Clock].StartDate=2019-05-10
                    [Clock].EndDate=2019-11-06
                  Weather LN: FileName=LN.met
                CompositeFactor LV
                  Specifications:
                    [Weather]
                    [SowingRule].Script.SowDate=10-May
                    [SowingRule].Script.Treat=LV
                    [Clock].StartDate=2019-05-10
                    [Clock].EndDate=2019-10-07
                  Weather LV: FileName=LV.met
                CompositeFactor SN
                  Specifications:
                    [Weather]
                    [SowingRule].Script.SowDate=20-Nov
                    [SowingRule].Script.Treat=SN
                    [Clock].StartDate=2019-11-20
                    [Clock].EndDate=2020-05-18
                  Weather SN: FileName=SN.met
                CompositeFactor SV
                  Specifications:
                    [Weather]
                    [SowingRule].Script.SowDate=19-Nov
                    [SowingRule].Script.Treat=SV
                    [Clock].StartDate=2019-11-19
                    [Clock].EndDate=2020-07-28
                  Weather SV: FileName=SV.met
              Factor Cv
                Specification=[SowingRule].Script.CultivarName = Alestar, Banks, Bass, Baudin, Biere, Capstan, Cassiopee, Commander, Compass, CSIROB1, CSIROB3, Dash, Fathom, Fleet, Flinders, Franklin, Gairdner, Granger, Grout, Keel, Lockyer, Mundah, Navigator, Oxford, Planet, Rosalind, Schooner, Scope, Shepherd, Spartacus, Stirling, Unicorn, Urambie, Westminster, Yagan
              Factor Durat: Specification=[SowingRule].Script.TransitionWeek = 9
          Simulation CEBase
            Clock: Start=2000-01-01; End=2000-12-31
            Weather
            Summary SummaryFile
            SoilArbitrator
            Zone Field: Area=1; Slope=0; AspectAngle=0; Altitude=50
              Fertiliser
              Soil: ASCOrder=Vertosol; ASCSubOrder=Black; SoilType=Clay; Site=Norwin; NearestTown=Norwin; Region=Darling Downs and Granite Belt; State=Queensland; Country=Australia; NaturalVegetation=Qld. Bluegrass, possible Qld. Blue gum; ApsoilNumber=900; Latitude=-27.581836; Longitude=151.320206; LocationAccuracy=+/- 20m
                DataSource=CSIRO Sustainable Ecosystems, Toowoomba; Characteriesd as part of the GRDC funded project"Doing it better, doing it smarter, managing soil water in Australian agriculture' 2011
                Comments=OC, CLL for all crops estimated-based on Bongeen Mywybilla Soil No1
                Physical
                  Thickness  BD       AirDry    LL15      DUL       SAT       KS
                  150        1.01056  0.13025   0.2605    0.521     0.588655  20
                  150        1.07146  0.198689  0.248362  0.496723  0.565677  20
                  300        1.09394  0.28      0.28      0.488438  0.557193  20
                  300        1.15861  0.28      0.28      0.480297  0.532787  20
                  300        1.17301  0.28      0.28      0.471584  0.527354  20
                  300        1.16287  0.28      0.28      0.457071  0.53118   20
                  300        1.1875   0.28      0.28      0.452332  0.521888  20
                  SoilCrop BarleySoil: LL=[0.261, 0.248, 0.28, 0.306, 0.36, 0.392, 0.446]; KL=[0.06, 0.06, 0.06, 0.04, 0.04, 0.02, 0.01]; XF=[1, 1, 1, 1, 1, 1, 1]
                WaterBalance SoilWater: SummerDate=1-Nov; SummerU=5; SummerCona=5; WinterDate=1-Apr; WinterU=5; WinterCona=5; DiffusConst=40; DiffusSlope=16; Salb=0.12; CN2Bare=73; CNRed=20; CNCov=0.8; PSIDul=-100; Thickness=[150, 150, 300, 300, 300, 300, 300]; SWCON=[0.3, 0.3, 0.3, 0.3, 0.3, 0.3, 0.3]
                Organic: FOMCNRatio=40; CarbonUnits=Total
                  Thickness  Carbon  SoilCNRatio  FBiom  FInert  FOM
                  150        1.2     12           0.04   0.4     347.129
                  150        0.96    12           0.02   0.6     270.344
                  300        0.6     12           0.02   0.8     163.972
                  300        0.3     12           0.02   1       99.4541
                  300        0.18    12           0.01   1       60.322
                  300        0.12    12           0.01   1       36.5871
                  300        0.12    12           0.01   1       22.1912
                Chemical: Thickness=[150, 150, 300, 300, 300, 300, 300]; PH=[8, 8, 8, 8, 8, 8, 8]; PHUnits=Water
                Water: Thickness=[150, 150, 300, 300, 300, 300, 300]; InitialPAWmm=361.245; RelativeTo=LL15; FilledFromTop=false
                  InitialValues=[0.521, 0.496723, 0.488438, 0.480297, 0.471584, 0.457071, 0.452332]
                CERESSoilTemperature Temperature
                SoilNitrogen: fom_types=[default, manure, mucuna, lablab, shemp, stable]; fract_carb=[0.2, 0.3, 0.54, 0.57, 0.45, 0]; fract_cell=[0.7, 0.3, 0.37, 0.37, 0.47, 0.1]; fract_lign=[0.1, 0.4, 0.09, 0.06, 0.08, 0.9]; NPartitionApproach=0
                SoilNitrogenNO3 NO3: Thickness=[150, 150, 300, 300, 300, 300, 300]; InitialValues=[1, 1, 1, 1, 1, 1, 1]; InitialValuesUnits=ppm; WaterTableConcentration=0; D0=0; DepthConstant=0; MaxDepthSoluteAccessible=0; RunoffEffectivenessAtMovingSolute=0; MaxEffectiveRunoff=0
                SoilNitrogenNH4 NH4: Thickness=[150, 150, 300, 300, 300, 300, 300]; InitialValues=[0.1, 0.1, 0.1, 0.1, 0.1, 0.1, 0.1]; InitialValuesUnits=ppm; WaterTableConcentration=0; D0=0; DepthConstant=0; MaxDepthSoluteAccessible=0; RunoffEffectivenessAtMovingSolute=0; MaxEffectiveRunoff=0
                SoilNitrogenUrea Urea: same as Validation.Australia.MCVP.Gatton2011.Gatton2011Base.Field.APS6Field.Urea
              SurfaceOrganicMatter: InitialResidueName=wheat_stubble; InitialResidueType=wheat; InitialResidueMass=500; InitialStandingFraction=0; InitialCPR=0; InitialCNR=100
              Plant Barley
              MicroClimate: a_interception=0; b_interception=1; c_interception=0; d_interception=0; SoilHeatFluxFraction=0.4; MinimumHeightDiffForNewLayer=0; NightInterceptionFraction=0.5; ReferenceHeight=2
              Manager SowingFertiliser
                Amount = 160
                CropName = barley
                script: same as in Validation.Australia.NPIField2019.WaggaWagga2019.WaggaWagga2019Base.Field.SowingFertiliser
              Manager HarvestAtFlowering: same as Validation.Australia.NPIField2019.WaggaWagga2019.WaggaWagga2019Base.Field.HarvestAtFlowering
              Manager SowingRule
                SowDate =
                Treat =
                CultivarName =
                TransitionWeek = 0
                SowingDepth = 25
                RowSpacing = 750
                Population = 6
                FilePath = %root%\Tests\Validation\Barley\LaTrobeEmergenceDates.csv
```csharp
using Newtonsoft.Json;
using System.Globalization;
using System.Data;
using System.Xml.Serialization;
using Models;
using System.Text;
using System.Collections.Generic;
using Models.Interfaces;
using System;
using Models.Core;
using Models.PMF;
using Models.Soils;
using Models.Utilities;
using APSIM.Shared.Utilities;

namespace Models
{
    [Serializable]
    public class Script : Model
    {
        [Link] Clock Clock;
        [Link] Fertiliser Fertiliser;
        [Link] Summary Summary;
        [Link] Soil Soil;
        [Link] Plant Barley;
        [Link] Simulation Simulation;
        Accumulator accumulatedRain;
        
        [Description("Sowing date (d-mmm)")]
        public string SowDate { get; set; }
        [Description("Treatment Name")]
        public string Treat { get; set; }
        [Display(Type = DisplayType.CultivarName)]
        [Description("Cultivar to be sown")]
        public string CultivarName { get; set; }
        [Description("Sowing depth (mm)")]
        public double SowingDepth { get; set; }
        [Description("Row spacing (mm)")]
        public double RowSpacing { get; set; }
        [Description("Plant population (/m2)")]
        public double Population { get; set; }
        [Description("Treatment duration (Weeks)")]
        public double TransitionWeek { get; set; }
        [Description("Emergence Date File Path")]
        public string FilePath {get; set;}

        private DateTime EmergenceDate {get; set;}
        private string EmergenceString {get; set;}

        [JsonIgnore] private DataTable EmergDates{ get; set; }

        [EventSubscribe("StartOfSimulation")]
        private void OnStartOfSimulation(object sender, EventArgs e)
        {
            
            string fullFileName = PathUtilities.GetAbsolutePath(FilePath, Simulation.FileName);
            
            ApsimTextFile textFile = new ApsimTextFile();
            textFile.Open(fullFileName);
            EmergDates = textFile.ToTable();
            textFile.Close();
        }

        [EventSubscribe("DoManagement")]
        private void OnDoManagement(object sender, EventArgs e)
        {
            if (DateUtilities.WithinDates(SowDate, Clock.Today, SowDate))
            {
                foreach (DataRow row in EmergDates.Rows)
                {
                    string Env = Convert.ToString(row["Environment"]);
                    if (Env == Treat)
                    {                        
                        EmergenceDate = Convert.ToDateTime(row[CultivarName]);
                        EmergenceString = EmergenceDate.ToString("dd-MMM", CultureInfo.InvariantCulture);
                    }
                }

                Barley.Sow(population: Population, cultivar: CultivarName, depth: SowingDepth, rowSpacing: RowSpacing);    
                Barley.Phenology.SetEmergenceDate(EmergenceString);
            }
        
        }
        
    }
}
```
              Report DailyReport
              Report HarvestReport: VariableNames=[
              Report SowingReport
  Folder Sensibility tests
    Experiment WaterByNFactorial
      Memo Experimental Details
        This is a hypothetical experiment with Barley sown on the 15th of October every year for 20 years at Lincoln, New Zealand.  The treatments applied are as follows:

        - Two water treatments; Dry (nil irrigation) and Wet, with irrigation applied when soil water deficit reaches 60% to return water content to 100% of capacity.
        - five fertiliser N treatments; 0, 50, 100, 200 and 400 kg N/ha with half of the N applied at sowing and the other half applied at growth stage 32.
      Factors
        Permutation
          Factor Irrigation
            CompositeFactor Dry: Specifications=[AutoIrrigation].Script.AutoIrrigationOn = false
            CompositeFactor Wet: Specifications=[AutoIrrigation].Script.AutoIrrigationOn = true
          Factor Nitrogen
            CompositeFactor 0
              Specifications:
                [FertiliseAtSowing].Script.Amount = 0
                [FertiliseOnZadokStage].Script.Amount = 0
            CompositeFactor 50
              Specifications:
                [FertiliseAtSowing].Script.Amount = 25
                [FertiliseOnZadokStage].Script.Amount = 25
            CompositeFactor 100
              Specifications:
                [FertiliseAtSowing].Script.Amount = 50
                [FertiliseOnZadokStage].Script.Amount = 50
            CompositeFactor 200
              Specifications:
                [FertiliseAtSowing].Script.Amount = 100
                [FertiliseOnZadokStage].Script.Amount = 100
            CompositeFactor 400
              Specifications:
                [FertiliseAtSowing].Script.Amount = 200
                [FertiliseOnZadokStage].Script.Amount = 200
      Simulation SensibilityBase
        Weather: FileName=lincoln.met
        Clock: Start=1990-10-01; End=2010-05-30
        Summary summaryfile
        SoilArbitrator Soil Arbitrator
        Zone Paddock: Area=1; Slope=0; AspectAngle=0; Altitude=50
          Soil: SoilType=NZ_sedementary; Region=Plains; State=Canterbury; Country=New Zealnd; Latitude=0; Longitude=0
            Chemical: Thickness=[150, 150, 300, 300, 300, 300]; PH=[6.6, 6.2, 5.7, 5.5, 5.5, 5.5]; PHUnits=Water
            Physical: same as Validation.NewZealand.MCPD11_12.Field11_12.Paddock.Soil.Physical
            WaterBalance SoilWater: same as Validation.NewZealand.MCPD10_11.Field10_11.Paddock.Soil.SoilWater
            SoilNitrogen: fom_types=[default, manure, mucuna, lablab, shemp, stable]; fract_carb=[0.2, 0.3, 0.54, 0.57, 0.45, 0]; fract_cell=[0.7, 0.3, 0.37, 0.37, 0.47, 0.1]; fract_lign=[0.1, 0.4, 0.09, 0.06, 0.08, 0.9]; NPartitionApproach=0
            Organic: FOMCNRatio=31.5; CarbonUnits=Total
              Thickness  Carbon  SoilCNRatio  FBiom  FInert  FOM
              150        2       11           0.025  0.45    0
              150        1.5     11           0.025  0.6     0
              300        1       11           0.015  0.75    0
              300        0.38    11           0.01   0.9     0
              300        0.24    11           0.01   0.96    0
              300        0.24    11           0.01   0.96    0
            CERESSoilTemperature Temperature
            Water: Thickness=[200, 200, 200, 200, 200, 200, 200, 200]; InitialValues=[0.2825, 0.2825, 0.2625, 0.2725, 0.28, 0.3, 0.325, 0.3175]; InitialPAWmm=160.5; RelativeTo=LL15; FilledFromTop=false
            SoilNitrogenNO3 NO3: Thickness=[150, 150, 300, 300, 300, 300]; InitialValuesUnits=ppm; WaterTableConcentration=0; D0=0; DepthConstant=0; MaxDepthSoluteAccessible=0; RunoffEffectivenessAtMovingSolute=0; MaxEffectiveRunoff=0
              InitialValues=[0.542005, 0.542005, 0.275482, 0.277778, 0.277778, 0.277778]
            SoilNitrogenNH4 NH4: Thickness=[150, 150, 300, 300, 300, 300]; InitialValuesUnits=ppm; WaterTableConcentration=0; D0=0; DepthConstant=0; MaxDepthSoluteAccessible=0; RunoffEffectivenessAtMovingSolute=0; MaxEffectiveRunoff=0
              InitialValues=[0.0542005, 0.0542005, 0.0275482, 0.0277778, 0.0277778, 0.0277778]
            SoilNitrogenUrea Urea: same as Validation.NewZealand.MCPD09_10.Ablock.Paddock.Soil.Urea
          Plant Barley
          SurfaceOrganicMatter Surface Organic Matter: InitialResidueName=Barley_stubble; InitialResidueType=Barley; InitialResidueMass=0; InitialStandingFraction=0; InitialCPR=0; InitialCNR=80
          MicroClimate: a_interception=0; b_interception=1; c_interception=0; d_interception=0; SoilHeatFluxFraction=0.4; MinimumHeightDiffForNewLayer=0; NightInterceptionFraction=0.5; ReferenceHeight=2
          Irrigation
          Fertiliser
          Report SensibilityReport: EventNames=[Barley].Harvesting
            VariableNames:
              [Clock].Today
              [Barley].Grain.Wt
          Manager Sow
            Crop = .Simulations.Sensibility tests.WaterByNFactorial.SensibilityBase.Paddock.Barley
            SowDate = 28-May
            CultivarName = Dash
            SowingDepth = 20
            RowSpacing = 150
            Population = 300
```csharp
using APSIM.Shared.Utilities;
using Models.Utilities;
using Models.Soils;
using Models.PMF;
using Models.Core;
using System;

namespace Models
{
    [Serializable]
    public class Script : Model
    {
        [Link] Clock Clock;
        [Link] Fertiliser Fertiliser;
        [Link] Summary Summary;
        [Link] Soil Soil;
        Accumulator accumulatedRain;
        
        [Description("Crop")]
        public IPlant Crop { get; set; }
        [Description("Sowing date (d-mmm)")]
        public string SowDate { get; set; }
    [Display(Type = DisplayType.CultivarName)]
        [Description("Cultivar to be sown")]
        public string CultivarName { get; set; }
        [Description("Sowing depth (mm)")]
        public double SowingDepth { get; set; }
        [Description("Row spacing (mm)")]
        public double RowSpacing { get; set; }
        [Description("Plant population (/m2)")]
        public double Population { get; set; }
        


        [EventSubscribe("DoManagement")]
        private void OnDoManagement(object sender, EventArgs e)
        {
            if (DateUtilities.WithinDates(SowDate, Clock.Today, SowDate))
            {
                Crop.Sow(population: Population, cultivar: CultivarName, depth: SowingDepth, rowSpacing: RowSpacing);    
            }
        
        }
        
    }
}
```
          Manager FertiliseAtSowing
            CumulativeSowFert = 0
            FertiliserType = UreaN
            Amount = 0
```csharp
using Models.Soils;
using System;
using Models.Core;
using Models.PMF;
namespace Models
{
    [Serializable]
    public class Script : Model
    {
        [Link] Clock Clock;
        [Link] Fertiliser Fertiliser;
        [Link] Summary Summary; 

        public double CumulativeSowFert  {get; set;} 

        [Description("Type of fertiliser to apply? ")] public Fertiliser.Types FertiliserType { get; set; }

       [Description("Amount of fertiliser to be applied (kg/ha)")]
        public double Amount { get; set; }
        
        [EventSubscribe("Sowing")]
        private void OnSowing(object sender, EventArgs e)
        {
                Fertiliser.Apply(Amount: Amount, Type: FertiliserType);
                CumulativeSowFert += Amount;
                Summary.WriteMessage(this, "Fertilising!! applying " + Amount.ToString(), MessageType.Diagnostic); 
        }
        
    }
}
```
          Manager FertiliseOnZadokStage
            Stage = 32
            CumulativeGS30Fert = 0
            FertiliserType = UreaN
            Amount = 0
```csharp
using Models.Soils;
using System;
using Models.Core;
using Models.PMF;
namespace Models 
{ 
  [Serializable] 
  public class Script : Model 
  { 
    [Link] Clock Clock; 
    [Link] Fertiliser Fertiliser; 
    [Link] Summary Summary; 
    [Link] Plant Wheat; 
 
    private bool hasFertilised = false; 

    [Description("Fertilise once crop reaches stage:")]
    public double Stage {get; set;}

    public double CumulativeGS30Fert {get; set;}

    [Description("Type of fertiliser to apply? ")] public Fertiliser.Types FertiliserType { get; set; }

    [Description("Amount of fertiliser to be applied (kg/ha)")] 
    public double Amount { get; set;} 
     
    [EventSubscribe("DoManagement")] 
    private void OnDoManagement(object sender, EventArgs e) 
    { 
      double zadok = (double)Wheat.FindByPath("Phenology.Zadok.Stage").Value; 
 
      if(zadok >= Stage && !hasFertilised) 
      { 
         Summary.WriteMessage(this, "Fertilising!! applying " + Amount.ToString(), MessageType.Diagnostic); 
         Fertiliser.Apply(Amount: Amount, Type: FertiliserType);
         hasFertilised = true; 
         CumulativeGS30Fert += Amount;
      } 
    }

    [EventSubscribe("Sowing")]
    private void OnSowing(object sender, EventArgs e)
    {
        hasFertilised = false;
    }
  } 
}
```
          Manager AutoIrrigation
            AutoIrrigationOn = False
            FASW = 0
            WaterDeficit = 0
            FASWThreshold = 0.9
            FASWDepth = 600
```csharp
using Models.Interfaces;
using System;
using Models.Core;
using System.Collections.Generic;
using System.Text;
using Models.Soils;
using Models.PMF;
using Models;
using System.Xml.Serialization;
using APSIM.Shared.Utilities;

namespace Models
{
    [Serializable] 
    public class Script : Model
    {
        [Link] private Zone zone;
        [Link] private Irrigation irrigation;
        [Link] private Soil soil;
        [Link]
        private IPhysical soilPhysical;
        [Link]
        private ISoilWater waterBalance;
        public double FASW { get; set; }
        public double WaterDeficit  { get; set; }
    
        
        [Description("Auto irrigation on?")]
        public bool AutoIrrigationOn { get; set; }

        [Description("Threshold fraction available water (0-1)")]
        public double FASWThreshold { get; set; }

        [Description("Soil depth (mm) to which fraction available water is calculated")]
        public double FASWDepth { get; set; }

        [EventSubscribe("DoManagement")]
        private void OnDoManagement(object sender, EventArgs e)
        {
            CalculateFASW();
            if (AutoIrrigationOn)
            {
                if (FASW < FASWThreshold)
                {
                    double amount = 10;
                    irrigation.Apply(WaterDeficit, depth: 0);
                }
            }
        }
        
        private void CalculateFASW()
        {
            double[] LL15 = MathUtilities.Multiply(soilPhysical.LL15, soilPhysical.Thickness);
            double[] DUL = MathUtilities.Multiply(soilPhysical.DUL, soilPhysical.Thickness);
        
            int nlayr = GetLayerIndex();
            double cumdep = MathUtilities.Sum(soilPhysical.Thickness, 0, nlayr, 0.0);

            double excess_fr = MathUtilities.Divide((cumdep - FASWDepth), soilPhysical.Thickness[nlayr], 0.0);

            // note that results may be strange if swdep < ll15
            double avail_sw = (MathUtilities.Sum(waterBalance.SWmm, 0, nlayr, 0.0)
                              - excess_fr * waterBalance.SWmm[nlayr])
                              - (MathUtilities.Sum(LL15, 0, nlayr, 0.0)
                              - excess_fr * LL15[nlayr]);


            double pot_avail_sw = (MathUtilities.Sum(DUL, 0, nlayr, 0.0)
                                  - excess_fr * DUL[nlayr])
                                  - (MathUtilities.Sum(LL15, 0, nlayr, 0.0)
                                  - excess_fr * LL15[nlayr]);

            FASW = MathUtilities.Divide(avail_sw, pot_avail_sw, 0.0);
            WaterDeficit = MathUtilities.Constrain(pot_avail_sw - avail_sw, 0.0, 100000);
        }

        private int GetLayerIndex()
        {
            double[] cumThickness = soilPhysical.ThicknessCumulative;
            for (int i = 1; i < cumThickness.Length; i++)
            {
                if (FASWDepth < cumThickness[i])
                    return i - 1;
            }
            
            return cumThickness.Length - 1;
        }

    }
}
```
          Manager Harvesting
            Crop = .Simulations.Sensibility tests.WaterByNFactorial.SensibilityBase.Paddock.Barley
```csharp
using APSIM.Shared.Utilities;
using Models.Utilities;
using Models.Soils;
using Models.PMF;
using Models.Core;
using System;

namespace Models
{
    [Serializable] 
    public class Script : Model
    {
        [Description("Crop")]
        public IPlant Crop { get; set; }
        
        [EventSubscribe("DoManagement")]
        private void OnDoManagement(object sender, EventArgs e)
        {
            if (Crop.IsReadyForHarvesting)
            {
                Crop.Harvest();
                Crop.EndCrop();
            }
        }
    }
}
```
      Memo Interpretation
        The results for irrigted, High N treatments the range of yields are inline with expectations for the location of the simulations.  There is no sensitivity to irrigation with zero nitrogen as N supply is the factor limiting production.  As N inputs increase the crop becomes increasingly sensitive to water application and the crop is more responsive to nitrogen with irrigation.  These results show the model is giving sensible predictions
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