Simulations: Version=222
  DataStore
    ExcelInput: FileNames=[CLEM Benchmark Oct 2026.xlsx]
      SheetNames=[obs_ReportExample, obs_Report, obs_ReportActivitiesPerformed, obs_HerdSummary, obs_ReportResourceBalances, obs_ReportResourceShortfalls, obs_GrazeFoodStoreLedger, obs_AnimalFoodLedger, obs_HerdLedger, obs_ReportPasturePoolDetails, obs_ReportGrazingEfficiency, obs_IndGrowth, obs_IndEnergy, obs_FatProteinGrowth, obs_IndBreedStatus]
    PredictedObserved Oct2026_ReportExample: PredictedTableName=ReportExample; ObservedTableName=obs_ReportExample; FieldNameUsedForMatch=SimulationName; FieldName2UsedForMatch=Date; AllColumns=false
      Tests: POName=Oct2026_ReportExample
        AcceptedStats:
          Name                    n     RMSE         ME            MAE          RMR          Slope  Intercept     R2  NSE  RSR          SEslope      SEintercept
          GlfNitrogen             1826  0            0             0            0            -      -             -   -    -            -            -
          GlfTemp                 1826  2.32843e-15  -3.99119e-17  1.72854e-15  1.85603e-15  1      -3.9968e-15   1   1    4.36525e-15  -            -
          GlfWater                1826  2.99765e-16  -1.03605e-16  1.23061e-16  1.49927e-16  1      0             1   1    3.01526e-14  0            0
          GrossPrimaryProduction  1826  9.56719e-14  2.37526e-15   3.70822e-14  3.40548e-15  1      2.84217e-14   1   1    2.13011e-15  -            -
          HarvestedWt             1826  1.52992e-14  -8.50361e-16  7.50233e-15  1.03204e-15  1      8.34888e-14   1   1    6.26398e-16  -            -
          HerbageMass             1826  1.42833e-12  2.92817e-14   6.53836e-13  1.74161e-15  1      1.13687e-13   1   1    9.88267e-16  4.53575e-10  7.53575e-07
          LAIGreen                1826  1.50964e-15  -3.23916e-17  9.04488e-16  1.2505e-15   1      8.88178e-16   1   1    7.2315e-16   7.08202e-10  1.70749e-09
          LAITotal                1826  3.07169e-15  2.29189e-16   1.10475e-15  2.37042e-15  1      -8.88178e-16  1   1    1.34424e-15  4.57494e-10  1.20156e-09
          NDemand                 1826  1.23721e-15  -2.33179e-17  4.71131e-16  1.66394e-15  1      3.33067e-16   1   1    7.22909e-16  -            -
          NetGrowthWt             1826  7.35382e-14  -2.92041e-16  2.07814e-14  5.15675e-15  1      3.55271e-15   1   1    1.75129e-15  6.29828e-10  2.79237e-08
          NettPrimaryProduction   1826  1.74718e-14  -5.22946e-16  9.09842e-15  4.85464e-15  1      3.10862e-15   1   1    8.14446e-16  2.75667e-10  5.99477e-09
          NitrogenFixed           1826  8.43728e-17  -5.60255e-19  2.19371e-17  3.44522e-15  1      -1.04083e-17  1   1    1.02886e-15  -            -
          NitrogenUptake          1826  1.22406e-15  -4.5662e-17   4.60953e-16  1.65321e-15  1      0             1   1    7.18818e-16  -            -
          StandingBiomass         1826  1.42833e-12  2.92817e-14   6.53836e-13  1.74161e-15  1      1.13687e-13   1   1    9.88267e-16  4.53575e-10  7.53575e-07
          WaterDemand             1826  1.34066e-15  -3.86881e-18  6.3586e-16   1.74803e-15  1      -1.11022e-16  1   1    9.67387e-16  -            -
          WaterUptake             1826  1.32723e-15  -3.60247e-17  6.34744e-16  1.74004e-15  1      -1.11022e-16  1   1    9.705e-16    -            -
        AcceptedStatsName=Name n Slope Intercept SEslope SEintercept R2 RMSE NSE ME MAE RSR RMR
    PredictedObserved Oct2026_Report: PredictedTableName=Report; ObservedTableName=obs_Report; FieldNameUsedForMatch=SimulationName; FieldName2UsedForMatch=Date; AllColumns=false
      Tests: POName=Oct2026_Report
        AcceptedStats:
          {Name=HarvestedWt, n=1826, Slope=1, Intercept=-1.81899e-12, R2=1, RMSE=8.17739e-12, NSE=1, ME=1.56712e-13, MAE=2.54154e-12, RSR=1.89986e-15, RMR=3.4542e-15}
        AcceptedStatsName=Name n Slope Intercept SEslope SEintercept R2 RMSE NSE ME MAE RSR RMR
    PredictedObserved Oct2026_ReportActivitiesPerforme: PredictedTableName=ReportActivitiesPerformed; ObservedTableName=obs_ReportActivitiesPerformed; FieldNameUsedForMatch=SimulationName; FieldName2UsedForMatch=Date; AllColumns=false
      Tests: POName=Oct2026_ReportActivitiesPerforme
        AcceptedStats:
          {Name=Type, n=5417, Slope=0.0554189, Intercept=0.118574, SEslope=0.0135685, SEintercept=0.00679865, R2=0.00307125, RMSE=0.666728, NSE=-0.889162, ME=0, MAE=0.222263, RSR=1.37434, RMR=5.31127}
        AcceptedStatsName=Name n Slope Intercept SEslope SEintercept R2 RMSE NSE ME MAE RSR RMR
    PredictedObserved Oct2026_HerdSummary: PredictedTableName=HerdSummary; ObservedTableName=obs_HerdSummary; FieldNameUsedForMatch=SimulationName; FieldName2UsedForMatch=Clock.Today; AllColumns=false
      Tests: POName=Oct2026_HerdSummary
        AcceptedStats:
          Name        n    Slope      Intercept  SEslope    SEintercept  R2           RMSE     NSE        ME            MAE       RSR      RMR
          AE          778  0.0833017  3.58312    0.0357731  0.209977     0.00693918   5.9292   -0.833397  -7.21645e-16  3.97394   1.35316  1.51691
          AgeGroup    778  0.0229714  1.96536    0.0358884  0.118002     0.000527683  3.63573  -0.954057  0             2.49357   1.39698  1.80741
          AvgIntake   778  0.253576   12.3545    0.0347246  1.73063      0.0643007    57.438   -0.492848  5.89075e-15   39.6616   1.22104  3.47025
          AvgWt       778  0.056175   234.509    0.0358412  12.4478      0.00315563   333.396  -0.88765   -7.87259e-15  242.663   1.37303  1.34181
          AvgWtGn     778  0.294224   4.92958    0.0343089  0.466337     0.086568     13.8536  -0.411551  6.55288e-16   8.65045   1.18732  1.98344
          Births      778  0.316879   0.122927   0.0340479  0.0424262    0.100413     1.44122  -0.366241  0             0.236504  1.16811  8.00908
          NoPregnant  778  0.148639   1.8603     0.0354991  0.151618     0.0220937    4.78859  -0.702721  0             2.78663   1.30404  2.19148
          Num         778  0.162188   4.92457    0.0354226  0.22148      0.026305     2.75942  -0.675624  0             1.72751   1.29363  0.469457
        AcceptedStatsName=Name n Slope Intercept SEslope SEintercept R2 RMSE NSE ME MAE RSR RMR
    PredictedObserved Oct2026_ReportResourceBalances: PredictedTableName=ReportResourceBalances; ObservedTableName=obs_ReportResourceBalances; FieldNameUsedForMatch=SimulationName; FieldName2UsedForMatch=Date; AllColumns=false
      Tests: POName=Oct2026_ReportResourceBalances
        AcceptedStats:
          Name               n   Slope  Intercept    SEslope      SEintercept  R2  RMSE         NSE  ME           MAE          RSR          RMR
          Bos_indicus.Count  60  1      0            0            0            1   0            1    0            0            0            0
          FieldLink_Amount   60  1      1.7053e-13   1.64786e-09  1.6153e-06   1   9.86282e-13  1    1.06818e-13  3.70666e-13  1.10145e-15  2.37518e-15
          Hay_Amount         60  1      2.72848e-12  4.15359e-09  1.16692e-05  1   2.12329e-12  1    2.74743e-13  1.5973e-12   1.49423e-15  8.73604e-16
        AcceptedStatsName=Name n Slope Intercept SEslope SEintercept R2 RMSE NSE ME MAE RSR RMR
    PredictedObserved Oct2026_ReportResourceShortFalls: PredictedTableName=ReportResourceShortfalls; ObservedTableName=obs_ReportResourceShortfalls; FieldNameUsedForMatch=SimulationName; FieldName2UsedForMatch=Date; AllColumns=false
      Tests: POName=Oct2026_ReportResourceShortFalls
        AcceptedStats:
          Name       n   Slope  Intercept    SEslope  SEintercept  R2  RMSE        NSE  ME           MAE          RSR          RMR
          Available  57  1      0            0        0            1   0           1    0            0            0            0
          Required   57  1      2.27374e-13  -        -            1   1.3144e-12  1    1.79506e-13  6.80127e-13  1.78908e-15  1.63242e-15
        AcceptedStatsName=Name n Slope Intercept SEslope SEintercept R2 RMSE NSE ME MAE RSR RMR
    PredictedObserved Oct2026_GrazeFoodStoreLedger: PredictedTableName=GrazeFoodStoreLedger; ObservedTableName=obs_GrazeFoodStoreLedger; FieldNameUsedForMatch=SimulationName; FieldName2UsedForMatch=Date; AllColumns=false
      Tests: POName=Oct2026_GrazeFoodStoreLedger
        AcceptedStats:
          Name  n   RMSE         ME           MAE          Slope  Intercept     R2  NSE  RSR          RMR
          Gain  55  0            0            0            -      -             -   -    -            -
          Loss  55  1.32046e-12  4.13807e-13  5.97524e-13  1      -5.68434e-14  1   1    1.81182e-15  2.88622e-15
        AcceptedStatsName=Name n Slope Intercept SEslope SEintercept R2 RMSE NSE ME MAE RSR RMR
    PredictedObserved Oct2026_AnimalFoodLedger: PredictedTableName=AnimalFoodLedger; ObservedTableName=obs_AnimalFoodLedger; FieldNameUsedForMatch=SimulationName; FieldName2UsedForMatch=Date; AllColumns=false
      Tests: POName=Oct2026_AnimalFoodLedger
        AcceptedStats:
          Name  n   Slope  Intercept     SEslope      SEintercept  R2  RMSE         NSE  ME            MAE          RSR          RMR
          Gain  87  1      2.27374e-13   2.39819e-09  1.23738e-06  1   8.26273e-13  1    -8.00381e-15  2.94181e-13  1.96278e-15  2.73847e-15
          Loss  87  1      -5.68434e-14  2.79217e-09  1.07072e-06  1   5.25983e-13  1    -1.55023e-14  1.72342e-13  1.84008e-15  2.04303e-15
        AcceptedStatsName=Name n Slope Intercept SEslope SEintercept R2 RMSE NSE ME MAE RSR RMR
    PredictedObserved Oct2026_HerdLedger: PredictedTableName=HerdLedger; ObservedTableName=obs_HerdLedger; FieldNameUsedForMatch=SimulationName; FieldName2UsedForMatch=Date; AllColumns=false
      Tests: POName=Oct2026_HerdLedger
        AcceptedStats:
          Name  n    Slope     Intercept  SEslope    SEintercept  R2        RMSE     NSE       ME  MAE      RSR       RMR
          Age   667  0.74244   109.908    0.0259781  21.7564      0.551218  517.203  0.484881  0   126.657  0.71718   1.21202
          uID   667  0.883002  2.82374    0.0182014  0.506354     0.779692  6.69288  0.766004  0   4.30285  0.483369  0.277311
        AcceptedStatsName=Name n Slope Intercept SEslope SEintercept R2 RMSE NSE ME MAE RSR RMR
    PredictedObserved Oct2026_ReportPasturePoolDetails: PredictedTableName=ReportPasturePoolDetails; ObservedTableName=obs_ReportPasturePoolDetails; FieldNameUsedForMatch=SimulationName; FieldName2UsedForMatch=Date; AllColumns=false
      Tests: POName=Oct2026_ReportPasturePoolDetails
        AcceptedStats:
          Name                  n   Slope  Intercept     SEslope      SEintercept  R2  RMSE         NSE  ME            MAE          RSR          RMR
          FieldLink.Amount      60  1      2.27374e-13   2.4644e-09   4.06398e-06  1   1.44105e-12  1    -4.9738e-15   6.22435e-13  9.82561e-16  1.85374e-15
          FieldLink.Consumable  60  1      0             2.02299e-09  3.28912e-06  1   1.44334e-12  1    -6.87522e-15  6.03853e-13  9.89411e-16  1.94466e-15
          FieldLink.Consumed    60  1      -5.68434e-14  -            -            1   1.22205e-12  1    1.94436e-13   5.68244e-13  1.63039e-15  2.70821e-15
          FieldLink.DMD         55  1      1.42109e-14   -            -            1   3.17186e-14  1    0             2.7905e-14   9.81318e-15  3.79326e-16
          FieldLink.Nitrogen    55  1      3.22409e-13   3.18624e-08  1.44289e-07  1   2.94149e-15  1    -1.00929e-15  2.54342e-15  6.07086e-15  6.53229e-16
        AcceptedStatsName=Name n Slope Intercept SEslope SEintercept R2 RMSE NSE ME MAE RSR RMR
    PredictedObserved Oct2026_ReportGrazingEfficiency: PredictedTableName=ReportGrazingEfficiency; ObservedTableName=obs_ReportGrazingEfficiency; FieldNameUsedForMatch=SimulationName; FieldName2UsedForMatch=Date; AllColumns=false
      Tests: POName=Oct2026_ReportGrazingEfficiency
        AcceptedStats:
          Name                n   Slope  Intercept    SEslope      SEintercept  R2  RMSE         NSE  ME            MAE          RSR          RMR
          BiomassLimiter      60  1      0            0            0            1   2.23773e-17  1    1.80411e-17   1.80411e-17  5.39385e-17  5.71397e-17
          CombinedLimiter     60  1      5.55112e-17  1.72001e-09  8.36119e-10  1   5.65706e-16  1    -1.13625e-16  1.42436e-16  1.35051e-15  2.24025e-15
          GrazingTimeLimiter  60  -      -            -            -            -   0            -    0             0            -            0
          PropDietGreen       60  1      0            0            0            1   0            1    0             0            0            0
          QualityLimiter      60  1      5.55112e-17  -            -            1   5.66401e-16  1    -1.06007e-16  1.45602e-16  1.35619e-15  2.21995e-15
          ShortfallLimiter    60  -      -            -            -            -   0            -    0             0            -            0
        AcceptedStatsName=Name n Slope Intercept SEslope SEintercept R2 RMSE NSE ME MAE RSR RMR
    PredictedObserved Oct2026_IndGrowth: PredictedTableName=IndGrowth; ObservedTableName=obs_IndGrowth; FieldNameUsedForMatch=SimulationName; FieldName2UsedForMatch=Date; AllColumns=false
      Tests: POName=Oct2026_IndGrowth
        AcceptedStats:
          Name         n   Slope  Intercept     SEslope      SEintercept  R2  RMSE         NSE   ME            MAE          RSR          RMR
          Age          50  1      0             0            0            1   0            1     0             0            0            0
          DMD          50  1      -3.97904e-13  0            0            1   2.94511e-14  1     -3.55271e-15  2.40163e-14  2.97643e-15  4.41685e-16
          EBM          50  1      1.02432e-10   3.68027e-08  1.93332e-05  1   2.99171e-13  1     1.7053e-14    2.58069e-13  1.23724e-14  5.70093e-16
          EBMChange    50  1      -1.77636e-15  2.19814e-09  1.98802e-08  1   1.58136e-14  1     -8.43769e-16  9.04166e-15  1.76768e-15  8.6182e-15
          Gutfill      50  1      0             -            -            1   7.85046e-18  0.92  -5.55112e-19  4.44089e-18  0.28         9.81308e-17
          In_Actual    50  1      -1.02141e-14  -            -            1   2.77191e-15  1     0             2.3892e-15   1.68706e-15  8.77644e-16
          In_Expected  50  1      -3.28626e-14  -            -            1   2.94173e-15  1     1.24345e-16   2.55795e-15  2.31243e-15  5.15608e-16
          In_MaxExp    50  1      5.39888e-10   6.81663e-07  5.50011e-06  1   2.89715e-15  1     -3.90799e-16  2.38032e-15  1.42028e-13  3.59063e-16
          In_Received  50  1      -3.28626e-14  -            -            1   2.94173e-15  1     1.24345e-16   2.55795e-15  2.31243e-15  5.15608e-16
          In_Required  50  -      -             -            -            -   0            -     0             0            -            -
          In_Unneeded  50  1      -1.33227e-15  -            -            1   2.30707e-15  1     -4.9849e-16   1.68754e-15  1.22676e-15  9.05792e-16
          ME           50  1      3.41061e-13   0            0            1   6.19518e-14  1     1.00897e-14   2.94165e-14  4.06359e-15  1.0124e-15
          NPct         50  1      3.9968e-15    -            -            1   2.27853e-15  1     -2.08722e-16  1.77192e-15  1.75062e-15  9.78815e-16
          TimeStep     50  1      0             0            0            1   0            1     0             0            0            0
          UID          50  -      -             -            -            -   0            -     0             0            -            0
          Wt           50  1      0             -            -            1   2.82163e-13  1     -1.36424e-14  2.41016e-13  9.84993e-15  4.87482e-16
          WtChange     50  1      1.92901e-15   -            -            1   1.88989e-14  1     1.43441e-15   1.10578e-14  1.13567e-15  -3.26104e-13
        AcceptedStatsName=Name n Slope Intercept SEslope SEintercept R2 RMSE NSE ME MAE RSR RMR
    PredictedObserved Oct2026_IndEnergy: PredictedTableName=IndEnergy; ObservedTableName=obs_IndEnergy; FieldNameUsedForMatch=SimulationName; FieldName2UsedForMatch=Date; AllColumns=false
      Tests: POName=Oct2026_IndEnergy
        AcceptedStats:
          Name               n   Slope  Intercept     SEslope      SEintercept  R2  RMSE         NSE  ME            MAE          RSR          RMR
          AfterLact          50  1      1.15463e-14   3.52741e-09  6.16774e-08  1   1.78404e-14  1    4.41869e-15   1.07425e-14  1.13145e-15  2.26425e-15
          AfterMaint         50  1      7.10543e-15   2.60925e-09  5.05254e-08  1   2.09922e-14  1    5.54112e-15   1.383e-14    1.39271e-15  1.70092e-15
          AfterPreg          50  1      1.42109e-14   0            0            1   1.92333e-14  1    4.52527e-15   1.18128e-14  1.15904e-15  1.88713e-15
          AfterWool          50  1      1.15463e-14   3.52741e-09  6.16774e-08  1   1.78404e-14  1    4.41869e-15   1.07425e-14  1.13145e-15  2.26425e-15
          EBasal             50  1      -1.07008e-11  -            -            1   2.87748e-14  1    1.13687e-15   2.55795e-14  1.8553e-14   6.63871e-16
          EDifference        50  1      7.10543e-14   0            0            1   5.07776e-13  1    -6.12488e-14  2.332e-13    1.76106e-15  -5.13695e-15
          EFat               50  1      -5.45697e-11  -            -            1   1.54571e-11  1    -1.63709e-12  8.18545e-12  1.21836e-14  1.7234e-15
          EFatChange         50  1      -1.42109e-14  -            -            1   3.30001e-13  1    3.63798e-14   1.85878e-13  1.13646e-15  3.09107e-15
          EFatProteinChange  50  1      9.9476e-14    2.11338e-09  6.59451e-07  1   3.81963e-13  1    -1.19371e-14  2.41016e-13  1.28283e-15  3.73046e-15
          EFetus             50  1      0             -            -            1   5.95119e-15  1    -1.4877e-16   2.16605e-15  1.55903e-15  2.7682e-15
          EGain              50  1      1.15463e-14   3.52741e-09  6.16774e-08  1   1.78404e-14  1    4.41869e-15   1.07425e-14  1.13145e-15  2.26425e-15
          EGraze             50  -      -             -            -            -   0            -    0             0            -            -
          ELact              50  1      -1.77636e-15  -            -            1   4.68098e-15  1    7.68274e-16   1.79856e-15  1.33261e-15  2.02409e-15
          EMove              50  -      -             -            -            -   0            -    0             0            -            -
          ENetForGain        50  1      -1.77636e-15  0            0            1   1.60221e-14  1    -3.30402e-15  8.58869e-15  1.70109e-15  4.52299e-15
          EProt              50  1      2.28738e-10   -            -            1   2.39855e-12  1    3.45608e-13   1.83718e-12  3.12663e-14  1.63196e-15
          EProtChange        50  1      0             2.94759e-09  3.03938e-08  1   1.63629e-14  1    2.25153e-15   8.21121e-15  1.73432e-15  -3.74495e-15
          EViscera           50  1      -5.50671e-14  -            -            1   2.76693e-15  1    3.4639e-16    2.37144e-15  2.01656e-15  5.02405e-16
          EWool              50  -      -             -            -            -   0            -    0             0            -            -
          ForGrazing         50  -      -             -            -            -   0            -    0             0            -            -
          ForMaint           50  1      -7.10543e-15  -            -            1   3.08248e-14  1    -8.10019e-15  2.71427e-14  2.94929e-14  6.30992e-16
          MEI                50  1      3.41061e-13   0            0            1   6.19518e-14  1    1.00897e-14   2.94165e-14  4.06359e-15  1.0124e-15
          TimeStep           50  1      0             0            0            1   0            1    0             0            0            0
          UID                50  -      -             -            -            -   0            -    0             0            -            0
        AcceptedStatsName=Name n Slope Intercept SEslope SEintercept R2 RMSE NSE ME MAE RSR RMR
    PredictedObserved Oct2026_FatProteinGrowth: PredictedTableName=FatProteinGrowth; ObservedTableName=obs_FatProteinGrowth; FieldNameUsedForMatch=SimulationName; FieldName2UsedForMatch=Date; AllColumns=false
      Tests: POName=Oct2026_FatProteinGrowth
        AcceptedStats:
          Name                 n   Slope  Intercept     SEslope      SEintercept  R2  RMSE         NSE  ME            MAE          RSR          RMR
          BCS                  50  1      2.16716e-13   0            0            1   2.4646e-15   1    -5.86198e-16  1.97176e-15  7.79025e-15  5.30513e-16
          EBF                  50  1      7.04992e-15   -            -            1   2.78553e-16  1    -3.44169e-17  2.38698e-16  5.85099e-15  6.4304e-16
          EBM                  50  1      1.02432e-10   3.68027e-08  1.93332e-05  1   2.99171e-13  1    1.7053e-14    2.58069e-13  1.23724e-14  5.70093e-16
          Energy_ForGain       50  1      -1.77636e-15  0            0            1   1.60221e-14  1    -3.30402e-15  8.58869e-15  1.70109e-15  4.52299e-15
          Energy_FromExcessCP  50  -      -             -            -            -   0            -    0             0            -            -
          Energy_Grazing       50  -      -             -            -            -   0            -    0             0            -            -
          Energy_Intake        50  1      3.41061e-13   0            0            1   6.19518e-14  1    1.00897e-14   2.94165e-14  4.06359e-15  1.0124e-15
          Energy_Lactation     50  1      -1.77636e-15  -            -            1   4.68098e-15  1    7.68274e-16   1.79856e-15  1.33261e-15  2.02409e-15
          Energy_Maintenance   50  1      -7.10543e-15  -            -            1   3.08248e-14  1    -8.10019e-15  2.71427e-14  2.94929e-14  6.30992e-16
          Energy_Net           50  1      1.15463e-14   3.52741e-09  6.16774e-08  1   1.78404e-14  1    4.41869e-15   1.07425e-14  1.13145e-15  2.26425e-15
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        AcceptedStatsName=Name n Slope Intercept SEslope SEintercept R2 RMSE NSE ME MAE RSR RMR
    PredictedObserved Oct2026_IndBreedStatus: PredictedTableName=IndBreedStatus; ObservedTableName=obs_IndBreedStatus; FieldNameUsedForMatch=SimulationName; FieldName2UsedForMatch=Date; AllColumns=false
      Tests: POName=Oct2026_IndBreedStatus
        AcceptedStats:
          Name      n   Slope  Intercept    SEslope      SEintercept  R2  RMSE         NSE  ME           MAE          RSR          RMR
          RelCon    50  1      2.63345e-13  8.11105e-08  1.01502e-07  1   3.04744e-15  1    1.42109e-16  2.62901e-15  5.80576e-14  2.43731e-15
          TimeStep  50  1      0            0            0            1   0            1    0            0            0            0
          UID       50  -      -            -            -            -   0            -    0            0            -            0
        AcceptedStatsName=Name n Slope Intercept SEslope SEintercept R2 RMSE NSE ME MAE RSR RMR
  Folder Replacements
    RandomNumberGenerator RandomNumbers: Seed=1
  Virtual: FileName=AgPasture_CLEM.apsimx; ModelPaths=[[AgPastureCLEMExample]]
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