Simulations: Version=54
  DataStore
  Simulation GrowCrop
    Memo Grow Crop
      This is a highly simplified crop production simulation that demonstrates how CLEM manages crops at the most basic level and how these crop products are then transfered to a food store.

      ###Resources
      This simulation demonstrates that the minimum resources required to grow a crop are land and a resource store (in this case an animal food store) for grain and/or residue storage.

      ###Activities
      'Crop activity manage crop' is first required to define the crop area and where the crop is grown. Under 'crop activitiy manage crop' crop products are managed using 'crop activity manage product', which can include grain and/or crop residues, depending on what is required for the simulation. Where multiple crop products are included these must be nested, with maize residue nested under maize grain in this example. To manage crop products, the user defines the relevant crop as names in the the crop or crop residue input files, where the crop product is stored and the proportion of the product kept (i.e. 10% of crop residue may be left in the field).

      ###Reports & Graphs
      Reports & graphs are stored in a 'CLEM Folder' to make it easier to select CLEM (rather than APSIM) functions. In this example, the relevant resource ledgers (animal food store and land) and resource balances (animal food store) were included, as well as an activties report. The graph demonstrates the accumulation of grain and residue in the animal food store over the duration of the simulation, with grain added in September or October each year (see the activities report).
    Clock: StartDate=2001-09-01; EndDate=2009-12-31
    Summary summaryfile
    ZoneCLEM CLEM: RandomSeed=0; ClimateRegion=0; EcologicalIndicatorsCalculationMonth=12; Area=0; Slope=0
      FileCrop: FileName=Crop_new_format(Burkina 20130222).prn
      FileCrop FileCropResidue: FileName=CropResidue_new_format(Burkina 20130222).prn
      ResourcesHolder Resources
        Land: UnitsOfArea=hectares; UnitsOfAreaToHaConversion=1
          LandType Field: LandArea=1; PortionBuildings=0; ProportionOfTotalArea=1; SoilType=3
        AnimalFoodStore
          AnimalFoodStoreType Maize grain: DMD=51; Nitrogen=1.5; StartingAmount=0
          AnimalFoodStoreType Maize residue: DMD=46; Nitrogen=1; StartingAmount=0
      ActivitiesHolder Activities
        CropActivityManageCrop Manage maize: LandItemNameToUse=Land.Field; AreaRequested=1; UseAreaAvailable=true; OnPartialResourcesAvailableAction=0
          CropActivityManageProduct Manage grain: ModelNameFileCrop=FileCrop; CropName=Maize_local; StoreItemName=AnimalFoodStore.Maize grain; ProportionKept=1; TreesPerHa=0; UnitsToHaConverter=0; OnPartialResourcesAvailableAction=0
            CropActivityManageProduct Manage residue: ModelNameFileCrop=FileCropResidue; CropName=Maize_local_Stover; StoreItemName=AnimalFoodStore.Maize residue; ProportionKept=1; TreesPerHa=0; UnitsToHaConverter=0; OnPartialResourcesAvailableAction=0
      CLEMFolder Reports and Graphs
        ReportResourceLedger AnimalFoodStoreLedger: VariableNames=AnimalFoodStore
        ReportResourceLedger LandLedger: VariableNames=Land
        ReportResourceBalances AnimalFoodStoreBalance: EventNames=[Clock].CLEMEndOfTimeStep
          VariableNames:
            [Clock].Today as Date
            AnimalFoodStore
        ReportActivitiesPerformed
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