Simulations: Version=51
  Memo TitlePage
    # APSIM MicroClimate Model
  Replacements
    Soil WURSoil: SoilType=Sand; Latitude=-27.581836; Longitude=151.320206
      Water
        Thickness  BD   AirDry  LL15  DUL   SAT   KS
        150        1.4  0.05    0.1   0.25  0.35  100
        150        1.4  0.05    0.1   0.25  0.35  100
        300        1.4  0.05    0.1   0.25  0.35  100
        300        1.4  0.05    0.1   0.2   0.3   100
        300        1.4  0.05    0.1   0.2   0.3   100
        300        1.4  0.05    0.1   0.2   0.3   100
        300        1.4  0.05    0.1   0.2   0.3   100
        SoilCrop WheatSoil: LL=[0.1, 0.1, 0.1, 0.1, 0.1, 0.1, 0.1]; KL=[0.06, 0.06, 0.06, 0.04, 0.04, 0.04, 0.04]; XF=[1, 1, 1, 1, 1, 1, 1]
        SoilCrop MaizeSoil: LL=[0.1, 0.1, 0.1, 0.1, 0.1, 0.1, 0.1]; KL=[0.06, 0.06, 0.06, 0.04, 0.04, 0.04, 0.04]; XF=[1, 1, 1, 1, 1, 1, 1]
      SoilWater: SummerDate=1-Mar; SummerU=2; SummerCona=2; WinterDate=1-Nov; WinterU=2; WinterCona=2; DiffusConst=40; DiffusSlope=16; Salb=0.18; CN2Bare=65; CNRed=20; CNCov=0.8; max_pond=0; Thickness=[150, 150, 300, 300, 300, 300, 300]; SWCON=[0.3, 0.3, 0.3, 0.3, 0.3, 0.3, 0.3]; ResidueInterception=0
      SoilNitrogen: fom_types=[default, manure, mucuna, lablab, shemp, stable]; fract_carb=[0.2, 0.3, 0.54, 0.57, 0.45, 0]; fract_cell=[0.7, 0.3, 0.37, 0.37, 0.47, 0.1]; fract_lign=[0.1, 0.4, 0.09, 0.06, 0.08, 0.9]
      SoilOrganicMatter: RootCN=40; RootWt=1000; SoilCN=14; EnrACoeff=7.4; EnrBCoeff=0.2; OCUnits=Total
        Thickness  OC    FBiom  FInert
        150        3     0.04   0.4
        150        0.96  0.02   0.6
        300        0.6   0.02   0.8
        300        0.3   0.02   1
        300        0.18  0.01   1
        300        0.12  0.01   1
        300        0.12  0.01   1
      Analysis: Thickness=[150, 150, 300, 300, 300, 300, 300]; PH=[8, 8, 8, 8, 8, 8, 8]; PHUnits=Water; BoronUnits=0
      InitialWater: PercentMethod=1; FractionFull=1
      Sample InitialN: NO3Units=ppm; NH4Units=ppm; SWUnits=Volumetric; OCUnits=Total; PHUnits=Water
        Thickness  NO3  NH4
        150        10   0.1
        150        1    0.1
        300        1    0.1
        300        1    0.1
        300        1    0.1
        300        1    0.1
        300        1    0.1
      CERESSoilTemperature
    Report WURReport: EventNames=[Clock].DoReport
      VariableNames:
        [Clock].Today
        [Maize].Phenology.Photoperiod.Value()
        [Maize].Phenology.CurrentStageName
        [Maize].AboveGround.Wt
        [Maize].AboveGround.N
        [Maize].EarLive.Wt
        [Maize].Grain.Wt
        [Maize].Grain.Size
        [Maize].Grain.NumberFunction.Value()
        [Maize].Grain.N
        [Maize].Leaf.LAI
        [Maize].Leaf.Fw
        [Maize].Leaf.Fn
        [Maize].Leaf.Transpiration
        [Maize].Leaf.CoverTotal
        [Maize].Structure.LeafTipsAppeared
        [Maize].Leaf.ExpandedCohortNo
        [Maize].Structure.Height
        [Maize].Total.Wt
        sum([Soil].SoilWater.SWmm) as SWTot
        [Wheat].Phenology.Zadok.Stage
        [Wheat].Phenology.CurrentStageName
        [Wheat].AboveGround.Wt
        [Wheat].AboveGround.N
        [Wheat].Ear.Wt
        [Wheat].Grain.Total.Wt*10 as Yield
        [Wheat].Grain.Protein
        [Wheat].Grain.Size
        [Wheat].Grain.Number
        [Wheat].Grain.Total.Wt
        [Wheat].Grain.Total.N
        [Wheat].Leaf.LAI
        [Wheat].Total.Wt
        [Wheat].Leaf.Fw
        [Wheat].Leaf.Fn
        [Wheat].Root.Depth
        [Wheat].Leaf.Transpiration
        [Wheat].Leaf.CoverTotal
        [Wheat].Structure.LeafTipsAppeared
        [Wheat].Leaf.ExpandedCohortNo
        [Wheat].Structure.Height
        [Soil].SoilWater.Drainage
  DataStore
    ExcelInput Observed: FileName=Observed.xlsx; SheetNames=[Observed, ObservedOld]
  Folder ScopingTest
    Simulation MicrometInFields
      Clock: StartDate=1900-01-01; EndDate=1900-12-31
      Summary SummaryFile
      Weather: FileName=%root%\Examples\WeatherFiles\Dalby.met
      Zone Field1: Area=1; Slope=0
        Report: EventNames=[Clock].DoReport
          VariableNames:
            [Clock].Today
            [Wheat].EP
        Fertiliser
        Soil: ASCOrder=Vertosol; ASCSubOrder=Black; SoilType=Clay; Site=Norwin; NearestTown=Norwin; Region=Darling Downs and Granite Belt; State=Queensland; Country=Australia; NaturalVegetation=Qld. Bluegrass, possible Qld. Blue gum; ApsoilNumber=900; Latitude=-27.581836; Longitude=151.320206; LocationAccuracy=+/- 20m
          DataSource=CSIRO Sustainable Ecosystems, Toowoomba; Characteriesd as part of the GRDC funded project"Doing it better, doing it smarter, managing soil water in Australian agriculture' 2011
          Comments=OC, CLL for all crops estimated-based on Bongeen Mywybilla Soil No1
          Water
            Thickness  BD       AirDry    LL15      DUL       SAT       KS
            150        1.01056  0.13025   0.2605    0.521     0.588655  20
            150        1.07146  0.198689  0.248362  0.496723  0.565677  20
            300        1.09394  0.28      0.28      0.488438  0.557193  20
            300        1.15861  0.28      0.28      0.480297  0.532787  20
            300        1.17301  0.28      0.28      0.471584  0.527354  20
            300        1.16287  0.28      0.28      0.457071  0.53118   20
            300        1.1875   0.28      0.28      0.452332  0.521888  20
            SoilCrop WheatSoil: LL=[0.261, 0.248, 0.28, 0.306, 0.36, 0.392, 0.446]; KL=[0.06, 0.06, 0.06, 0.04, 0.04, 0.02, 0.01]; XF=[1, 1, 1, 1, 1, 1, 1]
          SoilWater: SummerDate=1-Nov; SummerU=5; SummerCona=5; WinterDate=1-Apr; WinterU=5; WinterCona=5; DiffusConst=40; DiffusSlope=16; Salb=0.12; CN2Bare=73; CNRed=20; CNCov=0.8; max_pond=0; Thickness=[150, 150, 300, 300, 300, 300, 300]; SWCON=[0.3, 0.3, 0.3, 0.3, 0.3, 0.3, 0.3]; ResidueInterception=0
          SoilNitrogen: fom_types=[default, manure, mucuna, lablab, shemp, stable]; fract_carb=[0.2, 0.3, 0.54, 0.57, 0.45, 0]; fract_cell=[0.7, 0.3, 0.37, 0.37, 0.47, 0.1]; fract_lign=[0.1, 0.4, 0.09, 0.06, 0.08, 0.9]
          SoilOrganicMatter: RootCN=40; RootWt=1000; SoilCN=12; EnrACoeff=7.4; EnrBCoeff=0.2; OCUnits=Total
            Thickness  OC    FBiom  FInert
            150        1.2   0.04   0.4
            150        0.96  0.02   0.6
            300        0.6   0.02   0.8
            300        0.3   0.02   1
            300        0.18  0.01   1
            300        0.12  0.01   1
            300        0.12  0.01   1
          Analysis: same as Replacements.WURSoil.Analysis
          InitialWater: PercentMethod=1; FractionFull=1
          Sample InitialN: NO3Units=ppm; NH4Units=ppm; SWUnits=Volumetric; OCUnits=Total; PHUnits=Water
            Thickness  NO3  NH4
            150        1    0.1
            150        1    0.1
            300        1    0.1
            300        1    0.1
            300        1    0.1
            300        1    0.1
            300        1    0.1
          CERESSoilTemperature
        SurfaceOrganicMatter: InitialResidueName=wheat_stubble; InitialResidueType=wheat; InitialResidueMass=500; InitialStandingFraction=0; InitialCPR=0; InitialCNR=100; FractionFaecesAdded=0.5
        Plant Wheat: CropType=Wheat; IsEnding=false; DaysAfterEnding=0
        MicroClimate: a_interception=0; b_interception=1; c_interception=0; d_interception=0; soil_albedo=0.3; SoilHeatFluxFraction=0.4; NightInterceptionFraction=0.5; ReferenceHeight=2
        Manager SowingFertiliser
          Amount = 20
          CropName = wheat
```csharp
using System;
using Models.Core;
using Models.PMF;
namespace Models
{
    [Serializable]
    public class Script : Model
    {
        [Link] Clock Clock;
        [Link] Fertiliser Fertiliser;
        [Link] Summary Summary;
        
        
        [Description("Amount of fertiliser to be applied (kg/ha)")]
        public double Amount { get; set; }
        
        [Description("Crop to be fertilised")]
        public string CropName { get; set; }
        
        
        

        [EventSubscribe("Sowing")]
        private void OnSowing(object sender, EventArgs e)
        {
            Model crop = sender as Model;
            if (crop.Name.ToLower() == CropName.ToLower())
                Fertiliser.Apply(Amount: Amount, Type: Fertiliser.Types.NO3N);
        }
        
    }
}
```
        Manager SowingRule
          StartDate = 1-may
          EndDate = 10-jul
          MinESW = 100
          MinRain = 25
          RainDays = 7
          CultivarName = Hartog
          SowingDepth = 30
          RowSpacing = 250
          Population = 120
```csharp
using System;
using Models.Core;
using Models.PMF;
using Models.Soils;
using Models.Utilities;
using APSIM.Shared.Utilities;

namespace Models
{
    [Serializable]
    public class Script : Model
    {
        [Link] Clock Clock;
        [Link] Fertiliser Fertiliser;
        [Link] Summary Summary;
        [Link] Plant Wheat;
        [Link] Soil Soil; 
        Accumulator accumulatedRain;
        
        [Description("Start of sowing window (d-mmm)")]
        public string StartDate { get; set;}
        [Description("End of sowing window (d-mmm)")]
        public string EndDate { get; set;}
        [Description("Minimum extractable soil water for sowing (mm)")]
        public double MinESW { get; set;}
        [Description("Accumulated rainfall required for sowing (mm)")]
        public double MinRain { get; set;}
        [Description("Duration of rainfall accumulation (d)")]
        public int RainDays { get; set;}
        [Description("Cultivar to be sown")]
        public string CultivarName { get; set;}
        [Description("Sowing depth (mm)")]
        public double SowingDepth { get; set;}        
        [Description("Row spacing (mm)")]
        public double RowSpacing { get; set;}    
        [Description("Plant population (/m2)")]
        public double Population { get; set;}    
        
        
        [EventSubscribe("Commencing")]
        private void OnSimulationCommencing(object sender, EventArgs e)
        {
            accumulatedRain = new Accumulator(this, "[Weather].Rain", RainDays);
        }
        

        [EventSubscribe("DoManagement")]
        private void OnDoManagement(object sender, EventArgs e)
        {
            accumulatedRain.Update();
            
            if (DateUtilities.WithinDates(StartDate,Clock.Today,EndDate) &&
                !Wheat.IsAlive &&
                MathUtilities.Sum(Soil.SoilWater.ESW) > MinESW &&
                accumulatedRain.Sum > MinRain)
            {
               Wheat.Sow(population:Population, cultivar:CultivarName, depth:SowingDepth, rowSpacing:RowSpacing);    
            }
        
        }
        
    }
}
```
        SoluteManager
      Zone Field2: same as ScopingTest.MicrometInFields.Field1
      Zone Field3: Area=1; Slope=0
        Report: EventNames=[Clock].DoReport
          VariableNames:
            [Clock].Today
            [Wheat].EP
        Fertiliser
        Soil: same as ScopingTest.MicrometInFields.Field1.Soil
        SurfaceOrganicMatter: InitialResidueName=wheat_stubble; InitialResidueType=wheat; InitialResidueMass=500; InitialStandingFraction=0; InitialCPR=0; InitialCNR=100; FractionFaecesAdded=0.5
        Plant Wheat: CropType=Wheat; IsEnding=false; DaysAfterEnding=0
        MicroClimate: a_interception=0; b_interception=1; c_interception=0; d_interception=0; soil_albedo=0.3; SoilHeatFluxFraction=0.4; NightInterceptionFraction=0.5; ReferenceHeight=2
        Manager SowingFertiliser
          Amount = 300
          CropName = wheat
          script: same as in ScopingTest.MicrometInFields.Field1.SowingFertiliser
        Manager SowingRule: same as ScopingTest.MicrometInFields.Field1.SowingRule
        SoluteManager
      SoilArbitrator
    Simulation MicrometTopLevel
      Clock: StartDate=1900-01-01; EndDate=1900-12-31
      Summary SummaryFile
      Weather: FileName=%root%\Examples\WeatherFiles\Dalby.met
      MicroClimate: a_interception=0; b_interception=1; c_interception=0; d_interception=0; soil_albedo=0.3; SoilHeatFluxFraction=0.4; NightInterceptionFraction=0.5; ReferenceHeight=2
      Zone Field1: Area=1; Slope=0
        Report: EventNames=[Clock].DoReport
          VariableNames:
            [Clock].Today
            [Wheat].EP
        Fertiliser
        Soil: same as ScopingTest.MicrometInFields.Field1.Soil
        SurfaceOrganicMatter: InitialResidueName=wheat_stubble; InitialResidueType=wheat; InitialResidueMass=500; InitialStandingFraction=0; InitialCPR=0; InitialCNR=100; FractionFaecesAdded=0.5
        Plant Wheat: CropType=Wheat; IsEnding=false; DaysAfterEnding=0
        Manager SowingFertiliser: same as ScopingTest.MicrometInFields.Field1.SowingFertiliser
        Manager SowingRule: same as ScopingTest.MicrometInFields.Field1.SowingRule
        SoluteManager
        MicroClimate: a_interception=0; b_interception=1; c_interception=0; d_interception=0; soil_albedo=0.23; SoilHeatFluxFraction=0.4; NightInterceptionFraction=0.5; ReferenceHeight=2
      Zone Field2: Area=1; Slope=0
        Report: EventNames=[Clock].DoReport
          VariableNames:
            [Clock].Today
            [Wheat].EP
        Fertiliser
        Soil: same as ScopingTest.MicrometInFields.Field1.Soil
        SurfaceOrganicMatter: InitialResidueName=wheat_stubble; InitialResidueType=wheat; InitialResidueMass=500; InitialStandingFraction=0; InitialCPR=0; InitialCNR=100; FractionFaecesAdded=0.5
        Plant Wheat: CropType=Wheat; IsEnding=false; DaysAfterEnding=0
        Manager SowingFertiliser: same as ScopingTest.MicrometInFields.Field1.SowingFertiliser
        Manager SowingRule: same as ScopingTest.MicrometInFields.Field1.SowingRule
        SoluteManager
      Zone Field3: Area=1; Slope=0
        Report: EventNames=[Clock].DoReport
          VariableNames:
            [Clock].Today
            [Wheat].EP
        Fertiliser
        Soil: same as ScopingTest.MicrometInFields.Field1.Soil
        SurfaceOrganicMatter: InitialResidueName=wheat_stubble; InitialResidueType=wheat; InitialResidueMass=500; InitialStandingFraction=0; InitialCPR=0; InitialCNR=100; FractionFaecesAdded=0.5
        Plant Wheat: CropType=Wheat; IsEnding=false; DaysAfterEnding=0
        Manager SowingFertiliser: same as ScopingTest.MicrometInFields.Field3.SowingFertiliser
        Manager SowingRule: same as ScopingTest.MicrometInFields.Field1.SowingRule
        SoluteManager
      SoilArbitrator
  Folder StripCrop
    Simulation StripCropExample
      Clock: StartDate=1990-01-01; EndDate=1991-06-30
      Summary SummaryFile
      Weather: FileName=%root%\Examples\WeatherFiles\Dalby.met
      MicroClimate: a_interception=0; b_interception=1; c_interception=0; d_interception=0; soil_albedo=0.3; SoilHeatFluxFraction=0.4; NightInterceptionFraction=0.5; ReferenceHeight=2
      SoilArbitrator Soil Arbitrator
      RectangularZone MaizeStrip: Length=1; Width=1; Slope=0
        Report: EventNames=[Clock].DoReport
          VariableNames:
            [Clock].Today
            [Maize].Phenology.CurrentStageName
            [Maize].AboveGround.Wt
            [Maize].AboveGround.N
            [Maize].Grain.Wt
            [Maize].Grain.Size
            [Maize].Grain.NumberFunction.Value()
            [Maize].Grain.N
            [Maize].Total.Wt
            sum([Soil].SoilWater.SWmm) as SWTot
            [Maize].Leaf.Height
        Fertiliser
        Soil: ASCOrder=Vertosol; ASCSubOrder=Black; SoilType=Clay; Site=Norwin; NearestTown=Norwin; Region=Darling Downs and Granite Belt; State=Queensland; Country=Australia; NaturalVegetation=Qld. Bluegrass, possible Qld. Blue gum; ApsoilNumber=900; Latitude=-27.581836; Longitude=151.320206; LocationAccuracy=+/- 20m
          DataSource=CSIRO Sustainable Ecosystems, Toowoomba; Characteriesd as part of the GRDC funded project"Doing it better, doing it smarter, managing soil water in Australian agriculture' 2011
          Comments=OC, CLL for all crops estimated-based on Bongeen Mywybilla Soil No1
          Water
            Thickness  BD       AirDry    LL15      DUL       SAT       KS
            150        1.01056  0.13025   0.2605    0.521     0.588655  20
            150        1.07146  0.198689  0.248362  0.496723  0.565677  20
            300        1.09394  0.28      0.28      0.488438  0.557193  20
            300        1.15861  0.28      0.28      0.480297  0.532787  20
            300        1.17301  0.28      0.28      0.471584  0.527354  20
            300        1.16287  0.28      0.28      0.457071  0.53118   20
            300        1.1875   0.28      0.28      0.452332  0.521888  20
            SoilCrop MaizeSoil: LL=[0.261, 0.248, 0.28, 0.306, 0.36, 0.392, 0.446]; KL=[0.06, 0.06, 0.06, 0.04, 0.04, 0.02, 0.01]; XF=[1, 1, 1, 1, 1, 1, 1]
          SoilWater: same as ScopingTest.MicrometInFields.Field1.Soil.SoilWater
          SoilNitrogen: fom_types=[default, manure, mucuna, lablab, shemp, stable]; fract_carb=[0.2, 0.3, 0.54, 0.57, 0.45, 0]; fract_cell=[0.7, 0.3, 0.37, 0.37, 0.47, 0.1]; fract_lign=[0.1, 0.4, 0.09, 0.06, 0.08, 0.9]
          SoilOrganicMatter: same as ScopingTest.MicrometInFields.Field1.Soil.SoilOrganicMatter
          Analysis: same as Replacements.WURSoil.Analysis
          InitialWater: PercentMethod=1; FractionFull=1
          Sample InitialN: same as ScopingTest.MicrometInFields.Field1.Soil.InitialN
          CERESSoilTemperature
        SurfaceOrganicMatter: InitialResidueName=wheat_stubble; InitialResidueType=wheat; InitialResidueMass=500; InitialStandingFraction=0; InitialCPR=0; InitialCNR=100; FractionFaecesAdded=0.5
        Plant Maize: CropType=Maize; IsEnding=false; DaysAfterEnding=0
        Manager SowingFertiliser
          Amount = 160
          CropName = maize
          script: same as in ScopingTest.MicrometInFields.Field1.SowingFertiliser
        Manager SowingRule
          StartDate = 1-oct
          EndDate = 10-jan
          MinESW = 100
          MinRain = 25
          RainDays = 7
          CultivarName = Dekalb_XL82
          SowingDepth = 30
          RowSpacing = 750
          Population = 6
```csharp
using System;
using Models.Core;
using Models.PMF;
using Models.Soils;
using Models.Utilities;
using APSIM.Shared.Utilities;

namespace Models
{
    [Serializable]
    public class Script : Model
    {
        [Link] Clock Clock;
        [Link] Fertiliser Fertiliser;
        [Link] Summary Summary;
        [Link] Plant Maize;
        [Link] Soil Soil;
        Accumulator accumulatedRain;
        
        [Description("Start of sowing window (d-mmm)")]
        public string StartDate { get; set; }
        [Description("End of sowing window (d-mmm)")]
        public string EndDate { get; set; }
        [Description("Minimum extractable soil water for sowing (mm)")]
        public double MinESW { get; set; }
        [Description("Accumulated rainfall required for sowing (mm)")]
        public double MinRain { get; set; }
        [Description("Duration of rainfall accumulation (d)")]
        public int RainDays { get; set; }
        [Description("Cultivar to be sown")]
        public string CultivarName { get; set; }
        [Description("Sowing depth (mm)")]
        public double SowingDepth { get; set; }
        [Description("Row spacing (mm)")]
        public double RowSpacing { get; set; }
        [Description("Plant population (/m2)")]
        public double Population { get; set; }
        
        
        [EventSubscribe("Commencing")]
        private void OnSimulationCommencing(object sender, EventArgs e)
        {
            accumulatedRain = new Accumulator(this, "[Weather].Rain", RainDays);
        }
        

        [EventSubscribe("DoManagement")]
        private void OnDoManagement(object sender, EventArgs e)
        {
            accumulatedRain.Update();
            
            if (DateUtilities.WithinDates(StartDate, Clock.Today, EndDate) &&
                !Maize.IsAlive &&
                MathUtilities.Sum(Soil.SoilWater.ESW) > MinESW &&
                accumulatedRain.Sum > MinRain)
            {
                Maize.Sow(population: Population, cultivar: CultivarName, depth: SowingDepth, rowSpacing: RowSpacing);    
            }
        
        }
        
    }
}
```
        Manager Harvesting
```csharp
using System;
using Models.Core;
using System.Collections.Generic;
using System.Text;
using Models.Soils;
using Models.PMF;
using Models;
using System.Xml.Serialization;
using APSIM.Shared.Utilities;

namespace Models
{
    [Serializable] 
    public class Script : Model
    {
        [Link] Plant Maize;
        [Link] Zone zone;
                    
        
        [EventSubscribe("Commencing")]
        private void OnSimulationCommencing(object sender, EventArgs e)
        {
        }
        
        [EventSubscribe("DoManagement")]
        private void OnDoManagement(object sender, EventArgs e)
        {
            if (Maize.Phenology.CurrentPhaseName == "ReadyForHarvesting")
            {
                Maize.Harvest();
                Maize.EndCrop();
            }
        }
        
        [EventSubscribe("DoManagementCalculations")]
        private void OnDoManagementCalculations(object sender, EventArgs e)
        {
            
        }
    }
}
```
        SoluteManager
      RectangularZone WheatStrip: Length=1; Width=1; Slope=0
        Report: EventNames=[Clock].DoReport
          VariableNames:
            [Clock].Today
            [Wheat].Phenology.Zadok.Stage
            [Wheat].Phenology.CurrentStageName
            [Wheat].AboveGround.Wt
            [Wheat].AboveGround.N
            [Wheat].Grain.Total.Wt*10 as Yield
            [Wheat].Grain.Protein
            [Wheat].Grain.Size
            [Wheat].Grain.Number
            [Wheat].Grain.Total.Wt
            [Wheat].Grain.Total.N
            [Wheat].Total.Wt
            sum([Soil].SoilWater.SWmm) as SWTot
            [Wheat].Leaf.Height
        Fertiliser
        Soil: same as ScopingTest.MicrometInFields.Field1.Soil
        SurfaceOrganicMatter: InitialResidueName=wheat_stubble; InitialResidueType=wheat; InitialResidueMass=500; InitialStandingFraction=0; InitialCPR=0; InitialCNR=100; FractionFaecesAdded=0.5
        Plant Wheat: CropType=Wheat; IsEnding=false; DaysAfterEnding=0
        Manager SowingFertiliser
          Amount = 160
          CropName = wheat
          script: same as in ScopingTest.MicrometInFields.Field1.SowingFertiliser
        Manager Harvest
```csharp
using System;
using Models.Core;
using Models.PMF;
using Models.Soils;
using Models.Utilities;
using APSIM.Shared.Utilities;

namespace Models
{
    [Serializable]
    public class Script : Model
    {
        [Link] Plant Wheat;

        [EventSubscribe("DoManagement")]
        private void OnDoManagement(object sender, EventArgs e)
        {
            if (Wheat.IsReadyForHarvesting)
            {
               Wheat.Harvest();
               Wheat.EndCrop();    
            }
        
        }
        
    }
}
```
        SoluteManager
        Manager SowingRule1
          StartDate = 1-jun
          EndDate = 10-jul
          MinESW = 100
          MinRain = 10
          RainDays = 7
          CultivarName = Hartog
          SowingDepth = 30
          RowSpacing = 250
          Population = 120
```csharp
using System;
using Models.Core;
using Models.PMF;
using Models.Soils;
using Models.Utilities;
using APSIM.Shared.Utilities;

namespace Models
{
    [Serializable]
    public class Script : Model
    {
        [Link] Clock Clock;
        [Link] Fertiliser Fertiliser;
        [Link] Summary Summary;
        [Link] Plant Wheat;
        [Link] Soil Soil; 
        Accumulator accumulatedRain;
        
        [Description("Start of sowing window (d-mmm)")]
        public string StartDate { get; set;}
        [Description("End of sowing window (d-mmm)")]
        public string EndDate { get; set;}
        [Description("Minimum extractable soil water for sowing (mm)")]
        public double MinESW { get; set;}
        [Description("Accumulated rainfall required for sowing (mm)")]
        public double MinRain { get; set;}
        [Description("Duration of rainfall accumulation (d)")]
        public int RainDays { get; set;}
        [Description("Cultivar to be sown")]
        [Display(Type=DisplayType.CultivarName)]
        public string CultivarName { get; set;}
        [Description("Sowing depth (mm)")]
        public double SowingDepth { get; set;}        
        [Description("Row spacing (mm)")]
        public double RowSpacing { get; set;}    
        [Description("Plant population (/m2)")]
        public double Population { get; set;}    
        
        
        [EventSubscribe("Commencing")]
        private void OnSimulationCommencing(object sender, EventArgs e)
        {
            accumulatedRain = new Accumulator(this, "[Weather].Rain", RainDays);
        }
        

        [EventSubscribe("DoManagement")]
        private void OnDoManagement(object sender, EventArgs e)
        {
            accumulatedRain.Update();
            
            if (DateUtilities.WithinDates(StartDate,Clock.Today,EndDate) &&
                !Wheat.IsAlive &&
                MathUtilities.Sum(Soil.SoilWater.ESW) > MinESW &&
                accumulatedRain.Sum > MinRain)
            {
               Wheat.Sow(population:Population, cultivar:CultivarName, depth:SowingDepth, rowSpacing:RowSpacing);    
            }
        
        }
        
    }
}
```
    Simulation SoleCropExample
      Clock: StartDate=1990-01-01; EndDate=1991-06-30
      Summary SummaryFile
      Weather: FileName=%root%\Examples\WeatherFiles\Dalby.met
      MicroClimate: a_interception=0; b_interception=1; c_interception=0; d_interception=0; soil_albedo=0.3; SoilHeatFluxFraction=0.4; NightInterceptionFraction=0.5; ReferenceHeight=2
      SoilArbitrator Soil Arbitrator
      Zone SoleMaize: Area=1; Slope=0
        Report: EventNames=[Clock].DoReport
          VariableNames:
            [Clock].Today
            [Maize].Phenology.CurrentStageName
            [Maize].AboveGround.Wt
            [Maize].AboveGround.N
            [Maize].Grain.Wt
            [Maize].Grain.Size
            [Maize].Grain.NumberFunction.Value()
            [Maize].Grain.N
            [Maize].Total.Wt
            sum([Soil].SoilWater.SWmm) as SWTot
            [Maize].Leaf.Height
        Fertiliser
        Soil: same as StripCrop.StripCropExample.MaizeStrip.Soil
        SurfaceOrganicMatter: InitialResidueName=wheat_stubble; InitialResidueType=wheat; InitialResidueMass=500; InitialStandingFraction=0; InitialCPR=0; InitialCNR=100; FractionFaecesAdded=0.5
        Plant Maize: CropType=Maize; IsEnding=false; DaysAfterEnding=0
        Manager SowingFertiliser: same as StripCrop.StripCropExample.MaizeStrip.SowingFertiliser
        Manager SowingRule: same as StripCrop.StripCropExample.MaizeStrip.SowingRule
        Manager Harvesting: same as StripCrop.StripCropExample.MaizeStrip.Harvesting
        SoluteManager
      Zone SoleWheat: Area=1; Slope=0
        Report: same as StripCrop.StripCropExample.WheatStrip.Report
        Fertiliser
        Soil: same as ScopingTest.MicrometInFields.Field1.Soil
        SurfaceOrganicMatter: InitialResidueName=wheat_stubble; InitialResidueType=wheat; InitialResidueMass=500; InitialStandingFraction=0; InitialCPR=0; InitialCNR=100; FractionFaecesAdded=0.5
        Plant Wheat: CropType=Wheat; IsEnding=false; DaysAfterEnding=0
        Manager SowingFertiliser: same as StripCrop.StripCropExample.WheatStrip.SowingFertiliser
        Manager Harvest: same as StripCrop.StripCropExample.WheatStrip.Harvest
        SoluteManager
        Manager SowingRule1: same as StripCrop.StripCropExample.WheatStrip.SowingRule1
  Folder Wageningen2013old
    Simulation WUR2013SoleWheat
      Clock: StartDate=2013-03-01; EndDate=2013-12-31
      Summary SummaryFile
      Weather: FileName=Volkel.met
      MicroClimate: a_interception=0; b_interception=1; c_interception=0; d_interception=0; soil_albedo=0.3; SoilHeatFluxFraction=0.4; NightInterceptionFraction=0.5; ReferenceHeight=2
      SoilArbitrator Soil Arbitrator
      Zone SoleWheat: Area=1; Slope=0
        Report WURReport: EventNames=[Clock].DoReport
          VariableNames:
            [Clock].Today
            [Wheat].Phenology.Zadok.Stage
            [Wheat].Phenology.CurrentStageName
            [Wheat].AboveGround.Wt
            [Wheat].AboveGround.N
            [Wheat].Grain.Total.Wt*10 as Yield
            [Wheat].Grain.Protein
            [Wheat].Grain.Size
            [Wheat].Grain.Number
            [Wheat].Grain.Total.Wt
            [Wheat].Grain.Total.N
            [Wheat].Total.Wt
            sum([Soil].SoilWater.SWmm) as SWTot
            [Wheat].Leaf.Fw
            [Wheat].Leaf.Fn
            [Wheat].Root.Depth
        Fertiliser
        SurfaceOrganicMatter: InitialResidueName=wheat_stubble; InitialResidueType=wheat; InitialResidueMass=500; InitialStandingFraction=0; InitialCPR=0; InitialCNR=100; FractionFaecesAdded=0.5
        Soil WURSoil: ASCOrder=Vertosol; ASCSubOrder=Black; SoilType=Clay; Site=Norwin; NearestTown=Norwin; Region=Darling Downs and Granite Belt; State=Queensland; Country=Australia; NaturalVegetation=Qld. Bluegrass, possible Qld. Blue gum; ApsoilNumber=900; Latitude=-27.581836; Longitude=151.320206; LocationAccuracy=+/- 20m
          DataSource=CSIRO Sustainable Ecosystems, Toowoomba; Characteriesd as part of the GRDC funded project"Doing it better, doing it smarter, managing soil water in Australian agriculture' 2011
          Comments=OC, CLL for all crops estimated-based on Bongeen Mywybilla Soil No1
          Water
            Thickness  BD   AirDry  LL15  DUL  SAT  KS
            150        1.4  0.05    0.1   0.2  0.3  100
            150        1.4  0.05    0.1   0.2  0.3  100
            300        1.4  0.05    0.1   0.2  0.3  100
            300        1.4  0.05    0.1   0.2  0.3  100
            300        1.4  0.05    0.1   0.2  0.3  100
            300        1.4  0.05    0.1   0.2  0.3  100
            300        1.4  0.05    0.1   0.2  0.3  100
            SoilCrop WheatSoil: LL=[0.1, 0.1, 0.1, 0.1, 0.1, 0.1, 0.1]; KL=[0.06, 0.06, 0.06, 0.04, 0.04, 0.02, 0.01]; XF=[1, 1, 1, 1, 1, 1, 1]
            SoilCrop MaizeSoil: LL=[0.1, 0.1, 0.1, 0.1, 0.1, 0.1, 0.1]; KL=[0.06, 0.06, 0.06, 0.04, 0.04, 0.02, 0.01]; XF=[1, 1, 1, 1, 1, 1, 1]
          SoilWater: SummerDate=1-Apr; SummerU=6; SummerCona=3.5; WinterDate=1-Nov; WinterU=2; WinterCona=2; DiffusConst=40; DiffusSlope=16; Salb=0.12; CN2Bare=70; CNRed=20; CNCov=0.8; max_pond=0; Thickness=[150, 150, 300, 300, 300, 300, 300]; SWCON=[0.3, 0.3, 0.3, 0.3, 0.3, 0.3, 0.3]; ResidueInterception=0
          SoilNitrogen: fom_types=[default, manure, mucuna, lablab, shemp, stable]; fract_carb=[0.2, 0.3, 0.54, 0.57, 0.45, 0]; fract_cell=[0.7, 0.3, 0.37, 0.37, 0.47, 0.1]; fract_lign=[0.1, 0.4, 0.09, 0.06, 0.08, 0.9]
          SoilOrganicMatter: same as Replacements.WURSoil.SoilOrganicMatter
          Analysis: same as Replacements.WURSoil.Analysis
          InitialWater: PercentMethod=1; FractionFull=1
          Sample InitialN: same as ScopingTest.MicrometInFields.Field1.Soil.InitialN
          CERESSoilTemperature
        Operations
          2013-03-21  [Wheat].Sow(population: 250, cultivar: Tybalt, depth: 30, rowSpacing: 125);
          2013-03-21  [Irrigation].Apply(amount: 15);
          2013-04-19  [Fertiliser].Apply(Amount: 57, Type: Fertiliser.Types.NO3N);
          2013-05-30  [Fertiliser].Apply(Amount: 75, Type: Fertiliser.Types.NO3N);
          2013-06-18  [Fertiliser].Apply(Amount: 27, Type: Fertiliser.Types.NO3N);
          2013-08-20  [Wheat].Harvest();
          2013-08-20  [Wheat].EndCrop();
          2013-07-12  [Irrigation].Apply(amount: 15);
          2013-07-19  [Irrigation].Apply(amount: 15);
          2013-07-22  [Irrigation].Apply(amount: 15);
          2013-07-26  [Irrigation].Apply(amount: 15);
          2013-09-06  [Irrigation].Apply(amount: 15);
          2013-07-01  [Irrigation].Apply(amount: 50);
        SoluteManager
        Plant Wheat: CropType=Wheat; IsEnding=false; DaysAfterEnding=0
        Plant Maize: CropType=Maize; IsEnding=false; DaysAfterEnding=0
        Irrigation
    Simulation WUR2013SoleMaize
      Clock: StartDate=2013-03-01; EndDate=2013-12-31
      Summary SummaryFile
      Weather: FileName=Volkel.met
      MicroClimate: a_interception=0; b_interception=1; c_interception=0; d_interception=0; soil_albedo=0.3; SoilHeatFluxFraction=0.4; NightInterceptionFraction=0.5; ReferenceHeight=2
      SoilArbitrator Soil Arbitrator
      Zone SoleMaize: Area=1; Slope=0
        Report WURReport: EventNames=[Clock].DoReport
          VariableNames:
            [Clock].Today
            [Maize].Phenology.CurrentStageName
            [Maize].AboveGround.Wt
            [Maize].AboveGround.N
            [Maize].Grain.Wt
            [Maize].Grain.Size
            [Maize].Grain.NumberFunction.Value()
            [Maize].Grain.N
            [Maize].Total.Wt
            sum([Soil].SoilWater.SWmm) as SWTot
        Fertiliser
        Soil WURSoil: ASCOrder=Vertosol; ASCSubOrder=Black; SoilType=Clay; Site=Norwin; NearestTown=Norwin; Region=Darling Downs and Granite Belt; State=Queensland; Country=Australia; NaturalVegetation=Qld. Bluegrass, possible Qld. Blue gum; ApsoilNumber=900; Latitude=-27.581836; Longitude=151.320206; LocationAccuracy=+/- 20m
          DataSource=CSIRO Sustainable Ecosystems, Toowoomba; Characteriesd as part of the GRDC funded project"Doing it better, doing it smarter, managing soil water in Australian agriculture' 2011
          Comments=OC, CLL for all crops estimated-based on Bongeen Mywybilla Soil No1
          Water
            Thickness  BD   AirDry  LL15  DUL  SAT  KS
            150        1.4  0.05    0.1   0.2  0.3  100
            150        1.4  0.05    0.1   0.2  0.3  100
            300        1.4  0.05    0.1   0.2  0.3  100
            300        1.4  0.05    0.1   0.2  0.3  100
            300        1.4  0.05    0.1   0.2  0.3  100
            300        1.4  0.05    0.1   0.2  0.3  100
            300        1.4  0.05    0.1   0.2  0.3  100
            SoilCrop MaizeSoil: LL=[0.1, 0.1, 0.1, 0.1, 0.1, 0.1, 0.1]; KL=[0.06, 0.06, 0.06, 0.04, 0.04, 0.02, 0.01]; XF=[1, 1, 1, 1, 1, 1, 1]
          SoilWater: same as ScopingTest.MicrometInFields.Field1.Soil.SoilWater
          SoilNitrogen: fom_types=[default, manure, mucuna, lablab, shemp, stable]; fract_carb=[0.2, 0.3, 0.54, 0.57, 0.45, 0]; fract_cell=[0.7, 0.3, 0.37, 0.37, 0.47, 0.1]; fract_lign=[0.1, 0.4, 0.09, 0.06, 0.08, 0.9]
          SoilOrganicMatter: same as Replacements.WURSoil.SoilOrganicMatter
          Analysis: same as Replacements.WURSoil.Analysis
          InitialWater: PercentMethod=1; FractionFull=1
          Sample InitialN: same as ScopingTest.MicrometInFields.Field1.Soil.InitialN
          CERESSoilTemperature
        SurfaceOrganicMatter: InitialResidueName=wheat_stubble; InitialResidueType=wheat; InitialResidueMass=500; InitialStandingFraction=0; InitialCPR=0; InitialCNR=100; FractionFaecesAdded=0.5
        SoluteManager
        Irrigation
        Operations
          2013-05-14  [Maize].Sow(population: 10, cultivar: Atrium, depth: 30, rowSpacing: 750);
          2013-05-14  [Irrigation].Apply(amount: 15);
          2013-04-19  [Fertiliser].Apply(Amount: 57, Type: Fertiliser.Types.NO3N);
          2013-05-30  [Fertiliser].Apply(Amount: 75, Type: Fertiliser.Types.NO3N);
          2013-06-18  [Fertiliser].Apply(Amount: 27, Type: Fertiliser.Types.NO3N);
          2013-10-16  [Maize].Harvest();
          2013-10-16  [Maize].EndCrop();
          2013-07-12  [Irrigation].Apply(amount: 15);
          2013-07-19  [Irrigation].Apply(amount: 15);
          2013-07-22  [Irrigation].Apply(amount: 15);
          2013-07-26  [Irrigation].Apply(amount: 15);
          2013-09-06  [Irrigation].Apply(amount: 15);
          2013-07-01  [Irrigation].Apply(amount: 50);
        Plant Maize: CropType=Maize; IsEnding=false; DaysAfterEnding=0
        Plant Wheat: CropType=Wheat; IsEnding=false; DaysAfterEnding=0
  Folder Wageningen2014old
    Simulation WUR2014SoleWheat
      Clock: StartDate=2014-01-01; EndDate=2014-12-31
      Summary SummaryFile
      Weather: FileName=Volkel.met
      MicroClimate: a_interception=0; b_interception=1; c_interception=0; d_interception=0; soil_albedo=0.3; SoilHeatFluxFraction=0.4; NightInterceptionFraction=0.5; ReferenceHeight=2
      SoilArbitrator Soil Arbitrator
      Zone SoleWheat: Area=1; Slope=0
        Report WURReport: same as Wageningen2013old.WUR2013SoleWheat.SoleWheat.WURReport
        Fertiliser
        SurfaceOrganicMatter: InitialResidueName=wheat_stubble; InitialResidueType=wheat; InitialResidueMass=500; InitialStandingFraction=0; InitialCPR=0; InitialCNR=100; FractionFaecesAdded=0.5
        Soil WURSoil: same as Wageningen2013old.WUR2013SoleWheat.SoleWheat.WURSoil
        Operations
          2014-03-13  [Wheat].Sow(population: 250, cultivar: Tybalt, depth: 30, rowSpacing: 125);
          2014-03-13  [Irrigation].Apply(amount: 15);
          2014-04-09  [Fertiliser].Apply(Amount: 70, Type: Fertiliser.Types.NO3N);
          2014-05-09  [Fertiliser].Apply(Amount: 76, Type: Fertiliser.Types.NO3N);
          2014-06-06  [Fertiliser].Apply(Amount: 27, Type: Fertiliser.Types.NO3N);
          2014-08-04  [Wheat].Harvest();
          2014-08-04  [Wheat].EndCrop();
          2014-07-01  [Irrigation].Apply(amount: 30);
          2014-07-04  [Irrigation].Apply(amount: 30);
          2014-07-22  [Irrigation].Apply(amount: 30);
        SoluteManager
        Plant Wheat: CropType=Wheat; IsEnding=false; DaysAfterEnding=0
        Plant Maize: CropType=Maize; IsEnding=false; DaysAfterEnding=0
        Irrigation
    Simulation WUR2014SoleMaize
      Clock: StartDate=2014-01-01; EndDate=2014-12-31
      Summary SummaryFile
      Weather: FileName=Volkel.met
      MicroClimate: a_interception=0; b_interception=1; c_interception=0; d_interception=0; soil_albedo=0.3; SoilHeatFluxFraction=0.4; NightInterceptionFraction=0.5; ReferenceHeight=2
      SoilArbitrator Soil Arbitrator
      Zone SoleMaize: Area=1; Slope=0
        Report WURReport: EventNames=[Clock].DoReport
          VariableNames:
            [Clock].Today
            [Maize].Phenology.CurrentStageName
            [Maize].AboveGround.Wt
            [Maize].AboveGround.N
            [Maize].Grain.Wt
            [Maize].Grain.Size
            [Maize].Grain.NumberFunction.Value()
            [Maize].Grain.N
            [Maize].Total.Wt
            sum([Soil].SoilWater.SWmm) as SWTot
        Fertiliser
        Soil WURSoil: same as Wageningen2013old.WUR2013SoleMaize.SoleMaize.WURSoil
        SurfaceOrganicMatter: InitialResidueName=wheat_stubble; InitialResidueType=wheat; InitialResidueMass=500; InitialStandingFraction=0; InitialCPR=0; InitialCNR=100; FractionFaecesAdded=0.5
        SoluteManager
        Operations
          2014-05-07  [Maize].Sow(population: 10, cultivar: Atrium, depth: 30, rowSpacing: 750);
          2014-05-07  [Irrigation].Apply(amount: 15);
          2014-04-09  [Fertiliser].Apply(Amount: 70, Type: Fertiliser.Types.NO3N);
          2014-05-09  [Fertiliser].Apply(Amount: 76, Type: Fertiliser.Types.NO3N);
          2014-06-06  [Fertiliser].Apply(Amount: 27, Type: Fertiliser.Types.NO3N);
          2014-09-23  [Maize].Harvest();
          2014-09-23  [Maize].EndCrop();
          2014-07-01  [Irrigation].Apply(amount: 30);
          2014-07-04  [Irrigation].Apply(amount: 30);
          2014-07-22  [Irrigation].Apply(amount: 30);
        Plant Maize: CropType=Maize; IsEnding=false; DaysAfterEnding=0
        Plant Wheat: CropType=Wheat; IsEnding=false; DaysAfterEnding=0
        Irrigation
  Folder WageningenStripCrop
    Experiment WUR2013
      Factors
        Factor Treatment
          Factor SoleCrop
            Specifications:
              [WheatZone].Width=100
              [MaizeZone].Width=100
              [SetupMaizeRootZones].Script.UseExtraZone=false
              [SetupWheatRootZones].Script.UseExtraZone=false
          Factor 60WM
            Specifications:
              [WheatZone].Width=0.75
              [MaizeZone].Width=1.50
              [SowMaize].Script.SowDate=1-Jan
          Factor 02WM
            Specifications:
              [WheatZone].Width=0.75
              [MaizeZone].Width=1.50
              [SowWheat].Script.SowDate=1-Jan
          Factor 62WM
            Specifications:
              [WheatZone].Width=0.75
              [MaizeZone].Width=1.50
      Simulation WUR2013BaseSimulation
        Clock: StartDate=2013-03-01; EndDate=2013-12-31
        Summary SummaryFile
        Weather: FileName=Volkel.met
        MicroClimate: a_interception=0; b_interception=1; c_interception=0; d_interception=0; soil_albedo=0.3; SoilHeatFluxFraction=0.4; NightInterceptionFraction=0.5; ReferenceHeight=2
        SoilArbitrator Soil Arbitrator
        RectangularZone WheatZone: Length=1; Width=100; Slope=0
          Report: EventNames=[Clock].DoReport
            VariableNames:
              [Clock].Today
              [Wheat].Phenology.Zadok.Stage
              [Wheat].Phenology.CurrentStageName
              [Wheat].AboveGround.Wt
              [Wheat].AboveGround.N
              [Wheat].Grain.Wt
              [Wheat].Grain.Total.N
              [Wheat].Grain.Size
              [Wheat].Grain.Number
              [Wheat].Ear.Wt
              [Wheat].Leaf.Fw
              [Wheat].Leaf.Fn
              [Wheat].Structure.LeafTipsAppeared
              [Wheat].Leaf.ExpandedCohortNo
              [Wheat].Structure.Height
              [Wheat].Leaf.LAI
              [Wheat].Leaf.CoverTotal
              [Wheat].Total.Wt
              sum([Soil].SoilWater.SWmm) as SWTot
          Fertiliser
          SurfaceOrganicMatter: InitialResidueName=wheat_stubble; InitialResidueType=wheat; InitialResidueMass=500; InitialStandingFraction=0; InitialCPR=0; InitialCNR=100; FractionFaecesAdded=0.5
          Soil WURSoil: same as Wageningen2013old.WUR2013SoleWheat.SoleWheat.WURSoil
          Operations
            // 2013-03-21  [Wheat].Sow(population: 250, cultivar: Tybalt, depth: 30, rowSpacing: 125);
            2013-03-21  [Irrigation].Apply(amount: 15);
            2013-04-19  [Fertiliser].Apply(Amount: 57, Type: Fertiliser.Types.NO3N);
            2013-05-30  [Fertiliser].Apply(Amount: 75, Type: Fertiliser.Types.NO3N);
            2013-06-18  [Fertiliser].Apply(Amount: 27, Type: Fertiliser.Types.NO3N);
            // 2013-08-20  [Wheat].Harvest();
            // 2013-08-20  [Wheat].EndCrop();
            2013-07-12  [Irrigation].Apply(amount: 15);
            2013-07-19  [Irrigation].Apply(amount: 15);
            2013-07-22  [Irrigation].Apply(amount: 15);
            2013-07-26  [Irrigation].Apply(amount: 15);
            2013-09-06  [Irrigation].Apply(amount: 15);
            2013-07-01  [Irrigation].Apply(amount: 50);
          SoluteManager
          Plant Wheat: CropType=Wheat; IsEnding=false; DaysAfterEnding=0
          Irrigation
          Manager SetupWheatRootZones
            UseExtraZone = True
```csharp
using System;
using Models.Core;
using System.Collections.Generic;
using System.Text;
using Models.PMF;
using Models;
using System.Xml.Serialization;
using APSIM.Shared.Utilities;

namespace Models
{
    [Serializable] 
    public class Script : Model
    {
        [Link] Plant Wheat;
        [Link] Clock Clock;
        [Link] Zone zone;

        [Description("Use extra root zone")]
        public bool UseExtraZone { get; set; }

        
        [EventSubscribe("Commencing")]
        private void OnSimulationCommencing(object sender, EventArgs e)
        {
            if (UseExtraZone)
            {
            Wheat.Root.ZoneNamesToGrowRootsIn.Add("MaizeZone");
            Wheat.Root.ZoneRootDepths.Add(50);
            Wheat.Root.ZoneInitialDM.Add(10);
            }
        }
    }
}
```
          Manager SowWheat
            SowDate = 21-Mar
            CultivarName = Tybalt
            SowingDepth = 30
            RowSpacing = 125
            Population = 250
```csharp
using System;
using Models.Core;
using Models.PMF;
using Models.Soils;
using Models.Utilities;
using APSIM.Shared.Utilities;

namespace Models
{
    [Serializable]
    public class Script : Model
    {
        [Link] Clock Clock;
        [Link] Fertiliser Fertiliser;
        [Link] Summary Summary;
        [Link] Soil Soil;
        [Link] Plant Wheat;
        Accumulator accumulatedRain;
        
        [Description("Sowing date (d-mmm)")]
        public string SowDate { get; set; }
    
        [Description("Cultivar to be sown")]
        public string CultivarName { get; set; }
        [Description("Sowing depth (mm)")]
        public double SowingDepth { get; set; }
        [Description("Row spacing (mm)")]
        public double RowSpacing { get; set; }
        [Description("Plant population (/m2)")]
        public double Population { get; set; }
        


        [EventSubscribe("DoManagement")]
        private void OnDoManagement(object sender, EventArgs e)
        {
            if (DateUtilities.WithinDates(SowDate, Clock.Today, SowDate))
            {
                Wheat.Sow(population: Population, cultivar: CultivarName, depth: SowingDepth, rowSpacing: RowSpacing);    
            }
        
        }
        
    }
}
```
        RectangularZone MaizeZone: Length=1; Width=100; Slope=0
          Report: EventNames=[Clock].DoReport
            VariableNames:
              [Clock].Today
              [Maize].Phenology.CurrentStageName
              [Maize].AboveGround.Wt
              [Maize].AboveGround.N
              [Maize].Grain.Wt
              [Maize].Grain.Number
              [Maize].EarLive.Wt
              [Maize].Structure.LeafTipsAppeared
              [Maize].Leaf.ExpandedCohortNo
              [Maize].Structure.Height
              [Maize].Leaf.LAI
              [Maize].Leaf.CoverTotal
              [Maize].Leaf.Fw
              [Maize].Leaf.Fn
              [Maize].Total.Wt
              sum([Soil].SoilWater.SWmm) as SWTot
          Fertiliser
          Soil WURSoil: same as Wageningen2013old.WUR2013SoleMaize.SoleMaize.WURSoil
          SurfaceOrganicMatter: InitialResidueName=wheat_stubble; InitialResidueType=wheat; InitialResidueMass=500; InitialStandingFraction=0; InitialCPR=0; InitialCNR=100; FractionFaecesAdded=0.5
          SoluteManager
          Irrigation
          Operations
            // 2013-05-14  [Maize].Sow(population: 10, cultivar: Atrium, depth: 30, rowSpacing: 750);
            2013-05-14  [Irrigation].Apply(amount: 15);
            2013-04-19  [Fertiliser].Apply(Amount: 57, Type: Fertiliser.Types.NO3N);
            2013-05-30  [Fertiliser].Apply(Amount: 75, Type: Fertiliser.Types.NO3N);
            2013-06-18  [Fertiliser].Apply(Amount: 27, Type: Fertiliser.Types.NO3N);
            // 2013-10-16  [Maize].Harvest();
            // 2013-10-16  [Maize].EndCrop();
            2013-07-12  [Irrigation].Apply(amount: 15);
            2013-07-19  [Irrigation].Apply(amount: 15);
            2013-07-22  [Irrigation].Apply(amount: 15);
            2013-07-26  [Irrigation].Apply(amount: 15);
            2013-09-06  [Irrigation].Apply(amount: 15);
            2013-07-01  [Irrigation].Apply(amount: 50);
          Plant Maize: CropType=Maize; IsEnding=false; DaysAfterEnding=0
          Manager SowMaize
            SowDate = 14-May
            CultivarName = Atrium
            SowingDepth = 30
            RowSpacing = 750
            Population = 10
```csharp
using System;
using Models.Core;
using Models.PMF;
using Models.Soils;
using Models.Utilities;
using APSIM.Shared.Utilities;

namespace Models
{
    [Serializable]
    public class Script : Model
    {
        [Link] Clock Clock;
        [Link] Fertiliser Fertiliser;
        [Link] Summary Summary;
        [Link] Soil Soil;
        [Link] Plant Maize;
        Accumulator accumulatedRain;
        
        [Description("Sowing date (d-mmm)")]
        public string SowDate { get; set; }
    
        [Description("Cultivar to be sown")]
        public string CultivarName { get; set; }
        [Description("Sowing depth (mm)")]
        public double SowingDepth { get; set; }
        [Description("Row spacing (mm)")]
        public double RowSpacing { get; set; }
        [Description("Plant population (/m2)")]
        public double Population { get; set; }
        


        [EventSubscribe("DoManagement")]
        private void OnDoManagement(object sender, EventArgs e)
        {
            if (DateUtilities.WithinDates(SowDate, Clock.Today, SowDate))
            {
                Maize.Sow(population: Population, cultivar: CultivarName, depth: SowingDepth, rowSpacing: RowSpacing);    
            }
        
        }
        
    }
}
```
          Manager SetupMaizeRootZones
            UseExtraZone = True
```csharp
using System;
using Models.Core;
using System.Collections.Generic;
using System.Text;
using Models.PMF;
using Models;
using System.Xml.Serialization;
using APSIM.Shared.Utilities;

namespace Models
{
    [Serializable] 
    public class Script : Model
    {
        [Link] Plant Maize;
        [Link] Clock Clock;
        [Link] Zone zone;

        [Description("Use extra root zone")]
        public bool UseExtraZone { get; set; }

        
        [EventSubscribe("Commencing")]
        private void OnSimulationCommencing(object sender, EventArgs e)
        {
            if (UseExtraZone)
            {
            Maize.Root.ZoneNamesToGrowRootsIn.Add("WheatZone");
            Maize.Root.ZoneRootDepths.Add(50);
            Maize.Root.ZoneInitialDM.Add(10);
            }
        }
    }
}
```
    Experiment WUR2014
      Factors: same as WageningenStripCrop.WUR2013.Factors
      Simulation WUR2014BaseSimulation
        Clock: StartDate=2014-03-01; EndDate=2014-12-31
        Summary SummaryFile
        Weather: FileName=Volkel.met
        MicroClimate: a_interception=0; b_interception=1; c_interception=0; d_interception=0; soil_albedo=0.3; SoilHeatFluxFraction=0.4; NightInterceptionFraction=0.5; ReferenceHeight=2
        SoilArbitrator Soil Arbitrator
        RectangularZone WheatZone: Length=1; Width=1; Slope=0
          Report: same as WageningenStripCrop.WUR2013.WUR2013BaseSimulation.WheatZone.Report
          Fertiliser
          SurfaceOrganicMatter: InitialResidueName=wheat_stubble; InitialResidueType=wheat; InitialResidueMass=500; InitialStandingFraction=0; InitialCPR=0; InitialCNR=100; FractionFaecesAdded=0.5
          Soil WURSoil: same as Wageningen2013old.WUR2013SoleWheat.SoleWheat.WURSoil
          Operations
            // 2014-03-13  [Wheat].Sow(population: 250, cultivar: Tybalt, depth: 30, rowSpacing: 125);
            2014-03-13  [Irrigation].Apply(amount: 15);
            2014-04-09  [Fertiliser].Apply(Amount: 70, Type: Fertiliser.Types.NO3N);
            2014-05-09  [Fertiliser].Apply(Amount: 76, Type: Fertiliser.Types.NO3N);
            2014-06-06  [Fertiliser].Apply(Amount: 27, Type: Fertiliser.Types.NO3N);
            // 2014-08-04  [Wheat].Harvest();
            // 2014-08-04  [Wheat].EndCrop();
            2014-07-01  [Irrigation].Apply(amount: 30);
            2014-07-04  [Irrigation].Apply(amount: 30);
            2014-07-22  [Irrigation].Apply(amount: 30);
          SoluteManager
          Plant Wheat: CropType=Wheat; IsEnding=false; DaysAfterEnding=0
          Irrigation
          Manager SetupWheatRootZones: same as WageningenStripCrop.WUR2013.WUR2013BaseSimulation.WheatZone.SetupWheatRootZones
          Manager SowWheat
            SowDate = 13-Mar
            CultivarName = Tybalt
            SowingDepth = 30
            RowSpacing = 125
            Population = 250
            script: same as in WageningenStripCrop.WUR2013.WUR2013BaseSimulation.WheatZone.SowWheat
        RectangularZone MaizeZone: Length=1; Width=1; Slope=0
          Report: same as WageningenStripCrop.WUR2013.WUR2013BaseSimulation.MaizeZone.Report
          Fertiliser
          Soil WURSoil: same as Wageningen2013old.WUR2013SoleMaize.SoleMaize.WURSoil
          SurfaceOrganicMatter: InitialResidueName=wheat_stubble; InitialResidueType=wheat; InitialResidueMass=500; InitialStandingFraction=0; InitialCPR=0; InitialCNR=100; FractionFaecesAdded=0.5
          SoluteManager
          Operations
            // 2014-05-07  [Maize].Sow(population: 10, cultivar: Atrium, depth: 30, rowSpacing: 750);
            2014-05-07  [Irrigation].Apply(amount: 15);
            2014-04-09  [Fertiliser].Apply(Amount: 70, Type: Fertiliser.Types.NO3N);
            2014-05-09  [Fertiliser].Apply(Amount: 76, Type: Fertiliser.Types.NO3N);
            2014-06-06  [Fertiliser].Apply(Amount: 27, Type: Fertiliser.Types.NO3N);
            // 2014-09-23  [Maize].Harvest();
            // 2014-09-23  [Maize].EndCrop();
            2014-07-01  [Irrigation].Apply(amount: 30);
            2014-07-04  [Irrigation].Apply(amount: 30);
            2014-07-22  [Irrigation].Apply(amount: 30);
          Plant Maize: CropType=Maize; IsEnding=false; DaysAfterEnding=0
          Irrigation
          Manager SetupMaizeRootZones: same as WageningenStripCrop.WUR2013.WUR2013BaseSimulation.MaizeZone.SetupMaizeRootZones
          Manager SowMaize
            SowDate = 7-May
            CultivarName = Atrium
            SowingDepth = 30
            RowSpacing = 750
            Population = 10
            script: same as in WageningenStripCrop.WUR2013.WUR2013BaseSimulation.MaizeZone.SowMaize
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