Simulations: Version=150
  Memo Introduction
    # The APSIM Mungbean Model

    The APSIM Mungbean model has been developed using the Plant Modelling Framework (PMF) of ([brown_plant_2014]). This new framework provides a library of plant organ and process submodels that can be coupled, at runtime, to construct a model in much the same way that models can be coupled to construct a simulation. This means that dynamic composition of lower level process and organ classes (e.g. photosynthesis, leaf) into larger constructions (e.g. maize, wheat, sorghum) can be achieved by the model developer without additional coding.

    The model consists of:

    * a phenology model to simulate development between growth phases
    * a structure model to simulate plant morphology
    * a collection of organs to simulate the various plant parts
    * an arbitrator to allocate resources (N, biomass) to the various plant organs
  Replacements
    Report DailyReport: EventNames=[Clock].DoReport
      VariableNames:
        [Clock].Today
        [Mungbean].DaysAfterSowing
        [Mungbean].Phenology.Photoperiod.DayLength
        [Mungbean].Phenology.AccumulatedTT
        [Mungbean].Leaf.DeltaLAI.Vegetative.Delta.LAR
        [Weather].MinT
        [Weather].MeanT
        [Weather].MaxT
        [Soil].Temperature.Value
        ([Weather].MaxT-[Weather].MinT) as TempDiff
        [Phenology].Photoperiod
        [Mungbean].Root.NSupply
        [Soil].SoilWater.Eo
        [Soil].SoilWater.Es
        [Irrigation].IrrigationApplied
        [Root].WaterUptake
        [Weather].VP
        [Weather].VPD
        [Leaf].Photosynthesis.VPD
        [Soil].SoilWater.Drainage
        [Soil].SoilWater.Runoff
        [Soil].SoilWater.pond
        [Mungbean].Phenology.StartFloweringDAS
        [Mungbean].Phenology.StartGrainFillingDAS
        [Mungbean].Phenology.EndGrainFillDAS
        [Mungbean].Phenology.MaturityDAS
        [Mungbean].Phenology.AccumulatedTT
        [Mungbean].Leaf.NodeNumber
        [Mungbean].Phenology.CurrentPhaseName
        [Mungbean].Phenology.Stage
        [Mungbean].Phenology.CurrentStageName
        [Mungbean].Grain.Wt*10 as Yield
        [Mungbean].Grain.Wt
        [Mungbean].Shell.Wt
        [Mungbean].Shell.N+[Mungbean].Grain.N as Pod.N
        [Mungbean].Stem.Wt
        [Mungbean].Leaf.Wt
        [Mungbean].Root.Wt
        [Mungbean].Grain.Size
        [Mungbean].Leaf.Dead.Wt
        [Mungbean].AboveGround.Wt
        [Mungbean].AboveGroundLive.Wt
        [Mungbean].Grain.Dead.Wt
        [Mungbean].Pod.Wt
        [Mungbean].Grain.HarvestIndex
        [Mungbean].Grain.LiveOnlyHI
        [Mungbean].Leaf.Fw
        [Mungbean].Leaf.Fn
        [Mungbean].Grain.Number
        [Mungbean].Leaf.Area
        [Mungbean].Leaf.Photosynthesis.FT
        [Mungbean].Phenology.Photoperiod
        [Mungbean].Nodule.NFixed
        [Mungbean].Stem.Wt+[Mungbean].Pod.Wt as StemPodWt
        [Mungbean].Stem.N
        [Mungbean].Stem.Nconc
        [Mungbean].Leaf.N
        [Mungbean].Stem.Live.N
        [Mungbean].Grain.N
        [Mungbean].Shell.N
        [Mungbean].Shell.Live.N
        [Mungbean].Leaf.Live.N
        [Mungbean].Root.Live.N
        [Mungbean].Leaf.Live.NConc
        [Mungbean].Root.Live.NConc
        [Mungbean].Grain.Nconc
        [Mungbean].Leaf.Nconc
        [Mungbean].Stem.Nconc
        [Mungbean].Pod.NConc
        [Mungbean].Shell.Nconc
        [Mungbean].AboveGround.N
        [Mungbean].Grain.LiveOnlyNHI
        [Mungbean].Grain.NHI
        [Mungbean].Leaf.Dead.N
        [Mungbean].Pod.N
        [Mungbean].Nodule.NFixed
        [Mungbean].Root.RootFrontVelocity
        [Mungbean].Root.RootDepthStressFactor
        [Mungbean].Leaf.Transpiration
        [Mungbean].Leaf.WaterDemand
        [Mungbean].Root.Depth
        [Mungbean].Leaf.CoverTotal
        [Mungbean].Leaf.CoverTotal*100 as RadiationIntercepted
        [Mungbean].Leaf.CoverDead
        [Mungbean].Leaf.LAI
        [Mungbean].Leaf.Height
        [Mungbean].Leaf.SpecificArea
        [Mungbean].Arbitrator.N.TotalPlantDemand
        [Mungbean].Arbitrator.DM.TotalFixationSupply
        [Mungbean].Arbitrator.DM.TotalPlantDemand
        [Mungbean].Leaf.DMDemand.Total
        [Mungbean].Grain.DMDemand.Total
        [Mungbean].Stem.DMDemand.Total
        [Mungbean].Shell.DMDemand.Total
        [Mungbean].Root.DMDemand.Total
        [Soil].Nutrient.MineralN[1] as SoilN_0_10cm
        ([Soil].Nutrient.MineralN[2])+(0.3*[Soil].Nutrient.MineralN[1]) as SoilN_10_30cm
        Sum([Soil].Nutrient.MineralN[3:4]) as SoilN_30_60cm
        Sum([Soil].Nutrient.MineralN[5:6]) as SoilN_60_90cm
        [Soil].Nutrient.MineralN[7] as SoilN_90_120cm
        Sum([Soil].Nutrient.MineralN[1:4]) as SoilN90cm
        Sum([Soil].Nutrient.MineralN[1:5]) as SoilN120cm
        Sum([Soil].Nutrient.MineralN[1:8]) as TotNO3150
        TotNO3150+(([Soil].Nutrient.MineralN[9]/3)) as TotNO3160
        Sum([Soil].SoilWater.PAWmm[1:2]) as SoilPAW0_30cm
        Sum([Soil].SoilWater.PAWmm[3:4]) as SoilPAW30_60cm
        Sum([Soil].SoilWater.PAWmm[5:6]) as SoilPAW60_90cm
        [Soil].SoilWater.PAWmm[7] as SoilPAW90_120cm
        [MicroClimate].PrecipitationInterception
        [MicroClimate].PetAerodynamicTerm
        [MicroClimate].PetRadiationTerm
        [Weather].Rain
        Sum([Soil].SoilWater.SWmm[1:8]) as TotSWmm150
        (TotSWmm150+(0.33*[Soil].SoilWater.SWmm[9])) as TotSWmm160
        ([Soil].SoilWater.SW[1]) as SW10
        ((0.5*[Soil].SoilWater.SW[1])+(0.5*[Soil].SoilWater.SW[2])) as SW15
        [Soil].SoilWater.SW[2] as SW20
        ((0.5*[Soil].SoilWater.SW[2])+(0.5*[Soil].SoilWater.SW[3])) as SW30
        [Soil].SoilWater.SW[3] as SW40
        [Soil].SoilWater.SW[4] as SW50
        ((0.5*[Soil].SoilWater.SW[4])+(0.5*[Soil].SoilWater.SW[5])) as SW60
        [Soil].SoilWater.SW[5] as SW70
        [Soil].SoilWater.SW[6] as SW80
        ((0.5*[Soil].SoilWater.SW[6])+(0.5*[Soil].SoilWater.SW[7])) as SW90
        [Soil].SoilWater.SW[7] as SW110
        ((0.5*[Soil].SoilWater.SW[7])+(0.5*[Soil].SoilWater.SW[8])) as SW120
        [Soil].SoilWater.SW[8] as SW130
        ((0.5*[Soil].SoilWater.SW[8])+(0.5*[Soil].SoilWater.SW[9])) as SW150
        [Mungbean].Arbitrator.DM.TotalFixationSupply
        sum([Mungbean].Arbitrator.N.Fixation) as NFixed
        [Mungbean].Arbitrator.DM.TotalPlantDemand
        [Mungbean].Stem.RetranslocationWt
        [Mungbean].Leaf.NSupply.Reallocation
        [Mungbean].Arbitrator.DM.TotalFixationSupply
        sum([Mungbean].Arbitrator.N.Fixation) as NFixed
        [Mungbean].Arbitrator.DM.TotalPlantDemand
        [Mungbean].Root.PlantWaterPotentialFactor
        [Mungbean].Leaf.NodeNumber
        [Mungbean].Leaf.BranchNumber
        [Mungbean].Leaf.Number
        [Mungbean].Leaf.ExtinctionCoefficient
        [Mungbean].Leaf.Live.Wt
        [Mungbean].Leaf.Live.StructuralWt
        [Mungbean].Leaf.Live.MetabolicWt
        [Mungbean].Leaf.Allocated.MetabolicWt
        [Mungbean].Leaf.Allocated.StructuralWt
        [Mungbean].Leaf.Total.StructuralN
        [Mungbean].Leaf.Live.StructuralN
        [Mungbean].Leaf.Total.StorageWt
        [Mungbean].Leaf.Total.MetabolicN
        [Mungbean].Leaf.Total.StorageN
        [Mungbean].Stem.PotentialGrowth
        [Mungbean].Leaf.Dead.StructuralWt
        [Mungbean].Leaf.Dead.MetabolicWt
        [Mungbean].Leaf.Live.N
        [Mungbean].Leaf.Live.NConc
        [Mungbean].Leaf.Dead.Wt
        [Mungbean].Leaf.Dead.N
        [Mungbean].Leaf.Dead.NConc
        [Mungbean].Leaf.SpecificArea
        [Mungbean].Leaf.SpecificAreaCanopy
        [Mungbean].Leaf.Senesced.Wt
        [Mungbean].Leaf.Transpiration
        [Mungbean].Leaf.Total.StructuralWt
        [Mungbean].Stem.Live.Wt
        [Mungbean].Stem.Senesced.Wt
        [Mungbean].Stem.Total.StructuralWt
        [Mungbean].Stem.Live.StructuralWt
        [Mungbean].Stem.Live.StructuralN
        [Mungbean].Stem.Total.StorageWt
        [Mungbean].Stem.PotentialGrowth
        [Mungbean].Leaf.MaximumNConc
        [Mungbean].Leaf.MinimumNConc
        [Mungbean].Leaf.CriticalNConc
        [Mungbean].Stem.MaximumNConc
        [Mungbean].Stem.MinimumNConc
        [Mungbean].Stem.CriticalNConc
        [Mungbean].Shell.MaximumNConc
        [Mungbean].Shell.MinimumNConc
        [Mungbean].Shell.CriticalNConc
        [Mungbean].Shell.Live.Wt
        [Mungbean].Shell.Total.StructuralWt
        [Mungbean].Shell.Live.StructuralWt
        [Mungbean].Shell.Live.StructuralN
        [Mungbean].Shell.Total.StorageWt
        [Mungbean].Shell.Total.StructuralN
        [Mungbean].Stem.Total.StructuralN
    Report HarvestReport: EventNames=[Mungbean].Harvesting
      VariableNames:
        [Clock].Today
        [Mungbean].Phenology.Stage
        [Mungbean].Phenology.CurrentStageName
        [Mungbean].AboveGround.Wt
        [Mungbean].AboveGround.N
        [Mungbean].Grain.Total.Wt*10 as Yield
        [Mungbean].Grain.NConc
        [Mungbean].Grain.Size
        [Mungbean].Grain.Number
        [Mungbean].Grain.Total.Wt
        [Mungbean].Grain.Total.N
        [Mungbean].Total.Wt
        [Mungbean].Phenology.EmergenceDAS
        [Mungbean].Phenology.StartFloweringDAS
        [Mungbean].Phenology.StartGrainFillingDAS
        [Mungbean].Phenology.StartPodDevDAS
        [Mungbean].Phenology.EndGrainFillDAS
        [Mungbean].Phenology.MaturityDAS
        [Mungbean].Leaf.NodeNumber
        [Mungbean].Leaf.Area
  DataStore
    ExcelInput: FileNames=[ObservedData.xlsx]
      SheetNames=[PlantBiomassObserved, NitrogenObserved, CanopyObserved, SoilWaterObserved, PhenologyObserved]
    PredictedObserved PredictedObservedBiomass: PredictedTableName=HarvestReport; ObservedTableName=PlantBiomassObserved; FieldNameUsedForMatch=SimulationID; FieldName2UsedForMatch=Mungbean.Phenology.CurrentStageName; AllColumns=false
    PredictedObserved PredictedObservedPhenology: PredictedTableName=HarvestReport; ObservedTableName=PhenologyObserved; FieldNameUsedForMatch=SimulationID; FieldName2UsedForMatch=Mungbean.Phenology.CurrentStageName; AllColumns=false
    Probability: TableName=HarvestReport; Exceedence=false; FieldToSplitOn=SimulationName
  Folder Validation
    Folder Thomas Dissertation
      Memo Thomas Dissertation data description
        Thomas Dissertation includes 3 experiments that look at different irrigation regimes/timings/cultivars and compares mungbean to soybean.
        These experiments were used to build the original generic legume model ([robertson_simulation_2002], [ThomasThesis_2000]).
      Experiment Experiment_1_Berken
        Memo
          Experiment at Gatton, QLD, sown on November 28 1996 on CSIRO Cooper field station. Soil type was a deep alluvial, weakly-cracking vertisol. There were 3 treatments: 1) well-watered, 2) rainfed and 3) rainfed+irrigation during pod filling. The cultivar used was Berken.
        Factors
          Permutation
            Factor Water
              CompositeFactor Irr
                Specifications:
                  [Operations]
                  [SowingRule].Script.CultivarName=Berken
                  [AutoIrr].Script.AutoIrrigationOn=True
                Operations Irr
                  1996-11-29  [Irrigation].Apply(amount:10)
                  1996-12-04  [Irrigation].Apply(amount: 20)
                  1996-12-10  [Irrigation].Apply(amount: 20)
                  1996-12-15  [Irrigation].Apply(amount: 20)
                  1996-12-22  [Irrigation].Apply(amount: 35)
                  1996-12-29  [Irrigation].Apply(amount: 35)
                  1997-01-06  [Irrigation].Apply(amount: 35)
                  1997-01-13  [Irrigation].Apply(amount: 35)
                  1997-01-20  [Irrigation].Apply(amount: 35)
                  1997-01-27  [Irrigation].Apply(amount: 35)
                  1997-02-03  [Irrigation].Apply(amount: 35)
                  1997-02-10  [Irrigation].Apply(amount: 35)
                  1997-02-17  [Irrigation].Apply(amount: 35)
                  1997-02-24  [Irrigation].Apply(amount: 35)
                  1997-03-01  [Irrigation].Apply(amount: 35)
                  1997-03-08  [Irrigation].Apply(amount: 35)
                  1997-03-15  [Irrigation].Apply(amount: 35)
                  1997-03-22  [Irrigation].Apply(amount: 35)
                  1997-03-29  [Irrigation].Apply(amount: 35)
              CompositeFactor RF
                Specifications:
                  [Operations]
                  [SowingRule].Script.CultivarName=Berken
                Operations Irr
                  1996-11-20  [Irrigation].Apply(amount:80)
                  1996-11-29  [Irrigation].Apply(amount:80)
                  1996-12-04  [Irrigation].Apply(amount: 80)
                  1996-12-10  [Irrigation].Apply(amount: 80)
                  1996-12-15  [Irrigation].Apply(amount: 80)
                  1996-12-18  [Irrigation].Apply(amount: 80)
                  1996-12-22  [Irrigation].Apply(amount: 80)
              CompositeFactor PodIrr
                Specifications:
                  [Operations]
                  [AutoIrr].Script.AutoIrrigationOn=True
                  [SowingRule].Script.CultivarName=Berken
                Operations Irr
                  1996-11-29  [Irrigation].Apply(amount:10)
                  1996-12-04  [Irrigation].Apply(amount: 20)
                  1996-12-10  [Irrigation].Apply(amount: 20)
                  1996-12-15  [Irrigation].Apply(amount: 20)
                  1997-01-27  [Irrigation].Apply(amount: 57)
                  1997-02-05  [Irrigation].Apply(amount: 57)
                  1997-02-12  [Irrigation].Apply(amount: 57)
        Simulation Exp1Berken
          Summary summaryfile
          SoilArbitrator Soil Arbitrator
          Clock: Start=1996-11-04; End=1997-04-30
          Weather: FileName=GattonThomas.xlsx; ExcelWorkSheetName=Hermitage
          Zone paddock: Area=1; Slope=0; AspectAngle=0; Altitude=50
            MicroClimate: a_interception=0; b_interception=1; c_interception=0; d_interception=0; SoilHeatFluxFraction=0.4; MinimumHeightDiffForNewLayer=0; NightInterceptionFraction=0.5; ReferenceHeight=2
            Irrigation
            Fertiliser
            SurfaceOrganicMatter: InitialResidueName=wheat; InitialResidueType=wheat; InitialResidueMass=500; InitialStandingFraction=0; InitialCPR=0; InitialCNR=40
            Report DailyReport: EventNames=[Clock].DoReport
              VariableNames:
                [Clock].Today
                [DiagnosticsVariables].Script.AccumPlantN
                [DiagnosticsVariables].Script.AccumMineralisation
                [DiagnosticsVariables].Script.AccumDenit
                [DiagnosticsVariables].Script.AccumFert
                [DiagnosticsVariables].Script.AccumLeach
                [DiagnosticsVariables].Script.AccumDetach
                [DiagnosticsVariables].Script.DeltaSoilOMN
                [DiagnosticsVariables].Script.DeltaSurfaceOMN
                [DiagnosticsVariables].Script.DeltaSoilMineralN
                [Mungbean].Root.NSupply
                [Soil].SoilWater.Eo
                [Soil].SoilWater.Es
                [DiagnosticsVariables].Script.SWC
                [DiagnosticsVariables].Script.DUL
                [Soil].SoilWater.Drainage
                [Soil].SoilWater.Runoff
                [DiagnosticsVariables].Script.OutFlowLat
                [Soil].SoilWater.pond
                [DiagnosticsVariables].Script.AccumEO
                [DiagnosticsVariables].Script.AccumEP
                [DiagnosticsVariables].Script.AccumES
                [DiagnosticsVariables].Script.AccumDrainage
                [DiagnosticsVariables].Script.AccumRunoff
                [DiagnosticsVariables].Script.AccumRainfall
                [DiagnosticsVariables].Script.AccumIrrigation
                [DiagnosticsVariables].Script.AccumOutflowLat
                [DiagnosticsVariables].Script.SoilWaterDeficit
                [Mungbean].Grain.Live.Wt
                [Mungbean].Shell.Live.Wt
                [Mungbean].Stem.Live.Wt
                [Mungbean].Stem.Live.Wt
                [Mungbean].Grain.Live.N
                [Mungbean].Shell.Live.N
                [Mungbean].Leaf.Live.Wt
                [Mungbean].Root.Live.Wt
                [Mungbean].Leaf.Live.N
                [Mungbean].Root.Live.N
                [Mungbean].Leaf.Live.NConc
                [Mungbean].Root.Live.NConc
                [Mungbean].Root.WaterSupply
                [Mungbean].Root.WaterUptake
                [Mungbean].Leaf.Transpiration
                [Mungbean].Leaf.WaterDemand
                [Mungbean].Root.Depth
                [Mungbean].Leaf.CoverTotal
                [Mungbean].Leaf.CoverDead
                [Mungbean].Leaf.LAI
                [Mungbean].Leaf.Height
                [Mungbean].Leaf.PotentialBiomass
                [Soil].SoilWater.SWmm
                [Soil].Nutrient.NO3.kgha
                [DiagnosticsVariables].Script.SoilNitrogenContent
                [Mungbean].Arbitrator.N.TotalPlantDemand
                [MicroClimate].net_radn
                [MicroClimate].peta
                [MicroClimate].petr
                [DiagnosticsVariables].Script.FomN
                [DiagnosticsVariables].Script.HumN
                [DiagnosticsVariables].Script.BiomN
                [DiagnosticsVariables].Script.DltNMinRes
                [DiagnosticsVariables].Script.DltNMinTot
                [Mungbean].Leaf.Fw
                [Mungbean].Leaf.Fn
                [Mungbean].Phenology.CurrentPhase.Name
                [Mungbean].Phenology.Stage
                [Mungbean].Pod.Wt
                [Mungbean].Pod.N
                [Mungbean].Structure.LeafTipsAppeared
                [Mungbean].Structure.MainStemPrimordiaNo
                [Mungbean].Leaf.CohortArea[1]
                [Mungbean].Leaf.CohortArea[2]
                [Mungbean].Leaf.CohortArea[3]
                [Mungbean].Leaf.CohortArea[4]
                [Mungbean].Leaf.CohortArea[5]
                [Mungbean].Leaf.CohortArea[6]
                [Mungbean].Leaf.CohortArea[7]
                [Mungbean].Leaf.CohortArea[8]
                [Mungbean].Leaf.CohortArea[9]
                [Mungbean].Leaf.CohortArea[10]
                [Mungbean].Leaf.CohortArea[11]
                [Mungbean].Leaf.CohortArea[12]
                [Mungbean].Leaf.CohortArea[13]
                [Mungbean].Leaf.CohortArea[14]
                [Mungbean].Leaf.CohortArea[15]
                [Mungbean].Leaf.AppearedCohortNo
                [Mungbean].Leaf.DeadCohortNo
                [Mungbean].AboveGround.Wt
                [Mungbean].Phenology.Stage
                [Mungbean].Structure.MainStemPrimordiaNo
                [Mungbean].Phenology.NFF
                [MungbeanHarvestRule].Script.FinalTag
                [Mungbean].Grain.NumberFunction
                [Mungbean].Shell.PodNumber
                [Mungbean].Phenology.FN
                [Mungbean].Phenology.FN.TotalNodes
                [Mungbean].Phenology.FN.VegetativeNodes
            Manager HarvestRule
```csharp
using Models.PMF.Phen;
using APSIM.Shared.Utilities;
using System.Xml.Serialization;
using Models;
using Models.PMF;
using Models.Soils;
using System.Text;
using System.Collections.Generic;
using Models.Core;
using System;
using Models.Soils.Nutrients;

namespace Models
{
    [Serializable] 
    public class Script : Model
    {      
        [Link] private Plant Mungbean;
        [Link] private Zone zone;
        [Link(Type = LinkType.Path, Path = "[Mungbean].Phenology")]
        private Phenology phenology;
                    
        
        [EventSubscribe("StartOfSimulation")]
        private void OnSimulationCommencing(object sender, EventArgs e)
        {
        }       
        
        [EventSubscribe("DoManagement")]
        private void OnDoManagement(object sender, EventArgs e)
        {
        if (phenology.CurrentPhase.Name=="ReadyForHarvesting")
           {
           Mungbean.Harvest();
           Mungbean.EndCrop();
           }
        }
        
        [EventSubscribe("DoManagementCalculations")]
        private void OnDoManagementCalculations(object sender, EventArgs e)
        {
            
        }
    }
}
```
            Report HarvestReport: EventNames=[Soybean].Harvesting
              VariableNames:
                [Clock].Today
                [Mungbean].Phenology.Stage
                [Mungbean].Phenology.CurrentStageName
                [Mungbean].AboveGround.Wt
                [Mungbean].AboveGround.N
                [Mungbean].Grain.Total.Wt*10 as Yield
                [Mungbean].Grain.NConc
                [Mungbean].Grain.Size
                [Mungbean].Grain.Number
                [Mungbean].Grain.Total.Wt
                [Mungbean].Grain.Total.N
                [Mungbean].Total.Wt
            Plant Mungbean
            Manager Irrigatefixeddates
              IrrigateDates = 27-oct
              Amount = 0
              Depth = 0
              Efficiency = 1
              WillRunoff = False
```csharp
using APSIM.Shared.Utilities;
using Models.PMF;
using Models.Core;
using System;
namespace Models
{
    [Serializable]
    public class Script : Model
    {
        [Link] Clock Clock;
        [Link] Irrigation Irrigation;
        
        [Separator("A component to apply irrigation on one or more dates on every year of the simulation")]

        [Description("Enter the irrigation dates as dd-mmm with comma separation (any year information entered will be ignored)")] 
        public string[] IrrigateDates { get; set; }
        
        [Description("Amount of irrigation to be applied (mm)")] 
        public double Amount { get; set; }
        
        [Description("Depth in the soil to apply the  irrigation (mm)")] 
        public double Depth { get; set; }
        
        [Description("Efficiency of irrigation (0-1)")] 
        public double Efficiency { get; set; }
        
        [Description("Will the irrigation runoff?")] 
        public bool WillRunoff { get; set; }
        
        [EventSubscribe("DoManagement")]
        private void OnDoManagement(object sender, EventArgs e)
        {
            foreach (string ddMMM in IrrigateDates)
            {
                if (DateUtilities.DatesEqual(ddMMM, Clock.Today))
                    Irrigation.Apply(amount: Amount, depth: Depth, efficiency: Efficiency, willRunoff: WillRunoff);
            }
        }
    }
}
```
            Operations
            Soil: Latitude=0; Longitude=0
              WaterBalance SoilWater: SummerDate=1-Nov; SummerU=8.8; SummerCona=3.9; WinterDate=1-Apr; WinterU=6; WinterCona=3.9; DiffusConst=20; DiffusSlope=35.4; Salb=0.13; CN2Bare=62; CNRed=20; CNCov=0.8; Thickness=[150, 150, 150, 150, 150, 150, 300, 300, 200]; SWCON=[0.48, 0.48, 0.48, 0.38, 0.38, 0.38, 0.33, 0.35, 0.35]
              CERESSoilTemperature Temperature
              Organic: FOMCNRatio=33
                Thickness  Carbon  SoilCNRatio  FBiom  FInert  FOM
                150        2.2     14.5         0.02   0.36    0
                150        1.6     14.5         0.015  0.5     0
                150        1.35    14.5         0.01   0.59    0
                150        0.95    14.5         0.01   0.84    0
                150        1       14.5         0.01   0.8     0
                150        0.8     14.5         0.01   0.99    0
                300        0.45    14.5         0.01   0.99    0
                300        0.45    14.5         0.01   0.99    0
                300        0.45    14.5         0.01   0.99    0
              Chemical
                Thickness  NO3N  NH4N  PH
                150        0.14  1     7.5
                150        0.32  1     8
                150        0.3   1     8
                150        0.15  1     8
                150        0.17  1     8
                150        0.08  1     8
                300        0.08  1     8
                300        0.09  1     8
                300        0.09  1     8
              Nutrient
              Physical
                Thickness  BD    AirDry  LL15  DUL   SAT
                150        1.37  0.1     0.22  0.48  0.48
                150        1.27  0.19    0.22  0.48  0.48
                150        1.28  0.19    0.24  0.48  0.48
                150        1.33  0.19    0.24  0.38  0.42
                150        1.37  0.2     0.26  0.38  0.42
                150        1.42  0.2     0.26  0.38  0.42
                300        1.36  0.2     0.26  0.33  0.42
                300        1.35  0.2     0.27  0.35  0.42
                300        1.35  0.2     0.27  0.35  0.42
                SoilCrop MungbeanSoil: LL=[0.3, 0.3, 0.3, 0.32, 0.32, 0.32, 0.29, 0.29, 0.29]; KL=[0.04, 0.04, 0.04, 0.08, 0.08, 0.08, 0.08, 0.04, 0.04]; XF=[1, 1, 1, 1, 1, 1, 1, 1, 1]
              Sample Initial: Thickness=[150, 150, 150, 150, 150, 150, 300, 300, 300]; SW=[0.42, 0.42, 0.4, 0.4, 0.39, 0.36, 0.33, 0.34, 0.34]; SWUnits=Volumetric; OCUnits=Total; PHUnits=Water
            Manager SowingRule
              SowingDate = 11/28/1996 00:00:00
              CultivarName = Emerald
              RowSpacing = 375
              SowingDepth = 50
              SowingRate = 40
```csharp
using APSIM.Shared.Utilities;
using Models.PMF;
using Models.Core;
using System;
        
        namespace Models
        {
           [Serializable] 
           [System.Xml.Serialization.XmlInclude(typeof(Model))]
            public class Script : Model
            {      
               [Link] Plant Mungbean;
               [Link] Clock Clock;

               [Description("Spacing (mm) between rows")]
               public double RowSpacing { get; set; }
               [Description("Depth (mm) Grains are planted")]
               public double SowingDepth { get; set; }
               [Description("Seeds sown (/m2)")]
               public double SowingRate { get; set; }
               [Description("Cultivar")]
               [Display(Type=DisplayType.CultivarName)]
               public string CultivarName { get; set; }
               [Description("Sowing Date")]
               public DateTime SowingDate { get; set; }

               [EventSubscribe("DoManagement")]
               private void OnDoManagement(object sender, EventArgs e)
               {
                if (Clock.Today.Date == SowingDate)
                    Mungbean.Sow(population:SowingRate, cultivar:CultivarName, depth:SowingDepth, rowSpacing:RowSpacing, budNumber:1);
               }
            }
        }
```
            Manager AutoIrr
              AutoIrrigationOn = False
              Crop = [Mungbean]
              FASWThreshold = 0.9
              FASWDepth = 600
              weeks = 2
              afterSowing = 20
```csharp
using Models.Interfaces;
using System;
using Models.Core;
using System.Collections.Generic;
using System.Text;
using Models.Soils;
using Models.PMF;
using Models;
using System.Xml.Serialization;
using APSIM.Shared.Utilities;
using Models.Interfaces;
namespace Models
{
    [Serializable] 
    public class Script : Model
    {
        [Link] private Zone zone;
        [Link] private Irrigation irrigation;
        [Link] private ISoilWater waterBalance;
        [Link] private IPhysical soilPhysical;
        public double FASW { get; set; }
        public double WaterDeficit  { get; set; }
    


        [Description("Crop to irrigate")]
        public IPlant Crop { get; set; }
        
        [Description("Auto irrigation on?")]
        public bool AutoIrrigationOn { get; set; }

        [Description("Threshold fraction available water (0-1)")]
        public double FASWThreshold { get; set; }

        [Description("Soil depth (mm) to which fraction available water is calculated")]
        public double FASWDepth { get; set; }

        [Description("Minimum weeks between irrigations")]
        public double weeks { get; set; }

        [Description("Minimum days after sowing for first irrigation")]
        public int afterSowing { get; set; }

        private double irrigationGap = 0;    // gap between irrigations

        /// <summary>Called at start of simulation. Performs some basic error checking. </summary>
        [EventSubscribe("StartOfSimulation")]
        private void ErrorChecking(object sender, EventArgs args)
        {
            if (Crop == null)
                throw new Exception("No crop was specified in script " + Parent.Name);
        }

        [EventSubscribe("DoManagement")]
        private void OnDoManagement(object sender, EventArgs e)
        {
            if (AutoIrrigationOn && Crop.IsAlive)
            {
                   irrigationGap += 1;                // increment gap between irrigations
                CalculateFASW();                // calc FASW and WaterDeficit
                if ((FASW < FASWThreshold) && (irrigationGap >= weeks * 7))
                {
                    irrigation.Apply(WaterDeficit, depth: 0);
                    irrigationGap = 0;            // reset
                }
            }
            else
            {
                irrigationGap = weeks * 7 - afterSowing - 1;    // allow irrigation a number of days after it becomes alive/sown
            }
        }

        // Calculate the fraction of the potential available sw
        // Calculate the deficit amount from DUL
        private void CalculateFASW()
        {
            double[] LL15 = MathUtilities.Multiply(soilPhysical.LL15, soilPhysical.Thickness);
            double[] DUL = MathUtilities.Multiply(soilPhysical.DUL, soilPhysical.Thickness);
        
            int nlayr = GetLayerIndex(FASWDepth);
            double cumdep = MathUtilities.Sum(soilPhysical.Thickness, 0, nlayr, 0.0);    // tricky function that sums up to before nlayr

            double part_layer = MathUtilities.Divide((FASWDepth - cumdep), soilPhysical.Thickness[nlayr], 0.0);

            // note that results may be strange if swdep < ll15
            double avail_sw = (MathUtilities.Sum(waterBalance.SWmm, 0, nlayr, 0.0) + part_layer * waterBalance.SWmm[nlayr])
                            - (MathUtilities.Sum(LL15, 0, nlayr, 0.0) + part_layer * LL15[nlayr]);

            double pot_avail_sw = (MathUtilities.Sum(DUL, 0, nlayr, 0.0) + part_layer * DUL[nlayr])
                                - (MathUtilities.Sum(LL15, 0, nlayr, 0.0) + part_layer * LL15[nlayr]);
            
            FASW = MathUtilities.Divide(avail_sw, pot_avail_sw, 0.0);
            WaterDeficit = MathUtilities.Constrain(pot_avail_sw - avail_sw, 0.0, 100000);
        }

        // Get index of the layer that has this depth in it 
        private int GetLayerIndex(double pointDepth)
        {
            double[] cumThickness = soilPhysical.ThicknessCumulative;
            int layerIdx = 0;
            while ((layerIdx < cumThickness.Length) && (pointDepth > cumThickness[layerIdx]))
            {
                layerIdx += 1;
            }

            return layerIdx;
        }
    }
}
```
      Experiment Experiment_1_Emerald
        Memo
          Experiment at Gatton, QLD, sown on November 28 1996 on CSIRO Cooper field station. Soil type was a deep alluvial, weakly-cracking vertisol. There were 3 treatments: 1) well-watered, 2) rainfed and 3) rainfed+irrigation during pod filling. The cultivar used was Emerald.
        Factors
          Permutation
            Factor Water
              CompositeFactor Irr
                Specifications:
                  [Operations]
                  [SowingRule].Script.CultivarName=Emerald
                  [AutoIrr].Script.AutoIrrigationOn=True
                Operations Irr: same as Validation.Thomas Dissertation.Experiment_1_Berken.Factors.Permutation.Water.Irr.Irr
              CompositeFactor RF
                Specifications:
                  [Operations]
                  [SowingRule].Script.CultivarName=Emerald
                Operations Irr
                  1996-11-29  [Irrigation].Apply(amount:10)
                  1996-12-04  [Irrigation].Apply(amount: 20)
                  1996-12-10  [Irrigation].Apply(amount: 20)
                  1996-12-15  [Irrigation].Apply(amount: 20)
              CompositeFactor PodIrr
                Specifications:
                  [Operations]
                  [AutoIrr].Script.AutoIrrigationOn=False
                  [SowingRule].Script.CultivarName=Emerald
                Operations Irr: same as Validation.Thomas Dissertation.Experiment_1_Berken.Factors.Permutation.Water.PodIrr.Irr
        Simulation Exp1Emerald
          Summary summaryfile
          SoilArbitrator Soil Arbitrator
          Clock: Start=1996-11-04; End=1997-04-30
          Weather: FileName=GattonThomas.xlsx; ExcelWorkSheetName=Hermitage
          Zone paddock: Area=1; Slope=0; AspectAngle=0; Altitude=50
            MicroClimate: a_interception=0; b_interception=1; c_interception=0; d_interception=0; SoilHeatFluxFraction=0.4; MinimumHeightDiffForNewLayer=0; NightInterceptionFraction=0.5; ReferenceHeight=2
            Irrigation
            Fertiliser
            SurfaceOrganicMatter: InitialResidueName=wheat; InitialResidueType=wheat; InitialResidueMass=500; InitialStandingFraction=0; InitialCPR=0; InitialCNR=40
            Report DailyReport: same as Validation.Thomas Dissertation.Experiment_1_Berken.Exp1Berken.paddock.DailyReport
            Manager HarvestRule: same as Validation.Thomas Dissertation.Experiment_1_Berken.Exp1Berken.paddock.HarvestRule
            Report HarvestReport: same as Validation.Thomas Dissertation.Experiment_1_Berken.Exp1Berken.paddock.HarvestReport
            Plant Mungbean
            Manager Irrigatefixeddates: same as Validation.Thomas Dissertation.Experiment_1_Berken.Exp1Berken.paddock.Irrigatefixeddates
            Operations
            Soil: Latitude=0; Longitude=0
              WaterBalance SoilWater: SummerDate=1-Nov; SummerU=8.8; SummerCona=3.9; WinterDate=1-Apr; WinterU=6; WinterCona=3.9; DiffusConst=20; DiffusSlope=35.4; Salb=0.13; CN2Bare=62; CNRed=20; CNCov=0.8; Thickness=[150, 150, 150, 150, 150, 150, 300, 300, 200]; SWCON=[0.48, 0.48, 0.48, 0.45, 0.4, 0.39, 0.34, 0.34, 0.34]
              CERESSoilTemperature Temperature
              Organic: same as Validation.Thomas Dissertation.Experiment_1_Berken.Exp1Berken.paddock.soil.Organic
              Chemical: same as Validation.Thomas Dissertation.Experiment_1_Berken.Exp1Berken.paddock.soil.Chemical
              Nutrient
              Physical
                Thickness  BD    AirDry  LL15  DUL   SAT
                150        1.37  0.1     0.22  0.48  0.48
                150        1.27  0.19    0.22  0.48  0.48
                150        1.28  0.19    0.24  0.44  0.46
                150        1.33  0.19    0.24  0.43  0.45
                150        1.37  0.2     0.26  0.38  0.41
                150        1.42  0.2     0.26  0.36  0.4
                300        1.36  0.2     0.26  0.32  0.35
                300        1.35  0.2     0.27  0.32  0.35
                300        1.35  0.2     0.27  0.35  0.36
                SoilCrop MungbeanSoil: LL=[0.3, 0.3, 0.3, 0.32, 0.32, 0.32, 0.3, 0.3, 0.32]; KL=[0.08, 0.08, 0.08, 0.08, 0.08, 0.08, 0.08, 0.08, 0.08]; XF=[1, 1, 1, 1, 1, 1, 1, 1, 1]
              Sample Initial: Thickness=[150, 150, 150, 150, 150, 150, 300, 300, 300]; SW=[0.48, 0.48, 0.44, 0.43, 0.39, 0.36, 0.33, 0.33, 0.34]; SWUnits=Volumetric; OCUnits=Total; PHUnits=Water
            Manager SowingRule: same as Validation.Thomas Dissertation.Experiment_1_Berken.Exp1Berken.paddock.SowingRule
            Manager AutoIrr
              AutoIrrigationOn = False
              Crop = [Mungbean]
              FASWThreshold = 0.9
              FASWDepth = 600
              weeks = 0
              afterSowing = 0
              script: same as in Validation.Thomas Dissertation.Experiment_1_Berken.Exp1Berken.paddock.AutoIrr
      Experiment Experiment_2
        Memo
          Experiment at Gatton, QLD, sown on January 7 1997 on CSIRO Cooper field station. Soil type was a deep alluvial, weakly-cracking vertisol. There were 3 treatments: 1) well-watered, 2) rainfed and 3) terminal water stress with a rainout shelter. The cultivars used were Berken and Emerald.
        Factors
          Permutation
            Factor Water
              CompositeFactor IrrCultivar_Berken
                Specifications:
                  [Operations]
                  [SowingRule].Script.CultivarName=Berken
                  [AutoIrr].Script.AutoIrrigationOn=True
                Operations Irr
                  1997-01-08  [Irrigation].Apply(amount:10)
                  1997-01-13  [Irrigation].Apply(amount: 20)
                  1997-01-20  [Irrigation].Apply(amount: 20)
                  1997-01-27  [Irrigation].Apply(amount: 20)
                  1997-02-03  [Irrigation].Apply(amount: 65)
                  1997-02-10  [Irrigation].Apply(amount: 65)
                  1997-02-17  [Irrigation].Apply(amount: 65)
                  1997-02-24  [Irrigation].Apply(amount: 65)
                  1997-03-24  [Irrigation].Apply(amount: 65)
                  1997-03-31  [Irrigation].Apply(amount: 65)
              CompositeFactor IrrCultivar_Emerald
                Specifications:
                  [Operations]
                  [SowingRule].Script.CultivarName=Emerald
                  [AutoIrr].Script.AutoIrrigationOn=True
                Operations Irr
                  1997-01-08  [Irrigation].Apply(amount:10)
                  1997-01-13  [Irrigation].Apply(amount: 20)
                  1997-01-20  [Irrigation].Apply(amount: 20)
                  1997-01-27  [Irrigation].Apply(amount: 20)
                  1997-02-03  [Irrigation].Apply(amount: 35)
                  1997-02-10  [Irrigation].Apply(amount: 65)
                  1997-02-17  [Irrigation].Apply(amount: 65)
                  1997-02-24  [Irrigation].Apply(amount: 65)
                  1997-03-24  [Irrigation].Apply(amount: 65)
                  1997-03-31  [Irrigation].Apply(amount: 65)
              CompositeFactor RFCultivar_Berken
                Specifications:
                  [Operations]
                  [SowingRule].Script.CultivarName=Berken
                Operations Irr
                  1997-01-08  [Irrigation].Apply(amount:100)
                  1997-01-13  [Irrigation].Apply(amount: 120)
                  1997-01-20  [Irrigation].Apply(amount: 120)
              CompositeFactor RFCultivar_Emerald
                Specifications:
                  [Operations]
                  [SowingRule].Script.CultivarName=Emerald
                Operations Irr: same as Validation.Thomas Dissertation.Experiment_2.Factors.Permutation.Water.RFCultivar_Berken.Irr
              CompositeFactor TermStressCultivar_Berken
                Specifications:
                  [Operations]
                  [SowingRule].Script.CultivarName=Berken
                  [Soil].Initial.SW=0.330,0.330,0.330,0.30,0.30,0.30,0.27,0.270,0.270
                  [ClimateController].Script.RainfallMultiplier=0.4
                  [ClimateController].Script.ControlStart = 1-Feb
                  [ClimateController].Script.ControlEnd = 21-May
                Operations Irr
                  1997-01-08  [Irrigation].Apply(amount:60)
                  1997-01-13  [Irrigation].Apply(amount: 120)
                  1997-01-20  [Irrigation].Apply(amount: 120)
                  1997-01-27  [Irrigation].Apply(amount: 20)
                  1997-02-11  [Irrigation].Apply(amount: 25)
              CompositeFactor TermStressCultivar_Emerald
                Specifications:
                  [Operations]
                  [SowingRule].Script.CultivarName=Emerald
                  [Soil].Initial.SW=0.31,0.31,0.31,0.280,0.280,0.280,0.26,0.260,0.260
                  [ClimateController].Script.RainfallMultiplier=0.5
                  [ClimateController].Script.ControlStart = 1-Feb
                  [ClimateController].Script.ControlEnd = 21-May
                Operations Irr
                  1997-01-08  [Irrigation].Apply(amount:60)
                  1997-01-13  [Irrigation].Apply(amount: 20)
                  1997-01-20  [Irrigation].Apply(amount: 20)
                  1997-01-27  [Irrigation].Apply(amount: 20)
                  1997-02-11  [Irrigation].Apply(amount: 25)
        Simulation Exp2
          Summary summaryfile
          SoilArbitrator Soil Arbitrator
          Clock: Start=1996-12-04; End=1997-05-30
          Weather: FileName=GattonThomas.xlsx; ExcelWorkSheetName=Hermitage
          Zone paddock: Area=1; Slope=0; AspectAngle=0; Altitude=50
            Irrigation
            Fertiliser
            SurfaceOrganicMatter: InitialResidueName=wheat; InitialResidueType=wheat; InitialResidueMass=500; InitialStandingFraction=0; InitialCPR=0; InitialCNR=40
            Report DailyReport: EventNames=[Clock].DoReport
              VariableNames:
                [Clock].Today
                [DiagnosticsVariables].Script.AccumPlantN
                [DiagnosticsVariables].Script.AccumMineralisation
                [DiagnosticsVariables].Script.AccumDenit
                [DiagnosticsVariables].Script.AccumFert
                [DiagnosticsVariables].Script.AccumLeach
                [DiagnosticsVariables].Script.AccumDetach
                [DiagnosticsVariables].Script.DeltaSoilOMN
                [DiagnosticsVariables].Script.DeltaSurfaceOMN
                [DiagnosticsVariables].Script.DeltaSoilMineralN
                [Soybean].Root.NSupply
                [Soil].SoilWater.Eo
                [Soil].SoilWater.Es
                [DiagnosticsVariables].Script.SWC
                [DiagnosticsVariables].Script.DUL
                [Soil].SoilWater.Drainage
                [Soil].SoilWater.Runoff
                [DiagnosticsVariables].Script.OutFlowLat
                [Soil].SoilWater.pond
                [DiagnosticsVariables].Script.AccumEO
                [DiagnosticsVariables].Script.AccumEP
                [DiagnosticsVariables].Script.AccumES
                [DiagnosticsVariables].Script.AccumDrainage
                [DiagnosticsVariables].Script.AccumRunoff
                [DiagnosticsVariables].Script.AccumRainfall
                [DiagnosticsVariables].Script.AccumIrrigation
                [DiagnosticsVariables].Script.AccumOutflowLat
                [DiagnosticsVariables].Script.SoilWaterDeficit
                [Soybean].Grain.Live.Wt
                [Soybean].Shell.Live.Wt
                [Soybean].Stem.Live.Wt
                [Soybean].Stem.Live.Wt
                [Soybean].Grain.Live.N
                [Soybean].Shell.Live.N
                [Soybean].Leaf.Live.Wt
                [Soybean].Root.Live.Wt
                [Soybean].Leaf.Live.N
                [Soybean].Root.Live.N
                [Soybean].Leaf.Live.NConc
                [Soybean].Root.Live.NConc
                [Soybean].Root.WaterSupply
                [Soybean].Root.WaterUptake
                [Soybean].Leaf.Transpiration
                [Soybean].Leaf.WaterDemand
                [Soybean].Root.Depth
                [Soybean].Leaf.CoverTotal
                [Soybean].Leaf.CoverDead
                [Soybean].Leaf.LAI
                [Soybean].Leaf.Height
                [Soybean].Leaf.PotentialBiomass
                [Soil].SoilWater.SWmm
                [Soil].Nutrient.NO3.kgha
                [DiagnosticsVariables].Script.SoilNitrogenContent
                [Soybean].Arbitrator.N.TotalPlantDemand
                [MicroClimate].net_radn
                [MicroClimate].peta
                [MicroClimate].petr
                [DiagnosticsVariables].Script.FomN
                [DiagnosticsVariables].Script.HumN
                [DiagnosticsVariables].Script.BiomN
                [DiagnosticsVariables].Script.DltNMinRes
                [DiagnosticsVariables].Script.DltNMinTot
                [Soybean].Leaf.Fw
                [Soybean].Leaf.Fn
                [Soybean].Phenology.CurrentPhase.Name
                [Soybean].Phenology.Stage
                [Soybean].Pod.Wt
                [Soybean].Pod.N
                [Soybean].Structure.LeafTipsAppeared
                [Soybean].Structure.MainStemPrimordiaNo
                [Soybean].Leaf.CohortArea[1]
                [Soybean].Leaf.CohortArea[2]
                [Soybean].Leaf.CohortArea[3]
                [Soybean].Leaf.CohortArea[4]
                [Soybean].Leaf.CohortArea[5]
                [Soybean].Leaf.CohortArea[6]
                [Soybean].Leaf.CohortArea[7]
                [Soybean].Leaf.CohortArea[8]
                [Soybean].Leaf.CohortArea[9]
                [Soybean].Leaf.CohortArea[10]
                [Soybean].Leaf.CohortArea[11]
                [Soybean].Leaf.CohortArea[12]
                [Soybean].Leaf.CohortArea[13]
                [Soybean].Leaf.CohortArea[14]
                [Soybean].Leaf.CohortArea[15]
                [Soybean].Leaf.AppearedCohortNo
                [Soybean].Leaf.DeadCohortNo
                [Soybean].AboveGround.Wt
                [Soybean].Phenology.Stage
                [Soybean].Structure.MainStemPrimordiaNo
                [Soybean].Phenology.NFF
                [SoybeanHarvestRule].Script.FinalTag
                [Soybean].Grain.NumberFunction
                [Soybean].Shell.PodNumber
                [Soybean].Phenology.FN
                [Soybean].Phenology.FN.TotalNodes
                [Soybean].Phenology.FN.VegetativeNodes
            Manager HarvestRule: same as Validation.Thomas Dissertation.Experiment_1_Berken.Exp1Berken.paddock.HarvestRule
            Report HarvestReport: same as Validation.Thomas Dissertation.Experiment_1_Berken.Exp1Berken.paddock.HarvestReport
            Plant Mungbean
            Manager Irrigatefixeddates: same as Validation.Thomas Dissertation.Experiment_1_Berken.Exp1Berken.paddock.Irrigatefixeddates
            Operations
            Manager SowingRule
              SowingDate = 01/07/1997 00:00:00
              CultivarName = Emerald
              RowSpacing = 375
              SowingDepth = 50
              SowingRate = 40
              script: same as in Validation.Thomas Dissertation.Experiment_1_Berken.Exp1Berken.paddock.SowingRule
            Manager AutoIrr
              AutoIrrigationOn = False
              Crop = [Mungbean]
              FASWThreshold = 0.9
              FASWDepth = 600
              weeks = 1
              afterSowing = 10
              script: same as in Validation.Thomas Dissertation.Experiment_1_Berken.Exp1Berken.paddock.AutoIrr
            Soil: Latitude=0; Longitude=0
              WaterBalance SoilWater: SummerDate=1-Nov; SummerU=8.8; SummerCona=3.9; WinterDate=1-Apr; WinterU=6; WinterCona=3.9; DiffusConst=20; DiffusSlope=35.4; Salb=0.13; CN2Bare=62; CNRed=20; CNCov=0.8; Thickness=[150, 150, 150, 150, 150, 150, 300, 300, 200]; SWCON=[0.42, 0.4, 0.4, 0.37, 0.37, 0.33, 0.325, 0.33, 0.33]
              CERESSoilTemperature Temperature
              Organic: same as Validation.Thomas Dissertation.Experiment_1_Berken.Exp1Berken.paddock.soil.Organic
              Chemical: same as Validation.Thomas Dissertation.Experiment_1_Berken.Exp1Berken.paddock.soil.Chemical
              Nutrient
              Physical
                Thickness  BD    AirDry  LL15  DUL    SAT
                150        1.37  0.15    0.22  0.48   0.48
                150        1.27  0.2     0.22  0.48   0.48
                150        1.28  0.2     0.24  0.48   0.48
                150        1.33  0.2     0.24  0.45   0.45
                150        1.37  0.2     0.26  0.37   0.41
                150        1.42  0.2     0.26  0.33   0.37
                300        1.36  0.2     0.26  0.325  0.37
                300        1.35  0.2     0.27  0.33   0.37
                300        1.35  0.2     0.27  0.33   0.37
                SoilCrop MungbeanSoil: LL=[0.32, 0.32, 0.32, 0.34, 0.32, 0.32, 0.3, 0.28, 0.28]; KL=[0.08, 0.08, 0.06, 0.04, 0.04, 0.08, 0.08, 0.08, 0.08]; XF=[1, 1, 1, 1, 1, 1, 1, 1, 1]
              Sample Initial: Thickness=[150, 150, 150, 150, 150, 150, 300, 300, 300]; SW=[0.48, 0.48, 0.48, 0.42, 0.37, 0.33, 0.325, 0.33, 0.33]; SWUnits=Volumetric; OCUnits=Total; PHUnits=Water
            Manager ClimateController
              AllowControl = True
              EnableDate = 01/01/1997 00:00:00
              WithinYearControl = False
              ControlStart =
              ControlEnd =
              RainfallMultiplier = 1
              RainfallAddition = 0
              RadiationMultiplier = 1
              RadiationAddition = 0
              MinTMultiplier = 1
              MinTAddition = 0
              MaxTMultiplier = 1
              MaxTAddition = 0
              WindMultiplier = 1
              WindAddition = 0
              VPMultiplier = 1
              VPAddition = 0
```csharp
using Newtonsoft.Json;
using APSIM.Shared.Utilities;
using Models.Interfaces;
using Models.Soils;
using Models.PMF;
using Models.Core;
using System.Xml.Serialization;
using System;
using Models.Soils.Nutrients;
using Models.Climate;

namespace Models
{
    [Serializable]
    public class Script : Model
    {
        // - Links to APSIM models
        [Link] Zone zone;
        [Link] Clock clock;
        [Link] Weather weather;
        [Link] ISummary summary = null;

        // - Paramters for this manager
        [Description("Enable? Set to 'No' to completely disable this manager")] public bool AllowControl { get; set; }

        [Separator("General settings")]
        [Description("Start the climate controls beginning on date (dd/mmm/yyyy): ")] public DateTime EnableDate { get; set; }
        [Description("Implement climate control only during part of the year?")] public bool WithinYearControl { get; set; }
        [Description("Within each year, the first day to start the climate controls is (dd-mmm)")] public string ControlStart { get; set; }
        [Description("Within each year, end last day of climate control is (dd-mmm)")] public string ControlEnd { get; set; }

        [Separator("Rainfall")]
        [Description("Rainfall multiplier (-): ")] public double RainfallMultiplier { get; set; }
        [Description("Rainfall addition (mm): ")] public double RainfallAddition { get; set; }

        [Separator("Radiation")]
        [Description("Radiation multiplier (-): ")] public double RadiationMultiplier { get; set; }
        [Description("Radiation addition (MJ/m2): ")] public double RadiationAddition { get; set; }

        [Separator("Minimum temperature")]
        [Description("Minimum temperature multiplier (-): ")] public double MinTMultiplier { get; set; }
        [Description("Minimum temperature addition (C): ")] public double MinTAddition { get; set; }

        [Separator("Maximum temperature")]
        [Description("Maximum temperature multiplier (-): ")] public double MaxTMultiplier { get; set; }
        [Description("Maximum temperature addition (C): ")] public double MaxTAddition { get; set; }

        [Separator("Wind speed")]
        [Description("Wind speed multiplier (-): ")] public double WindMultiplier { get; set; }
        [Description("Wind speed addition (m/s): ")] public double WindAddition { get; set; }

        [Separator("Vapour pressure")]
        [Description("Vapour pressure multiplier (-): ")] public double VPMultiplier { get; set; }
        [Description("Vapour pressure addition (hPa): ")] public double VPAddition { get; set; }

        [JsonIgnore] public bool DoControl { get; set; }
        [JsonIgnore] public int DoControlInt { get; set; }

        [EventSubscribe("PreparingNewWeatherData")] private void OnDoManagement(object sender, EventArgs e)
        {
            // Check if this manager is enabled
            if ((AllowControl) && (clock.Today >= EnableDate))
            {
                DoControl = true;
                if (WithinYearControl)
                    DoControl = DateUtilities.WithinDates(ControlStart, clock.Today, ControlEnd); 
            }

            if (DoControl)
                DoControlInt = 1;
            else
                DoControlInt = 0;

            if (DoControl)
            {
                // do the weather alterations 
                weather.Rain = RainfallMultiplier * weather.Rain + RainfallAddition;
                weather.Radn = RadiationMultiplier * weather.Radn + RadiationAddition;
                weather.MinT = MinTMultiplier * weather.MinT + MinTAddition;
                weather.MaxT = MaxTMultiplier * weather.MaxT + MaxTAddition;
                weather.Wind = WindMultiplier * weather.Wind + WindAddition;
                weather.VP = VPMultiplier * weather.VP + VPAddition;
            }
        }
    }
}
```
            MicroClimate: a_interception=0; b_interception=1; c_interception=0; d_interception=0; SoilHeatFluxFraction=0.4; MinimumHeightDiffForNewLayer=0; NightInterceptionFraction=0.5; ReferenceHeight=2
            Manager PartialIrr
              AutoIrrigationOn = False
              Crop = [Mungbean]
              FASWThreshold = 0.9
              FASWDepth = 600
              weeks = 5
              afterSowing = 50
              script: same as in Validation.Thomas Dissertation.Experiment_1_Berken.Exp1Berken.paddock.AutoIrr
      Experiment Experiment_3
        Memo
          Experiment at Gatton, QLD, CSIRO Cooper field station. Soil type was a deep alluvial, weakly-cracking vertisol. There were 3 treatments: 1) well-watered, 2) rainfed and 3) stress with a rainout shelter for 4 weeks starting at different stages of mungbean growth imposed by having 3 sowing dates (3, 17, 30 December 1997). The cultivar used was Emerald.
        Factors
          Permutation
            Factor _Sow
              CompositeFactor Dec17Irr
                Specifications:
                  [SowingRule].Script.SowingDate=1997-12-17
                  [Operations]
                  [AutoIrr].Script.AutoIrrigationOn=True
                Operations _
                  1997-12-18  [Irrigation].Apply(amount: 20)
                  1998-01-02  [Irrigation].Apply(amount: 20)
                  1998-01-06  [Irrigation].Apply(amount: 25)
                  1998-01-13  [Irrigation].Apply(amount: 25)
                  1998-01-19  [Irrigation].Apply(amount: 30)
              CompositeFactor Dec17RF
                Specifications:
                  [SowingRule].Script.SowingDate=1997-12-17
                  [Operations]
                Operations _
                  1997-12-04  [Irrigation].Apply(amount: 40)
                  1997-12-18  [Irrigation].Apply(amount: 20)
                  1998-01-02  [Irrigation].Apply(amount: 20)
                  1998-01-06  [Irrigation].Apply(amount: 25)
                  1998-01-13  [Irrigation].Apply(amount: 25)
                  1998-01-19  [Irrigation].Apply(amount: 30)
              CompositeFactor Dec30RF
                Specifications:
                  [SowingRule].Script.SowingDate=1997-12-30
                  [Operations]
                Operations _
                  1997-12-04  [Irrigation].Apply(amount: 40)
                  1997-12-31  [Irrigation].Apply(amount: 25)
                  1998-01-02  [Irrigation].Apply(amount: 20)
                  1998-01-06  [Irrigation].Apply(amount: 25)
                  1998-01-13  [Irrigation].Apply(amount: 25)
                  1998-01-19  [Irrigation].Apply(amount: 30)
              CompositeFactor Dec3RO
                Specifications:
                  [SowingRule].Script.SowingDate=1997-12-3
                  [Operations]
                  [ClimateController].Script.RainfallMultiplier=0.1
                  [ClimateController].Script.ControlStart = 24-Jan
                  [ClimateController].Script.ControlEnd = 21-Feb
                Operations _
                  1997-12-04  [Irrigation].Apply(amount: 40)
                  1997-12-08  [Irrigation].Apply(amount: 40)
                  1997-12-12  [Irrigation].Apply(amount: 40)
                  1998-01-06  [Irrigation].Apply(amount: 35)
                  1998-02-24  [Irrigation].Apply(amount: 55)
                  1998-03-04  [Irrigation].Apply(amount: 55)
                  1998-03-11  [Irrigation].Apply(amount: 55)
                  1998-03-18  [Irrigation].Apply(amount: 55)
                  1998-03-25  [Irrigation].Apply(amount: 55)
              CompositeFactor Dec17RO
                Specifications:
                  [SowingRule].Script.SowingDate=1997-12-17
                  [Operations]
                  [ClimateController].Script.RainfallMultiplier=0.2
                  [ClimateController].Script.ControlStart = 24-Jan
                  [ClimateController].Script.ControlEnd = 21-Feb
                Operations _
                  1997-12-18  [Irrigation].Apply(amount: 26)
                  1997-12-23  [Irrigation].Apply(amount: 20)
                  1997-12-26  [Irrigation].Apply(amount: 23)
                  1998-01-02  [Irrigation].Apply(amount: 30)
                  1998-01-06  [Irrigation].Apply(amount: 26)
                  1998-02-05  [Irrigation].Apply(amount: 30)
                  1998-02-06  [Irrigation].Apply(amount: 30)
                  1998-02-13  [Irrigation].Apply(amount: 35)
                  1998-02-27  [Irrigation].Apply(amount: 35)
                  1998-03-04  [Irrigation].Apply(amount: 35)
                  1998-03-11  [Irrigation].Apply(amount: 35)
                  1998-03-18  [Irrigation].Apply(amount: 35)
                  1998-03-25  [Irrigation].Apply(amount: 35)
              CompositeFactor Dec30RO
                Specifications:
                  [SowingRule].Script.SowingDate=1997-12-30
                  [Operations]
                  [ClimateController].Script.RainfallMultiplier=0.3
                  [ClimateController].Script.ControlStart = 24-Jan
                  [ClimateController].Script.ControlEnd = 21-Feb
                Operations _
                  1997-12-31  [Irrigation].Apply(amount: 17)
                  1998-01-01  [Irrigation].Apply(amount: 33)
                  1998-01-02  [Irrigation].Apply(amount: 30)
                  1998-01-06  [Irrigation].Apply(amount: 26)
                  1998-01-13  [Irrigation].Apply(amount: 13)
                  1998-01-19  [Irrigation].Apply(amount: 20)
                  1998-02-18  [Irrigation].Apply(amount: 30)
                  1998-02-19  [Irrigation].Apply(amount: 30)
                  1998-03-04  [Irrigation].Apply(amount: 25)
                  1998-03-11  [Irrigation].Apply(amount: 25)
                  1998-03-18  [Irrigation].Apply(amount: 25)
                  1998-03-25  [Irrigation].Apply(amount: 25)
            Factor Cultivar: Specification=[SowingRule].Script.CultivarName=Emerald
        Simulation exp3
          Summary summaryfile
          SoilArbitrator Soil Arbitrator
          Clock: Start=1997-12-01; End=1998-04-30
          Weather: FileName=GattonThomas.xlsx; ExcelWorkSheetName=Hermitage
          MicroClimate: a_interception=0; b_interception=1; c_interception=0; d_interception=0; SoilHeatFluxFraction=0.4; MinimumHeightDiffForNewLayer=0; NightInterceptionFraction=0.5; ReferenceHeight=2
          Zone paddock: Area=1; Slope=0; AspectAngle=0; Altitude=50
            Irrigation
            Fertiliser
            SurfaceOrganicMatter: InitialResidueName=wheat; InitialResidueType=wheat; InitialResidueMass=500; InitialStandingFraction=0; InitialCPR=0; InitialCNR=40
            Report DailyReport: same as Validation.Thomas Dissertation.Experiment_1_Berken.Exp1Berken.paddock.DailyReport
            Manager HarvestRule: same as Validation.Thomas Dissertation.Experiment_1_Berken.Exp1Berken.paddock.HarvestRule
            Report HarvestReport: same as Validation.Thomas Dissertation.Experiment_1_Berken.Exp1Berken.paddock.HarvestReport
            Plant Mungbean
            Manager Irrigatefixeddates: same as Validation.Thomas Dissertation.Experiment_1_Berken.Exp1Berken.paddock.Irrigatefixeddates
            Operations
            Manager SowingRule
              SowingDate = 12/18/1997 00:00:00
              CultivarName = Emerald
              RowSpacing = 400
              SowingDepth = 50
              SowingRate = 40
              script: same as in Validation.Thomas Dissertation.Experiment_1_Berken.Exp1Berken.paddock.SowingRule
            Manager ClimateController: same as Validation.Thomas Dissertation.Experiment_2.Exp2.paddock.ClimateController
            Soil: Latitude=0; Longitude=0
              WaterBalance SoilWater: same as Validation.Thomas Dissertation.Experiment_1_Emerald.Exp1Emerald.paddock.soil.SoilWater
              CERESSoilTemperature Temperature
              Organic: same as Validation.Thomas Dissertation.Experiment_1_Berken.Exp1Berken.paddock.soil.Organic
              Chemical: same as Validation.Thomas Dissertation.Experiment_1_Berken.Exp1Berken.paddock.soil.Chemical
              Nutrient
              Physical
                Thickness  BD    AirDry  LL15  DUL   SAT
                150        1.37  0.1     0.15  0.42  0.48
                150        1.27  0.15    0.15  0.42  0.48
                150        1.28  0.19    0.19  0.41  0.46
                150        1.33  0.19    0.19  0.41  0.45
                150        1.37  0.22    0.22  0.4   0.45
                150        1.36  0.22    0.22  0.4   0.41
                300        1.36  0.25    0.25  0.34  0.4
                300        1.35  0.25    0.25  0.33  0.4
                300        1.35  0.25    0.25  0.32  0.4
                SoilCrop MungbeanSoil: LL=[0.15, 0.15, 0.25, 0.25, 0.32, 0.32, 0.29, 0.29, 0.31]; KL=[0.04, 0.04, 0.06, 0.06, 0.06, 0.06, 0.08, 0.08, 0.08]; XF=[1, 1, 1, 1, 1, 1, 1, 1, 1]
              Sample Initial: Thickness=[150, 150, 150, 150, 150, 150, 300, 300, 300]; SW=[0.15, 0.15, 0.32, 0.32, 0.34, 0.34, 0.29, 0.33, 0.32]; SWUnits=Volumetric; OCUnits=Total; PHUnits=Water
            Manager AutoIrr: same as Validation.Thomas Dissertation.Experiment_1_Emerald.Exp1Emerald.paddock.AutoIrr
      Experiment Experiment_4
        Memo
          Experiment at Gatton, QLD, CSIRO Cooper field station. Soil type was a deep alluvial, weakly-cracking vertisol. There were 3 treatments: 1) well-watered, 2) rainfed and 3) rainfed+irrigated for first 3 weeks and at podfilling. The cultivar used was Emerald.
        Factors
          Permutation
            Factor _Water
              CompositeFactor Irr: Specifications=[Operations]
                Operations Irr
                  1998-02-16  [Irrigation].Apply(amount: 35)
                  1998-02-22  [Irrigation].Apply(amount: 35)
                  1998-03-01  [Irrigation].Apply(amount: 35)
                  1998-03-08  [Irrigation].Apply(amount: 35)
                  1998-03-15  [Irrigation].Apply(amount: 35)
                  1998-03-22  [Irrigation].Apply(amount: 35)
                  1998-03-29  [Irrigation].Apply(amount: 35)
                  1998-04-05  [Irrigation].Apply(amount: 35)
                  1998-04-12  [Irrigation].Apply(amount: 35)
                  1998-04-19  [Irrigation].Apply(amount: 35)
                  1998-04-26  [Irrigation].Apply(amount: 35)
                  1998-05-03  [Irrigation].Apply(amount: 35)
                  1998-05-10  [Irrigation].Apply(amount: 35)
                  1998-05-17  [Irrigation].Apply(amount: 35)
                  1998-05-24  [Irrigation].Apply(amount: 35)
              CompositeFactor RF
                Specifications:
                  [Operations]
                Operations RF
                  1998-02-16  [Irrigation].Apply(amount: 35)
                  1998-02-22  [Irrigation].Apply(amount: 35)
                  1998-03-01  [Irrigation].Apply(amount: 35)
                  1998-03-08  [Irrigation].Apply(amount: 35)
              CompositeFactor RF_Irr
                Specifications:
                  [Operations]
                Operations RF_Irr
                  1998-02-16  [Irrigation].Apply(amount: 35)
                  1998-02-22  [Irrigation].Apply(amount: 35)
                  1998-03-01  [Irrigation].Apply(amount: 35)
                  1998-03-08  [Irrigation].Apply(amount: 35)
                  1998-05-01  [Irrigation].Apply(amount: 20)
            Factor Cultivar: Specification=[SowingRule].Script.CultivarName=Emerald
        Simulation exp4
          Summary summaryfile
          SoilArbitrator Soil Arbitrator
          Clock: Start=1998-02-01; End=1998-06-30
          Weather: FileName=GattonThomas.xlsx; ExcelWorkSheetName=Hermitage
          Zone paddock: Area=1; Slope=0; AspectAngle=0; Altitude=50
            Irrigation
            Fertiliser
            SurfaceOrganicMatter: InitialResidueName=wheat; InitialResidueType=wheat; InitialResidueMass=500; InitialStandingFraction=0; InitialCPR=0; InitialCNR=40
            Report DailyReport: same as Validation.Thomas Dissertation.Experiment_1_Berken.Exp1Berken.paddock.DailyReport
            Manager HarvestRule: same as Validation.Thomas Dissertation.Experiment_1_Berken.Exp1Berken.paddock.HarvestRule
            Report HarvestReport: same as Validation.Thomas Dissertation.Experiment_1_Berken.Exp1Berken.paddock.HarvestReport
            Plant Mungbean
            Manager Irrigatefixeddates: same as Validation.Thomas Dissertation.Experiment_1_Berken.Exp1Berken.paddock.Irrigatefixeddates
            Operations
            Manager SowingRule
              SowingDate = 02/16/1998 00:00:00
              CultivarName = Emerald
              RowSpacing = 375
              SowingDepth = 50
              SowingRate = 40
              script: same as in Validation.Thomas Dissertation.Experiment_1_Berken.Exp1Berken.paddock.SowingRule
            MicroClimate: a_interception=0; b_interception=1; c_interception=0; d_interception=0; SoilHeatFluxFraction=0.4; MinimumHeightDiffForNewLayer=0; NightInterceptionFraction=0.5; ReferenceHeight=2
            Manager AutoIrr
              AutoIrrigationOn = False
              Crop = [Mungbean]
              FASWThreshold = 0.9
              FASWDepth = 600
              weeks = 0
              afterSowing = 2
              script: same as in Validation.Thomas Dissertation.Experiment_1_Berken.Exp1Berken.paddock.AutoIrr
            Soil: Latitude=0; Longitude=0
              WaterBalance SoilWater: same as Validation.Thomas Dissertation.Experiment_1_Emerald.Exp1Emerald.paddock.soil.SoilWater
              CERESSoilTemperature Temperature
              Organic: same as Validation.Thomas Dissertation.Experiment_1_Berken.Exp1Berken.paddock.soil.Organic
              Chemical: same as Validation.Thomas Dissertation.Experiment_1_Berken.Exp1Berken.paddock.soil.Chemical
              Nutrient
              Physical
                Thickness  BD    AirDry  LL15  DUL   SAT
                150        1.37  0.1     0.15  0.38  0.42
                150        1.27  0.15    0.15  0.38  0.42
                150        1.28  0.19    0.19  0.38  0.42
                150        1.33  0.19    0.19  0.38  0.42
                150        1.37  0.22    0.22  0.38  0.42
                150        1.36  0.22    0.22  0.38  0.41
                300        1.36  0.25    0.25  0.34  0.4
                300        1.35  0.25    0.25  0.33  0.4
                300        1.35  0.25    0.25  0.32  0.4
                SoilCrop MungbeanSoil: LL=[0.25, 0.28, 0.32, 0.32, 0.32, 0.32, 0.29, 0.29, 0.29]; KL=[0.08, 0.08, 0.08, 0.08, 0.08, 0.08, 0.08, 0.08, 0.08]; XF=[1, 1, 1, 1, 1, 1, 1, 1, 1]
              Sample Initial: Thickness=[150, 150, 150, 150, 150, 150, 300, 300, 300]; SW=[0.38, 0.38, 0.38, 0.38, 0.38, 0.38, 0.34, 0.33, 0.32]; SWUnits=Volumetric; OCUnits=Total; PHUnits=Water
              InitialWater Initial water: PercentMethod=0; FractionFull=1
    Folder TOS
      Memo TOS data description
        These trials took place in Gatton on a vertisol at the Gilbert Site 2018-2021 looking at 6 cultivars (Jade, Crystal, CeleraII, Opal, Onyx, Berken) planted at 5-6 times in rainfed and irrigated (one year). The data has not been published yet, but was collected and will be published by Kylie Wenham. Berken was likely not a pure seed and cannot be compared to the results of Thomas' dissertation and so was removed from the model-building dataset. The first and second years of the experiment were entirely or patrially excluded from the model dataset because the data was concluded to be unreliable.
      Experiment TOSyear2Opal
        Factors
          Permutation
            Factor Sow
              CompositeFactor Irr
                Specifications:
                  [Operations]
                  [AutoIrr].Script.AutoIrrigationOn=True
                Operations Irr
                  2020-01-16  [Irrigation].Apply(amount:54.5)
                  2020-02-16  [Irrigation].Apply(amount:54.5)
                  2020-03-16  [Irrigation].Apply(amount:54.5)
              CompositeFactor RF: Specifications=[Operations]
                Operations Irr
                  2020-01-16  [Irrigation].Apply(amount:34.5)
                  2020-02-16  [Irrigation].Apply(amount:24.5)
                  2020-03-16  [Irrigation].Apply(amount:24.5)
            Factor Cv: Specification=[SowingRule].Script.CultivarName=Opal
        Simulation TOSyear2Opal
          Summary summaryfile
          SoilArbitrator Soil Arbitrator
          Clock: Start=2019-10-01; End=2020-05-24
          Weather: FileName=GattonKylie.xlsx; ExcelWorkSheetName=Kylie
          Zone paddock: Area=1; Slope=0; AspectAngle=0; Altitude=50
            Irrigation
            Fertiliser
            SurfaceOrganicMatter: InitialResidueName=wheat; InitialResidueType=wheat; InitialResidueMass=500; InitialStandingFraction=0; InitialCPR=0; InitialCNR=40
            Report DailyReport: same as Validation.Thomas Dissertation.Experiment_1_Berken.Exp1Berken.paddock.DailyReport
            Manager HarvestRule: same as Validation.Thomas Dissertation.Experiment_1_Berken.Exp1Berken.paddock.HarvestRule
            Report HarvestReport: same as Validation.Thomas Dissertation.Experiment_1_Berken.Exp1Berken.paddock.HarvestReport
            Plant Mungbean
            Manager Irrigatefixeddates: same as Validation.Thomas Dissertation.Experiment_1_Berken.Exp1Berken.paddock.Irrigatefixeddates
            Operations
            Manager SowingRule
              SowingDate = 01/14/2020 00:00:00
              CultivarName = Opal
              RowSpacing = 540
              SowingDepth = 30
              SowingRate = 30.8
              script: same as in Validation.Thomas Dissertation.Experiment_1_Berken.Exp1Berken.paddock.SowingRule
            Manager AutoIrr: same as Validation.Thomas Dissertation.Experiment_1_Emerald.Exp1Emerald.paddock.AutoIrr
            MicroClimate: a_interception=0; b_interception=1; c_interception=0; d_interception=0; SoilHeatFluxFraction=0.4; MinimumHeightDiffForNewLayer=0; NightInterceptionFraction=0.5; ReferenceHeight=2
            Soil: SoilType=APS6Soil; LocalName=APS6Site; Site=APS6Site; NearestTown=Unknown; Region=Lawes; NaturalVegetation=Unknown; Latitude=0; Longitude=0
              WaterBalance SoilWater: SummerDate=1-Nov; SummerU=6; SummerCona=3.5; WinterDate=1-Apr; WinterU=6; WinterCona=3.5; DiffusConst=88; DiffusSlope=35.4; Salb=0.13; CN2Bare=60; CNRed=20; CNCov=0.8; DischargeWidth=0; CatchmentArea=0
                Thickness  SWCON  KLAT
                150        0.3    0
                150        0.3    0
                150        0.3    0
                150        0.3    0
                150        0.3    0
                150        0.3    0
                300        0.3    0
                300        0.3    0
                300        0.3    0
              Organic: FOMCNRatio=60
                Thickness  Carbon  SoilCNRatio  FBiom  FInert  FOM
                150        2.08    14.5         0.03   0.45    34.7129
                150        1.21    14.5         0.02   0.6     27.0344
                150        1.21    14.5         0.01   0.78    16.3972
                150        1.15    14.5         0.01   0.78    16.397
                150        1       14.5         0.01   0.9     9.945
                150        1       14.5         0.01   0.9     9.945
                300        0.8     14.5         0.01   0.99    6.032
                300        0.45    14.5         0.01   0.99    3.659
                300        0.45    14.5         0.01   0.99    2.219
              Chemical
                Thickness  NO3N  NH4N  PH
                150        10    3     7.5
                150        5     2     8
                150        3     1     8
                150        3     1     8
                150        2     0.8   8
                150        2     0.8   8
                300        1     0.8   8
                300        0.1   0.5   8
                300        0.1   0.5   8
              CERESSoilTemperature Temperature
              Nutrient
              Physical
                Thickness  BD    AirDry  LL15    DUL   SAT
                150        1.38  0.2     0.208   0.42  0.45
                150        1.34  0.273   0.2731  0.42  0.45
                150        1.35  0.286   0.2857  0.42  0.45
                150        1.35  0.286   0.286   0.42  0.45
                150        1.5   0.286   0.2863  0.4   0.43
                150        1.5   0.286   0.286   0.4   0.43
                300        1.49  0.286   0.286   0.36  0.4
                300        1.46  0.286   0.286   0.36  0.4
                300        1.46  0.286   0.286   0.36  0.4
                SoilCrop MungbeanSoil
                  LL=[0.258, 0.273, 0.286, 0.286, 0.286, 0.286, 0.286, 0.286, 0.286]
                  KL=[0.08, 0.08, 0.06, 0.06, 0.06, 0.04, 0.02, 0.02, 0.01]
                  XF=[1, 1, 1, 1, 1, 1, 1, 1, 1]
              Sample Initial Water: SWUnits=Volumetric; OCUnits=Total; PHUnits=Water
                Thickness  NO3  NH4  SW     PH
                150        20   7    0.258  7.5
                150        5    6    0.273  7.9
                150        4    8    0.286  8.2
                150        1    5    0.286  8.2
                150        0.5  0.5  0.286  8.9
                150        0.5  0.5  0.286  8
                300        0.5  0.5  0.286  8
                300        0.1  0.1  0.286  8
                300        0.1  0.1  0.286  8
      Experiment TOSyear3
        Factors
          Permutation
            Factor Sow
              CompositeFactor Sept20
                Specifications:
                  [SowingRule].Script.SowingDate=2020-9-10
                  [Soil].Initial Water.SW=0.208,0.273,0.306,0.306,0.306,0.3,0.310,0.330,0.330
                  [Operations]
                  [AutoIrr].Script.AutoIrrigationOn=True
                Operations Irr
                  2020-09-10  [Irrigation].Apply(amount:18.5)
                  2020-09-17  [Irrigation].Apply(amount:17.5)
                  2020-09-30  [Irrigation].Apply(amount:19.5)
                  2020-10-09  [Irrigation].Apply(amount:21.5)
                  2020-11-24  [Irrigation].Apply(amount:17.5)
              CompositeFactor Oct20
                Specifications:
                  [SowingRule].Script.SowingDate=2020-10-15
                  [Soil].Initial Water.SW=0.408,0.373,0.386,0.386,0.386,0.3,0.310,0.330,0.330
                  [Operations]
                  [AutoIrr].Script.AutoIrrigationOn=True
                Operations Irr
                  2020-10-16  [Irrigation].Apply(amount:31.75)
                  2020-10-19  [Irrigation].Apply(amount:29.75)
                  2020-11-24  [Irrigation].Apply(amount:28.75)
              CompositeFactor Nov20
                Specifications:
                  [SowingRule].Script.SowingDate=2020-11-24
                  [Soil].Initial Water.SW=0.308,0.373,0.386,0.386,0.386,0.3,0.310,0.330,0.330
                  [Operations]
                  [SomeIrr].Script.AutoIrrigationOn=True
                Operations Irr
                  2020-11-24  [Irrigation].Apply(amount:9.75)
              CompositeFactor Jan21
                Specifications:
                  [SowingRule].Script.SowingDate=2021-1-14
                  [Operations]
                Operations Irr
                  2021-01-15  [Irrigation].Apply(amount:44.75)
                  2021-02-10  [Irrigation].Apply(amount:48.5)
                  2021-02-23  [Irrigation].Apply(amount:53.5)
                  2021-02-28  [Irrigation].Apply(amount:53.5)
                  2021-03-03  [Irrigation].Apply(amount:53.5)
                  2021-03-23  [Irrigation].Apply(amount:53.5)
              CompositeFactor Feb21
                Specifications:
                  [SowingRule].Script.SowingDate=2021-02-22
                  [Soil].Initial Water.SW=0.308,0.373,0.386,0.386,0.386,0.3,0.310,0.330,0.330
                  [Operations]
                Operations Irr
                  2021-01-15  [Irrigation].Apply(amount:14.75)
            Factor Cv
              Specification=[SowingRule].Script.CultivarName=Opal,Onyx,CeleraII,Crystal,Jade
        Simulation TOSyear3
          Summary summaryfile
          SoilArbitrator Soil Arbitrator
          Clock: Start=2020-09-01; End=2021-08-24
          Weather: FileName=GattKylAll.sim
          Zone paddock: Area=1; Slope=0; AspectAngle=0; Altitude=50
            Irrigation
            Fertiliser
            SurfaceOrganicMatter: InitialResidueName=wheat; InitialResidueType=wheat; InitialResidueMass=500; InitialStandingFraction=0; InitialCPR=0; InitialCNR=40
            Report DailyReport: same as Validation.Thomas Dissertation.Experiment_1_Berken.Exp1Berken.paddock.DailyReport
            Manager HarvestRule: same as Validation.Thomas Dissertation.Experiment_1_Berken.Exp1Berken.paddock.HarvestRule
            Report HarvestReport: same as Validation.Thomas Dissertation.Experiment_1_Berken.Exp1Berken.paddock.HarvestReport
            Plant Mungbean
            Manager Irrigatefixeddates: same as Validation.Thomas Dissertation.Experiment_1_Berken.Exp1Berken.paddock.Irrigatefixeddates
            Operations
            Manager SowingRule
              CultivarName = Emerald
              RowSpacing = 540
              SowingDepth = 30
              SowingRate = 30.8
              SowingDate = 11/28/1996 00:00:00
              script: same as in Validation.Thomas Dissertation.Experiment_1_Berken.Exp1Berken.paddock.SowingRule
            Manager AutoIrr
              AutoIrrigationOn = False
              Crop = [Mungbean]
              FASWThreshold = 0.9
              FASWDepth = 600
              weeks = 3
              afterSowing = 20
              script: same as in Validation.Thomas Dissertation.Experiment_1_Berken.Exp1Berken.paddock.AutoIrr
            MicroClimate: a_interception=0; b_interception=1; c_interception=0; d_interception=0; SoilHeatFluxFraction=0.4; MinimumHeightDiffForNewLayer=0; NightInterceptionFraction=0.5; ReferenceHeight=2
            Soil: SoilType=APS6Soil; LocalName=APS6Site; Site=APS6Site; NearestTown=Unknown; Region=Lawes; NaturalVegetation=Unknown; Latitude=0; Longitude=0
              WaterBalance SoilWater: same as Validation.TOS.TOSyear2Opal.TOSyear2Opal.paddock.Soil.SoilWater
              Organic: same as Validation.TOS.TOSyear2Opal.TOSyear2Opal.paddock.Soil.Organic
              Chemical: same as Validation.TOS.TOSyear2Opal.TOSyear2Opal.paddock.Soil.Chemical
              CERESSoilTemperature Temperature
              Nutrient
              Physical
                Thickness  BD    AirDry  LL15    DUL   SAT
                150        1.38  0.2     0.208   0.42  0.45
                150        1.34  0.273   0.2731  0.42  0.45
                150        1.35  0.286   0.2857  0.42  0.45
                150        1.35  0.286   0.286   0.42  0.45
                150        1.5   0.286   0.2863  0.4   0.43
                150        1.5   0.286   0.286   0.4   0.43
                300        1.49  0.286   0.286   0.36  0.4
                300        1.46  0.286   0.286   0.36  0.4
                300        1.46  0.286   0.286   0.36  0.4
                SoilCrop MungbeanSoil: LL=[0.3, 0.31, 0.32, 0.33, 0.33, 0.33, 0.33, 0.33, 0.33]; KL=[0.08, 0.08, 0.06, 0.06, 0.06, 0.04, 0.02, 0.02, 0.01]; XF=[1, 1, 1, 1, 1, 1, 1, 1, 1]
              Sample Initial Water: SWUnits=Volumetric; OCUnits=Total; PHUnits=Water
                Thickness  NO3  NH4  SW    PH
                150        20   7    0.32  7.5
                150        5    6    0.32  7.9
                150        4    8    0.32  8.2
                150        1    5    0.32  8.2
                150        0.5  0.5  0.38  8.9
                150        0.5  0.5  0.38  8
                300        0.5  0.5  0.36  8
                300        0.1  0.1  0.36  8
                300        0.1  0.1  0.36  8
            Manager SomeIrr
              AutoIrrigationOn = False
              Crop = [Mungbean]
              FASWThreshold = 0.9
              FASWDepth = 600
              weeks = 3
              afterSowing = 30
              script: same as in Validation.Thomas Dissertation.Experiment_1_Berken.Exp1Berken.paddock.AutoIrr
    Folder Muchow
      Memo
        This dataset ([Muchow_etal_1993]) includes the cultvar "King" grown under irrigated conditions in a subtropical environment at the Gatton Research Station in southeastern Queensland, Australia and Kimberly, NT, Australia.  Plants were sampled almost weekly for biomass partitioning, nitrogen and plant development.
      Simulation GattonJan91990
        Clock: Start=1990-01-01; End=1990-05-31
        Summary summaryfile
        Weather: FileName=Gatton.met
        SoilArbitrator Soil Arbitrator
        Zone paddock: Area=1; Slope=0; AspectAngle=0; Altitude=50
          MicroClimate: a_interception=0; b_interception=1; c_interception=0; d_interception=0; SoilHeatFluxFraction=0.4; MinimumHeightDiffForNewLayer=0; NightInterceptionFraction=0.5; ReferenceHeight=2
          Irrigation
          Fertiliser
          SurfaceOrganicMatter: InitialResidueName=maize; InitialResidueType=maize; InitialResidueMass=100; InitialStandingFraction=0; InitialCPR=0; InitialCNR=55
          Report DailyReport: same as Validation.Thomas Dissertation.Experiment_1_Berken.Exp1Berken.paddock.DailyReport
          Manager SowingRule
            SowingDate = 01/09/1990 00:00:00
            CultivarName = King
            RowSpacing = 200
            SowingDepth = 50
            SowingRate = 35
            script: same as in Validation.Thomas Dissertation.Experiment_1_Berken.Exp1Berken.paddock.SowingRule
          Report HarvestReport: EventNames=[Soybean].Harvesting
            VariableNames:
              [Clock].Today
              [Mungbean].Structure.MainStemPrimordiaNo
              [Mungbean].Phenology.NFF
              [Mungbean].Script.FinalTag
          Soil: SoilType=APS6Soil; LocalName=APS6Site; Site=APS6Site; NearestTown=Unknown; Region=Lawes; NaturalVegetation=Unknown; Latitude=0; Longitude=0
            Physical
              Thickness  BD    AirDry  LL15  DUL   SAT
              150        1.38  0.1     0.2   0.38  0.43
              150        1.34  0.1     0.2   0.38  0.43
              150        1.35  0.1     0.22  0.4   0.43
              150        1.35  0.1     0.22  0.4   0.43
              150        1.5   0.1     0.18  0.4   0.43
              150        1.5   0.1     0.18  0.4   0.43
              300        1.49  0.1     0.14  0.39  0.42
              300        1.46  0.1     0.2   0.38  0.4
              300        1.46  0.1     0.2   0.38  0.4
              SoilCrop MungbeanSoil: LL=[0.2, 0.2, 0.22, 0.22, 0.18, 0.18, 0.14, 0.25, 0.28]; KL=[0.06, 0.05, 0.05, 0.05, 0.04, 0.04, 0.04, 0.04, 0.06]; XF=[1, 1, 1, 1, 1, 1, 1, 1, 1]
            WaterBalance SoilWater: same as Validation.TOS.TOSyear2Opal.TOSyear2Opal.paddock.Soil.SoilWater
            Organic: FOMCNRatio=60
              Thickness  Carbon  SoilCNRatio  FBiom  FInert  FOM
              150        2.2     14.5         0.03   0.45    34.7129
              150        1.6     14.5         0.02   0.6     27.0344
              150        1.15    14.5         0.01   0.78    16.3972
              150        1.15    14.5         0.01   0.78    16.397
              150        1       14.5         0.01   0.9     9.945
              150        1       14.5         0.01   0.9     9.945
              300        0.8     14.5         0.01   0.99    6.032
              300        0.45    14.5         0.01   0.99    3.659
              300        0.45    14.5         0.01   0.99    2.219
            Chemical: same as Validation.TOS.TOSyear2Opal.TOSyear2Opal.paddock.Soil.Chemical
            Sample Initial Water: Thickness=[150, 150, 150, 150, 150, 150, 300, 300, 300]; SWUnits=Volumetric; OCUnits=Total; PHUnits=Water
              SW=[0.326, 0.326, 0.346, 0.346, 0.333, 0.333, 0.315, 0.326, 0.326]
            CERESSoilTemperature Temperature
            Nutrient
          Manager HarvestRule: same as Validation.Thomas Dissertation.Experiment_1_Berken.Exp1Berken.paddock.HarvestRule
          Plant Mungbean
          Manager AutoIrr
            AutoIrrigationOn = True
            Crop = [Mungbean]
            FASWThreshold = 0.9
            FASWDepth = 600
            weeks = 0
            afterSowing = 2
            script: same as in Validation.Thomas Dissertation.Experiment_1_Berken.Exp1Berken.paddock.AutoIrr
      Experiment Kimberly1980
        Factors
          Permutation
            Factor Dens: Specification=[SowingRule].Script.SowingRate=10,27,50
        Simulation Kimberly1980
          Clock: Start=1980-01-10; End=1980-05-31
          Summary summaryfile
          Weather: FileName=Kimberly1980.xlsx; ExcelWorkSheetName=Emerald
          SoilArbitrator Soil Arbitrator
          Zone paddock: Area=1; Slope=0; AspectAngle=0; Altitude=50
            MicroClimate: a_interception=0; b_interception=1; c_interception=0; d_interception=0; SoilHeatFluxFraction=0.4; MinimumHeightDiffForNewLayer=0; NightInterceptionFraction=0.5; ReferenceHeight=2
            Irrigation
            Manager AutomaticIrrigation
              AutoIrrigationOn = False
              FASWThreshold = 0.9
              FASWDepth = 900
```csharp
using Models.Interfaces;
using APSIM.Shared.Utilities;
using System.Xml.Serialization;
using Models;
using Models.PMF;
using Models.Soils;
using System.Text;
using System.Collections.Generic;
using Models.Core;
using System;
using Models.Soils.Nutrients;

namespace Models
{
    [Serializable] 
    public class Script : Model
    {
        [Link] private Zone zone;
        [Link] private Irrigation irrigation;
        [Link] private Soil soil;
        [Link]
        private IPhysical soilPhysical;
        [Link]
        private ISoilWater waterBalance;
        public double FASW { get; set; }
        public double WaterDeficit  { get; set; }
    
        
        [Description("Auto irrigation on?")]
        public bool AutoIrrigationOn { get; set; }

        [Description("Threshold fraction available water (0-1)")]
        public double FASWThreshold { get; set; }

        [Description("Soil depth (mm) to which fraction available water is calculated")]
        public double FASWDepth { get; set; }

        [EventSubscribe("DoManagement")]
        private void OnDoManagement(object sender, EventArgs e)
        {
            CalculateFASW();
            if (AutoIrrigationOn)
            {
                if (FASW < FASWThreshold)
                {
                    double amount = 10;
                    irrigation.Apply(WaterDeficit, depth: 0);
                }
            }
        }
        
        private void CalculateFASW()
        {
            double[] LL15 = MathUtilities.Multiply(soilPhysical.LL15, soilPhysical.Thickness);
            double[] DUL = MathUtilities.Multiply(soilPhysical.DUL, soilPhysical.Thickness);
        
            int nlayr = GetLayerIndex();
            double cumdep = MathUtilities.Sum(soilPhysical.Thickness, 0, nlayr, 0.0);

            double excess_fr = MathUtilities.Divide((cumdep - FASWDepth), soilPhysical.Thickness[nlayr], 0.0);

            // note that results may be strange if swdep < ll15
            double avail_sw = (MathUtilities.Sum(waterBalance.SWmm, 0, nlayr, 0.0)
                              - excess_fr * waterBalance.SWmm[nlayr])
                              - (MathUtilities.Sum(LL15, 0, nlayr, 0.0)
                              - excess_fr * LL15[nlayr]);


            double pot_avail_sw = (MathUtilities.Sum(DUL, 0, nlayr, 0.0)
                                  - excess_fr * DUL[nlayr])
                                  - (MathUtilities.Sum(LL15, 0, nlayr, 0.0)
                                  - excess_fr * LL15[nlayr]);

            FASW = MathUtilities.Divide(avail_sw, pot_avail_sw, 0.0);
            WaterDeficit = MathUtilities.Constrain(pot_avail_sw - avail_sw, 0.0, 100000);
        }

        private int GetLayerIndex()
        {
            double[] cumThickness = soilPhysical.ThicknessCumulative;
            for (int i = 1; i < cumThickness.Length; i++)
            {
                if (FASWDepth < cumThickness[i])
                    return i - 1;
            }
            
            return cumThickness.Length - 1;
        }

    }
}
```
            Fertiliser
            SurfaceOrganicMatter: InitialResidueName=maize; InitialResidueType=maize; InitialResidueMass=4500; InitialStandingFraction=0; InitialCPR=0; InitialCNR=55
            Manager SowingRule
              SowingDate = 01/11/1980 00:00:00
              CultivarName = Berken
              RowSpacing = 250
              SowingDepth = 40
              SowingRate = 35
              script: same as in Validation.Thomas Dissertation.Experiment_1_Berken.Exp1Berken.paddock.SowingRule
            Plant Mungbean
            Manager HarvestRule: same as Validation.Thomas Dissertation.Experiment_1_Berken.Exp1Berken.paddock.HarvestRule
            Report DailyReport: same as Validation.Thomas Dissertation.Experiment_1_Berken.Exp1Berken.paddock.DailyReport
            Report HarvestReport: same as Validation.Thomas Dissertation.Experiment_1_Berken.Exp1Berken.paddock.HarvestReport
            Soil NT1_soil: Latitude=0; Longitude=0
              WaterBalance SoilWater: SummerDate=1-Nov; SummerU=1.5; SummerCona=6.6; WinterDate=1-Apr; WinterU=1.5; WinterCona=6.6; DiffusConst=88; DiffusSlope=35.4; Salb=0.2; CN2Bare=70; CNRed=20; CNCov=0.8; DischargeWidth=5; CatchmentArea=10; Thickness=[150, 150, 150, 150, 150, 150, 300, 300, 300]; SWCON=[0.7, 0.7, 0.7, 0.7, 0.7, 0.7, 0.7, 0.7, 0.7]
              CERESSoilTemperature Temperature
              Organic: FOMCNRatio=33
                Thickness  Carbon  SoilCNRatio  FBiom  FInert  FOM
                150        1.27    14.5         0.05   0.39    0
                150        0.59    14.5         0.02   0.47    0
                150        0.34    14.5         0.015  0.52    0
                150        0.34    14.5         0.01   0.62    0
                150        0.26    14.5         0.01   0.74    0
                150        0.26    14.5         0.01   0.83    0
                300        0.25    14.5         0.01   0.93    0
                300        0.19    14.5         0.01   0.93    0
                300        0.21    14.5         0.01   0.93    0
              Chemical
                Thickness  NO3N  NH4N  PH
                150        2     1     6.5
                150        2     1     6.2
                150        2     1     6.3
                150        2     1     6.4
                150        2     1     6.5
                150        2     1     6.6
                300        2     1     6.6
                300        2     1     6.5
                300        1     0.2   6.5
              Sample Initial conditions: Thickness=[150, 150, 150, 150, 150, 150, 300, 300, 300]; SWUnits=Volumetric; OCUnits=Total; PHUnits=Water
                SW=[0.19, 0.21, 0.21, 0.223, 0.219, 0.219, 0.219, 0.229, 0.237]
              Nutrient
              Physical
                Thickness  BD    AirDry  LL15   DUL    SAT
                150        1.56  0.053   0.19   0.304  0.315
                150        1.52  0.08    0.21   0.31   0.33
                150        1.46  0.21    0.21   0.31   0.337
                150        1.46  0.223   0.223  0.324  0.34
                150        1.42  0.219   0.219  0.328  0.34
                150        1.42  0.219   0.219  0.328  0.341
                300        1.46  0.219   0.219  0.325  0.344
                300        1.5   0.229   0.229  0.337  0.346
                300        1.53  0.237   0.237  0.35   0.37
                SoilCrop MungbeanSoil
                  LL=[0.19, 0.21, 0.21, 0.235, 0.233, 0.242, 0.248, 0.277, 0.285]
                  KL=[0.16, 0.16, 0.12, 0.1, 0.1, 0.08, 0.06, 0.04, 0.03]
                  XF=[1, 1, 1, 1, 1, 1, 1, 0, 0]
              InitialWater Initial water: PercentMethod=0; FractionFull=1
            Manager Automatic irrigation based on water deficit: same as Validation.Muchow.GattonJan91990.paddock.AutoIrr
      Simulation KatherineJan28WaterIrrigated
        Clock: Start=1989-01-10; End=1989-05-31
        Summary summaryfile
        Weather: FileName=katherine1989.met
        SoilArbitrator Soil Arbitrator
        Zone paddock: Area=1; Slope=0; AspectAngle=0; Altitude=50
          MicroClimate: a_interception=0; b_interception=1; c_interception=0; d_interception=0; SoilHeatFluxFraction=0.4; MinimumHeightDiffForNewLayer=0; NightInterceptionFraction=0.5; ReferenceHeight=2
          Irrigation
          Manager AutomaticIrrigation
            AutoIrrigationOn = True
            FASWThreshold = 0.9
            FASWDepth = 1200
            script: same as in Validation.Muchow.Kimberly1980.Kimberly1980.paddock.AutomaticIrrigation
          Fertiliser
          SurfaceOrganicMatter: InitialResidueName=maize; InitialResidueType=maize; InitialResidueMass=4500; InitialStandingFraction=0; InitialCPR=0; InitialCNR=55
          Manager SowingRule
            SowingRate = 35
            RowSpacing = 500
            SowingDepth = 40
            CultivarName = King
            SowingDate = 01/28/1989 00:00:00
            script: same as in Validation.Thomas Dissertation.Experiment_1_Berken.Exp1Berken.paddock.SowingRule
          Plant Mungbean
          Soil: Latitude=0; Longitude=0
            Physical
              Thickness  BD    AirDry  LL15  DUL   SAT
              150        1.56  0.05    0.19  0.3   0.31
              150        1.52  0.08    0.21  0.31  0.33
              150        1.46  0.21    0.21  0.31  0.34
              150        1.46  0.22    0.22  0.32  0.34
              150        1.42  0.22    0.22  0.33  0.34
              150        1.42  0.22    0.22  0.33  0.34
              300        1.46  0.22    0.22  0.32  0.34
              300        1.5   0.23    0.23  0.34  0.35
              300        1.53  0.24    0.24  0.35  0.37
              SoilCrop MungbeanSoil: LL=[0.19, 0.21, 0.21, 0.23, 0.23, 0.24, 0.25, 0.28, 0.28]; KL=[0.16, 0.16, 0.12, 0.1, 0.1, 0.08, 0.06, 0.04, 0.03]; XF=[1, 1, 1, 1, 1, 1, 1, 0, 0]
            WaterBalance SoilWater: SummerDate=1-Nov; SummerU=1.5; SummerCona=6.6; WinterDate=1-Apr; WinterU=1.5; WinterCona=6.6; DiffusConst=88; DiffusSlope=35.4; Salb=0.2; CN2Bare=70; CNRed=20; CNCov=0.8; DischargeWidth=0; CatchmentArea=0; Thickness=[150, 150, 150, 150, 150, 150, 300, 300, 300]; SWCON=[0.7, 0.7, 0.7, 0.7, 0.7, 0.7, 0.7, 0.7, 0.7]
            Organic: FOMCNRatio=36
              Thickness  Carbon  SoilCNRatio  FBiom  FInert  FOM
              150        1.27    14.5         0.04   0.39    518.782
              150        0.59    14.5         0.02   0.47    404.028
              150        0.34    14.5         0.01   0.52    314.657
              150        0.34    14.5         0.01   0.62    245.055
              150        0.26    14.5         0.01   0.74    190.849
              150        0.26    14.5         0.01   0.83    148.634
              300        0.25    14.5         0.01   0.93    90.1508
              300        0.19    14.5         0.01   0.93    54.6792
              300        0.21    14.5         0.01   0.93    33.1646
            Chemical
              Thickness  NO3N  NH4N  PH
              150        2     1     6.5
              150        2     1     6.2
              150        2     1     6.3
              150        2     1     6.4
              150        2     1     6.5
              150        2     1     6.6
              300        2     1     6.6
              300        2     1     6.5
              300        2     1     6.5
            Sample InitialSW: Thickness=[150, 150, 150, 150, 150, 150, 300, 300, 300]; SWUnits=Volumetric; OCUnits=Total; PHUnits=Water
              SW=[0.304, 0.31, 0.31, 0.324, 0.328, 0.328, 0.325, 0.337, 0.35]
            CERESSoilTemperature Temperature
            Nutrient
          Manager HarvestRule: same as Validation.Thomas Dissertation.Experiment_1_Berken.Exp1Berken.paddock.HarvestRule
          Report DailyReport: same as Validation.Thomas Dissertation.Experiment_1_Berken.Exp1Berken.paddock.DailyReport
          Report HarvestReport: same as Validation.Thomas Dissertation.Experiment_1_Berken.Exp1Berken.paddock.HarvestReport
      Simulation Katherine1989SowFeb07
        Clock: Start=1989-01-10; End=1989-05-31
        Summary summaryfile
        Weather: FileName=katherine1989.met
        SoilArbitrator Soil Arbitrator
        Zone paddock: Area=1; Slope=0; AspectAngle=0; Altitude=50
          MicroClimate: a_interception=0; b_interception=1; c_interception=0; d_interception=0; SoilHeatFluxFraction=0.4; MinimumHeightDiffForNewLayer=0; NightInterceptionFraction=0.5; ReferenceHeight=2
          Irrigation
          Fertiliser
          SurfaceOrganicMatter: InitialResidueName=maize; InitialResidueType=maize; InitialResidueMass=4500; InitialStandingFraction=0; InitialCPR=0; InitialCNR=55
          Report DailyReport: VariableNames=[Clock].Today; EventNames=[Clock].DoReport
          Manager HarvestRule: same as Validation.Thomas Dissertation.Experiment_1_Berken.Exp1Berken.paddock.HarvestRule
          Report HarvestReport: VariableNames=[Clock].Today; EventNames=[Mungbean].Harvesting
          Plant Mungbean
          Operations
          Manager Automatic irrigation based on water deficit
            AutoIrrigationOn = True
            Crop = [Mungbean]
            FASWThreshold = 0.9
            FASWDepth = 600
            weeks = 0
            afterSowing = 0
            script: same as in Validation.Thomas Dissertation.Experiment_1_Berken.Exp1Berken.paddock.AutoIrr
          Soil: Latitude=0; Longitude=0
            Physical: same as Validation.Muchow.KatherineJan28WaterIrrigated.paddock.Soil.Physical
            WaterBalance SoilWater: same as Validation.Muchow.KatherineJan28WaterIrrigated.paddock.Soil.SoilWater
            Organic: same as Validation.Muchow.KatherineJan28WaterIrrigated.paddock.Soil.Organic
            Chemical: same as Validation.Muchow.KatherineJan28WaterIrrigated.paddock.Soil.Chemical
            Sample InitialSW: Thickness=[150, 150, 150, 150, 150, 150, 300, 300, 300]; SWUnits=Volumetric; OCUnits=Total; PHUnits=Water
              SW=[0.304, 0.31, 0.31, 0.324, 0.328, 0.328, 0.325, 0.337, 0.35]
            CERESSoilTemperature Temperature
            Nutrient
            InitialWater Initial water: PercentMethod=0; FractionFull=1
          Manager SowingRule
            RowSpacing = 360
            SowingDepth = 40
            SowingRate = 35
            CultivarName = King
            SowingDate = 02/07/1989 00:00:00
            script: same as in Validation.Thomas Dissertation.Experiment_1_Berken.Exp1Berken.paddock.SowingRule
    Simulation ExtraPhenSowOctCvJade
      Memo
        Additional small experiment at Gatton UQ field station on a vertisol. Sown on October 26, 2021. Node, leaf, and branch numbers were counted every week. After the 4th node, biomass samples were taken weekly too and partitioned into leaves and stems. Harvest data was not collected as the aim of the experiment was to nail down phenology.
      Summary summaryfile
      SoilArbitrator Soil Arbitrator
      Clock: Start=2021-10-01; End=2022-01-10
      Weather: FileName=GattonKylie.xlsx; ExcelWorkSheetName=Kylie
      Zone paddock: Area=1; Slope=0; AspectAngle=0; Altitude=50
        Irrigation
        Fertiliser
        SurfaceOrganicMatter: InitialResidueName=wheat; InitialResidueType=wheat; InitialResidueMass=500; InitialStandingFraction=0; InitialCPR=0; InitialCNR=40
        Report DailyReport: same as Validation.Thomas Dissertation.Experiment_1_Berken.Exp1Berken.paddock.DailyReport
        Manager HarvestRule: same as Validation.Thomas Dissertation.Experiment_1_Berken.Exp1Berken.paddock.HarvestRule
        Report HarvestReport: same as Validation.Thomas Dissertation.Experiment_1_Berken.Exp1Berken.paddock.HarvestReport
        Plant Mungbean
        Operations
        Manager SowingRule
          RowSpacing = 540
          SowingDepth = 30
          SowingRate = 30.8
          CultivarName = Jade
          SowingDate = 10/26/2021 00:00:00
          script: same as in Validation.Thomas Dissertation.Experiment_1_Berken.Exp1Berken.paddock.SowingRule
        MicroClimate: a_interception=0; b_interception=1; c_interception=0; d_interception=0; SoilHeatFluxFraction=0.4; MinimumHeightDiffForNewLayer=0; NightInterceptionFraction=0.5; ReferenceHeight=2
        Soil: same as Validation.TOS.TOSyear2Opal.TOSyear2Opal.paddock.Soil
    Folder Mungbean_DAF
      Memo Mungbean_DAF data description
        These trials were done by DAF in 2019 and 2020, largely looking at the impact of applying N and innoculating seeds. Data is recorded in annual reports but not published. Jade was the cultivar used on all. It is unclear why the recorded harvest date is so much later than the simulated as the simulated was confirmed within 10 days by the Thomas Dissertation and Dr. Wenham's TOS trials. Perhaps, like the Yield Gap studies, the crop was harvested much later than the earliest harvest date possible or else, as was see in one experiment in the Thomas Dissertation, the crop was semi-indeterminant and didn't reach a natural harvest ripe point when anticipated (the crop keeps growing if there is enough water) and so the date of the harvest recorded in the field corresponds to a date at which the crop was chemically or mechanically desiccated.
      Experiment ACRI
        Factors
          Permutation
            Factor N
              CompositeFactor 0N_Jade_rf: Specifications=[Operations]
                Operations Irr
                  2020-01-23  [Fertiliser].Apply(Amount: 0, Type: Fertiliser.Types.UreaN, Depth: 150)
                  2020-01-23  [Mungbean].Sow(population: 25, cultivar: "Jade", depth: 50, rowSpacing: 500)
              CompositeFactor 0N_Opal_rf: Specifications=[Operations]
                Operations Irr
                  2020-01-23  [Fertiliser].Apply(Amount: 0, Type: Fertiliser.Types.UreaN, Depth: 150)
                  2020-01-23  [Mungbean].Sow(population: 25, cultivar: "Opal", depth: 50, rowSpacing: 500)
        Simulation ACRI
          Clock: Start=2020-01-23; End=2020-05-08
          Summary summaryfile
          Weather: FileName=ACRI.xlsx; ExcelWorkSheetName=ACRI
          SoilArbitrator Soil Arbitrator
          Zone paddock: Area=1; Slope=0; AspectAngle=0; Altitude=50
            MicroClimate: a_interception=0; b_interception=1; c_interception=0; d_interception=0; SoilHeatFluxFraction=0; MinimumHeightDiffForNewLayer=0; NightInterceptionFraction=0; ReferenceHeight=2
            Irrigation
            Fertiliser
            SurfaceOrganicMatter: InitialResidueName=wheat; InitialResidueType=wheat; InitialResidueMass=500; InitialStandingFraction=0; InitialCPR=0; InitialCNR=40
            Report DailyReport: same as Validation.Thomas Dissertation.Experiment_1_Berken.Exp1Berken.paddock.DailyReport
            Manager SowingRule
              RowSpacing = 360
              SowingDepth = 40
              SowingRate = 35
              CultivarName = King
              SowingDate = 03/31/1980 00:00:00
              script: same as in Validation.Thomas Dissertation.Experiment_1_Berken.Exp1Berken.paddock.SowingRule
            Manager HarvestRule: same as Validation.Thomas Dissertation.Experiment_1_Berken.Exp1Berken.paddock.HarvestRule
            Report HarvestReport: same as Validation.Thomas Dissertation.Experiment_1_Berken.Exp1Berken.paddock.HarvestReport
            Plant Mungbean
            Manager Irrigatefixeddates: same as Validation.Thomas Dissertation.Experiment_1_Berken.Exp1Berken.paddock.Irrigatefixeddates
            Operations
            Soil: Latitude=0; Longitude=0
              WaterBalance SoilWater: SummerDate=1-Nov; SummerU=6; SummerCona=3.5; WinterDate=1-Apr; WinterU=6; WinterCona=3.5; DiffusConst=88; DiffusSlope=35.4; Salb=0.13; CN2Bare=72; CNRed=20; CNCov=0.8; DischargeWidth=5; CatchmentArea=10; Thickness=[150, 150, 150, 150, 150, 150, 300, 300, 300]; SWCON=[0.366, 0.366, 0.351, 0.284, 0.26, 0.22, 0.22, 0.22, 0.22]
              CERESSoilTemperature Temperature
              Organic: FOMCNRatio=33
                Thickness  Carbon  SoilCNRatio  FBiom  FInert  FOM
                150        1.94    14.5         0.02   0.36    0
                150        1.38    14.5         0.015  0.5     0
                150        1       14.5         0.01   0.59    0
                150        0.9     14.5         0.01   0.84    0
                150        0.75    14.5         0.01   0.8     0
                150        0.6     14.5         0.01   0.99    0
                300        0.6     14.5         0.01   0.99    0
                300        0.45    14.5         0.01   0.99    0
                300        0.45    14.5         0.01   0.99    0
              Chemical
                Thickness  NO3N  NH4N  PH
                150        5     0     8
                150        5     0     7.8
                150        5     2     7.8
                150        4     3     7.8
                150        2     2     7.8
                150        5     1     7.8
                300        5     1     7.8
                300        5     1     7.8
                300        0.08  1     7.8
              Nutrient
              Physical
                Thickness  BD    AirDry  LL15  DUL   SAT
                150        1.31  0.05    0.21  0.43  0.48
                150        1.26  0.21    0.21  0.44  0.49
                150        1.36  0.21    0.21  0.41  0.46
                150        1.39  0.21    0.21  0.41  0.45
                150        1.44  0.21    0.21  0.41  0.43
                150        1.45  0.21    0.21  0.4   0.42
                300        1.45  0.2     0.2   0.35  0.39
                300        1.46  0.19    0.19  0.35  0.36
                300        1.46  0.18    0.18  0.32  0.35
                SoilCrop MungbeanSoil: LL=[0.21, 0.21, 0.21, 0.21, 0.21, 0.21, 0.2, 0.19, 0.18]; KL=[0.08, 0.08, 0.08, 0.08, 0.08, 0.08, 0.08, 0.08, 0.08]; XF=[1, 1, 1, 1, 1, 1, 1, 1, 1]
              Sample Initial Water: Thickness=[150, 150, 150, 150, 150, 150, 300, 300, 300]; SW=[0.39, 0.36, 0.37, 0.37, 0.34, 0.32, 0.2, 0.2, 0.2]; SWUnits=Volumetric; OCUnits=Total; PHUnits=Water
            Manager AutoIrr: same as Validation.Thomas Dissertation.Experiment_1_Emerald.Exp1Emerald.paddock.AutoIrr
        Memo
          ACRI trial in Narrabri with cultivars Opal and Jade. Detailed soil water measurements. Was supposed to be an N fertilizer trial, but not a priority in the model so we just looked at 0N rainfed.
      Simulation BreezaN0N
        Memo
          DAF trial on the Liverpool plains at the Liverpool Plains Research Station with cultivar Jade. Was supposed to be an N fertilizer trial, but not a priority in the model so we just looked at 0N.
        Clock: Start=2018-11-13; End=2019-06-16
        Summary summaryfile
        Weather: FileName=Breeza.xlsx; ExcelWorkSheetName=Breeza
        SoilArbitrator Soil Arbitrator
        Zone paddock: Area=1; Slope=0; AspectAngle=0; Altitude=50
          MicroClimate: a_interception=0; b_interception=1; c_interception=0; d_interception=0; SoilHeatFluxFraction=0; MinimumHeightDiffForNewLayer=0; NightInterceptionFraction=0; ReferenceHeight=2
          Irrigation
          Fertiliser
          SurfaceOrganicMatter: InitialResidueName=sorghum; InitialResidueType=sorghum; InitialResidueMass=5000; InitialStandingFraction=0; InitialCPR=0; InitialCNR=70
          Report DailyReport: same as Validation.Thomas Dissertation.Experiment_1_Berken.Exp1Berken.paddock.DailyReport
          Manager SowingRule
            RowSpacing = 360
            SowingDepth = 40
            SowingRate = 25
            CultivarName = Jade
            SowingDate = 01/09/2019 00:00:00
            script: same as in Validation.Thomas Dissertation.Experiment_1_Berken.Exp1Berken.paddock.SowingRule
          Manager HarvestRule: same as Validation.Thomas Dissertation.Experiment_1_Berken.Exp1Berken.paddock.HarvestRule
          Report HarvestReport: same as Validation.Thomas Dissertation.Experiment_1_Berken.Exp1Berken.paddock.HarvestReport
          Plant Mungbean
          Operations
            2019-01-23  [Fertiliser].Apply(Amount: 0, Type: Fertiliser.Types.NH4N, Depth: 150)
            2019-01-04  [Irrigation].Apply(amount: 50)
            2019-02-26  [Irrigation].Apply(amount: 50)
            2019-03-01  [Irrigation].Apply(amount: 50)
            2019-03-15  [Irrigation].Apply(amount: 50)
            2019-03-28  [Irrigation].Apply(amount: 50)
          Soil: Latitude=0; Longitude=0
            WaterBalance SoilWater: SummerDate=1-Nov; SummerU=6; SummerCona=3.5; WinterDate=1-Apr; WinterU=6; WinterCona=3.5; DiffusConst=88; DiffusSlope=35.4; Salb=0.13; CN2Bare=72; CNRed=20; CNCov=0.8; DischargeWidth=5; CatchmentArea=10; Thickness=[150, 150, 150, 150, 150, 150, 300, 300, 300]
              SWCON=[0.526, 0.519, 0.531, 0.527, 0.52, 0.518, 0.511, 0.511, 0.511]
            CERESSoilTemperature Temperature
            Organic: FOMCNRatio=33
              Thickness  Carbon  SoilCNRatio  FBiom  FInert  FOM
              150        1.04    14.5         0.02   0.36    0
              150        0.79    14.5         0.015  0.5     0
              150        0.71    14.5         0.01   0.59    0
              150        0.52    14.5         0.01   0.84    0
              150        0.29    14.5         0.01   0.8     0
              150        0.3     14.5         0.01   0.99    0
              300        0.23    14.5         0.01   0.99    0
              300        0.23    14.5         0.01   0.99    0
              300        0.23    14.5         0.01   0.99    0
            Chemical
              Thickness  NO3N  NH4N  PH
              150        36    0     8
              150        9     0     7.8
              150        7     2     7.8
              150        4     3     7.8
              150        2     2     7.8
              150        0.08  1     7.8
              300        0.08  1     7.8
              300        0.08  1     7.8
              300        0.08  1     7.8
            Nutrient
            Physical
              Thickness  BD     AirDry  LL15   DUL   SAT
              150        1.043  0.15    0.16   0.41  0.526
              150        1.063  0.28    0.28   0.5   0.519
              150        1.03   0.3     0.3    0.5   0.531
              150        1.042  0.354   0.354  0.51  0.527
              150        1.06   0.354   0.354  0.5   0.52
              150        1.065  0.354   0.354  0.48  0.518
              300        1.065  0.354   0.354  0.44  0.518
              300        1.084  0.354   0.354  0.44  0.511
              300        1.084  0.354   0.354  0.4   0.511
              SoilCrop MungbeanSoil: LL=[0.16, 0.28, 0.35, 0.354, 0.37, 0.37, 0.37, 0.37, 0.354]; KL=[0.08, 0.08, 0.08, 0.08, 0.08, 0.08, 0.08, 0.08, 0.08]; XF=[1, 1, 1, 1, 1, 1, 1, 1, 1]
            Sample Initial conditions: Thickness=[150, 150, 150, 150, 150, 150, 300, 300, 300]; SW=[0.41, 0.519, 0.531, 0.527, 0.52, 0.48, 0.44, 0.42, 0.4]; SWUnits=Volumetric; OCUnits=Total; PHUnits=Water
          Manager AutoIrr
            Crop = [Mungbean]
            AutoIrrigationOn = True
            FASWThreshold = 0.9
            FASWDepth = 900
            weeks = 1
            afterSowing = 0
            script: same as in Validation.Thomas Dissertation.Experiment_1_Berken.Exp1Berken.paddock.AutoIrr
      Simulation Emerald2019N0N
        Memo
          DAF trial in Emerald, QLD with cultivar Jade. Was supposed to be an N fertilizer trial, but not a priority in the model so we just looked at 0N.
        Clock: Start=2018-11-13; End=2019-08-16
        Summary summaryfile
        Weather: FileName=Emerald2009_2020.xlsx; ExcelWorkSheetName=Emerald
        SoilArbitrator Soil Arbitrator
        Zone paddock: Area=1; Slope=0; AspectAngle=0; Altitude=50
          MicroClimate: a_interception=0; b_interception=1; c_interception=0; d_interception=0; SoilHeatFluxFraction=0; MinimumHeightDiffForNewLayer=0; NightInterceptionFraction=0; ReferenceHeight=2
          Irrigation
          Fertiliser
          SurfaceOrganicMatter: InitialResidueName=sorghum; InitialResidueType=sorghum; InitialResidueMass=5000; InitialStandingFraction=0; InitialCPR=0; InitialCNR=70
          Report DailyReport: same as Validation.Thomas Dissertation.Experiment_1_Berken.Exp1Berken.paddock.DailyReport
          Manager SowingRule
            RowSpacing = 360
            SowingDepth = 40
            SowingRate = 21
            CultivarName = Jade
            SowingDate = 02/25/2019 00:00:00
            script: same as in Validation.Thomas Dissertation.Experiment_1_Berken.Exp1Berken.paddock.SowingRule
          Manager HarvestRule: same as Validation.Thomas Dissertation.Experiment_1_Berken.Exp1Berken.paddock.HarvestRule
          Report HarvestReport: same as Validation.Thomas Dissertation.Experiment_1_Berken.Exp1Berken.paddock.HarvestReport
          Plant Mungbean
          Operations
            2018-11-07  [Irrigation].Apply(amount: 75)
            2019-02-25  [Irrigation].Apply(amount: 75)
          Soil: Latitude=0; Longitude=0
            WaterBalance SoilWater: SummerDate=1-Nov; SummerU=6; SummerCona=3.5; WinterDate=1-Apr; WinterU=6; WinterCona=3.5; DiffusConst=88; DiffusSlope=35.4; Salb=0.13; CN2Bare=72; CNRed=20; CNCov=0.8; DischargeWidth=5; CatchmentArea=10; Thickness=[150, 150, 150, 150, 150, 150, 300, 300, 300]
              SWCON=[0.384, 0.379, 0.353, 0.365, 0.387, 0.401, 0.396, 0.396, 0.396]
            CERESSoilTemperature Temperature
            Organic: FOMCNRatio=33
              Thickness  Carbon  SoilCNRatio  FBiom  FInert  FOM
              150        1.24    14.5         0.02   0.36    0
              150        1.24    14.5         0.015  0.5     0
              150        1.25    14.5         0.01   0.59    0
              150        1.1     14.5         0.01   0.84    0
              150        0.71    14.5         0.01   0.8     0
              150        0.34    14.5         0.01   0.99    0
              300        0.34    14.5         0.01   0.99    0
              300        0.34    14.5         0.01   0.99    0
              300        0.34    14.5         0.01   0.99    0
            Chemical: same as Validation.Mungbean_DAF.BreezaN0N.paddock.soil.Chemical
            Nutrient
            Physical
              Thickness  BD     AirDry  LL15   DUL    SAT
              150        1.422  0.05    0.124  0.384  0.463
              150        1.431  0.148   0.148  0.379  0.46
              150        1.46   0.153   0.153  0.353  0.449
              150        1.44   0.153   0.153  0.365  0.449
              150        1.416  0.153   0.153  0.387  0.449
              150        1.394  0.153   0.153  0.401  0.449
              300        1.394  0.153   0.153  0.401  0.449
              300        1.407  0.153   0.153  0.396  0.449
              300        1.407  0.153   0.153  0.396  0.449
              SoilCrop MungbeanSoil
                LL=[0.124, 0.148, 0.153, 0.153, 0.153, 0.153, 0.153, 0.153, 0.153]
                KL=[0.08, 0.08, 0.08, 0.08, 0.08, 0.08, 0.08, 0.08, 0.08]
                XF=[1, 1, 1, 1, 1, 1, 1, 1, 1]
            Sample Initial conditions: Thickness=[150, 150, 150, 150, 150, 150, 300, 300, 300]; SWUnits=Volumetric; OCUnits=Total; PHUnits=Water
              SW=[0.384, 0.379, 0.353, 0.365, 0.387, 0.401, 0.401, 0.396, 0.396]
          Manager AutoIrr: same as Validation.Mungbean_DAF.BreezaN0N.paddock.AutoIrr
      Experiment Emerald2020
        Factors
          Permutation
            Factor N
              CompositeFactor 0N_irr
                Specifications:
                  [Operations]
                  [AutoIrr].Script.AutoIrrigationOn=True
                Operations Irr
                  2019-12-16  [Irrigation].Apply(amount: 100)
                  2020-02-17  [Fertiliser].Apply(Amount: 0, Type: Fertiliser.Types.UreaN, Depth: 150)
              CompositeFactor 0N_rf: Specifications=[Operations]
                Operations Irr
                  2019-12-16  [Irrigation].Apply(amount: 100)
        Simulation Emerald2020
          Clock: Start=2020-01-01; End=2020-06-16
          Summary summaryfile
          Weather: FileName=Emerald2009_2020.xlsx; ExcelWorkSheetName=Emerald
          SoilArbitrator Soil Arbitrator
          Zone paddock: Area=1; Slope=0; AspectAngle=0; Altitude=50
            MicroClimate: a_interception=0; b_interception=1; c_interception=0; d_interception=0; SoilHeatFluxFraction=0; MinimumHeightDiffForNewLayer=0; NightInterceptionFraction=0; ReferenceHeight=2
            Irrigation
            Fertiliser
            SurfaceOrganicMatter: InitialResidueName=wheat; InitialResidueType=wheat; InitialResidueMass=500; InitialStandingFraction=0; InitialCPR=0; InitialCNR=40
            Report DailyReport: same as Validation.Thomas Dissertation.Experiment_1_Berken.Exp1Berken.paddock.DailyReport
            Manager SowingRule
              RowSpacing = 360
              SowingDepth = 40
              SowingRate = 30
              CultivarName = Jade
              SowingDate = 02/17/2020 00:00:00
              script: same as in Validation.Thomas Dissertation.Experiment_1_Berken.Exp1Berken.paddock.SowingRule
            Manager HarvestRule: same as Validation.Thomas Dissertation.Experiment_1_Berken.Exp1Berken.paddock.HarvestRule
            Report HarvestReport: same as Validation.Thomas Dissertation.Experiment_1_Berken.Exp1Berken.paddock.HarvestReport
            Plant Mungbean
            Operations
            Soil: Latitude=0; Longitude=0
              WaterBalance SoilWater: SummerDate=1-Nov; SummerU=6; SummerCona=3.5; WinterDate=1-Apr; WinterU=6; WinterCona=3.5; DiffusConst=88; DiffusSlope=35.4; Salb=0.13; CN2Bare=72; CNRed=20; CNCov=0.8; DischargeWidth=5; CatchmentArea=10; Thickness=[150, 150, 150, 150, 150, 150, 300, 300, 300]
                SWCON=[0.384, 0.379, 0.353, 0.365, 0.387, 0.401, 0.396, 0.401, 0.396]
              CERESSoilTemperature Temperature
              Organic: same as Validation.Mungbean_DAF.Emerald2019N0N.paddock.soil.Organic
              Chemical
                Thickness  NO3N  NH4N  PH
                150        10    0     8
                150        9     0     7.8
                150        7     2     7.8
                150        4     3     7.8
                150        2     2     7.8
                150        0.08  1     7.8
                300        0.08  1     7.8
                300        0.08  1     7.8
                300        0.08  1     7.8
              Nutrient
              Physical
                Thickness  BD     AirDry  LL15   DUL  SAT
                150        1.422  0.05    0.124  0.3  0.35
                150        1.431  0.148   0.148  0.3  0.35
                150        1.46   0.153   0.153  0.3  0.35
                150        1.44   0.153   0.153  0.3  0.35
                150        1.416  0.153   0.153  0.3  0.35
                150        1.394  0.153   0.153  0.3  0.35
                300        1.407  0.153   0.153  0.3  0.35
                300        1.394  0.153   0.153  0.3  0.35
                300        1.407  0.153   0.153  0.3  0.35
                SoilCrop MungbeanSoil: LL=[0.124, 0.148, 0.153, 0.16, 0.17, 0.18, 0.19, 0.2, 0.2]; KL=[0.08, 0.08, 0.08, 0.08, 0.08, 0.08, 0.08, 0.08, 0.08]; XF=[1, 1, 1, 1, 1, 1, 1, 1, 1]
              Sample Initial conditions: Thickness=[150, 150, 150, 150, 150, 150, 300, 300, 300]; SW=[0.3, 0.3, 0.3, 0.3, 0.3, 0.3, 0.3, 0.3, 0.3]; SWUnits=Volumetric; OCUnits=Total; PHUnits=Water
            Manager AutoIrr
              AutoIrrigationOn = False
              Crop = [Mungbean]
              FASWThreshold = 0.9
              FASWDepth = 900
              weeks = 3
              afterSowing = 20
              script: same as in Validation.Thomas Dissertation.Experiment_1_Berken.Exp1Berken.paddock.AutoIrr
        Memo
          DAF trial in Emerald, QLD with cultivar Jade. Was supposed to be an N fertilizer trial, but not a priority in the model so we just looked at 0N.
      Experiment HopelandSpring
        Memo
          DAF trial in Hopeland, QLD with cultivar Jade planted in Spring. Was supposed to be an N fertilizer trial, but not a priority in the model so we just looked at 0N.
        Factors
          Permutation
            Factor N: Specification=[Operations]
              CompositeFactor 0N_rf
                Specifications:
                  [Operations]
                  [AutoIrr].Script.AutoIrrigationOn=False
                Operations Irr
                  2019-10-14  [Fertiliser].Apply(Amount: 3.6, Type: Fertiliser.Types.UreaN, Depth: 150)
              CompositeFactor 0N_irr
                Specifications:
                  [Operations]
                  [AutoIrr].Script.AutoIrrigationOn=True
                Operations Irr
                  2019-10-14  [Fertiliser].Apply(Amount: 0, Type: Fertiliser.Types.UreaN, Depth: 150)
                  2019-11-20  [Irrigation].Apply(amount: 100)
                  2019-12-11  [Irrigation].Apply(amount: 100)
                  2019-12-12  [Irrigation].Apply(amount: 100)
                  2019-10-14  [Fertiliser].Apply(Amount: 3.6, Type: Fertiliser.Types.UreaN, Depth: 150)
        Simulation HopelandSpring
          Clock: Start=2019-10-14; End=2020-01-28
          Summary summaryfile
          Weather: FileName=Hopeland.xlsx; ExcelWorkSheetName=Hopeland
          SoilArbitrator Soil Arbitrator
          Zone paddock: Area=1; Slope=0; AspectAngle=0; Altitude=50
            MicroClimate: a_interception=0; b_interception=1; c_interception=0; d_interception=0; SoilHeatFluxFraction=0; MinimumHeightDiffForNewLayer=0; NightInterceptionFraction=0; ReferenceHeight=2
            Irrigation
            Fertiliser
            SurfaceOrganicMatter: InitialResidueName=wheat; InitialResidueType=wheat; InitialResidueMass=500; InitialStandingFraction=0; InitialCPR=0; InitialCNR=40
            Report DailyReport: same as Validation.Thomas Dissertation.Experiment_1_Berken.Exp1Berken.paddock.DailyReport
            Manager SowingRule
              RowSpacing = 500
              SowingDepth = 40
              SowingRate = 30
              CultivarName = Jade
              SowingDate = 10/14/2019 00:00:00
              script: same as in Validation.Thomas Dissertation.Experiment_1_Berken.Exp1Berken.paddock.SowingRule
            Manager HarvestRule: same as Validation.Thomas Dissertation.Experiment_1_Berken.Exp1Berken.paddock.HarvestRule
            Report HarvestReport: same as Validation.Thomas Dissertation.Experiment_1_Berken.Exp1Berken.paddock.HarvestReport
            Plant Mungbean
            Operations
            Soil: Latitude=0; Longitude=0
              WaterBalance SoilWater: SummerDate=1-Nov; SummerU=6; SummerCona=3.5; WinterDate=1-Apr; WinterU=6; WinterCona=3.5; DiffusConst=88; DiffusSlope=35.4; Salb=0.13; CN2Bare=72; CNRed=20; CNCov=0.8; DischargeWidth=5; CatchmentArea=10; Thickness=[150, 150, 150, 150, 300, 300, 300, 300, 300]
                SWCON=[0.308729, 0.322907, 0.32296, 0.297662, 0.298, 0.298, 0.298, 0.298, 0.298]
              CERESSoilTemperature Temperature
              Organic: FOMCNRatio=33
                Thickness  Carbon  SoilCNRatio  FBiom  FInert  FOM
                150        1.94    14.5         0.02   0.36    0
                150        1.94    14.5         0.02   0.36    0
                150        1.38    14.5         0.015  0.5     0
                150        1       14.5         0.01   0.59    0
                150        1       14.5         0.01   0.59    0
                150        1       14.5         0.01   0.59    0
                300        0.9     14.5         0.01   0.84    0
                300        0.9     14.5         0.01   0.84    0
                300        0.9     14.5         0.01   0.84    0
              Chemical
                Thickness  NO3N  NH4N  PH
                150        36    0     8
                150        36    0     8
                150        36    0     8
                150        36    0     8
                150        9     0     7.8
                150        9     0     7.8
                300        7     2     7.8
                300        7     2     7.8
                300        4     3     7.8
              Nutrient
              Physical
                Thickness  BD    AirDry  LL15  DUL       SAT
                150        1.45  0.05    0.2   0.308729  0.4
                150        1.45  0.05    0.2   0.309     0.4
                150        1.45  0.19    0.19  0.32296   0.4
                150        1.45  0.19    0.19  0.323     0.4
                150        1.45  0.24    0.24  0.323     0.37
                150        1.45  0.24    0.24  0.323     0.37
                300        1.45  0.24    0.24  0.298     0.35
                300        1.45  0.24    0.24  0.298     0.35
                300        1.45  0.24    0.24  0.298     0.35
                SoilCrop MungbeanSoil: LL=[0.2, 0.2, 0.19, 0.19, 0.24, 0.24, 0.24, 0.24, 0.24]; KL=[0.08, 0.08, 0.08, 0.08, 0.08, 0.08, 0.08, 0.08, 0.08]; XF=[1, 1, 1, 1, 1, 1, 1, 1, 1]
              Sample Initial conditions: Thickness=[150, 150, 150, 150, 150, 150, 300, 300, 300]; SWUnits=Volumetric; OCUnits=Total; PHUnits=Water
                SW=[0.309, 0.309, 0.323, 0.323, 0.323, 0.323, 0.323, 0.298, 0.298]
              InitialWater Initial water: PercentMethod=0; FractionFull=1
            Manager AutoIrr
              AutoIrrigationOn = False
              Crop = [Mungbean]
              FASWThreshold = 0.9
              FASWDepth = 900
              weeks = 0
              afterSowing = 0
              script: same as in Validation.Thomas Dissertation.Experiment_1_Berken.Exp1Berken.paddock.AutoIrr
      Experiment HopelandSummer
        Factors
          Permutation
            Factor N: Specification=[Operations]
              Operations 0N_rf
                2020-01-29  [Fertiliser].Apply(Amount: 3.6, Type: Fertiliser.Types.NO3N, Depth: 150)
              Operations 0N_irr
                2020-03-20  [Irrigation].Apply(amount: 200)
                2020-01-29  [Fertiliser].Apply(Amount: 3.6, Type: Fertiliser.Types.NO3N, Depth: 150)
        Simulation HopelandSummer
          Clock: Start=2020-01-08; End=2020-08-18
          Summary summaryfile
          Weather: FileName=Hopeland.xlsx; ExcelWorkSheetName=Hopeland
          SoilArbitrator Soil Arbitrator
          Zone paddock: Area=1; Slope=0; AspectAngle=0; Altitude=50
            MicroClimate: a_interception=0; b_interception=1; c_interception=0; d_interception=0; SoilHeatFluxFraction=0; MinimumHeightDiffForNewLayer=0; NightInterceptionFraction=0; ReferenceHeight=2
            Irrigation
            Fertiliser
            SurfaceOrganicMatter: InitialResidueName=wheat; InitialResidueType=wheat; InitialResidueMass=500; InitialStandingFraction=0; InitialCPR=0; InitialCNR=40
            Report DailyReport: same as Validation.Thomas Dissertation.Experiment_1_Berken.Exp1Berken.paddock.DailyReport
            Manager SowingRule
              RowSpacing = 500
              SowingDepth = 40
              SowingRate = 30
              CultivarName = Jade
              SowingDate = 01/29/2020 00:00:00
              script: same as in Validation.Thomas Dissertation.Experiment_1_Berken.Exp1Berken.paddock.SowingRule
            Manager HarvestRule: same as Validation.Thomas Dissertation.Experiment_1_Berken.Exp1Berken.paddock.HarvestRule
            Report HarvestReport: same as Validation.Thomas Dissertation.Experiment_1_Berken.Exp1Berken.paddock.HarvestReport
            Plant Mungbean
            Operations
            Soil: Latitude=0; Longitude=0
              WaterBalance SoilWater: same as Validation.Mungbean_DAF.HopelandSpring.HopelandSpring.paddock.soil.SoilWater
              CERESSoilTemperature Temperature
              Organic: same as Validation.Mungbean_DAF.HopelandSpring.HopelandSpring.paddock.soil.Organic
              Chemical: same as Validation.Mungbean_DAF.HopelandSpring.HopelandSpring.paddock.soil.Chemical
              Nutrient
              Physical
                Thickness  BD    AirDry  LL15  DUL       SAT
                150        1.45  0.05    0.2   0.308729  0.4
                150        1.45  0.05    0.2   0.309     0.4
                150        1.45  0.19    0.19  0.32296   0.4
                150        1.45  0.19    0.19  0.323     0.4
                150        1.45  0.24    0.24  0.323     0.37
                150        1.45  0.24    0.24  0.323     0.37
                300        1.45  0.27    0.27  0.298     0.35
                300        1.45  0.27    0.27  0.298     0.35
                300        1.45  0.27    0.27  0.298     0.35
                SoilCrop MungbeanSoil: LL=[0.2, 0.2, 0.19, 0.19, 0.24, 0.24, 0.27, 0.27, 0.27]; KL=[0.08, 0.08, 0.08, 0.08, 0.08, 0.08, 0.08, 0.08, 0.08]; XF=[1, 1, 1, 1, 1, 1, 1, 1, 1]
              Sample Initial conditions: same as Validation.Mungbean_DAF.HopelandSpring.HopelandSpring.paddock.soil.Initial conditions
              InitialWater Initial water: PercentMethod=0; FractionFull=1
            Manager AutoIrr: same as Validation.Thomas Dissertation.Experiment_1_Emerald.Exp1Emerald.paddock.AutoIrr
        Memo
          DAF trial in Hopeland, QLD with cultivar Jade planted in Summer. Was supposed to be an N fertilizer trial, but not a priority in the model so we just looked at 0N.
      Simulation IrvingdaleN0N
        Clock: Start=2018-12-12; End=2019-04-08
        Summary summaryfile
        Weather: FileName=Irvingdale.xlsx; ExcelWorkSheetName=Irvingdale
        SoilArbitrator Soil Arbitrator
        Zone paddock: Area=1; Slope=0; AspectAngle=0; Altitude=50
          MicroClimate: a_interception=0; b_interception=1; c_interception=0; d_interception=0; SoilHeatFluxFraction=0; MinimumHeightDiffForNewLayer=0; NightInterceptionFraction=0; ReferenceHeight=2
          Irrigation
          Fertiliser
          SurfaceOrganicMatter: InitialResidueName=wheat; InitialResidueType=wheat; InitialResidueMass=500; InitialStandingFraction=0; InitialCPR=0; InitialCNR=40
          Report DailyReport: same as Validation.Thomas Dissertation.Experiment_1_Berken.Exp1Berken.paddock.DailyReport
          Manager SowingRule
            RowSpacing = 500
            SowingDepth = 40
            SowingRate = 30
            CultivarName = Jade
            SowingDate = 12/28/2018 00:00:00
            script: same as in Validation.Thomas Dissertation.Experiment_1_Berken.Exp1Berken.paddock.SowingRule
          Manager HarvestRule: same as Validation.Thomas Dissertation.Experiment_1_Berken.Exp1Berken.paddock.HarvestRule
          Report HarvestReport: same as Validation.Thomas Dissertation.Experiment_1_Berken.Exp1Berken.paddock.HarvestReport
          Plant Mungbean
          Operations
            2018-12-12  [Fertiliser].Apply(Amount: 0, Type: Fertiliser.Types.NH4N, Depth: 150)
            2019-01-09  [Irrigation].Apply(amount: 80)
            2019-02-08  [Irrigation].Apply(amount: 80)
            2018-12-28  [Fertiliser].Apply(Amount: 3.6, Type: Fertiliser.Types.NO3N, Depth: 150)
          Soil: Latitude=0; Longitude=0
            WaterBalance SoilWater: SummerDate=1-Nov; SummerU=6; SummerCona=3.5; WinterDate=1-Apr; WinterU=6; WinterCona=3.5; DiffusConst=88; DiffusSlope=35.4; Salb=0.13; CN2Bare=72; CNRed=20; CNCov=0.8; DischargeWidth=5; CatchmentArea=10; Thickness=[150, 150, 150, 150, 150, 150, 300, 300, 300]
              SWCON=[0.372, 0.372, 0.464, 0.464, 0.392, 0.392, 0.328, 0.328, 0.328]
            CERESSoilTemperature Temperature
            Organic: FOMCNRatio=33
              Thickness  Carbon  SoilCNRatio  FBiom  FInert  FOM
              150        1.94    14.5         0.02   0.36    0
              150        1.38    14.5         0.015  0.5     0
              150        1       14.5         0.01   0.59    0
              150        1       14.5         0.01   0.59    0
              150        0.9     14.5         0.01   0.84    0
              150        0.9     14.5         0.01   0.84    0
              300        0.75    14.5         0.01   0.8     0
              300        0.75    14.5         0.01   0.8     0
              300        0.75    14.5         0.01   0.8     0
            Chemical
              Thickness  NO3N  NH4N  PH
              150        18    10    5.6
              150        13    7     6.5
              150        6     5     7
              150        1     5     7
              150        1     5     7
              150        1     5     7
              300        3     6     7
              300        3     6     7
              300        3     6     7
            Nutrient
            Physical
              Thickness  BD    AirDry  LL15  DUL    SAT
              150        1.36  0.05    0.25  0.392  0.45
              150        1.36  0.25    0.25  0.392  0.45
              150        1.36  0.25    0.25  0.392  0.45
              150        1.36  0.25    0.25  0.392  0.45
              150        1.36  0.27    0.27  0.372  0.45
              150        1.36  0.27    0.27  0.372  0.45
              300        1.36  0.3     0.3   0.372  0.43
              300        1.36  0.3     0.3   0.372  0.43
              300        1.36  0.3     0.3   0.372  0.43
              SoilCrop MungbeanSoil: LL=[0.25, 0.25, 0.25, 0.25, 0.27, 0.27, 0.3, 0.3, 0.3]; KL=[0.08, 0.08, 0.08, 0.08, 0.08, 0.08, 0.08, 0.08, 0.08]; XF=[1, 1, 1, 1, 1, 1, 1, 1, 1]
            Sample Initial conditions: Thickness=[150, 150, 150, 150, 150, 150, 300, 300, 300]; SW=[0.35, 0.35, 0.35, 0.35, 0.35, 0.35, 0.328, 0.328, 0.328]; SWUnits=Volumetric; OCUnits=Total; PHUnits=Water
          Manager AutoIrr
            Crop = [Mungbean]
            AutoIrrigationOn = True
            FASWThreshold = 0.9
            FASWDepth = 600
            weeks = 2
            afterSowing = 20
            script: same as in Validation.Thomas Dissertation.Experiment_1_Berken.Exp1Berken.paddock.AutoIrr
        Memo
          DAF trial in Irvingdale, QLD with cultivar Jade planted. Was supposed to be an N fertilizer trial, but not a priority in the model so we just looked at 0N.
    Folder Yield_Gap
      Memo Mungbean Yield Gap Study
        CSIRO large-scale, primarily single year field studies that were looking to see what the leading yield limiters were. The data was organized by Brook Anderson (CSIRO) and is being written up by Marisa Collins (LaTrobe) and Lindsay Bell (CSIRO). The cultivar used was Jade with the exception of one site year where they used Crystal. Total biomass and days to maturity data were removed from the model-building dataset as well as a few treatments from the Pampas site after discussion with Lindsay Bell about the unreliability of this data. In some of the studies, the harvesting date in the field is much later than the simulated dates. These discrepancies are for the same reason the biomass and days to maturity data was removed: the crop was left in the ground for later than its maturity or earliest harvesting date, so the harvest date recorded by the field technicians are for that later date.
      Experiment Billa_Billa
        Factors
          Permutation
            Factor Sow
              CompositeFactor 2015
                Specifications:
                  [SowingRule].Script.SowingRate=30
                  [SowingRule].Script.SowingDepth=50
                  [SowingRule].Script.SowingDate=2015-01-13
              CompositeFactor 2016
                Specifications:
                  [SowingRule].Script.SowingRate=25
                  [SowingRule].Script.CultivarName=Crystal
                  [SowingRule].Script.SowingDate=2016-01-15
              CompositeFactor 2016_17
                Specifications:
                  [SowingRule].Script.SowingRate=43
                  [SowingRule].Script.SowingDate=2016-12-23
        Simulation Billa_Billa
          Clock: Start=2015-01-13; End=2017-07-12
          Summary summaryfile
          Weather: FileName=Yield Gap Study\2.ClimateFiles\Glenaradale 41395.met
          SoilArbitrator Soil Arbitrator
          Zone paddock: Area=1; Slope=0; AspectAngle=0; Altitude=50
            MicroClimate: a_interception=0; b_interception=1; c_interception=0; d_interception=0; SoilHeatFluxFraction=0; MinimumHeightDiffForNewLayer=0; NightInterceptionFraction=0; ReferenceHeight=2
            Irrigation
            Fertiliser
            SurfaceOrganicMatter: InitialResidueName=fababeab; InitialResidueType=fababean; InitialResidueMass=2000; InitialStandingFraction=0; InitialCPR=0; InitialCNR=30
            Report DailyReport: same as Validation.Thomas Dissertation.Experiment_1_Berken.Exp1Berken.paddock.DailyReport
            Manager SowingRule
              RowSpacing = 250
              SowingDepth = 30
              SowingRate = 30
              CultivarName = Jade
              SowingDate = 01/13/2015 00:00:00
              script: same as in Validation.Thomas Dissertation.Experiment_1_Berken.Exp1Berken.paddock.SowingRule
            Manager HarvestRule: same as Validation.Thomas Dissertation.Experiment_1_Berken.Exp1Berken.paddock.HarvestRule
            Report HarvestReport: same as Validation.Thomas Dissertation.Experiment_1_Berken.Exp1Berken.paddock.HarvestReport
            Plant Mungbean
            Manager Irrigatefixeddates: same as Validation.Thomas Dissertation.Experiment_1_Berken.Exp1Berken.paddock.Irrigatefixeddates
            Operations
            Soil Grey Vertosol (Billa Billa No220): ASCOrder=Vertosol; ASCSubOrder=Grey; SoilType=Clay; Site=Billa Billa; NearestTown=Goondiwindi; Region=Darling Downs and Granite Belt; State=Queensland; Country=Australia; NaturalVegetation=Brigalow scrub; ApsoilNumber=220; Latitude=-28.101; Longitude=150.328; LocationAccuracy=+/- 20m; YearOfSampling=0
              DataSource=Undertaken by Jeremy Whish, CSIRO Sustainable Ecosystems, Toowoomba in collaboration with MCA, Goondiwindi as part of GRDC Best Management Practice-Pulses project
              Comments=Calculated from a pond and tent during GRDC Best Management Practice-Pulses project. CLL for chickpea needs to be confirmed at depth, OC from soil (Billa Billa No. 036)
              Physical
                Thickness  BD     AirDry  LL15  DUL    SAT
                150        1.48   0.095   0.19  0.36   0.412
                150        1.5    0.152   0.19  0.35   0.404
                150        1.459  0.2     0.2   0.37   0.42
                150        1.514  0.2     0.2   0.349  0.399
                150        1.6    0.2     0.2   0.31   0.366
                150        1.6    0.2     0.2   0.31   0.366
                300        1.72   0.2     0.2   0.27   0.321
                300        1.72   0.2     0.2   0.27   0.321
                300        1.74   0.2     0.2   0.26   0.313
                BD source: Calculated from gravimetric moisture when profile wet but drained
                AirDry, LL15 source: Estimated based on local knowledge
                DUL source: Field measured and checked for sensibility
                SAT source: Calculated from measured, estimated or calculated BD
                SoilCrop MungbeanSoil: LL=[0.19, 0.19, 0.2, 0.281, 0.288, 0.288, 0.27, 0.27, 0.26]; KL=[0.06, 0.06, 0.06, 0.04, 0.04, 0.04, 0.02, 0.02, 0.02]; XF=[1, 1, 1, 1, 1, 1, 1, 1, 1]
              WaterBalance SoilWater: SummerDate=1-Nov; SummerU=6; SummerCona=3.5; WinterDate=1-Apr; WinterU=4; WinterCona=2.5; DiffusConst=40; DiffusSlope=16; Salb=0.13; CN2Bare=73; CNRed=20; CNCov=0.8; Thickness=[150, 150, 150, 150, 150, 150, 300, 300, 300]; SWCON=[0.3, 0.3, 0.3, 0.3, 0.3, 0.3, 0.3, 0.3, 0.3]
              Organic: FOMCNRatio=40
                Thickness  Carbon  SoilCNRatio  FBiom  FInert  FOM
                150        1.24    12           0.04   0.4     347.129
                150        1.24    12           0.02   0.5     270.344
                150        1.25    12           0.02   0.5     163.972
                150        1.1     12           0.02   0.6     99.4541
                150        0.71    12           0.01   0.6     60.322
                150        0.71    12           0.01   0.6     60.322
                300        0.34    12           0.01   0.7     36.587
                300        0.34    12           0.01   0.7     36.587
                300        0.26    12           0.01   0.8     22.191
              Chemical
                Thickness  NO3N     NH4N  PH   CL    EC
                150        22.4625  0     7.7  10.1  0.2
                150        13.3333  0     8.2  9.5   0.2
                150        9.13868  0     8.4  10.7  0.6
                150        8.80669  0     8.2  12.5  1.5
                150        1        0.2   7.8  12.5  1
                150        1        0.2   7.8  12.5  1
                300        1        0.2   6.9  11.7  0.8
                300        1        0.2   6.9  11.7  0.8
                300        1        0.2   6.9  11.7  0.8
                EC, CL, PH source: Measured
              InitialWater: PercentMethod=0; FractionFull=0.47; RelativeTo=LL15
              Sample Initial conditions: Thickness=[1800]; NH4=[1]; SWUnits=Volumetric; OCUnits=Total; PHUnits=Water
              Nutrient
              CERESSoilTemperature Temperature
            Manager AutoIrr
              Crop = [Mungbean]
              AutoIrrigationOn = True
              FASWThreshold = 0.9
              FASWDepth = 600
              weeks = 2
              afterSowing = 0
              script: same as in Validation.Thomas Dissertation.Experiment_1_Berken.Exp1Berken.paddock.AutoIrr
      Experiment Emerald
        Factors
          Permutation
            Factor Sow
              CompositeFactor 2015_16S1
                Specifications:
                  [SowingRule].Script.SowingDate=2015-12-18
                  [Operations]
                Operations reset
                  2015-12-18  [InitialWaterReset].Script.ResetWater(0,17)
              CompositeFactor 2015_16S2
                Specifications:
                  [SowingRule].Script.SowingDate=2016-01-13
                  [Operations]
                Operations reset
                  2016-01-13  [InitialWaterReset].Script.ResetWater(0,36)
              CompositeFactor 2015_16S3
                Specifications:
                  [SowingRule].Script.SowingDate=2016-02-18
                  [Operations]
                Operations reset
                  2016-02-18  [InitialWaterReset].Script.ResetWater(0,36)
              CompositeFactor 2016_17S1
                Specifications:
                  [SowingRule].Script.SowingDate=2016-12-08
                  [Operations]
                Operations reset
                  2016-12-08  [InitialWaterReset].Script.ResetWater(0,33)
              CompositeFactor 2016_17S2
                Specifications:
                  [SowingRule].Script.SowingDate=2017-01-18
                  [Operations]
                Operations reset
                  2016-02-18  [InitialWaterReset].Script.ResetWater(0,62)
              CompositeFactor 2016_17S3
                Specifications:
                  [SowingRule].Script.SowingDate=2017-03-02
                  [Operations]
                Operations reset
                  2016-02-18  [InitialWaterReset].Script.ResetWater(0,28)
        Simulation EmeraldYieldGap
          Clock: Start=2016-12-18; End=2017-08-10
          Summary summaryfile
          Weather: FileName=Yield Gap Study\2.ClimateFiles\Glenaradale 41395.met
          SoilArbitrator Soil Arbitrator
          Zone paddock: Area=1; Slope=0; AspectAngle=0; Altitude=50
            MicroClimate: a_interception=0; b_interception=1; c_interception=0; d_interception=0; SoilHeatFluxFraction=0; MinimumHeightDiffForNewLayer=0; NightInterceptionFraction=0; ReferenceHeight=2
            Irrigation
            Fertiliser
            SurfaceOrganicMatter: InitialResidueName=fababean; InitialResidueType=fababean; InitialResidueMass=2000; InitialStandingFraction=0; InitialCPR=0; InitialCNR=30
            Report DailyReport: same as Validation.Thomas Dissertation.Experiment_1_Berken.Exp1Berken.paddock.DailyReport
            Manager SowingRule: same as Validation.Yield_Gap.Billa_Billa.Billa_Billa.paddock.SowingRule
            Manager HarvestRule: same as Validation.Thomas Dissertation.Experiment_1_Berken.Exp1Berken.paddock.HarvestRule
            Report HarvestReport: same as Validation.Thomas Dissertation.Experiment_1_Berken.Exp1Berken.paddock.HarvestReport
            Plant Mungbean
            Manager Irrigatefixeddates: same as Validation.Thomas Dissertation.Experiment_1_Berken.Exp1Berken.paddock.Irrigatefixeddates
            Operations
            Manager InitialWaterReset
```csharp
using System;
using Models.Core;
using Models.Interfaces;
using Models.Soils;
using APSIM.Shared.Utilities;

namespace Models
{
    [Serializable]
    public class Script : Model
    {
        [Link] private ISummary summary;
        [Link] private IPhysical physical;
        [Link] private ISoilWater soilWater;

        public void ResetWater(int layer, double percentFull)
        {
        	if (percentFull < 0 || percentFull > 100)
        		throw new ArgumentException("percentFull must be in range [0, 100]");
        	if (layer >= physical.Thickness.Length || layer < 0)
        		throw new ArgumentException("layer must be in range [0, " + physical.Thickness.Length + "]");
        	soilWater.SW[layer] = MathUtilities.Divide(percentFull, 100, 0) * physical.PAWC[layer] + physical.LL15[layer];
        	soilWater.SWmm[layer] = MathUtilities.Divide(percentFull, 100, 0) * physical.PAWCmm[layer] + physical.LL15mm[layer];
        }
    }
}
```
            Soil Black Vertosol (Emerald No911): ASCOrder=Vertosol; ASCSubOrder=Black; SoilType=Clay; Site=Emerald; NearestTown=Emerald; Region=Central Highlands; State=Queensland; Country=Australia; ApsoilNumber=911; Latitude=-23.5211; Longitude=148.123; YearOfSampling=0; DataSource=Collected by Brett Cocks (CES) for NVT.
              Physical
                Thickness  BD     AirDry  LL15   DUL    SAT
                150        1.422  0.062   0.124  0.384  0.434
                150        1.431  0.118   0.148  0.379  0.429
                150        1.46   0.153   0.153  0.353  0.403
                150        1.44   0.153   0.153  0.365  0.415
                150        1.416  0.153   0.153  0.387  0.437
                150        1.416  0.153   0.153  0.387  0.437
                300        1.394  0.153   0.153  0.401  0.451
                300        1.394  0.153   0.153  0.401  0.451
                300        1.407  0.153   0.153  0.396  0.446
                BD, DUL source: Field measured and checked for sensibility
                SoilCrop MungbeanSoil
                  LL=[0.124, 0.148, 0.153, 0.265, 0.336, 0.336, 0.401, 0.401, 0.396]
                  KL=[0.06, 0.06, 0.06, 0.04, 0.04, 0.04, 0.02, 0.02, 0.02]
                  XF=[1, 1, 1, 1, 1, 1, 1, 1, 1]
              WaterBalance SoilWater: SummerDate=1-Nov; SummerU=6; SummerCona=3.5; WinterDate=1-Apr; WinterU=2; WinterCona=2; DiffusConst=40; DiffusSlope=16; Salb=0.12; CN2Bare=73; CNRed=20; CNCov=0.8; Thickness=[150, 150, 150, 150, 150, 150, 300, 300, 300]; SWCON=[0.3, 0.3, 0.3, 0.3, 0.3, 0.3, 0.3, 0.3, 0.3]
              Organic: FOMCNRatio=40
                Thickness  Carbon  SoilCNRatio  FBiom  FInert  FOM
                150        1.24    12           0.04   0.4     347.129
                150        1.24    12           0.02   0.5     270.344
                150        1.25    12           0.02   0.7     163.972
                150        1.1     12           0.02   1       99.4541
                150        0.71    12           0.01   1       60.322
                150        0.71    12           0.01   1       60.322
                300        0.34    12           0.01   1       36.587
                300        0.34    12           0.01   1       36.587
                300        0.34    12           0.01   1       22.191
              Chemical
                Thickness  NO3N     NH4N  PH   CL     EC
                150        23.4117  0     7.7  30     0.2
                150        13.9762  0     8.3  40.3   0.3
                150        9.13242  0     8.5  26     0.5
                150        9.25926  0     8.6  138.2  0.8
                150        1        0.2   8.2  485.4  1
                150        1        0.2   8.2  485.4  1
                300        1        0.2   7.6  818.4  1.3
                300        1        0.2   7.6  818.4  1.3
                300        1        0.2   7.7  947.2  1.3
              InitialWater: PercentMethod=0; FractionFull=0.36; RelativeTo=LL15
              Sample Initial conditions: Thickness=[1800]; NH4=[1]; SWUnits=Volumetric; OCUnits=Total; PHUnits=Water
              CERESSoilTemperature Temperature
              Nutrient
            Manager AutoIrr
              Crop = [Mungbean]
              AutoIrrigationOn = True
              FASWThreshold = 0.9
              FASWDepth = 600
              weeks = 0
              afterSowing = 0
              script: same as in Validation.Thomas Dissertation.Experiment_1_Berken.Exp1Berken.paddock.AutoIrr
      Experiment HRS
        Factors
          Permutation
            Factor Sow
              CompositeFactor 2015_16S1
                Specifications:
                  [SowingRule].Script.SowingDate=2016-02-10
                  [Operations]
                Operations reset
                  2016-02-10  [InitialWaterReset].Script.ResetWater(0,49)
              CompositeFactor 2015_16S2
                Specifications:
                  [SowingRule].Script.SowingDate=2016-01-14
                  [Operations]
                Operations reset
                  2016-01-14  [InitialWaterReset].Script.ResetWater(0,14)
              CompositeFactor 2015_16S3
                Specifications:
                  [SowingRule].Script.SowingDate=2015-12-08
                  [Operations]
                Operations reset
                  2015-12-08  [InitialWaterReset].Script.ResetWater(0,11)
        Simulation HRS
          Clock: Start=2015-12-08; End=2016-06-06
          Summary summaryfile
          Weather: FileName=Hermitage.xlsx; ExcelWorkSheetName=Hermitage
          SoilArbitrator Soil Arbitrator
          Zone paddock: Area=1; Slope=0; AspectAngle=0; Altitude=50
            MicroClimate: a_interception=0; b_interception=1; c_interception=0; d_interception=0; SoilHeatFluxFraction=0; MinimumHeightDiffForNewLayer=0; NightInterceptionFraction=0; ReferenceHeight=2
            Irrigation
            Fertiliser
            SurfaceOrganicMatter: InitialResidueName=wheat; InitialResidueType=wheat; InitialResidueMass=0; InitialStandingFraction=0; InitialCPR=0; InitialCNR=80
            Report DailyReport: same as Validation.Thomas Dissertation.Experiment_1_Berken.Exp1Berken.paddock.DailyReport
            Manager SowingRule: same as Validation.Yield_Gap.Billa_Billa.Billa_Billa.paddock.SowingRule
            Manager HarvestRule: same as Validation.Thomas Dissertation.Experiment_1_Berken.Exp1Berken.paddock.HarvestRule
            Report HarvestReport: same as Validation.Thomas Dissertation.Experiment_1_Berken.Exp1Berken.paddock.HarvestReport
            Plant Mungbean
            Manager Irrigatefixeddates: same as Validation.Thomas Dissertation.Experiment_1_Berken.Exp1Berken.paddock.Irrigatefixeddates
            Operations
            Manager InitialWaterReset: same as Validation.Yield_Gap.Emerald.EmeraldYieldGap.paddock.InitialWaterReset
            Soil Brown Vertosol-Talgai-shallow phase (Hermitage No033): ASCOrder=Vertosol; ASCSubOrder=Brown; SoilType=Clay; Site=Hermitage; NearestTown=Warwick, Q 4370; Region=Darling Downs and Granite Belt; State=Queensland; Country=Australia; NaturalVegetation=Poplar Box , Ironbark, Qld Blue Gum; ApsoilNumber=33; Latitude=-28.2; Longitude=152.101; LocationAccuracy=+/- 20m; YearOfSampling=0; Comments=oc and ph estimated
              DataSource=Data provided by I.  Broad, Queensland Department of Primary Industries
              Physical
                Thickness  BD    AirDry  LL15  DUL   SAT
                150        1.38  0.115   0.23  0.4   0.45
                150        1.38  0.184   0.23  0.4   0.45
                150        1.3   0.23    0.23  0.43  0.48
                150        1.37  0.23    0.23  0.4   0.45
                150        1.49  0.23    0.23  0.36  0.41
                150        1.49  0.23    0.23  0.36  0.41
                300        1.64  0.23    0.23  0.34  0.35
                300        1.64  0.23    0.23  0.34  0.35
                300        1.6   0.23    0.23  0.34  0.37
                BD, DUL source: Field measured and checked for sensibility
                AirDry, LL15 source: Estimated based on local knowledge
                SAT source: Calculated from measured, estimated or calculated BD
                SoilCrop MungbeanSoil: LL=[0.19, 0.19, 0.23, 0.281, 0.288, 0.288, 0.3, 0.3, 0.26]; KL=[0.06, 0.06, 0.06, 0.04, 0.04, 0.04, 0.02, 0.02, 0.02]; XF=[1, 1, 1, 1, 1, 1, 1, 1, 1]
              WaterBalance SoilWater: SummerDate=1-Nov; SummerU=6; SummerCona=3.5; WinterDate=1-Apr; WinterU=4; WinterCona=2.5; DiffusConst=40; DiffusSlope=16; Salb=0.12; CN2Bare=73; CNRed=20; CNCov=0.8; Thickness=[150, 150, 150, 150, 150, 150, 300, 300, 300]; SWCON=[0.3, 0.3, 0.3, 0.3, 0.3, 0.3, 0.3, 0.3, 0.3]
              Organic: FOMCNRatio=40
                Thickness  Carbon  SoilCNRatio  FBiom  FInert  FOM
                150        1.24    12           0.04   0.4     347.129
                150        1.24    12           0.02   0.6     270.344
                150        1.25    12           0.02   0.8     163.972
                150        1.1     12           0.02   1       99.4541
                150        1.1     12           0.02   1       99.454
                150        0.71    12           0.01   1       60.322
                300        0.71    12           0.01   1       60.322
                300        0.34    12           0.01   1       36.587
                300        0.26    12           0.01   1       22.191
              Chemical
                Thickness  NO3N     NH4N  PH
                150        24.1546  0     8
                150        14.4928  0     8
                150        10.2564  0     8
                150        9.73236  0     8
                150        1        0.2   8
                150        1        0.2   8
                300        1        0.2   8
                300        1        0.2   8
                300        1        0.2   8
                PH source: Estimated based on local knowledge
              InitialWater: PercentMethod=0; FractionFull=0.47; RelativeTo=LL15
              Sample Initial conditions: Thickness=[1800]; NH4=[1]; SWUnits=Volumetric; OCUnits=Total; PHUnits=Water
              Nutrient
              CERESSoilTemperature Temperature
            Manager AutoIrr
              Crop = [Mungbean]
              AutoIrrigationOn = True
              FASWThreshold = 0.9
              FASWDepth = 600
              weeks = 1
              afterSowing = 0
              script: same as in Validation.Thomas Dissertation.Experiment_1_Berken.Exp1Berken.paddock.AutoIrr
      Experiment Pampas
        Factors
          Permutation
            Factor Sow
              CompositeFactor M10_dens33_canola
                Specifications:
                  [SowingRule].Script.SowingDate=2015-12-23
                  [SowingRule].Script.SowingRate=33
                  [SurfaceOrganicMatter].InitialResidueType=canola
                  [SurfaceOrganicMatter].InitialResidueMass=11000
                  [SurfaceOrganicMatter].InitialCNR=40
              CompositeFactor M11_dens26_canola
                Specifications:
                  [SowingRule].Script.SowingDate=2015-12-23
                  [SowingRule].Script.SowingRate=26
                  [SurfaceOrganicMatter].InitialResidueType=canola
                  [SurfaceOrganicMatter].InitialResidueMass=11000
                  [SurfaceOrganicMatter].InitialCNR=40
              CompositeFactor S3_Dec8_dens37_fallow
              CompositeFactor S6_Dec8_dens36_fallow
                Specifications:
                  [SowingRule].Script.SowingDate=2015-12-08
                  [SowingRule].Script.SowingRate=36
                  [SurfaceOrganicMatter].InitialResidueType=fieldpea
                  [SurfaceOrganicMatter].InitialResidueMass=0
                  [SurfaceOrganicMatter].InitialCNR=0
              CompositeFactor S14_Jan19_dens23_fallow
                Specifications:
                  [SowingRule].Script.SowingDate=2016-1-19
                  [SowingRule].Script.SowingRate=23
                  [SurfaceOrganicMatter].InitialResidueType=fieldpea
                  [SurfaceOrganicMatter].InitialResidueMass=0
                  [SurfaceOrganicMatter].InitialCNR=0
        Simulation Pampas
          Clock: Start=2015-12-08; End=2017-06-06
          Summary summaryfile
          Weather: FileName=Yield Gap Study\2.ClimateFiles\Hermitage Stn 41044.met
          SoilArbitrator Soil Arbitrator
          Zone paddock: Area=1; Slope=0; AspectAngle=0; Altitude=50
            MicroClimate: a_interception=0; b_interception=1; c_interception=0; d_interception=0; SoilHeatFluxFraction=0; MinimumHeightDiffForNewLayer=0; NightInterceptionFraction=0; ReferenceHeight=2
            Irrigation
            Fertiliser
            SurfaceOrganicMatter: InitialResidueName=wheat; InitialResidueType=wheat; InitialResidueMass=0; InitialStandingFraction=0; InitialCPR=0; InitialCNR=80
            Report DailyReport: same as Validation.Thomas Dissertation.Experiment_1_Berken.Exp1Berken.paddock.DailyReport
            Manager SowingRule: same as Validation.Yield_Gap.Billa_Billa.Billa_Billa.paddock.SowingRule
            Manager HarvestRule: same as Validation.Thomas Dissertation.Experiment_1_Berken.Exp1Berken.paddock.HarvestRule
            Report HarvestReport: same as Validation.Thomas Dissertation.Experiment_1_Berken.Exp1Berken.paddock.HarvestReport
            Plant Mungbean
            Manager Irrigatefixeddates: same as Validation.Thomas Dissertation.Experiment_1_Berken.Exp1Berken.paddock.Irrigatefixeddates
            Operations
            Manager InitialWaterReset: same as Validation.Yield_Gap.Emerald.EmeraldYieldGap.paddock.InitialWaterReset
            Soil: Latitude=0; Longitude=0; YearOfSampling=0
              Sample Initial nitrogen: Thickness=[150, 150, 150, 150, 150, 150, 300, 300, 300]; SWUnits=Volumetric; OCUnits=Total; PHUnits=Water
                SW=[0.321, 0.434, 0.45, 0.45, 0.482, 0.482, 0.411, 0.411, 0.385]
              Physical
                Thickness  BD     AirDry  LL15  DUL         SAT
                150        1.32   0.23    0.25  0.45190891  0.502
                150        1.24   0.26    0.28  0.452859    0.503
                150        1.24   0.29    0.29  0.46217408  0.512
                150        1.29   0.29    0.29  0.46098     0.511
                150        1.29   0.29    0.29  0.461       0.511
                150        1.382  0.29    0.29  0.428       0.478
                300        1.382  0.29    0.29  0.428       0.478
                300        1.478  0.29    0.29  0.42        0.442
                300        1.46   0.29    0.29  0.4         0.424
                SoilCrop MungbeanSoil: LL=[0.25, 0.28, 0.31, 0.32, 0.32, 0.33, 0.33, 0.42, 0.4]; KL=[0.06, 0.06, 0.4, 0.4, 0.4, 0.3, 0.3, 0.02, 0.02]; XF=[1, 1, 1, 1, 1, 1, 1, 1, 1]
              WaterBalance SoilWater: SummerDate=1-Nov; SummerU=6; SummerCona=3.5; WinterDate=1-Apr; WinterU=6; WinterCona=3.5; DiffusConst=40; DiffusSlope=16; Salb=0.13; CN2Bare=73; CNRed=20; CNCov=0.8; Thickness=[150, 150, 150, 150, 150, 150, 300, 300, 300]; SWCON=[0.3, 0.3, 0.3, 0.3, 0.3, 0.3, 0.3, 0.3, 0.3]
              Organic: FOMCNRatio=40
                Thickness  Carbon  SoilCNRatio  FBiom  FInert  FOM
                150        1.22    12.5         0.025  0.4     82.9287
                150        1.13    12.5         0.02   0.6     55.5888
                150        1.016   12.5         0.015  0.8     30.5078
                150        0.854   12.5         0.01   0.9     16.743
                150        0.854   12.5         0.01   0.9     16.743
                150        0.517   12.5         0.01   0.95    9.189
                300        0.517   12.5         0.01   0.95    9.189
                300        0.306   12.5         0.01   0.95    5.043
                300        0.306   12.5         0.01   0.95    5.043
              Chemical
                Thickness  NO3N   NH4N  PH    CL     EC
                150        11     2.75  7.35  8.14   0.2
                150        11     2.75  8.05  8.14   0.25
                150        10.25  2.5   8.48  8.14   0.31
                150        14     2.25  8.87  9.42   0.4
                150        1      0.2   9.09  19.24  0.59
                150        1      0.2   9.15  38.29  0.84
                300        1      0.2   9.09  19.24  0.59
                300        1      0.2   9.15  38.29  0.84
                300        1      0.2   9.15  38.29  0.84
              InitialWater Initial water: PercentMethod=0; FractionFull=1
              Nutrient
              CERESSoilTemperature Temperature
      Simulation TheGlen2013_14S
        Clock: Start=2014-02-18; End=2014-05-20
        Summary summaryfile
        Weather: FileName=Yield Gap Study\2.ClimateFiles\The_Glen.met
        SoilArbitrator Soil Arbitrator
        Zone paddock: Area=1; Slope=0; AspectAngle=0; Altitude=50
          MicroClimate: a_interception=0; b_interception=1; c_interception=0; d_interception=0; SoilHeatFluxFraction=0; MinimumHeightDiffForNewLayer=0; NightInterceptionFraction=0; ReferenceHeight=2
          Irrigation
          Fertiliser
          SurfaceOrganicMatter: InitialResidueName=wheat; InitialResidueType=wheat; InitialResidueMass=0; InitialStandingFraction=0; InitialCPR=0; InitialCNR=80
          Report DailyReport: same as Validation.Thomas Dissertation.Experiment_1_Berken.Exp1Berken.paddock.DailyReport
          Manager SowingRule
            RowSpacing = 250
            SowingDepth = 30
            SowingRate = 30
            CultivarName = Jade
            SowingDate = 02/18/2014 00:00:00
            script: same as in Validation.Thomas Dissertation.Experiment_1_Berken.Exp1Berken.paddock.SowingRule
          Manager HarvestRule: same as Validation.Thomas Dissertation.Experiment_1_Berken.Exp1Berken.paddock.HarvestRule
          Report HarvestReport: same as Validation.Thomas Dissertation.Experiment_1_Berken.Exp1Berken.paddock.HarvestReport
          Plant Mungbean
          Manager Irrigatefixeddates: same as Validation.Thomas Dissertation.Experiment_1_Berken.Exp1Berken.paddock.Irrigatefixeddates
          Operations
          Soil Grey Vertosol Downs (Capella No1275): ASCOrder=Vertosol; SoilType=Grey Vertosol; LocalName=Downs; Site=Capella; NearestTown=Capella; Region=Central Highlands; State=Queensland; Country=Australia; NaturalVegetation=Brigalow; ApsoilNumber=1275; Latitude=-23.2321; Longitude=148.11336; LocationAccuracy=+/-20 m; YearOfSampling=2015; DataSource=Brett Cocks CSIRO Agriculture; Comments=Plain on back plain
            Physical
              Thickness  BD       AirDry    LL15      DUL       SAT
              150        1.30147  0.130581  0.261162  0.428878  0.478878
              150        1.18974  0.20893   0.261162  0.471043  0.521043
              150        1.18506  0.261162  0.261162  0.472806  0.522806
              150        1.185    0.261162  0.261162  0.473     0.523
              150        1.247    0.261162  0.261162  0.449     0.499
              150        1.247    0.261     0.261     0.449     0.499
              300        1.449    0.261     0.261     0.373     0.423
              300        1.449    0.261     0.261     0.373     0.423
              300        1.449    0.261     0.261     0.373     0.423
              BD, DUL source: Field measured and checked for sensibility
              AirDry, LL15 source: Estimated based on local knowledge
              SAT source: Calculated from measured, estimated or calculated BD
              SoilCrop MungbeanSoil: LL=[0.225, 0.239, 0.261, 0.261, 0.36, 0.36, 0.34, 0.34, 0.34]; KL=[0.6, 0.6, 0.6, 0.6, 0.04, 0.04, 0.04, 0.04, 0.04]; XF=[1, 1, 1, 1, 1, 1, 1, 1, 1]
            WaterBalance SoilWater: SummerDate=1-nov; SummerU=6; SummerCona=3.5; WinterDate=1-apr; WinterU=4; WinterCona=2.5; DiffusConst=40; DiffusSlope=16; Salb=0.12; CN2Bare=73; CNRed=20; CNCov=0.08; Thickness=[150, 150, 150, 150, 150, 150, 300, 300, 300]; SWCON=[0.3, 0.3, 0.3, 0.3, 0.3, 0.3, 0.3, 0.3, 0.3]
            Organic: FOMCNRatio=40
              Thickness  Carbon  SoilCNRatio  FBiom  FInert  FOM
              150        0.806   12           0.6    0.4     523.082
              150        0.806   12           0.6    0.4     523.082
              150        0.689   12           0.4    0.6     317.265
              150        0.689   12           0.4    0.6     317.265
              150        0.715   12           0.2    0.8     116.715
              150        0.715   12           0.2    0.8     116.715
              300        0.494   12           0.05   0.95    42.937
              300        0.494   12           0.05   0.95    42.937
              300        0.494   12           0.05   0.95    42.937
            Chemical
              Thickness  NO3N     NH4N  PH   CL   EC     ESP
              150        11.6667  4     7.4  5.4  0.096  1.62879
              150        11.667   4     7.4  5.4  0.096  1.629
              150        5        4     7.9  2.4  0.097  2.379
              150        5        4     7.9  2.4  0.097  2.379
              150        4        4     8.1  2.8  0.133  3.321
              150        4        4     8.1  2.8  0.133  3.321
              300        3        4     8.6  3.3  0.17   4.569
              300        3        4     8.6  3.3  0.17   4.569
              300        3        4     8.6  3.3  0.17   4.569
              EC, CL, PH source: Measured
              ESP source: C
            Sample InitialNitrogen: Thickness=[150, 150, 150, 150, 150, 150, 300, 300, 300]; SWUnits=Volumetric; OCUnits=Total; PHUnits=Water
              SW=[0.373, 0.373, 0.45, 0.45, 0.448, 0.448, 0.423, 0.423, 0.353]
            InitialWater Initial water: PercentMethod=0; FractionFull=1
            Nutrient
            CERESSoilTemperature Temperature
      Simulation Belvedere2013_14S
        Clock: Start=2014-12-19; End=2015-04-23
        Summary summaryfile
        Weather: FileName=Yield Gap Study\2.ClimateFiles\Belvedere.xlsx; ExcelWorkSheetName=Sheet1
        SoilArbitrator Soil Arbitrator
        Zone paddock: Area=1; Slope=0; AspectAngle=0; Altitude=50
          MicroClimate: a_interception=0; b_interception=1; c_interception=0; d_interception=0; SoilHeatFluxFraction=0; MinimumHeightDiffForNewLayer=0; NightInterceptionFraction=0; ReferenceHeight=2
          Irrigation
          Fertiliser
          SurfaceOrganicMatter: InitialResidueName=wheat; InitialResidueType=wheat; InitialResidueMass=5000; InitialStandingFraction=0; InitialCPR=0; InitialCNR=80
          Report DailyReport: same as Validation.Thomas Dissertation.Experiment_1_Berken.Exp1Berken.paddock.DailyReport
          Manager SowingRule
            RowSpacing = 250
            SowingDepth = 30
            SowingRate = 30
            CultivarName = Jade
            SowingDate = 12/20/2014 00:00:00
            script: same as in Validation.Thomas Dissertation.Experiment_1_Berken.Exp1Berken.paddock.SowingRule
          Manager HarvestRule: same as Validation.Thomas Dissertation.Experiment_1_Berken.Exp1Berken.paddock.HarvestRule
          Report HarvestReport: same as Validation.Thomas Dissertation.Experiment_1_Berken.Exp1Berken.paddock.HarvestReport
          Plant Mungbean
          Manager Irrigatefixeddates: same as Validation.Thomas Dissertation.Experiment_1_Berken.Exp1Berken.paddock.Irrigatefixeddates
          Operations
          Soil Brown Clay-Kianga Red (Banana No045): ASCOrder=Vertosol; ASCSubOrder=Brown; SoilType=Clay; Site=Banana; NearestTown=Banana, Q 4702; Region=Capricornia; State=Queensland; Country=Australia; ApsoilNumber=45; Latitude=-24.42; Longitude=150.143; LocationAccuracy=+/- 20m; YearOfSampling=0; DataSource=Qld Department of Primary Industries and Fisheries (D Lack)
            Physical
              Thickness  BD    AirDry  LL15  DUL   SAT
              150        1.34  0.09    0.18  0.35  0.4
              150        1.36  0.144   0.18  0.41  0.46
              150        1.42  0.22    0.22  0.38  0.43
              150        1.42  0.22    0.22  0.38  0.43
              150        1.58  0.2     0.2   0.32  0.37
              150        1.58  0.2     0.2   0.32  0.37
              300        1.55  0.19    0.19  0.34  0.39
              300        1.55  0.19    0.19  0.34  0.39
              300        1.55  0.19    0.19  0.34  0.39
              BD, DUL source: Field measured and checked for sensibility
              AirDry, LL15 source: Estimated based on local knowledge
              SAT source: Calculated from measured, estimated or calculated BD
              SoilCrop MungbeanSoil
                LL=[0.228, 0.233, 0.242, 0.242, 0.266, 0.266, 0.311, 0.311, 0.311]
                KL=[0.07, 0.07, 0.07, 0.07, 0.05, 0.05, 0.05, 0.05, 0.05]
                XF=[1, 1, 1, 1, 1, 1, 1, 1, 1]
            WaterBalance SoilWater: same as Validation.Yield_Gap.HRS.HRS.paddock.Brown Vertosol-Talgai-shallow phase (Hermitage No033).SoilWater
            Organic: FOMCNRatio=40
              Thickness  Carbon  SoilCNRatio  FBiom  FInert  FOM
              150        1.19    12           0.04   1       446.88
              150        1.01    12           0.02   1       307.136
              150        1.01    12           0.02   1       307.136
              150        0.45    12           0.02   1       145.081
              150        0.45    12           0.02   1       145.081
              150        0.3     12           0.02   1       68.531
              300        0.3     12           0.02   1       68.531
              300        0.2     12           0.01   1       32.372
              300        0.2     12           0.01   1       32.372
            Chemical
              Thickness  NO3N     NH4N  PH
              150        3.66667  5     8.2
              150        3        5     8.5
              150        3        5     8.5
              150        2        5     8.6
              150        2        5     8.6
              150        1        5     8.6
              300        1        5     8.6
              300        4        5     7.4
              300        4        5     7.4
              PH source: Estimated based on local knowledge
            Sample Initial conditions: Thickness=[150, 150, 150, 150, 150, 150, 300, 300, 300]; SWUnits=Volumetric; OCUnits=Total; PHUnits=Water
              SW=[0.335, 0.386, 0.386, 0.386, 0.314, 0.314, 0.322, 0.322, 0.327]
            InitialWater Initial water: PercentMethod=0; FractionFull=1
            Nutrient
            CERESSoilTemperature Temperature
      Simulation Dalby2013_14S
        Clock: Start=2014-01-30; End=2014-05-23
        Summary summaryfile
        Weather: FileName=Yield Gap Study\2.ClimateFiles\Dalby.xlsx; ExcelWorkSheetName=Dalby
        SoilArbitrator Soil Arbitrator
        Zone paddock: Area=1; Slope=0; AspectAngle=0; Altitude=50
          MicroClimate: a_interception=0; b_interception=1; c_interception=0; d_interception=0; SoilHeatFluxFraction=0; MinimumHeightDiffForNewLayer=0; NightInterceptionFraction=0; ReferenceHeight=2
          Irrigation
          Fertiliser
          SurfaceOrganicMatter: InitialResidueName=wheat; InitialResidueType=wheat; InitialResidueMass=0; InitialStandingFraction=0; InitialCPR=0; InitialCNR=80
          Report DailyReport: same as Validation.Thomas Dissertation.Experiment_1_Berken.Exp1Berken.paddock.DailyReport
          Manager SowingRule
            RowSpacing = 250
            SowingDepth = 30
            SowingRate = 30
            CultivarName = Jade
            SowingDate = 01/30/2014 00:00:00
            script: same as in Validation.Thomas Dissertation.Experiment_1_Berken.Exp1Berken.paddock.SowingRule
          Manager HarvestRule: same as Validation.Thomas Dissertation.Experiment_1_Berken.Exp1Berken.paddock.HarvestRule
          Report HarvestReport: same as Validation.Thomas Dissertation.Experiment_1_Berken.Exp1Berken.paddock.HarvestReport
          Plant Mungbean
          Manager Irrigatefixeddates: same as Validation.Thomas Dissertation.Experiment_1_Berken.Exp1Berken.paddock.Irrigatefixeddates
          Operations
          Soil Black Vertosol-Bongeen (Dalby No027): ASCOrder=Vertosol; ASCSubOrder=Black; SoilType=Clay; Site=Dalby; NearestTown=Dalby, Q 4405; Region=Darling Downs and Granite Belt; State=Queensland; Country=Australia; ApsoilNumber=27; Latitude=-27.12; Longitude=151.305; LocationAccuracy=+/- 20m; YearOfSampling=0; DataSource=CSIRO Sustainable Ecosystems, Toowoomba
            Comments=Toowoomba - Wheat ll,xf copied from sorghum. Wheat kl is just default apsim kl values for wheat.
            Physical
              Thickness  BD    AirDry  LL15  DUL   SAT
              150        1.25  0.115   0.23  0.45  0.5
              150        1.31  0.184   0.23  0.43  0.48
              150        1.31  0.184   0.23  0.43  0.48
              150        1.23  0.23    0.23  0.46  0.51
              150        1.23  0.23    0.23  0.46  0.51
              150        1.24  0.23    0.23  0.45  0.5
              300        1.25  0.23    0.23  0.45  0.5
              300        1.26  0.23    0.23  0.44  0.49
              300        1.29  0.23    0.23  0.43  0.48
              BD, DUL source: Field measured and checked for sensibility
              AirDry, LL15 source: Estimated based on local knowledge
              SAT source: Calculated from measured, estimated or calculated BD
              SoilCrop MungbeanSoil: LL=[0.23, 0.24, 0.24, 0.29, 0.29, 0.395, 0.424, 0.44, 0.43]; KL=[0.06, 0.06, 0.06, 0.06, 0.06, 0.04, 0.04, 0.02, 0.01]; XF=[1, 1, 1, 1, 1, 1, 1, 1, 1]
            WaterBalance SoilWater: same as Validation.Yield_Gap.HRS.HRS.paddock.Brown Vertosol-Talgai-shallow phase (Hermitage No033).SoilWater
            Organic: FOMCNRatio=40
              Thickness  Carbon  SoilCNRatio  FBiom  FInert  FOM
              150        1.19    12           0.04   0.4     347.129
              150        1.01    12           0.02   0.6     270.344
              150        0.45    12           0.02   0.8     163.972
              150        0.3     12           0.02   1       99.4541
              150        0.3     12           0.02   1       99.454
              150        0.2     12           0.01   1       60.322
              300        0.2     12           0.01   1       60.322
              300        0.16    12           0.01   1       36.587
              300        0.17    12           0.01   1       22.191
            Chemical
              Thickness  NO3N     NH4N  PH
              150        26.4224  0     8.2
              150        15.2672  0     8.5
              150        10.8401  0     8.6
              150        10.7527  0     8.6
              150        1        0.2   7.4
              150        1        0.2   7.4
              300        1        0.2   5.3
              300        1        0.2   5.3
              300        1        0.2   5.3
              PH source: Estimated based on local knowledge
            InitialWater: PercentMethod=0; FractionFull=0.27; RelativeTo=LL15
            Sample Initial conditions: Thickness=[1800]; NH4=[1]; SWUnits=Volumetric; OCUnits=Total; PHUnits=Water
            Nutrient
            CERESSoilTemperature Temperature
      Simulation Kingaroy
        Clock: Start=2015-11-20; End=2017-06-05
        Summary summaryfile
        Weather: FileName=Yield Gap Study\2.ClimateFiles\Kingaroy_Airport_40922.met
        SoilArbitrator Soil Arbitrator
        Zone paddock: Area=1; Slope=0; AspectAngle=0; Altitude=50
          MicroClimate: a_interception=0; b_interception=1; c_interception=0; d_interception=0; SoilHeatFluxFraction=0; MinimumHeightDiffForNewLayer=0; NightInterceptionFraction=0; ReferenceHeight=2
          Irrigation
          Fertiliser
          SurfaceOrganicMatter: InitialResidueName=wheat; InitialResidueType=wheat; InitialResidueMass=0; InitialStandingFraction=0; InitialCPR=0; InitialCNR=80
          Report DailyReport: same as Validation.Thomas Dissertation.Experiment_1_Berken.Exp1Berken.paddock.DailyReport
          Manager SowingRule
            RowSpacing = 250
            SowingDepth = 30
            SowingRate = 30
            CultivarName = Jade
            SowingDate = 02/10/2016 00:00:00
            script: same as in Validation.Thomas Dissertation.Experiment_1_Berken.Exp1Berken.paddock.SowingRule
          Manager HarvestRule: same as Validation.Thomas Dissertation.Experiment_1_Berken.Exp1Berken.paddock.HarvestRule
          Report HarvestReport: same as Validation.Thomas Dissertation.Experiment_1_Berken.Exp1Berken.paddock.HarvestReport
          Plant Mungbean
          Manager Irrigatefixeddates: same as Validation.Thomas Dissertation.Experiment_1_Berken.Exp1Berken.paddock.Irrigatefixeddates
          Operations
          Manager InitialWaterReset: same as Validation.Yield_Gap.Emerald.EmeraldYieldGap.paddock.InitialWaterReset
          Soil Black Vertosol (Kumbia No162): ASCOrder=Vertosol; ASCSubOrder=Black; SoilType=Clay; Site=Hale Creek; NearestTown=Kumbia; Region=Wide Bay and Burnett; State=Queensland; Country=Australia; ApsoilNumber=162; Latitude=-26.688; Longitude=151.656; LocationAccuracy=+/- 10km; YearOfSampling=0; Comments=Wheat CLL estimated
            DataSource=CSIRO Tropical Crops and Pastures in collaboration with Agforce Queensland
            Physical
              Thickness  BD     AirDry  LL15  DUL    SAT
              150        1.032  0.155   0.31  0.53   0.58
              150        1.054  0.248   0.31  0.522  0.572
              150        1.026  0.31    0.31  0.533  0.583
              150        1.026  0.31    0.31  0.533  0.583
              150        1.05   0.31    0.31  0.524  0.574
              150        1.05   0.31    0.31  0.524  0.574
              300        1.142  0.31    0.31  0.489  0.539
              300        1.213  0.31    0.31  0.462  0.512
              300        1.249  0.31    0.31  0.449  0.499
              SoilCrop MungbeanSoil: LL=[0.31, 0.31, 0.31, 0.31, 0.447, 0.447, 0.463, 0.462, 0.449]; KL=[0.06, 0.06, 0.06, 0.06, 0.04, 0.04, 0.04, 0.02, 0.01]; XF=[1, 1, 1, 1, 1, 1, 1, 1, 1]
            WaterBalance SoilWater: same as Validation.Yield_Gap.HRS.HRS.paddock.Brown Vertosol-Talgai-shallow phase (Hermitage No033).SoilWater
            Organic: FOMCNRatio=40
              Thickness  Carbon  SoilCNRatio  FBiom  FInert  FOM
              150        2.236   12           0.04   0.4     347.129
              150        1.794   12           0.02   0.6     270.344
              150        1.118   12           0.02   0.8     163.972
              150        0.559   12           0.02   1       99.4541
              150        0.559   12           0.02   1       99.454
              150        0.338   12           0.01   1       60.322
              300        0.338   12           0.01   1       60.322
              300        0.221   12           0.01   1       36.587
              300        0.221   12           0.01   1       22.191
            Chemical
              Thickness  NO3N     NH4N  PH   CL     EC
              150        32.1649  0     6.9  37.5   0.1
              150        18.9753  0     7.3  52.1   0.1
              150        12.9955  0     7.9  232.5  0.4
              150        12.6984  0     8.1  501.3  0.5
              150        1        0.2   8.1  700.5  0.6
              150        1        0.2   8.1  700.5  0.6
              300        1        0.2   8.1  689.6  0.6
              300        1        0.2   8.1  559.6  0.5
              300        1        0.2   8.1  559.6  0.5
              PH source: Unknown source or quality of data
            InitialWater: PercentMethod=0; FractionFull=0.45; RelativeTo=LL15
            Sample Initial conditions: Thickness=[1800]; NH4=[1]; SWUnits=Volumetric; OCUnits=Total; PHUnits=Water
            Nutrient
            CERESSoilTemperature Temperature
          Manager AutoIrr
            Crop = [Mungbean]
            AutoIrrigationOn = True
            FASWThreshold = 0.9
            FASWDepth = 600
            weeks = 1
            afterSowing = 10
            script: same as in Validation.Thomas Dissertation.Experiment_1_Berken.Exp1Berken.paddock.AutoIrr
      Experiment Warra
        Factors
          Permutation
            Factor Sow
              CompositeFactor 2014
                Specifications:
                  [SowingRule].Script.SowingDate=2014-12-23
                  [Operations]
                Operations reset
                  2016-01-14  [InitialWaterReset].Script.ResetWater(0,14)
              CompositeFactor 2015
                Specifications:
                  [SowingRule].Script.SowingDate=2015-12-11
                  [Operations]
                Operations reset
                  2015-12-08  [InitialWaterReset].Script.ResetWater(0,11)
        Simulation Warra
          Clock: Start=2013-01-01; End=2016-05-15
          Summary summaryfile
          Weather: FileName=Yield Gap Study\2.ClimateFiles\EhlmaPark.xlsx; ExcelWorkSheetName=EhlmaPark
          SoilArbitrator Soil Arbitrator
          Zone paddock: Area=1; Slope=0; AspectAngle=0; Altitude=50
            MicroClimate: a_interception=0; b_interception=1; c_interception=0; d_interception=0; SoilHeatFluxFraction=0; MinimumHeightDiffForNewLayer=0; NightInterceptionFraction=0; ReferenceHeight=2
            Irrigation
            Fertiliser
            SurfaceOrganicMatter: InitialResidueName=wheat; InitialResidueType=wheat; InitialResidueMass=5000; InitialStandingFraction=0; InitialCPR=0; InitialCNR=80
            Report DailyReport: same as Validation.Thomas Dissertation.Experiment_1_Berken.Exp1Berken.paddock.DailyReport
            Manager SowingRule
              RowSpacing = 250
              SowingDepth = 30
              SowingRate = 30
              CultivarName = Jade
              SowingDate = 12/10/2013 00:00:00
```csharp
using APSIM.Shared.Utilities;
using Models.PMF;
using Models.Core;
using System;
        
        namespace Models
        {
           [Serializable] 
           [System.Xml.Serialization.XmlInclude(typeof(Model))]
            public class Script : Model
            {      
               [Link] Plant Mungbean;
               [Link] Clock Clock;

               [Description("Spacing (mm) between rows")]
               public double RowSpacing { get; set; }
               [Description("Depth (mm) Grains are planted")]
               public double SowingDepth { get; set; }
               [Description("Seeds sown (/m2)")]
               public double SowingRate { get; set; }
               [Description("Cultivar")]
               [Display(Type=DisplayType.CultivarName)]
               public string CultivarName { get; set; }
               [Description("Sowing Date")]
               public DateTime SowingDate { get; set; }

               [EventSubscribe("DoManagement")]
               private void OnDoManagement(object sender, EventArgs e)
               {
                if (Clock.Today.Date == SowingDate)
                	Sow();
           
                    
               }
               public void Sow()
               {Mungbean.Sow(population:SowingRate, cultivar:CultivarName, depth:SowingDepth, rowSpacing:RowSpacing, budNumber:1);
               }
            }
        }
```
            Manager HarvestRule: same as Validation.Thomas Dissertation.Experiment_1_Berken.Exp1Berken.paddock.HarvestRule
            Report HarvestReport: same as Validation.Thomas Dissertation.Experiment_1_Berken.Exp1Berken.paddock.HarvestReport
            Plant Mungbean
            Manager Irrigatefixeddates: same as Validation.Thomas Dissertation.Experiment_1_Berken.Exp1Berken.paddock.Irrigatefixeddates
            Operations
            Soil Grey Vertosol-Brigalow (Haystack No022): ASCOrder=Vertosol; ASCSubOrder=Grey; SoilType=Clay; Site=Haystack; NearestTown=Brigalow, Q 4412; Region=Darling Downs and Granite Belt; State=Queensland; Country=Australia; NaturalVegetation=Brigalow scrub; ApsoilNumber=22; Latitude=-26.836; Longitude=150.855; LocationAccuracy=+/- 20m; YearOfSampling=0; DataSource=CSIRO Sustainable Ecosystems, Toowoomba
              WaterBalance SoilWater: same as Validation.Yield_Gap.HRS.HRS.paddock.Brown Vertosol-Talgai-shallow phase (Hermitage No033).SoilWater
              Organic: FOMCNRatio=40
                Thickness  Carbon  SoilCNRatio  FBiom  FInert  FOM
                150        1.19    12           0.04   0.4     347.129
                150        1.01    12           0.02   0.6     270.344
                150        0.45    12           0.02   0.8     163.972
                150        0.3     12           0.02   1       99.4541
                150        0.2     12           0.01   1       60.322
                150        0.2     12           0.01   1       60.322
                300        0.16    12           0.01   1       36.587
                300        0.16    12           0.01   1       36.587
                300        0.17    12           0.01   1       22.191
              Chemical
                Thickness  NO3N     NH4N  PH
                150        23.4742  0     8.2
                150        14.0845  0     8.5
                150        9.32401  0     8.6
                150        9.38967  0     8.6
                150        1        0.2   7.4
                150        1        0.2   7.4
                300        1        0.2   5.3
                300        1        0.2   5.3
                300        1        0.2   5.3
                PH source: Estimated based on local knowledge
              Sample Initial conditions: Thickness=[1800]; NH4=[1]; SWUnits=Volumetric; OCUnits=Total; PHUnits=Water
              Physical
                Thickness  BD    AirDry  LL15  DUL   SAT
                150        1.42  0.095   0.19  0.39  0.44
                150        1.42  0.152   0.19  0.38  0.43
                150        1.43  0.19    0.19  0.38  0.43
                150        1.42  0.19    0.19  0.38  0.43
                150        1.4   0.19    0.19  0.39  0.44
                150        1.4   0.19    0.19  0.39  0.44
                300        1.45  0.19    0.19  0.37  0.42
                300        1.45  0.19    0.19  0.37  0.42
                300        1.47  0.19    0.19  0.36  0.41
                SoilCrop MungbeanSoil: LL=[0.19, 0.19, 0.19, 0.2, 0.22, 0.23, 0.23, 0.23, 0.23]; KL=[0.06, 0.06, 0.06, 0.04, 0.04, 0.04, 0.02, 0.02, 0.02]; XF=[1, 1, 1, 1, 1, 1, 1, 1, 1]
              Nutrient
              CERESSoilTemperature Temperature
              InitialWater: PercentMethod=0; FractionFull=1; RelativeTo=LL15
            Manager InitialWaterReset: same as Validation.Yield_Gap.Emerald.EmeraldYieldGap.paddock.InitialWaterReset
            Manager AutoIrr: same as Validation.Yield_Gap.Emerald.EmeraldYieldGap.paddock.AutoIrr
  Folder Sensibility
    Memo
      A factorial simulation of different sowing times by initial soil water level at three sites was run for 55 years, from 1963 to 2018, resetting the soil organic matter, N, and water on July 1 of each year. The baseline simulations for Gatton, Katherine, and Narrabri (-30.2 S, 147.6 E) were sourced from the calibration/testing dataset. Jade-AU was sown at early (September 15), mid (December 15), and late (February 15) in the growing season with initial soil water profile at 20%, 60%, and 100% of full representing a low, mid, high water status, respectively. The site descriptions of the three sites can be categorised according to their soils and climate: Gatton is a vertisol (195mm plant available water when the profile is full), with a temperate climate where the hot temperatures (20-30°C) ideal for mungbeans occur during a short window (early sowing results in potential heat stress at flowering and grain fill, late sowing results in low temperatures hindering grain fill) and so is termed in this study as “Short Season Temperate Vertisol.” Narrabri is also a vertisol (321mm plant available water when the profile is full), with a long hot (20-30°C) and dry growing season for mungbeans and so, is termed “Long Season Arid Vertisol.” Katherine soil is an alfisol (195mm plant available water when the profile is full), with very hot (30-35°C) conditions where average monthly rainfall only exceeded 40mm starting in November, suggesting that mungbeans need to be planted later there, and so, is termed “Late Season Arid Alfisol.” Probability analyses were then run on the resulting grain yields to test if the model outputs changed in a sensible way relative to the environment and growing conditions and in their response to more extreme environments. We expect the model to output a greater sensitivity to sowing date irrespective of water conditions in a “Short Season Temperate Vertisol,” to water conditions irrespective of sowing date in a “Long Season Arid Vertisol,” and to not be able to grow mungbeans at all at the early sowing date and when there is little initial water in the “Late Season Arid Alfisol.”
    Experiment Gatton
      Factors
        Permutation
          Factor Water
            CompositeFactor Low: Specifications=[Soil].InitialWater.FractionFull=0.2
            CompositeFactor Medium: Specifications=[Soil].InitialWater.FractionFull=0.6
            CompositeFactor High: Specifications=[Soil].InitialWater.FractionFull=1
          Factor Sow
            CompositeFactor Early: Specifications=[SowingRule].Script.SowDate=15-sep
            CompositeFactor Mid: Specifications=[SowingRule].Script.SowDate=15-dec
            CompositeFactor Late: Specifications=[SowingRule].Script.SowDate=15-feb
      Simulation Gatton Scenario
        Summary summaryfile
        SoilArbitrator Soil Arbitrator
        Clock: Start=1963-09-01; End=2018-09-01
        Weather: FileName=GattonWeather.xlsx; ExcelWorkSheetName=Kylie
        Zone paddock: Area=1; Slope=0; AspectAngle=0; Altitude=50
          Fertiliser
          SurfaceOrganicMatter: InitialResidueName=wheat; InitialResidueType=wheat; InitialResidueMass=500; InitialStandingFraction=0; InitialCPR=0; InitialCNR=40
          Manager HarvestRule: same as Validation.Thomas Dissertation.Experiment_1_Berken.Exp1Berken.paddock.HarvestRule
          Report HarvestReport: same as Validation.Thomas Dissertation.Experiment_1_Berken.Exp1Berken.paddock.HarvestReport
          Plant Mungbean
          MicroClimate: a_interception=0; b_interception=1; c_interception=0; d_interception=0; SoilHeatFluxFraction=0.4; MinimumHeightDiffForNewLayer=0; NightInterceptionFraction=0.5; ReferenceHeight=2
          Soil: SoilType=APS6Soil; LocalName=APS6Site; Site=APS6Site; NearestTown=Unknown; Region=Lawes; NaturalVegetation=Unknown; Latitude=0; Longitude=0
            WaterBalance SoilWater: same as Validation.TOS.TOSyear2Opal.TOSyear2Opal.paddock.Soil.SoilWater
            Organic: same as Validation.TOS.TOSyear2Opal.TOSyear2Opal.paddock.Soil.Organic
            Chemical: same as Validation.TOS.TOSyear2Opal.TOSyear2Opal.paddock.Soil.Chemical
            CERESSoilTemperature Temperature
            Nutrient
            Physical: same as Validation.TOS.TOSyear3.TOSyear3.paddock.Soil.Physical
            InitialWater: PercentMethod=0; FractionFull=0.6
          Manager SowingRule
            SowDate = 24-Jul
            Crop = [Mungbean]
            CultivarName = Jade
            SowingDepth = 50
            RowSpacing = 500
            Population = 30
```csharp
using APSIM.Shared.Utilities;
using Models.Utilities;
using Models.Soils;
using Models.PMF;
using Models.Core;
using System;

namespace Models
{
    [Serializable]
    public class Script : Model
    {
        [Link] Clock Clock;
        [Link] Fertiliser Fertiliser;
        [Link] Summary Summary;
        [Link] Soil Soil;
        
        [Description("Crop")]
        public IPlant Crop { get; set; }

        [Description("Sowing date (d-mmm)")]
        public string SowDate { get; set; }

        [Display(Type = DisplayType.CultivarName)]
        [Description("Cultivar to be sown")]
        public string CultivarName { get; set; }

        [Description("Sowing depth (mm)")]
        public double SowingDepth { get; set; }

        [Description("Row spacing (mm)")]
        public double RowSpacing { get; set; }

        [Description("Plant population (/m2)")]
        public double Population { get; set; }

        [EventSubscribe("DoManagement")]
        private void OnDoManagement(object sender, EventArgs e)
        {
            if (DateUtilities.WithinDates(SowDate, Clock.Today, SowDate))
            {
                Crop.Sow(population: Population, cultivar: CultivarName, depth: SowingDepth, rowSpacing: RowSpacing);    
            }
        }
    }
}
```
          Manager Reset on sowing
            ResetWater = Yes
            ResetNutrients = Yes
            ResetSOM = Yes
```csharp
using Models.Soils.Nutrients;
using APSIM.Shared.Utilities;
using Models.Surface;
using Models.Utilities;
using Models.Soils.Nutrients;
using Models.Soils;
using Models.PMF;
using Models.Core;
using System;
using Models.Interfaces;

namespace Models
{
    [Serializable]
    public class Script : Model
    {
        [Link] private Plant Wheat;
        [Link] private ISoilWater SoilWater;
        [Link] private Nutrient nutrient;
        [Link] private SurfaceOrganicMatter SOM;
        [Link] private Summary Summary;

        [Description("Reset Water? (Yes or No)")]
        public string ResetWater {get;set;}

        [Description("Reset Soil Nutrients? (Yes or No)")]
        public string ResetNutrients {get;set;}

        [Description("Reset Surface Organic Matter? (Yes or No)")]
        public string ResetSOM {get;set;}

        [EventSubscribe("Sowing")]
        private void OnSowing(object sender, EventArgs e)
        {
            if (ResetWater == "Yes")
            {
                Summary.WriteMessage(this, "Reset Water", MessageType.Diagnostic);
                SoilWater.Reset();
            }
            if (ResetNutrients == "Yes")
            {
                Summary.WriteMessage(this, "Reset Nutrients", MessageType.Diagnostic);
                nutrient.Reset();
            }
            if (ResetSOM == "Yes")
            {
                Summary.WriteMessage(this, "Reset Surface OM", MessageType.Diagnostic);
                SOM.Reset();
            }
        }
    }
}
```
    Experiment Katherine
      Factors: same as Sensibility.Gatton.Factors
      Simulation Katherine Scenario
        Summary summaryfile
        SoilArbitrator Soil Arbitrator
        Clock: Start=1963-09-01; End=2018-09-01
        Weather: FileName=KatherineWeather.xlsx; ExcelWorkSheetName=Kylie
        Zone paddock: Area=1; Slope=0; AspectAngle=0; Altitude=50
          Fertiliser
          SurfaceOrganicMatter: InitialResidueName=wheat; InitialResidueType=wheat; InitialResidueMass=500; InitialStandingFraction=0; InitialCPR=0; InitialCNR=40
          Manager HarvestRule: same as Validation.Thomas Dissertation.Experiment_1_Berken.Exp1Berken.paddock.HarvestRule
          Report HarvestReport: same as Validation.Thomas Dissertation.Experiment_1_Berken.Exp1Berken.paddock.HarvestReport
          Plant Mungbean
          MicroClimate: a_interception=0; b_interception=1; c_interception=0; d_interception=0; SoilHeatFluxFraction=0.4; MinimumHeightDiffForNewLayer=0; NightInterceptionFraction=0.5; ReferenceHeight=2
          Manager SowingRule: same as Sensibility.Gatton.Gatton Scenario.paddock.SowingRule
          Manager Reset on sowing: same as Sensibility.Gatton.Gatton Scenario.paddock.Reset on sowing
          Soil: Latitude=0; Longitude=0
            Physical: same as Validation.Muchow.KatherineJan28WaterIrrigated.paddock.Soil.Physical
            WaterBalance SoilWater: same as Validation.Muchow.KatherineJan28WaterIrrigated.paddock.Soil.SoilWater
            Organic: same as Validation.Muchow.KatherineJan28WaterIrrigated.paddock.Soil.Organic
            Chemical: same as Validation.Muchow.KatherineJan28WaterIrrigated.paddock.Soil.Chemical
            Sample InitialSW: Thickness=[150, 150, 150, 150, 150, 150, 300, 300, 300]; SWUnits=Volumetric; OCUnits=Total; PHUnits=Water
              SW=[0.304, 0.31, 0.31, 0.324, 0.328, 0.328, 0.325, 0.337, 0.35]
            CERESSoilTemperature Temperature
            Nutrient
            InitialWater: PercentMethod=0; FractionFull=0.6
    Experiment Narrabri
      Factors: same as Sensibility.Gatton.Factors
      Simulation Narrabri Scenario
        Summary summaryfile
        SoilArbitrator Soil Arbitrator
        Clock: Start=1963-09-01; End=2018-09-01
        Weather: FileName=NarrabriWeather.xlsx; ExcelWorkSheetName=Kylie
        Zone paddock: Area=1; Slope=0; AspectAngle=0; Altitude=50
          Fertiliser
          SurfaceOrganicMatter: InitialResidueName=wheat; InitialResidueType=wheat; InitialResidueMass=500; InitialStandingFraction=0; InitialCPR=0; InitialCNR=40
          Manager HarvestRule: same as Validation.Thomas Dissertation.Experiment_1_Berken.Exp1Berken.paddock.HarvestRule
          Report HarvestReport: same as Validation.Thomas Dissertation.Experiment_1_Berken.Exp1Berken.paddock.HarvestReport
          Plant Mungbean
          MicroClimate: a_interception=0; b_interception=1; c_interception=0; d_interception=0; SoilHeatFluxFraction=0.4; MinimumHeightDiffForNewLayer=0; NightInterceptionFraction=0.5; ReferenceHeight=2
          Manager SowingRule: same as Sensibility.Gatton.Gatton Scenario.paddock.SowingRule
          Manager Reset on sowing: same as Sensibility.Gatton.Gatton Scenario.paddock.Reset on sowing
          Soil: Latitude=0; Longitude=0
            WaterBalance SoilWater: same as Validation.Mungbean_DAF.ACRI.ACRI.paddock.soil.SoilWater
            CERESSoilTemperature Temperature
            Organic: same as Validation.Mungbean_DAF.ACRI.ACRI.paddock.soil.Organic
            Chemical: same as Validation.Mungbean_DAF.ACRI.ACRI.paddock.soil.Chemical
            Nutrient
            Physical: same as Validation.Mungbean_DAF.ACRI.ACRI.paddock.soil.Physical
            Sample Initial Water: same as Validation.Mungbean_DAF.ACRI.ACRI.paddock.soil.Initial Water
            InitialWater: PercentMethod=0; FractionFull=0.6
  Folder Examples
    Memo
      Examples for users on how to model using the mungbean model. "Example Grazing" looks at grazing mungbeans by large merino at different stocking rates. "Example Crop" looks at irrigated vs. rainfed mungbeans.
    Experiment Example Grazing
      Factors
        Permutation
          Factor Stocking Rate: Specification=[GrazeForageCrop].Script.StockingRate=0,50,100
      Simulation Example Grazing
        Memo
          Simple example simulation based in Gatton with the cultivar Jade.
        Summary summaryfile
        SoilArbitrator Soil Arbitrator
        Clock: Start=2016-10-01; End=2018-10-01
        Weather: FileName=GattonWeather.xlsx; ExcelWorkSheetName=Kylie
        Forages
          Parameters:
            Name                          IsLive  DigestibilityString  FractionConsumable  MinimumAmount  UseDigestibilityFromModel
            SurfaceOrganicMatter.Residue  true    0.7                  0                   100            false
            SurfaceOrganicMatter.Residue  false   0.3                  0                   0              false
            Mungbean.Leaf                 true    0.7                  1                   100            false
            Mungbean.Leaf                 false   0.3                  1                   0              false
            Mungbean.Grain                true    0.7                  1                   100            false
            Mungbean.Grain                false   0.3                  1                   0              false
            Mungbean.Root                 true    0                    0                   0              false
            Mungbean.Root                 false   0                    0                   0              false
            Mungbean.Nodule               true    0.7                  1                   100            false
            Mungbean.Nodule               false   0.3                  1                   0              false
            Mungbean.Shell                true    0.7                  1                   100            false
            Mungbean.Shell                false   0.3                  1                   0              false
            Mungbean.Stem                 true    0.7                  1                   100            false
            Mungbean.Stem                 false   0.3                  1                   0              false
        Stock: RandSeed=9999
        Manager GrazeForageCrop
          Genotype = Large Merino
          Sex = Male
          Age = 12
          Weight = 100
          Pregnant = 0
          Lactating = 0
          YoungNumber = 0
          YoungWt = 0
          StockingRate = 100
          CurrentLocation = Away
          PreGrazingDM = 1000
          MinGrazingDays = 7
          PostGrazingDM = 500
          DoNoGrazingWindow = False
          NoGrazeStart = 1-Nov
          NoGrazeEnd = 31-Jan
          SupplementName = Silage
          SupplementFirst = False
          SupplementEveryDay = 0
          SupplementOnPastureMass = 0
          TriggerPastureMass = 100000
```csharp
using Models.PMF.Interfaces;
using System.Diagnostics;
using Models.AgPasture;
using System.Linq;
using System.Collections.Generic;
using System.Collections;
using Models.Soils;
using Models.PMF;
using System.Xml.Serialization;
using APSIM.Shared.Utilities;
using Models.GrazPlan;
using Models.Utilities;
using Models.Core;
using Models;
using System;

namespace Models
{

    [Serializable]
    public class Script : Model
    {
        [Link] Clock clock;
        [Link] Stock stock;
        [Link] Supplement supplement;
        [Link] List<Zone> paddocks;
        [Link] ISummary summary;
        [Link] Simulation farm;
        [Link] List<IPlantDamage> forages = null;

        private int CurrentGroupNum = 1;    // animal group number
        private int CurrentLocationNum { get; set; }
        private string CurrentZone;

        [Separator("Stock type info, the same type of stock are brought onto the paddock at each grazing")]

        [Description("Stock: genotype (e.g. Small Merino, Angus, Friesian):")] 
        [Display(Values="GetGenotypes")]
        public string Genotype { get; set; }

        [Description("Stock: sex (Female, Male, Castrate):")] 
        public ReproductiveType Sex { get; set; }

        [Description("Stock: age (months):")] 
        public double Age { get; set; }

        [Description("Stock: weight (kg liveweight /head):")] 
        public double Weight { get; set; }

        [Description("Stock: fertility status (0 if non-pregnant or days since conception):")] 
        public int Pregnant { get; set; }

        [Description("Stock: lactation status (0 if non-lactating or days since parturition):")]
        public int Lactating { get; set; }

        [Description("Stock: number of unweaned young:")]
        public int YoungNumber { get; set; }

        [Description("Stock: weight of unweaned young:")] 
        public double YoungWt { get; set; }

        [Separator("Grazing event information")]

        [Description("Paddock stocking rate (head/ha): ")] 
        public double StockingRate { get; set; }

        [Description("Initial location of the stock (give either the paddock name or 'Away'): ")] 
        public string CurrentLocation { get; set; }

        [Description("Standing biomass at which to bring the stock into the simulation (kg DM/ha): ")] 
        public double PreGrazingDM { get; set; }

        [Description("Require > X days of grazable forage before moving stock: ")] 
        [Tooltip("To prevent stock being moved too often, require that there be a minimum number of grazing-days of forage available before moving the stock on. The forage needed is very simply set as 3% of the stock liveweight")] 
        public int MinGrazingDays { get; set; }

        [Description("Standing biomass at which to exit  stock from the simulation (kg DM/ha): ")] 
        public double PostGrazingDM { get; set; }

        [Description("Implement a no-grazing window? (tick for yes): ")] 
        public bool DoNoGrazingWindow { get; set; }

        [Description("Start of the no-grazing window (dd-MMM)")] 
        public string NoGrazeStart { get; set; }

        [Description("End of the no-grazing window (dd-MMM)")] 
        public string NoGrazeEnd { get; set; }

        [Separator("Supplementary feeding")]

        [Description("Name of the supplement to feed: ")] 
        public string SupplementName { get; set; }

        [Description("Feed the supplement first (i.e. before the new forage is available to the stock)?: ")] 
        public bool SupplementFirst { get; set; }

        [Description("Amount of supplementary feeding offered every day (kg DM /head /day): ")] 
        public double SupplementEveryDay { get; set; }

        [Description("Additional amount of supplement offered when available biomass is low (kg DM /head /day): ")] 
        public double SupplementOnPastureMass { get; set; }

        [Description("Trigger biomass for above rule (kg DM /ha): ")] 
        public double TriggerPastureMass { get; set; }

        public int NumStock { get; set; }
        public bool GrazingSeasonIsOpen { get; set; } // number of stock on the whole farm
        public double HarvestableBiomass { get; set; }
        public double HarvestableBiomassYesterday { get; set; }

        // Return a list of genotypes to the properties tab.
        public string[] GetGenotypes()
        {
            if (stock != null)
                return stock.Genotypes.Names.ToArray();
            return null;
        }

        [EventSubscribe("StartOfSimulation")]
        private void OnStartOfSimulation(object sender, EventArgs e)
        {
            CurrentZone = CurrentLocation;

            //Debugger.Break();

            summary.WriteMessage(this, "Initialising the paddock information", MessageType.Diagnostic);

            NumStock = (int)(Math.Round(StockingRate * farm.Area, 0));

            if (CurrentZone.ToLower() != "away")
            {
                BuyStock();
                stock.Move(CurrentZone);
                summary.WriteMessage(this, " The Stock have been moved to " + CurrentZone, MessageType.Diagnostic);
            }

            summary.WriteMessage(this, "     The number of animals has been rounded to " + NumStock + " from " + (StockingRate * farm.Area), MessageType.Diagnostic);
            summary.WriteMessage(this, "     The animals will begin in " + CurrentZone + " which is paddock number " + CurrentLocationNum + " in the simulation", MessageType.Diagnostic);
            summary.WriteMessage(this, "     The area of the whole farm is " + farm.Area + " ha", MessageType.Diagnostic);

        }

        [EventSubscribe("DoManagement")]
        private void OnDoManagement(object sender, EventArgs e)
        {
            GrazingSeasonIsOpen = true;
            if (DoNoGrazingWindow)
                GrazingSeasonIsOpen = !DateUtilities.WithinDates(NoGrazeStart, clock.Today, NoGrazeEnd);

            bool sellSomeStock = false;
            if (!GrazingSeasonIsOpen)
                sellSomeStock = true;

            // Calculate forage mass in the paddock
            HarvestableBiomass = 0.0;
            foreach (var forage in forages)
                foreach (var forageOrgan in forage.Organs)
                    if (forageOrgan.IsAboveGround)
                        HarvestableBiomass += forageOrgan.Live.Wt + forageOrgan.Dead.Wt;
            
            HarvestableBiomass *= 10;  // Convert to kg/ha

            if (clock.Today == clock.StartDate)
                HarvestableBiomassYesterday = HarvestableBiomass;

            double deltaHarvestableBiomass = Math.Max(0.0, HarvestableBiomass - HarvestableBiomassYesterday);

            if (HarvestableBiomass <= PostGrazingDM)
                sellSomeStock = true;

            if (CurrentZone == "Away")
                sellSomeStock = false;

            // The 0.03 is the propostion of body mass that the stock might eat
            double minFodder = Math.Max(PreGrazingDM, Math.Max(0.0, (0.03 * MinGrazingDays * NumStock * Weight) - (deltaHarvestableBiomass * MinGrazingDays))); 
            HarvestableBiomassYesterday = HarvestableBiomass;

            if (CurrentZone == "Away" && (HarvestableBiomass >= PreGrazingDM) && HarvestableBiomass >= (PostGrazingDM + minFodder) && GrazingSeasonIsOpen)
            {
                CurrentZone = paddocks[0].Name;
                CurrentLocationNum = paddocks[0].Index;
                BuyStock();
                stock.Move(CurrentZone);
                summary.WriteMessage(this, "     Buying stock ", MessageType.Diagnostic);
            }

            if (sellSomeStock)
            {
                CurrentZone = "Away";
                CurrentLocationNum = -1;
                SellStock();
                summary.WriteMessage(this, "     Selling stock ", MessageType.Diagnostic);
            }

            if (CurrentZone != "Away")
            {
                if (SupplementEveryDay > 0)
                {
                    double silageOnHand = supplement.Stores[2 - 1].Stored;
                    if (silageOnHand < SupplementEveryDay * stock.NumberAll)
                    {
                        supplement.Buy(SupplementEveryDay * 30.0 * stock.NumberAll, SupplementName);  // i.e. 1 months worth
                        summary.WriteMessage(this, "SupplementEveryDay: Buying " + SupplementName + " of total amount : " + (SupplementEveryDay * 90 * stock.NumberAll) + " kg DM", MessageType.Diagnostic);
                    }
                    supplement.Feed(SupplementName, SupplementEveryDay * stock.NumberAll, CurrentZone, SupplementFirst);
                }

                if (SupplementOnPastureMass > 0 && HarvestableBiomass <= TriggerPastureMass)
                {
                    double silageOnHand = supplement.Stores[2 - 1].Stored;
                    if (silageOnHand < SupplementOnPastureMass * stock.NumberAll)
                    {
                        supplement.Buy(SupplementOnPastureMass * 30.0 * stock.NumberAll, SupplementName);  // i.e. 1 months worth
                        summary.WriteMessage(this, "SupplementOnBiomass: Buying " + SupplementName + " of total amount : " + (SupplementOnPastureMass * 90 * stock.NumberAll) + " kg DM", MessageType.Diagnostic);
                    }
                    supplement.Feed(SupplementName, SupplementOnPastureMass * stock.NumberAll, CurrentZone, SupplementFirst);
                }
            }
        }


        public void BuyStock()
        {
            CurrentGroupNum = stock.NoGroups + 1;
            StockBuy purchase = new StockBuy();
            purchase.Genotype = Genotype;
            purchase.Number = NumStock;
            purchase.Sex = Sex;
            purchase.Age = Age;       // age in months
            purchase.Weight = Weight;  // live weight in kg
            purchase.UseTag = CurrentGroupNum + 1;
            purchase.MatedTo = purchase.Genotype;
            purchase.Pregnant = Pregnant;  // days pregnant, 0 = non pregnant, 1 = pregnant
            purchase.Lactating = Lactating;  // 0 for dry, 1 for lactating
            purchase.NumYoung = YoungNumber;
            purchase.YoungWt = YoungWt;

            stock.Buy(purchase);
        }

        public void SellStock()
        {
            int NumGroups = stock.NoGroups;

            NumGroups = stock.NoGroups;
            for (int gg = 1; gg <= NumGroups; gg++)
            {
                stock.Sell(stock.Number[gg - 1]);
            }
        }
    }
}
```
        Supplement: SpoilageTime=0
          Stores:
            Name    Stored  IsRoughage  DMContent  DMD   MEContent  CPConc  ProtDg  PConc   SConc   EEConc  ADIP2CP  AshAlk  MaxPassage
            fodder  0       true        0.85       0     0          0       0       0       0       0       0        0       0
            silage  0       true        1          0.75  12         0.18    0.8     0.0032  0.0024  0.02    0.06     0.6     0
        Zone paddock: Area=1; Slope=0; AspectAngle=0; Altitude=50
          Irrigation
          Fertiliser
          SurfaceOrganicMatter: InitialResidueName=wheat; InitialResidueType=wheat; InitialResidueMass=500; InitialStandingFraction=0; InitialCPR=0; InitialCNR=40
          Report DailyReport: same as Validation.Thomas Dissertation.Experiment_1_Berken.Exp1Berken.paddock.DailyReport
          Manager HarvestRule: same as Validation.Thomas Dissertation.Experiment_1_Berken.Exp1Berken.paddock.HarvestRule
          Report HarvestReport: same as Validation.Thomas Dissertation.Experiment_1_Berken.Exp1Berken.paddock.HarvestReport
          Plant Mungbean
          Operations
          MicroClimate: a_interception=0; b_interception=1; c_interception=0; d_interception=0; SoilHeatFluxFraction=0.4; MinimumHeightDiffForNewLayer=0; NightInterceptionFraction=0.5; ReferenceHeight=2
          Soil: same as Validation.TOS.TOSyear2Opal.TOSyear2Opal.paddock.Soil
          Manager AutoIrr: same as Validation.Muchow.Katherine1989SowFeb07.paddock.Automatic irrigation based on water deficit
          Manager Sow on a fixed date
            Crop = [Mungbean]
            SowDate = 24-Oct
            CultivarName = Jade
            SowingDepth = 50
            RowSpacing = 250
            Population = 30
            script: same as in Sensibility.Gatton.Gatton Scenario.paddock.SowingRule
    Experiment Example Crop
      Factors
        Permutation
          Factor Water
            CompositeFactor Irr: Specifications=[AutoIrr].Script.AutoIrrigationOn=True
            CompositeFactor RF: Specifications=[AutoIrr].Script.AutoIrrigationOn=False
      Simulation Example Crop
        Memo
          Simple example simulation based in Gatton with the cultivar Jade.
        Summary summaryfile
        SoilArbitrator Soil Arbitrator
        Clock: Start=2016-10-01; End=2018-10-01
        Weather: FileName=GattonWeather.xlsx; ExcelWorkSheetName=Kylie
        Forages: same as Examples.Example Grazing.Example Grazing.Forages
        Stock: RandSeed=9999
        Manager GrazeForageCrop: same as Examples.Example Grazing.Example Grazing.GrazeForageCrop
        Supplement: same as Examples.Example Grazing.Example Grazing.Supplement
        Zone paddock: Area=1; Slope=0; AspectAngle=0; Altitude=50
          Irrigation
          Fertiliser
          SurfaceOrganicMatter: InitialResidueName=wheat; InitialResidueType=wheat; InitialResidueMass=500; InitialStandingFraction=0; InitialCPR=0; InitialCNR=40
          Report DailyReport: same as Validation.Thomas Dissertation.Experiment_1_Berken.Exp1Berken.paddock.DailyReport
          Manager HarvestRule: same as Validation.Thomas Dissertation.Experiment_1_Berken.Exp1Berken.paddock.HarvestRule
          Report HarvestReport: same as Validation.Thomas Dissertation.Experiment_1_Berken.Exp1Berken.paddock.HarvestReport
          Plant Mungbean
          Operations
          MicroClimate: a_interception=0; b_interception=1; c_interception=0; d_interception=0; SoilHeatFluxFraction=0.4; MinimumHeightDiffForNewLayer=0; NightInterceptionFraction=0.5; ReferenceHeight=2
          Soil: same as Validation.TOS.TOSyear2Opal.TOSyear2Opal.paddock.Soil
          Manager AutoIrr: same as Validation.Thomas Dissertation.Experiment_1_Emerald.Exp1Emerald.paddock.AutoIrr
          Manager Sow on a fixed date: same as Examples.Example Grazing.Example Grazing.paddock.Sow on a fixed date
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