Simulations: Version=46
  Memo TitlePage
    # The APSIM Oats Model

    _Allan Peake, Hamish Brown, Rob Zyskowski, Edmar I. Teixeira, Neil Huth_
  Replacements
    Report DailyReport: EventNames=[Clock].DoReport
      VariableNames:
        [Clock].Today
        [Oats].Phenology.CurrentStageName
        [Weather].MeanT
        [Soil].SoilWater.SW
        [Soil].SoilWater.SWmm
        sum([Soil].SoilWater.SWmm) as ProfileWater
        [Oats].AboveGround.N
        [Oats].AboveGround.Wt
        [Oats].AboveGroundLive.N
        [Oats].AboveGroundLive.N*10 as UptakeNKgHA
        [Oats].AboveGroundLive.Wt
        [Oats].AboveGroundDead.N
        [Oats].AboveGroundDead.Wt
        [Oats].Arbitrator.DMDemand
        [Oats].Arbitrator.DM.TotalFixationSupply
        [Oats].Ear.N
        [Oats].Ear.Nconc
        [Oats].Ear.Wt
        [Oats].Grain.N
        [Oats].Grain.NConc
        [Oats].Grain.Number
        [Oats].Grain.Size
        [Oats].Grain.Wt
        [Oats].Grain.Live.Wt
        [Oats].Leaf.AppearedCohortNo
        [Oats].Leaf.CoverDead
        [Oats].Leaf.CoverGreen
        [Oats].Leaf.CoverTotal
        [Oats].Leaf.Dead.N
        [Oats].Leaf.Dead.NConc
        [Oats].Leaf.Dead.Wt
        [Oats].Leaf.DeadCohortNo
        [Oats].Leaf.GreenCohortNo
        [Oats].Leaf.SenescingCohortNo
        [Oats].Leaf.ExpandedCohortNo
        [Oats].Leaf.Fn
        [Oats].Leaf.Fw
        [Oats].Leaf.Height
        [Oats].Leaf.InitialisedCohortNo
        [Oats].Leaf.LAI
        [Oats].Leaf.Live.N
        [Oats].Leaf.Live.NConc
        [Oats].Leaf.Live.Wt
        [Oats].Leaf.SpecificArea
        [Oats].Leaf.Transpiration
        [Oats].Phenology.CurrentPhaseName
        [Oats].Phenology.CurrentStageName
        [Oats].Phenology.DailyVernalisation.Value()
        [Oats].Phenology.MeanTemp.Value()
        [Oats].Phenology.Photoperiod.Value()
        [Oats].Phenology.Stage
        [Oats].Phenology.ThermalTime.Value()
        [Oats].Phenology.ThermalTime.Value()
        [Oats].Phenology.Vrn1.Value()
        [Oats].Phenology.Vrn2.Value()
        [Oats].Phenology.Vrn4.Value()
        [Oats].Phenology.Zadok.Stage
        [Oats].Root.Depth
        [Oats].Root.N
        [Oats].Root.Wt
        [Oats].Root.Nconc
        [Oats].Root.WaterUptake
        [Oats].Panicle.N
        [Oats].Panicle.NConc
        [Oats].Panicle.Wt
        [Oats].Panicle.Live.StorageWt
        [Oats].Stem.N
        [Oats].Stem.NConc
        [Oats].Stem.Wt
        [Oats].Stem.PercentWSC
        [Oats].Stem.Live.StorageWt
        [Oats].StemPlusPanicle.Wt
        [Oats].StemPlusPanicle.N
        [Oats].SowingData.Cultivar
        [Oats].Structure.HaunStage.Value()TerminalSpikelet.Value()
        [Oats].Structure.HaunStage.Value()
        [Oats].Structure.Height
        [Oats].Structure.LeafTipsAppeared
        [Oats].Structure.FinalLeafNumber.Value()
        [Oats].Structure.FinalLeafNumber.ValueToHold.PhotoPLeaves.Value()
        [Oats].Structure.MainStemPopn
        [Oats].Structure.MeanTillerGrowthRate.Value()
        [Oats].Structure.TotalStemPopn
        [Oats].Total.N
        [Oats].Total.Wt
        [SurfaceOrganicMatter].Wt
        ([Oats].Leaf.Transpiration + [Soil].SoilWater.Es + [MicroClimate].interception) as ET
        sum([Soil].SoilNitrogen.NO3) as TotalSoilNitrogen
        [Oats].Phenology.FlagLeafDAS
        [Oats].Phenology.FloweringDAS
        [Oats].Phenology.MaturityDAS
        [Oats].Phenology.PhotoPeriod
        [Oats].Phenology.PhotoPeriodDeltaFunction
        [Oats].Phenology.Stage
        [Oats].Phenology.SoilTemperatureFunction.Value()
        [Clock].Today.Year
        [Oats].Leaf.Senesced.Wt
        [Oats].Leaf.SenescingCohortNo
    Report HarvestReport: EventNames=[Oats].Harvesting
      VariableNames:
        [Oats].Structure.LeafTipsAppeared
        [Oats].Structure.FinalLeafNumber
        [Oats].Phenology.FlagLeafDAS
        [Oats].Phenology.FloweringDAS
        [Oats].Phenology.MaturityDAS
        [Oats].Phenology.CurrentPhaseName
        [Oats].Phenology.CurrentStageName
        [Oats].AboveGroundLive.Wt
        [Oats].AboveGroundLive.Wt
        [Oats].Grain.Wt
    Manager Harvesting
```csharp
using System;
using Models.Core;
using System.Collections.Generic;
using System.Text;
using Models.Soils;
using Models.PMF;
using Models;
using System.Xml.Serialization;
using APSIM.Shared.Utilities;

namespace Models
{
    [Serializable] 
    public class Script : Model
    {
        [Link] Plant Oats;
        [EventSubscribe("DoManagement")]
        private void OnDoManagement(object sender, EventArgs e)
        {
            if (Oats.Phenology.CurrentPhaseName == "Maturing")
            {
                Oats.Harvest();
                Oats.EndCrop();
            }
        }
    }
}
```
  DataStore
    ExcelInput Observed: FileName=Observed.xlsx; SheetNames=[Observed, MaxLeafSize]
    PredictedObserved DailyPO: PredictedTableName=DailyReport; ObservedTableName=Observed; FieldNameUsedForMatch=Clock.Today
    PredictedObserved HarvestPO: PredictedTableName=HarvestReport; ObservedTableName=Observed; FieldNameUsedForMatch=Oats.Phenology.CurrentStageName
  Folder Validation
    Memo
      A test dataset has been developed to test the APSIM Oats model for a range of environmental (soil and climate) conditions, management options (sowing dates, populations, nitrogen rates, row spacing, irrigation), genetic backgrounds (different regions, cultivar types) and for special considerations such as defoliation (or simulated grazing).  These tests have been groups into various geographical regions to allow the user to evaluate the suitability of the model for their particular region of interest.  Graphs of model performance are provided for yield, biomass production, canopy development, phenological development, water and nitrogen uptake, and grain yield components.
    Folder Combined Results
      Memo Combined Results
        Simulation results for the combined datasets from the various countries are shown in the following graphs.  The model is able to adequately capture the influence of growing conditions (soil, climate) and management (population, Nitrogen, irrigation, sowing date).
    Folder New Zealand
      Experiment RS_Oats_9899
        Memo Experiment Description
          Data from:

          [martin2001effect]

          	The response of oats (Avena sativa L.) to timing and intensity of drought was determined in a mobile
          rainshelter, which excluded rainfall during crop growth. Ten irrigation treatments subjected the crops to
          drought of varying duration at different stages during plant growth; the crops were otherwise fully
          irrigated. Oat grain yield generally increased linearly with cumulative water use, and decreased linearly as
          the maximum potential soil moisture deficit experienced during crop growth increased, regardless of the
          timing of drought. The exception to this was the no drought (fully irrigated) treatment, where lodging
          reduced panicle number and grain weight compared to early drought treatments. Drought affected yield
          mainly by reducing panicle and grain number, effects on grain weight were small. . Relieving early drought
          through late irrigation led to more late tillers, more panicles, heavier grains, and later maturity. Full and
          late drought increased screenings.
        Factors
          Factor _Irrig
            Factor Nill
              Specifications:
                [Irrig]
                [Water]
                [Initial water]
              Operations Irrig
                1999-02-10  [Oats].Harvest();
                1999-02-10  [Oats].EndCrop();
              Water
                Thickness  BD     AirDry  LL15  DUL   SAT   KS
                200        1.311  0.07    0.12  0.32  0.42  4832.039
                200        1.524  0.14    0.14  0.3   0.41  389.229
                200        1.65   0.14    0.14  0.27  0.34  16.362
                200        1.601  0.1     0.1   0.24  0.32  97.995
                200        1.601  0.14    0.14  0.23  0.35  97.995
                200        1.601  0.16    0.16  0.23  0.34  97.995
                200        1.601  0.09    0.09  0.13  0.31  97.995
                200        1.601  0.06    0.06  0.17  0.31  97.995
                SoilCrop OatsSoil: LL=[0.12, 0.14, 0.14, 0.1, 0.14, 0.16, 0.09, 0.06]; KL=[0.06, 0.07, 0.04, 0.04, 0.05, 0.03, 0.02, 0.01]; XF=[1, 1, 1, 1, 1, 1, 1, 1]
              Sample Initial water: Thickness=[200, 200, 200, 200, 200, 200, 200, 200]; SW=[0.32, 0.3, 0.27, 0.24, 0.23, 0.23, 0.13, 0.17]; NO3Units=kgha; NH4Units=ppm; SWUnits=Volumetric; OCUnits=Total; PHUnits=Water
            Factor Full
              Specifications:
                [Irrig]
                [Water]
                [Initial water]
              Operations Irrig
                1998-10-31  [Irrigation].Apply(30);
                1998-11-09  [Irrigation].Apply(35.3);
                1998-11-16  [Irrigation].Apply(45);
                1998-11-23  [Irrigation].Apply(44);
                1998-11-30  [Irrigation].Apply(30.1);
                1998-12-07  [Irrigation].Apply(41.6);
                1998-12-14  [Irrigation].Apply(55);
                1998-12-21  [Irrigation].Apply(50);
                1998-12-28  [Irrigation].Apply(55);
                1999-01-05  [Irrigation].Apply(53);
                1999-01-11  [Irrigation].Apply(50.4);
                1999-01-18  [Irrigation].Apply(49);
                1999-01-25  [Irrigation].Apply(49);
                1999-02-01  [Irrigation].Apply(51.2);
                1999-02-08  [Irrigation].Apply(53);
                1999-02-15  [Irrigation].Apply(34);
                1999-02-22  [Irrigation].Apply(37);
                1999-03-01  [Irrigation].Apply(24);
                1999-03-03  [Oats].Harvest();
                1999-03-03  [Oats].EndCrop();
              Water
                Thickness  BD     AirDry  LL15   DUL    SAT
                200        1.311  0.05    0.1    0.3    0.419
                200        1.524  0.05    0.1    0.3    0.405
                200        1.65   0.149   0.149  0.28   0.342
                200        1.601  0.129   0.129  0.255  0.322
                200        1.601  0.155   0.155  0.288  0.348
                200        1.601  0.149   0.149  0.28   0.342
                200        1.601  0.053   0.053  0.107  0.307
                200        1.601  0.061   0.061  0.122  1.31
                KS=[4832.039, 389.229, 16.362, 97.995, 97.995, 97.995, 97.995, 0.05, 0.05, 0.15, 0.13, 0.16, 0.15, 0.05, 0.06]
                SoilCrop OatsSoil: LL=[0.1, 0.1, 0.149, 0.129, 0.155, 0.149, 0.053, 0.061]; KL=[0.06, 0.05, 0.04, 0.06, 0.05, 0.02, 0.02, 0]; XF=[1, 1, 1, 1, 1, 1, 1, 1]
              Memo
                Added an Irrigation on 30 Oct after looking at data and seeing a Panicle.
              Sample Initial water: Thickness=[200, 200, 200, 200, 200, 200, 200, 200]; SW=[0.3, 0.3, 0.28, 0.26, 0.29, 0.28, 0.11, 0.12]; NO3Units=kgha; NH4Units=ppm; SWUnits=Volumetric; OCUnits=Total; PHUnits=Water
            Factor LD1
              Specifications:
                [Irrig]
                [Water]
                [Initial water]
              Operations Irrig
                1998-10-27  [Irrigation].Apply(50);
                1998-11-02  [Irrigation].Apply(30);
                1999-02-10  [Oats].Harvest();
                1999-02-10  [Oats].EndCrop();
              Water
                Thickness  BD     AirDry  LL15  DUL   SAT
                200        1.311  0.05    0.1   0.32  0.42
                200        1.524  0.12    0.12  0.3   0.41
                200        1.65   0.13    0.13  0.26  0.34
                200        1.601  0.13    0.13  0.28  0.32
                200        1.601  0.17    0.17  0.27  0.35
                200        1.601  0.18    0.18  0.28  0.34
                200        1.601  0.05    0.05  0.2   0.31
                200        1.601  0.06    0.06  0.22  0.31
                SoilCrop OatsSoil: LL=[0.1, 0.12, 0.13, 0.129, 0.17, 0.18, 0.053, 0.061]; KL=[0.06, 0.05, 0.04, 0.04, 0.04, 0.03, 0.02, 0.01]; XF=[1, 1, 1, 1, 1, 1, 1, 1]
              Sample Initial water: Thickness=[200, 200, 200, 200, 200, 200, 200, 200]; SW=[0.28, 0.3, 0.26, 0.28, 0.27, 0.28, 0.2, 0.22]; NO3Units=kgha; NH4Units=ppm; SWUnits=Volumetric; OCUnits=Total; PHUnits=Water
            Factor LD4
              Specifications:
                [Irrig]
                [Water]
                [Initial water]
              Operations Irrig
                1998-10-27  [Irrigation].Apply(50)
                1998-11-02  [Irrigation].Apply(30)
                1998-11-09  [Irrigation].Apply( 35.3)
                1998-11-16  [Irrigation].Apply(45)
                1998-11-23  [Irrigation].Apply( 44)
                1998-11-30  [Irrigation].Apply(30.1 )
                1998-12-07  [Irrigation].Apply( 41.6)
                1999-02-10  [Oats].Harvest();
                1999-02-10  [Oats].EndCrop();
              Water
                Thickness  BD     AirDry  LL15  DUL   SAT   KS
                200        1.311  0.05    0.1   0.32  0.42  4832.039
                200        1.524  0.13    0.13  0.3   0.41  389.229
                200        1.65   0.1     0.1   0.26  0.34  16.362
                200        1.601  0.09    0.08  0.24  0.32  97.995
                200        1.601  0.16    0.16  0.27  0.35  97.995
                200        1.601  0.16    0.16  0.23  0.34  97.995
                200        1.601  0.08    0.08  0.15  0.31  97.995
                200        1.601  0.06    0.06  0.2   0.31  97.995
                SoilCrop OatsSoil: LL=[0.1, 0.13, 0.1, 0.09, 0.16, 0.16, 0.08, 0.061]; KL=[0.06, 0.06, 0.05, 0.06, 0.05, 0.02, 0.02, 0.01]; XF=[1, 1, 1, 1, 1, 1, 1, 1]
              Sample Initial water: Thickness=[200, 200, 200, 200, 200, 200, 200, 200]; SW=[0.32, 0.3, 0.26, 0.19, 0.25, 0.21, 0.13, 0.2]; NO3Units=kgha; NH4Units=ppm; SWUnits=Volumetric; OCUnits=Total; PHUnits=Water
            Factor ED1
              Specifications:
                [Irrig]
                [Water]
                [Initial water]
              Operations Irrig
                1998-11-16  [Irrigation].Apply(  45 )
                1998-11-23  [Irrigation].Apply(  44 )
                1998-11-30  [Irrigation].Apply(  30.1 )
                1998-12-07  [Irrigation].Apply(  41.6 )
                1998-12-14  [Irrigation].Apply(  55 )
                1998-12-21  [Irrigation].Apply(  50 )
                1998-12-28  [Irrigation].Apply(  55 )
                1999-01-05  [Irrigation].Apply(  53 )
                1999-01-11  [Irrigation].Apply( 50.4 )
                1999-01-18  [Irrigation].Apply(  49 )
                1999-01-25  [Irrigation].Apply(  49 )
                1999-02-01  [Irrigation].Apply(  51.2 )
                1999-02-08  [Irrigation].Apply(  53 )
                1999-02-15  [Irrigation].Apply(  34 )
                1999-02-22  [Irrigation].Apply(  37 )
                1999-03-01  [Irrigation].Apply(  24 )
                1999-03-03  [Oats].Harvest();
                1999-03-03  [Oats].EndCrop();
              Water
                Thickness  BD    AirDry  LL15  DUL   SAT   KS
                200        1.31  0.05    0.1   0.25  0.42  4832.039
                200        1.52  0.1     0.1   0.33  0.41  389.229
                200        1.65  0.15    0.15  0.27  0.34  16.362
                200        1.6   0.14    0.14  0.22  0.32  97.995
                200        1.6   0.15    0.15  0.2   0.35  97.995
                200        1.6   0.15    0.15  0.25  0.34  97.995
                200        1.6   0.1     0.1   0.19  0.31  97.995
                200        1.6   0.06    0.06  0.17  0.31  97.995
                SoilCrop OatsSoil: LL=[0.1, 0.1, 0.149, 0.14, 0.15, 0.149, 0.1, 0.06]; KL=[0.06, 0.05, 0.04, 0.06, 0.05, 0.02, 0.02, 0]; XF=[1, 1, 1, 1, 1, 1, 1, 1]
              Sample Initial water: Thickness=[200, 200, 200, 200, 200, 200, 200, 200]; SW=[0.25, 0.33, 0.27, 0.22, 0.2, 0.25, 0.19, 0.17]; NO3Units=kgha; NH4Units=ppm; SWUnits=Volumetric; OCUnits=Total; PHUnits=Water
        Simulation Rainshelter
          Clock: StartDate=1998-09-28; EndDate=1999-04-01
          Summary summaryfile
          Weather: FileName=%root%\Examples\WeatherFiles\lincoln.met
          SoilArbitrator Soil Arbitrator
          Zone paddock: Area=1; Slope=0
            Soil: SoilType=NZ_sedementary; Region=Plains; State=Canterbury; Country=New Zealnd; Latitude=0; Longitude=0
              Analysis: Thickness=[100, 200, 300, 300, 300, 300]; PH=[6.6, 6.2, 5.7, 5.5, 5.5, 5.5]; PHUnits=Water; BoronUnits=HotWater
              Water
                Thickness  BD     AirDry  LL15   DUL   SAT    KS
                200        1.311  0.05    0.1    0.25  0.419  4832.039
                200        1.524  0.1     0.1    0.33  0.405  389.229
                200        1.65   0.149   0.149  0.27  0.342  16.362
                200        1.601  0.14    0.14   0.22  0.322  97.995
                200        1.601  0.15    0.15   0.2   0.348  97.995
                200        1.601  0.149   0.149  0.25  0.342  97.995
                200        1.601  0.1     0.1    0.19  0.307  97.995
                200        1.601  0.06    0.06   0.17  0.309  97.995
                SoilCrop WheatSoil: LL=[0.1, 0.1, 0.07, 0.07, 0.08, 0.07, 0.07, 0.07]; KL=[0.06, 0.06, 0.06, 0.06, 0.04, 0.025, 0.01, 0.005]; XF=[1, 1, 1, 1, 1, 1, 1, 1]
                SoilCrop OatsSoil: LL=[0.1, 0.1, 0.149, 0.14, 0.15, 0.149, 0.1, 0.06]; KL=[0.06, 0.05, 0.04, 0.06, 0.05, 0.02, 0.02, 0]; XF=[1, 0.2, 1, 1, 1, 1, 1, 1]
              SoilWater: SummerDate=1-Nov; SummerU=6; SummerCona=2; WinterDate=1-Apr; WinterU=9; WinterCona=4.4; DiffusConst=0; DiffusSlope=0; Salb=0.18; CN2Bare=68; CNRed=20; CNCov=0.8; slope=0; discharge_width=0; catchment_area=0; max_pond=0; ResidueInterception=0
                Thickness  SWCON  KLAT
                200        0.7    0
                200        0.7    0
                200        0.95   0
                200        0.95   0
                200        0.95   0
                200        0.95   0
                200        0.95   0
                200        0.95   0
              SoilNitrogen: fom_type=[default, manure, mucuna, lablab, shemp, stable]; fract_carb=[0.2, 0.3, 0.54, 0.57, 0.45, 0]; fract_cell=[0.7, 0.3, 0.37, 0.37, 0.47, 0.1]; fract_lign=[0.1, 0.4, 0.09, 0.06, 0.08, 0.9]
              SoilOrganicMatter: RootCN=40; RootWt=1000; SoilCN=11; EnrACoeff=7.4; EnrBCoeff=0.2; OCUnits=Total
                Thickness  OC     FBiom  FInert
                180        2.625  0.033  0.437
                150        1.247  0.019  0.657
                400        0.316  0.012  0.85
                270        0.208  0.01   0.945
                500        0.2    0.01   0.983
              Sample Initial nitrogen: NO3Units=ppm; NH4Units=ppm; SWUnits=Volumetric; OCUnits=Total; PHUnits=Water
                Thickness  NO3      NH4
                200        202.213  3
                200        4.921    2
                200        4.545    1
                200        3.123    1
                200        1.562    1
                200        1.562    1
                200        1.562    1
                200        1.562    1
              Sample Initial water: Thickness=[200, 200, 200, 200, 200, 200, 200, 200]; SW=[0.31, 0.31, 0.16, 0.15, 0.1, 0.1, 0.11, 0.12]; NO3Units=kgha; NH4Units=ppm; SWUnits=Volumetric; OCUnits=Total; PHUnits=Water
              CERESSoilTemperature
            SoluteManager
            MicroClimate: a_interception=0; b_interception=1; c_interception=0; d_interception=0; soil_albedo=0.3; SoilHeatFluxFraction=0.4; NightInterceptionFraction=0.5; ReferenceHeight=2
            Fertiliser
            SurfaceOrganicMatter Surface Organic Matter: InitialResidueName=wheat_stubble; InitialResidueType=wheat; InitialResidueMass=0; InitialStandingFraction=0; InitialCPR=0; InitialCNR=80; FractionFaecesAdded=0.5
            Irrigation
            Plant Oats: CropType=Wheat
            Manager ClimateControl
              StartDate = 1998-10-17
              EndDate = 1999-04-01
```csharp
using System;
using Models.Core;
using APSIM.Shared.Utilities;



using System.Collections.Generic;
using System.Text;
using Models.PMF;
using Models;
using System.Xml.Serialization;

namespace Models
{
    [Serializable] 
    [System.Xml.Serialization.XmlInclude(typeof(Model))]
    public class Script : Model
    {
        [Link] Weather Met;
        [Link] Clock Clock;
    
        [Description("Start Date")]
        public DateTime StartDate { get; set; }
        
        [Description("End Date")]
        public DateTime EndDate { get; set; }
 
    
        [EventSubscribe("PreparingNewWeatherData")]
        private void OnPreparingNewWeatherData(object sender, EventArgs e)
        {
            if ((Clock.Today.Date >= StartDate) && (Clock.Today.Date <= EndDate))
                Met.Rain = 0;        
        }
    }
}
```
            Folder Manager folder
              Operations
                1998-09-29  [Oats].Sow(population:300, cultivar:"Drummond", depth:30, rowSpacing:130);
              Operations Irrig
                1998-11-09  [Irrigation].Apply(35.3);
                1998-11-16  [Irrigation].Apply(45);
                1998-11-23  [Irrigation].Apply(44);
                1998-11-30  [Irrigation].Apply(30.1);
                1998-12-07  [Irrigation].Apply(41.6);
                1998-12-14  [Irrigation].Apply(55);
                1998-12-21  [Irrigation].Apply(50);
                1998-12-28  [Irrigation].Apply(55);
                1999-01-05  [Irrigation].Apply(53);
                1999-01-11  [Irrigation].Apply(50.4);
                1999-01-18  [Irrigation].Apply(49);
                1999-01-25  [Irrigation].Apply(49);
                1999-02-01  [Irrigation].Apply(51.2);
                1999-02-08  [Irrigation].Apply(53);
                1999-02-15  [Irrigation].Apply(34);
                1999-02-22  [Irrigation].Apply(37);
                1999-03-01  [Irrigation].Apply(24);
              Manager LeafSize
```csharp
using System;
using Models.Core;
using System.Collections.Generic;
using System.Text;
using Models.Soils;
using Models.PMF;
using Models;
using System.Xml.Serialization;
using APSIM.Shared.Utilities;

namespace Models
{
    [Serializable] 
    public class Script : Model
    {
        [Link] Clock Clock;
        [Link] Plant Oats;
        [Link] Zone zone;
                    
        [XmlIgnore] public bool InitialDay { get; set; }
        
        [XmlIgnore] public double LeafExpandedPosition { get; set; }
        [XmlIgnore] public double LeafAppearedPosition { get; set; }
        [XmlIgnore] public double ExpandedLeafNoYesterday { get; set; }
        [XmlIgnore] public double AppearedLeafNoYesterday { get; set; }
        [XmlIgnore] public double MostRecentlyExpandedLeafSize { get; set; }
        [XmlIgnore] public double MostRecentlyAppearedLeafMaxSize { get; set; }
        
        [EventSubscribe("Commencing")]
        private void OnSimulationCommencing(object sender, EventArgs e)
        {
            InitialDay = true;
            LeafExpandedPosition = 0;
            LeafAppearedPosition = 0;
            ExpandedLeafNoYesterday = 0;
            AppearedLeafNoYesterday = 0;
            MostRecentlyExpandedLeafSize = 0;
            MostRecentlyAppearedLeafMaxSize = 0;
        }
        
        [EventSubscribe("DoManagement")]
        private void OnDoManagement(object sender, EventArgs e)
        {
            ExpandedLeafNoYesterday = Convert.ToDouble(zone.Get("Oats.Leaf.ExpandedCohortNo"));
            AppearedLeafNoYesterday = Convert.ToDouble(zone.Get("Oats.Leaf.AppearedCohortNo"));
        }
        
        [EventSubscribe("DoManagementCalculations")]
        private void OnDoManagementCalculations(object sender, EventArgs e)
        {
            if (Convert.ToDouble(zone.Get("Oats.Leaf.ExpandedCohortNo")) > ExpandedLeafNoYesterday)
            {
                LeafExpandedPosition = Convert.ToDouble(zone.Get("Oats.Leaf.ExpandedCohortNo"));
                MostRecentlyExpandedLeafSize = (double)zone.Get("Oats.Leaf.CohortSize[" + (int)LeafExpandedPosition + "]");
            }
            
            if (Convert.ToDouble(zone.Get("Oats.Leaf.AppearedCohortNo")) > AppearedLeafNoYesterday)
            {
                LeafAppearedPosition = Convert.ToDouble(zone.Get("Oats.Leaf.AppearedCohortNo"));
                MostRecentlyAppearedLeafMaxSize = (double)zone.Get("Oats.Leaf.CohortParameters.MaxArea.Value()");
            }
            
        }
    }
}
```
            Report DailyReport
            Report HarvestReport
            Report SupReport: EventNames=[Clock].DoReport
              VariableNames:
                [Clock].Today
                [Phenology].ThermalTime.Value()
                [Leaf].CohortSize
                [Leaf].CohortParameters.MaxArea.Value()
                [Oats].Arbitrator.DMAllocated
                [Oats].Arbitrator.DMDemand
                [Oats].Arbitrator.DMNutrientLimitation
                [Oats].Arbitrator.DMSinkLimitation
                [Oats].Arbitrator.DM.TotalFixationSupply
                [Oats].Arbitrator.FN
                [Oats].Arbitrator.NDemand
                [Oats].Structure.Phyllochron
                [Oats].Leaf.CohortMaxSize
                [Oats].Leaf.CohortParameters.GrowthDuration.Value()
                [Oats].Leaf.CohortParameters.LagDuration.Value()
                [Oats].Leaf.CohortParameters.SenescenceDuration.Value()
                [Oats].Leaf.CohortParameters.SpecificLeafAreaMax.Value()
                [Oats].Leaf.CohortParameters.SpecificLeafAreaMin.Value()
                [Oats].Leaf.Photosynthesis.FT.Value()
                [Oats].Leaf.Photosynthesis.FVPD.Value()
                [Oats].Leaf.Photosynthesis.RueAct
                [Oats].Stem.DMDemands.Structural.DMDemandFunction.HightLimitedDMAccumulation.Value()
                [Oats].Stem.DMDemands.Structural.DMDemandFunction.PotentialDMAccumulation.Value()
                [Oats].Leaf.NextExpandingLeafProportion
                [Oats].Structure.MeanTillerGrowthRate.Value()
                sum([Soil].SoilWater.SWmm[1:8]) as ProfileWater
                [LeafSize].Script.LeafAppearedPosition
                [LeafSize].Script.MostRecentlyAppearedLeafMaxSize
                [LeafSize].Script.LeafExpandedPosition
                [LeafSize].Script.MostRecentlyExpandedLeafSize
                [Grain].AccumThermalTime.Value()
                [Oats].Panicle.HeadNumber.Value()
                [Oats].Grain.NumberFunction.Value()
      Experiment WinterSowing2015
        Memo
          FRNL Experiment: Data from [malcolm2016catch]

          Note: the 2015 version of this experiment established inconsistently and data is not of the same quality as that generated in 2016.

          Grazing winter forage crops is an important management strategy for profitable livestock production in many New Zealand regions where there is commonly a pasture feed deficit during this period. However, the high stocking densities that are often associated with these systems can have negative environmental effects, such as nitrogen (N) leaching losses to groundwater. This field study investigated the potential biomass production and reduced risk of N leaching from establishing oats (Avena sativa L.) as a green-chop catch crop after winter-grazed forage kale (Brassica oleracea var. acephala L.) in Canterbury, New Zealand. Oat crops were direct-drilled on two sowing dates (early: 1 July 2015 and late: 1 August 2015) and were managed under high (400 kg N/ha) and low (0 kg N/ha) N load conditions, representing urine-patch and inter urine-patch areas. For the early-sown crops yields were 6.1 (low N) and 11.8 t DM/ha (high N) at final harvest (50% ear emergence) on 19 November 2015. For the late-sown crops yields were 6.7 (low N) and 10.1 t DM/ha (high N) at the same development stage (26 November 2015). By establishing oats as a catch crop in winter soil profile mineral-N (0-120 cm depth) was reduced by up to 86% (early) and 80% (late) in the high N (simulated urine-patch) treatments compared with the respective fallow treatment. These results indicated the technical feasibility of direct drilling oats as catch crops immediately after winter forage grazing, with likely production and environmental benefits such as the reduced risk of N leaching losses.
        Factors
          Factor Sow
            Factor July
              Specifications:
                [Operations]
                [Fertilise].Script.SDSwitch = 1.0
              Operations
                2015-07-01  [Oats].Sow(population:180, cultivar:"Milton", depth:40, rowSpacing:150);
            Factor Aug
              Specifications:
                [Operations]
                [Fertilise].Script.SDSwitch = 2.0
              Operations
                2015-08-01  [Oats].Sow(population:160, cultivar:"Milton", depth:40, rowSpacing:150);
          Factor Fert
            Factor 0: Specifications=[Fertilize]
              Operations Fertilize
                2015-06-01  [Fertiliser].Apply(0, Fertiliser.Types.UreaN, 10);
            Factor 400: Specifications=[Fertilize]
              Operations Fertilize
                2015-06-01  [Fertiliser].Apply(400, Fertiliser.Types.UreaN, 10);
        Simulation ABlock
          Clock: StartDate=2015-05-25; EndDate=2015-12-01
          Summary summaryfile
          Weather: FileName=%root%\Examples\WeatherFiles\lincoln.met
          SoilArbitrator Soil Arbitrator
          Zone paddock: Area=1; Slope=0
            Soil: Latitude=0; Longitude=0
              Analysis: Thickness=[100, 200, 300, 300, 300, 300]; PH=[6.6, 6.2, 5.7, 5.5, 5.5, 5.5]; PHUnits=Water; BoronUnits=HotWater
              Water
                Thickness  BD   AirDry  LL15  DUL   SAT
                200        1.2  0.15    0.15  0.32  0.46
                200        1.2  0.15    0.15  0.32  0.46
                200        1.2  0.15    0.15  0.3   0.4
                200        1.2  0.15    0.15  0.3   0.4
                200        1.2  0.15    0.15  0.3   0.4
                200        1.2  0.15    0.15  0.3   0.4
                200        1.2  0.15    0.15  0.3   0.4
                200        1.2  0.15    0.15  0.3   0.4
                SoilCrop WheatSoil: LL=[0.15, 0.15, 0.15, 0.15, 0.15, 0.15, 0.15, 0.15]; KL=[0.06, 0.06, 0.06, 0.06, 0.04, 0.025, 0.01, 0.005]; XF=[1, 1, 1, 1, 1, 1, 1, 1]
                SoilCrop OatsSoil: LL=[0.15, 0.15, 0.15, 0.15, 0.15, 0.15, 0.15, 0.15]; KL=[0.06, 0.06, 0.06, 0.06, 0.04, 0.025, 0.01, 0.005]; XF=[1, 1, 1, 1, 1, 1, 1, 1]
              SoilWater: same as Validation.New Zealand.RS_Oats_9899.Rainshelter.paddock.Soil.SoilWater
              SoilNitrogen: fom_type=[default, manure, mucuna, lablab, shemp, stable]; fract_carb=[0.2, 0.3, 0.54, 0.57, 0.45, 0]; fract_cell=[0.7, 0.3, 0.37, 0.37, 0.47, 0.1]; fract_lign=[0.1, 0.4, 0.09, 0.06, 0.08, 0.9]
              SoilOrganicMatter: RootCN=30; RootWt=3000; SoilCN=11.5; EnrACoeff=7.4; EnrBCoeff=0.2; OCUnits=Total
                Thickness  OC    FBiom  FInert
                100        1.82  0.025  0.3
                200        1.47  0.025  0.4
                300        1.2   0.015  0.75
                300        1.03  0.01   0.9
                300        0.47  0.01   0.96
                300        0.47  0.01   0.96
              Sample Initial nitrogen: NO3Units=kgha; NH4Units=ppm; SWUnits=Volumetric; OCUnits=Total; PHUnits=Water
                Thickness  NO3  NH4
                100        20   0
                200        30   0
                300        5    0
                300        5    0
                300        0    0
                300        0    0
              Sample Initial water: Thickness=[200, 200, 200, 200, 200, 200, 200, 200]; SW=[0.29, 0.28, 0.16, 0.15, 0.1, 0.1, 0.11, 0.12]; NO3Units=kgha; NH4Units=ppm; SWUnits=Volumetric; OCUnits=Total; PHUnits=Water
              CERESSoilTemperature
            SoluteManager
            Irrigation
            SurfaceOrganicMatter Surface Organic Matter: InitialResidueName=wheat_stubble; InitialResidueType=wheat; InitialResidueMass=0; InitialStandingFraction=0; InitialCPR=0; InitialCNR=80; FractionFaecesAdded=0.5
            Fertiliser
            MicroClimate: a_interception=0; b_interception=1; c_interception=0; d_interception=0; soil_albedo=0.3; SoilHeatFluxFraction=0.4; NightInterceptionFraction=0.5; ReferenceHeight=2
            Plant Oats: CropType=Wheat
            Folder Manager folder
              Operations
              Manager Fertilise
                FertDate1 = 05-Aug
                FertDate2 = 01-Oct
                FertDate3 = 20-Oct
                FertDate4 = 25-Nov
                Amount1 = 0
                Amount2 = 0
                Amount3 = 0
                Amount4 = 0
                SDSwitch = 0
```csharp
using System;
using Models.Core;
using Models.PMF;
using APSIM.Shared.Utilities;
namespace Models
{
    [Serializable]
    public class Script : Model
    {
        [Link] Clock Clock;
        [Link] Fertiliser Fertiliser;
        
        [Description("Date to fertilise")]
        public string FertDate1 { get; set; }
        [Description("Date to fertilise")]
        public string FertDate2 { get; set; }
        [Description("Date to fertilise")]
        public string FertDate3 { get; set; }
        [Description("Date to fertilise")]
        public string FertDate4 { get; set; }
        
        [Description("Amount of fertiliser to be applied (kg/ha)")]
        public double Amount1 { get; set; }
        [Description("Amount of fertiliser to be applied (kg/ha)")]
        public double Amount2 { get; set; }
        [Description("Amount of fertiliser to be applied (kg/ha)")]
        public double Amount3 { get; set; }
        [Description("Amount of fertiliser to be applied (kg/ha)")]
        public double Amount4 { get; set; }
        
        [Description("Amount of fertiliser to be applied (kg/ha)")]
        public double SDSwitch { get; set; }
        
        [EventSubscribe("DoManagement")]
        private void OnDoManagement(object sender, EventArgs e)
        {
            if (DateUtilities.WithinDates(FertDate1, Clock.Today, FertDate1))
                Fertiliser.Apply(Amount: Amount1 * SDSwitch, Type: Fertiliser.Types.NO3N);
            if (DateUtilities.WithinDates(FertDate2, Clock.Today, FertDate2))
                Fertiliser.Apply(Amount: Amount2, Type: Fertiliser.Types.NO3N);
            if (DateUtilities.WithinDates(FertDate3, Clock.Today, FertDate3))
                Fertiliser.Apply(Amount: Amount3, Type: Fertiliser.Types.NO3N);
            if (DateUtilities.WithinDates(FertDate4, Clock.Today, FertDate4))
                Fertiliser.Apply(Amount: Amount4 * SDSwitch, Type: Fertiliser.Types.NO3N);
        }
    }
}
```
              Operations Fertilize
                2015-06-01  [Fertiliser].Apply(0, Fertiliser.Types.UreaN, 10);
              Operations Irr
                2015-10-15  [Irrigation].Apply(25);
                2015-11-03  [Irrigation].Apply(25);
                2015-11-15  [Irrigation].Apply(25);
                2015-11-20  [Irrigation].Apply(30);
              Manager Harvesting
```csharp
using System;
using Models.Core;
using System.Collections.Generic;
using System.Text;
using Models.Soils;
using Models.PMF;
using Models;
using System.Xml.Serialization;
using APSIM.Shared.Utilities;

namespace Models
{
    [Serializable] 
    public class Script : Model
    {

    }
}
```
            Report DailyReport
            Report HarvestReport
            Report SupReport: EventNames=[Clock].DoReport
              VariableNames:
                [Clock].Today
                [Leaf].CohortSize
                [Oats].Arbitrator.DMAllocated
                [Oats].Arbitrator.DMDemand
                [Oats].Arbitrator.DMNutrientLimitation
                [Oats].Arbitrator.DMSinkLimitation
                [Oats].Arbitrator.DM.TotalFixationSupply
                [Oats].Arbitrator.FN
                [Oats].Arbitrator.NDemand
                [Oats].Leaf.CohortMaxSize
                [Oats].Leaf.CohortParameters.GrowthDuration.Value()
                [Oats].Leaf.CohortParameters.LagDuration.Value()
                [Oats].Leaf.CohortParameters.MaxArea.Value()
                [Oats].Leaf.CohortParameters.SenescenceDuration.Value()
                [Oats].Leaf.CohortParameters.SpecificLeafAreaMax.Value()
                [Oats].Leaf.CohortParameters.SpecificLeafAreaMin.Value()
                [Oats].Leaf.Photosynthesis.FT.Value()
                [Oats].Leaf.Photosynthesis.FVPD.Value()
                [Oats].Leaf.Photosynthesis.RueAct
                [Oats].Stem.DMDemands.Structural.DMDemandFunction.HightLimitedDMAccumulation.Value()
                [Oats].Stem.DMDemands.Structural.DMDemandFunction.PotentialDMAccumulation.Value()
                [Oats].Leaf.NextExpandingLeafProportion
                [Oats].Structure.MeanTillerGrowthRate.Value()
                sum([Soil].SoilWater.SWmm[1:8]) as ProfileWater
      Experiment WinterSowing2016
        Memo
          FRNL Experiment: Data from [malcolm2016catch]

          Grazing winter forage crops is an important management strategy for profitable livestock production in many New Zealand regions where there is commonly a pasture feed deficit during this period. However, the high stocking densities that are often associated with these systems can have negative environmental effects, such as nitrogen (N) leaching losses to groundwater. This field study investigated the potential biomass production and reduced risk of N leaching from establishing oats (Avena sativa L.) as a green-chop catch crop after winter-grazed forage kale (Brassica oleracea var. acephala L.) in Canterbury, New Zealand. Oat crops were direct-drilled on two sowing dates (early: 1 July 2015 and late: 1 August 2015) and were managed under high (400 kg N/ha) and low (0 kg N/ha) N load conditions, representing urine-patch and inter urine-patch areas. For the early-sown crops yields were 6.1 (low N) and 11.8 t DM/ha (high N) at final harvest (50% ear emergence) on 19 November
          2015. For the late-sown crops yields were 6.7 (low N) and 10.1 t DM/ha (high N) at the same development stage (26 November 2015). By establishing oats as a catch crop in winter soil profile mineral-N (0-120 cm depth) was reduced by up to 86% (early) and 80% (late) in the high N (simulated urine-patch) treatments compared with the respective fallow treatment. These results indicated the technical feasibility of direct drilling oats as catch crops immediately after winter forage grazing, with likely production and environmental benefits such as the reduced risk of N leaching losses.
        Factors
          Factor Sow
            Factor July
              Specifications:
                [Operations]
                [Fertilise].Script.SDSwitch = 1.0
              Operations
                2016-07-05  [Oats].Sow(population:400, cultivar:"Milton", depth:40, rowSpacing:150);
            Factor Aug
              Specifications:
                [Operations]
                [Fertilise].Script.SDSwitch = 2.0
              Operations
                2016-07-29  [Oats].Sow(population:300, cultivar:"Milton", depth:40, rowSpacing:150);
          Factor Fert
            Factor 400: Specifications=[Fertilize]
              Operations Fertilize
                2015-06-01  [Fertiliser].Apply(400, Fertiliser.Types.UreaN, 10);
        Simulation RS2016
          Clock: StartDate=2016-05-25; EndDate=2016-12-01
          Summary summaryfile
          Weather: FileName=%root%\Examples\WeatherFiles\lincoln.met
          SoilArbitrator Soil Arbitrator
          Zone paddock: Area=1; Slope=0
            Soil: Latitude=0; Longitude=0
              Analysis: Thickness=[100, 200, 300, 300, 300, 300]; PH=[6.6, 6.2, 5.7, 5.5, 5.5, 5.5]; PHUnits=Water; BoronUnits=HotWater
              Water
                Thickness  BD   AirDry  LL15  DUL   SAT
                200        1.2  0.15    0.15  0.32  0.46
                200        1.2  0.15    0.15  0.32  0.46
                200        1.2  0.15    0.15  0.3   0.4
                200        1.2  0.15    0.15  0.3   0.4
                200        1.2  0.15    0.15  0.3   0.4
                200        1.2  0.15    0.15  0.3   0.4
                200        1.2  0.15    0.15  0.3   0.4
                200        1.2  0.15    0.15  0.3   0.4
                SoilCrop WheatSoil: LL=[0.15, 0.15, 0.15, 0.15, 0.15, 0.15, 0.15, 0.15]; KL=[0.06, 0.06, 0.06, 0.06, 0.04, 0.03, 0.01, 0.01]; XF=[1, 1, 1, 1, 1, 1, 1, 1]
                SoilCrop OatsSoil: LL=[0.15, 0.15, 0.15, 0.15, 0.15, 0.15, 0.15, 0.15]; KL=[0.06, 0.06, 0.06, 0.06, 0.04, 0.03, 0.01, 0.01]; XF=[1, 1, 1, 1, 1, 1, 1, 1]
              SoilWater: same as Validation.New Zealand.RS_Oats_9899.Rainshelter.paddock.Soil.SoilWater
              SoilNitrogen: fom_type=[default, manure, mucuna, lablab, shemp, stable]; fract_carb=[0.2, 0.3, 0.54, 0.57, 0.45, 0]; fract_cell=[0.7, 0.3, 0.37, 0.37, 0.47, 0.1]; fract_lign=[0.1, 0.4, 0.09, 0.06, 0.08, 0.9]
              SoilOrganicMatter: same as Validation.New Zealand.WinterSowing2015.ABlock.paddock.Soil.SoilOrganicMatter
              Sample Initial nitrogen: NO3Units=kgha; NH4Units=ppm; SWUnits=Volumetric; OCUnits=Total; PHUnits=Water
                Thickness  NO3  NH4
                100        217  0
                200        30   0
                300        5    0
                300        5    0
                300        0    0
                300        0    0
              Sample Initial water: Thickness=[200, 200, 200, 200, 200, 200, 200, 200]; SW=[0.29, 0.28, 0.16, 0.15, 0.1, 0.1, 0.11, 0.12]; NO3Units=kgha; NH4Units=ppm; SWUnits=Volumetric; OCUnits=Total; PHUnits=Water
              CERESSoilTemperature
            SoluteManager
            Irrigation
            SurfaceOrganicMatter Surface Organic Matter: InitialResidueName=wheat_stubble; InitialResidueType=wheat; InitialResidueMass=0; InitialStandingFraction=0; InitialCPR=0; InitialCNR=80; FractionFaecesAdded=0.5
            Fertiliser
            MicroClimate: a_interception=0; b_interception=1; c_interception=0; d_interception=0; soil_albedo=0.3; SoilHeatFluxFraction=0.4; NightInterceptionFraction=0.5; ReferenceHeight=2
            Plant Oats: CropType=Wheat
            Folder Manager folder
              Operations
              Manager Fertilise: same as Validation.New Zealand.WinterSowing2015.ABlock.paddock.Manager folder.Fertilise
              Operations Fertilize
                2015-06-01  [Fertiliser].Apply(0, Fertiliser.Types.UreaN, 10);
              Operations Irr
                2016-09-06  [Irrigation].Apply(25);
                2016-09-13  [Irrigation].Apply(28);
                2016-09-19  [Irrigation].Apply(25);
                2016-09-26  [Irrigation].Apply(25);
                2016-10-05  [Irrigation].Apply(30);
              Manager Harvesting
                script: same as in Validation.New Zealand.WinterSowing2015.ABlock.paddock.Manager folder.Harvesting
            Report DailyReport
            Report HarvestReport
      Experiment CPT
        Memo
          Jamieson, P. D. and C. A. Munro (1999). A simple method for the phenological evaluation of new cereal cultivars. Agronomy Society of New Zealand - Proceedings, Twenty-Ninth Annual Conference, 1999. J. G. Hampton and K. M. Pollock. 29: 63-68.

          This experiment is part of the ongoing Cultivar Prediction Trial at Plant & Food Lincoln wher a Cultivar is planted at 3 sowing dates throughout the year and the time of flowering, Final leaf number and Flag leaf are recorded.
        Factors
          Factor Sow
            Specifications=[Clock].StartDate = 2002-03-07,2002-05-15,2002-09-09,2003-03-14,2003-05-21,2003-09-02,2004-03-23,2004-05-28,2004-09-06
          Factor Cult: Specifications=[SowAndHarvest].Script.Cultivar = Hokonui,Stampede
        Simulation PaddockCPT
          Clock: StartDate=2002-03-01; EndDate=2010-02-01
          Summary summaryfile
          Weather: FileName=%root%\Examples\WeatherFiles\lincoln.met
          SoilArbitrator Soil Arbitrator
          Zone paddock: Area=1; Slope=0
            Soil: Latitude=0; Longitude=0
              Analysis: Thickness=[100, 200, 300, 300, 300, 300]; PH=[6.6, 6.2, 5.7, 5.5, 5.5, 5.5]; PHUnits=Water; BoronUnits=HotWater
              Water
                Thickness  BD   AirDry  LL15  DUL   SAT
                200        1.2  0.05    0.1   0.32  0.46
                200        1.2  0.1     0.1   0.32  0.46
                200        1.2  0.07    0.07  0.13  0.4
                200        1.2  0.07    0.07  0.1   0.3
                200        1.2  0.08    0.08  0.11  0.3
                200        1.2  0.07    0.07  0.1   0.3
                200        1.2  0.07    0.07  0.1   0.3
                200        1.2  0.07    0.07  0.1   0.3
                SoilCrop WheatSoil: LL=[0.1, 0.1, 0.07, 0.07, 0.08, 0.07, 0.07, 0.07]; KL=[0.06, 0.06, 0.06, 0.06, 0.04, 0.025, 0.01, 0.005]; XF=[1, 1, 1, 1, 1, 1, 1, 1]
                SoilCrop OatsSoil: LL=[0.1, 0.1, 0.07, 0.07, 0.08, 0.07, 0.07, 0.07]; KL=[0.06, 0.06, 0.06, 0.06, 0.04, 0.025, 0.01, 0.005]; XF=[1, 1, 1, 1, 1, 1, 1, 1]
              SoilWater: same as Validation.New Zealand.RS_Oats_9899.Rainshelter.paddock.Soil.SoilWater
              SoilNitrogen: fom_type=[default, manure, mucuna, lablab, shemp, stable]; fract_carb=[0.2, 0.3, 0.54, 0.57, 0.45, 0]; fract_cell=[0.7, 0.3, 0.37, 0.37, 0.47, 0.1]; fract_lign=[0.1, 0.4, 0.09, 0.06, 0.08, 0.9]
              SoilOrganicMatter: same as Validation.New Zealand.WinterSowing2015.ABlock.paddock.Soil.SoilOrganicMatter
              Sample Initial nitrogen: NO3Units=kgha; NH4Units=ppm; SWUnits=Volumetric; OCUnits=Total; PHUnits=Water
                Thickness  NO3  NH4
                100        217  0
                200        30   0
                300        5    0
                300        5    0
                300        0    0
                300        0    0
              Sample Initial water: Thickness=[200, 200, 200, 200, 200, 200, 200, 200]; SW=[0.29, 0.28, 0.16, 0.15, 0.1, 0.1, 0.11, 0.12]; NO3Units=kgha; NH4Units=ppm; SWUnits=Volumetric; OCUnits=Total; PHUnits=Water
              CERESSoilTemperature
            SoluteManager
            Irrigation
            SurfaceOrganicMatter Surface Organic Matter: InitialResidueName=wheat_stubble; InitialResidueType=wheat; InitialResidueMass=0; InitialStandingFraction=0; InitialCPR=0; InitialCNR=80; FractionFaecesAdded=0.5
            Fertiliser
            MicroClimate: a_interception=0; b_interception=1; c_interception=0; d_interception=0; soil_albedo=0.3; SoilHeatFluxFraction=0.4; NightInterceptionFraction=0.5; ReferenceHeight=2
            Plant Oats: CropType=Wheat
            Manager SowAndHarvest
              Cultivar = Otane
```csharp
using System;
using Models.Core;
using Models.PMF;
using APSIM.Shared.Utilities;
using System.Xml.Serialization;
        
namespace Models
{
    [Serializable] 
    [System.Xml.Serialization.XmlInclude(typeof(Model))]
    public class Script : Model
    {
        [Link] Plant Oats;
        [Link] Clock Clock;
        [Link] Simulation sim;
        [Link] Summary Summary;
        
        [Description("Cultivar")]
        public string Cultivar { get; set; }
        
        [XmlIgnore] public bool Sown { get; set; }
        [XmlIgnore] public bool Harvested { get; set; }
        [XmlIgnore] public bool EndSet { get; set; }
        
        [EventSubscribe("Commencing")]
        private void OnSimulationCommencing(object sender, EventArgs e)
        {
            Sown = false;
            Harvested = false;
            EndSet = false;
        }
        
        [EventSubscribe("DoManagement")]
        private void OnDoManagement(object sender, EventArgs e)
        {
            if (Sown == false)
            {
                Oats.Sow(population: 200, cultivar: Cultivar, depth: 15, rowSpacing: 150, budNumber: 1);
                Sown = true;
            }
            
            if (Oats.Phenology.CurrentPhaseName == "Maturing")
            {
                Oats.Harvest();
                Oats.EndCrop();
                Harvested = true;
                Summary.WriteMessage(this, "Maturity reached so setting end date to stop simulation");
            }
            
            if ((Harvested == true) && (EndSet == false))
            {
                sim.Set("Clock.EndDate", Clock.Today.AddDays(1));
                EndSet = true;
            }
        }
    }
}
```
            Report HarvestReport: EventNames=[Clock].EndOfSimulation
              VariableNames:
                [Oats].Structure.LeafTipsAppeared
                [Oats].Structure.FinalLeafNumber
                [Oats].Phenology.FlagLeafDAS
                [Oats].Phenology.FloweringDAS
                [Oats].Phenology.MaturityDAS
      Experiment RS_Oats_1718
        Memo Experiment Description
          #Experiment description

          ## Introduction
          This is a simulation of Oats in a crop rotation consisting of a forage species, fodder beet, grown over spring/summer and harvested in autumn, followed by the catch crop, oats. The actual experiment was done in two parts in the rain shelter facility of Plant and Food Research, Lincoln, NZ.  The experiments were designed to help develop the model for the respective plants and here they are used to further demonstrate that ApsimX can simulate water and nitrogen cycling in the field and then to examine whether catch crops are a good option for mitigating N leaching from forages.

           Part 1: Co-limitation of water and nitrogen on fodder beet physiology (no detail supplied for this experiment as it is not simulated herein)

           Part 2: Ability of oats to act as catch-crops over winter/spring
           - Irrigation: 2 treatments, low (enough to keep plants growing) or full irrigation (to match PET)
           - Nitrogen: 3 treatments, 80 kg N/ha, 125 kg N/ha & 320 kg N/ha at sowing (urea applied at sowing)

          Oats Experiment Management:
               - Cultivar: Milton
               - Sowing density: 300 plants/m2
                    row spacing: 15 cm
                          depth: 45 mm

              General actions:
                  05/07/2017 - Sowing
                  05/07/2017 - Fertiliser application (400kg/ha Potash, Urea: treat4=80kgN/ha, treat5=125kgN/ha, treat6=320kgN/ha)
                  24/07/2017 - Plants started to emerge
                  11/09/2017 - Irrigation started in treatements 4, 5, and 6
                  06/11/2017 - Irrigation extended to all plots
                  04-09/01/2018 - Plots harvested
        Factors
          Factor Nit
            Factor 80
              Specifications:
                [FertiliserSchedule]
                [TreatmentSpecificActions].Script.NitFactor = 0
            Factor 125
              Specifications:
                [FertiliserSchedule]
                [TreatmentSpecificActions].Script.NitFactor = 50
            Factor 320
              Specifications:
                [FertiliserSchedule]
                [TreatmentSpecificActions].Script.NitFactor = 300
          Factor Irr
            Factor Full
              Specifications:
                [IrrigationSchedule]
                [TreatmentSpecificActions].Script.IrrFactor = true
              Operations Full
                2016-11-23  [Irrigation].Apply(30.0)
                2016-11-30  [Irrigation].Apply(25.0)
                2016-12-07  [Irrigation].Apply(25.0)
                2016-12-21  [Irrigation].Apply(25.2)
                2016-12-29  [Irrigation].Apply(30.0)
                2017-01-04  [Irrigation].Apply(40.0)
                2017-01-11  [Irrigation].Apply(32.9)
                2017-01-18  [Irrigation].Apply(25.4)
                2017-01-25  [Irrigation].Apply(31.3)
                2017-02-08  [Irrigation].Apply(33.0)
                2017-02-15  [Irrigation].Apply(35.0)
                2017-02-22  [Irrigation].Apply(29.0)
                2017-03-08  [Irrigation].Apply(34.0)
                2017-03-22  [Irrigation].Apply(50.1)
                2017-04-12  [Irrigation].Apply(30.9)
                2017-04-27  [Irrigation].Apply(18.9)
                2017-09-11  [Irrigation].Apply(20.9)
                2017-09-12  [Irrigation].Apply(21.1)
                2017-09-13  [Irrigation].Apply(21.4)
                2017-10-10  [Irrigation].Apply(22.2)
                2017-10-11  [Irrigation].Apply(22.5)
                2017-10-12  [Irrigation].Apply(22.5)
                Memo
                  Have added an extra irrigation, on 22 Oct,

                  Data indcates water applied but no notes of it RFZ

                  In Statefactors have donethe irrigations for
                    17/12  21/1 19/11 14/1
            Factor Nil
              Specifications:
                [IrrigationSchedule]
                [TreatmentSpecificActions].Script.IrrFactor = false
              Operations Nil
                Memo
                  Have added an extra irrigation, on 3 Nov,

                  Data indcates water applied but no notes of it RFZ
        Simulation Rainshelter2017
          Clock: StartDate=2017-06-01; EndDate=2018-01-15
          Summary summaryfile
          Weather: FileName=%root%\Examples\WeatherFiles\lincoln.met
          SoilArbitrator Soil Arbitrator
          Zone paddock: Area=1; Slope=0
            Folder Manager folder
              Operations GeneralIrrigation
                2017-11-06  [Irrigation].Apply(45.0)
                2017-11-15  [Irrigation].Apply(30.0)
                2017-11-22  [Irrigation].Apply(29.7)
                2017-11-29  [Irrigation].Apply(35.0)
                2017-12-06  [Irrigation].Apply(46.7)
              Operations IrrigationSchedule
              Operations FertiliserSchedule
              Operations SowingHarvesting
                2017-07-05  [Oats].Sow(population: 400, cultivar: "Milton", depth: 45, rowSpacing: 45)
                2018-01-10  [Oats].Harvest()
              Manager ClimateControl
                StartDate = 2016-10-17
                EndDate = 2017-06-30
                OtherDateString = 27/07/2017 28/07/2017 09/08/2017 13/08/2017 14/08/2017 31/08/2017
```csharp
using System;
using Models.Core;
using APSIM.Shared.Utilities;
using System.Collections.Generic;
using System.Text;
using Models.PMF;
using Models;
using System.Xml.Serialization;

// This script simulates a rainshelter, it controls the amount of rainfall (=0.0) and radiation (=95% of weather)
// It does that for a period between two dates, as well as at sporadic dates

namespace Models
{
    [Serializable] 
    [System.Xml.Serialization.XmlInclude(typeof(Model))]
    public class Script : Model
    {
        [Link] Weather Met;
        [Link] Clock Clock;
    
        [Description("Start date: ")]
        public DateTime StartDate { get; set; }
        [Description("End date: ")]
        public DateTime EndDate { get; set; }
         [Description("Other dates: ")]
         public string OtherDateString  { get; set; }

         private DateTime[] OtherDates;
         private double todaysRain;

        [EventSubscribe("Commencing")]
        private void OnSimulationCommencing(object sender, EventArgs e)
        {
            //gather the dates the variables will be controlled
            string[] auxDates = OtherDateString.Split(new Char []{' ',','});
            OtherDates = new DateTime[auxDates.Length];
            for (int i = 0; i < auxDates.Length; i++)
                OtherDates[i] = DateTime.Parse(auxDates[i]);
        }

        [EventSubscribe("PreparingNewWeatherData")]
        private void OnPreparingNewWeatherData(object sender, EventArgs e)
        {
            if ((Clock.Today.Date >= StartDate.Date) && (Clock.Today.Date <= EndDate.Date))
            {
                todaysRain = Met.Rain;
                changeMetData();
            }
            else
            {
                for (int i = 0; i < OtherDates.Length; i++)
                    if (Clock.Today.Date == OtherDates[0].Date)
                        changeMetData();
            }

            // rain shelter partial day cover
            if (Clock.Today.Date == DateTime.Parse("01/09/2017").Date)
                Met.Rain -= 2.0;
            
            // rain shelter cover removed for weekend
            if ((Clock.Today.Date == DateTime.Parse("03/06/2017").Date)||(Clock.Today.Date == DateTime.Parse("04/06/2017").Date))
            {
                Met.Rain = todaysRain;
                Met.Radn /= 0.95;
            }
        }

        private void changeMetData()
        {
            Met.Rain *= 0.0;
            Met.Radn *= 0.95;
        }
    }
}
```
              Manager TreatmentSpecificActions
                IrrFactor = False
                NitFactor = 0
```csharp
using System;
using Models.Core;
using System.Collections.Generic;
using System.Text;
using Models.Soils;
using Models.PMF;
using Models;
using System.Xml.Serialization;
using APSIM.Shared.Utilities;

// This script performs management actions that are not common to all treatments

namespace Models
{
    [Serializable] 
    public class Script : Model
    {
        [Link] Clock Clock;
        [Link] Irrigation Irrigation;
        [Link] Fertiliser Fert;
        [Link] Soil ThisSoil;
        [Link] SoluteManager soluteManager;

        [Description("Allow irrigation to be applied?")]
        public bool IrrFactor { get; set; }
        [Description("Amount of fertiliser to be applied (kg/ha)")]
        public double NitFactor { get; set; }


        private void SetSoilLayers()
        {
        
            int i = 0;

            if (ThisSoil.Thickness.Length != 7)
               throw new Exception("Soil layer exception");

            if ((IrrFactor == false) && (NitFactor == 300))
            {
                soluteManager.SetSolute("NH4",SoluteManager.SoluteSetterType.Fertiliser,new double[]{108,12,7,5,4,3,3});
                soluteManager.SetSolute("NO3",SoluteManager.SoluteSetterType.Fertiliser,new double[] {55,30,25,12,3,5,5});
            }   
            else if ((IrrFactor == false) && (NitFactor == 50))
            {
                soluteManager.SetSolute("NH4",SoluteManager.SoluteSetterType.Fertiliser,new double[]{14.2,3.6,3.2,1.0,2.8,3.7,3});
                soluteManager.SetSolute("NO3",SoluteManager.SoluteSetterType.Fertiliser,new double[] {34,16.8,15.8,7.7,1.8,2.3,5});
            }   
            else if ((IrrFactor == false) && (NitFactor == 0))
            {
                soluteManager.SetSolute("NH4",SoluteManager.SoluteSetterType.Fertiliser,new double[]{3.7,3.5,4.1,1.2,2.1,2.3,3});
                soluteManager.SetSolute("NO3",SoluteManager.SoluteSetterType.Fertiliser,new double[] {18,13.7,10.8,4.2,1.9,2.8,5});
            }   
            else if ((IrrFactor == true) && (NitFactor == 300))
            {
                soluteManager.SetSolute("NH4",SoluteManager.SoluteSetterType.Fertiliser,new double[]{1.8,1.8,3.0,2.3,2.4,1.8,3});
                soluteManager.SetSolute("NO3",SoluteManager.SoluteSetterType.Fertiliser,new double[] {12.6,6.4,5.3,2.8,2.2,2.2,5});
            }   
            else if ((IrrFactor == true) && (NitFactor == 50))
            {
                soluteManager.SetSolute("NH4",SoluteManager.SoluteSetterType.Fertiliser,new double[]{1.9,1.5,3.5,2.0,2.6,1.8,3});
                soluteManager.SetSolute("NO3",SoluteManager.SoluteSetterType.Fertiliser,new double[] {8.5,5.4,1.9,1.5,1.8,2.7,5});
            }
            else if ((IrrFactor == true) && (NitFactor == 0))
            {
                soluteManager.SetSolute("NH4",SoluteManager.SoluteSetterType.Fertiliser,new double[]{2.5,2.4,3.1,3.4,5.6,2.5,3});
                soluteManager.SetSolute("NO3",SoluteManager.SoluteSetterType.Fertiliser,new double[] {5.6,3.9,1.3,1.0,1.3,2.2,5});
            }
        }

        [EventSubscribe("DoManagement")]
        private void OnDoManagement(object sender, EventArgs e)
        {

            if (Clock.Today.Date == DateTime.Parse("02-Jun-2017"))
               SetSoilLayers();

        
            // Oats - Irrigation on dryland plots only, after harvest
            if (IrrFactor == false)
            {
                if ((Clock.Today.Date == DateTime.Parse("25-May-2017")) || (Clock.Today.Date == DateTime.Parse("26-May-2017")))
                    Irrigation.Apply(50.0);

                if (Clock.Today.Date == DateTime.Parse("29-May-2017"))
                if (NitFactor == 300)
                    Irrigation.Apply(64.0);

                if (Clock.Today.Date == DateTime.Parse("30-May-2017"))
                {
                    if (NitFactor == 0)
                        Irrigation.Apply(30.3);
                    if (NitFactor == 50)
                        Irrigation.Apply(51.0);
                }
            }

            // Oats - Irrigation on all 300N plots plus dryland 50N plots
            if (Clock.Today.Date == DateTime.Parse("13-Dec-2017"))
            {
                if (NitFactor == 300)
                    Irrigation.Apply(50.0);
                if ((NitFactor == 50) && (IrrFactor == false))
                    Irrigation.Apply(50.0);
            }

            // Oats - Fertiliser for irrigated plots only, on sowing
            if (Clock.Today.Date == DateTime.Parse("05-Jul-2017"))
            if (IrrFactor == true)
            {
                if (NitFactor == 0)
                    Fert.Apply(40, Models.Fertiliser.Types.UreaN, 10);
                if (NitFactor == 50)
                    Fert.Apply(85, Models.Fertiliser.Types.UreaN, 10);
                if (NitFactor == 300)
                    Fert.Apply(270, Models.Fertiliser.Types.UreaN, 10);
            }
        }
    }
}
```
              Manager LeafSize: same as Validation.New Zealand.RS_Oats_9899.Rainshelter.paddock.Manager folder.LeafSize
            MicroClimate: a_interception=0; b_interception=1; c_interception=0; d_interception=0; soil_albedo=0.3; SoilHeatFluxFraction=0.4; NightInterceptionFraction=0.5; ReferenceHeight=2
            Irrigation
            Fertiliser
            SurfaceOrganicMatter Surface Organic Matter: InitialResidueName=oat_stubble; InitialResidueType=oats; InitialResidueMass=1000; InitialStandingFraction=0.5; InitialCPR=0; InitialCNR=20; FractionFaecesAdded=0.5
            SoluteManager
            Soil: SoilType=Silt loam over sand; LocalName=Templeton; Site=RainShelter; NearestTown=Lincoln; Region=Plains; State=Canterbury; Country=New Zealand; Latitude=37.15; Longitude=172.28
              Memo Info
                # Soil Profile Description

                Templeton Silt Loam over sand, Typic Immature Pallic soil

                 Horizon  Depth (cm) Description
                 Ah         0-28     Very dark grayish brown (10YR 3/2); silt loam; no stones; moderately developed fine to medium blocky structure
                 Bw(f)     28-55     Dark yellowish brown (10YR 4/4); silt loam; no stones; weakly developed coarse to very coarse blocky structure
                 Bw(g)     55-95     Olive brown (2.5Y 4/4); fine sandy loam; no stones; apedal massive
                 2BC(g)    95-145    Olive brown (2.5Y 4/4); loamy sand;no stones; apedal single-grain
                 3BCg     145-153    Light yellowish brown (2.5Y 6/3); silt loam; no stones; apedal massive
                 4BCg     153-200+   Light yellowish brown (2.5Y 6/3); medium sand; no stones; apedal single-grain
                 ** 2BC(g) horizon contains a band of massive silt loam material between 115-130 cm

                Sampling layers:
                Layer  Depth (cm)
                 1	  0-15
                 2	 15-30
                 3	 30-60
                 4	 60-90
                 5	 90-120
                 6	120-150
                 7	150-180 -- Only for water
              Analysis: PHUnits=Water; BoronUnits=HotWater
                Thickness  Rocks  PH   ParticleSizeSand  ParticleSizeSilt  ParticleSizeClay
                200        0      6.1  15.6              60.4              24
                150        0      6.1  12.1              65.9              22
                200        0      6    21.3              63.7              15
                150        0      6    9.6               69.4              21
                200        0      6    74.9              18.1              7
                150        0      6    47.2              39.8              13
                200        0      6    32                58                10
                250        0      6    7.4               74.6              18
                300        0      6    14.7              69.3              16
              Water
                Thickness  BD    AirDry  LL15  DUL   SAT    KS
                150        1.27  0.1     0.1   0.32  0.48   2911.1
                150        1.38  0.15    0.1   0.31  0.47   711.9
                300        1.39  0.08    0.08  0.32  0.475  442.9
                300        1.45  0.14    0.14  0.37  0.44   171.9
                300        1.41  0.14    0.14  0.35  0.467  1973.9
                300        1.49  0.12    0.12  0.34  0.437  1483.6
                300        1.49  0.07    0.07  0.2   0.437  944
                SoilCrop OatsSoil: LL=[0.1, 0.1, 0.08, 0.14, 0.14, 0.12, 0.07]; KL=[0.1, 0.1, 0.05, 0.04, 0.03, 0.01, 0]; XF=[1, 1, 1, 1, 1, 1, 1]
              SoilWater: SummerDate=1-Nov; SummerU=6; SummerCona=2; WinterDate=1-Apr; WinterU=9; WinterCona=4.4; DiffusConst=0; DiffusSlope=0; Salb=0.23; CN2Bare=50; CNRed=20; CNCov=0.8; slope=0; discharge_width=0; catchment_area=0; max_pond=0; Thickness=[200, 150, 200, 150, 200, 150, 200, 250, 300]; SWCON=[0.9, 0.6, 0.6, 0.6, 0.546, 0.569, 0.533, 0.464, 0.541]; ResidueInterception=0
              SoilNitrogen: fom_type=[default, manure, mucuna, lablab, shemp, stable]; fract_carb=[0.2, 0.3, 0.54, 0.57, 0.45, 0]; fract_cell=[0.7, 0.3, 0.37, 0.37, 0.47, 0.1]; fract_lign=[0.1, 0.4, 0.09, 0.06, 0.08, 0.9]
              SoilOrganicMatter: RootCN=40; RootWt=1000; SoilCN=11; EnrACoeff=7.4; EnrBCoeff=0.2; OCUnits=Total
                Thickness  OC    FBiom  FInert
                200        3.4   0.06   0.2
                150        1.8   0.04   0.3
                200        0.3   0.012  0.85
                150        0.32  0.01   0.945
                200        0.14  0.01   0.983
                150        0.21  0.01   0.98
                200        0.2   0.01   0.99
                250        0.2   0.01   0.99
                300        0.17  0.01   0.99
              Sample Initial Soil Settings: NO3Units=kgha; NH4Units=kgha; SWUnits=Volumetric; OCUnits=Total; PHUnits=Water
                Thickness  NO3   NH4  SW
                150        18.9  2    0.3
                150        17.7  2.3  0.244
                300        4.2   4.1  0.25
                300        4.8   1.1  0.25
                300        4.5   0.9  0.264
                300        3.9   1.1  0.256
                300        3     1    0.162
                Memo ReadThisIfInitialSoilNisOfInterest
                  Initial soil N varied from treatment to treatment depending on the irrigation and N treatment of the previous fodder beet trial.  These treatment specific initial N contents are set in a manager scrip called "TreatmentSpecificActions", over writing what is set in this node
              CERESSoilTemperature
            Plant Oats: CropType=Wheat
            Report EnviroReport: EventNames=[Clock].DoReport
              VariableNames:
                [Clock].Today
                [Weather].MeanT
                [Weather].Radn
                [Weather].Rain
                [Irrigation].IrrigationApplied
                [Oats].Leaf.Fw
                ([Oats].Leaf.Transpiration + [Soil].SoilWater.Es + [MicroClimate].interception) as ET
                [MicroClimate].interception as Interception
                [Soil].SoilWater.Es as Evaporation
                [Soil].SoilWater.Drainage as Drainage
                [Soil].SoilWater.Runoff as Runoff
                sum([Soil].SoilWater.SWmm) as TotalSoilWater
                sum([Soil].SoilNitrogen.MineralisedN) as MineralisedN
                [Fertiliser].NitrogenApplied as FertiliserN
                sum([Soil].SoilNitrogen.Denitrification) as DenitrifiedN
                ([Soil].SoilWater.LeachUrea+[Soil].SoilWater.LeachNH4+[Soil].SoilWater.LeachNO3) as NLeached
                [SurfaceOrganicMatter].N as TotalSurfOMN
                sum([Soil].SoilNitrogen.FOMN) as TotalFOMN
                sum([Soil].SoilNitrogen.MicrobialN) as TotalMicrobialN
                sum([Soil].SoilNitrogen.HumicN) as TotalHumicN
                (sum([Soil].SoilNitrogen.NH4) + sum([Soil].SoilNitrogen.NO3)) as TotalSoilN
                sum([Soil].SoilNitrogen.urea) as TotalUrea
                sum([Soil].SoilNitrogen.NH4) as TotalNH4
                sum([Soil].SoilNitrogen.NO3) as TotalNO3
                [Soil].SoilNitrogen.oc
            Report DailyReport: EventNames=[Clock].DoReport
              VariableNames:
                [Clock].Today
                [Weather].MeanT
                [Soil].SoilWater.SW
                [Soil].SoilWater.SWmm
                sum([Soil].SoilWater.SWmm) as ProfileWater
                [SurfaceOrganicMatter].Wt
                sum([Soil].SoilNitrogen.NO3) as TotalSoilNitrogen
                [Oats].AboveGround.N
                [Oats].AboveGround.Wt
                [Oats].AboveGroundLive.N
                [Oats].AboveGroundLive.Wt
                [Oats].AboveGroundDead.N
                [Oats].AboveGroundDead.Wt
                [Oats].Arbitrator.DMDemand
                [Oats].Arbitrator.DM.TotalFixationSupply
                [Oats].Ear.N
                [Oats].Ear.Nconc
                [Oats].Ear.Wt
                [Oats].Grain.N
                [Oats].Grain.NConc
                [Oats].Grain.Number
                [Oats].Grain.Size
                [Oats].Grain.Wt
                [Oats].Grain.Live.Wt
                [Oats].Leaf.AppearedCohortNo
                [Oats].Leaf.CoverDead
                [Oats].Leaf.CoverGreen
                [Oats].Leaf.CoverTotal
                [Oats].Leaf.Dead.N
                [Oats].Leaf.Dead.NConc
                [Oats].Leaf.Dead.Wt
                [Oats].Leaf.DeadCohortNo
                [Oats].Leaf.SenescingCohortNo
                [Oats].Leaf.ExpandedCohortNo
                [Oats].Leaf.Fn
                [Oats].Leaf.Fw
                [Oats].Leaf.Height
                [Oats].Leaf.InitialisedCohortNo
                [Oats].Leaf.LAI
                [Oats].Leaf.Live.N
                [Oats].Leaf.Live.NConc
                [Oats].Leaf.Live.Wt
                [Oats].Leaf.SpecificArea
                [Oats].Leaf.Transpiration
                [Oats].Phenology.CurrentPhaseName
                [Oats].Phenology.CurrentStageName
                [Oats].Phenology.DailyVernalisation.Value()
                [Oats].Phenology.MeanTemp.Value()
                [Oats].Phenology.Photoperiod.Value()
                [Oats].Phenology.Stage
                [Oats].Phenology.ThermalTime.Value()
                [Oats].Phenology.ThermalTime.Value()
                [Oats].Phenology.Vrn1.Value()
                [Oats].Phenology.Vrn2.Value()
                [Oats].Phenology.Vrn4.Value()
                [Oats].Phenology.Zadok.Stage
                [Oats].Root.Depth
                [Oats].Root.N
                [Oats].Root.Wt
                [Oats].Root.Nconc
                [Oats].Root.WaterUptake
                [Oats].Panicle.N
                [Oats].Panicle.NConc
                [Oats].Panicle.Wt
                [Oats].Panicle.Live.StorageWt
                [Oats].Stem.N
                [Oats].Stem.NConc
                [Oats].Stem.Wt
                [Oats].Stem.PercentWSC
                [Oats].Stem.Live.StorageWt
                [Oats].StemPlusPanicle.Wt
                [Oats].StemPlusPanicle.N
                [Oats].SowingData.Cultivar
                [Oats].Structure.HaunStage.Value()TerminalSpikelet.Value()
                [Oats].Structure.HaunStage.Value()
                [Oats].Structure.Height
                [Oats].Structure.LeafTipsAppeared
                [Oats].Structure.FinalLeafNumber.Value()
                [Oats].Structure.FinalLeafNumber.ValueToHold.PhotoPLeaves.Value()
                [Oats].Structure.MainStemPopn
                [Oats].Structure.MeanTillerGrowthRate.Value()
                [Oats].Structure.TotalStemPopn
                [Oats].Total.N
                [Oats].Total.Wt
                [SurfaceOrganicMatter].Wt
                ([Oats].Leaf.Transpiration + [Soil].SoilWater.Es + [MicroClimate].interception) as ET
                sum([Soil].SoilNitrogen.NO3) as TotalSoilNitrogen
                [Oats].Phenology.FlagLeafDAS
                [Oats].Phenology.FloweringDAS
                [Oats].Phenology.MaturityDAS
                [Oats].Phenology.PhotoPeriod
                [Oats].Phenology.PhotoPeriodDeltaFunction
                [Oats].Phenology.Stage
                [Oats].Phenology.SoilTemperatureFunction.Value()
            Report HarvestReport
            Report SupReport: EventNames=[Clock].DoReport
              VariableNames:
                [Clock].Today
                [Phenology].ThermalTime.Value()
                [Leaf].CohortSize
                [Leaf].CohortParameters.MaxArea.Value()
                [Oats].Arbitrator.DMAllocated
                [Oats].Arbitrator.DMDemand
                [Oats].Arbitrator.DMNutrientLimitation
                [Oats].Arbitrator.DMSinkLimitation
                [Oats].Arbitrator.DM.TotalFixationSupply
                [Oats].Arbitrator.FN
                [Oats].Arbitrator.NDemand
                [Oats].Structure.Phyllochron
                [Oats].Leaf.CohortMaxSize
                [Oats].Leaf.CohortParameters.GrowthDuration.Value()
                [Oats].Leaf.CohortParameters.LagDuration.Value()
                [Oats].Leaf.CohortParameters.SenescenceDuration.Value()
                [Oats].Leaf.CohortParameters.SpecificLeafAreaMax.Value()
                [Oats].Leaf.CohortParameters.SpecificLeafAreaMin.Value()
                [Oats].Leaf.Photosynthesis.FT.Value()
                [Oats].Leaf.Photosynthesis.FVPD.Value()
                [Oats].Leaf.Photosynthesis.RueAct
                [Oats].Stem.DMDemands.Structural.DMDemandFunction.HightLimitedDMAccumulation.Value()
                [Oats].Stem.DMDemands.Structural.DMDemandFunction.PotentialDMAccumulation.Value()
                [Oats].Leaf.NextExpandingLeafProportion
                [Oats].Structure.MeanTillerGrowthRate.Value()
                [LeafSize].Script.LeafAppearedPosition
                [LeafSize].Script.MostRecentlyAppearedLeafMaxSize
                [LeafSize].Script.LeafExpandedPosition
                [LeafSize].Script.MostRecentlyExpandedLeafSize
                [Grain].AccumThermalTime.Value()
                [Oats].Panicle.HeadNumber.Value()
                [Oats].Grain.NumberFunction.Value()
    Folder Australia
      Memo
        The Oats model construction for Australian varieties was based primarily around the experiment at Gatton in 2007. Supporting phenology data was collected at the Leslie Research Centre (LRC) and Wellcamp Research Station for northern varieties, data kindly supplied by Bruce Winter, Oats Breeder with DAFQ. The model was then extended to data sets at Roma in QLD, and also sites in South Australia (Tarlee, Pinery) where additional adjustments were made to the relevant varieties.

        The Gatton, Roma, Tarlee, and Pinery experiments were used to construct the original APSIM Oats model and published at the Australian Agronomy Conference in 2008.

        Peake A, Whitbread A, Davoren B, Braun J and Limpus, S. (2008). The development of a model in APSIM for the simulation of grazing oats and oaten hay. In: Global Issues, Paddock Action. Proceedings of the 14th ASA Conference, 21-25 September 2008, Adelaide, South Australia.
      Folder Gatton2007
        Memo Experiment Description
          This experiment comprised an early and late sowing date, but full growth and soil water data was only collected for the early sowing date. The late sowing date was comprised of observation plots for phenology data collection only.

          Extinction coefficient and 'kl' values were measured on the early sowing date in addition to partitioned biomass data. Note that the kl values measured and used to simulated this irrigated trial were high, and may not apply to many dryland situations. Other simulations in the Australian validation data sets used the traditional wheat kl values for dryland situations.
        Folder Gatton2007early
          Experiment Gatton2007
            Factors
              Factor Cv: Specifications=[Operations]
                Operations Coolibah
                  2007-05-24  [Oats].Sow(population:95, cultivar:"Coolibah", depth:20, rowSpacing:250);
                Operations Taipan
                  2007-05-24  [Oats].Sow(population:104, cultivar:"Taipan", depth:20, rowSpacing:250);
            Simulation Gatton2007Base
              Clock: StartDate=2007-05-01; EndDate=2007-11-30
              Summary summaryfile
              Weather: FileName=Hybrid Gatton07 metfile.met
              SoilArbitrator Soil Arbitrator
              Zone paddock: Area=1; Slope=0
                Soil: Latitude=0; Longitude=0
                  Water
                    Thickness  BD    AirDry  LL15  DUL    SAT
                    150        1.37  0.11    0.15  0.394  0.445
                    150        1.29  0.15    0.19  0.325  0.45
                    300        1.4   0.18    0.22  0.432  0.47
                    300        1.47  0.19    0.22  0.363  0.43
                    300        1.37  0.19    0.22  0.34   0.43
                    SoilCrop OatsSoil: LL=[0.21, 0.2, 0.29, 0.295, 0.24]; KL=[0.15, 0.13, 0.07, 0.03, 0.03]; XF=[1, 1, 1, 1, 1]
                  SoilWater: SummerDate=1-Nov; SummerU=5; SummerCona=3; WinterDate=1-Apr; WinterU=5; WinterCona=3; DiffusConst=40; DiffusSlope=16; Salb=0.13; CN2Bare=78; CNRed=20; CNCov=0.8; max_pond=0; Thickness=[150, 150, 300, 300, 300, 300, 300]; SWCON=[0.5, 0.5, 0.5, 0.5, 0.5, 0.5, 0.5]; ResidueInterception=0
                  SoilNitrogen: fom_type=[default, manure, mucuna, lablab, shemp, stable]; fract_carb=[0.2, 0.3, 0.54, 0.57, 0.45, 0]; fract_cell=[0.7, 0.3, 0.37, 0.37, 0.47, 0.1]; fract_lign=[0.1, 0.4, 0.09, 0.06, 0.08, 0.9]
                  SoilOrganicMatter: RootCN=20; RootWt=500; SoilCN=14.5; EnrACoeff=7.4; EnrBCoeff=0.2; OCUnits=Total
                    Thickness  OC    FBiom  FInert
                    150        1.65  0.035  0.45
                    150        1.13  0.02   0.55
                    300        0.68  0.015  0.8
                    300        0.48  0.01   0.99
                    300        0.3   0.01   0.99
                    300        0.39  0.01   0.99
                    300        0.36  0.01   0.99
                  Analysis: Thickness=[150, 150, 300, 300, 300, 300, 300]; PH=[7.3, 7.1, 7.1, 7.1, 7.4, 7.8, 7.9]; PHUnits=Water; BoronUnits=HotWater
                  Sample Initial nitrogen: NO3Units=ppm; NH4Units=ppm; SWUnits=Volumetric; OCUnits=Total; PHUnits=Water
                    Thickness  NO3      NH4
                    150        22.6     0.300063
                    150        5.50005  0.300063
                    300        1.30001  0.300063
                    300        0        0
                    300        0        0
                    300        0        0
                    300        0        0
                  Sample Initial water: Thickness=[150, 150, 300, 300, 300, 300, 300]; SW=[0.26, 0.33, 0.35, 0.33, 0.26, 0.27, 0.3]; NO3Units=ppm; NH4Units=ppm; SWUnits=Volumetric; OCUnits=Total; PHUnits=Water
                  CERESSoilTemperature
                SoluteManager
                Irrigation
                SurfaceOrganicMatter Surface Organic Matter: InitialResidueName=wheat_stubble; InitialResidueType=wheat; InitialResidueMass=0; InitialStandingFraction=0; InitialCPR=0; InitialCNR=80; FractionFaecesAdded=0.5
                Fertiliser
                MicroClimate: a_interception=0; b_interception=1; c_interception=0; d_interception=0; soil_albedo=0.3; SoilHeatFluxFraction=0.4; NightInterceptionFraction=0.5; ReferenceHeight=2
                Plant Oats: CropType=Wheat
                Folder Management
                  Operations IrrigandFert
                    2007-05-18  [Irrigation].Apply(140);
                    2007-05-31  [Irrigation].Apply(15);
                    2007-07-12  [Irrigation].Apply(15);
                    2007-07-24  [Irrigation].Apply(29);
                    2007-08-14  [Irrigation].Apply(45);
                    2007-05-14  [Fertiliser].Apply(150, Fertiliser.Types.UreaN, 40);
                    2007-07-23  [Fertiliser].Apply(90, Fertiliser.Types.UreaN, 10);
                    2007-08-13  [Fertiliser].Apply(110, Fertiliser.Types.UreaN, 10);
                    Memo
                      Additional N added to create non limiting as test. Urea first application now 300
                  Operations
                  Manager Harvesting
                    script: same as in Validation.New Zealand.WinterSowing2015.ABlock.paddock.Manager folder.Harvesting
                Report DailyReport
                Report HarvestReport
                Report SupReport: EventNames=[Clock].DoReport
                  VariableNames:
                    [Clock].Today
                    [Phenology].ThermalTime.Value()
                    [Leaf].CohortSize
                    [Leaf].CohortParameters.MaxArea.Value()
                    [Oats].Arbitrator.DMAllocated
                    [Oats].Arbitrator.DMDemand
                    [Oats].Arbitrator.DMNutrientLimitation
                    [Oats].Arbitrator.DMSinkLimitation
                    [Oats].Arbitrator.DM.TotalFixationSupply
                    [Oats].Arbitrator.FN
                    [Oats].Arbitrator.NDemand
                    [Oats].Structure.Phyllochron
                    [Oats].Leaf.CohortMaxSize
                    [Oats].Leaf.CohortParameters.GrowthDuration.Value()
                    [Oats].Leaf.CohortParameters.LagDuration.Value()
                    [Oats].Leaf.CohortParameters.SenescenceDuration.Value()
                    [Oats].Leaf.CohortParameters.SpecificLeafAreaMax.Value()
                    [Oats].Leaf.CohortParameters.SpecificLeafAreaMin.Value()
                    [Oats].Leaf.Photosynthesis.FT.Value()
                    [Oats].Leaf.Photosynthesis.FVPD.Value()
                    [Oats].Leaf.Photosynthesis.RueAct
                    [Oats].Stem.DMDemands.Structural.DMDemandFunction.HightLimitedDMAccumulation.Value()
                    [Oats].Stem.DMDemands.Structural.DMDemandFunction.PotentialDMAccumulation.Value()
                    [Oats].Leaf.NextExpandingLeafProportion
                    [Oats].Structure.MeanTillerGrowthRate.Value()
                    sum([Soil].SoilWater.SWmm[1:5]) as ProfileWater
          Memo Leaf Rust after anthesis
            Field notes recorded leaf rust becoming severe in Coolibah on 12/9/07 - no biomass cuts were taken after this
        Folder Gatton2007LATEsown
          Experiment Gatton2007Late
            Memo Experiment Description
              The late sown experiment at Gatton in 2007 was comprised of observation plots of the two varieties used in the early sowing date. 4 plants were monitored for phenology (Leaf Appearance Rate and Zadoks stage) from each observation plot.
            Factors
              Factor Cv: Specifications=[Operations]
                Operations CoolibahLate
                  2007-06-22  [Oats].Sow(population:95, cultivar:"Coolibah", depth:20, rowSpacing:250);
                Operations TaipanLate
                  2007-06-22  [Oats].Sow(population:104, cultivar:"Taipan", depth:20, rowSpacing:250);
            Simulation Gatton2007BaseLate: same as Validation.Australia.Gatton2007.Gatton2007early.Gatton2007.Gatton2007Base
      Folder Wellcamp2006
        Memo
          This experiment was run at DPI Wellcamp Research Station, Queensland in 2006.
          Phenology data (Zadok stage) was the only data collected.

          This experiment was a phenology experiment based on small and narrow observation plots (4 rows) in conjunction with a QDAF Oats breeing trial. The decision was taken to use a nearby SILO met-data set rather than the onsite weather station, due to the possibility that the onsite met station had not been calibrated for some time.
        Experiment Wellcamp2006
          Factors
            Factor Cv: Specifications=[Sowing]
              Operations Coolibah
                2006-04-03  [Oats].Sow(population:100, cultivar:"Coolibah", depth:30, rowSpacing:250);
              Operations Taipan
                2006-04-03  [Oats].Sow(population:100, cultivar:"Taipan", depth:30, rowSpacing:250);
              Operations Algerian
                2006-04-03  [Oats].Sow(population:100, cultivar:"Algerian", depth:30, rowSpacing:250);
              Operations Nugene
                2006-04-03  [Oats].Sow(population:100, cultivar:"Nugene", depth:30, rowSpacing:250);
              Operations Drover
                2006-04-03  [Oats].Sow(population:100, cultivar:"Drover", depth:30, rowSpacing:250);
            Factor Cut: Specifications=[Cutting]
              Manager None
```csharp
using System;
using System.Collections.Generic;
using Models.Core;
using Models.PMF;
using Models.PMF.Interfaces;
using System.Xml.Serialization;

namespace Models
{
    [Serializable] 
    [System.Xml.Serialization.XmlInclude(typeof(Model))]
    public class Script : Model
    {
        
    }
}
```
              Manager One
                CutDate = 2006-08-10
```csharp
using System;
using System.Collections.Generic;
using Models.Core;
using Models.PMF;
using Models.PMF.Interfaces;
using System.Xml.Serialization;

namespace Models
{
    [Serializable] 
    [System.Xml.Serialization.XmlInclude(typeof(Model))]
    public class Script : Model
    {
        [Link] Plant Oats;
        [Link] Clock Clock;

        [Description("Cut Date")]
        public DateTime CutDate { get; set; }

        [XmlIgnore] private RemovalFractions Remove { get; set; }
        
        [EventSubscribe("Commencing")]
        private void OnSimulationCommencing(object sender, EventArgs e)
        {
            Remove = new RemovalFractions();
        }
        
        [EventSubscribe("DoManagement")]
        private void OnDoManagement(object sender, EventArgs e)
        {
            //Set up  array of remove fractions to send with Cut method.  Each member in the array corresponds to an organ in the same order they are set up in.
            if (Clock.Today.Date == CutDate)
            {
                //Remove.SetPhenologyStage = 3.5;
                Remove.SetFractionToRemove("Panicle", 1.0);
                Remove.SetFractionToResidue("Panicle", 0.0);
                Remove.SetFractionToRemove("Leaf", 0.8);
                Remove.SetFractionToResidue("Leaf", 0.0);
                Remove.SetFractionToRemove("Stem", 0.8);
                Remove.SetFractionToResidue("Stem", 0.0);
                Remove.SetFractionToRemove("Grain", 1.0);
                Remove.SetFractionToResidue("Grain", 0.0);
                Remove.SetFractionToRemove("Root", 0.0);
                Remove.SetFractionToResidue("Root", 0.0);
                Oats.RemoveBiomass("Cut", Remove);
            }
        }
    }
}
```
              Manager Two
                CutDate1 = 2006-08-10
                CutDate2 = 2006-09-04
```csharp
using System;
using System.Collections.Generic;
using Models.Core;
using Models.PMF;
using Models.PMF.Interfaces;
using System.Xml.Serialization;

namespace Models
{
    [Serializable] 
    [System.Xml.Serialization.XmlInclude(typeof(Model))]
    public class Script : Model
    {
        [Link] Plant Oats;
        [Link] Clock Clock;

        [Description("Cut Date1")]
        public DateTime CutDate1 { get; set; }
        [Description("Cut Date2")]
        public DateTime CutDate2 { get; set; }

        [XmlIgnore] private RemovalFractions Remove { get; set; }
        
        [EventSubscribe("Commencing")]
        private void OnSimulationCommencing(object sender, EventArgs e)
        {
            Remove = new RemovalFractions();
        }
        
        [EventSubscribe("DoManagement")]
        private void OnDoManagement(object sender, EventArgs e)
        {
            //Set up  array of remove fractions to send with Cut method.  Each member in the array corresponds to an organ in the same order they are set up in.
            if (Clock.Today.Date == CutDate1)
            {
                //Remove.SetPhenologyStage = 3.5;
                Remove.SetFractionToRemove("Panicle", 1.0);
                Remove.SetFractionToResidue("Panicle", 0.0);
                Remove.SetFractionToRemove("Leaf", 0.8);
                Remove.SetFractionToResidue("Leaf", 0.0);
                Remove.SetFractionToRemove("Stem", 0.8);
                Remove.SetFractionToResidue("Stem", 0.0);
                Remove.SetFractionToRemove("Grain", 1.0);
                Remove.SetFractionToResidue("Grain", 0.0);
                Remove.SetFractionToRemove("Root", 0.0);
                Remove.SetFractionToResidue("Root", 0.0);
                Oats.RemoveBiomass("Cut", Remove);
            }
            if (Clock.Today.Date == CutDate2)
            {
                //Remove.SetPhenologyStage = 3.5;
                Remove.SetFractionToRemove("Panicle", 1.0);
                Remove.SetFractionToResidue("Panicle", 0.0);
                Remove.SetFractionToRemove("Leaf", 0.8);
                Remove.SetFractionToResidue("Leaf", 0.0);
                Remove.SetFractionToRemove("Stem", 0.8);
                Remove.SetFractionToResidue("Stem", 0.0);
                Remove.SetFractionToRemove("Grain", 1.0);
                Remove.SetFractionToResidue("Grain", 0.0);
                Remove.SetFractionToRemove("Root", 0.0);
                Remove.SetFractionToResidue("Root", 0.0);
                Oats.RemoveBiomass("Cut", Remove);
            }
        }
    }
}
```
          Simulation Wellcamp2006Base
            Clock: StartDate=2006-02-25; EndDate=2006-11-02
            Summary summaryfile
            Weather: FileName=cotswald hills moyola 2006.met
            SoilArbitrator Soil Arbitrator
            Zone paddock: Area=1; Slope=0
              Soil: Latitude=0; Longitude=0
                Water
                  Thickness  BD    AirDry  LL15  DUL   SAT
                  150        0.9   0.11    0.22  0.52  0.59
                  150        1.01  0.306   0.34  0.53  0.59
                  300        1.02  0.3     0.38  0.54  0.59
                  300        1     0.3     0.36  0.54  0.59
                  300        1.06  0.3     0.4   0.52  0.57
                  300        1.14  0.3     0.36  0.49  0.54
                  300        1.23  0.3     0.38  0.46  0.51
                  SoilCrop WheatSoil: LL=[0.22, 0.34, 0.38, 0.36, 0.4, 0.36, 0.46]; KL=[0.1, 0.1, 0.08, 0.06, 0.04, 0.02, 0.01]; XF=[1, 1, 1, 1, 1, 1, 1]
                  SoilCrop OatsSoil: LL=[0.34, 0.34, 0.38, 0.36, 0.4, 0.36, 0.46]; KL=[0.06, 0.06, 0.04, 0.04, 0.02, 0.02, 0.01]; XF=[1, 1, 1, 1, 1, 1, 1]
                SoilWater: SummerDate=1-Nov; SummerU=6; SummerCona=3.5; WinterDate=1-Apr; WinterU=6; WinterCona=3.5; DiffusConst=40; DiffusSlope=16; Salb=0.13; CN2Bare=73; CNRed=20; CNCov=0.8; max_pond=0; Thickness=[150, 150, 300, 300, 300, 300, 300]; SWCON=[0.3, 0.3, 0.3, 0.3, 0.3, 0.3, 0.3]; ResidueInterception=0
                SoilNitrogen: fom_type=[default, manure, mucuna, lablab, shemp, stable]; fract_carb=[0.2, 0.3, 0.54, 0.57, 0.45, 0]; fract_cell=[0.7, 0.3, 0.37, 0.37, 0.47, 0.1]; fract_lign=[0.1, 0.4, 0.09, 0.06, 0.08, 0.9]
                SoilOrganicMatter: RootCN=40; RootWt=200; SoilCN=12.5; EnrACoeff=7.4; EnrBCoeff=0.2; OCUnits=Total
                  Thickness  OC    FBiom  FInert
                  150        1.24  0.03   0.4
                  150        1.24  0.02   0.6
                  300        1.25  0.01   0.8
                  300        1.1   0.01   0.9
                  300        0.71  0.01   0.95
                  300        0.34  0.01   0.95
                  300        0.26  0.01   0.95
                Analysis: Thickness=[150, 150, 300, 300, 300, 300, 300]; PH=[7, 7, 7, 7, 7, 7, 7]; PHUnits=Water; BoronUnits=HotWater
                Sample Initial nitrogen: NO3Units=ppm; NH4Units=ppm; SWUnits=Volumetric; OCUnits=Total; PHUnits=Water
                  Thickness  NO3   NH4
                  150        26.8  0.6
                  150        6.6   0.1
                  300        5.8   0.1
                  300        10.2  0.1
                  300        12.9  0.1
                  300        11.6  0.1
                  300        11.6  0.1
                Sample Initial water: Thickness=[150, 150, 300, 300, 300, 300, 300]; SW=[0.38, 0.46, 0.42, 0.37, 0.33, 0.35, 0.35]; NO3Units=ppm; NH4Units=ppm; SWUnits=Volumetric; OCUnits=Total; PHUnits=Water
                CERESSoilTemperature
              SoluteManager
              Irrigation
              SurfaceOrganicMatter Surface Organic Matter: InitialResidueName=wheat_stubble; InitialResidueType=wheat; InitialResidueMass=0; InitialStandingFraction=0; InitialCPR=0; InitialCNR=80; FractionFaecesAdded=0.5
              Fertiliser
              MicroClimate: a_interception=0; b_interception=1; c_interception=0; d_interception=0; soil_albedo=0.3; SoilHeatFluxFraction=0.4; NightInterceptionFraction=0.5; ReferenceHeight=2
              Plant Oats: CropType=Wheat
              Folder Management
                Manager Cutting
                  script: same as in Validation.Australia.Wellcamp2006.Wellcamp2006.Factors.Cut.None
                Operations IrrigandFert
                  2006-04-03  [Fertiliser].Apply(35, Fertiliser.Types.NO3N, 20);
                  2006-05-10  [Irrigation].Apply(40);
                  2006-08-15  [Fertiliser].Apply(40, Fertiliser.Types.NO3N, 10);
                  2006-06-05  [Irrigation].Apply(60);
                Operations Sowing
                Manager Harvesting
                  script: same as in Validation.New Zealand.WinterSowing2015.ABlock.paddock.Manager folder.Harvesting
              Report DailyReport
              Report HarvestReport
              Report SupReport: EventNames=[Clock].DoReport
                VariableNames:
                  [Clock].Today
                  [Phenology].ThermalTime.Value()
                  [Leaf].CohortSize
                  [Leaf].CohortParameters.MaxArea.Value()
                  [Oats].Arbitrator.DMAllocated
                  [Oats].Arbitrator.DMDemand
                  [Oats].Arbitrator.DMNutrientLimitation
                  [Oats].Arbitrator.DMSinkLimitation
                  [Oats].Arbitrator.DM.TotalFixationSupply
                  [Oats].Arbitrator.FN
                  [Oats].Arbitrator.NDemand
                  [Oats].Structure.Phyllochron
                  [Oats].Leaf.CohortMaxSize
                  [Oats].Leaf.CohortParameters.GrowthDuration.Value()
                  [Oats].Leaf.CohortParameters.LagDuration.Value()
                  [Oats].Leaf.CohortParameters.SenescenceDuration.Value()
                  [Oats].Leaf.CohortParameters.SpecificLeafAreaMax.Value()
                  [Oats].Leaf.CohortParameters.SpecificLeafAreaMin.Value()
                  [Oats].Leaf.Photosynthesis.FT.Value()
                  [Oats].Leaf.Photosynthesis.FVPD.Value()
                  [Oats].Leaf.Photosynthesis.RueAct
                  [Oats].Stem.DMDemands.Structural.DMDemandFunction.HightLimitedDMAccumulation.Value()
                  [Oats].Stem.DMDemands.Structural.DMDemandFunction.PotentialDMAccumulation.Value()
                  [Oats].Leaf.NextExpandingLeafProportion
                  [Oats].Structure.MeanTillerGrowthRate.Value()
                  sum([Soil].SoilWater.SWmm[1:7]) as ProfileWater
      Folder Roma2006
        Memo
          This experiment was run at Roma Research Station, Queensland in 2006.
           Two reps were used to generate cut and regrowth data (two cuts taken).
          The third rep was split in two, and one half was used to allow unlimited growth (no cutting), and the other half was only cut once. Soil water data for the ungrazed treatment was sourced exclusively from rep 3 except for the sowing PAW which was measured bulked across the experiment.

          Inaccuracy in the prediction of SLA and LAI was probably due to measurement error. The trial was heavily water stressed and it was difficult to accurately measure leaf area of curled, drought stress leaves, particularly when they were stored overnight.
        Experiment Roma2006
          Factors
            Factor Cv: Specifications=[Sowing]
              Operations Coolibah
                2006-05-25  [Oats].Sow(population:129, cultivar:"Coolibah", depth:30, rowSpacing:250);
              Operations Taipan
                2006-05-25  [Oats].Sow(population:123, cultivar:"Taipan", depth:30, rowSpacing:250);
              Operations Algerian
                2006-05-25  [Oats].Sow(population:105, cultivar:"Algerian", depth:30, rowSpacing:250);
            Factor Cut: Specifications=[Cutting]
              Manager None
                script: same as in Validation.Australia.Wellcamp2006.Wellcamp2006.Factors.Cut.None
              Manager One
                CutDate = 2006-08-10
```csharp
using System;
using System.Collections.Generic;
using Models.Core;
using Models.PMF;
using Models.PMF.Interfaces;
using System.Xml.Serialization;

namespace Models
{
    [Serializable] 
    [System.Xml.Serialization.XmlInclude(typeof(Model))]
    public class Script : Model
    {
        [Link] Plant Oats;
        [Link] Clock Clock;

        [Description("Cut Date")]
        public DateTime CutDate { get; set; }

        [XmlIgnore] private RemovalFractions Remove { get; set; }
        
        [EventSubscribe("Commencing")]
        private void OnSimulationCommencing(object sender, EventArgs e)
        {
            Remove = new RemovalFractions();
        }
        
        [EventSubscribe("DoManagement")]
        private void OnDoManagement(object sender, EventArgs e)
        {
            //Set up  array of remove fractions to send with Cut method.  Each member in the array corresponds to an organ in the same order they are set up in.
            if (Clock.Today.Date == CutDate)
            {
                //Remove.SetPhenologyStage = 3.5;
                Remove.SetFractionToRemove("Panicle", 1.0);
                Remove.SetFractionToResidue("Panicle", 0.0);
                Remove.SetFractionToRemove("Leaf", 0.7);
                Remove.SetFractionToResidue("Leaf", 0.0);
                Remove.SetFractionToRemove("Stem", 0.7);
                Remove.SetFractionToResidue("Stem", 0.0);
                Remove.SetFractionToRemove("Grain", 1.0);
                Remove.SetFractionToResidue("Grain", 0.0);
                Remove.SetFractionToRemove("Root", 0.0);
                Remove.SetFractionToResidue("Root", 0.0);
                Oats.RemoveBiomass("Cut", Remove);
            }
        }
    }
}
```
              Manager Two
                CutDate1 = 2006-08-10
                CutDate2 = 2006-09-04
```csharp
using System;
using System.Collections.Generic;
using Models.Core;
using Models.PMF;
using Models.PMF.Interfaces;
using System.Xml.Serialization;

namespace Models
{
    [Serializable] 
    [System.Xml.Serialization.XmlInclude(typeof(Model))]
    public class Script : Model
    {
        [Link] Plant Oats;
        [Link] Clock Clock;

        [Description("Cut Date1")]
        public DateTime CutDate1 { get; set; }
        [Description("Cut Date2")]
        public DateTime CutDate2 { get; set; }

        [XmlIgnore] private RemovalFractions Remove { get; set; }
        
        [EventSubscribe("Commencing")]
        private void OnSimulationCommencing(object sender, EventArgs e)
        {
            Remove = new RemovalFractions();
        }
        
        [EventSubscribe("DoManagement")]
        private void OnDoManagement(object sender, EventArgs e)
        {
            //Set up  array of remove fractions to send with Cut method.  Each member in the array corresponds to an organ in the same order they are set up in.
            if (Clock.Today.Date == CutDate1)
            {
                //Remove.SetPhenologyStage = 3.5;
                Remove.SetFractionToRemove("Panicle", 1.0);
                Remove.SetFractionToResidue("Panicle", 0.0);
                Remove.SetFractionToRemove("Leaf", 0.7);
                Remove.SetFractionToResidue("Leaf", 0.0);
                Remove.SetFractionToRemove("Stem", 0.7);
                Remove.SetFractionToResidue("Stem", 0.0);
                Remove.SetFractionToRemove("Grain", 1.0);
                Remove.SetFractionToResidue("Grain", 0.0);
                Remove.SetFractionToRemove("Root", 0.0);
                Remove.SetFractionToResidue("Root", 0.0);
                Oats.RemoveBiomass("Cut", Remove);
            }
            if (Clock.Today.Date == CutDate2)
            {
                //Remove.SetPhenologyStage = 3.5;
                Remove.SetFractionToRemove("Panicle", 1.0);
                Remove.SetFractionToResidue("Panicle", 0.0);
                Remove.SetFractionToRemove("Leaf", 0.7);
                Remove.SetFractionToResidue("Leaf", 0.0);
                Remove.SetFractionToRemove("Stem", 0.7);
                Remove.SetFractionToResidue("Stem", 0.0);
                Remove.SetFractionToRemove("Grain", 1.0);
                Remove.SetFractionToResidue("Grain", 0.0);
                Remove.SetFractionToRemove("Root", 0.0);
                Remove.SetFractionToResidue("Root", 0.0);
                Oats.RemoveBiomass("Cut", Remove);
            }
        }
    }
}
```
          Simulation Roma2006Base
            Clock: StartDate=2006-05-24; EndDate=2006-11-20
            Summary summaryfile
            Weather: FileName=Roma2006.met
            Zone paddock: Area=1; Slope=0
              Soil: Latitude=0; Longitude=0
                Water
                  Thickness  BD    AirDry  LL15  DUL    SAT
                  150        1.25  0.11    0.19  0.4    0.45
                  150        1.33  0.15    0.19  0.389  0.44
                  300        1.32  0.18    0.21  0.422  0.47
                  300        1.47  0.19    0.22  0.317  0.4
                  300        1.52  0.19    0.22  0.332  0.38
                  300        1.55  0.19    0.22  0.33   0.38
                  SoilCrop OatsSoil: LL=[0.2, 0.2, 0.21, 0.26, 0.29, 0.3]; KL=[0.06, 0.05, 0.04, 0.03, 0.02, 0.02]; XF=[1, 1, 0.5, 0.2, 0.2, 0.2]
                SoilWater: SummerDate=1-Nov; SummerU=2; SummerCona=2; WinterDate=1-Apr; WinterU=2; WinterCona=2; DiffusConst=40; DiffusSlope=16; Salb=0.13; CN2Bare=78; CNRed=20; CNCov=0.8; max_pond=0; Thickness=[150, 150, 300, 300, 300, 300]; SWCON=[0.3, 0.3, 0.3, 0.5, 0.5, 0.5]; ResidueInterception=0
                SoilNitrogen: fom_type=[default, manure, mucuna, lablab, shemp, stable]; fract_carb=[0.2, 0.3, 0.54, 0.57, 0.45, 0]; fract_cell=[0.7, 0.3, 0.37, 0.37, 0.47, 0.1]; fract_lign=[0.1, 0.4, 0.09, 0.06, 0.08, 0.9]
                SoilOrganicMatter: RootCN=20; RootWt=500; SoilCN=14.5; EnrACoeff=7.4; EnrBCoeff=0.2; OCUnits=Total
                  Thickness  OC    FBiom  FInert
                  150        1.46  0.035  0.45
                  150        0.7   0.02   0.55
                  300        0.3   0.015  0.8
                  300        0.15  0.01   0.99
                  300        0.05  0.01   0.99
                  300        0.05  0.01   0.99
                Analysis: Thickness=[150, 150, 300, 300, 300, 300]; PH=[7.2, 7.9, 7.9, 7.3, 7.1, 7.1]; PHUnits=Water; BoronUnits=HotWater
                Sample Initial nitrogen: NO3Units=ppm; NH4Units=ppm; SWUnits=Volumetric; OCUnits=Total; PHUnits=Water
                  Thickness  NO3   NH4
                  150        16.1  0.3
                  150        21.7  0.3
                  300        24.3  0.3
                  300        13.3  0.3
                  300        7.9   0.3
                  300        7.9   0.5
                Sample Initial water: Thickness=[150, 150, 300, 300, 300, 300]; SW=[0.327, 0.333, 0.333, 0.262, 0.286, 0.29]; NO3Units=ppm; NH4Units=ppm; SWUnits=Volumetric; OCUnits=Total; PHUnits=Water
                CERESSoilTemperature
              SoluteManager
              Irrigation
              SurfaceOrganicMatter Surface Organic Matter: InitialResidueName=wheat_stubble; InitialResidueType=wheat; InitialResidueMass=0; InitialStandingFraction=0; InitialCPR=0; InitialCNR=80; FractionFaecesAdded=0.5
              Fertiliser
              MicroClimate: a_interception=0; b_interception=1; c_interception=0; d_interception=0; soil_albedo=0.3; SoilHeatFluxFraction=0.4; NightInterceptionFraction=0.5; ReferenceHeight=2
              Plant Oats: CropType=Wheat
              Folder Management
                Manager Cutting
                  script: same as in Validation.Australia.Wellcamp2006.Wellcamp2006.Factors.Cut.None
                Operations IrrigandFert
                  2006-05-25  [Fertiliser].Apply(35, Fertiliser.Types.NO3N, 20);
                  2006-05-29  [Irrigation].Apply(10);
                  2006-06-05  [Irrigation].Apply(10);
                  2006-08-15  [Fertiliser].Apply(40, Fertiliser.Types.NO3N, 10);
                  2006-06-05  [Irrigation].Apply(60);
                Operations Sowing
                Manager Harvesting
                  script: same as in Validation.New Zealand.WinterSowing2015.ABlock.paddock.Manager folder.Harvesting
              Report DailyReport
              Report HarvestReport
              Report SupReport: same as Validation.Australia.Gatton2007.Gatton2007early.Gatton2007.Gatton2007Base.paddock.SupReport
            SoilArbitrator Soil Arbitrator
      Folder Tarlee2007
        Memo
          This experiment was run at Tarlee, South Australia, in 2007. Leaf disease (probably yellow spot) was observed to take hold in the latter stages of the experiment that may explain differences between observed and simulated LAI, leaf biomass and dead leaf biomass toward the end of the experiment.
        Experiment Tarlee2007
          Factors
            Factor AgRegime: Specifications=[Operations]
              Operations HighInput
                2007-05-30  [Fertiliser].Apply(100, Fertiliser.Types.UreaN, 10);
                2007-08-27  [Irrigation].Apply(62);
                2007-09-17  [Irrigation].Apply(62);
              Operations LowInput
                2007-05-30  [Fertiliser].Apply(50, Fertiliser.Types.UreaN, 10);
          Simulation Tarlee2007Base
            Clock: StartDate=2007-05-03; EndDate=2007-11-30
            Summary summaryfile
            Weather: FileName=MNHRZ_onsite_metdata07.met
            Zone paddock: Area=1; Slope=0
              Soil: SoilType=Clay Loam over Medium Clay; Site=Tarlee (TDS); NearestTown=Giles Corner; Region=Mid-north; State=South Australia; Latitude=-34.2367; Longitude=138.741; LocationAccuracy=+-20m; DataSource=University of Adelaide, Roseworthy
                Water
                  Thickness  BD     AirDry  LL15   DUL    SAT
                  100        1.342  0.093   0.15   0.371  0.463
                  200        1.348  0.147   0.184  0.367  0.461
                  250        1.342  0.15    0.18   0.414  0.464
                  250        1.48   0.15    0.2    0.403  0.436
                  300        1.58   0.15    0.21   0.363  0.398
                  400        1.56   0.15    0.22   0.371  0.406
                  300        1.56   0.15    0.22   0.371  0.406
                  SoilCrop WheatSoil: LL=[0.186, 0.184, 0.228, 0.251, 0.261, 0.285, 0.285]; KL=[0.06, 0.06, 0.06, 0.04, 0.04, 0.02, 0.02]; XF=[1, 1, 1, 1, 1, 1, 1]
                  SoilCrop BarleySoil: LL=[0.186, 0.184, 0.228, 0.251, 0.261, 0.285, 0.285]; KL=[0.07, 0.07, 0.07, 0.05, 0.05, 0.03, 0.03]; XF=[1, 1, 1, 1, 1, 1, 1]
                  SoilCrop OatsSoil: LL=[0.15, 0.174, 0.216, 0.257, 0.263, 0.263, 0.263]; KL=[0.1, 0.1, 0.07, 0.07, 0.04, 0.03, 0.03]; XF=[1, 1, 1, 1, 1, 1, 1]
                  SoilCrop VetchSoil: LL=[0.186, 0.184, 0.216, 0.223, 0.237, 0.24, 0.24]; KL=[0.06, 0.06, 0.06, 0.04, 0.04, 0.02, 0.02]; XF=[1, 1, 1, 1, 1, 1, 1]
                SoilWater: SummerDate=1-Nov; SummerU=6; SummerCona=3.5; WinterDate=1-Apr; WinterU=2; WinterCona=2; DiffusConst=60; DiffusSlope=20; Salb=0.13; CN2Bare=73; CNRed=20; CNCov=0.8; max_pond=0; Thickness=[100, 200, 250, 250, 300, 400, 300]; SWCON=[0.5, 0.5, 0.5, 0.5, 0.5, 0.5, 0.5]; ResidueInterception=0
                SoilNitrogen: fom_type=[default, manure, mucuna, lablab, shemp, stable]; fract_carb=[0.2, 0.3, 0.54, 0.57, 0.45, 0]; fract_cell=[0.7, 0.3, 0.37, 0.37, 0.47, 0.1]; fract_lign=[0.1, 0.4, 0.09, 0.06, 0.08, 0.9]
                SoilOrganicMatter: RootCN=40; RootWt=1000; SoilCN=12; EnrACoeff=7.4; EnrBCoeff=0.2; OCUnits=Total
                  Thickness  OC    FBiom  FInert
                  100        1.56  0.04   0.4
                  200        0.74  0.02   0.5
                  250        0.48  0.02   0.7
                  250        0.2   0.02   1
                  300        0.13  0.01   1
                  400        0.13  0.01   1
                  300        0.13  0.01   1
                Analysis: Thickness=[100, 200, 250, 250, 300, 400, 300]; PH=[7.2, 7.4, 8.1, 9, 9.3, 9.3, 9.3]; PHUnits=Water; BoronUnits=HotWater
                Sample Initial nitrogen: NO3Units=ppm; NH4Units=ppm; SWUnits=Volumetric; OCUnits=Total; PHUnits=Water
                  Thickness  NO3       NH4
                  100        15.0001   1.00004
                  200        11        1.99998
                  250        8.00003   1.00004
                  250        4.39999   0.999998
                  300        2         0.0999905
                  400        0.999999  0.0999905
                  300        1         0.1
                Sample Initial water: Thickness=[100, 200, 250, 250, 300, 400, 300]; SW=[0.22, 0.23, 0.255, 0.3, 0.332, 0.328, 0.328]; NO3Units=ppm; NH4Units=ppm; SWUnits=Volumetric; OCUnits=Total; PHUnits=Water
                CERESSoilTemperature
              SoluteManager
              Irrigation
              SurfaceOrganicMatter Surface Organic Matter: InitialResidueName=wheat_stubble; InitialResidueType=wheat; InitialResidueMass=0; InitialStandingFraction=0; InitialCPR=0; InitialCNR=80; FractionFaecesAdded=0.5
              Fertiliser
              MicroClimate: a_interception=0; b_interception=1; c_interception=0; d_interception=0; soil_albedo=0.3; SoilHeatFluxFraction=0.4; NightInterceptionFraction=0.5; ReferenceHeight=2
              Plant Oats: CropType=Wheat
              Folder Management
                Operations Sowing
                  2007-05-11  [Oats].Sow(population:200, cultivar:"Wintaroo", depth:30, rowSpacing:250);
                Operations
                Operations Harverst
                  2007-11-17  [Oats].Harvest()
              Report DailyReport
              Report HarvestReport
              Report SupReport: EventNames=[Clock].DoReport
                VariableNames:
                  [Clock].Today
                  [Phenology].ThermalTime.Value()
                  [Leaf].CohortSize
                  [Leaf].CohortParameters.MaxArea.Value()
                  [Oats].Arbitrator.DMAllocated
                  [Oats].Arbitrator.DMDemand
                  [Oats].Arbitrator.DMNutrientLimitation
                  [Oats].Arbitrator.DMSinkLimitation
                  [Oats].Arbitrator.DM.TotalFixationSupply
                  [Oats].Arbitrator.FN
                  [Oats].Arbitrator.NDemand
                  [Oats].Structure.Phyllochron
                  [Oats].Leaf.CohortMaxSize
                  [Oats].Leaf.CohortParameters.GrowthDuration.Value()
                  [Oats].Leaf.CohortParameters.LagDuration.Value()
                  [Oats].Leaf.CohortParameters.SenescenceDuration.Value()
                  [Oats].Leaf.CohortParameters.SpecificLeafAreaMax.Value()
                  [Oats].Leaf.CohortParameters.SpecificLeafAreaMin.Value()
                  [Oats].Leaf.Photosynthesis.FT.Value()
                  [Oats].Leaf.Photosynthesis.FVPD.Value()
                  [Oats].Leaf.Photosynthesis.RueAct
                  [Oats].Stem.DMDemands.Structural.DMDemandFunction.HightLimitedDMAccumulation.Value()
                  [Oats].Stem.DMDemands.Structural.DMDemandFunction.PotentialDMAccumulation.Value()
                  [Oats].Leaf.NextExpandingLeafProportion
                  [Oats].Structure.MeanTillerGrowthRate.Value()
                  sum([Soil].SoilWater.SWmm[1:6]) as ProfileWater
            SoilArbitrator Soil Arbitrator
      Folder LRCphenology
        Memo
          These simulations were used to develop phenology parameters for a range of cultivars used in northern Australia. Observed data was kindly supplied by Bruce Winter (Oats Breeder) and Richard Uebergang from experiments conducted at DAFQ Leslie Research Centre, Holberton St Toowoomba. SILO weather data from the nearby Toowoomba Airport was used. Approximated irrigation data and fertiliser regime was provided by LRC staff who managed the phenology screening trials to be non-water and N limiting.
        Experiment LRC2011
          Factors
            Factor Cv
              Specifications=[SowAndCut].Script.Cultivar = Algerian, Nugene, Drover, Genie
            Factor Management: Specifications=[SowAndCut].Script.Management = 1 to 3 step 1
          Simulation LRC2011Base
            Clock: StartDate=2011-02-01; EndDate=2011-12-31
            Summary summaryfile
            Weather: FileName=Toowoomba_AP.met
            SoilArbitrator Soil Arbitrator
            Zone paddock: Area=1; Slope=0
              Soil: same as Validation.Australia.Wellcamp2006.Wellcamp2006.Wellcamp2006Base.paddock.Soil
              SoluteManager
              Irrigation
              SurfaceOrganicMatter Surface Organic Matter: InitialResidueName=wheat_stubble; InitialResidueType=wheat; InitialResidueMass=0; InitialStandingFraction=0; InitialCPR=0; InitialCNR=80; FractionFaecesAdded=0.5
              Fertiliser
              MicroClimate: a_interception=0; b_interception=1; c_interception=0; d_interception=0; soil_albedo=0.3; SoilHeatFluxFraction=0.4; NightInterceptionFraction=0.5; ReferenceHeight=2
              Plant Oats: CropType=Wheat
              Folder Management
                Operations IrrigandFert
                  2011-04-03  [Fertiliser].Apply(35, Fertiliser.Types.NO3N, 20);
                  2011-04-01  [Irrigation].Apply(40);
                  2011-08-15  [Fertiliser].Apply(40, Fertiliser.Types.NO3N, 10);
                  2011-06-30  [Irrigation].Apply(25);
                  2011-07-30  [Irrigation].Apply(25);
                  2011-08-15  [Irrigation].Apply(30);
                  2011-09-30  [Irrigation].Apply(40);
                  2011-10-30  [Irrigation].Apply(40);
                  2011-11-15  [Irrigation].Apply(40);
                Manager Harvesting
                  script: same as in Validation.New Zealand.WinterSowing2015.ABlock.paddock.Manager folder.Harvesting
                Manager SowAndCut
                  Cultivar = Coolibah
                  Management = 0
```csharp
using System;
using System.Collections.Generic;
using Models.Core;
using Models.PMF;
using Models.PMF.Interfaces;
using System.Xml.Serialization;
using APSIM.Shared.Utilities;

namespace Models
{
    [Serializable] 
    [System.Xml.Serialization.XmlInclude(typeof(Model))]
    public class Script : Model
    {
        [Link] Plant Oats;
        [Link] Clock Clock;

        [Description("Cultivar")]
        public string Cultivar { get; set; }
        [Description("Management")]
        public int Management { get; set; }

        private string SowDate;
        private string CutDate1;
        private string CutDate2;


        [XmlIgnore] private RemovalFractions Remove { get; set; }
        
        [EventSubscribe("Commencing")]
        private void OnSimulationCommencing(object sender, EventArgs e)
        {
            Remove = new RemovalFractions();
            if (Management == 1)
            {
            SowDate = "9-feb";
            CutDate1 = "";
            CutDate2 = "";
            }
            else if (Management == 2)
            {
            SowDate = "8-mar";
            CutDate1 = "";
            CutDate2 = "";
            }
            else if (Management == 3)
            {
            SowDate = "5-apr";
            CutDate1 = "";
            CutDate2 = "";
            }
            else if (Management == 4)
            {
            SowDate = "9-feb";
            CutDate1 = "12-apr";
            CutDate2 = "10-may";
            }
            else if (Management == 5)
            {
            SowDate = "8-mar";
            CutDate1 = "9-may";
            CutDate2 = "6-jun";
            }
            else if (Management == 6)
            {
            SowDate = "5-apr";
            CutDate1 = "6-jun";
            CutDate2 = "4-jul";
            }

        }
        
        [EventSubscribe("DoManagement")]
        private void OnDoManagement(object sender, EventArgs e)
        {

            if (DateUtilities.WithinDates(SowDate,Clock.Today,SowDate) )
            {
                Oats.Sow(population:95, cultivar: Cultivar, depth:40, rowSpacing:250);
            }

            //Set up  array of remove fractions to send with Cut method.  Each member in the array corresponds to an organ in the same order they are set up in.
            if (CutDate1 !="")
                if (DateUtilities.WithinDates(CutDate1,Clock.Today,CutDate1))
                {
                    //Remove.SetPhenologyStage = 2.0;
                    Remove.SetFractionToRemove("Panicle", 1.0);
                    Remove.SetFractionToResidue("Panicle", 0.0);
                    Remove.SetFractionToRemove("Leaf", 0.8);
                    Remove.SetFractionToResidue("Leaf", 0.0);
                    Remove.SetFractionToRemove("Stem", 0.8);
                    Remove.SetFractionToResidue("Stem", 0.0);
                    Remove.SetFractionToRemove("Grain", 1.0);
                    Remove.SetFractionToResidue("Grain", 0.0);
                    Remove.SetFractionToRemove("Root", 0.0);
                    Remove.SetFractionToResidue("Root", 0.0);
                    Oats.RemoveBiomass("Cut", Remove);
                }
            //Set up  array of remove fractions to send with Cut method.  Each member in the array corresponds to an organ in the same order they are set up in.
            if (CutDate2 !="")
                if (DateUtilities.WithinDates(CutDate2,Clock.Today,CutDate2))
                {
                    //Remove.SetPhenologyStage = 2.0;
                    Remove.SetFractionToRemove("Panicle", 1.0);
                    Remove.SetFractionToResidue("Panicle", 0.0);
                    Remove.SetFractionToRemove("Leaf", 0.8);
                    Remove.SetFractionToResidue("Leaf", 0.0);
                    Remove.SetFractionToRemove("Stem", 0.8);
                    Remove.SetFractionToResidue("Stem", 0.0);
                    Remove.SetFractionToRemove("Grain", 1.0);
                    Remove.SetFractionToResidue("Grain", 0.0);
                    Remove.SetFractionToRemove("Root", 0.0);
                    Remove.SetFractionToResidue("Root", 0.0);
                    Oats.RemoveBiomass("Cut", Remove);
                }

            
        }
    }
}
```
              Report DailyReport
              Report HarvestReport
              Report SupReport: same as Validation.Australia.Wellcamp2006.Wellcamp2006.Wellcamp2006Base.paddock.SupReport
        Experiment LRC2012
          Factors
            Factor Cv
              Specifications=[SowAndCut].Script.Cultivar = Algerian, Nugene, Drover, Genie, Aladdin
            Factor Management: Specifications=[SowAndCut].Script.Management = 1 to 3 step 1
          Simulation LRC2012Base
            Clock: StartDate=2012-02-01; EndDate=2012-12-31
            Summary summaryfile
            Weather: FileName=Toowoomba_AP.met
            SoilArbitrator Soil Arbitrator
            Zone paddock: Area=1; Slope=0
              Soil: same as Validation.Australia.Wellcamp2006.Wellcamp2006.Wellcamp2006Base.paddock.Soil
              SoluteManager
              Irrigation
              SurfaceOrganicMatter Surface Organic Matter: InitialResidueName=wheat_stubble; InitialResidueType=wheat; InitialResidueMass=0; InitialStandingFraction=0; InitialCPR=0; InitialCNR=80; FractionFaecesAdded=0.5
              Fertiliser
              MicroClimate: a_interception=0; b_interception=1; c_interception=0; d_interception=0; soil_albedo=0.3; SoilHeatFluxFraction=0.4; NightInterceptionFraction=0.5; ReferenceHeight=2
              Plant Oats: CropType=Wheat
              Folder Management
                Operations IrrigandFert
                  2012-04-03  [Fertiliser].Apply(35, Fertiliser.Types.NO3N, 20);
                  2012-04-10  [Irrigation].Apply(40);
                  2012-08-15  [Fertiliser].Apply(40, Fertiliser.Types.NO3N, 10);
                  2012-05-20  [Irrigation].Apply(30);
                  2012-08-10  [Irrigation].Apply(25);
                  2012-08-31  [Irrigation].Apply(30);
                  2012-09-20  [Irrigation].Apply(40);
                  2012-10-30  [Irrigation].Apply(40);
                  2012-11-15  [Irrigation].Apply(25);
                Manager Harvesting
                  script: same as in Validation.New Zealand.WinterSowing2015.ABlock.paddock.Manager folder.Harvesting
                Manager SowAndCut
                  Cultivar = Coolibah
                  Management = 0
```csharp
using System;
using System.Collections.Generic;
using Models.Core;
using Models.PMF;
using Models.PMF.Interfaces;
using System.Xml.Serialization;
using APSIM.Shared.Utilities;

namespace Models
{
    [Serializable] 
    [System.Xml.Serialization.XmlInclude(typeof(Model))]
    public class Script : Model
    {
        [Link] Plant Oats;
        [Link] Clock Clock;

        [Description("Cultivar")]
        public string Cultivar { get; set; }
        [Description("Management")]
        public int Management { get; set; }

        private string SowDate;
        private string CutDate1;
        private string CutDate2;


        [XmlIgnore] private RemovalFractions Remove { get; set; }
        
        [EventSubscribe("Commencing")]
        private void OnSimulationCommencing(object sender, EventArgs e)
        {
            Remove = new RemovalFractions();
            if (Management == 1)
            {
            SowDate = "6-feb";
            CutDate1 = "";
            CutDate2 = "";
            }
            else if (Management == 2)
            {
            SowDate = "5-mar";
            CutDate1 = "";
            CutDate2 = "";
            }
            else if (Management == 3)
            {
            SowDate = "2-apr";
            CutDate1 = "";
            CutDate2 = "";
            }
            else if (Management == 4)
            {
            SowDate = "6-feb";
            CutDate1 = "2-apr";
            CutDate2 = "30-apr";
            }
            else if (Management == 5)
            {
            SowDate = "5-mar";
            CutDate1 = "30-apr";
            CutDate2 = "28-may";
            }
            else if (Management == 6)
            {
            SowDate = "2-apr";
            CutDate1 = "28-may";
            CutDate2 = "25-jun";
            }

        }
        
        [EventSubscribe("DoManagement")]
        private void OnDoManagement(object sender, EventArgs e)
        {

            if (DateUtilities.WithinDates(SowDate,Clock.Today,SowDate) )
            {
                Oats.Sow(population:95, cultivar: Cultivar, depth:40, rowSpacing:250);
            }

            //Set up  array of remove fractions to send with Cut method.  Each member in the array corresponds to an organ in the same order they are set up in.
            if (CutDate1 !="")
                if (DateUtilities.WithinDates(CutDate1,Clock.Today,CutDate1))
                {
                    //Remove.SetPhenologyStage = 2.0;
                    Remove.SetFractionToRemove("Panicle", 1.0);
                    Remove.SetFractionToResidue("Panicle", 0.0);
                    Remove.SetFractionToRemove("Leaf", 0.8);
                    Remove.SetFractionToResidue("Leaf", 0.0);
                    Remove.SetFractionToRemove("Stem", 0.8);
                    Remove.SetFractionToResidue("Stem", 0.0);
                    Remove.SetFractionToRemove("Grain", 1.0);
                    Remove.SetFractionToResidue("Grain", 0.0);
                    Remove.SetFractionToRemove("Root", 0.0);
                    Remove.SetFractionToResidue("Root", 0.0);
                    Oats.RemoveBiomass("Cut", Remove);
                }
            //Set up  array of remove fractions to send with Cut method.  Each member in the array corresponds to an organ in the same order they are set up in.
            if (CutDate2 !="")
                if (DateUtilities.WithinDates(CutDate2,Clock.Today,CutDate2))
                {
                    //Remove.SetPhenologyStage = 2.0;
                    Remove.SetFractionToRemove("Panicle", 1.0);
                    Remove.SetFractionToResidue("Panicle", 0.0);
                    Remove.SetFractionToRemove("Leaf", 0.8);
                    Remove.SetFractionToResidue("Leaf", 0.0);
                    Remove.SetFractionToRemove("Stem", 0.8);
                    Remove.SetFractionToResidue("Stem", 0.0);
                    Remove.SetFractionToRemove("Grain", 1.0);
                    Remove.SetFractionToResidue("Grain", 0.0);
                    Remove.SetFractionToRemove("Root", 0.0);
                    Remove.SetFractionToResidue("Root", 0.0);
                    Oats.RemoveBiomass("Cut", Remove);
                }

            
        }
    }
}
```
              Report DailyReport
              Report HarvestReport
              Report SupReport: same as Validation.Australia.Wellcamp2006.Wellcamp2006.Wellcamp2006Base.paddock.SupReport
        Experiment LRC2014
          Factors
            Factor Cv
              Specifications=[SowAndCut].Script.Cultivar = Algerian, Drover, Genie, Aladdin, Comet, Taipan, Wizard
            Factor Management: Specifications=[SowAndCut].Script.Management = 1 to 2 step 1
          Simulation LRC2014Base
            Clock: StartDate=2014-02-01; EndDate=2014-12-31
            Summary summaryfile
            Weather: FileName=Toowoomba_AP.met
            SoilArbitrator Soil Arbitrator
            Zone paddock: Area=1; Slope=0
              Soil: same as Validation.Australia.Wellcamp2006.Wellcamp2006.Wellcamp2006Base.paddock.Soil
              SoluteManager
              Irrigation
              SurfaceOrganicMatter Surface Organic Matter: InitialResidueName=wheat_stubble; InitialResidueType=wheat; InitialResidueMass=0; InitialStandingFraction=0; InitialCPR=0; InitialCNR=80; FractionFaecesAdded=0.5
              Fertiliser
              MicroClimate: a_interception=0; b_interception=1; c_interception=0; d_interception=0; soil_albedo=0.3; SoilHeatFluxFraction=0.4; NightInterceptionFraction=0.5; ReferenceHeight=2
              Plant Oats: CropType=Wheat
              Folder Management
                Operations IrrigandFert
                  2014-02-01  [Irrigation].Apply(50);
                  2014-02-14  [Irrigation].Apply(25);
                  2014-03-01  [Irrigation].Apply(25);
                  2014-03-15  [Irrigation].Apply(40);
                  2014-03-21  [Fertiliser].Apply(35, Fertiliser.Types.NO3N, 20);
                  2014-04-21  [Irrigation].Apply(25);
                  2014-05-18  [Irrigation].Apply(25);
                  2014-08-15  [Fertiliser].Apply(40, Fertiliser.Types.NO3N, 10);
                  2014-06-03  [Irrigation].Apply(25);
                  2014-06-19  [Irrigation].Apply(25);
                  2014-07-10  [Irrigation].Apply(30);
                  2014-08-01  [Irrigation].Apply(25);
                  2014-09-05  [Irrigation].Apply(30);
                  2014-09-22  [Irrigation].Apply(25);
                  2014-10-03  [Irrigation].Apply(40);
                  2014-10-17  [Irrigation].Apply(25);
                  2014-10-30  [Irrigation].Apply(40);
                  2014-11-14  [Irrigation].Apply(25);
                  2014-11-30  [Irrigation].Apply(25);
                Manager Harvesting
                  script: same as in Validation.New Zealand.WinterSowing2015.ABlock.paddock.Manager folder.Harvesting
                Manager SowAndCut
                  Cultivar = Coolibah
                  Management = 0
```csharp
using System;
using System.Collections.Generic;
using Models.Core;
using Models.PMF;
using Models.PMF.Interfaces;
using System.Xml.Serialization;
using APSIM.Shared.Utilities;

namespace Models
{
    [Serializable] 
    [System.Xml.Serialization.XmlInclude(typeof(Model))]
    public class Script : Model
    {
        [Link] Plant Oats;
        [Link] Clock Clock;

        [Description("Cultivar")]
        public string Cultivar { get; set; }
        [Description("Management")]
        public int Management { get; set; }

        private string SowDate;
        private string CutDate1;
        private string CutDate2;


        [XmlIgnore] private RemovalFractions Remove { get; set; }
        
        [EventSubscribe("Commencing")]
        private void OnSimulationCommencing(object sender, EventArgs e)
        {
            Remove = new RemovalFractions();
            if (Management == 1)
            {
            SowDate = "3-mar";
            CutDate1 = "";
            CutDate2 = "";
            }
            else if (Management == 2)
            {
            SowDate = "1-apr";
            CutDate1 = "";
            CutDate2 = "";
            }
            else if (Management == 3)
            {
            SowDate = "3-feb";
            CutDate1 = "1-jun";
            CutDate2 = "";
            }
            else if (Management == 4)
            {
            SowDate = "3-feb";
            CutDate1 = "24-mar";
            CutDate2 = "28-apr";
            }
            else if (Management == 5)
            {
            SowDate = "3-mar";
            CutDate1 = "28-apr";
            CutDate2 = "26-may";
            }
            else if (Management == 6)
            {
            SowDate = "1-apr";
            CutDate1 = "26-may";
            CutDate2 = "23-jun";
            }

        }
        
        [EventSubscribe("DoManagement")]
        private void OnDoManagement(object sender, EventArgs e)
        {

            if (DateUtilities.WithinDates(SowDate,Clock.Today,SowDate) )
            {
                Oats.Sow(population:95, cultivar: Cultivar, depth:40, rowSpacing:250);
            }

            //Set up  array of remove fractions to send with Cut method.  Each member in the array corresponds to an organ in the same order they are set up in.
            if (CutDate1 !="")
                if (DateUtilities.WithinDates(CutDate1,Clock.Today,CutDate1))
                {
                    //Remove.SetPhenologyStage = 2.0;
                    Remove.SetFractionToRemove("Panicle", 1.0);
                    Remove.SetFractionToResidue("Panicle", 0.0);
                    Remove.SetFractionToRemove("Leaf", 0.8);
                    Remove.SetFractionToResidue("Leaf", 0.0);
                    Remove.SetFractionToRemove("Stem", 0.8);
                    Remove.SetFractionToResidue("Stem", 0.0);
                    Remove.SetFractionToRemove("Grain", 1.0);
                    Remove.SetFractionToResidue("Grain", 0.0);
                    Remove.SetFractionToRemove("Root", 0.0);
                    Remove.SetFractionToResidue("Root", 0.0);
                    Oats.RemoveBiomass("Cut", Remove);
                }
            //Set up  array of remove fractions to send with Cut method.  Each member in the array corresponds to an organ in the same order they are set up in.
            if (CutDate2 !="")
                if (DateUtilities.WithinDates(CutDate2,Clock.Today,CutDate2))
                {
                    //Remove.SetPhenologyStage = 2.0;
                    Remove.SetFractionToRemove("Panicle", 1.0);
                    Remove.SetFractionToResidue("Panicle", 0.0);
                    Remove.SetFractionToRemove("Leaf", 0.8);
                    Remove.SetFractionToResidue("Leaf", 0.0);
                    Remove.SetFractionToRemove("Stem", 0.8);
                    Remove.SetFractionToResidue("Stem", 0.0);
                    Remove.SetFractionToRemove("Grain", 1.0);
                    Remove.SetFractionToResidue("Grain", 0.0);
                    Remove.SetFractionToRemove("Root", 0.0);
                    Remove.SetFractionToResidue("Root", 0.0);
                    Oats.RemoveBiomass("Cut", Remove);
                }

            
        }
    }
}
```
              Report DailyReport
              Report HarvestReport
              Report SupReport: same as Validation.Australia.Wellcamp2006.Wellcamp2006.Wellcamp2006Base.paddock.SupReport
        Experiment LRC2015
          Factors
            Factor Cv
              Specifications=[SowAndCut].Script.Cultivar = Algerian, Drover, Genie, Aladdin, Comet, Taipan, Wizard
            Factor Management: Specifications=[SowAndCut].Script.Management = 1 to 3 step 1
          Simulation LRC2015Base
            Clock: StartDate=2015-02-01; EndDate=2015-12-31
            Summary summaryfile
            Weather: FileName=Toowoomba_AP.met
            SoilArbitrator Soil Arbitrator
            Zone paddock: Area=1; Slope=0
              Soil: same as Validation.Australia.Wellcamp2006.Wellcamp2006.Wellcamp2006Base.paddock.Soil
              SoluteManager
              Irrigation
              SurfaceOrganicMatter Surface Organic Matter: InitialResidueName=wheat_stubble; InitialResidueType=wheat; InitialResidueMass=0; InitialStandingFraction=0; InitialCPR=0; InitialCNR=80; FractionFaecesAdded=0.5
              Fertiliser
              MicroClimate: a_interception=0; b_interception=1; c_interception=0; d_interception=0; soil_albedo=0.3; SoilHeatFluxFraction=0.4; NightInterceptionFraction=0.5; ReferenceHeight=2
              Plant Oats: CropType=Wheat
              Folder Management
                Operations IrrigandFert
                  2015-02-01  [Irrigation].Apply(50);
                  2015-02-14  [Irrigation].Apply(25);
                  2015-03-10  [Irrigation].Apply(40);
                  2015-03-21  [Fertiliser].Apply(35, Fertiliser.Types.NO3N, 20);
                  2015-04-15  [Irrigation].Apply(25);
                  2015-05-21  [Irrigation].Apply(25);
                  2015-08-15  [Fertiliser].Apply(40, Fertiliser.Types.NO3N, 10);
                  2015-06-03  [Irrigation].Apply(25);
                  2015-06-23  [Irrigation].Apply(25);
                  2015-07-07  [Irrigation].Apply(30);
                  2015-07-21  [Irrigation].Apply(30);
                  2015-08-12  [Irrigation].Apply(25);
                  2015-09-14  [Irrigation].Apply(40);
                  2015-09-28  [Irrigation].Apply(40);
                  2015-10-16  [Irrigation].Apply(40);
                  2015-11-21  [Irrigation].Apply(25);
                Manager Harvesting
                  script: same as in Validation.New Zealand.WinterSowing2015.ABlock.paddock.Manager folder.Harvesting
                Manager SowAndCut
                  Cultivar = Coolibah
                  Management = 0
```csharp
using System;
using System.Collections.Generic;
using Models.Core;
using Models.PMF;
using Models.PMF.Interfaces;
using System.Xml.Serialization;
using APSIM.Shared.Utilities;

namespace Models
{
    [Serializable] 
    [System.Xml.Serialization.XmlInclude(typeof(Model))]
    public class Script : Model
    {
        [Link] Plant Oats;
        [Link] Clock Clock;

        [Description("Cultivar")]
        public string Cultivar { get; set; }
        [Description("Management")]
        public int Management { get; set; }

        private string SowDate;
        private string CutDate1;
        private string CutDate2;


        [XmlIgnore] private RemovalFractions Remove { get; set; }
        
        [EventSubscribe("Commencing")]
        private void OnSimulationCommencing(object sender, EventArgs e)
        {
            Remove = new RemovalFractions();
            if (Management == 1)
            {
            SowDate = "2-feb";
            CutDate1 = "";
            CutDate2 = "";
            }
            else if (Management == 2)
            {
            SowDate = "2-mar";
            CutDate1 = "";
            CutDate2 = "";
            }
            else if (Management == 3)
            {
            SowDate = "30-mar";
            CutDate1 = "";
            CutDate2 = "";
            }
            else if (Management == 4)
            {
            SowDate = "2-feb";
            CutDate1 = "30-mar";
            CutDate2 = "27-apr";
            }
            else if (Management == 5)
            {
            SowDate = "2-mar";
            CutDate1 = "27-apr";
            CutDate2 = "25-may";
            }
            else if (Management == 6)
            {
            SowDate = "30-mar";
            CutDate1 = "25-may";
            CutDate2 = "22-jun";
            }

        }
        
        [EventSubscribe("DoManagement")]
        private void OnDoManagement(object sender, EventArgs e)
        {

            if (DateUtilities.WithinDates(SowDate,Clock.Today,SowDate) )
            {
                Oats.Sow(population:95, cultivar: Cultivar, depth:40, rowSpacing:250);
            }

            //Set up  array of remove fractions to send with Cut method.  Each member in the array corresponds to an organ in the same order they are set up in.
            if (CutDate1 !="")
                if (DateUtilities.WithinDates(CutDate1,Clock.Today,CutDate1))
                {
                    //Remove.SetPhenologyStage = 2.0;
                    Remove.SetFractionToRemove("Panicle", 1.0);
                    Remove.SetFractionToResidue("Panicle", 0.0);
                    Remove.SetFractionToRemove("Leaf", 0.8);
                    Remove.SetFractionToResidue("Leaf", 0.0);
                    Remove.SetFractionToRemove("Stem", 0.8);
                    Remove.SetFractionToResidue("Stem", 0.0);
                    Remove.SetFractionToRemove("Grain", 1.0);
                    Remove.SetFractionToResidue("Grain", 0.0);
                    Remove.SetFractionToRemove("Root", 0.0);
                    Remove.SetFractionToResidue("Root", 0.0);
                    Oats.RemoveBiomass("Cut", Remove);
                }
            //Set up  array of remove fractions to send with Cut method.  Each member in the array corresponds to an organ in the same order they are set up in.
            if (CutDate2 !="")
                if (DateUtilities.WithinDates(CutDate2,Clock.Today,CutDate2))
                {
                    //Remove.SetPhenologyStage = 2.0;
                    Remove.SetFractionToRemove("Panicle", 1.0);
                    Remove.SetFractionToResidue("Panicle", 0.0);
                    Remove.SetFractionToRemove("Leaf", 0.8);
                    Remove.SetFractionToResidue("Leaf", 0.0);
                    Remove.SetFractionToRemove("Stem", 0.8);
                    Remove.SetFractionToResidue("Stem", 0.0);
                    Remove.SetFractionToRemove("Grain", 1.0);
                    Remove.SetFractionToResidue("Grain", 0.0);
                    Remove.SetFractionToRemove("Root", 0.0);
                    Remove.SetFractionToResidue("Root", 0.0);
                    Oats.RemoveBiomass("Cut", Remove);
                }

            
        }
    }
}
```
              Report DailyReport
              Report HarvestReport
              Report SupReport: same as Validation.Australia.Wellcamp2006.Wellcamp2006.Wellcamp2006Base.paddock.SupReport
        Experiment LRC2016
          Factors
            Factor Cv
              Specifications=[SowAndCut].Script.Cultivar = Algerian, Drover, Genie, Aladdin, Comet, Taipan, Wizard
            Factor Management: Specifications=[SowAndCut].Script.Management = 1 to 3 step 1
          Simulation LRC2016Base
            Clock: StartDate=2016-02-01; EndDate=2016-12-31
            Summary summaryfile
            Weather: FileName=Toowoomba_AP.met
            SoilArbitrator Soil Arbitrator
            Zone paddock: Area=1; Slope=0
              Soil: same as Validation.Australia.Wellcamp2006.Wellcamp2006.Wellcamp2006Base.paddock.Soil
              SoluteManager
              Irrigation
              SurfaceOrganicMatter Surface Organic Matter: InitialResidueName=wheat_stubble; InitialResidueType=wheat; InitialResidueMass=0; InitialStandingFraction=0; InitialCPR=0; InitialCNR=80; FractionFaecesAdded=0.5
              Fertiliser
              MicroClimate: a_interception=0; b_interception=1; c_interception=0; d_interception=0; soil_albedo=0.3; SoilHeatFluxFraction=0.4; NightInterceptionFraction=0.5; ReferenceHeight=2
              Plant Oats: CropType=Wheat
              Folder Management
                Operations IrrigandFert
                  2016-02-01  [Irrigation].Apply(50);
                  2016-02-14  [Irrigation].Apply(25);
                  2016-03-01  [Irrigation].Apply(40);
                  2016-03-21  [Irrigation].Apply(25);
                  2016-03-21  [Fertiliser].Apply(35, Fertiliser.Types.NO3N, 20);
                  2016-04-08  [Irrigation].Apply(40);
                  2016-04-22  [Irrigation].Apply(40);
                  2016-05-06  [Irrigation].Apply(25);
                  2016-08-15  [Fertiliser].Apply(40, Fertiliser.Types.NO3N, 10);
                  2016-05-20  [Irrigation].Apply(25);
                  2016-07-21  [Irrigation].Apply(30);
                  2016-08-10  [Irrigation].Apply(25);
                  2016-09-02  [Irrigation].Apply(30);
                  2016-10-15  [Irrigation].Apply(25);
                  2016-10-30  [Irrigation].Apply(40);
                  2016-11-20  [Irrigation].Apply(40);
                Manager Harvesting
                  script: same as in Validation.New Zealand.WinterSowing2015.ABlock.paddock.Manager folder.Harvesting
                Manager SowAndCut
                  Cultivar = Coolibah
                  Management = 0
```csharp
using System;
using System.Collections.Generic;
using Models.Core;
using Models.PMF;
using Models.PMF.Interfaces;
using System.Xml.Serialization;
using APSIM.Shared.Utilities;

namespace Models
{
    [Serializable] 
    [System.Xml.Serialization.XmlInclude(typeof(Model))]
    public class Script : Model
    {
        [Link] Plant Oats;
        [Link] Clock Clock;

        [Description("Cultivar")]
        public string Cultivar { get; set; }
        [Description("Management")]
        public int Management { get; set; }

        private string SowDate;
        private string CutDate1;
        private string CutDate2;


        [XmlIgnore] private RemovalFractions Remove { get; set; }
        
        [EventSubscribe("Commencing")]
        private void OnSimulationCommencing(object sender, EventArgs e)
        {
            Remove = new RemovalFractions();
            if (Management == 1)
            {
            SowDate = "1-feb";
            CutDate1 = "";
            CutDate2 = "";
            }
            else if (Management == 2)
            {
            SowDate = "29-feb";
            CutDate1 = "";
            CutDate2 = "";
            }
            else if (Management == 3)
            {
            SowDate = "29-mar";
            CutDate1 = "";
            CutDate2 = "";
            }
            else if (Management == 4)
            {
            SowDate = "1-feb";
            CutDate1 = "29-mar";
            CutDate2 = "26-apr";
            }
            else if (Management == 5)
            {
            SowDate = "29-feb";
            CutDate1 = "26-apr";
            CutDate2 = "24-may";
            }
            else if (Management == 6)
            {
            SowDate = "29-mar";
            CutDate1 = "24-may";
            CutDate2 = "21-jun";
            }
        }
        
        [EventSubscribe("DoManagement")]
        private void OnDoManagement(object sender, EventArgs e)
        {

            if (DateUtilities.WithinDates(SowDate,Clock.Today,SowDate) )
            {
                Oats.Sow(population:95, cultivar: Cultivar, depth:40, rowSpacing:250);
            }

            //Set up  array of remove fractions to send with Cut method.  Each member in the array corresponds to an organ in the same order they are set up in.
            if (CutDate1 !="")
                if (DateUtilities.WithinDates(CutDate1,Clock.Today,CutDate1))
                {
                    //Remove.SetPhenologyStage = 2.0;
                    Remove.SetFractionToRemove("Panicle", 1.0);
                    Remove.SetFractionToResidue("Panicle", 0.0);
                    Remove.SetFractionToRemove("Leaf", 0.8);
                    Remove.SetFractionToResidue("Leaf", 0.0);
                    Remove.SetFractionToRemove("Stem", 0.8);
                    Remove.SetFractionToResidue("Stem", 0.0);
                    Remove.SetFractionToRemove("Grain", 1.0);
                    Remove.SetFractionToResidue("Grain", 0.0);
                    Remove.SetFractionToRemove("Root", 0.0);
                    Remove.SetFractionToResidue("Root", 0.0);
                    Oats.RemoveBiomass("Cut", Remove);
                }
            //Set up  array of remove fractions to send with Cut method.  Each member in the array corresponds to an organ in the same order they are set up in.
            if (CutDate2 !="")
                if (DateUtilities.WithinDates(CutDate2,Clock.Today,CutDate2))
                {
                    //Remove.SetPhenologyStage = 2.0;
                    Remove.SetFractionToRemove("Panicle", 1.0);
                    Remove.SetFractionToResidue("Panicle", 0.0);
                    Remove.SetFractionToRemove("Leaf", 0.8);
                    Remove.SetFractionToResidue("Leaf", 0.0);
                    Remove.SetFractionToRemove("Stem", 0.8);
                    Remove.SetFractionToResidue("Stem", 0.0);
                    Remove.SetFractionToRemove("Grain", 1.0);
                    Remove.SetFractionToResidue("Grain", 0.0);
                    Remove.SetFractionToRemove("Root", 0.0);
                    Remove.SetFractionToResidue("Root", 0.0);
                    Oats.RemoveBiomass("Cut", Remove);
                }

            
        }
    }
}
```
              Report DailyReport
              Report HarvestReport
              Report SupReport: same as Validation.Australia.Wellcamp2006.Wellcamp2006.Wellcamp2006Base.paddock.SupReport
        Experiment LRC2017
          Factors
            Factor Cv
              Specifications=[SowAndCut].Script.Cultivar = Algerian, Genie, Aladdin, Comet, Taipan, Wizard, Bond
            Factor Management: Specifications=[SowAndCut].Script.Management = 1 to 3 step 1
          Simulation LRC2017Base
            Clock: StartDate=2017-02-01; EndDate=2017-12-31
            Summary summaryfile
            Weather: FileName=Toowoomba_AP.met
            SoilArbitrator Soil Arbitrator
            Zone paddock: Area=1; Slope=0
              Soil: same as Validation.Australia.Wellcamp2006.Wellcamp2006.Wellcamp2006Base.paddock.Soil
              SoluteManager
              Irrigation
              SurfaceOrganicMatter Surface Organic Matter: InitialResidueName=wheat_stubble; InitialResidueType=wheat; InitialResidueMass=0; InitialStandingFraction=0; InitialCPR=0; InitialCNR=80; FractionFaecesAdded=0.5
              Fertiliser
              MicroClimate: a_interception=0; b_interception=1; c_interception=0; d_interception=0; soil_albedo=0.3; SoilHeatFluxFraction=0.4; NightInterceptionFraction=0.5; ReferenceHeight=2
              Plant Oats: CropType=Wheat
              Folder Management
                Operations IrrigandFert
                  2017-02-01  [Irrigation].Apply(50);
                  2017-02-14  [Irrigation].Apply(25);
                  2017-03-21  [Fertiliser].Apply(35, Fertiliser.Types.NO3N, 20);
                  2017-04-22  [Irrigation].Apply(25);
                  2017-05-09  [Irrigation].Apply(25);
                  2017-08-15  [Fertiliser].Apply(40, Fertiliser.Types.NO3N, 10);
                  2017-05-24  [Irrigation].Apply(25);
                  2017-07-05  [Irrigation].Apply(30);
                  2017-07-25  [Irrigation].Apply(25);
                  2017-08-14  [Irrigation].Apply(25);
                  2017-08-29  [Irrigation].Apply(30);
                  2017-09-11  [Irrigation].Apply(25);
                  2017-09-25  [Irrigation].Apply(40);
                  2017-11-11  [Irrigation].Apply(25);
                Manager Harvesting
                  script: same as in Validation.New Zealand.WinterSowing2015.ABlock.paddock.Manager folder.Harvesting
                Manager SowAndCut
                  Cultivar = Coolibah
                  Management = 0
```csharp
using System;
using System.Collections.Generic;
using Models.Core;
using Models.PMF;
using Models.PMF.Interfaces;
using System.Xml.Serialization;
using APSIM.Shared.Utilities;

namespace Models
{
    [Serializable] 
    [System.Xml.Serialization.XmlInclude(typeof(Model))]
    public class Script : Model
    {
        [Link] Plant Oats;
        [Link] Clock Clock;

        [Description("Cultivar")]
        public string Cultivar { get; set; }
        [Description("Management")]
        public int Management { get; set; }

        private string SowDate;
        private string CutDate1;
        private string CutDate2;


        [XmlIgnore] private RemovalFractions Remove { get; set; }
        
        [EventSubscribe("Commencing")]
        private void OnSimulationCommencing(object sender, EventArgs e)
        {
            Remove = new RemovalFractions();
            if (Management == 1)
            {
            SowDate = "7-feb";
            CutDate1 = "";
            CutDate2 = "";
            }
            else if (Management == 2)
            {
            SowDate = "7-mar";
            CutDate1 = "";
            CutDate2 = "";
            }
            else if (Management == 3)
            {
            SowDate = "4-apr";
            CutDate1 = "";
            CutDate2 = "";
            }
            else if (Management == 4)
            {
            SowDate = "7-feb";
            CutDate1 = "4-apr";
            CutDate2 = "2-may";
            }
            else if (Management == 5)
            {
            SowDate = "7-mar";
            CutDate1 = "2-may";
            CutDate2 = "30-may";
            }
            else if (Management == 6)
            {
            SowDate = "4-apr";
            CutDate1 = "30-may";
            CutDate2 = "27-jun";
            }

        }
        
        [EventSubscribe("DoManagement")]
        private void OnDoManagement(object sender, EventArgs e)
        {

            if (DateUtilities.WithinDates(SowDate,Clock.Today,SowDate) )
            {
                Oats.Sow(population:95, cultivar: Cultivar, depth:40, rowSpacing:250);
            }

            //Set up  array of remove fractions to send with Cut method.  Each member in the array corresponds to an organ in the same order they are set up in.
            if (CutDate1 !="")
                if (DateUtilities.WithinDates(CutDate1,Clock.Today,CutDate1))
                {
                    //Remove.SetPhenologyStage = 2.0;
                    Remove.SetFractionToRemove("Panicle", 1.0);
                    Remove.SetFractionToResidue("Panicle", 0.0);
                    Remove.SetFractionToRemove("Leaf", 0.8);
                    Remove.SetFractionToResidue("Leaf", 0.0);
                    Remove.SetFractionToRemove("Stem", 0.8);
                    Remove.SetFractionToResidue("Stem", 0.0);
                    Remove.SetFractionToRemove("Grain", 1.0);
                    Remove.SetFractionToResidue("Grain", 0.0);
                    Remove.SetFractionToRemove("Root", 0.0);
                    Remove.SetFractionToResidue("Root", 0.0);
                    Oats.RemoveBiomass("Cut", Remove);
                }
            //Set up  array of remove fractions to send with Cut method.  Each member in the array corresponds to an organ in the same order they are set up in.
            if (CutDate2 !="")
                if (DateUtilities.WithinDates(CutDate2,Clock.Today,CutDate2))
                {
                    //Remove.SetPhenologyStage = 2.0;
                    Remove.SetFractionToRemove("Panicle", 1.0);
                    Remove.SetFractionToResidue("Panicle", 0.0);
                    Remove.SetFractionToRemove("Leaf", 0.8);
                    Remove.SetFractionToResidue("Leaf", 0.0);
                    Remove.SetFractionToRemove("Stem", 0.8);
                    Remove.SetFractionToResidue("Stem", 0.0);
                    Remove.SetFractionToRemove("Grain", 1.0);
                    Remove.SetFractionToResidue("Grain", 0.0);
                    Remove.SetFractionToRemove("Root", 0.0);
                    Remove.SetFractionToResidue("Root", 0.0);
                    Oats.RemoveBiomass("Cut", Remove);
                }

            
        }
    }
}
```
              Report DailyReport
              Report HarvestReport
              Report SupReport: same as Validation.Australia.Wellcamp2006.Wellcamp2006.Wellcamp2006Base.paddock.SupReport
  Folder Sensibility
    Experiment OatsExampleTarlee2007
      Factors: same as Validation.Australia.Tarlee2007.Tarlee2007.Factors
      Simulation Tarlee2007example
        Clock: StartDate=2007-05-03; EndDate=2007-11-30
        Summary summaryfile
        Weather: FileName=MNHRZ_onsite_metdata07.met
        Zone paddock: Area=1; Slope=0
          Soil: same as Validation.Australia.Tarlee2007.Tarlee2007.Tarlee2007Base.paddock.Soil
          SoluteManager
          Irrigation
          SurfaceOrganicMatter Surface Organic Matter: InitialResidueName=wheat_stubble; InitialResidueType=wheat; InitialResidueMass=0; InitialStandingFraction=0; InitialCPR=0; InitialCNR=80; FractionFaecesAdded=0.5
          Fertiliser
          MicroClimate: a_interception=0; b_interception=1; c_interception=0; d_interception=0; soil_albedo=0.3; SoilHeatFluxFraction=0.4; NightInterceptionFraction=0.5; ReferenceHeight=2
          Plant Oats: CropType=Wheat
          Folder Management
            Operations Sowing
              2007-05-11  [Oats].Sow(population:200, cultivar:"Wintaroo", depth:30, rowSpacing:250);
            Operations Harvest
              2007-11-17  [Oats].Harvest()
            Operations
          Report DailyReport: EventNames=[Clock].DoReport
            VariableNames:
              [Clock].Today
              [Oats].Phenology.CurrentStageName
              [Weather].MeanT
              [Soil].SoilWater.SW
              [Soil].SoilWater.SWmm
              sum([Soil].SoilWater.SWmm) as ProfileWater
              [Oats].AboveGround.N
              [Oats].AboveGround.Wt
              [Oats].AboveGroundLive.N
              [Oats].AboveGroundLive.N*10 as UptakeNKgHA
              [Oats].AboveGroundLive.Wt
              [Oats].AboveGroundDead.N
              [Oats].AboveGroundDead.Wt
              [Oats].Arbitrator.DMDemand
              [Oats].Arbitrator.DM.TotalFixationSupply
              [Oats].Ear.N
              [Oats].Ear.Nconc
              [Oats].Ear.Wt
              [Oats].Grain.N
              [Oats].Grain.NConc
              [Oats].Grain.Number
              [Oats].Grain.Size
              [Oats].Grain.Wt
              [Oats].Grain.Live.Wt
              [Oats].Leaf.AppearedCohortNo
              [Oats].Leaf.CoverDead
              [Oats].Leaf.CoverGreen
              [Oats].Leaf.CoverTotal
              [Oats].Leaf.Dead.N
              [Oats].Leaf.Dead.NConc
              [Oats].Leaf.Dead.Wt
              [Oats].Leaf.DeadCohortNo
              [Oats].Leaf.GreenCohortNo
              [Oats].Leaf.SenescingCohortNo
              [Oats].Leaf.ExpandedCohortNo
              [Oats].Leaf.Fn
              [Oats].Leaf.Fw
              [Oats].Leaf.Height
              [Oats].Leaf.InitialisedCohortNo
              [Oats].Leaf.LAI
              [Oats].Leaf.Live.N
              [Oats].Leaf.Live.NConc
              [Oats].Leaf.Live.Wt
              [Oats].Leaf.SpecificArea
              [Oats].Leaf.Transpiration
              [Oats].Phenology.CurrentPhaseName
              [Oats].Phenology.CurrentStageName
              [Oats].Phenology.DailyVernalisation.Value()
              [Oats].Phenology.MeanTemp.Value()
              [Oats].Phenology.Photoperiod.Value()
              [Oats].Phenology.Stage
              [Oats].Phenology.ThermalTime.Value()
              [Oats].Phenology.ThermalTime.Value()
              [Oats].Phenology.Vrn1.Value()
              [Oats].Phenology.Vrn2.Value()
              [Oats].Phenology.Vrn4.Value()
              [Oats].Phenology.Zadok.Stage
              [Oats].Root.Depth
              [Oats].Root.N
              [Oats].Root.Wt
              [Oats].Root.Nconc
              [Oats].Root.WaterUptake
              [Oats].Panicle.N
              [Oats].Panicle.NConc
              [Oats].Panicle.Wt
              [Oats].Panicle.Live.StorageWt
              [Oats].Stem.N
              [Oats].Stem.NConc
              [Oats].Stem.Wt
              [Oats].Stem.PercentWSC
              [Oats].Stem.Live.StorageWt
              [Oats].StemPlusPanicle.Wt
              [Oats].StemPlusPanicle.N
              [Oats].SowingData.Cultivar
              [Oats].Structure.HaunStage.Value()TerminalSpikelet.Value()
              [Oats].Structure.HaunStage.Value()
              [Oats].Structure.Height
              [Oats].Structure.LeafTipsAppeared
              [Oats].Structure.FinalLeafNumber.Value()
              [Oats].Structure.FinalLeafNumber.ValueToHold.PhotoPLeaves.Value()
              [Oats].Structure.MainStemPopn
              [Oats].Structure.MeanTillerGrowthRate.Value()
              [Oats].Structure.TotalStemPopn
              [Oats].Total.N
              [Oats].Total.Wt
              [SurfaceOrganicMatter].Wt
              ([Oats].Leaf.Transpiration + [Soil].SoilWater.Es + [MicroClimate].interception) as ET
              sum([Soil].SoilNitrogen.NO3) as TotalSoilNitrogen
              [Oats].Phenology.FlagLeafDAS
              [Oats].Phenology.FloweringDAS
              [Oats].Phenology.MaturityDAS
              [Oats].Phenology.PhotoPeriod
              [Oats].Phenology.PhotoPeriodDeltaFunction
              [Oats].Phenology.Stage
              [Oats].Phenology.SoilTemperatureFunction.Value()
              [Clock].Today.Year
          Report HarvestReport: same as Replacements.HarvestReport
          Report SupReport: same as Validation.Australia.Tarlee2007.Tarlee2007.Tarlee2007Base.paddock.SupReport
        SoilArbitrator Soil Arbitrator
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