Simulations: Version=162
  Folder Replacements
    Plant SCRUM: PlantType=SCRUM; IsEnding=false; DaysAfterEnding=0
      Memo TitlePage
        # SCRUM: the Simple Crop Resource Uptake Model

        _Hamish Brown and Rob Zyskowski, Plant and Food Research, New Zealand_

        This model has been built using the Plant Modelling Framework (PMF) of [brown_plant_2014] to simulate a range of different crops in simulations where water and nitrogen balance are of interest but a fully mechanistic plant model is not needed or is not available. It is a daily time step implementation of the crop model that is used on the Overseer nutrient balance model [Cichota_etal_2010].  It uses simple sigmoidal functions for estimating daily cover and biomass deltas to give realistic water and nitrogen demands. It does not simulate potential yield, this is specified as an input. Yield will be reduced below the specified potential yield if N or water supplies from the soil are insufficient to meet demand. The model has been paramaterised for simulating water and nitrogen balances of cropping rotations in New Zealand (where over 50 different crop types are grown and it is not feasible to produce full crop models for each of these).  Because of this the model is not as generically applicable as full APSIM crop models.   It may be adapted for other purposes and other crop types may be added but the user will need to keep in mind that because it is a simple model the the parameters might need changing for crops in different locations or for crops sown at different times of the year.  Some sensibility testing or validation is recommended before application in different sutuations.

        SCRUM has a simple phenology model which divides the crop growth into three main phases; a vegetative phase when the canopy is expanding, a reproductive phase when product is being formed and a senescing phase when the canopy is contracting.  SCRUM has 4 organ classes to represent different biomass components and the real biomass components that these classes represent changes from crop to crop:
           1. A Simple leaf class called <b>Stover</b> which represents the unharvested parts of the plant.  Generally, this represents the leaf and stem components of the crop but for crops where stem and leaf are part of the harvested product (e.g forages and leafy vegetables) than stover is the residual fraction of leaf and stem that is not harvested.
           2. A Generic organ class called <b>Product</b> which represents the plant parts that are harvested and removed from the field.  This could represent grain, fruits, tubers, leaf or stem depending on what sort of crop is being represented.
           3. A Root organ which extracts water and nitrogen from the soil for plant growth and returns biomass to the soil on harvest
           4. A Nodule organ which is only activated and fixes nitrogen for the legume crops.
        An Arbitrator is also included which determines the allocation of drymatter and nitrogen biomass between each of these organs.

        #Inclusion in APSIM simulations
        A scrum crop is included in a simulation the same as any other APSIM crop
         * The SCRUM object needs to be dragged or copied from the Crop folder in the tool box into the field of your simulation.
         * It is then planted with a sowing rule
        ~~~
        SCRUM.Sow(cultivar: Wheat_Autumn, population: 1, depth: 10, rowSpacing: 150);
        ~~~
          * Note that SCRUM has no notion of population or rowSpacing but these parameters are required by the Sow method so filler values are provided
          * To specify an expected Expected Yield that differs to the defalt value provided, included the following code in a manager script to be executed on the day of sowing.
        ~~~
         zone.Set("[SCRUM].Product.ExpectedYield.Value()", ResetValue);
        ~~~
        * SCRUM can be Harvested, Cut, Grazed and Pruned like other crops.  Defalt proportions of the biomass in each organ are removed from the sysem and/or added to the fields residue pools.  Note that defalt removal fraction for product on harvest is 0 (becaue it is represented with a generic organ) so more appropriate removal fractions should be sepcified in a manager script as follows:
        ~~~
        [EventSubscribe("Commencing")]
        private void OnSimulationCommencing(object sender, EventArgs e)
        {
          Remove = new RemovalFractions(SCRUM.Organs);
        }
        [EventSubscribe("DoManagement")]
        private void OnDoManagement(object sender, EventArgs e)
        {
          if (Clock.Today.Date == HarvestDate2)
          {
            Remove.SetFractionLiveToRemove("Product", 1.0);
            Remove.SetFractionLiveToRemove("Stover", 0.05);
            Remove.SetFractionLiveToResidue("Stover",0.95)
            SCRUM.Harvest(Remove);
            SCRUM.EndCrop();
          }
        }
        ~~~
        * A Remove class as shown above can be sent with Harvest, Cut, Graze and Prune events to specificy the proportions of removals.
         * Once a crop has been ended the field is open to plant another crop using another APSIM crop model or sowing another SCRUM crop.
      Phenology
        Memo Description
          As ThermalTime accumulates the crop progresses through the following phases:
        WeightedTemperatureFunction ThermalTime: MaximumTemperatureWeighting=0.5
          XYPairs: X=[0, 30, 40]; Y=[0, 30, 0]
        GerminatingPhase: Start=Seed; End=Germination; IsEmerged=false
        EmergingPhase Emerging: Start=Germination; End=Emergence; IsEmerged=true; TTForTimeStep=0
          VariableReference ThermalTime: VariableName=[Phenology].ThermalTime
          MultiplyFunction Target
            VariableReference SowingDepth: VariableName=[Plant].SowingData.Depth
            Constant ShootRate: FixedValue=5; Units=oCd/mm
        GenericPhase Seedling: Start=Emergence; End=Seedling; IsEmerged=true
          Memo Description
            The phase that runs from sowing until the seedlings are established (later that emergence)
          Constant Target: FixedValue=0; Units=<sup>o</sup>Cd
          VariableReference Progression: VariableName=[Phenology].ThermalTime
        GenericPhase Vegetative: Start=Seedling; End=Vegetative; IsEmerged=true
          Memo Description
            During the vegetative phase the crop is producing leaf and stem and closing its canopy
          Constant Target: FixedValue=0; Units=<sup>o</sup>Cd
          VariableReference Progression: VariableName=[Phenology].ThermalTime
        GenericPhase EarlyReproductive: Start=Vegetative; End=EarlyReproductive; IsEmerged=true
          Memo Description
            During the early reproductive stage the crop will be flowering
          Constant Target: FixedValue=0; Units=<sup>o</sup>Cd
          VariableReference Progression: VariableName=[Phenology].ThermalTime
        GenericPhase MidReproductive: Start=EarlyReproductive; End=MidReproductive; IsEmerged=true
          Constant Target: FixedValue=0; Units=<sup>o</sup>Cd
          VariableReference Progression: VariableName=[Phenology].ThermalTime
          Memo Description
            During this plant has started grain filling.
        GenericPhase LateReproductive: Start=MidReproductive; End=LateReproductive; IsEmerged=true
          Constant Target: FixedValue=0; Units=<sup>o</sup>Cd
          VariableReference Progression: VariableName=[Phenology].ThermalTime
          Memo Description
            During this phase the crop is completing grain filling
        GenericPhase Maturity: Start=LateReproductive; End=Maturity; IsEmerged=true
          Constant Target: FixedValue=0; Units=<sup>o</sup>Cd
          VariableReference Progression: VariableName=[Phenology].ThermalTime
          Memo Description
            Grain filling is nearly complete
        GenericPhase Ripe: Start=Maturity; End=Ripe; IsEmerged=true
          Constant Target: FixedValue=0; Units=<sup>o</sup>Cd
          VariableReference Progression: VariableName=[Phenology].ThermalTime
          Memo Description
            During this phase grains are drying down to be ready for harvest
        EndPhase ReadyForHarvesting: Start=Ripe; End=Unused; IsEmerged=true
          VariableReference ThermalTime: VariableName=[Phenology].ThermalTime
      OrganArbitrator Arbitrator
        BiomassTypeArbitrator DMArbitration
          Folder PotentialPartitioningMethods
            ReallocationMethod
            AllocateFixationMethod
            RetranslocationMethod
            SendPotentialDMAllocationsMethod
          Folder AllocationMethods
            NutrientConstrainedAllocationMethod
            DryMatterAllocationsMethod
          RelativeAllocation ArbitrationMethod
        BiomassTypeArbitrator NArbitration
          Folder PotentialPartitioningMethods
            ReallocationMethod
          Folder ActualPartitioningMethods
            AllocateFixationMethod
            RetranslocationMethod
          Folder AllocationMethods
            NitrogenAllocationsMethod
          RelativeAllocation ArbitrationMethod
          AllocateUptakesMethod
        WaterUptakeMethod
        NitrogenUptakeMethod
      GenericOrgan Product: IsAboveGround=true
        Memo Description
          It is the biomass that is removed from the crop at harvest and may include grain, root, leaf, stem, pod or any other organ type depending on the type of crop and how it is harvested.
        Constant NConcAtMaturity: FixedValue=0
        AddFunction MaximumNConc
          VariableReference NConcAtMaturity: VariableName=[Product].NConcAtMaturity
          MultiplyFunction EarlyNConcElevation
            SubtractFunction
              Constant NConcAtSeedling: FixedValue=0.05
              VariableReference NConcAtMaturity: VariableName=[Product].NConcAtMaturity
            LinearInterpolationFunction DilutionCurve
              XYPairs: X=[1, 4, 5, 6, 7, 8, 9]; Y=[1, 1, 0.15, 0.05, 0, 0, 0]
              VariableReference XValue: VariableName=[Phenology].Stage
        VariableReference CriticalNConc: VariableName=[Product].NConcAtMaturity
        VariableReference MinimumNConc: VariableName=[Product].NConcAtMaturity
        Constant NReallocationFactor: FixedValue=0
        Constant RemobilisationCost: FixedValue=0
        Constant ExpectedYield: FixedValue=0
          Memo Description
            This is the Product yield (g/m2 fresh weight) that SCRUM will predict provided nitrogen and water supply are non-limiting
        Constant DryMatterContent: FixedValue=0
          Memo Description
            This is the dry matter content of the harvested yield and is used to convert fresh yield into *DryYield* which are subsequently used in determining *Ymax* (total biomass production), daily dry matter production, *HarvestIndex* and the *PartitioningFraction* of each organ
        MultiplyFunction DryYield
          Memo Description
            This variable is the product yield of the crop in g/m2 dry weight
          VariableReference FreshYld: VariableName=[Product].ExpectedYield
          VariableReference DMPercent: VariableName=[Product].DryMatterContent
        SubtractFunction WaterContent
          Memo Description
            This is used to convert the total Dry Matter of this organ back to fresh mass once daily partitining is complete.
          Constant One: FixedValue=1
          VariableReference DMcontent: VariableName=[Product].DryMatterContent
        Constant HarvestIndex: FixedValue=0
          Memo Description
            This is the Product yield (g/m2 fresh weight) that SCRUM will predict provided nitrogen and water supply are non-limiting
        Constant SenescenceRate: FixedValue=0; Units=/d
        BiomassRemoval BiomassRemovalDefaults
          OrganBiomassRemovalType Harvest: FractionLiveToRemove=1; FractionDeadToRemove=1; FractionLiveToResidue=0; FractionDeadToResidue=0
          OrganBiomassRemovalType Cut: FractionLiveToRemove=1; FractionDeadToRemove=1; FractionLiveToResidue=0; FractionDeadToResidue=0
          OrganBiomassRemovalType Prune: FractionLiveToRemove=0; FractionDeadToRemove=0; FractionLiveToResidue=0; FractionDeadToResidue=0
          OrganBiomassRemovalType Graze: FractionLiveToRemove=1; FractionDeadToRemove=1; FractionLiveToResidue=0; FractionDeadToResidue=0
        Constant DetachmentRateFunction: FixedValue=0; Units=/d
        Constant MaintenanceRespirationFunction: FixedValue=0; Units=0-1
        Constant DMConversionEfficiency: FixedValue=1; Units=0-1
        Constant NRetranslocationFactor: FixedValue=0
        Constant NitrogenDemandSwitch: FixedValue=1
        Constant DMReallocationFactor: FixedValue=0
        Constant DMRetranslocationFactor: FixedValue=0
        Constant CarbonConcentration: FixedValue=0.4
        NutrientDemandFunctions DMDemands
          MultiplyFunction Structural
            PartitionFractionDemandFunction DMDemandFunction
              SubtractFunction PartitionFraction
                Constant One: FixedValue=1
                VariableReference RootFraction: VariableName=[Root].RootProportion
                VariableReference StoverFraction
                  VariableName=[Stover].DMDemands.Structural.DMDemandFunction.PartitionFraction
            Constant StructuralFraction: FixedValue=1; Units=0-1
          Constant Metabolic: FixedValue=0
          Constant Storage: FixedValue=0
          Constant QStructuralPriority: FixedValue=1
          Constant QMetabolicPriority: FixedValue=1
          Constant QStoragePriority: FixedValue=1
        NutrientDemandFunctions NDemands
          MultiplyFunction Structural
            VariableReference MinNconc: VariableName=[Product].minimumNconc
            VariableReference PotentialDMAllocation: VariableName=[Product].potentialDMAllocation.Structural
            Constant off: FixedValue=0
          MultiplyFunction Metabolic
            SubtractFunction MetabolicNconc
              VariableReference CritNconc: VariableName=[Product].criticalNConc
              VariableReference MinNconc: VariableName=[Product].minimumNconc
            VariableReference PotentialDMAllocation: VariableName=[Product].potentialDMAllocation.Structural
            Constant off: FixedValue=0
          StorageNDemandFunction Storage
            VariableReference NitrogenDemandSwitch: VariableName=[Product].nitrogenDemandSwitch
            VariableReference MaxNconc: VariableName=[Product].MaximumNconc
          Constant QStructuralPriority: FixedValue=1
          Constant QMetabolicPriority: FixedValue=1
          Constant QStoragePriority: FixedValue=1
        RetranslocateNonStructural RetranslocateNitrogen
        NutrientPoolFunctions InitialWt
          Constant Structural: FixedValue=0; Units=g/m^2
          Constant Metabolic: FixedValue=0
          Constant Storage: FixedValue=0
        Constant Photosynthesis: FixedValue=0
        VariableReference initialNConcFunction: VariableName=[Product].MaximumNConc
      SimpleLeaf Stover: Albedo=0.18; Gsmax350=0.01; R50=150; LeafInitialisationStage=Emergence; Height=0; BaseHeight=0; Width=0; FRGR=0; PotentialEP=0; WaterDemand=0; KDead=0.1; LAIDead=0
        Memo Description
          Stover represents any part of the crop that is not removed at harvest (i.e not part of the product).
        Constant StomatalConductanceCO2Modifier: FixedValue=1
        Constant NReallocationFactor: FixedValue=0
        Constant RemobilisationCost: FixedValue=0
        Constant SenescenceRate: FixedValue=0
        Constant DetachmentRate: FixedValue=0; Units=/d
        Constant InitialWt: FixedValue=0; Units=g/m2
        MultiplyFunction Photosynthesis
          DeltaFunction UnStressedBiomass: StartStageName=Emergence
            SigmoidFunction Integral
              VariableReference Ymax: VariableName=[Scrum].TotalDMAtHarvest
              VariableReference XValue: VariableName=[Phenology].AccumulatedEmergedTT
              Constant Xo: FixedValue=0
                Memo Description
                  Is a coefficient for the potential biomass accumulation function
              Constant b: FixedValue=0
                Memo Description
                  Is another coefficient for the potential biomass accumulation function
          LinearInterpolationFunction WaterStressFactor
            XYPairs: X=[0, 1]; Y=[1, 1]
            VariableReference XValue: VariableName=[Stover].Fw
        MinimumFunction FRGR
          SubDailyInterpolation FRGRFunctionTemp: agregationMethod=0
            XYPairs Response: X=[0, 10, 25, 40]; Y=[0, 1, 1, 0]
            ThreeHourAirTemperature InterpolationMethod
        PhaseLookup LaiDead
          PhaseLookupValue Expanding: Start=Emergence; End=MidReproductive
            Constant: FixedValue=0
          PhaseLookupValue Senescence: Start=MidReproductive; End=Maturity
            MultiplyFunction SenescingLAI
              HoldFunction MaxLAI: WhenToHold=MidReproductive
                VariableReference ValueToHold: VariableName=[Stover].LAI
              SubtractFunction ProportionLost
                Constant One: FixedValue=1
              DivideFunction ProportionSenesced
                SubtractFunction TTSenesce
                  VariableReference AccumulatedThermalTime: VariableName=[Phenology].AccumulatedEmergedTT
                  AddFunction ThermalTimeAtStartSenescence
                    VariableReference Seedling: VariableName=[Phenology].Seedling.Target
                    VariableReference Vegetative: VariableName=[Phenology].Vegetative.Target
                    VariableReference EarlyReproductive: VariableName=[Phenology].EarlyReproductive.Target
                    VariableReference MidReproductive: VariableName=[Phenology].MidReproductive.Target
                AddFunction SenescentPhaseDuration
                  VariableReference LateReproductive: VariableName=[Phenology].LateReproductive.Target
                  VariableReference Maturity: VariableName=[Phenology].Maturity.Target
        PhaseLookup Cover
          PhaseLookupValue Expanding: Start=Emergence; End=MidReproductive
            SigmoidFunction SigCoverFunction
              Constant Ymax: FixedValue=0
              VariableReference XValue: VariableName=[Phenology].AccumulatedEmergedTT
              Constant Xo: FixedValue=0
              Constant b: FixedValue=0
          PhaseLookupValue Senescence: Start=MidReproductive; End=Maturity
            MultiplyFunction DecreasingCover
              HoldFunction MaxCover: WhenToHold=MidReproductive
                VariableReference ValueToHold: VariableName=[Stover].CoverGreen
              SubtractFunction ProportionLost
                Constant One: FixedValue=1
                DivideFunction ProportionRemaining: same as Replacements.SCRUM.Stover.LaiDead.Senescence.SenescingLAI.ProportionSenesced
        Constant ExtinctionCoefficient: FixedValue=0
          Memo Description
            The extinction coefficient is used to calculate a LAI value (needed by MicroClimate) from the canopy cover
        SigmoidFunction HeightFunction
          Constant Ymax: FixedValue=0
            Memo Description
              Is another coefficient for the potential biomass accumulation function
          VariableReference XValue: VariableName=[Phenology].AccumulatedEmergedTT
          Constant Xo: FixedValue=0
            Memo Description
              Is a coefficient for the potential biomass accumulation function
          Constant b: FixedValue=0
            Memo Description
              Is another coefficient for the potential biomass accumulation function
        Constant NConcAtMaturity: FixedValue=0
        AddFunction MaximumNConc
          VariableReference NConcAtMaturity: VariableName=[Stover].NConcAtMaturity
          MultiplyFunction EarlyNConcElevation
            SubtractFunction
              Constant NConcAtSeedling: FixedValue=0.05
              VariableReference NConcAtMaturity: VariableName=[Stover].NConcAtMaturity
            LinearInterpolationFunction DilutionCurve: same as Replacements.SCRUM.Product.MaximumNConc.EarlyNConcElevation.DilutionCurve
        VariableReference CriticalNConc: VariableName=[Stover].NConcAtMaturity
        VariableReference MinimumNConc: VariableName=[Stover].NConcAtMaturity
        Constant NitrogenDemandSwitch: FixedValue=1
        SubtractFunction DMAtHarvest
          MultiplyFunction AboveGroundDMAtHarvest
            VariableReference ProductDM: VariableName=[Product].DryYield
            DivideFunction InvertedHI
              Constant One: FixedValue=1
              VariableReference HarvestIndex: VariableName=[Product].HarvestIndex
          VariableReference ProductDMAtHarvest: VariableName=[Product].DryYield
        BiomassRemoval BiomassRemovalDefaults
          OrganBiomassRemovalType Harvest: FractionLiveToRemove=0; FractionDeadToRemove=0; FractionLiveToResidue=1; FractionDeadToResidue=1
          OrganBiomassRemovalType Cut: FractionLiveToRemove=0; FractionDeadToRemove=0; FractionLiveToResidue=1; FractionDeadToResidue=1
          OrganBiomassRemovalType Prune: FractionLiveToRemove=0; FractionDeadToRemove=0; FractionLiveToResidue=0; FractionDeadToResidue=0
          OrganBiomassRemovalType Graze: FractionLiveToRemove=0; FractionDeadToRemove=0; FractionLiveToResidue=1; FractionDeadToResidue=1
        Constant MaintenanceRespiration: FixedValue=0; Units=0-1
        Constant DMConversionEfficiency: FixedValue=1; Units=0-1
        Constant NRetranslocationFactor: FixedValue=0
        Constant DMReallocationFactor: FixedValue=0
        Constant DMRetranslocationFactor: FixedValue=0
        Constant CarbonConcentration: FixedValue=0.4
        NutrientDemandFunctions DMDemands
          MultiplyFunction Structural
            PartitionFractionDemandFunction DMDemandFunction
              Memo Description
                DM demand is based on a simple partitioning coefficients.  At harvest the biomass partitioned to the stover = TotalDM * (1 - RootProportion) * (1 - Harvest index).  However the partitioningFraction is more complicated that this as it partitions more biomass to the stover in the CanopyExpanding Phase and less in the Yield increasing phase to give realistic patterns of accumulation of biomass in the Stover and Product over the duration of the crop
              DivideFunction PartitionFraction
                VariableReference StoverDMAtHarvest: VariableName=[Stover].DMAtHarvest
                VariableReference TotalDMAtHarvest: VariableName=[Scrum].TotalDMAtHarvest
            Constant StructuralFraction: FixedValue=1; Units=0-1
          Constant Metabolic: FixedValue=0
          Constant Storage: FixedValue=0
          Constant QStructuralPriority: FixedValue=1
          Constant QMetabolicPriority: FixedValue=1
          Constant QStoragePriority: FixedValue=1
        NutrientDemandFunctions NDemands
          MultiplyFunction Structural
            VariableReference MinNconc: VariableName=[Stover].minimumNconc
            VariableReference PotentialDMAllocation: VariableName=[Stover].potentialDMAllocation.Structural
            Constant off: FixedValue=0
          MultiplyFunction Metabolic
            SubtractFunction MetabolicNconc
              VariableReference CritNconc: VariableName=[Stover].criticalNConc
              VariableReference MinNconc: VariableName=[Stover].minimumNconc
            VariableReference PotentialDMAllocation: VariableName=[Stover].potentialDMAllocation.Structural
            Constant off: FixedValue=0
          StorageNDemandFunction Storage
            VariableReference NitrogenDemandSwitch: VariableName=[Stover].nitrogenDemandSwitch
            VariableReference MaxNconc: VariableName=[Stover].MaximumNconc
          Constant QStructuralPriority: FixedValue=1
          Constant QMetabolicPriority: FixedValue=1
          Constant QStoragePriority: FixedValue=1
      Root: GrowthRespiration=0; MaintenanceRespiration=0
        RootShapeCylinder RootShape
        Memo Description
          The root organ demands and is partitioned N and DM and its depth increases through time to provide a water uptake supply
        Constant DMConversionEfficiency: FixedValue=1; Units=0-1
        Constant RemobilisationCost: FixedValue=0
        KLModiferVsDepthFunction KLModifier
          VariableReference LayerDepth: VariableName=[Physical].DepthMidPoints
          VariableReference MaximumRootDepth: VariableName=[Root].MaximumRootDepth
        Constant SoilWaterEffect: FixedValue=1
        Constant MaxDailyNUptake: FixedValue=12
        Constant SenescenceRate: FixedValue=0
        Constant MaximumNConc: FixedValue=0
        VariableReference CriticalNConc: VariableName=[Root].MaximumNConc
        VariableReference MinimumNConc: VariableName=[Root].MaximumNConc
        Constant NitrogenDemandSwitch: FixedValue=1
        Constant MaximumRootDepth: FixedValue=0
        MultiplyFunction RootFrontVelocity
          LessThanFunction RootFrontVelocity
            VariableReference TestVariable: VariableName=[Phenology].AccumulatedEmergedTT
            AddFunction GrowthDuration
              VariableReference Emerging: VariableName=[Phenology].Emerging.Target
              VariableReference Seedling: VariableName=[Phenology].Seedling.Target
              VariableReference Vegetative: VariableName=[Phenology].Vegetative.Target
              VariableReference EarlyReproductive: VariableName=[Phenology].EarlyReproductive.Target
            DivideFunction IfTrue
              VariableReference MaxRootDepth: VariableName=[Root].MaximumRootDepth
              VariableReference GrowthDuration: VariableName=[Root].RootFrontVelocity.RootFrontVelocity.GrowthDuration
            Constant IfFalse: FixedValue=0
          VariableReference ThermalTime: VariableName=[Phenology].ThermalTime
        Constant RootProportion: FixedValue=0.1
          Memo Description
            This is the proportion of total biomass that is paritioned into the roots and is used to set the partitioning fraction for the roots
        BiomassRemoval BiomassRemovalDefaults
          OrganBiomassRemovalType Harvest: FractionLiveToRemove=0; FractionDeadToRemove=0; FractionLiveToResidue=1; FractionDeadToResidue=1
          OrganBiomassRemovalType Cut: FractionLiveToRemove=0; FractionDeadToRemove=0; FractionLiveToResidue=1; FractionDeadToResidue=1
          OrganBiomassRemovalType Prune: FractionLiveToRemove=0; FractionDeadToRemove=0; FractionLiveToResidue=0; FractionDeadToResidue=0
          OrganBiomassRemovalType Graze: FractionLiveToRemove=0; FractionDeadToRemove=0; FractionLiveToResidue=0.3; FractionDeadToResidue=0
        Constant SpecificRootLength: FixedValue=40; Units=m/g
        LinearInterpolationFunction KNO3
          XYPairs: X=[0, 0.003]; Y=[0.02, 0.02]
          VariableReference XValue: VariableName=[Root].LengthDensity
        LinearInterpolationFunction KNH4
          XYPairs: X=[0, 0.003]; Y=[0, 0]
          VariableReference XValue: VariableName=[Root].LengthDensity
        LinearInterpolationFunction NUptakeSWFactor
          XYPairs: X=[0, 1]; Y=[0, 1]
          VariableReference XValue: VariableName=[Root].RWC
        Constant MaintenanceRespirationFunction: FixedValue=0
        Constant CarbonConcentration: FixedValue=0.4
        NutrientDemandFunctions DMDemands
          MultiplyFunction Structural
            PartitionFractionDemandFunction DMDemandFunction
              VariableReference PartitionFraction: VariableName=[Root].RootProportion
            Constant StructuralFraction: FixedValue=1
          Constant Metabolic: FixedValue=0
          Constant Storage: FixedValue=0
          Constant QStructuralPriority: FixedValue=1
          Constant QMetabolicPriority: FixedValue=1
          Constant QStoragePriority: FixedValue=1
        NutrientDemandFunctions NDemands
          MultiplyFunction Structural
            VariableReference MinNconc: VariableName=[Root].minimumNconc
            VariableReference PotentialDMAllocation: VariableName=[Root].potentialDMAllocation.Structural
          Constant Metabolic: FixedValue=0
          Constant Storage: FixedValue=0
          Constant QStructuralPriority: FixedValue=1
          Constant QMetabolicPriority: FixedValue=1
          Constant QStoragePriority: FixedValue=1
        NutrientPoolFunctions InitialWt
          Constant Structural: FixedValue=0; Units=g/m2
          Constant Metabolic: FixedValue=0
          Constant Storage: FixedValue=0
      Nodule
        Memo Description
          The nodule organ is unparameterised and simply has a switch that is turned on for legume crops (so they can fix what ever N the crop demands) and switched off for non legume crops (which fix no N)
        Constant MaximumNConc: FixedValue=0
        Constant CriticalNConc: FixedValue=0
        Constant MinimumNConc: FixedValue=0
        Constant RemobilisationCost: FixedValue=0
        Constant NReallocationFactor: FixedValue=0
        Constant SenescenceRate: FixedValue=0
        Constant FixationRate: FixedValue=0
        BiomassRemoval BiomassRemovalDefaults
          OrganBiomassRemovalType Harvest: FractionLiveToRemove=0; FractionDeadToRemove=0; FractionLiveToResidue=0; FractionDeadToResidue=0
          OrganBiomassRemovalType Cut: FractionLiveToRemove=0; FractionDeadToRemove=0; FractionLiveToResidue=0; FractionDeadToResidue=0
          OrganBiomassRemovalType Prune: FractionLiveToRemove=0; FractionDeadToRemove=0; FractionLiveToResidue=0; FractionDeadToResidue=0
          OrganBiomassRemovalType Graze: FractionLiveToRemove=0; FractionDeadToRemove=0; FractionLiveToResidue=0; FractionDeadToResidue=0
        Constant InitialWtFunction: FixedValue=0; Units=g/m^2
        Constant DetachmentRateFunction: FixedValue=0; Units=/d
        Constant FixationMetabolicCost: FixedValue=0
        Constant MaintenanceRespirationFunction: FixedValue=0; Units=0-1
        Constant DMConversionEfficiency: FixedValue=1; Units=0-1
        Constant NRetranslocationFactor: FixedValue=0
        Constant NitrogenDemandSwitch: FixedValue=0
        Constant DMReallocationFactor: FixedValue=0
        Constant DMRetranslocationFactor: FixedValue=0
        Constant CarbonConcentration: FixedValue=0.4
        NutrientPoolFunctions DMDemands
          Constant Structural: FixedValue=0
          Constant Metabolic: FixedValue=0
          Constant Storage: FixedValue=0
        NutrientPoolFunctions NDemands: same as Replacements.SCRUM.Nodule.DMDemands
      CompositeBiomass Total: OrganNames=[Stover, Product, Root]; IncludeLive=true; IncludeDead=true
      CompositeBiomass AboveGround: OrganNames=[Stover, Product]; IncludeLive=true; IncludeDead=true
        Memo
          The AboveGround composite biomass object includes Stover and Product organs.
      Constant MortalityRate: FixedValue=0
      Constant SeedMortalityRate: FixedValue=0
      MultiplyFunction TotalDMAtHarvest
        VariableReference ProductDryYield: VariableName=[Product].DryYield
        DivideFunction InvertedHI
          Constant One: FixedValue=1
          VariableReference HarvestIndex: VariableName=[Product].HarvestIndex
        DivideFunction InvertedAboveGroundPropn
          Constant One: FixedValue=1
          SubtractFunction AboveGroundFunction
            Constant One: FixedValue=1
            VariableReference RootPropn: VariableName=[Root].RootProportion
      ScrumCrop Cereal: HarvestIndex=0.45; MoisturePc=14; Proot=0.1; MaxRD=1005; MaxHeight=700; Acover=0.97; ExtinctCoeff=0.55; RootNConc=0.01; StoverNConc=0.01; ProductNConc=0.015; BaseT=0; OptT=30; MaxT=40; Legume=false; WaterStress=false
      ScrumCrop Legume: HarvestIndex=0.5; MoisturePc=12; Proot=0.1; MaxRD=600; MaxHeight=500; Acover=0.97; ExtinctCoeff=0.85; RootNConc=0.01; StoverNConc=0.03; ProductNConc=0.025; BaseT=0; OptT=30; MaxT=40; Legume=true; WaterStress=false
      GetTempSum
  DataStore
  Simulation SCRUMTestBase
    Weather: FileName=%root%\Tests\WeatherFiles\lincoln.met
    Clock: Start=1998-10-14; End=1999-03-01
    Summary
    SoilArbitrator Soil Arbitrator
    Zone Field: Area=1; Slope=0; AspectAngle=0; Altitude=50
      Soil: Latitude=0; Longitude=0
        Chemical: Thickness=[100, 200, 300, 300, 300, 300]; PH=[6.6, 6.2, 5.7, 5.5, 5.5, 5.5]; PHUnits=Water
        Water: Thickness=[100, 200, 300, 300, 300, 300]; InitialValues=[0.33, 0.33, 0.31, 0.15, 0.1, 0.06]; InitialPAWmm=180; RelativeTo=LL15; FilledFromTop=false
        Physical
          Thickness  BD   AirDry  LL15  DUL   SAT
          100        1.2  0.08    0.13  0.33  0.5
          200        1.2  0.13    0.13  0.33  0.5
          300        1.2  0.1     0.1   0.31  0.44
          300        1.2  0.06    0.06  0.15  0.46
          300        1.2  0.04    0.04  0.1   0.44
          300        1.2  0.02    0.02  0.06  0.44
          SoilCrop SCRUMSoil: LL=[0.13, 0.13, 0.1, 0.08, 0.11, 0.11]; KL=[0.1, 0.1, 0.1, 0.1, 0.1, 0.1]; XF=[1, 1, 1, 1, 1, 1]
          SoilCrop PotatoSoil: LL=[0.13, 0.13, 0.27, 0.27, 0.3, 0.3]; KL=[0.1, 0.06, 0.03, 0.01, 0, 0]; XF=[1, 1, 0.1, 0, 0, 0]
        WaterBalance SoilWater: SummerDate=1-Nov; SummerU=9; SummerCona=4.4; WinterDate=1-Apr; WinterU=9; WinterCona=4.4; DiffusConst=88; DiffusSlope=35.4; Salb=0.18; CN2Bare=68; CNRed=20; CNCov=0.8; DischargeWidth=0; CatchmentArea=0; PSIDul=-100
          Thickness  SWCON  KLAT
          100        0.55   0
          200        0.55   0
          300        0.55   0
          300        0.55   0
          300        0.55   0
          300        0.55   0
        SoilNitrogen: fom_types=[default, manure, mucuna, lablab, shemp, stable]; fract_carb=[0.2, 0.3, 0.54, 0.57, 0.45, 0]; fract_cell=[0.7, 0.3, 0.37, 0.37, 0.47, 0.1]; fract_lign=[0.1, 0.4, 0.09, 0.06, 0.08, 0.9]; NPartitionApproach=0
        Organic: FOMCNRatio=30; CarbonUnits=Total
          Thickness  Carbon  SoilCNRatio  FBiom  FInert  FOM
          100        1.82    11.5         0.025  0.3     1243.93
          200        1.47    11.5         0.025  0.4     833.832
          300        1.2     11.5         0.015  0.75    457.617
          300        1.03    11.5         0.01   0.9     251.145
          300        0.47    11.5         0.01   0.96    137.831
          300        0.47    11.5         0.01   0.96    75.6435
        LayerStructure
          Thickness=[100, 100, 100, 100, 100, 100, 100, 100, 100, 100, 100, 100, 100, 100, 100]
        CERESSoilTemperature Temperature
        SoilNitrogenNO3 NO3: Thickness=[100, 200, 300, 300, 300, 300]; InitialValues=[225, 12.5, 1.38889, 1.38889, 0, 0]; InitialValuesUnits=ppm; WaterTableConcentration=0; D0=0; DepthConstant=0; MaxDepthSoluteAccessible=0; RunoffEffectivenessAtMovingSolute=0; MaxEffectiveRunoff=0
        SoilNitrogenNH4 NH4: Thickness=[100, 200, 300, 300, 300, 300]; InitialValues=[0, 0, 0, 0, 0, 0]; InitialValuesUnits=ppm; WaterTableConcentration=0; D0=0; DepthConstant=0; MaxDepthSoluteAccessible=0; RunoffEffectivenessAtMovingSolute=0; MaxEffectiveRunoff=0
        SoilNitrogenUrea Urea: Thickness=[100, 200, 300, 300, 300, 300]; InitialValues=[0, 0, 0, 0, 0, 0]; InitialValuesUnits=kg/ha; WaterTableConcentration=0; D0=0; DepthConstant=0; MaxDepthSoluteAccessible=0; RunoffEffectivenessAtMovingSolute=0; MaxEffectiveRunoff=0
      SurfaceOrganicMatter surface organic matter: InitialResidueName=wheat; InitialResidueType=wheat; InitialResidueMass=2000; InitialStandingFraction=0; InitialCPR=0; InitialCNR=80
      MicroClimate: a_interception=0; b_interception=1; c_interception=0; d_interception=0; SoilHeatFluxFraction=0.4; MinimumHeightDiffForNewLayer=0; NightInterceptionFraction=0.5; ReferenceHeight=2
      Manager Sow Cereal on a fixed date
        CropName = Cereal
        EstablishDate = 10/14/1998 00:00:00
        EstablishStage = Seed
        PlantingDepth = 15
        HarvestDate = 01/01/0001 00:00:00
        HarvestTT = 1000
        HarvestStage = Maturity
        PotentialYield = 8
        FieldLoss = 0
        ResidueRemoval = 0
```csharp
using APSIM.Shared.Utilities;
using Models.Utilities;
using Models.Soils;
using Models.PMF;
using Models.Core;
using System;
using System.Linq;
using Models.PMF.Scrum;

namespace Models
{
    [Serializable]
    public class Script : Model
    {
        [Link] Clock clock;
        [Link] Zone zone;
        /// <summary>The plant</summary>
        [Link(Type = LinkType.Scoped, ByName = true)]
        public Plant scrum = null;
        
        [Separator("Choose one of your specified scrum crops to plant")]
        
        /// <summary>Establishemnt Date</summary>
        [Description("Crop to plant")]
        [Display(Type = DisplayType.SCRUMcropName)]
        public string CropName { get; set; }

        /// <summary>Establishemnt Date</summary>
        [Description("Establishment Date")]
        public DateTime EstablishDate { get; set; }
       
        /// <summary>Stages that Scrum crops may be established at</summary>
        [Description("Establishment Stage")]
        [Display(Type = DisplayType.ScrumEstablishStages)]
        public string EstablishStage {get; set;}
        
        /// <summary>Planting depth (mm)</summary>
        [Description("Planting depth (mm)")]
        public double PlantingDepth { get; set; }

        [Separator("Scrum needs to have a valid harvest date or Harvest Tt (from establishment) specified")]
        
        /// <summary>Harvest Date</summary>
        [Description("Harvest Date")]
        public DateTime HarvestDate { get; set; }

        /// <summary>Harvest Tt (if blank or zero must specify harvest date)</summary>
        [Description("Harvest Tt (oCd)")]
        public double HarvestTT { get; set; }
        
        /// <summary>Stage that Scrum crop is harvested at</summary>
        [Description("Harvest Stage")]
        [Display(Type = DisplayType.ScrumHarvestStages)]
        public string HarvestStage {get; set;}

        [Separator("Specify an appropriate potential yeild for the location, sowing date and assumed genotype \nScrum will reduce yield below potential if water or N stress are predicted")]
        
        /// <summary>Expected Yield (g FW/m2)</summary>
        [Description("Potential Yield (t/Ha)")]
        public double PotentialYield {get; set;}
        
        [Separator("Specify proportions of field loss and residue removal at harvest")]
        
        /// <summary>Field loss (i.e the proportion of expected yield that is left in the field 
        /// because of diseaese, poor quality or lack of market)</summary>
        [Description("Field loss (%)")]
        public double FieldLoss { get; set; }

        /// <summary>Residue Removal (i.e the proportion of residues that are removed from the field 
        /// by bailing or some other means)</summary>
        [Description("Residue removal (%)")]
        public double ResidueRemoval { get; set; }
        
        private RemovalFractions Remove { get; set; }
        
        private ScrumManagement management {get; set;}
        
        [EventSubscribe("DoManagement")]
        private void OnDoManagement(object sender, EventArgs e)
        {
            if (clock.Today == EstablishDate)
            {
                management = new ScrumManagement(CropName,EstablishDate,EstablishStage,PlantingDepth,HarvestStage,PotentialYield,
                HarvestDate, HarvestTT, FieldLoss, ResidueRemoval);
                ScrumCrop currentCrop = zone.FindDescendant<ScrumCrop>(CropName);
                currentCrop.Establish(management);  
            }
        }
    }
}
```
      Plant SCRUM
        ScrumCrop Cereal: HarvestIndex=0.45; MoisturePc=14; Proot=0.1; MaxRD=1005; MaxHeight=700; Acover=0.97; ExtinctCoeff=0.55; RootNConc=0.01; StoverNConc=0.01; ProductNConc=0.015; BaseT=0; OptT=30; MaxT=40; Legume=false; WaterStress=false
        ScrumCrop Legume: HarvestIndex=0.5; MoisturePc=12; Proot=0.1; MaxRD=600; MaxHeight=500; Acover=0.97; ExtinctCoeff=0.85; RootNConc=0.01; StoverNConc=0.03; ProductNConc=0.025; BaseT=0; OptT=30; MaxT=40; Legume=true; WaterStress=false
        ScrumCrop Bolix: Legume=false; WaterStress=false
          zero: HarvestIndex, MoisturePc, Proot, MaxRD, MaxHeight, Acover, ExtinctCoeff, RootNConc, StoverNConc, ProductNConc, BaseT, OptT, MaxT
      Irrigation
      Fertiliser
      Manager AutomaticIrrigation
        Irrigate = True
        Season_Start = 1-Sep
        Season_End = 30-Apr
        Season_Allocation = 1000
        Refull_Frac = 0.95
        Trigger_Frac = 0.8
        Return_days = 3
        Maximum_Irrigation_Amount = 40
        Top_Depth = 600
```csharp
using Newtonsoft.Json;
using Models.PMF.Phen;
using APSIM.Shared.Utilities;
using System.Xml.Serialization;
using Models.Soils;
using Models.PMF;
using Models.Core;
using System;
using Models.PMF.Organs;
using Models.Interfaces;

        
namespace Models
{
    [Serializable] 
    [System.Xml.Serialization.XmlInclude(typeof(Model))]
    public class Script : Model
    {
        [Link] private ISummary summary;
        [Link] private Irrigation Irrigation;
        [Link] private Clock Clock;
        [Link] private Soil Soil;
        [Link] private Plant SCRUM;
        [Link(Type = LinkType.Path, Path = "[SCRUM].Root")]
        private Root root;
        [Link(Type = LinkType.Path, Path = "[SCRUM].Phenology")]
        private Phenology phenology;
        [Link]
        private IPhysical soilPhysical;
        [Link]
        private ISoilWater waterBalance;
        //Communication to other modules
       
        //User inputs from properties tab
        [Description("Irrigation on (yes or no)")]
        public bool Irrigate { get; set; }
        [Description("SeasonStart (dd-MMM)")]
        public string Season_Start { get; set; }
        [Description("SeasonEnd (dd-MMM)")]
        public string Season_End { get; set; }
        [Description("Season Allocation (mm)")]
        public double Season_Allocation { get; set; }
        [Description("% PAWC to refill soil to (0-1)")]
        public double Refull_Frac { get; set; }
        [Description("% PAWC to trigger irrigation (0-1)")]
        public double Trigger_Frac { get; set; }
        [Description("Minimum days for irrigation to return")]
        public double Return_days { get; set; }
        [Description("Maximum irrigation application (mm)")]
        public double Maximum_Irrigation_Amount { get; set; }
        [Description("Depth to calculate PAWC (mm)")]
        public double Top_Depth { get; set; }
       
        //Class members
        [JsonIgnore] private bool IrrigationIsAvailable { get; set; }
        [JsonIgnore] public bool SeasonIsOpen { get; set; }
        [JsonIgnore] private bool CropIsActive { get; set; }
        [JsonIgnore] private bool IrrigatorIsAvailable { get; set; }
        [JsonIgnore] private bool SoilIsDry { get; set; }
        [JsonIgnore] public double Top_DUL { get; set; }
        [JsonIgnore] public double Top_Refull { get; set; }
        [JsonIgnore] public double Top_Trigger { get; set; }
        [JsonIgnore] public double Top_LL { get; set; }
        [JsonIgnore] public double Top_SW { get; set; }
        [JsonIgnore] public double Accumulated_depth { get; set; }
        [JsonIgnore] public double Days_since_irrigation { get; set; }
        [JsonIgnore] public double Amount_to_apply { get; set; }
        [JsonIgnore] public double Season_Application { get; set; }
        
        //Variables for date logic testing
        [JsonIgnore] public string StartString { get; set; }
        [JsonIgnore] public string EndString { get; set; }
        [JsonIgnore] public DateTime StartDate { get; set; }
        [JsonIgnore] public DateTime EndDate { get; set; }
        [JsonIgnore] public int TodayYear { get; set; }
        [JsonIgnore] public int TodayMonth { get; set; }
        [JsonIgnore] public int StartMonth { get; set; }
        [JsonIgnore] public int EndMonth { get; set; }
        [JsonIgnore] public int TodayDay { get; set; }
        [JsonIgnore] public int StartDay { get; set; }
        [JsonIgnore] public int EndDay { get; set; }
       
    
        //Calculate static soil variables
        [EventSubscribe("StartOfSimulation")]
        private void OnStartOfSimulation(object sender, EventArgs e)
        {   
            //Calculated soil water variables
            Accumulated_depth = 0;
            for (int layer = 0; Accumulated_depth < Top_Depth; layer++)
            {
                Top_LL += soilPhysical.LL15mm[layer];
                Top_DUL += soilPhysical.DULmm[layer];
                Accumulated_depth += soilPhysical.Thickness[layer];
            }
            Top_Refull = Top_LL + (Top_DUL - Top_LL) * Refull_Frac;
        }
       
      
        //Determine daily requirement for irrigation
        [EventSubscribe("StartOfDay")]
        private void OnStartOfDay(object sender, EventArgs e)
        { 
            //Can we irrigate?
            IrrigationIsAvailable = false; 
            if (Irrigate)
                IrrigationIsAvailable = true; 
    
            //Are we Allowed to Irrigate?
            TodayYear = Clock.Today.Year;
            StartString = Season_Start + "-" + TodayYear.ToString();
            EndString = Season_End + "-" + TodayYear.ToString();
            StartDate = DateTime.Parse(StartString);
            EndDate = DateTime.Parse(EndString);
            TodayMonth = Clock.Today.Month;
            TodayDay = Clock.Today.Day;
            StartDay = StartDate.Day;
            StartMonth = StartDate.Month;
            EndDay = EndDate.Day;
            EndMonth = EndDate.Month;
          
            SeasonIsOpen = false;
            //if we are in the spring and after the start date then yes
            if ((Clock.Today.Month > 6) && (Clock.Today >= StartDate))
                SeasonIsOpen = true;
            //if we are in the autumn and before the end date then yes
            if ((Clock.Today.Month <= 6) && (Clock.Today <= EndDate))
                SeasonIsOpen = true;
          
            //Is there a crop in the ground that needs irrigation?
            //CropIsActive = false;
            //if ((phenology.Stage >= 3.0) && (phenology.Stage < 6.0))
            CropIsActive = true;
          
            //Is the irrigator available?
            IrrigatorIsAvailable = false;
            Days_since_irrigation += 1;
            if (Days_since_irrigation >= Return_days)
                IrrigatorIsAvailable = true;
          
            //Is the soil dry enough to require irrigation?
            SoilIsDry = false;
            double CurrentRootDepth = 0;
            double RootDepth = root.Depth;
            CurrentRootDepth = Math.Max(RootDepth, CurrentRootDepth);
          
            double RelativeRootDepth = Math.Min(1.0, CurrentRootDepth / Top_Depth);
            Top_Trigger = Math.Min(Top_Refull, Top_DUL - (Top_DUL - Top_LL) * RelativeRootDepth * (1 - Trigger_Frac)); 
          
            Accumulated_depth = 0;
            Top_SW = 0;
            for (int layer = 0; Accumulated_depth < Top_Depth; layer++)
            {
                Top_SW += waterBalance.SWmm[layer];
                Accumulated_depth += soilPhysical.Thickness[layer];
            }
            if (Top_SW <= Top_Trigger)
                SoilIsDry = true;
                
            //Lets bloody well irrigate then!!!!
            if ((IrrigationIsAvailable) && (SeasonIsOpen) && (CropIsActive) && (IrrigatorIsAvailable) && (SoilIsDry)) //The conditions are rife for irrigation
            {
                Amount_to_apply = Math.Min(Top_Refull - Top_SW, Maximum_Irrigation_Amount);
                Amount_to_apply = Math.Min(Amount_to_apply, Season_Allocation - Season_Application); 
                Amount_to_apply = Math.Max(Amount_to_apply, 0.0);
                Irrigation.Apply(Amount_to_apply);
                Days_since_irrigation = 0;
                Season_Application += Amount_to_apply;
                summary.WriteMessage(this, "Automatic Irrigation", MessageType.Diagnostic);
            
            }
        }
    }
}
```
      Manager AutomaticFertiliser
        Season_Start = 1-Aug
        Season_End = 30-Apr
        Season_Allocation = 1000
        TriggerN = 50
        NApplicationAmount = 25
        Return_days = 3
        Top_Depth = 300
        Fertilise = True
```csharp
using Newtonsoft.Json;
using Models.PMF.Phen;
using Models.Soils.Nutrients;
using Models.Interfaces;
using APSIM.Shared.Utilities;
using Models.PMF;
using System.Xml.Serialization;
using Models.Soils;
using Models.Core;
using System;
using Models.PMF.Organs;

        
namespace Models
{
    [Serializable] 
    [System.Xml.Serialization.XmlInclude(typeof(Model))]
    public class Script : Model
    {
        [Link] private ISummary summary;
        [Link] private Fertiliser Fertiliser;
        [Link] private Clock Clock;
        [Link] private Plant SCRUM;
        [Link(ByName = true)]
        private ISolute NO3;
        [Link] private Soils.Soil Soil;
        [Link(Type = LinkType.Path, Path = "[SCRUM].Root")]
        private Root root;
        [Link(Type = LinkType.Path, Path = "[SCRUM].Phenology")]
        private Phenology phenology;
        [Link]
        private IPhysical soilPhysical;
        //Communication to other modules
       
        //User inputs from properties tab
        [Description("Fertilise (tick for yes)")]
        public bool Fertilise { get; set; }
        [Description("SeasonStart (dd-MMM)")]
        public string Season_Start { get; set; }
        [Description("SeasonEnd (dd-MMM)")]
        public string Season_End { get; set; }
        [Description("Season Allocation (kg/ha)")]
        public double Season_Allocation { get; set; }
        [Description("Mineral N to maintain soil above (kg/ha)")]
        public double TriggerN { get; set; }
        [Description("Amount of N to apply (kg/ha)")]
        public double NApplicationAmount { get; set; }
        [Description("Minimum days for Fertiliser spreader to return")]
        public double Return_days { get; set; }
        [Description("Depth to calculate mineral N (mm)")]
        public double Top_Depth { get; set; }
       
        //Class members
        [JsonIgnore] private bool FertiliserIsAvailable { get; set; }
        [JsonIgnore] public bool SeasonIsOpen { get; set; }
        [JsonIgnore] private bool CropIsActive { get; set; }
        [JsonIgnore] private bool FertSpreaderIsAvailable { get; set; }
        [JsonIgnore] private bool SoilNIsLow { get; set; }
        [JsonIgnore] public double Top_SoilN { get; set; }
        [JsonIgnore] public double Accumulated_depth { get; set; }
        [JsonIgnore] public double Days_since_fertiliser { get; set; }
        [JsonIgnore] public double Season_Application { get; set; }
        
        //Variables for date logic testing
        [JsonIgnore] public string StartString { get; set; }
        [JsonIgnore] public string EndString { get; set; }
        [JsonIgnore] public DateTime StartDate { get; set; }
        [JsonIgnore] public DateTime EndDate { get; set; }
        [JsonIgnore] public int TodayYear { get; set; }
        [JsonIgnore] public int TodayMonth { get; set; }
        [JsonIgnore] public int StartMonth { get; set; }
        [JsonIgnore] public int EndMonth { get; set; }
        [JsonIgnore] public int TodayDay { get; set; }
        [JsonIgnore] public int StartDay { get; set; }
        [JsonIgnore] public int EndDay { get; set; }
              
        //Determine daily requirement for fertiliser
        [EventSubscribe("StartOfDay")]
        private void OnStartOfDay(object sender, EventArgs e)
        { 
            //Can we irrigate?
            FertiliserIsAvailable = false; 
            if (Fertilise)
                FertiliserIsAvailable = true; 
    
            //Are we Allowed to Irrigate?
            TodayYear = Clock.Today.Year;
            StartString = Season_Start + "-" + TodayYear.ToString();
            EndString = Season_End + "-" + TodayYear.ToString();
            StartDate = DateTime.Parse(StartString);
            EndDate = DateTime.Parse(EndString);
            TodayMonth = Clock.Today.Month;
            TodayDay = Clock.Today.Day;
            StartDay = StartDate.Day;
            StartMonth = StartDate.Month;
            EndDay = EndDate.Day;
            EndMonth = EndDate.Month;
          
            SeasonIsOpen = false;
            //if we are in the spring and after the start date then yes
            if ((Clock.Today.Month > 6) && (Clock.Today >= StartDate))
                SeasonIsOpen = true;
            //if we are in the autumn and before the end date then yes
            if ((Clock.Today.Month <= 6) && (Clock.Today <= EndDate))
                SeasonIsOpen = true;
          
            //Is there a crop in the ground that needs irrigation?
            //CropIsActive = false;
            //if ((phenology.Stage >= 3.0) && (phenology.Stage < 6.0))
            CropIsActive = true;
          
            //Is the irrigator available?
            FertSpreaderIsAvailable = false;
            Days_since_fertiliser += 1;
            if (Days_since_fertiliser >= Return_days)
                FertSpreaderIsAvailable = true;
          
            //Is the soil N low enough to require fertiliser?
            SoilNIsLow = false;
            double CurrentRootDepth = 0;
            double RootDepth = root.Depth;
            CurrentRootDepth = Math.Max(RootDepth, CurrentRootDepth);
          
            Accumulated_depth = 0;
            Top_SoilN = 0;
            for (int layer = 0; Accumulated_depth < Top_Depth; layer++)
            {
                Top_SoilN += NO3.kgha[layer];
                Accumulated_depth += soilPhysical.Thickness[layer];
            }
            if (Top_SoilN <= TriggerN)
                SoilNIsLow = true;
                
            //Lets bloody well irrigate then!!!!
            if ((FertiliserIsAvailable) && (SeasonIsOpen) && (CropIsActive) && (FertSpreaderIsAvailable) && (SoilNIsLow)) //The conditions are rife for irrigation
            {
                Fertiliser.Apply(NApplicationAmount, Fertiliser.Types.UreaN, 10);
                Days_since_fertiliser = 0;
                Season_Application += NApplicationAmount;
                summary.WriteMessage(this, "Automatic Fertiliser", MessageType.Diagnostic);
            
            }
        }
    }
}
```
      Report: EventNames=[Clock].DoReport
        VariableNames:
          [Clock].Today
          [Soil].SoilWater.Drainage
          [Soil].SoilWater.Runoff
          [Soil].SoilWater.Eo
          [Soil].SoilWater.Es
          [Soil].SoilWater.pond
          [Soil].Water.MM
          [Soil].NO3.kgha
          [SCRUM].Stover.Live.Wt
          [SCRUM].Root.Live.Wt
          [SCRUM].Product.Live.Wt
          [SCRUM].Stover.Live.N
          [SCRUM].Root.Live.N
          [SCRUM].Product.Live.N
          [SCRUM].Stover.Live.NConc
          [SCRUM].Root.Live.NConc
          [SCRUM].Product.Live.NConc
          [SCRUM].Root.WaterUptake
          [SCRUM].Stover.Transpiration
          [SCRUM].Stover.WaterDemand
          [SCRUM].Root.Depth
          [SCRUM].Stover.CoverTotal
          [SCRUM].Stover.CoverDead
          [SCRUM].Stover.CoverGreen
          [SCRUM].Stover.LAI
          [SCRUM].Stover.LAIDead
          [SCRUM].Stover.Height
          [SCRUM].Arbitrator.N.TotalPlantDemand
          [SCRUM].Arbitrator.N.TotalPlantSupply
          [SCRUM].Stover.Fw
          [SCRUM].Stover.Fn
          [SCRUM].Total.Wt
          [SCRUM].Total.N
          [SCRUM].Arbitrator.DM.TotalFixationSupply
          [SCRUM].Arbitrator.DM.TotalPlantDemand
          [SCRUM].Phenology.AccumulatedEmergedTT
          [SCRUM].Phenology.AccumulatedTT
          [SCRUM].Arbitrator.DM.SinkLimitation
          [SCRUM].Arbitrator.DM.NutrientLimitation
          [SCRUM].Phenology.ThermalTime
          [SCRUM].Phenology.CurrentPhase.Name
          [SCRUM].Phenology.Stage
          [SCRUM].Phenology.CurrentStageName
          [AutomaticIrrigation].Script.Top_Refull
          [AutomaticIrrigation].Script.Top_Trigger
          [AutomaticIrrigation].Script.Top_SW
          [AutomaticIrrigation].Script.Top_DUL
          [Irrigation].IrrigationApplied
          [AutomaticIrrigation].Script.Amount_to_apply
          [AutomaticIrrigation].Script.StartDate
          [Clock].Today
          [AutomaticIrrigation].Script.SeasonIsOpen
          [AutomaticIrrigation].Script.EndDate
          [AutomaticIrrigation].Script.TodayYear
          [SCRUM].Arbitrator.FN
          [SCRUM].Arbitrator.N.TotalPlantSupply
          [SCRUM].Product.DMDemands.Structural.DMDemandFunction.PartitionFraction
          [SCRUM].Stover.DMDemands.Structural.DMDemandFunction.PartitionFraction
          [SCRUM].Root.DMDemands.Structural.DMDemandFunction.PartitionFraction
          [SCRUM].TotalDMAtHarvest
  Simulation SCRUMTestMultipleSowings
    Weather: FileName=%root%\Tests\WeatherFiles\lincoln.met
    Clock: Start=1998-10-14; End=2000-01-01
    Summary
    SoilArbitrator Soil Arbitrator
    Zone Field: Area=1; Slope=0; AspectAngle=0; Altitude=50
      Soil: same as SCRUMTestBase.Field.Soil
      SurfaceOrganicMatter surface organic matter: InitialResidueName=wheat; InitialResidueType=wheat; InitialResidueMass=2000; InitialStandingFraction=0; InitialCPR=0; InitialCNR=80
      MicroClimate: a_interception=0; b_interception=1; c_interception=0; d_interception=0; SoilHeatFluxFraction=0.4; MinimumHeightDiffForNewLayer=0; NightInterceptionFraction=0.5; ReferenceHeight=2
      Plant SCRUM
        ScrumCrop Cereal: HarvestIndex=0.45; MoisturePc=14; Proot=0.1; MaxRD=1005; MaxHeight=700; Acover=0.97; ExtinctCoeff=0.55; RootNConc=0.01; StoverNConc=0.01; ProductNConc=0.015; BaseT=0; OptT=30; MaxT=40; Legume=false; WaterStress=false
        ScrumCrop Legume: HarvestIndex=0.5; MoisturePc=12; Proot=0.1; MaxRD=600; MaxHeight=500; Acover=0.97; ExtinctCoeff=0.85; RootNConc=0.01; StoverNConc=0.03; ProductNConc=0.025; BaseT=0; OptT=30; MaxT=40; Legume=true; WaterStress=false
      ScrumManagement Sow Cereal Oct 98 harvest Apr 99: CropName=Cereal; EstablishDate=1998-10-14; EstablishStage=Seed; PlantingDepth=15; HarvestDate=1999-04-14; TtEstabToHarv=0; HarvestStage=Maturity; ExpectedYield=5.3; FieldLoss=0; ResidueRemoval=0
      ScrumManagement Sow Legume Jun 99 harvest after 600 oCd: CropName=Legume; EstablishDate=1999-06-01; EstablishStage=Seed; PlantingDepth=15; TtEstabToHarv=600; HarvestStage=LateReproductive; ExpectedYield=3.1; FieldLoss=10; ResidueRemoval=60
      Irrigation
      Fertiliser
      Manager AutomaticIrrigation: same as SCRUMTestBase.Field.AutomaticIrrigation
      Manager AutomaticFertiliser
        Fertilise = True
        Season_Start = 1-Aug
        Season_End = 30-Apr
        Season_Allocation = 1000
        TriggerN = 50
        NApplicationAmount = 25
        Return_days = 3
        Top_Depth = 300
        script: same as in SCRUMTestBase.Field.AutomaticFertiliser
      Report: same as SCRUMTestBase.Field.Report
  Experiment
    Factors
      CompositeFactor Seed
        Specifications:
          [Sow Cereal on a fixed date].Script.EstablishStage = Seed
          [Sow Cereal on a fixed date].Script.HarvestTT = 1050
      CompositeFactor Seedling
        Specifications:
          [Sow Cereal on a fixed date].Script.EstablishStage = Seedling
          [Sow Cereal on a fixed date].Script.HarvestTT = 878
      CompositeFactor Vege
        Specifications:
          [Sow Cereal on a fixed date].Script.EstablishStage = Seedling
          [Sow Cereal on a fixed date].Script.HarvestTT = 332
          [Sow Cereal on a fixed date].Script.HarvestStage = Vegetative
    Simulation SCRUMTestBase2
      Weather: FileName=%root%\Tests\WeatherFiles\lincoln.met
      Clock: Start=1998-10-14; End=1999-07-01
      Summary
      SoilArbitrator Soil Arbitrator
      Zone Field: Area=1; Slope=0; AspectAngle=0; Altitude=50
        Soil: same as SCRUMTestBase.Field.Soil
        SurfaceOrganicMatter surface organic matter: InitialResidueName=wheat; InitialResidueType=wheat; InitialResidueMass=2000; InitialStandingFraction=0; InitialCPR=0; InitialCNR=80
        MicroClimate: a_interception=0; b_interception=1; c_interception=0; d_interception=0; SoilHeatFluxFraction=0.4; MinimumHeightDiffForNewLayer=0; NightInterceptionFraction=0.5; ReferenceHeight=2
        Manager Sow Cereal on a fixed date
          EstablishStage = Seed
          HarvestTT = 1000
          HarvestStage = Maturity
          CropName = Cereal
          EstablishDate = 10/14/1998 00:00:00
          PlantingDepth = 10
          HarvestDate = 01/01/0001 00:00:00
          PotentialYield = 8
          FieldLoss = 0
          ResidueRemoval = 0
```csharp
using APSIM.Shared.Utilities;
using Models.Utilities;
using Models.Soils;
using Models.PMF;
using Models.Core;
using System;
using System.Linq;
using Models.PMF.Scrum;

namespace Models
{
    [Serializable]
    public class Script : Model
    {
        [Link] Clock clock;
        [Link] Zone zone;
        /// <summary>The plant</summary>
        [Link(Type = LinkType.Scoped, ByName = true)]
        public Plant scrum = null;

        
        public enum EstablishStages {Seed, Germination, Emergence, Seedling}
        public enum HarvestStages{Vegetative,EarlyReproductive,MidReproductive,LateReproductive,Maturity,Ripe}; 
        
        [Separator("Choose one of your specified scrum crops to plant")]
        
        /// <summary>Establishemnt Date</summary>
        [Description("Crop to plant")]
        //[Display(Type = DisplayType.SCRUMcropName)]
        public string CropName { get; set; }

        /// <summary>Establishemnt Date</summary>
        [Description("Establishment Date")]
        public DateTime EstablishDate { get; set; }
       
        /// <summary>Stages that Scrum crops may be established at</summary>
        [Description("Establishment Stage")]
        public EstablishStages EstablishStage {get; set;}
        
        /// <summary>Planting depth (mm)</summary>
        [Description("Planting depth (mm)")]
        public double PlantingDepth { get; set; }

        [Separator("Scrum needs to have a valid harvest date or Harvest Tt (from establishment) specified")]
        
        /// <summary>Harvest Date</summary>
        [Description("Harvest Date")]
        public DateTime HarvestDate { get; set; }

        /// <summary>Harvest Tt (if blank or zero must specify harvest date)</summary>
        [Description("Harvest Tt (oCd)")]
        public double HarvestTT { get; set; }
        
        /// <summary>Stage that Scrum crop is harvested at</summary>
        [Description("Harvest Stage")]
        public HarvestStages HarvestStage {get; set;}

        
        [Separator("Specify an appropriate potential yeild for the location, sowing date and assumed genotype \nScrum will reduce yield below potential if water or N stress are predicted")]
        
        /// <summary>Expected Yield (g FW/m2)</summary>
        [Description("Potential Yield (t/Ha)")]
        public double PotentialYield {get; set;}
        
        [Separator("Specify percentaces of field loss and residue removal at harvest")]
        
        /// <summary>Field loss (i.e the proportion of expected yield that is left in the field 
        /// because of diseaese, poor quality or lack of market)</summary>
        [Description("Field loss (%)")]
        public double FieldLoss { get; set; }

        /// <summary>Residue Removal (i.e the proportion of residues that are removed from the field 
        /// by bailing or some other means)</summary>
        [Description("Residue removal (%)")]
        public double ResidueRemoval { get; set; }
        
       // private RemovalFractions Remove { get; set; }
        
        private ScrumManagement management {get; set;}
        
        [EventSubscribe("DoManagement")]
        private void OnDoManagement(object sender, EventArgs e)
        {
            if (clock.Today == EstablishDate)
            {
                management = new ScrumManagement(CropName,EstablishDate,EstablishStage.ToString(),PlantingDepth,HarvestStage.ToString(),PotentialYield,
                HarvestDate, HarvestTT, FieldLoss, ResidueRemoval);
                ScrumCrop currentCrop = zone.FindDescendant<ScrumCrop>(CropName);
                currentCrop.Establish(management);  
            }
        }
    }
}
```
        Plant SCRUM
        ScrumManagement (disabled): CropName=Cereal; EstablishDate=1998-10-14; EstablishStage=Seed; PlantingDepth=0; HarvestDate=1999-04-14; TtEstabToHarv=0; HarvestStage=Maturity; ExpectedYield=5.3; FieldLoss=0; ResidueRemoval=0
        Irrigation
        Fertiliser
        Manager AutomaticIrrigation: same as SCRUMTestBase.Field.AutomaticIrrigation
        Manager AutomaticFertiliser: same as SCRUMTestBase.Field.AutomaticFertiliser
        Report: same as SCRUMTestBase.Field.Report
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