Simulations: Version=195
  DataStore
    ExcelInput Observed: FileNames=[RainShelter.xlsx]; SheetNames=[Observed]
    PredictedObserved PredObs: PredictedTableName=Report; ObservedTableName=Observed; FieldNameUsedForMatch=SimulationName; FieldName2UsedForMatch=Clock.Today; AllColumns=false
  Experiment LandP
    Memo
      This experiment was run over 3 years in Lincoln, New Zealand on a shallow stony soil.  It is described in full by [Teixeira_Brown_Michel_Meenken_Hu_Thomas_Huth_Holzworth_2018] Treatments of Lucerne and Pasture (Ryegrass) were established in the Autumn of 2011 and irrigtion treatments were installed in the spring of 2011 and applied for three years.  Treatments were:

       - None where no irrigation was applied
       - TwoPerWeek where irrigation was applied twice per week during spring/summer/autumn to replace water use measured by neutron probe
       - OnePerWeek where the same amout of irrigation was applied as the above treatment but at weekly frequency (i.e fewer, larger irrigations)
       - ThreeWeekly where the same amount of irrigation was applied as abouve but at a 3 weekely frequency (i.e fewer, larger irrigations)

      Lucerne and pasture were defoliated at differing frequiencies following best mananagment practice resulting in 8-10 regrowth period per year for pasture and 5-6 for lucerne.  Neutron probes were installed to 1.6 m depth using a 20T digger with a pnumatic plate on its boom to drive and extract a pilot rod into the stony sub soil and then an aluminum access tube was installed into the resultant hole.  Neutron probes measurements were tatken at 7 - 10 day intervals during the irrigation season.  CS616 probes were also installed in the top soil at 0-15 and 15-30 cm depths in each plot and logged hourly.
    Factors
      Permutation
        Factor Irrigation
          CompositeFactor TwoPerWeek: Specifications=[IrrigationEvents]
            Operations IrrigationEvents
              2011-11-07  [Irrigation].Apply(30);
              2011-11-25  [Irrigation].Apply(13.6);
              2011-11-28  [Irrigation].Apply(20.1);
              2011-11-29  [Irrigation].Apply(16.4);
              2011-12-05  [Irrigation].Apply(27);
              2011-12-15  [Irrigation].Apply(8);
              2011-12-26  [Irrigation].Apply(22.5);
              2011-12-29  [Irrigation].Apply(16.5);
              2012-01-05  [Irrigation].Apply(22.8);
              2012-01-09  [Irrigation].Apply(17.8);
              2012-01-12  [Irrigation].Apply(9.1);
              2012-01-16  [Irrigation].Apply(18.3);
              2012-01-19  [Irrigation].Apply(18.6);
              2012-01-23  [Irrigation].Apply(22.5);
              2012-01-30  [Irrigation].Apply(8);
              2012-02-02  [Irrigation].Apply(12);
              2012-02-07  [Irrigation].Apply(16.5);
              2012-02-09  [Irrigation].Apply(13.3);
              2012-02-13  [Irrigation].Apply(12.2);
              2012-02-20  [Irrigation].Apply(13.3);
              2012-02-23  [Irrigation].Apply(8.8);
              2012-03-29  [Irrigation].Apply(10);
              2012-04-02  [Irrigation].Apply(6.5);
              2012-04-05  [Irrigation].Apply(5);
              2012-04-10  [Irrigation].Apply(6.9);
              2012-04-26  [Irrigation].Apply(4.6);
              2012-04-30  [Irrigation].Apply(6.9);
              2012-05-03  [Irrigation].Apply(3.2);
              2012-11-01  [Irrigation].Apply(18);
              2012-11-15  [Irrigation].Apply(12);
              2012-11-22  [Irrigation].Apply(12);
              2012-11-26  [Irrigation].Apply(12);
              2012-11-29  [Irrigation].Apply(12);
              2012-12-03  [Irrigation].Apply(6);
              2012-12-06  [Irrigation].Apply(12);
              2012-12-13  [Irrigation].Apply(12);
              2012-12-17  [Irrigation].Apply(20.8);
              2012-12-20  [Irrigation].Apply(12);
              2012-12-24  [Irrigation].Apply(12);
              2012-12-27  [Irrigation].Apply(9);
              2012-12-31  [Irrigation].Apply(12);
              2013-01-03  [Irrigation].Apply(12);
              2013-01-07  [Irrigation].Apply(18);
              2013-01-10  [Irrigation].Apply(18);
              2013-01-14  [Irrigation].Apply(21);
              2013-01-21  [Irrigation].Apply(15);
              2013-01-24  [Irrigation].Apply(15);
              2013-01-28  [Irrigation].Apply(15);
              2013-01-31  [Irrigation].Apply(15);
              2013-02-04  [Irrigation].Apply(18);
              2013-02-07  [Irrigation].Apply(6);
              2013-02-11  [Irrigation].Apply(18.7);
              2013-02-14  [Irrigation].Apply(13.5);
              2013-02-18  [Irrigation].Apply(15);
              2013-02-21  [Irrigation].Apply(15);
              2013-02-25  [Irrigation].Apply(15);
              2013-02-28  [Irrigation].Apply(32);
              2013-03-07  [Irrigation].Apply(12);
              2013-03-11  [Irrigation].Apply(9);
              2013-03-14  [Irrigation].Apply(9);
              2013-03-28  [Irrigation].Apply(18);
              2013-04-04  [Irrigation].Apply(9);
              2013-04-11  [Irrigation].Apply(9);
              2013-10-24  [Irrigation].Apply(9);
              2013-10-31  [Irrigation].Apply(15);
              2013-11-04  [Irrigation].Apply(6);
              2013-11-07  [Irrigation].Apply(9);
              2013-11-11  [Irrigation].Apply(9);
              2013-11-14  [Irrigation].Apply(9);
              2013-11-18  [Irrigation].Apply(12);
              2013-11-21  [Irrigation].Apply(12);
              2013-11-25  [Irrigation].Apply(9);
              2013-12-02  [Irrigation].Apply(9);
              2013-12-05  [Irrigation].Apply(12);
              2013-12-09  [Irrigation].Apply(6);
              2013-12-12  [Irrigation].Apply(11);
              2013-12-17  [Irrigation].Apply(15);
              2013-12-23  [Irrigation].Apply(7);
              2014-01-06  [Irrigation].Apply(14);
              2014-01-09  [Irrigation].Apply(12.6);
              2014-01-13  [Irrigation].Apply(15.7);
              2014-01-16  [Irrigation].Apply(14.7);
              2014-01-20  [Irrigation].Apply(17.5);
              2014-01-23  [Irrigation].Apply(7.5);
              2014-01-30  [Irrigation].Apply(10);
              2014-02-03  [Irrigation].Apply(12);
              2014-02-05  [Irrigation].Apply(10);
              2014-02-10  [Irrigation].Apply(9);
              2014-02-17  [Irrigation].Apply(10);
              2014-02-20  [Irrigation].Apply(10);
          CompositeFactor OnePerWeek: Specifications=[IrrigationEvents]
            Operations IrrigationEvents
              2011-11-07  [Irrigation].Apply(30);
              2011-11-25  [Irrigation].Apply(13.6);
              2011-11-29  [Irrigation].Apply(36.5);
              2011-12-15  [Irrigation].Apply(34.9);
              2011-12-29  [Irrigation].Apply(41.8);
              2012-01-05  [Irrigation].Apply(22.8);
              2012-01-12  [Irrigation].Apply(26.9);
              2012-01-19  [Irrigation].Apply(36.8);
              2012-02-02  [Irrigation].Apply(19.8);
              2012-02-09  [Irrigation].Apply(30);
              2012-02-16  [Irrigation].Apply(13);
              2012-02-23  [Irrigation].Apply(14.3);
              2012-03-29  [Irrigation].Apply(10);
              2012-04-05  [Irrigation].Apply(11.4);
              2012-04-26  [Irrigation].Apply(11.5);
              2012-05-03  [Irrigation].Apply(10.1);
              2012-11-01  [Irrigation].Apply(18);
              2012-11-15  [Irrigation].Apply(12);
              2012-11-29  [Irrigation].Apply(24);
              2012-12-13  [Irrigation].Apply(21);
              2012-12-27  [Irrigation].Apply(33);
              2013-01-10  [Irrigation].Apply(42);
              2013-01-24  [Irrigation].Apply(39);
              2013-02-07  [Irrigation].Apply(30);
              2013-02-21  [Irrigation].Apply(42);
              2013-02-28  [Irrigation].Apply(20);
              2013-03-07  [Irrigation].Apply(30);
              2013-04-04  [Irrigation].Apply(27);
              2013-04-18  [Irrigation].Apply(15);
              2013-10-24  [Irrigation].Apply(12);
              2013-11-07  [Irrigation].Apply(24);
              2013-11-21  [Irrigation].Apply(33);
              2013-12-05  [Irrigation].Apply(30);
              2013-12-19  [Irrigation].Apply(17);
              2014-01-02  [Irrigation].Apply(12.7);
              2014-01-16  [Irrigation].Apply(40.9);
              2014-01-30  [Irrigation].Apply(35);
              2014-02-13  [Irrigation].Apply(25);
              2014-02-27  [Irrigation].Apply(32);
          CompositeFactor ThreeWeekly: Specifications=[IrrigationEvents]
            Operations IrrigationEvents
              2011-11-07  [Irrigation].Apply(30);
              2011-11-29  [Irrigation].Apply(47.6);
              2011-12-15  [Irrigation].Apply(34.9);
              2011-12-29  [Irrigation].Apply(41.8);
              2012-01-12  [Irrigation].Apply(49.8);
              2012-01-26  [Irrigation].Apply(36.8);
              2012-02-09  [Irrigation].Apply(49.6);
              2012-02-23  [Irrigation].Apply(34.3);
              2012-04-05  [Irrigation].Apply(21.4);
              2012-05-03  [Irrigation].Apply(23.7);
              2012-11-01  [Irrigation].Apply(18);
              2012-11-22  [Irrigation].Apply(12);
              2012-12-13  [Irrigation].Apply(27);
              2013-01-03  [Irrigation].Apply(42);
              2013-01-24  [Irrigation].Apply(45);
              2013-02-14  [Irrigation].Apply(90.6);
              2013-02-28  [Irrigation].Apply(20);
              2013-03-07  [Irrigation].Apply(30);
              2013-03-28  [Irrigation].Apply(18);
              2013-04-18  [Irrigation].Apply(15);
              2013-10-24  [Irrigation].Apply(12);
              2013-11-14  [Irrigation].Apply(33);
              2013-12-05  [Irrigation].Apply(36);
              2014-01-16  [Irrigation].Apply(44.7);
              2014-02-05  [Irrigation].Apply(33.5);
              2014-02-27  [Irrigation].Apply(32);
          CompositeFactor None: Specifications=[IrrigationEvents]
            Operations IrrigationEvents
              2013-02-28  [Irrigation].Apply(20);
        Factor CoverType
          CompositeFactor Lucerne
            Specifications:
              [BasePasture]
              [Spectral].GreenCropNDVI = 0.95
              [GrazingSchedule]
            SprumPastureInstance BasePasture: EstablishDate=10-Mar; AgeAtSimulationStart=0; YearsToMaxDimension=2; RUE=1.6; Presidue=0.15; RsenRate=0.01; Proot=0.1; PSBaseT=5; PSLOptT=25; PSUOptT=25; PSMaxT=40; GRINZ=false; MaxRD=2500; MaxHeight=500; MaxPrunedHeight=50; MaxCover=0.97; MinCover=0.05; ExtinctCoeff=0.85; RegrowthDuration=300; FullCanopyDuration=10000; BaseT=8; OptT=25; MaxT=35; RootNConc=0.01; LeafNConc=0.05; ResidueNConc=0.01; LegumePropn=1; GSMax=0.008; R50=175; WaterStress=true
            Operations GrazingSchedule
              2011-07-01  [CutPasture].Remove()
              2011-11-01  [CutPasture].Remove()
              2011-12-21  [CutPasture].Remove()
              2012-01-26  [CutPasture].Remove()
              2012-03-01  [CutPasture].Remove()
              2012-05-24  [CutPasture].Remove()
              2012-11-01  [CutPasture].Remove()
              2012-12-20  [CutPasture].Remove()
              2013-01-24  [CutPasture].Remove()
              2013-02-28  [CutPasture].Remove()
              2013-03-28  [CutPasture].Remove()
              2013-05-10  [CutPasture].Remove()
              2013-10-31  [CutPasture].Remove()
              2013-12-17  [CutPasture].Remove()
              2014-01-23  [CutPasture].Remove()
              2014-02-27  [CutPasture].Remove()
              2014-05-03  [CutPasture].Remove()
          CompositeFactor Ryegrass
            Specifications:
              [BasePasture]
              [Spectral].GreenCropNDVI = 0.95
              [GrazingSchedule]
              [FertiliserSchedule]
            SprumPastureInstance BasePasture: EstablishDate=24-Mar; AgeAtSimulationStart=0; YearsToMaxDimension=1; RUE=1; Presidue=0.15; RsenRate=0.01; Proot=0.1; PSBaseT=0; PSLOptT=16; PSUOptT=16; PSMaxT=25; GRINZ=false; MaxRD=800; MaxHeight=300; MaxPrunedHeight=100; MaxCover=0.97; MinCover=0.1; ExtinctCoeff=0.6; RegrowthDuration=500; FullCanopyDuration=10000; BaseT=0; OptT=20; MaxT=30; RootNConc=0.01; LeafNConc=0.025; ResidueNConc=0.01; LegumePropn=0; GSMax=0.004; R50=150; WaterStress=true
            Operations GrazingSchedule
              2011-07-01  [CutPasture].Remove()
              2011-09-30  [CutPasture].Remove()
              2011-11-02  [CutPasture].Remove()
              2011-12-01  [CutPasture].Remove()
              2011-12-21  [CutPasture].Remove()
              2012-01-26  [CutPasture].Remove()
              2012-03-01  [CutPasture].Remove()
              2012-04-04  [CutPasture].Remove()
              2012-05-24  [CutPasture].Remove()
              2012-09-08  [CutPasture].Remove()
              2012-10-17  [CutPasture].Remove()
              2012-11-20  [CutPasture].Remove()
              2012-12-20  [CutPasture].Remove()
              2013-01-24  [CutPasture].Remove()
              2013-02-28  [CutPasture].Remove()
              2013-03-28  [CutPasture].Remove()
              2013-05-10  [CutPasture].Remove()
              2013-09-11  [CutPasture].Remove()
              2013-10-18  [CutPasture].Remove()
              2013-11-21  [CutPasture].Remove()
              2013-12-17  [CutPasture].Remove()
              2014-01-23  [CutPasture].Remove()
              2014-02-27  [CutPasture].Remove()
              2014-03-26  [CutPasture].Remove()
              2014-05-03  [CutPasture].Remove()
            Operations FertiliserSchedule
              2011-03-25  [Fertiliser].Apply(amount:40 , type:NO3N)
              2011-08-12  [Fertiliser].Apply(amount:100, type:NO3N)
              2011-10-01  [Fertiliser].Apply(amount:100, type:NO3N)
              2011-11-02  [Fertiliser].Apply(amount:122, type:NO3N)
              2011-12-05  [Fertiliser].Apply(amount:79 , type:NO3N)
              2011-12-29  [Fertiliser].Apply(amount:81 , type:NO3N)
              2012-02-01  [Fertiliser].Apply(amount:100, type:NO3N)
              2012-03-02  [Fertiliser].Apply(amount:115, type:NO3N)
              2012-04-10  [Fertiliser].Apply(amount:102, type:NO3N)
              2012-09-11  [Fertiliser].Apply(amount:100, type:NO3N)
              2012-10-18  [Fertiliser].Apply(amount:102, type:NO3N)
              2012-11-29  [Fertiliser].Apply(amount:115, type:NO3N)
              2013-01-14  [Fertiliser].Apply(amount:81 , type:NO3N)
              2013-02-28  [Fertiliser].Apply(amount:93 , type:NO3N)
              2013-04-02  [Fertiliser].Apply(amount:84 , type:NO3N)
              2013-09-12  [Fertiliser].Apply(amount:100, type:NO3N)
              2013-10-14  [Fertiliser].Apply(amount:81 , type:NO3N)
              2013-12-24  [Fertiliser].Apply(amount:71 , type:NO3N)
              2014-02-28  [Fertiliser].Apply(amount:117, type:NO3N)
              2014-04-04  [Fertiliser].Apply(amount:74 , type:NO3N)
    Simulation LandPBase
      Weather: FileName=%root%/Examples/WeatherFiles/NZ_Lincoln.met
      Clock: Start=2011-03-01; End=2014-05-01
      Summary
      SoilArbitrator Soil Arbitrator
      Zone Field: Area=1; Slope=0; AspectAngle=0; Altitude=50
        Soil: Latitude=0; Longitude=0
          Chemical: PHUnits=Water
            Thickness  PH   CEC
            100        6.6  12.44
            200        6.2  11.6525
            300        5.7  11.045
            300        5.5  10.6625
            300        5.5  9.4025
            300        5.5  9.4025
            CEC source: Calculated
          Water: InitialPAWmm=240; RelativeTo=LL15; FilledFromTop=false
            Thickness=[150, 150, 100, 200, 200, 200, 200, 200, 200, 200, 200, 200, 400]
            InitialValues=[0.33, 0.33, 0.31, 0.15, 0.1, 0.06, 0.15, 0.1, 0.13, 0.13, 0.13, 0.13, 0.13]
          Physical
            Thickness  ParticleSizeSand  ParticleSizeSilt  ParticleSizeClay  Rocks     BD   AirDry  LL15  DUL   SAT
            150        5                 65                30                0         1.2  0.05    0.1   0.33  0.5
            150        5                 65                30                0         1.2  0.1     0.1   0.33  0.5
            100        5                 65                30                0.135336  1.2  0.12    0.12  0.31  0.44
            200        5                 65                30                0         1.2  0.06    0.06  0.15  0.46
            200        5                 65                30                0.135336  1.2  0.04    0.04  0.1   0.44
            200        5                 65                30                0.135336  1.2  0.02    0.02  0.06  0.44
            200        5                 65                30                0         1.2  0.06    0.06  0.15  0.46
            200        5                 65                30                0.135336  1.2  0.04    0.04  0.1   0.44
            200        5                 65                30                0.135336  1.2  0.06    0.06  0.13  0.44
            200        5                 65                30                0.135336  1.2  0.06    0.06  0.13  0.44
            200        5                 65                30                0.135336  1.2  0.06    0.06  0.13  0.44
            200        5                 65                30                0.135336  1.2  0.06    0.06  0.13  0.44
            400        5                 65                30                0.135336  1.2  0.06    0.06  0.13  0.44
            Rocks, ParticleSizeSand, ParticleSizeSilt, ParticleSizeClay source: Calculated
            SoilCrop SPRUMSoil
              LL=[0.1, 0.1, 0.12, 0.06, 0.04, 0.02, 0.06, 0.04, 0.06, 0.06, 0.06, 0.06, 0.06]
              KL=[0.11, 0.11, 0.11, 0.11, 0.11, 0.11, 0.11, 0.11, 0.11, 0.11, 0.11, 0.11, 0.11]
              XF=[1, 1, 1, 1, 1, 1, 1, 1, 1, 1, 1, 1, 1]
          WaterBalance SoilWater: SummerDate=1-Nov; SummerU=9; SummerCona=4.4; WinterDate=1-Apr; WinterU=9; WinterCona=4.4; DiffusConst=88; DiffusSlope=35.4; Salb=0.18; CN2Bare=68; CNRed=20; CNCov=0.8; DischargeWidth=0; CatchmentArea=0; PSIDul=-100
            Thickness  SWCON  KLAT
            150        0.55   0
            150        0.55   0
            100        0.55   0
            200        0.55   0
            200        0.55   0
            200        0.55   0
            200        0.55   0
            200        0.55   0
            200        0.55   0
            200        0.55   0
            200        0.55   0
            200        0.55   0
            400        0.55   0
          Nutrient
          Organic: FOMCNRatio=30; CarbonUnits=Total
            Thickness  Carbon  SoilCNRatio  FBiom  FInert  FOM
            100        1.82    11.5         0.025  0.3     1243.93
            200        1.47    11.5         0.025  0.4     833.832
            300        1.2     11.5         0.015  0.75    457.617
            300        1.03    11.5         0.01   0.9     251.145
            300        0.47    11.5         0.01   0.96    137.831
            300        0.47    11.5         0.01   0.96    75.6435
          Solute NO3: Thickness=[100, 200, 300, 300, 300, 300]; InitialValues=[180.833, 12.5, 1.38889, 1.38889, 0, 0]; InitialValuesUnits=ppm; WaterTableConcentration=0; D0=0; DepthConstant=0; MaxDepthSoluteAccessible=0; RunoffEffectivenessAtMovingSolute=0; MaxEffectiveRunoff=0
          Solute NH4: Thickness=[100, 200, 300, 300, 300, 300]; InitialValues=[0, 0, 0, 0, 0, 0]; InitialValuesUnits=ppm; WaterTableConcentration=0; D0=0; DepthConstant=0; MaxDepthSoluteAccessible=0; RunoffEffectivenessAtMovingSolute=0; MaxEffectiveRunoff=0
          Solute Urea: Thickness=[100, 200, 300, 300, 300, 300]; InitialValues=[0, 0, 0, 0, 0, 0]; InitialValuesUnits=kg/ha; WaterTableConcentration=0; D0=0; DepthConstant=0; MaxDepthSoluteAccessible=0; RunoffEffectivenessAtMovingSolute=0; MaxEffectiveRunoff=0
          SoilTemperature Temperature
          OutputLayers SWOutputLayers: Thickness=[150, 150, 100, 200, 200, 200, 200, 200, 200]
        MicroClimate: a_interception=0; b_interception=1; c_interception=0; d_interception=0; SoilHeatFluxFraction=0.4; MinimumHeightDiffForNewLayer=0; NightInterceptionFraction=0.5; ReferenceHeight=2
        Irrigation
        Fertiliser
        SurfaceOrganicMatter surface organic matter: InitialResidueName=wheat; InitialResidueType=wheat; InitialResidueMass=2000; InitialStandingFraction=0; InitialCPR=0; InitialCNR=80
        Operations IrrigationEvents
        Operations GrazingSchedule
        Operations FertiliserSchedule
        Report: EventNames=[Clock].EndOfDay
          VariableNames:
            [Clock].Today
            [SurfaceOrganicMatter].Wt
            [SWOutputLayers].SWmm
            sum([SWOutputLayers].SWmm)
            [SWOutputLayers].SW
            [Soil].SoilWater.Es
            [Soil].SoilWater.Eos
            [Soil].SoilWater.Runoff
            [Soil].SoilWater.Infiltration
            [Soil].SoilWater.Drainage
            [Soil].Physical.LL15
            [Soil].Physical.DUL
            [Soil].Physical.LL15mm
            [Soil].Physical.DULmm
            [SPRUM].Leaf.CoverDead
            [SPRUM].Leaf.CoverGreen
            [SPRUM].Leaf.CoverTotal
            [SPRUM].Leaf.Height
            [SPRUM].Root.Depth
            [Spectral].NDVI
            [SPRUM].Leaf.Wt
            [SPRUM].Residue.Wt
            [SPRUM].AboveGround.Wt
            [SPRUM].Arbitrator.FN
            [SPRUM].Leaf.FW
            [SPRUM].RelativeAnnualDimension
            [SPRUM].Phenology.Age.YearDecimal
            [SPRUM].Leaf.Cover.Regrowth.Expansion.Delta
        Plant SPRUM
        SprumPastureInstance BasePasture: AgeAtSimulationStart=1; YearsToMaxDimension=1; RUE=1; Presidue=0; RsenRate=0; Proot=0.1; PSBaseT=5; PSLOptT=25; PSUOptT=25; PSMaxT=40; GRINZ=false; MaxRD=600; MaxHeight=300; MaxPrunedHeight=100; MaxCover=0.97; MinCover=0.5; ExtinctCoeff=0.7; RegrowthDuration=300; FullCanopyDuration=0; BaseT=5; OptT=25; MaxT=35; RootNConc=0.01; LeafNConc=0.05; ResidueNConc=0.01; LegumePropn=0; GSMax=0.006; R50=120; WaterStress=true
        BiomassRemovalEvents CutPasture: NameOfPlantToRemoveFrom=SPRUM; RemovalType=0; StageToSet=StartRegrowth
          BiomassRemovalFractions:
            PlantName  OrganName  TypeString  LiveToRemove  DeadToRemove  LiveToResidue  DeadToResidue
            SPRUM      Residue    Cutting     0             0             0              0
            SPRUM      Leaf       Cutting     0.7           0             0.25           0.5
            SPRUM      Nodule     Cutting     0             0             0              0
            SPRUM      Root       Cutting     0             0             0              0
        Spectral: DrySoilNDVI=0.1; WetSoilNDVI=0.25; DeadCropNDVI=0.1; NDVI=0
  Experiment Iversen_8: DisabledSimNames=[Iversen_8Waterdry]
    Memo
      This experiment was conducted under both irrigated and dryland conditions in Block 8 of Iversen field (I8), Lincoln University, Canterbury, New Zealand (43˚38’S and 172˚28’E). Data were collected from 1 November 1996 to 30 June 2002 over five growing seasons. Lucerne crops grew under a 42±8 day defoliation regime. Full details are provided in Brown (2004).
    Factors
      Factor WaterTreatment
        CompositeFactor dry: Specifications=[IrrigationEvents]
          Operations IrrigationEvents
            1998-09-11  [Irrigation].Apply(30)
            1998-09-12  [Irrigation].Apply(30)
            1998-09-14  [Irrigation].Apply(30)
            1998-09-16  [Irrigation].Apply(30)
            1998-09-18  [Irrigation].Apply(30)
            1999-09-11  [Irrigation].Apply(30)
            1999-09-12  [Irrigation].Apply(30)
            1999-09-14  [Irrigation].Apply(30)
            1999-09-13  [Irrigation].Apply(50)
            2000-09-11  [Irrigation].Apply(30)
            2000-09-12  [Irrigation].Apply(30)
            2000-09-14  [Irrigation].Apply(30)
            2000-09-13  [Irrigation].Apply(30)
        CompositeFactor irr: Specifications=[IrrigationEvents]
          Operations IrrigationEvents
            1997-10-31  [Irrigation].Apply(30);
            1997-12-01  [Irrigation].Apply(24);
            1997-12-06  [Irrigation].Apply(32);
            1997-12-16  [Irrigation].Apply(41);
            1997-12-22  [Irrigation].Apply(45);
            1998-01-07  [Irrigation].Apply(14);
            1998-01-15  [Irrigation].Apply(30);
            1998-01-23  [Irrigation].Apply(26);
            1998-01-31  [Irrigation].Apply(23);
            1998-02-18  [Irrigation].Apply(62);
            1998-03-06  [Irrigation].Apply(23);
            1998-03-30  [Irrigation].Apply(31);
            1998-09-09  [Irrigation].Apply(30);
            1998-09-10  [Irrigation].Apply(30);
            1998-09-11  [Irrigation].Apply(30);
            1998-09-13  [Irrigation].Apply(30);
            1998-09-14  [Irrigation].Apply(30);
            1998-11-12  [Irrigation].Apply(20);
            1998-11-13  [Irrigation].Apply(20);
            1998-11-14  [Irrigation].Apply(20);
            1998-12-23  [Irrigation].Apply(20);
            1998-12-24  [Irrigation].Apply(20);
            1998-12-25  [Irrigation].Apply(20);
            1998-12-26  [Irrigation].Apply(15);
            1998-12-27  [Irrigation].Apply(15);
            1999-01-20  [Irrigation].Apply(20);
            1999-01-21  [Irrigation].Apply(20);
            1999-01-22  [Irrigation].Apply(20);
            1999-01-23  [Irrigation].Apply(20);
            1999-01-24  [Irrigation].Apply(20);
            1999-01-25  [Irrigation].Apply(27);
            1999-02-25  [Irrigation].Apply(10);
            1999-02-26  [Irrigation].Apply(10);
            1999-02-27  [Irrigation].Apply(10);
            1999-02-28  [Irrigation].Apply(20);
            1999-03-01  [Irrigation].Apply(20);
            1999-12-12  [Irrigation].Apply(30);
            2000-01-22  [Irrigation].Apply(50);
            2000-12-27  [Irrigation].Apply(30);
            2000-12-28  [Irrigation].Apply(30);
            2000-12-29  [Irrigation].Apply(15);
            2001-02-01  [Irrigation].Apply(35);
            2001-02-02  [Irrigation].Apply(30);
            2001-02-03  [Irrigation].Apply(30);
            2001-03-20  [Irrigation].Apply(25);
            2001-03-21  [Irrigation].Apply(25);
            2001-03-22  [Irrigation].Apply(15);
            2001-04-26  [Irrigation].Apply(25);
            2001-04-27  [Irrigation].Apply(20);
            2001-12-21  [Irrigation].Apply(20);
            2001-12-22  [Irrigation].Apply(25);
            2001-12-23  [Irrigation].Apply(20);
    Simulation Iversen_8LL
      Clock: Start=1996-11-02; End=2002-04-20
      Summary summaryfile
      Weather: FileName=%root%\Examples\WeatherFiles\NZ_Lincoln.met
      SoilArbitrator Soil Arbitrator
      MicroClimate: a_interception=0; b_interception=1; c_interception=0; d_interception=0; SoilHeatFluxFraction=0.4; MinimumHeightDiffForNewLayer=0; NightInterceptionFraction=0.5; ReferenceHeight=2
      Zone paddock: Area=1; Slope=0; AspectAngle=0; Altitude=50
        Irrigation
        Fertiliser
        SurfaceOrganicMatter surface organic matter: InitialResidueName=wheat; InitialResidueType=wheat; InitialResidueMass=0; InitialStandingFraction=0; InitialCPR=0; InitialCNR=80
        Operations IrrigationEvents
        Operations Cutting
          1997-01-29  [CutLucerne].Remove();
          1997-03-02  [CutLucerne].Remove();
          1997-06-10  [CutLucerne].Remove();
          1997-10-13  [CutLucerne].Remove();
          1997-11-24  [CutLucerne].Remove();
          1997-12-30  [CutLucerne].Remove();
          1998-02-17  [CutLucerne].Remove();
          1998-03-15  [CutLucerne].Remove();
          1998-06-05  [CutLucerne].Remove();
          1998-10-09  [CutLucerne].Remove();
          1998-11-16  [CutLucerne].Remove();
          1998-12-22  [CutLucerne].Remove();
          1999-01-14  [CutLucerne].Remove();
          1999-02-24  [CutLucerne].Remove();
          1999-04-22  [CutLucerne].Remove();
          1999-06-27  [CutLucerne].Remove();
          1999-10-06  [CutLucerne].Remove();
          1999-11-17  [CutLucerne].Remove();
          1999-12-26  [CutLucerne].Remove();
          2000-01-27  [CutLucerne].Remove();
          2000-03-18  [CutLucerne].Remove();
          2000-05-29  [CutLucerne].Remove();
          2000-10-04  [CutLucerne].Remove();
          2000-11-16  [CutLucerne].Remove();
          2000-12-27  [CutLucerne].Remove();
          2001-01-27  [CutLucerne].Remove();
          2001-03-17  [CutLucerne].Remove();
          2001-05-06  [CutLucerne].Remove();
          2001-07-04  [CutLucerne].Remove();
          2001-10-10  [CutLucerne].Remove();
          2001-11-26  [CutLucerne].Remove();
          2001-12-30  [CutLucerne].Remove();
          2002-02-15  [CutLucerne].Remove();
          2002-04-17  [CutLucerne].Remove();
        Soil: Latitude=0; Longitude=0
          Chemical: same as LandP.LandPBase.Field.Soil.Chemical
          Water: InitialPAWmm=563.7; RelativeTo=LL15; FilledFromTop=false
            Thickness=[100, 100, 100, 100, 100, 100, 100, 100, 100, 100, 100, 100, 100, 100, 100, 100, 100, 100, 100, 100, 100, 100, 100]
            InitialValues=[0.35, 0.35, 0.32, 0.29, 0.27, 0.31, 0.33, 0.35, 0.34, 0.34, 0.34, 0.34, 0.34, 0.33, 0.33, 0.32, 0.3, 0.3, 0.3, 0.31, 0.31, 0.32, 0.35]
          Physical
            Thickness  ParticleSizeSand  ParticleSizeSilt  ParticleSizeClay  Rocks     BD    AirDry  LL15   DUL   SAT
            100        5                 65                30                0.22101   1.26  0.05    0.075  0.35  0.38
            100        5                 65                30                0.22101   1.26  0.06    0.078  0.35  0.38
            100        5                 65                30                0.200511  1.26  0.07    0.07   0.32  0.39
            100        5                 65                30                0.246423  1.44  0.07    0.07   0.29  0.32
            100        5                 65                30                0.293522  1.44  0.069   0.07   0.27  0.3
            100        5                 65                30                0.246423  1.44  0.07    0.07   0.31  0.32
            100        5                 65                30                0.102947  1.57  0.07    0.07   0.33  0.34
            100        5                 65                30                0         1.57  0.07    0.07   0.35  0.35
            100        5                 65                30                0         1.57  0.07    0.07   0.34  0.35
            100        5                 65                30                0         1.58  0.07    0.07   0.34  0.35
            100        5                 65                30                0         1.58  0.07    0.07   0.34  0.35
            100        5                 65                30                0         1.58  0.07    0.07   0.34  0.35
            100        5                 65                30                0         1.58  0.08    0.08   0.34  0.35
            100        5                 65                30                0         1.59  0.078   0.08   0.33  0.35
            100        5                 65                30                0         1.59  0.08    0.08   0.33  0.35
            100        5                 65                30                0         1.59  0.087   0.09   0.32  0.34
            100        5                 65                30                0.112903  1.59  0.09    0.09   0.3   0.33
            100        5                 65                30                0.112903  1.59  0.09    0.09   0.3   0.33
            100        5                 65                30                0.112903  1.59  0.09    0.09   0.3   0.33
            100        5                 65                30                0.112903  1.59  0.08    0.08   0.31  0.33
            100        5                 65                30                0.112903  1.59  0.09    0.09   0.31  0.33
            100        5                 65                30                0         1.59  0.09    0.09   0.32  0.34
            100        5                 65                30                0         1.59  0.09    0.09   0.35  0.38
            Rocks, ParticleSizeSand, ParticleSizeSilt, ParticleSizeClay source: Calculated
            SoilCrop SPRUMSoil
              LL=[0.1, 0.13, 0.12, 0.12, 0.11, 0.08, 0.08, 0.08, 0.09, 0.11, 0.12, 0.15, 0.15, 0.15, 0.16, 0.2, 0.25, 0.25, 0.25, 0.25, 0.23, 0.15, 0.15]
              KL=[0.11, 0.11, 0.11, 0.11, 0.11, 0.11, 0.11, 0.11, 0.11, 0.11, 0.11, 0.11, 0.11, 0.11, 0.11, 0.11, 0.11, 0.11, 0.11, 0.11, 0.11, 0.11, 0.11]
              XF=[1, 1, 1, 1, 1, 1, 1, 1, 1, 1, 1, 1, 1, 1, 1, 1, 1, 1, 1, 1, 1, 1, 1]
          WaterBalance SoilWater: SummerDate=1-Oct; SummerU=6; SummerCona=3; WinterDate=1-Mar; WinterU=5; WinterCona=2.5; DiffusConst=189; DiffusSlope=21; Salb=0.13; CN2Bare=0; CNRed=0; CNCov=0.8; PSIDul=-100
          Nutrient
          Organic: FOMCNRatio=30; CarbonUnits=Total
            Thickness  Carbon  SoilCNRatio  FBiom  FInert  FOM
            100        1.82    11.5         0.025  0.3     1243.931
            200        1.47    11.5         0.025  0.4     833.832
            300        1.2     11.5         0.015  0.75    457.617
            300        1.03    11.5         0.01   0.9     251.145
            300        0.47    11.5         0.01   0.96    137.831
            300        0.47    11.5         0.01   0.96    75.644
          Solute NO3: Thickness=[100, 200, 300, 300, 300, 300]; InitialValues=[172.222, 11.905, 1.157, 1.062, 0, 0]; InitialValuesUnits=ppm; WaterTableConcentration=0; D0=0; DepthConstant=0; MaxDepthSoluteAccessible=0; RunoffEffectivenessAtMovingSolute=0; MaxEffectiveRunoff=0
          Solute NH4: same as LandP.LandPBase.Field.Soil.NH4
          Solute Urea: same as LandP.LandPBase.Field.Soil.Urea
          SoilTemperature Temperature
          OutputLayers SWOutputLayers: Thickness=[150, 150, 100, 200, 200, 200, 200, 200, 200, 500]
        BiomassRemovalEvents CutLucerne: NameOfPlantToRemoveFrom=SPRUM; RemovalType=0; StageToSet=StartRegrowth
          BiomassRemovalFractions:
            PlantName  OrganName  TypeString  LiveToRemove  DeadToRemove  LiveToResidue  DeadToResidue
            SPRUM      Residue    Cutting     0.7           0             0              0
            SPRUM      Leaf       Cutting     0.9           0             0.05           0.75
            SPRUM      Nodule     Cutting     0             0             0              0
            SPRUM      Root       Cutting     0             0             0              0
        Plant SPRUM
        SprumPastureInstance LucerneInstance: AgeAtSimulationStart=0; YearsToMaxDimension=2; RUE=1.6; Presidue=0.15; RsenRate=0.01; Proot=0.1; PSBaseT=0; PSLOptT=20; PSUOptT=25; PSMaxT=40; GRINZ=false; MaxRD=2500; MaxHeight=600; MaxPrunedHeight=50; MaxCover=0.98; MinCover=0.05; ExtinctCoeff=0.7; RegrowthDuration=300; FullCanopyDuration=10000; BaseT=6; OptT=25; MaxT=35; RootNConc=0.01; LeafNConc=0.05; ResidueNConc=0.01; LegumePropn=1; GSMax=0.006; R50=175; WaterStress=true
        Report: EventNames=[Clock].EndOfDay
          VariableNames:
            [Clock].Today
            [SurfaceOrganicMatter].Wt
            [SWOutputLayers].SWmm
            sum([SWOutputLayers].SWmm)
            [SWOutputLayers].SW
            [Soil].SoilWater.Es
            [Soil].SoilWater.Eos
            [Soil].SoilWater.Runoff
            [Soil].SoilWater.Infiltration
            [Soil].SoilWater.Drainage
            [Soil].Physical.LL15
            [Soil].Physical.DUL
            [Soil].Physical.LL15mm
            [Soil].Physical.DULmm
            [SPRUM].Leaf.CoverDead
            [SPRUM].Leaf.CoverGreen
            [SPRUM].Leaf.CoverTotal
            [SPRUM].Leaf.Height
            [SPRUM].Leaf.LAI
            [SPRUM].Root.Depth
            [SPRUM].Root.Wt
            [SPRUM].Leaf.Wt
            [SPRUM].Residue.Wt
            [SPRUM].AboveGround.Wt
            [SPRUM].Arbitrator.FN
            [SPRUM].Leaf.FW
            [SPRUM].RelativeAnnualDimension
            [SPRUM].Phenology.Age.YearDecimal
            [SPRUM].Leaf.Cover.Regrowth.Expansion.Delta
  Folder Sensibility tests
    Experiment EstablishTest
      Memo Description
        Examining the effects of different combinations of age at establishment and years to max root depth parameters
      Factors
        Permutation
          Factor EstablishAge: Specification=[BasePasture].AgeAtSimulationStart = 0, 0.5, 1, 3
          Factor AgeToMaxD: Specification=[BasePasture].YearsToMaxDimension = 0.5, 1, 3
      Simulation CropCompBase2
        Weather: FileName=%root%/Examples/WeatherFiles/NZ_Lincoln
        Clock: Start=1999-08-01; End=2004-08-01
        Summary
        SoilArbitrator Soil Arbitrator
        Zone Field: Area=1; Slope=0; AspectAngle=0; Altitude=50
          MicroClimate: a_interception=0; b_interception=1; c_interception=0; d_interception=0; SoilHeatFluxFraction=0.4; MinimumHeightDiffForNewLayer=0; NightInterceptionFraction=0.5; ReferenceHeight=2
          Soil: SoilType=Generic soil; Country=New Zealand; Latitude=37.5; Longitude=172.5
            Chemical: Thickness=[300, 300, 300, 300, 300, 300, 200]; PH=[6, 6, 6, 6, 6, 6, 6]; PHUnits=Water
            Physical
              Thickness  ParticleSizeSand  ParticleSizeSilt  ParticleSizeClay  BD  AirDry  LL15  DUL   SAT  KS
              300        20                60                20                1   0.09    0.15  0.35  0.5  500
              300        20                60                20                1   0.09    0.15  0.35  0.5  500
              300        20                60                20                1   0.09    0.15  0.35  0.5  500
              300        20                60                20                1   0.09    0.15  0.35  0.5  500
              300        20                60                20                1   0.09    0.15  0.35  0.5  500
              300        20                60                20                1   0.09    0.15  0.35  0.5  500
              200        20                60                20                1   0.09    0.15  0.35  0.5  500
              SoilCrop SPRUMSoil: LL=[0.15, 0.15, 0.15, 0.15, 0.15, 0.15, 0.15]; KL=[0.08, 0.08, 0.08, 0.08, 0.08, 0.08, 0.08]; XF=[1, 1, 1, 1, 1, 1, 1]
            WaterBalance SoilWater: SummerDate=1-Oct; SummerU=8; SummerCona=4; WinterDate=1-Apr; WinterU=4; WinterCona=1.5; DiffusConst=0; DiffusSlope=0; Salb=0.2; CN2Bare=60; CNRed=10; CNCov=0.8; DischargeWidth=0; CatchmentArea=0; PSIDul=-100; Thickness=[150, 150, 300, 300, 300, 300, 300, 200]; SWCON=[0.5, 0.5, 0.43, 0.375, 0.34, 0.35, 0.4, 0.48]
            Nutrient
            Organic: FOMCNRatio=30; CarbonUnits=Total
              Thickness  Carbon  SoilCNRatio  FBiom  FInert  FOM
              100        2       11.5         0.025  0.3     1243.931
              200        1.8     11.5         0.025  0.4     833.832
              300        1.5     11.5         0.015  0.6     457.617
              300        1       11.5         0      1       0
              300        1       11.5         0      1       0
              300        1       11.5         0      1       0
            Water: Thickness=[300, 300, 300, 300, 300, 300, 200]; InitialValues=[0.35, 0.35, 0.35, 0.35, 0.35, 0.35, 0.35]; InitialPAWmm=400; RelativeTo=LL15; FilledFromTop=true
            Solute NO3: Thickness=[300, 300, 300, 300, 300, 300, 200]; InitialValues=[0, 0, 0, 0, 0, 0, 0]; InitialValuesUnits=ppm; WaterTableConcentration=0; D0=0; DepthConstant=0; MaxDepthSoluteAccessible=0; RunoffEffectivenessAtMovingSolute=0; MaxEffectiveRunoff=0
            Solute NH4: same as Sensibility tests.EstablishTest.CropCompBase2.Field.Soil.NO3
            Solute Urea: Thickness=[300, 300, 300, 300, 300, 300, 200]; InitialValues=[0, 0, 0, 0, 0, 0, 0]; InitialValuesUnits=kg/ha; WaterTableConcentration=0; D0=0; DepthConstant=0; MaxDepthSoluteAccessible=0; RunoffEffectivenessAtMovingSolute=0; MaxEffectiveRunoff=0
            SoilTemperature Temperature
          SurfaceOrganicMatter surface organic matter: InitialResidueName=wheat; InitialResidueType=wheat; InitialResidueMass=2000; InitialStandingFraction=0; InitialCPR=0; InitialCNR=80
          Irrigation
          Fertiliser
          Report: EventNames=[Clock].DoReport
            VariableNames:
              [Clock].Today
              [SPRUM].IsAlive
              [SPRUM].DaysAfterSowing
              [SPRUM].Phenology.CurrentPhaseName
              [SPRUM].Phenology.Stage
              [SPRUM].Residue.Wt
              [Phenology].AccumulatedTT
              [SPRUM].Total.Wt
              [SPRUM].Total.N
              [SPRUM].Leaf.Photosynthesis
              [SPRUM].Leaf.Transpiration
              [SPRUM].Root.Depth
              [SPRUM].Leaf.CoverGreen
              [SPRUM].Leaf.LAI
              [SPRUM].Height
              [SPRUM].Leaf.Wt
              [SPRUM].Root.NUptake
              [SPRUM].Root.Wt
              [SPRUM].Root.NUptakeLayered
              [Fertiliser].NitrogenApplied
              [Soil].Water.MM
              [Soil].Nutrient.MineralN
              [Soil].Nutrient.MineralisedN
              [NO3].Flow
              [SowAndHarvest].Script.DAS
          Plant SPRUM
          Manager AutomaticIrrigation
            Irrigation_Yes_No = yes
            Season_Start = 1-Oct
            Season_End = 30-Apr
            Season_Allocation = 1000
            Refull_Frac = 0.9
            Trigger_Frac = 0.7
            Return_days = 3
            Maximum_Irrigation_Amount = 40
            Top_Depth = 600
```csharp
using Newtonsoft.Json;
using Models.PMF.Phen;
using Models.Soils.Nutrients;
using System;
using Models.Core;
using Models.PMF;
using Models.Soils;
using System.Xml.Serialization;
using APSIM.Shared.Utilities;
using Models.PMF.Organs;
using Models.Interfaces;

        
namespace Models
{
   [Serializable] 
   [System.Xml.Serialization.XmlInclude(typeof(Model))]
    public class Script : Model
    {      
        [Link] private ISummary summary;
        [Link] private Irrigation Irrigation;
        [Link] private Clock Clock;
        [Link] private Soil Soil;
        [Link] private Plant SPRUM;
        [Link(Type = LinkType.Path, Path = "[SPRUM].Root")]
        private Root root;
        [Link(Type = LinkType.Path, Path = "[SPRUM].Phenology")]
        private Phenology phenology;
        [Link]
        private IPhysical soilPhysical;
        [Link]
        private ISoilWater waterBalance;
       //Communication to other modules
       
       //User inputs from properties tab
       [Description("Irrigation on (yes or no)")]
       public string Irrigation_Yes_No { get; set; }
       [Description("SeasonStart (dd-MMM)")]
       public string Season_Start { get; set; }
       [Description("SeasonEnd (dd-MMM)")]
       public string Season_End { get; set; }
       [Description("Season Allocation (mm)")]
       public double Season_Allocation { get; set; }
       [Description("% PAWC to refill soil to (0-1)")]
       public double Refull_Frac { get; set; }
       [Description("% PAWC to trigger irrigation (0-1)")]
       public double Trigger_Frac { get; set; }
       [Description("Minimum days for irrigation to return")]
       public double Return_days { get; set; }
       [Description("Maximum irrigation application (mm)")]
       public double Maximum_Irrigation_Amount { get; set; }
       [Description("Depth to calculate PAWC (mm)")]
       public double Top_Depth { get; set; }
       
       //Class members
       [JsonIgnore] private bool IrrigationIsAvailable { get; set; }
       [JsonIgnore] public bool SeasonIsOpen { get; set; }
       [JsonIgnore] private bool CropIsActive { get; set; }
       [JsonIgnore] private bool IrrigatorIsAvailable { get; set; }
       [JsonIgnore] private bool SoilIsDry { get; set; }
       [JsonIgnore] public double Top_DUL { get; set; }
       [JsonIgnore] public double Top_Refull { get; set; }
       [JsonIgnore] public double Top_Trigger { get; set; }
       [JsonIgnore] public double Top_LL { get; set; }
       [JsonIgnore] public double Top_SW { get; set; }
       [JsonIgnore] public double Accumulated_depth { get; set; }   
       [JsonIgnore] public double Days_since_irrigation { get; set; }
       [JsonIgnore] public double Amount_to_apply { get; set; }
       [JsonIgnore] public double Season_Application { get; set; }
        
       //Variables for date logic testing
       [JsonIgnore] public string StartString {get; set;}
       [JsonIgnore] public string EndString {get; set;}
       [JsonIgnore] public DateTime StartDate {get; set;}
       [JsonIgnore] public DateTime EndDate {get; set;}
       [JsonIgnore] public int TodayYear {get; set;}
       [JsonIgnore] public int TodayMonth {get; set;}
       [JsonIgnore] public int StartMonth {get; set;}
       [JsonIgnore] public int EndMonth {get; set;}
       [JsonIgnore] public int TodayDay {get; set;}
       [JsonIgnore] public int StartDay {get; set;}
       [JsonIgnore] public int EndDay {get; set;}
       
    
       //Calculate static soil variables
       [EventSubscribe("StartOfSimulation")]
       private void OnStartOfSimulation(object sender, EventArgs e)
       {   
          //Calculated soil water variables
          Accumulated_depth = 0;
          for (int layer = 0; Accumulated_depth < Top_Depth; layer++)
          {
             Top_LL += soilPhysical.LL15mm[layer];
             Top_DUL += soilPhysical.DULmm[layer];
             Accumulated_depth += soilPhysical.Thickness[layer];
          }
          Top_Refull = Top_LL + (Top_DUL - Top_LL) * Refull_Frac;
       }
       
      
       //Determine daily requirement for irrigation
        [EventSubscribe("StartOfDay")]
           private void OnStartOfDay(object sender, EventArgs e)
           { 
          //Can we irrigate?
          IrrigationIsAvailable = false; 
          if (Irrigation_Yes_No == "yes")
             IrrigationIsAvailable = true; 
    
          //Are we Allowed to Irrigate?
          TodayYear = Clock.Today.Year;
          StartString = Season_Start + "-" + TodayYear.ToString();
          EndString = Season_End + "-" + TodayYear.ToString();
          StartDate = DateTime.Parse(StartString);
          EndDate = DateTime.Parse(EndString);
          TodayMonth = Clock.Today.Month;
          TodayDay = Clock.Today.Day;
          StartDay = StartDate.Day;
          StartMonth = StartDate.Month;
          EndDay = EndDate.Day;
          EndMonth = EndDate.Month;
          
          SeasonIsOpen = false;
          //if we are in the spring and after the start date then yes
          if((Clock.Today.Month > 6) && (Clock.Today >= StartDate))
          SeasonIsOpen = true;
          //if we are in the autumn and before the end date then yes
          if((Clock.Today.Month <= 6) && (Clock.Today <= EndDate))
          SeasonIsOpen = true;
          
          //Is there a crop in the ground that needs irrigation?
          CropIsActive = false;
          if ((phenology.Stage >= 3.0) && (phenology.Stage < 6.0))
                CropIsActive = true;
          
          //Is the irrigator available?
          IrrigatorIsAvailable = false;
          Days_since_irrigation += 1;
          if (Days_since_irrigation >= Return_days)
             IrrigatorIsAvailable = true;
          
          //Is the soil dry enough to require irrigation?
          SoilIsDry = false;
          double CurrentRootDepth = 0;
          double RootDepth = root.Depth;
          CurrentRootDepth = Math.Max(RootDepth, CurrentRootDepth);
          
          double RelativeRootDepth = Math.Min(1.0, CurrentRootDepth / Top_Depth);
          Top_Trigger = Math.Min(Top_Refull, Top_DUL - (Top_DUL - Top_LL) * RelativeRootDepth * (1-Trigger_Frac)); 
          
          Accumulated_depth = 0;
          Top_SW = 0;
          for (int layer = 0; Accumulated_depth < Top_Depth; layer++)
          {
             Top_SW += waterBalance.SWmm[layer];
             Accumulated_depth += soilPhysical.Thickness[layer];
          }
          if (Top_SW <= Top_Trigger)
             SoilIsDry = true;
                
          //Lets bloody well irrigate then!!!!
          if((IrrigationIsAvailable) && (SeasonIsOpen) && (CropIsActive) && (IrrigatorIsAvailable) && (SoilIsDry)) //The conditions are rife for irrigation
          {
             Amount_to_apply = Math.Min(Top_Refull - Top_SW, Maximum_Irrigation_Amount);
             Amount_to_apply = Math.Min(Amount_to_apply, Season_Allocation - Season_Application); 
             Amount_to_apply = Math.Max(Amount_to_apply, 0.0);
             Irrigation.Apply(Amount_to_apply);
             Days_since_irrigation = 0;
             Season_Application += Amount_to_apply;
             summary.WriteMessage(this, "Automatic Irrigation", MessageType.Diagnostic);
            
          }
       }
    }
}
```
          Manager SowAndHarvest
```csharp
using Models.Soils;
using Models.PMF.Phen;
using System;
using Models.Core;
using Models.PMF;
using APSIM.Shared.Utilities;
using System.Xml.Serialization;
using Newtonsoft.Json;
        
namespace Models
{
    [Serializable] 
    [System.Xml.Serialization.XmlInclude(typeof(Model))]
    public class Script : Model
    {
        [JsonIgnore] public int DAS { get; set; }
        [EventSubscribe("StartOfSimulation")]
        private void OnSimulationCommencing(object sender, EventArgs e)
        {
            DAS=0;
        }
        
        [EventSubscribe("DoManagement")]
        private void OnDoManagement(object sender, EventArgs e)
        {
            DAS+=1;
        }
    }
}
```
          Manager ApplyFertOnDates
            FertiliserType = NO3N
            FertiliserDates = 1-Aug, 15-Aug, 1-Sep, 15-Sep, 1-Nov, 15-Nov, 1-dec, 15-dec, 1-Jan, 15-Jan, 1-Feb, 15-Feb, 1-Mar, 15-Mar
            Amount = 0
            AmountType = False
```csharp
using Models.Soils;
using System;
using Models.Core;
using Models.PMF;
using APSIM.Shared.Utilities;
namespace Models
{
    [Serializable]
    public class Script : Model
    {
        [Link] Clock Clock;
        [Link] Fertiliser Fertiliser;
        
        [Separator("A component to apply fertiliser on one or more dates on every year of the simulation")]

        [Description("Type of fertiliser to apply? ")] 
        [Display(Type = DisplayType.FertiliserType)]public string FertiliserType { get; set; }

        [Description("Enter the fertilisation dates as dd-mmm with comma separation (any year information entered will be ignored): ")] 
        public string[] FertiliserDates { get; set; } 

        [Description("Amount of fertiliser to be applied (kg /ha)")] 
        public double Amount { get; set; }

        [Description("Is the above amount to be applied each time? (yes/ticked)? Or is it the total annual amount across all dates (no/unticked)")] 
        public bool AmountType { get; set; }
        
        [EventSubscribe("DoManagement")]
        private void OnDoManagement(object sender, EventArgs e)
        {
            foreach (string ddMMM in FertiliserDates)
            {
                if (DateUtilities.DatesEqual(ddMMM, Clock.Today))
                {
                    if (AmountType)
                        Fertiliser.Apply(amount: Amount, type: FertiliserType);
                    else
                        Fertiliser.Apply(amount: Amount / FertiliserDates.Length, type: FertiliserType);
                }
            }
        }
    }
}
```
          SprumPastureInstance BasePasture: AgeAtSimulationStart=1; YearsToMaxDimension=1; RUE=1; Presidue=0.15; RsenRate=0.01; Proot=0.1; PSBaseT=5; PSLOptT=20; PSUOptT=25; PSMaxT=35; GRINZ=false; MaxRD=600; MaxHeight=300; MaxPrunedHeight=100; MaxCover=0.97; MinCover=0.5; ExtinctCoeff=0.7; RegrowthDuration=300; FullCanopyDuration=0; BaseT=5; OptT=25; MaxT=35; RootNConc=0.01; LeafNConc=0.05; ResidueNConc=0.01; LegumePropn=0; GSMax=0.006; R50=120; WaterStress=false
          BiomassRemovalEvents OnCut: NameOfPlantToRemoveFrom=SPRUM; RemovalType=0
            BiomassRemovalFractions:
              PlantName  OrganName  TypeString  LiveToRemove  DeadToRemove  LiveToResidue  DeadToResidue
              SPRUM      Residue    Cutting     0             0             0.5            0.5
              SPRUM      Leaf       Cutting     1             1             0              0
              SPRUM      Nodule     Cutting     0             0             0              0
              SPRUM      Root       Cutting     0             0             0              0
    Experiment RegrowthTest
      Memo Description
        These simulations compare differen initial cover and regrowth durations on Sprum predictions
      Factors
        Permutation
          Factor Duration
            CompositeFactor Fast: Specifications=[BasePasture].RegrowthDuration = 150
            CompositeFactor Mid: Specifications=[BasePasture].RegrowthDuration = 300
            CompositeFactor Long: Specifications=[BasePasture].RegrowthDuration = 450
          Factor ResidualCover
            CompositeFactor Low: Specifications=[BasePasture].MinCover = 0.1
            CompositeFactor Mid: Specifications=[BasePasture].MinCover = 0.5
            CompositeFactor High: Specifications=[BasePasture].MinCover = 0.9
      Simulation RegrowthBase
        Weather: FileName=%root%/Examples/WeatherFiles/NZ_Lincoln
        Clock: Start=1999-08-01; End=2000-08-01
        Summary
        SoilArbitrator Soil Arbitrator
        Zone Field: Area=1; Slope=0; AspectAngle=0; Altitude=50
          MicroClimate: a_interception=0; b_interception=1; c_interception=0; d_interception=0; SoilHeatFluxFraction=0.4; MinimumHeightDiffForNewLayer=0; NightInterceptionFraction=0.5; ReferenceHeight=2
          Soil: same as Sensibility tests.EstablishTest.CropCompBase2.Field.Soil
          SurfaceOrganicMatter surface organic matter: InitialResidueName=wheat; InitialResidueType=wheat; InitialResidueMass=2000; InitialStandingFraction=0; InitialCPR=0; InitialCNR=80
          Irrigation
          Fertiliser
          Report: EventNames=[Clock].DoReport
            VariableNames:
              [Clock].Today
              [SPRUM].IsAlive
              [SPRUM].DaysAfterSowing
              [SPRUM].Phenology.CurrentPhaseName
              [SPRUM].Phenology.Stage
              [SPRUM].Residue.Wt
              [Phenology].AccumulatedTT
              [SPRUM].Total.Wt
              [SPRUM].Total.N
              [SPRUM].Leaf.Photosynthesis
              [SPRUM].Leaf.Transpiration
              [SPRUM].Root.Depth
              [SPRUM].Leaf.CoverGreen
              [SPRUM].Leaf.LAI
              [SPRUM].Height
              [SPRUM].Leaf.Wt
              [SPRUM].Root.NUptake
              [SPRUM].Root.Wt
              [SPRUM].Root.NUptakeLayered
              [Fertiliser].NitrogenApplied
              [Soil].Water.MM
              [Soil].Nutrient.MineralN
              [Soil].Nutrient.MineralisedN
              [NO3].Flow
              [SowAndHarvest].Script.DAS
              [SPRUM].Phenology.AccumulatedTT
              [SPRUM].Arbitrator.FN
              [SPRUM].Leaf.Cover.Regrowth.Expansion.Delta
          Plant SPRUM
          Manager AutomaticIrrigation
            Irrigation_Yes_No = yes
            Season_Start = 1-Aug
            Season_End = 30-May
            Season_Allocation = 10000
            Refull_Frac = 0.9
            Trigger_Frac = 0.8
            Return_days = 3
            Maximum_Irrigation_Amount = 40
            Top_Depth = 600
            script: same as in Sensibility tests.EstablishTest.CropCompBase2.Field.AutomaticIrrigation
          Manager SowAndHarvest: same as Sensibility tests.EstablishTest.CropCompBase2.Field.SowAndHarvest
          Manager ApplyFertOnDates: same as Sensibility tests.EstablishTest.CropCompBase2.Field.ApplyFertOnDates
          SprumPastureInstance BasePasture: AgeAtSimulationStart=1; YearsToMaxDimension=1; RUE=1; Presidue=0.15; RsenRate=0.01; Proot=0.1; PSBaseT=5; PSLOptT=20; PSUOptT=25; PSMaxT=35; GRINZ=false; MaxRD=600; MaxHeight=300; MaxPrunedHeight=100; MaxCover=0.97; MinCover=0.5; ExtinctCoeff=0.7; RegrowthDuration=300; FullCanopyDuration=0; BaseT=5; OptT=25; MaxT=35; RootNConc=0.01; LeafNConc=0.05; ResidueNConc=0.01; LegumePropn=1; GSMax=0.006; R50=120; WaterStress=false
          BiomassRemovalEvents OnCut: same as Sensibility tests.EstablishTest.CropCompBase2.Field.OnCut
    Experiment FullCanopyTest
      Memo Description
        Demonstrates the effects of changing the duration of the full canopy phase
      Factors
        Permutation
          Factor Size
            CompositeFactor Fast: Specifications=[BasePasture].MaxCover = .98
            CompositeFactor Mid: Specifications=[BasePasture].MaxCover = .72
            CompositeFactor Small: Specifications=[BasePasture].MaxCover = .5
          Factor Duration
            CompositeFactor None: Specifications=[BasePasture].FullCanopyDuration = 0
            CompositeFactor Mid: Specifications=[BasePasture].FullCanopyDuration = 200
            CompositeFactor High: Specifications=[BasePasture].FullCanopyDuration = 400
      Simulation FullCanopyBase
        Weather: FileName=%root%/Examples/WeatherFiles/NZ_Lincoln
        Clock: Start=1999-08-01; End=2000-08-01
        Summary
        SoilArbitrator Soil Arbitrator
        Zone Field: Area=1; Slope=0; AspectAngle=0; Altitude=50
          MicroClimate: a_interception=0; b_interception=1; c_interception=0; d_interception=0; SoilHeatFluxFraction=0.4; MinimumHeightDiffForNewLayer=0; NightInterceptionFraction=0.5; ReferenceHeight=2
          Soil: same as Sensibility tests.EstablishTest.CropCompBase2.Field.Soil
          SurfaceOrganicMatter surface organic matter: InitialResidueName=wheat; InitialResidueType=wheat; InitialResidueMass=2000; InitialStandingFraction=0; InitialCPR=0; InitialCNR=80
          Irrigation
          Fertiliser
          Report: same as Sensibility tests.EstablishTest.CropCompBase2.Field.Report
          Plant SPRUM
          Manager AutomaticIrrigation: same as Sensibility tests.EstablishTest.CropCompBase2.Field.AutomaticIrrigation
          Manager SowAndHarvest: same as Sensibility tests.EstablishTest.CropCompBase2.Field.SowAndHarvest
          Manager ApplyFertOnDates: same as Sensibility tests.EstablishTest.CropCompBase2.Field.ApplyFertOnDates
          SprumPastureInstance BasePasture: AgeAtSimulationStart=1; YearsToMaxDimension=1; RUE=1; Presidue=0.15; RsenRate=0.01; Proot=0.1; PSBaseT=5; PSLOptT=20; PSUOptT=25; PSMaxT=35; GRINZ=false; MaxRD=600; MaxHeight=300; MaxPrunedHeight=100; MaxCover=0.97; MinCover=0.1; ExtinctCoeff=0.7; RegrowthDuration=300; FullCanopyDuration=0; BaseT=5; OptT=25; MaxT=35; RootNConc=0.01; LeafNConc=0.05; ResidueNConc=0.01; LegumePropn=1; GSMax=0.006; R50=120; WaterStress=false
          BiomassRemovalEvents OnCut: same as Sensibility tests.EstablishTest.CropCompBase2.Field.OnCut
    Experiment WaterStressTest
      Memo Description
        This Simulation demonstrates the effects of having water stress response turned on or off in low and high stress situations
      Factors
        Permutation
          Factor IrrigResponse
            CompositeFactor Sensitive: Specifications=[BasePasture].WaterStress = true
            CompositeFactor Not: Specifications=[BasePasture].WaterStress = false
          Factor Irrigation
            CompositeFactor Wet: Specifications=[AutomaticIrrigation].Script.Irrigation_Yes_No = yes
            CompositeFactor Dry: Specifications=[AutomaticIrrigation].Script.Irrigation_Yes_No = no
      Simulation IrrigBase
        Weather: FileName=%root%/Examples/WeatherFiles/NZ_Lincoln
        Clock: Start=1999-08-01; End=2000-08-01
        Summary
        SoilArbitrator Soil Arbitrator
        Zone Field: Area=1; Slope=0; AspectAngle=0; Altitude=50
          MicroClimate: a_interception=0; b_interception=1; c_interception=0; d_interception=0; SoilHeatFluxFraction=0.4; MinimumHeightDiffForNewLayer=0; NightInterceptionFraction=0.5; ReferenceHeight=2
          Soil: same as Sensibility tests.EstablishTest.CropCompBase2.Field.Soil
          SurfaceOrganicMatter surface organic matter: InitialResidueName=wheat; InitialResidueType=wheat; InitialResidueMass=2000; InitialStandingFraction=0; InitialCPR=0; InitialCNR=80
          Irrigation
          Fertiliser
          Report: EventNames=[Clock].DoReport
            VariableNames:
              [Clock].Today
              [SPRUM].IsAlive
              [SPRUM].DaysAfterSowing
              [SPRUM].Phenology.CurrentPhaseName
              [SPRUM].Phenology.Stage
              [SPRUM].Residue.Wt
              [Phenology].AccumulatedTT
              [SPRUM].Total.Wt
              [SPRUM].Total.N
              [SPRUM].Leaf.Photosynthesis
              [SPRUM].Leaf.Transpiration
              [SPRUM].Root.Depth
              [SPRUM].Leaf.CoverGreen
              [SPRUM].Leaf.LAI
              [SPRUM].Height
              [SPRUM].Leaf.Wt
              [SPRUM].Root.NUptake
              [SPRUM].Root.Wt
              [SPRUM].Root.NUptakeLayered
              [Fertiliser].NitrogenApplied
              [Irrigation].IrrigationApplied
              [Soil].Water.MM
              [Soil].Nutrient.MineralN
              [Soil].Nutrient.MineralisedN
              [NO3].Flow
              [SowAndHarvest].Script.DAS
          Plant SPRUM
          Manager AutomaticIrrigation
            Irrigation_Yes_No = yes
            Season_Start = 1-Oct
            Season_End = 30-Apr
            Season_Allocation = 1000
            Refull_Frac = 0.9
            Trigger_Frac = 0.7
            Return_days = 3
            Maximum_Irrigation_Amount = 40
            Top_Depth = 600
```csharp
using Newtonsoft.Json;
using Models.PMF.Phen;
using Models.Soils.Nutrients;
using System;
using Models.Core;
using Models.PMF;
using Models.Soils;
using System.Xml.Serialization;
using APSIM.Shared.Utilities;
using Models.PMF.Organs;
using Models.Interfaces;

        
namespace Models
{
   [Serializable] 
   [System.Xml.Serialization.XmlInclude(typeof(Model))]
    public class Script : Model
    {      
        [Link] private ISummary summary;
        [Link] private Irrigation Irrigation;
        [Link] private Clock Clock;
        [Link] private Soil Soil;
        [Link] private Plant SPRUM;
        [Link(Type = LinkType.Path, Path = "[SPRUM].Root")]
        private Root root;
        [Link(Type = LinkType.Path, Path = "[SPRUM].Phenology")]
        private Phenology phenology;
        [Link]
        private IPhysical soilPhysical;
        [Link]
        private ISoilWater waterBalance;
       //Communication to other modules
       
       //User inputs from properties tab
       [Description("Irrigation on (yes or no)")]
       public string Irrigation_Yes_No { get; set; }
       [Description("SeasonStart (dd-MMM)")]
       public string Season_Start { get; set; }
       [Description("SeasonEnd (dd-MMM)")]
       public string Season_End { get; set; }
       [Description("Season Allocation (mm)")]
       public double Season_Allocation { get; set; }
       [Description("% PAWC to refill soil to (0-1)")]
       public double Refull_Frac { get; set; }
       [Description("% PAWC to trigger irrigation (0-1)")]
       public double Trigger_Frac { get; set; }
       [Description("Minimum days for irrigation to return")]
       public double Return_days { get; set; }
       [Description("Maximum irrigation application (mm)")]
       public double Maximum_Irrigation_Amount { get; set; }
       [Description("Depth to calculate PAWC (mm)")]
       public double Top_Depth { get; set; }
       
       //Class members
       [JsonIgnore] private bool IrrigationIsAvailable { get; set; }
       [JsonIgnore] public bool SeasonIsOpen { get; set; }
       [JsonIgnore] private bool IrrigatorIsAvailable { get; set; }
       [JsonIgnore] private bool SoilIsDry { get; set; }
       [JsonIgnore] public double Top_DUL { get; set; }
       [JsonIgnore] public double Top_Refull { get; set; }
       [JsonIgnore] public double Top_Trigger { get; set; }
       [JsonIgnore] public double Top_LL { get; set; }
       [JsonIgnore] public double Top_SW { get; set; }
       [JsonIgnore] public double Accumulated_depth { get; set; }   
       [JsonIgnore] public double Days_since_irrigation { get; set; }
       [JsonIgnore] public double Amount_to_apply { get; set; }
       [JsonIgnore] public double Season_Application { get; set; }
        
       //Variables for date logic testing
       [JsonIgnore] public string StartString {get; set;}
       [JsonIgnore] public string EndString {get; set;}
       [JsonIgnore] public DateTime StartDate {get; set;}
       [JsonIgnore] public DateTime EndDate {get; set;}
       [JsonIgnore] public int TodayYear {get; set;}
       [JsonIgnore] public int TodayMonth {get; set;}
       [JsonIgnore] public int StartMonth {get; set;}
       [JsonIgnore] public int EndMonth {get; set;}
       [JsonIgnore] public int TodayDay {get; set;}
       [JsonIgnore] public int StartDay {get; set;}
       [JsonIgnore] public int EndDay {get; set;}
       
    
       //Calculate static soil variables
       [EventSubscribe("StartOfSimulation")]
       private void OnStartOfSimulation(object sender, EventArgs e)
       {   
          //Calculated soil water variables
          Accumulated_depth = 0;
          for (int layer = 0; Accumulated_depth < Top_Depth; layer++)
          {
             Top_LL += soilPhysical.LL15mm[layer];
             Top_DUL += soilPhysical.DULmm[layer];
             Accumulated_depth += soilPhysical.Thickness[layer];
          }
          Top_Refull = Top_LL + (Top_DUL - Top_LL) * Refull_Frac;
       }
       
      
       //Determine daily requirement for irrigation
        [EventSubscribe("StartOfDay")]
           private void OnStartOfDay(object sender, EventArgs e)
           { 
          //Can we irrigate?
          IrrigationIsAvailable = false; 
          if (Irrigation_Yes_No == "yes")
             IrrigationIsAvailable = true; 
    
          //Are we Allowed to Irrigate?
          TodayYear = Clock.Today.Year;
          StartString = Season_Start + "-" + TodayYear.ToString();
          EndString = Season_End + "-" + TodayYear.ToString();
          StartDate = DateTime.Parse(StartString);
          EndDate = DateTime.Parse(EndString);
          TodayMonth = Clock.Today.Month;
          TodayDay = Clock.Today.Day;
          StartDay = StartDate.Day;
          StartMonth = StartDate.Month;
          EndDay = EndDate.Day;
          EndMonth = EndDate.Month;
          
          SeasonIsOpen = false;
          //if we are in the spring and after the start date then yes
          if((Clock.Today.Month > 6) && (Clock.Today >= StartDate))
          SeasonIsOpen = true;
          //if we are in the autumn and before the end date then yes
          if((Clock.Today.Month <= 6) && (Clock.Today <= EndDate))
          SeasonIsOpen = true;
          
         
          //Is the irrigator available?
          IrrigatorIsAvailable = false;
          Days_since_irrigation += 1;
          if (Days_since_irrigation >= Return_days)
             IrrigatorIsAvailable = true;
          
          //Is the soil dry enough to require irrigation?
          SoilIsDry = false;
          double CurrentRootDepth = 0;
          double RootDepth = root.Depth;
          CurrentRootDepth = Math.Max(RootDepth, CurrentRootDepth);
          
          double RelativeRootDepth = Math.Min(1.0, CurrentRootDepth / Top_Depth);
          Top_Trigger = Math.Min(Top_Refull, Top_DUL - (Top_DUL - Top_LL) * RelativeRootDepth * (1-Trigger_Frac)); 
          
          Accumulated_depth = 0;
          Top_SW = 0;
          for (int layer = 0; Accumulated_depth < Top_Depth; layer++)
          {
             Top_SW += waterBalance.SWmm[layer];
             Accumulated_depth += soilPhysical.Thickness[layer];
          }
          if (Top_SW <= Top_Trigger)
             SoilIsDry = true;
                
          //Lets bloody well irrigate then!!!!
          if((IrrigationIsAvailable) && (SeasonIsOpen) && (IrrigatorIsAvailable) && (SoilIsDry)) //The conditions are rife for irrigation
          {
             Amount_to_apply = Math.Min(Top_Refull - Top_SW, Maximum_Irrigation_Amount);
             Amount_to_apply = Math.Min(Amount_to_apply, Season_Allocation - Season_Application); 
             Amount_to_apply = Math.Max(Amount_to_apply, 0.0);
             Irrigation.Apply(Amount_to_apply);
             Days_since_irrigation = 0;
             Season_Application += Amount_to_apply;
             summary.WriteMessage(this, "Automatic Irrigation", MessageType.Diagnostic);
            
          }
       }
    }
}
```
          Manager SowAndHarvest: same as Sensibility tests.EstablishTest.CropCompBase2.Field.SowAndHarvest
          Manager ApplyFertOnDates
            FertiliserType = NO3N
            FertiliserDates = 1-Aug, 15-Aug, 1-Sep, 15-Sep, 1-Nov, 15-Nov, 1-dec, 15-dec, 1-Jan, 15-Jan, 1-Feb, 15-Feb, 1-Mar, 15-Mar
            Amount = 50
            AmountType = True
            script: same as in Sensibility tests.EstablishTest.CropCompBase2.Field.ApplyFertOnDates
          SprumPastureInstance BasePasture: AgeAtSimulationStart=1; YearsToMaxDimension=1; RUE=1; Presidue=0.15; RsenRate=0.01; Proot=0.1; PSBaseT=5; PSLOptT=25; PSUOptT=25; PSMaxT=40; GRINZ=false; MaxRD=600; MaxHeight=300; MaxPrunedHeight=100; MaxCover=0.97; MinCover=0.5; ExtinctCoeff=0.7; RegrowthDuration=300; FullCanopyDuration=0; BaseT=5; OptT=25; MaxT=35; RootNConc=0.01; LeafNConc=0.05; ResidueNConc=0.01; LegumePropn=0; GSMax=0.006; R50=120; WaterStress=true
          BiomassRemovalEvents OnCut: same as Sensibility tests.EstablishTest.CropCompBase2.Field.OnCut
    Experiment UserGrazeTest
      Memo Description
        This simulation tests using a biomassRemovalEvents model to do grazing and phenology rewind
        By setting a large value for the FullCanopyDurtion parameter, SPRUM does not reach the end of this phase so it does not self graze and rewind.  Instead we set defoliation dates and the stage to rewind to in the biomass removal event so we can specify defoliations on specific dates.
      Factors
        Permutation
          Factor Grazing
            CompositeFactor None
            CompositeFactor One: Specifications=[OnCut].RemovalDates = 1/2/2000
            CompositeFactor Three: Specifications=[OnCut].RemovalDates = 1-12-1999, 20/2/2000, 2000-4-15
      Simulation UserGraseBase
        Weather: FileName=%root%/Examples/WeatherFiles/NZ_Lincoln
        Clock: Start=1999-08-01; End=2000-08-01
        Summary
        SoilArbitrator Soil Arbitrator
        Zone Field: Area=1; Slope=0; AspectAngle=0; Altitude=50
          MicroClimate: a_interception=0; b_interception=1; c_interception=0; d_interception=0; SoilHeatFluxFraction=0.4; MinimumHeightDiffForNewLayer=0; NightInterceptionFraction=0.5; ReferenceHeight=2
          Soil: same as Sensibility tests.EstablishTest.CropCompBase2.Field.Soil
          SurfaceOrganicMatter surface organic matter: InitialResidueName=wheat; InitialResidueType=wheat; InitialResidueMass=2000; InitialStandingFraction=0; InitialCPR=0; InitialCNR=80
          Irrigation
          Fertiliser
          Report: same as Sensibility tests.EstablishTest.CropCompBase2.Field.Report
          Plant SPRUM
          Manager AutomaticIrrigation: same as Sensibility tests.EstablishTest.CropCompBase2.Field.AutomaticIrrigation
          Manager SowAndHarvest: same as Sensibility tests.EstablishTest.CropCompBase2.Field.SowAndHarvest
          Manager ApplyFertOnDates: same as Sensibility tests.EstablishTest.CropCompBase2.Field.ApplyFertOnDates
          SprumPastureInstance BasePasture: AgeAtSimulationStart=1; YearsToMaxDimension=1; RUE=1; Presidue=0.15; RsenRate=0.01; Proot=0.1; PSBaseT=5; PSLOptT=20; PSUOptT=25; PSMaxT=35; GRINZ=false; MaxRD=600; MaxHeight=300; MaxPrunedHeight=100; MaxCover=0.97; MinCover=0.1; ExtinctCoeff=0.7; RegrowthDuration=300; FullCanopyDuration=10000; BaseT=5; OptT=25; MaxT=35; RootNConc=0.01; LeafNConc=0.05; ResidueNConc=0.01; LegumePropn=1; GSMax=0.006; R50=120; WaterStress=false
          BiomassRemovalEvents OnCut: same as LandP.LandPBase.Field.CutPasture
  Experiment RainShelter: DisabledSimNames=[Iversen_8Waterdry]
    Memo
      This experiment grew tall fescue and ryegrass with different irrigation treatments under the rain-out shelter at Lincoln
    Factors
      Permutation
        Factor Irrigation
          CompositeFactor Weekly: Specifications=[IrrigationEvents]
            Operations IrrigationEvents
              2006-08-07  [Irrigation].Apply(7)
              2006-08-14  [Irrigation].Apply(7)
              2006-08-21  [Irrigation].Apply(15)
              2006-08-28  [Irrigation].Apply(13)
              2006-09-04  [Irrigation].Apply(23)
              2006-09-11  [Irrigation].Apply(16)
              2006-09-18  [Irrigation].Apply(20.4)
              2006-09-25  [Irrigation].Apply(24)
              2006-10-02  [Irrigation].Apply(21)
              2006-10-09  [Irrigation].Apply(21)
              2006-10-16  [Irrigation].Apply(37)
              2006-10-24  [Irrigation].Apply(32)
              2006-10-30  [Irrigation].Apply(25)
              2006-11-06  [Irrigation].Apply(29)
              2006-11-13  [Irrigation].Apply(29.4)
              2006-11-20  [Irrigation].Apply(30.4)
              2006-11-27  [Irrigation].Apply(40)
              2006-12-04  [Irrigation].Apply(44)
              2006-12-11  [Irrigation].Apply(34)
              2006-12-18  [Irrigation].Apply(32)
              2006-12-25  [Irrigation].Apply(33.6)
              2007-01-01  [Irrigation].Apply(37)
              2007-01-08  [Irrigation].Apply(28.6)
              2007-01-15  [Irrigation].Apply(24.4)
              2007-01-22  [Irrigation].Apply(31)
              2007-01-29  [Irrigation].Apply(30)
              2007-02-05  [Irrigation].Apply(32)
              2007-02-12  [Irrigation].Apply(31)
              2007-02-19  [Irrigation].Apply(27)
              2007-02-26  [Irrigation].Apply(31)
              2007-03-05  [Irrigation].Apply(50)
              2007-03-12  [Irrigation].Apply(17.8)
              2007-03-19  [Irrigation].Apply(25)
              2007-03-26  [Irrigation].Apply(27)
              2007-04-02  [Irrigation].Apply(22)
              2007-04-09  [Irrigation].Apply(22)
              2007-04-16  [Irrigation].Apply(15.5)
              2007-04-23  [Irrigation].Apply(12)
              2007-04-30  [Irrigation].Apply(8)
              2007-05-07  [Irrigation].Apply(10.5)
              2007-08-13  [Irrigation].Apply(16.5)
              2007-08-20  [Irrigation].Apply(8)
              2007-08-27  [Irrigation].Apply(21.7)
              2007-09-03  [Irrigation].Apply(15.6)
              2007-09-10  [Irrigation].Apply(16.9)
              2007-09-17  [Irrigation].Apply(19.1)
              2007-09-24  [Irrigation].Apply(14.2)
              2007-09-27  [Irrigation].Apply(9)
              2007-10-01  [Irrigation].Apply(16)
              2007-10-08  [Irrigation].Apply(28)
              2007-10-15  [Irrigation].Apply(14.1018518518519)
              2007-10-16  [Irrigation].Apply(3)
              2007-10-23  [Irrigation].Apply(36.3)
              2007-10-29  [Irrigation].Apply(35)
              2007-11-05  [Irrigation].Apply(32)
              2007-11-12  [Irrigation].Apply(29)
              2007-11-15  [Irrigation].Apply(3.5)
              2007-11-19  [Irrigation].Apply(31)
              2007-11-26  [Irrigation].Apply(39)
              2007-12-03  [Irrigation].Apply(30.4)
              2007-12-05  [Irrigation].Apply(4.5)
              2007-12-10  [Irrigation].Apply(34.8958333333333)
              2007-12-17  [Irrigation].Apply(27)
              2007-12-24  [Irrigation].Apply(32.2)
              2007-12-31  [Irrigation].Apply(35)
              2007-12-31  [Irrigation].Apply(3.7)
              2008-01-07  [Irrigation].Apply(34.9)
              2008-01-14  [Irrigation].Apply(40)
              2008-01-21  [Irrigation].Apply(39.1)
              2008-01-24  [Irrigation].Apply(8)
              2008-01-28  [Irrigation].Apply(38)
              2008-02-04  [Irrigation].Apply(43.0347222222222)
              2008-02-11  [Irrigation].Apply(37)
              2008-02-18  [Irrigation].Apply(28.7)
              2008-02-25  [Irrigation].Apply(39.5)
              2008-03-03  [Irrigation].Apply(35.6)
              2008-03-10  [Irrigation].Apply(33.3)
              2008-03-17  [Irrigation].Apply(33.1)
              2008-03-19  [Irrigation].Apply(7.7)
              2008-03-25  [Irrigation].Apply(35.9)
              2008-03-31  [Irrigation].Apply(25.1)
              2008-04-07  [Irrigation].Apply(29.2)
              2008-04-14  [Irrigation].Apply(20.9)
              2008-04-15  [Irrigation].Apply(4.9)
              2008-04-21  [Irrigation].Apply(11.8)
              2008-04-28  [Irrigation].Apply(10.6)
              2008-05-12  [Irrigation].Apply(8.9)
          CompositeFactor SpringDrought: Specifications=[IrrigationEvents]
            Operations IrrigationEvents
              2007-01-08  [Irrigation].Apply(28.6)
              2007-01-15  [Irrigation].Apply(24.4)
              2007-01-22  [Irrigation].Apply(31)
              2007-01-29  [Irrigation].Apply(30)
              2007-02-05  [Irrigation].Apply(32)
              2007-02-12  [Irrigation].Apply(31)
              2007-02-19  [Irrigation].Apply(27)
              2007-02-26  [Irrigation].Apply(31)
              2007-03-05  [Irrigation].Apply(50)
              2007-03-12  [Irrigation].Apply(17.8)
              2007-03-19  [Irrigation].Apply(25)
              2007-03-26  [Irrigation].Apply(27)
              2007-04-02  [Irrigation].Apply(22)
              2007-04-09  [Irrigation].Apply(22)
              2007-04-16  [Irrigation].Apply(15.5)
              2007-04-23  [Irrigation].Apply(12)
              2007-04-30  [Irrigation].Apply(8)
              2007-05-07  [Irrigation].Apply(10.5)
              2007-08-13  [Irrigation].Apply(16.5)
              2007-08-20  [Irrigation].Apply(8)
              2007-09-27  [Irrigation].Apply(9)
              2007-11-01  [Irrigation].Apply(5)
              2008-01-17  [Irrigation].Apply(4.4)
              2008-02-04  [Irrigation].Apply(43)
              2008-02-11  [Irrigation].Apply(37)
              2008-02-18  [Irrigation].Apply(28.7)
              2008-02-25  [Irrigation].Apply(39.5)
              2008-03-03  [Irrigation].Apply(35.6)
              2008-03-10  [Irrigation].Apply(33.3)
              2008-03-17  [Irrigation].Apply(33.1)
              2008-03-19  [Irrigation].Apply(7.7)
              2008-03-25  [Irrigation].Apply(35.9)
              2008-03-31  [Irrigation].Apply(25.1)
              2008-04-07  [Irrigation].Apply(29.2)
              2008-04-14  [Irrigation].Apply(20.9)
              2008-04-15  [Irrigation].Apply(5.9)
              2008-04-21  [Irrigation].Apply(11.8)
              2008-04-22  [Irrigation].Apply(5.8)
              2008-04-28  [Irrigation].Apply(10.6)
              2008-05-12  [Irrigation].Apply(8.9)
          CompositeFactor AutumnDrought: Specifications=[IrrigationEvents]
            Operations IrrigationEvents
              2006-08-07  [Irrigation].Apply(7)
              2006-08-14  [Irrigation].Apply(7)
              2006-08-21  [Irrigation].Apply(15)
              2006-08-28  [Irrigation].Apply(13)
              2006-09-04  [Irrigation].Apply(23)
              2006-09-11  [Irrigation].Apply(16)
              2006-09-18  [Irrigation].Apply(20.4)
              2006-09-25  [Irrigation].Apply(24)
              2006-10-02  [Irrigation].Apply(21)
              2006-10-09  [Irrigation].Apply(21)
              2006-10-16  [Irrigation].Apply(37)
              2006-10-24  [Irrigation].Apply(32)
              2006-10-30  [Irrigation].Apply(25)
              2006-11-06  [Irrigation].Apply(29)
              2006-11-13  [Irrigation].Apply(29.4)
              2006-11-20  [Irrigation].Apply(30.4)
              2006-11-27  [Irrigation].Apply(40)
              2006-12-04  [Irrigation].Apply(44)
              2006-12-11  [Irrigation].Apply(3)
              2007-03-05  [Irrigation].Apply(18)
              2007-04-16  [Irrigation].Apply(15.5)
              2007-05-07  [Irrigation].Apply(10.5)
              2007-08-13  [Irrigation].Apply(16.5)
              2007-08-20  [Irrigation].Apply(8)
              2007-08-27  [Irrigation].Apply(21.7)
              2007-09-03  [Irrigation].Apply(15.6)
              2007-09-10  [Irrigation].Apply(16.9)
              2007-09-17  [Irrigation].Apply(19.1)
              2007-09-24  [Irrigation].Apply(14.2)
              2007-09-27  [Irrigation].Apply(9)
              2007-10-01  [Irrigation].Apply(16)
              2007-10-08  [Irrigation].Apply(28)
              2007-10-15  [Irrigation].Apply(14.1018518518519)
              2007-10-16  [Irrigation].Apply(3)
              2007-10-23  [Irrigation].Apply(36.3)
              2007-10-29  [Irrigation].Apply(35)
              2007-11-05  [Irrigation].Apply(32)
              2007-11-12  [Irrigation].Apply(29)
              2007-11-15  [Irrigation].Apply(3.5)
              2007-12-06  [Irrigation].Apply(3.3)
              2008-01-17  [Irrigation].Apply(4.4)
              2008-03-17  [Irrigation].Apply(36.2)
              2008-03-25  [Irrigation].Apply(35.9)
              2008-03-31  [Irrigation].Apply(25.1)
              2008-04-07  [Irrigation].Apply(29.2)
              2008-04-14  [Irrigation].Apply(20.9)
              2008-04-21  [Irrigation].Apply(11.8)
              2008-04-28  [Irrigation].Apply(10.6)
              2008-05-12  [Irrigation].Apply(8.9)
          CompositeFactor 2Weekly: Specifications=[IrrigationEvents]
            Operations IrrigationEvents
              2006-08-07  [Irrigation].Apply(7)
              2006-08-21  [Irrigation].Apply(15)
              2006-09-04  [Irrigation].Apply(23)
              2006-09-18  [Irrigation].Apply(20.4)
              2006-10-02  [Irrigation].Apply(21)
              2006-10-16  [Irrigation].Apply(37)
              2006-10-30  [Irrigation].Apply(25)
              2006-11-13  [Irrigation].Apply(29.4)
              2006-11-27  [Irrigation].Apply(40)
              2006-12-11  [Irrigation].Apply(34)
              2006-12-25  [Irrigation].Apply(33.6)
              2007-01-08  [Irrigation].Apply(28.6)
              2007-01-22  [Irrigation].Apply(31)
              2007-02-05  [Irrigation].Apply(32)
              2007-02-19  [Irrigation].Apply(27)
              2007-03-05  [Irrigation].Apply(50)
              2007-03-19  [Irrigation].Apply(25)
              2007-04-02  [Irrigation].Apply(22)
              2007-04-16  [Irrigation].Apply(15.5)
              2007-04-30  [Irrigation].Apply(8)
              2007-08-13  [Irrigation].Apply(16.5)
              2007-08-20  [Irrigation].Apply(8)
              2007-09-03  [Irrigation].Apply(15.6)
              2007-09-17  [Irrigation].Apply(20.4)
              2007-09-27  [Irrigation].Apply(5.7)
              2007-10-01  [Irrigation].Apply(16)
              2007-10-15  [Irrigation].Apply(14.1018518518519)
              2007-10-29  [Irrigation].Apply(35)
              2007-10-30  [Irrigation].Apply(4)
              2007-11-12  [Irrigation].Apply(29.2)
              2007-11-26  [Irrigation].Apply(39)
              2007-12-05  [Irrigation].Apply(3.6)
              2007-12-10  [Irrigation].Apply(34.8958333333333)
              2007-12-24  [Irrigation].Apply(32.2)
              2007-12-31  [Irrigation].Apply(3.7)
              2008-01-07  [Irrigation].Apply(34.9)
              2008-01-21  [Irrigation].Apply(39.1)
              2008-02-04  [Irrigation].Apply(43.2)
              2008-02-07  [Irrigation].Apply(9.3)
              2008-02-18  [Irrigation].Apply(28.7)
              2008-03-03  [Irrigation].Apply(35.6)
              2008-03-17  [Irrigation].Apply(33.1)
              2008-03-19  [Irrigation].Apply(7.7)
              2008-03-31  [Irrigation].Apply(25.1)
              2008-04-14  [Irrigation].Apply(20.9)
              2008-04-15  [Irrigation].Apply(4.9)
              2008-04-28  [Irrigation].Apply(10.4)
              2008-05-12  [Irrigation].Apply(9.2)
          CompositeFactor 2WeeksIn3: Specifications=[IrrigationEvents]
            Operations IrrigationEvents
              2006-08-07  [Irrigation].Apply(7)
              2006-08-14  [Irrigation].Apply(7)
              2006-08-28  [Irrigation].Apply(13)
              2006-09-04  [Irrigation].Apply(23)
              2006-09-18  [Irrigation].Apply(20.4)
              2006-09-25  [Irrigation].Apply(24)
              2006-10-09  [Irrigation].Apply(21)
              2006-10-16  [Irrigation].Apply(37)
              2006-10-30  [Irrigation].Apply(25)
              2006-11-06  [Irrigation].Apply(29)
              2006-11-20  [Irrigation].Apply(30.4)
              2006-11-27  [Irrigation].Apply(40)
              2006-12-11  [Irrigation].Apply(34)
              2006-12-18  [Irrigation].Apply(32)
              2007-01-01  [Irrigation].Apply(37)
              2007-01-08  [Irrigation].Apply(28.6)
              2007-01-22  [Irrigation].Apply(31)
              2007-01-29  [Irrigation].Apply(30)
              2007-02-12  [Irrigation].Apply(31)
              2007-02-19  [Irrigation].Apply(27)
              2007-03-05  [Irrigation].Apply(50)
              2007-03-12  [Irrigation].Apply(17.8)
              2007-03-26  [Irrigation].Apply(27)
              2007-04-02  [Irrigation].Apply(22)
              2007-04-16  [Irrigation].Apply(15.5)
              2007-04-23  [Irrigation].Apply(12)
              2007-05-07  [Irrigation].Apply(10.5)
              2007-08-13  [Irrigation].Apply(16.5)
              2007-08-20  [Irrigation].Apply(8)
              2007-08-27  [Irrigation].Apply(21.7)
              2007-09-03  [Irrigation].Apply(15.6)
              2007-09-17  [Irrigation].Apply(20.4)
              2007-09-24  [Irrigation].Apply(14.2)
              2007-09-27  [Irrigation].Apply(5.7)
              2007-10-08  [Irrigation].Apply(28)
              2007-10-15  [Irrigation].Apply(14.9861111111111)
              2007-10-29  [Irrigation].Apply(35)
              2007-10-30  [Irrigation].Apply(4)
              2007-11-05  [Irrigation].Apply(32)
              2007-11-12  [Irrigation].Apply(29.2)
              2007-11-19  [Irrigation].Apply(31)
              2007-11-26  [Irrigation].Apply(39)
              2007-12-06  [Irrigation].Apply(3.3)
              2007-12-10  [Irrigation].Apply(34.9236111111111)
              2007-12-17  [Irrigation].Apply(27)
              2007-12-31  [Irrigation].Apply(35)
              2008-01-07  [Irrigation].Apply(34.9)
              2008-01-17  [Irrigation].Apply(1.2)
              2008-01-21  [Irrigation].Apply(39.1)
              2008-01-28  [Irrigation].Apply(38)
              2008-02-07  [Irrigation].Apply(9.3)
              2008-02-11  [Irrigation].Apply(37)
              2008-02-18  [Irrigation].Apply(28.7)
              2008-03-03  [Irrigation].Apply(35.6)
              2008-03-10  [Irrigation].Apply(33.3)
              2008-03-19  [Irrigation].Apply(7.7)
              2008-03-25  [Irrigation].Apply(35.9)
              2008-03-31  [Irrigation].Apply(25.1)
              2008-04-14  [Irrigation].Apply(20.9)
              2008-04-21  [Irrigation].Apply(11.8)
              2008-04-22  [Irrigation].Apply(5.8)
              2008-05-12  [Irrigation].Apply(9.2)
          CompositeFactor 1WeekIn4: Specifications=[IrrigationEvents]
            Operations IrrigationEvents
              2006-08-21  [Irrigation].Apply(15)
              2006-09-18  [Irrigation].Apply(20.4)
              2006-10-16  [Irrigation].Apply(37)
              2006-11-13  [Irrigation].Apply(29.4)
              2006-12-11  [Irrigation].Apply(34)
              2007-01-08  [Irrigation].Apply(28.6)
              2007-02-05  [Irrigation].Apply(32)
              2007-03-05  [Irrigation].Apply(50)
              2007-04-02  [Irrigation].Apply(22)
              2007-04-30  [Irrigation].Apply(8)
              2007-08-13  [Irrigation].Apply(16.5)
              2007-08-20  [Irrigation].Apply(8)
              2007-09-17  [Irrigation].Apply(20.4)
              2007-09-27  [Irrigation].Apply(5.7)
              2007-10-15  [Irrigation].Apply(14.9861111111111)
              2007-10-30  [Irrigation].Apply(4)
              2007-12-10  [Irrigation].Apply(34.9236111111111)
              2008-01-07  [Irrigation].Apply(34.9)
              2008-01-24  [Irrigation].Apply(8)
              2008-02-04  [Irrigation].Apply(43.2)
              2008-03-03  [Irrigation].Apply(35.6)
              2008-03-31  [Irrigation].Apply(25.1)
              2008-04-28  [Irrigation].Apply(10.4)
        Factor Species
          CompositeFactor Ryegrass: Specifications=[GrassSpecies]
            SprumPastureInstance GrassSpecies: same as Iversen_8.Iversen_8LL.paddock.LucerneInstance
          CompositeFactor TallFescue: Specifications=[GrassSpecies]
            SprumPastureInstance GrassSpecies: AgeAtSimulationStart=2; YearsToMaxDimension=1; RUE=1; Presidue=0.15; RsenRate=0.01; Proot=0.1; PSBaseT=0; PSLOptT=20; PSUOptT=25; PSMaxT=40; GRINZ=false; MaxRD=1600; MaxHeight=400; MaxPrunedHeight=50; MaxCover=0.97; MinCover=0.65; ExtinctCoeff=0.6; RegrowthDuration=200; FullCanopyDuration=10000; BaseT=6; OptT=25; MaxT=35; RootNConc=0.01; LeafNConc=0.05; ResidueNConc=0.01; LegumePropn=1; GSMax=0.01; R50=175; WaterStress=true
    Simulation RainShelter
      Clock: Start=2006-07-01; End=2008-07-01
      Summary summaryfile
      Weather: FileName=%root%\Examples\WeatherFiles\NZ_Lincoln.met
      SoilArbitrator Soil Arbitrator
      MicroClimate: a_interception=0; b_interception=1; c_interception=0; d_interception=0; SoilHeatFluxFraction=0.4; MinimumHeightDiffForNewLayer=0; NightInterceptionFraction=0.5; ReferenceHeight=2
      Zone paddock: Area=1; Slope=0; AspectAngle=0; Altitude=50
        Irrigation
        Fertiliser
        SurfaceOrganicMatter surface organic matter: InitialResidueName=wheat; InitialResidueType=wheat; InitialResidueMass=0; InitialStandingFraction=0; InitialCPR=0; InitialCNR=80
        Operations IrrigationEvents
        Soil TempletonSiltLoam: SoilType=NZ_sedementary; Region=Plains; State=Canterbury; Country=New Zealand; Latitude=0; Longitude=0
          DataSource=Generic profile descriptions provided by Trevor Webb and data for functional horizions based on SWAMP project results
          Comments=Bulk density values were measured on the fine earth fraction so values entered into apsim soil are adjusted down to account for stone content (assuming stones are inert from all soil process so their mass and volume is removed from model paramaters).  SAT, DUL, LL15 and Air dry have been adjusted down to account for stone content.  OC has not been adjusted so the model will get the correct carbon and N amounts using the adjusted BD.
          Chemical: PHUnits=Water
            Thickness  PH  CEC
            180        6   14.2515
            150        6   11.150525
            400        6   9.056
            270        6   8.813
            500        6   8.7959
            CEC source: Calculated
          Physical
            Thickness  ParticleSizeSand  ParticleSizeSilt  ParticleSizeClay  Rocks     BD     AirDry  LL15  DUL   SAT
            200        5                 65                30                0.274682  1      0.05    0.1   0.32  0.42
            200        5                 65                30                0.118945  1.324  0.12    0.15  0.35  0.41
            200        5                 65                30                0.188999  1.35   0.1     0.1   0.3   0.37
            200        5                 65                30                0.218457  1.301  0.08    0.08  0.3   0.37
            200        5                 65                30                0.302948  1.301  0.06    0.07  0.28  0.33
            200        5                 65                30                0.324071  1.301  0.06    0.08  0.25  0.32
            200        5                 65                30                0.366317  1.301  0.1     0.1   0.23  0.3
            200        5                 65                30                0.345194  1.301  0.1     0.1   0.24  0.31
            Rocks, ParticleSizeSand, ParticleSizeSilt, ParticleSizeClay source: Calculated
            SoilCrop SPRUMSoil: LL=[0.1, 0.12, 0.1, 0.08, 0.06, 0.08, 0.1, 0.1]; KL=[0.1, 0.1, 0.1, 0.1, 0.1, 0.1, 0.1, 0.1]; XF=[1, 1, 1, 1, 1, 1, 1, 1]
          WaterBalance SoilWater: SummerDate=1-oct; SummerU=6; SummerCona=3; WinterDate=1-Apr; WinterU=2; WinterCona=1; DiffusConst=0; DiffusSlope=0; Salb=0.13; CN2Bare=0; CNRed=0; CNCov=0.8; PSIDul=-100; Thickness=[200, 200, 200, 200, 200, 200, 200, 200]; SWCON=[1, 1, 1, 1, 1, 1, 1, 1]
          Organic: FOMCNRatio=40; CarbonUnits=Total
            Thickness  Carbon  SoilCNRatio  FBiom   FInert  FOM
            180        2.6251  11           0.0333  0.4371  427.528
            150        1.2469  11           0.0187  0.6569  316.72
            400        0.316   11           0.0117  0.8496  142.312
            270        0.208   11           0.0102  0.945   82.9318
            500        0.2004  11           0.01    0.9827  30.5089
          Water: Thickness=[200, 200, 200, 200, 200, 200, 200, 200]; InitialValues=[0.35, 0.35, 0.25, 0.25, 0.25, 0.2, 0.18, 0.2]; InitialPAWmm=250; RelativeTo=LL15; FilledFromTop=false
          Nutrient
          Solute NO3: Thickness=[180, 150, 400, 270, 500]; InitialValues=[265, 40.2427, 5.01813, 2.41979, 1.9216]; InitialValuesUnits=ppm; WaterTableConcentration=0; D0=0; DepthConstant=0; MaxDepthSoluteAccessible=0; RunoffEffectivenessAtMovingSolute=0; MaxEffectiveRunoff=0
          Solute NH4: Thickness=[180, 150, 400, 270, 500]; InitialValues=[1.5, 0.854582, 0.442264, 0.38432, 0.38432]; InitialValuesUnits=ppm; WaterTableConcentration=0; D0=0; DepthConstant=0; MaxDepthSoluteAccessible=0; RunoffEffectivenessAtMovingSolute=0; MaxEffectiveRunoff=0
          Solute Urea: Thickness=[180, 150, 400, 270, 500]; InitialValues=[0, 0, 0, 0, 0]; InitialValuesUnits=kg/ha; WaterTableConcentration=0; D0=0; DepthConstant=0; MaxDepthSoluteAccessible=0; RunoffEffectivenessAtMovingSolute=0; MaxEffectiveRunoff=0
          SoilTemperature Temperature
          OutputLayers Output: Thickness=[200, 200, 200, 200, 200, 200, 200, 200]
        BiomassRemovalEvents CutPasture: same as Iversen_8.Iversen_8LL.paddock.CutLucerne
        Plant SPRUM
        SprumPastureInstance GrassSpecies: same as Iversen_8.Iversen_8LL.paddock.LucerneInstance
        Report: EventNames=[Clock].EndOfDay
          VariableNames:
            [Clock].Today
            [SurfaceOrganicMatter].Wt
            [Soil].Output.SW
            sum([Soil].Output.SWmm)
            [Soil].SoilWater.Es
            [Soil].SoilWater.Eos
            [Soil].SoilWater.Runoff
            [Soil].SoilWater.Infiltration
            [Soil].SoilWater.Drainage
            [Soil].Physical.LL15
            [Soil].Physical.DUL
            [Soil].Physical.LL15mm
            [Soil].Physical.DULmm
            [SPRUM].Leaf.CoverDead
            [SPRUM].Leaf.CoverGreen
            [SPRUM].Leaf.CoverTotal
            [SPRUM].Leaf.Height
            [SPRUM].Leaf.LAI
            [SPRUM].Root.Depth
            [SPRUM].Root.Wt
            [SPRUM].Leaf.Wt
            [SPRUM].Residue.Wt
            [SPRUM].AboveGround.Wt
            [SPRUM].Arbitrator.FN
            [SPRUM].Leaf.FW
            [SPRUM].RelativeAnnualDimension
            [SPRUM].Phenology.Age.YearDecimal
            [SPRUM].Leaf.Cover.Regrowth.Expansion.Delta
        Manager Grazing
```csharp
using System;
using Models.Core;
using APSIM.Shared.Utilities;
using System.Collections.Generic;
using Models.Management;
using System.Diagnostics;
        
namespace Models
{
    [Serializable] 
    [System.Xml.Serialization.XmlInclude(typeof(Model))]
    public class Script : Model
    {
        [Link] Clock Clock;
        [Link(Type = LinkType.Ancestor)] Simulation thisSim;
        [Link(Type = LinkType.Scoped)] BiomassRemovalEvents graze;
        
        private string simName;
        private List<string> grazings = new List<string>();        

        private Dictionary<string, List<string>> GrazeDates = new Dictionary<string, List<string>>()
        {
            {"RainShelterIrrigation1WeekIn4SpeciesRyegrass", new List<string>{"13/09/2006","4/10/2006","1/11/2006","5/01/2007","21/02/2007","11/04/2007","14/05/2007","25/09/2007","23/10/2007","21/01/2008","29/04/2008","14/05/2008"}},
            {"RainShelterIrrigation1WeekIn4SpeciesTallFescue", new List<string>{"6/09/2006","4/10/2006","1/11/2006","7/12/2006","17/01/2007","21/03/2007","14/05/2007","25/09/2007","30/10/2007","21/01/2008","29/04/2008","14/05/2008"}},
            {"RainShelterIrrigation2WeeklySpeciesRyegrass", new List<string>{"13/09/2006","4/10/2006","27/10/2006","22/11/2006","27/12/2006","17/01/2007","31/01/2007","21/02/2007","21/03/2007","11/04/2007","1/05/2007","14/05/2007","25/09/2007","16/10/2007","23/11/2007","20/12/2007","31/01/2008","27/02/2008","10/04/2008","14/05/2008"}},
            {"RainShelterIrrigation2WeeklySpeciesTallFescue", new List<string>{"7/09/2006","4/10/2006","1/11/2006","22/11/2006","21/12/2006","17/01/2007","31/01/2007","21/02/2007","16/03/2007","11/04/2007","14/05/2007","25/09/2007","23/10/2007","23/11/2007","3/01/2008","27/02/2008","10/04/2008","14/05/2008"}},
            {"RainShelterIrrigation2WeeksIn3SpeciesRyegrass", new List<string>{"13/09/2006","4/10/2006","1/11/2006","22/11/2006","21/12/2006","10/01/2007","24/01/2007","14/02/2007","16/03/2007","24/04/2007","14/05/2007","21/09/2007","16/10/2007","4/12/2007","3/01/2008","5/02/2008","10/03/2008","16/04/2008","14/05/2008"}},
            {"RainShelterIrrigation2WeeksIn3SpeciesTallFescue", new List<string>{"6/09/2006","4/10/2006","1/11/2006","28/11/2006","27/12/2006","17/01/2007","5/02/2007","21/02/2007","21/03/2007","11/04/2007","14/05/2007","21/09/2007","16/10/2007","23/11/2007","3/01/2008","5/02/2008","10/03/2008","10/04/2008","14/05/2008"}},
            {"RainShelterIrrigationAutumnDroughtSpeciesRyegrass", new List<string>{"13/09/2006","4/10/2006","27/10/2006","8/11/2006","28/11/2006","18/12/2006","10/01/2007","12/03/2007","13/04/2007","14/05/2007","21/09/2007","11/10/2007","12/11/2007","4/12/2007","8/01/2008","29/04/2008","14/05/2008"}},
            {"RainShelterIrrigationAutumnDroughtSpeciesTallFescue", new List<string>{"7/09/2006","4/10/2006","1/11/2006","22/11/2006","18/12/2006","17/01/2007","12/03/2007","13/04/2007","14/05/2007","21/09/2007","11/10/2007","7/11/2007","4/12/2007","8/01/2008","29/04/2008","14/05/2008"}},
            {"RainShelterIrrigationSpringDroughtSpeciesRyegrass", new List<string>{"13/09/2006","10/10/2006","8/11/2006","5/01/2007","31/01/2007","14/02/2007","9/03/2007","27/03/2007","27/04/2007","14/05/2007","25/09/2007","30/10/2007","8/01/2008","7/03/2008","26/03/2008","16/04/2008","14/05/2008"}},
            {"RainShelterIrrigationSpringDroughtSpeciesTallFescue", new List<string>{"6/09/2006","4/10/2006","8/11/2006","5/01/2007","31/01/2007","21/02/2007","15/03/2007","5/04/2007","1/05/2007","14/05/2007","25/09/2007","30/10/2007","8/01/2008","7/03/2008","26/03/2008","16/04/2008","14/05/2008"}},
            {"RainShelterIrrigationWeeklySpeciesRyegrass", new List<string> {"13/09/2006","4/10/2006","27/10/2006","22/11/2006","21/12/2006","10/01/2007","24/01/2007","14/02/2007","9/03/2007","27/03/2007","27/04/2007","14/05/2007","21/09/2007","11/10/2007","7/11/2007","27/11/2007","20/12/2007","21/01/2008","23/02/2008","10/04/2008","14/05/2008"}},
            {"RainShelterIrrigationWeeklySpeciesTallFescue", new List<string>{"6/09/2006","27/09/2006","20/10/2006","8/11/2006","28/11/2006","21/12/2006","10/01/2007","24/01/2007","14/02/2007","15/03/2007","5/04/2007","14/05/2007","21/09/2007","11/10/2007","7/11/2007","27/11/2007","20/12/2007","21/01/2008","23/02/2008","26/03/2008","5/05/2008","14/05/2008"}}
        };
                      
        [EventSubscribe("DoManagement")]
        private void OnDoManagement(object sender, EventArgs e)
        {
                foreach (string date in grazings)
                {
                    if (DateUtilities.CompareDates(date, Clock.Today) == 0)
                    { // date match, trigger a removal
                        graze.Remove();
                    }
                }
        }
        
        [EventSubscribe("StartOfSimulation")]
        private void OnStartOfSimulation (object sender, EventArgs e)
        {
            simName = thisSim.Name;
            grazings = GrazeDates[simName];
            //Debugger.Break();
        }                                       
    }
}
```
        Manager ClimateController
          AllowControl = True
          EnableDate = 01/01/1972 00:00:00
          WithinYearControl = False
          ControlStart =
          ControlEnd =
          RainfallMultiplier = 0.9
          RainfallAddition = 0
          RadiationMultiplier = 1
          RadiationAddition = 0
          MinTMultiplier = 1
          MinTAddition = 0
          MaxTMultiplier = 1
          MaxTAddition = 0
          WindMultiplier = 1
          WindAddition = 0
          VPMultiplier = 1
          VPAddition = 0
```csharp
using Newtonsoft.Json;
using APSIM.Shared.Utilities;
using Models.Interfaces;
using Models.Soils;
using Models.PMF;
using Models.Core;
using System.Xml.Serialization;
using System;
using System.Linq;
using Models.Soils.Nutrients;
using Models.Climate;

namespace Models
{
    [Serializable]
    public class Script : Model
    {
        // - Links to APSIM models
        [Link] Zone zone;
        [Link] Clock clock;
        [Link] Weather weather;
        [Link] ISummary summary = null;

        // - Parameters for this manager
        [Description("Enabled (untick to disable this manager)")] public bool AllowControl { get; set; }

        [Separator("General settings")]
        [Description("Start the climate controls beginning on date (dd/mmm/yyyy): ")] public DateTime EnableDate { get; set; }
        [Description("Implement climate control only during part of the year?")] public bool WithinYearControl { get; set; }
        [Description("Within each year, the first day to start the climate controls is (dd-mmm)")] public string ControlStart { get; set; }
        [Description("Within each year, end last day of climate control is (dd-mmm)")] public string ControlEnd { get; set; }

        [Separator("Rainfall")]
        [Description("Rainfall multiplier (-): ")] public double RainfallMultiplier { get; set; }
        [Description("Rainfall addition (mm): ")] public double RainfallAddition { get; set; }

        [Separator("Radiation")]
        [Description("Radiation multiplier (-): ")] public double RadiationMultiplier { get; set; }
        [Description("Radiation addition (MJ/m2): ")] public double RadiationAddition { get; set; }

        [Separator("Minimum temperature")]
        [Description("Minimum temperature multiplier (-): ")] public double MinTMultiplier { get; set; }
        [Description("Minimum temperature addition (C): ")] public double MinTAddition { get; set; }

        [Separator("Maximum temperature")]
        [Description("Maximum temperature multiplier (-): ")] public double MaxTMultiplier { get; set; }
        [Description("Maximum temperature addition (C): ")] public double MaxTAddition { get; set; }

        [Separator("Wind speed")]
        [Description("Wind speed multiplier (-): ")] public double WindMultiplier { get; set; }
        [Description("Wind speed addition (m/s): ")] public double WindAddition { get; set; }

        [Separator("Vapour pressure")]
        [Description("Vapour pressure multiplier (-): ")] public double VPMultiplier { get; set; }
        [Description("Vapour pressure addition (hPa): ")] public double VPAddition { get; set; }

        [JsonIgnore] public bool DoControl { get; set; }
        [JsonIgnore] public int DoControlInt { get; set; }

        [EventSubscribe("PreparingNewWeatherData")] private void OnDoManagement(object sender, EventArgs e)
        {
            // Check if this manager is enabled
            if ((AllowControl) && (clock.Today >= EnableDate))
            {
                DoControl = true;
                if (WithinYearControl)
                    DoControl = DateUtilities.WithinDates(ControlStart, clock.Today, ControlEnd); 
            }

            if (DoControl)
                DoControlInt = 1;
            else
                DoControlInt = 0;

            if (DoControl)
            {
                // do the weather alterations 
                weather.Rain = RainfallMultiplier * weather.Rain + RainfallAddition;
                weather.Radn = RadiationMultiplier * weather.Radn + RadiationAddition;
                weather.MinT = MinTMultiplier * weather.MinT + MinTAddition;
                weather.MaxT = MaxTMultiplier * weather.MaxT + MaxTAddition;
                weather.Wind = WindMultiplier * weather.Wind + WindAddition;
                weather.VP = VPMultiplier * weather.VP + VPAddition;
            }
        }
    }
}
```
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