Simulations: Version=102
  DataStore
    Input: FileNames=[Continuous Wheat.out]
  Simulation Continuous Wheat
    Weather: FileName=Goond.met
    Clock: Start=1940-01-01; End=1940-12-31
    Summary summaryfile
    Zone paddock: Area=1; Slope=0; AspectAngle=0; Altitude=50
      Soil: SoilType=Black Vertosol; Site=Jimbour; NearestTown=Jimbour, Q 4352; Region=South East Queensland; NaturalVegetation=Grassland, mainly Qld bluegrass; Latitude=0; Longitude=0
        InitialWater Initial water: PercentMethod=0; FractionFull=1
        Physical
          Thickness  ParticleSizeClay  BD    AirDry  LL15  DUL   SAT
          150        20                1.02  0.15    0.29  0.54  0.59
          150        20                1.03  0.26    0.29  0.53  0.58
          300        20                1.02  0.29    0.29  0.54  0.59
          300        20                1.02  0.29    0.29  0.54  0.58
          300        20                1.06  0.3     0.3   0.52  0.57
          300        20                1.11  0.31    0.31  0.5   0.55
          300        20                1.12  0.32    0.32  0.5   0.55
          300        20                1.15  0.33    0.33  0.48  0.53
          300        20                1.18  0.34    0.34  0.47  0.52
          300        20                1.2   0.35    0.35  0.46  0.51
          300        20                1.25  0.36    0.36  0.44  0.49
          SoilCrop BarleySoil
            LL=[0.29, 0.29, 0.32, 0.38, 0.39, 0.39, 0.41, 0.48, 0.47, 0.46, 0.44]
            KL=[0.1, 0.1, 0.08, 0.06, 0.04, 0.02, 0.01, 0, 0, 0, 0]
            XF=[1, 1, 1, 1, 1, 1, 1, 0, 0, 0, 0]
          SoilCrop ChickpeaSoil
            LL=[0.29, 0.29, 0.36, 0.43, 0.51, 0.5, 0.5, 0.48, 0.47, 0.46, 0.44]
            KL=[0.1, 0.1, 0.08, 0.06, 0.04, 0.02, 0.01, 0, 0, 0, 0]
            XF=[1, 1, 1, 1, 1, 1, 1, 0, 0, 0, 0]
          SoilCrop LucerneSoil
            LL=[0.29, 0.29, 0.29, 0.29, 0.3, 0.31, 0.32, 0.33, 0.34, 0.35, 0.36]
            KL=[0.1, 0.1, 0.1, 0.1, 0.09, 0.09, 0.09, 0.09, 0.09, 0.09, 0.09]
            XF=[1, 1, 1, 1, 1, 1, 1, 1, 1, 1, 1]
          SoilCrop MaizeSoil
            LL=[0.29, 0.29, 0.34, 0.34, 0.37, 0.4, 0.42, 0.48, 0.47, 0.46, 0.44]
            KL=[0.1, 0.1, 0.1, 0.08, 0.06, 0.04, 0.02, 0, 0, 0, 0]
            XF=[1, 1, 1, 1, 1, 1, 1, 0, 0, 0, 0]
          SoilCrop Perennial GrassSoil
            LL=[0.29, 0.29, 0.39, 0.41, 0.4, 0.4, 0.41, 0.41, 0.4, 0.4, 0.42]
            KL=[0.1, 0.1, 0.1, 0.1, 0.09, 0.07, 0.05, 0, 0, 0, 0]
            XF=[1, 1, 1, 1, 1, 1, 1, 0, 0, 0, 0]
          SoilCrop SorghumSoil
            LL=[0.29, 0.29, 0.35, 0.38, 0.4, 0.4, 0.4, 0.48, 0.47, 0.46, 0.44]
            KL=[0.1, 0.1, 0.1, 0.08, 0.06, 0.04, 0.02, 0, 0, 0, 0]
            XF=[1, 1, 1, 1, 1, 1, 1, 0, 0, 0, 0]
          SoilCrop WheatSoil
            LL=[0.29, 0.29, 0.32, 0.32, 0.35, 0.38, 0.41, 0.48, 0.47, 0.46, 0.44]
            KL=[0.1, 0.1, 0.08, 0.06, 0.04, 0.02, 0.01, 0, 0, 0, 0]
            XF=[1, 1, 1, 1, 1, 1, 1, 0, 0, 0, 0]
        WaterBalance SoilWater: SummerDate=1-Nov; SummerU=6; SummerCona=3.5; WinterDate=1-Apr; WinterU=6; WinterCona=3.5; DiffusConst=40; DiffusSlope=16; Salb=0.13; CN2Bare=73; CNRed=20; CNCov=0.8; Thickness=[150, 150, 300, 300, 300, 300, 300, 300, 300, 300, 300]; SWCON=[0.3, 0.3, 0.3, 0.3, 0.3, 0.3, 0.3, 0.3, 0.3, 0.3, 0.3]
        SoilNitrogen: fom_types=[default, manure, mucuna, lablab, shemp, stable]; fract_carb=[0.2, 0.3, 0.54, 0.57, 0.45, 0]; fract_cell=[0.7, 0.3, 0.37, 0.37, 0.47, 0.1]; fract_lign=[0.1, 0.4, 0.09, 0.06, 0.08, 0.9]
          SoilNitrogenNO3 NO3
          SoilNitrogenNH4 NH4
          SoilNitrogenUrea Urea
          SoilNitrogenPlantAvailableNO3 PlantAvailableNO3
          SoilNitrogenPlantAvailableNH4 PlantAvailableNH4
        Organic: FOMCNRatio=40
          Thickness  Carbon  SoilCNRatio  FBiom  FInert  FOM
          150        1.04    12.5         0.025  0.4     48.1286
          150        0.89    12.5         0.02   0.6     41.4247
          300        0.89    12.5         0.015  0.8     30.6882
          300        0.89    12.5         0.01   0.9     22.7344
          300        0.77    12.5         0.01   0.95    16.842
          300        0.45    12.5         0.01   0.95    12.4769
          300        0.27    12.5         0.01   0.95    9.2431
          300        0.22    12.5         0.01   0.95    6.84746
          300        0.16    12.5         0.01   0.95    5.07272
          300        0.13    12.5         0.01   0.95    3.75796
          300        0.12    12.5         0.01   0.95    2.78397
        Chemical
          Thickness  NO3N   NH4N      PH   EC
          150        6.503  0.599004  8.4  0.2
          150        2.101  0.100001  8.8  0.25
          300        2.101  0.100001  9    0.31
          300        1.701  0.100001  9.2  0.4
          300        1.701  0.100001  9.2  0.59
          300        1.701  0.100001  9.1  0.84
          300        1.701  0.100001  9    0.93
          300        1.701  0.100001  9    1.01
          300        1.701  0.100001  8.9  1.06
          300        1.701  0.100001  8.9  1.05
          300        1.701  0.100001  8.9  1.01
        Sample Initial nitrogen: Thickness=[150, 150, 300, 300, 300, 300, 300, 300, 300, 300, 300]; SWUnits=Volumetric; OCUnits=Total; PHUnits=Water
        SoilTemperature
        CERESSoilTemperature
      SurfaceOrganicMatter: InitialResidueName=wheat; InitialResidueType=wheat; InitialResidueMass=1000; InitialStandingFraction=0; InitialCPR=0; InitialCNR=80
      Plant wheat: ResourceName=Wheat
      Folder Manager folder
        Manager SowingRule
          StartDate = 15-may
          EndDate = 10-jul
          MinESW = 200
          MinRain = 30
          RainDays = 3
          CultivarName = Hartog
          SowingDepth = 30
          RowSpacing = 250
          Population = 100
```csharp
using APSIM.Shared.Utilities;
using Models.Utilities;
using Models.Soils.Nutrients;
using Models.Soils;
using Models.PMF;
using Models.Core;
using System;

namespace Models
{
    [Serializable]
    public class Script : Model
    {
        [Link] Clock Clock;
        [Link] Fertiliser Fertiliser;
        [Link] Summary Summary;
        [Link] Plant Wheat;
        [Link] Soil Soil; 
        Accumulator accumulatedRain;
        
        [Description("Start of sowing window (d-mmm)")]
        public string StartDate { get; set;}
        [Description("End of sowing window (d-mmm)")]
        public string EndDate { get; set;}
        [Description("Minimum extractable soil water for sowing (mm)")]
        public double MinESW { get; set;}
        [Description("Accumulated rainfall required for sowing (mm)")]
        public double MinRain { get; set;}
        [Description("Duration of rainfall accumulation (d)")]
        public int RainDays { get; set;}
        [Description("Cultivar to be sown")]
        [Display(Type=DisplayType.CultivarName)]
        public string CultivarName { get; set;}
        [Description("Sowing depth (mm)")]
        public double SowingDepth { get; set;}        
        [Description("Row spacing (mm)")]
        public double RowSpacing { get; set;}    
        [Description("Plant population (/m2)")]
        public double Population { get; set;}    
        
        
        [EventSubscribe("StartOfSimulation")]
        private void OnSimulationCommencing(object sender, EventArgs e)
        {
            accumulatedRain = new Accumulator(this, "[Weather].Rain", RainDays);
        }
        

        [EventSubscribe("DoManagement")]
        private void OnDoManagement(object sender, EventArgs e)
        {
            accumulatedRain.Update();
            
            if (DateUtilities.WithinDates(StartDate,Clock.Today,EndDate) &&
                !Wheat.IsAlive &&
                MathUtilities.Sum(Soil.SoilWater.ESW) > MinESW &&
                accumulatedRain.Sum > MinRain)
            {
               Wheat.Sow(population:Population, cultivar:CultivarName, depth:SowingDepth, rowSpacing:RowSpacing);    
            }
        
        }
        
    }
}
```
        Manager SowingFertiliser
          Amount = 150
          CropName = wheat
          FertiliserType = UreaN
```csharp
using Models.PMF;
using Models.Core;
using System;
namespace Models
{
    [Serializable]
    public class Script : Model
    {
        [Link] Clock Clock;
        [Link] Fertiliser Fertiliser;
        [Link] Summary Summary;
        
        
        [Description("Amount of fertiliser to be applied (kg/ha)")]
        public double Amount { get; set;}
        
        [Description("Crop to be fertilised")]
        public string CropName { get; set;}

        [Description("Type of Fertiliser")]
        public Fertiliser.Types FertiliserType { get; set; }
        

        [EventSubscribe("Sowing")]
        private void OnSowing(object sender, EventArgs e)
        {
            Model crop = sender as Model;
            if (crop.Name.ToLower()==CropName.ToLower())
                Fertiliser.Apply(Amount: Amount, Type: FertiliserType);
        }
        
    }
}
```
        Manager Harvest
```csharp
using APSIM.Shared.Utilities;
using Models.Utilities;
using Models.Soils.Nutrients;
using Models.Soils;
using Models.PMF;
using Models.Core;
using System;

namespace Models
{
    [Serializable]
    public class Script : Model
    {
        [Link] Plant Wheat;

        [EventSubscribe("DoManagement")]
        private void OnDoManagement(object sender, EventArgs e)
        {
            if (Wheat.IsReadyForHarvesting)
            {
               Wheat.Harvest();
               Wheat.EndCrop();    
            }
        
        }
        
    }
}
```
      Report outputfile: EventNames=[Clock].DoReport
        VariableNames:
          [Clock].Today
          [Soil].SoilTemperature.AverageSoilTemp as ave_soil_temp
          [Soil].SoilTemperature.AverageSoilSurfaceTemp as ave_soil_temp_surface
          sum([Soil].SoilWater.ESW) as esw
      MicroClimate: a_interception=0; b_interception=0; c_interception=0; d_interception=0; soil_albedo=0; SoilHeatFluxFraction=0; MinimumHeightDiffForNewLayer=0; NightInterceptionFraction=0; ReferenceHeight=2
      Fertiliser
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