Simulations: Version=69
  Replacements
    Report
      VariableNames:
        [Clock].Today
        [Clock].Today.DayOfYear
        [SurfaceOrganicMatter].Cover
        [SurfaceOrganicMatter].Wt
        [Soil].SoilWater.SWmm
        sum([Soil].SoilWater.SWmm) as ProfileWater
        [Soil].SoilWater.SW
        [Weather].Rain
        [Irrigation].IrrigationApplied
        [Soil].SoilWater.Es
        [Soil].SoilWater.Eos
        [Soil].SoilWater.Runoff
        [Soil].SoilWater.Infiltration
        [Soil].SoilWater.Drainage
        [Soil].LL15
        [Soil].DUL
        [Soil].LL15mm
        [Soil].DULmm
        [Slurp].Leaf.Transpiration
        [Slurp].Leaf.CoverGreen
        [Slurp].Leaf.CoverTotal
        [Slurp].Leaf.Height
        [Slurp].Leaf.LAI
        [Slurp].Root.Depth
        [Soil].Temperature
      EventNames:
        [Clock].DoReport
  DataStore
    ExcelInput Observed: FileName=Observed.xlsx; SheetNames=[Observed]
    PredictedObserved: PredictedTableName=Report; ObservedTableName=Observed; FieldNameUsedForMatch=Clock.Today
    PredictedObserved ProfileWaterPO: PredictedTableName=ProfileWater; ObservedTableName=Observed; FieldNameUsedForMatch=Clock.Today
  Folder Evaporation
    Folder Wellcamp
      Memo
        This dataset was developed as part of work by [huth_managing_2008].  Evaporation from a Black Vertosol over a period of 6 months was measured using a Neutron Moisture Meter at Wellcamp, near Toowoomba in Queensland, Australia.  Rainfall was excluded from the soil.  Drainage was unlikely during the study period and so all changes in water content should be due to evaporation alone.
      Experiment WellCamp
        Factors
          Factor Surface: Specification=[SurfaceOrganicMatter]
            SurfaceOrganicMatter Bare: InitialResidueName=wheat_stubble; InitialResidueType=wheat; InitialResidueMass=10; InitialStandingFraction=0; InitialCPR=0; InitialCNR=100; FractionFaecesAdded=0.5
        Simulation WellcampBase
          Clock: Start=2006-02-27; End=2006-09-04
          Summary SummaryFile
          Weather: FileName=Toowoomba.met
          SoilArbitrator
          MicroClimate: a_interception=0; b_interception=1; c_interception=0; d_interception=0; soil_albedo=0.3; SoilHeatFluxFraction=0.4; NightInterceptionFraction=0.5; ReferenceHeight=2
          Zone Field: Area=1; Slope=0; AspectAngle=0; Altitude=50
            Report: EventNames=[Clock].DoReport
              VariableNames:
                [Clock].Today
                [Soil].SoilWater.Es
                sum([Soil].SoilWater.SWmm) as TotalSW
                [Soil].SoilWater.SW
            Soil: ASCOrder=Vertosol; ASCSubOrder=Black; SoilType=Clay; Site=Norwin; NearestTown=Norwin; Region=Darling Downs and Granite Belt; State=Queensland; Country=Australia; NaturalVegetation=Qld. Bluegrass, possible Qld. Blue gum; ApsoilNumber=900; Latitude=-27.581836; Longitude=151.320206; LocationAccuracy=+/- 20m
              DataSource=CSIRO Sustainable Ecosystems, Toowoomba; Characteriesd as part of the GRDC funded project"Doing it better, doing it smarter, managing soil water in Australian agriculture' 2011
              Comments=OC, CLL for all crops estimated-based on Bongeen Mywybilla Soil No1
              Physical
                Thickness  BD    AirDry  LL15  DUL   SAT   KS
                150        0.9   0.15    0.32  0.54  0.62  20
                150        1.01  0.26    0.32  0.52  0.59  20
                300        1.02  0.29    0.38  0.52  0.55  20
                300        1     0.29    0.3   0.48  0.54  20
                300        1.06  0.25    0.25  0.39  0.5   20
                300        1.14  0.28    0.28  0.4   0.5   20
              Organic: FOMCNRatio=40
                Thickness  Carbon  SoilCNRatio  FBiom  FInert  FOM
                150        1.04    12.5         0.025  0.4     78.1195
                150        0.89    12.5         0.02   0.6     57.8724
                300        0.89    12.5         0.015  0.8     31.761
                300        0.89    12.5         0.01   0.9     17.4308
                300        0.77    12.5         0.01   0.95    9.56624
                300        0.45    12.5         0.01   0.95    5.25006
              SoilWater: SummerDate=1-Nov; SummerU=9; SummerCona=5; WinterDate=1-Apr; WinterU=9; WinterCona=5; DiffusConst=20; DiffusSlope=8; Salb=0.13; CN2Bare=73; CNRed=20; CNCov=0.8; max_pond=0; Thickness=[150, 150, 300, 300, 300, 300]; SWCON=[0.3, 0.3, 0.3, 0.3, 0.3, 0.3]; PrecipitationInterception=0
              Chemical
                Thickness  NO3N   NH4N      PH   EC
                150        6.503  0.599004  8.4  0.2
                150        2.101  0.100001  8.8  0.25
                300        2.101  0.100001  9    0.31
                300        1.701  0.100001  9.2  0.4
                300        1.701  0.100001  9.2  0.59
                300        1.701  0.100001  9.1  0.84
              CERESSoilTemperature
              Nutrient
                DirectedGraphInfo={Nodes=[{Name=Inert, OutlineColour=Black}, {Name=SurfaceResidue, OutlineColour=Black}, {Name=FOMLignin, OutlineColour=Black}, {Name=FOMCellulose, OutlineColour=Black}, {Name=FOMCarbohydrate, OutlineColour=Black}, {Name=Microbial, OutlineColour=Black}, {Name=Humic, OutlineColour=Black}, {Name=Urea, OutlineColour=Black}, {Name=NO3, OutlineColour=Black}, {Name=NH4, OutlineColour=Black}, {Name=Atmosphere, OutlineColour=White}, {Name=PlantAvailableNO3, OutlineColour=Black}, {Name=PlantAvailableNH4, OutlineColour=Black}], Arcs=[{SourceName=SurfaceResidue, DestinationName=Microbial}, {SourceName=SurfaceResidue, DestinationName=Humic}, {SourceName=FOMLignin, DestinationName=Microbial}, {SourceName=FOMLignin, DestinationName=Humic}, {SourceName=FOMCellulose, DestinationName=Microbial}, {SourceName=FOMCellulose, DestinationName=Humic}, {SourceName=FOMCarbohydrate, DestinationName=Microbial}, {SourceName=FOMCarbohydrate, DestinationName=Humic}, {SourceName=Microbial, DestinationName=Microbial}, {SourceName=Microbial, DestinationName=Humic}, {SourceName=Humic, DestinationName=Microbial}, {SourceName=Urea, DestinationName=NH4}, {SourceName=NO3, DestinationName=Atmosphere}, {SourceName=NH4, DestinationName=NO3}]}
              Sample Initial nitrogen: Thickness=[150, 150, 300, 300, 300, 300]; SW=[0.4695, 0.4827, 0.5052, 0.4509, 0.363, 0.3772]; SWUnits=Volumetric; OCUnits=Total; PHUnits=Water
            SurfaceOrganicMatter: InitialResidueName=wheat_stubble; InitialResidueType=wheat; InitialResidueMass=10; InitialStandingFraction=0; InitialCPR=0; InitialCNR=100; FractionFaecesAdded=0.5
    Folder TorStreet
      Memo
        Evaporation from a Grey Vertosol over a period of 7 months was measured using weighing lysimeters in Toowoomba, Queensland, Australia.
      Experiment TorStreet
        Factors
          Factor Surface: Specification=[SurfaceOrganicMatter]
            SurfaceOrganicMatter Bare: InitialResidueName=wheat_stubble; InitialResidueType=wheat; InitialResidueMass=10; InitialStandingFraction=0; InitialCPR=0; InitialCNR=100; FractionFaecesAdded=0.5
            SurfaceOrganicMatter Mulch: InitialResidueName=wheat_stubble; InitialResidueType=wheat; InitialResidueMass=4000; InitialStandingFraction=0; InitialCPR=0; InitialCNR=40; FractionFaecesAdded=0.5
        Simulation TorStreetBase
          Clock: Start=1982-05-11; End=1982-12-01
          Summary SummaryFile
          Weather: FileName=TorStreet.met
          SoilArbitrator
          MicroClimate: a_interception=0; b_interception=1; c_interception=0; d_interception=0; soil_albedo=0.3; SoilHeatFluxFraction=0.4; NightInterceptionFraction=0.5; ReferenceHeight=2
          Zone Field: Area=1; Slope=0; AspectAngle=0; Altitude=50
            Report: EventNames=[Clock].DoReport
              VariableNames:
                [Clock].Today
                [Soil].SoilWater.Es
                sum([Soil].SoilWater.SWmm) as TotalSW
                sum([Soil].DULmm) as DUL
                sum([Soil].LL15mm) as LL15
                [Soil].SoilWater.SW
            Soil: ASCOrder=Vertosol; SoilType=Clay; LocalName=Moola Grey Clay; Latitude=-27.581836; Longitude=151.320206
              Physical
                Thickness  BD    AirDry  LL15   DUL  SAT   KS
                100        1     0.084   0.198  0.4  0.55  20
                100        1.27  0.15    0.2    0.4  0.5   20
                150        1.32  0.2     0.2    0.4  0.5   20
              Organic: FOMCNRatio=40
                Thickness  Carbon  SoilCNRatio  FBiom  FInert  FOM
                50         1.03    12.5         0.025  0.4     78.1195
                50         1.03    12.5         0.02   0.6     57.8724
                50         0.86    12.5         0.015  0.8     31.761
                50         0.86    12.5         0.01   0.9     17.4308
                50         0.77    12.5         0.01   0.95    9.56624
                50         0.77    12.5         0.01   0.95    5.25006
                50         0.65    12.5         0.01   0.95    1
              SoilWater: SummerDate=1-Nov; SummerU=9; SummerCona=5; WinterDate=1-Apr; WinterU=9; WinterCona=5; DiffusConst=40; DiffusSlope=16; Salb=0.13; CN2Bare=50; CNRed=20; CNCov=0.8; max_pond=0; Thickness=[150, 150, 300, 300, 300, 300]; SWCON=[0.3, 0.3, 0.3, 0.3, 0.3, 0.3]; PrecipitationInterception=0
              Chemical
                Thickness  NO3N   NH4N      PH
                50         6.503  0.599004  7
                50         2.101  0.100001  7
                50         2.101  0.100001  7
                50         1.701  0.100001  7
                50         1.701  0.100001  7
                50         1.701  0.100001  7
                50         1      0.1       7
              CERESSoilTemperature
              Nutrient: same as Evaporation.Wellcamp.WellCamp.WellcampBase.Field.Soil.Nutrient
              Sample Initial nitrogen: Thickness=[50, 50, 50, 50, 50, 50, 50]; SW=[0.198, 0.198, 0.251, 0.251, 0.246, 0.246, 0.239]; SWUnits=Volumetric; OCUnits=Total; PHUnits=Water
            SurfaceOrganicMatter: InitialResidueName=wheat_stubble; InitialResidueType=wheat; InitialResidueMass=10; InitialStandingFraction=0; InitialCPR=0; InitialCNR=100; FractionFaecesAdded=0.5
    Folder Norwin
      Memo: same as Evaporation.Wellcamp.Memo
      Experiment Norwin
        Factors
          Factor Surface: Specification=[SurfaceOrganicMatter]
            SurfaceOrganicMatter Mulch: InitialResidueName=wheat_stubble; InitialResidueType=wheat; InitialResidueMass=4000; InitialStandingFraction=0.66; InitialCPR=0; InitialCNR=120; FractionFaecesAdded=0.5
        Simulation NorwinBase
          Clock: Start=2010-01-01; End=2010-12-31
          Summary SummaryFile
          Weather: FileName=Kurrowah_Norwin comp.met
          SoilArbitrator
          MicroClimate: a_interception=0; b_interception=1; c_interception=0; d_interception=0; soil_albedo=0.3; SoilHeatFluxFraction=0.4; NightInterceptionFraction=0.5; ReferenceHeight=2
          Zone Field: Area=1; Slope=0; AspectAngle=0; Altitude=50
            Report: EventNames=[Clock].DoReport
              VariableNames:
                [Clock].Today
                [Soil].SoilWater.Es
                sum([Soil].SoilWater.SWmm) as TotalSW
                [Soil].SoilWater.SW
                sum([Soil].DULmm) as DUL
                sum([Soil].LL15mm) as LL15
                [Soil].Temperature
            SurfaceOrganicMatter: InitialResidueName=wheat_stubble; InitialResidueType=wheat; InitialResidueMass=10; InitialStandingFraction=0; InitialCPR=0; InitialCNR=100; FractionFaecesAdded=0.5
            Soil: SoilType=Black Vertosol; Site=Bongeen; NearestTown=Bongeen, Q 4356; Region=Darling Downs; State=Queensland; Country=Australia; NaturalVegetation=Qld. Bluegrass, possible Qld. Blue gum; ApsoilNumber=1; Latitude=-27.629; Longitude=151.402; LocationAccuracy=+/-20m; DataSource=CSIRO Sustainable Ecosystems, Toowoomba
              Comments=Soil naming structure: \State\Region\Classification-Local Name (Site/district and locator number); oc and ph estimated
              Physical
                Thickness  BD    AirDry  LL15  DUL   SAT   KS
                100        0.99  0.1     0.26  0.55  0.61  100
                100        1.06  0.14    0.26  0.55  0.6   100
                100        1.06  0.14    0.26  0.55  0.6   100
                300        1.13  0.2     0.32  0.55  0.57  100
                300        1.11  0.2     0.33  0.5   0.55  100
              Chemical
                Thickness  NO3N  NH4N       PH
                150        2     0.657895   8
                150        1     0.314465   8
                300        1     0.0294985  8
                300        1     0.03003    8
                300        1     0.2        8
                300        1     0.2        8
                300        1     0.2        8
              SoilWater: SummerDate=1-Nov; SummerU=9; SummerCona=5; WinterDate=1-Apr; WinterU=9; WinterCona=5; DiffusConst=40; DiffusSlope=16; Salb=0.12; CN2Bare=75; CNRed=20; CNCov=0.8; max_pond=0; Thickness=[150, 150, 300, 300, 300, 300, 300]; SWCON=[0.3, 0.3, 0.3, 0.3, 0.3, 0.3, 0.3]; PrecipitationInterception=0
              Organic: FOMCNRatio=40
                Thickness  Carbon  SoilCNRatio  FBiom  FInert  FOM
                150        1.24    12           0.04   0.4     347.129
                150        1.24    12           0.02   0.6     270.344
                300        1.25    12           0.02   0.8     163.972
                300        1.1     12           0.02   1       99.4541
                300        0.71    12           0.01   1       60.322
                300        0.34    12           0.01   1       36.5871
                300        0.26    12           0.01   1       22.1912
              Sample Initial Soil Data: Thickness=[150, 150, 300, 300]; SW=[0.19, 0.19, 0.26, 0.32]; SWUnits=Volumetric; OCUnits=Total; PHUnits=Water
              Nutrient: same as Evaporation.Wellcamp.WellCamp.WellcampBase.Field.Soil.Nutrient
              CERESSoilTemperature
    Folder Gatton
      Memo
        Evaporation from a Grey Vertosol over a period of 7 months was measured using weighing lysimeters in Toowoomba, Queensland, Australia.
      Experiment Gatton
        Factors
          Factor Surface: Specification=[SurfaceOrganicMatter]
            SurfaceOrganicMatter Bare: InitialResidueName=wheat_stubble; InitialResidueType=wheatsprayed; InitialResidueMass=10; InitialStandingFraction=0; InitialCPR=0; InitialCNR=100; FractionFaecesAdded=0.5
            SurfaceOrganicMatter Mulch: InitialResidueName=wheat_stubble; InitialResidueType=wheatsprayed; InitialResidueMass=6000; InitialStandingFraction=0; InitialCPR=0; InitialCNR=40; FractionFaecesAdded=0.5
            SurfaceOrganicMatter Standing: InitialResidueName=wheat_stubble; InitialResidueType=wheatsprayed; InitialResidueMass=8500; InitialStandingFraction=0.33; InitialCPR=0; InitialCNR=40; FractionFaecesAdded=0.5
        Simulation GattonBase
          Clock: Start=2000-10-17; End=2001-06-30
          Summary SummaryFile
          Weather: FileName=Gatton.met
          SoilArbitrator
          MicroClimate: a_interception=0; b_interception=1; c_interception=0; d_interception=0; soil_albedo=0.3; SoilHeatFluxFraction=0.4; NightInterceptionFraction=0.5; ReferenceHeight=2
          Zone Field: Area=1; Slope=0; AspectAngle=0; Altitude=50
            Report: EventNames=[Clock].DoReport
              VariableNames:
                [Clock].Today
                [Soil].SoilWater.Es
                sum([Soil].SoilWater.SWmm) as TotalSW
                sum([Soil].DULmm) as DUL
                sum([Soil].LL15mm) as LL15
                [Soil].SoilWater.SW
                [SurfaceOrganicMatter].Wt
            SurfaceOrganicMatter: InitialResidueName=wheat_stubble; InitialResidueType=wheat; InitialResidueMass=10; InitialStandingFraction=0; InitialCPR=0; InitialCNR=100; FractionFaecesAdded=0.5
            Soil APS26Field: SoilType=APS26Soil; LocalName=APS26Site; Site=APS26Site; NearestTown=Unknown; Region=Lawes; NaturalVegetation=Unknown; Latitude=0; Longitude=0
              Physical
                Thickness  BD    AirDry  LL15  DUL   SAT
                150        1.38  0.1     0.2   0.38  0.44
                150        1.38  0.1     0.2   0.38  0.44
                300        1.38  0.1     0.2   0.38  0.44
                300        1.38  0.1     0.2   0.38  0.44
                300        1.46  0.1     0.21  0.38  0.43
                300        1.51  0.1     0.19  0.4   0.42
                300        1.49  0.1     0.14  0.38  0.43
                300        1.47  0.1     0.14  0.38  0.43
                300        1.47  0.1     0.19  0.33  0.43
                SoilCrop WheatSoil: LL=[0.24, 0.24, 0.22, 0.24, 0.23, 0.23, 0.18, 0.18, 0.18]; KL=[0.06, 0.045, 0.045, 0.04, 0.04, 0.06, 0.06, 0.06, 0.06]; XF=[1, 1, 1, 1, 1, 1, 1, 1, 1]
              SoilWater: SummerDate=1-Nov; SummerU=6; SummerCona=3.5; WinterDate=1-Apr; WinterU=6; WinterCona=3.5; DiffusConst=10; DiffusSlope=16; Salb=0.13; CN2Bare=78; CNRed=10; CNCov=0.8; slope=0; discharge_width=0; catchment_area=0; max_pond=0; PrecipitationInterception=0
                Thickness  SWCON  KLAT
                150        0.3    0
                150        0.3    0
                150        0.3    0
                150        0.3    0
                300        0.3    0
                300        0.3    0
                300        0.3    0
                300        0.3    0
                300        0.3    0
                300        0.3    0
              Organic: FOMCNRatio=40
                Thickness  Carbon  SoilCNRatio  FBiom  FInert  FOM
                150        2.2     14.5         0.024  0.45    118.866
                150        1.6     14.5         0.024  0.6     98.5437
                150        1.35    14.5         0.01   0.7     81.6956
                150        0.95    14.5         0.01   0.85    67.728
                300        1       14.5         0.01   0.9     46.5487
                300        0.8     14.5         0.01   0.95    31.9925
                300        0.45    14.5         0.01   0.95    21.9881
                300        0.45    14.5         0.01   0.95    15.1122
                300        0.45    14.5         0.01   0.95    10.3864
                300        0.45    14.5         0.01   0.95    7.13848
              Chemical
                Thickness  NO3N  NH4N  PH
                150        1.5   0.5   7.5
                150        1.8   0.8   8
                150        1.5   0.5   8
                150        1.5   0.5   8
                300        0.4   0.42  8
                300        0.2   0.42  8
                300        0.4   0.37  8
                300        0.3   0.25  8
                300        0.3   0.3   8
                300        0.3   0.3   8
              Sample Initial Water: Thickness=[100, 100, 100, 100, 200, 200, 200]; SW=[0.21, 0.23, 0.26, 0.26, 0.24, 0.25, 0.24]; SWUnits=Volumetric; OCUnits=Total; PHUnits=Water
              Sample Initial Nitrogen: Thickness=[150, 150, 150, 150, 300, 300, 300, 300, 300, 300]; SWUnits=Volumetric; OCUnits=Total; PHUnits=Water
              CERESSoilTemperature
              Nutrient: same as Evaporation.Wellcamp.WellCamp.WellcampBase.Field.Soil.Nutrient
              LayerStructure: Thickness=[100, 100, 100, 100, 200, 200, 200]
            Irrigation
            Operations IrrigationSchedule
              2000-10-18  [Irrigation].Apply(amount:45);
    Folder BondAndWillis
      Memo
        This dataset reproduces the evaporation experiment by [BondWillis1970] in which microlysimeters were used to measure evaporation under varying residue levels and evaporative demands within controled environments.  Note that evaporation parameters may be higher than under natural systems as evaporative conditions were maintained for 24 hours per day.  The soil type was a fine sandy loam and the residue was clean bright wheat straw cut into 1.3 cm lengths.
      Experiment BondAndWillis
        Factors
          Factor Residue: Specification=[SurfaceOrganicMatter]
            SurfaceOrganicMatter 0: InitialResidueName=wheat_stubble; InitialResidueType=wheat; InitialResidueMass=1; InitialStandingFraction=0; InitialCPR=0; InitialCNR=100; FractionFaecesAdded=0.5
            SurfaceOrganicMatter 560: InitialResidueName=wheat_stubble; InitialResidueType=wheat; InitialResidueMass=560; InitialStandingFraction=0; InitialCPR=0; InitialCNR=100; FractionFaecesAdded=0.5
            SurfaceOrganicMatter 1120: InitialResidueName=wheat_stubble; InitialResidueType=wheat; InitialResidueMass=1120; InitialStandingFraction=0; InitialCPR=0; InitialCNR=100; FractionFaecesAdded=0.5
            SurfaceOrganicMatter 2240: InitialResidueName=wheat_stubble; InitialResidueType=wheat; InitialResidueMass=2240; InitialStandingFraction=0; InitialCPR=0; InitialCNR=100; FractionFaecesAdded=0.5
            SurfaceOrganicMatter 4480: InitialResidueName=wheat_stubble; InitialResidueType=wheat; InitialResidueMass=4480; InitialStandingFraction=0; InitialCPR=0; InitialCNR=100; FractionFaecesAdded=0.5
            SurfaceOrganicMatter 8960: InitialResidueName=wheat_stubble; InitialResidueType=wheat; InitialResidueMass=8960; InitialStandingFraction=0; InitialCPR=0; InitialCNR=100; FractionFaecesAdded=0.5
            SurfaceOrganicMatter 17920: InitialResidueName=wheat_stubble; InitialResidueType=wheat; InitialResidueMass=17920; InitialStandingFraction=0; InitialCPR=0; InitialCNR=100; FractionFaecesAdded=0.5
        Simulation BondAndWillisBase
          Clock: Start=2000-01-01; End=2000-03-10
          Summary SummaryFile
          ControlledEnvironment: MaxT=20; MinT=20; Rain=0; Radn=30; PanEvap=7; VP=0; Wind=3; CO2=300; AirPressure=1010; Latitude=0; DayLength=12
          SoilArbitrator
          MicroClimate: a_interception=0; b_interception=1; c_interception=0; d_interception=0; soil_albedo=0.3; SoilHeatFluxFraction=0.4; NightInterceptionFraction=0.5; ReferenceHeight=2
          Zone Field: Area=1; Slope=0; AspectAngle=0; Altitude=50
            Report: EventNames=[Clock].DoReport
              VariableNames:
                [Clock].Today.DayOfYear
                [Soil].SoilWater.Es
                [Soil].SoilWater.Eos
                sum([Soil].SoilWater.SWmm) as TotalSW
                sum([Soil].DULmm) as DUL
                sum([Soil].LL15mm) as LL15
                [Soil].SoilWater.SW
                [SurfaceOrganicMatter].Wt
            SurfaceOrganicMatter: InitialResidueName=wheat_stubble; InitialResidueType=wheat; InitialResidueMass=10; InitialStandingFraction=0; InitialCPR=0; InitialCNR=100; FractionFaecesAdded=0.5
            Soil: SoilType=APS26Soil; LocalName=APS26Site; Site=APS26Site; NearestTown=Unknown; Region=Lawes; NaturalVegetation=Unknown; Latitude=0; Longitude=0
              Physical
                Thickness  BD    AirDry  LL15  DUL   SAT  KS
                100        1.26  0.025   0.18  0.31  0.4  100
                100        1.26  0.025   0.18  0.31  0.4  100
                100        1.26  0.08    0.18  0.31  0.4  100
                100        1.26  0.08    0.18  0.31  0.4  100
              SoilWater: SummerDate=1-Nov; SummerU=27; SummerCona=7; WinterDate=1-Apr; WinterU=9; WinterCona=5; DiffusConst=200; DiffusSlope=50; Salb=0.13; CN2Bare=0; CNRed=10; CNCov=0.8; slope=0; discharge_width=0; catchment_area=0; max_pond=0; PrecipitationInterception=0
                Thickness  SWCON  KLAT
                100        0.8    0
                100        0.8    0
                100        0.8    0
                100        0      0
              Organic: same as Evaporation.Gatton.Gatton.GattonBase.Field.APS26Field.Organic
              Chemical: same as Evaporation.Gatton.Gatton.GattonBase.Field.APS26Field.Chemical
              Sample Initial Water: Thickness=[100, 100, 100, 100]; SW=[0.31, 0.31, 0.31, 0.31]; SWUnits=Volumetric; OCUnits=Total; PHUnits=Water
              Sample Initial Nitrogen: same as Evaporation.Gatton.Gatton.GattonBase.Field.APS26Field.Initial Nitrogen
              CERESSoilTemperature
              Nutrient: same as Evaporation.Wellcamp.WellCamp.WellcampBase.Field.Soil.Nutrient
    Experiment ABlock_Residues
      Memo
        This experiment was conducted in Plant and Food Researches A Block field near Lincoln, New Zealand.  A uniformly managed, unirrigated barley crop was grown and harvested prior to the estastablishment of this experiment.  A randomised complete block was layed out with 5 x 15 m plots laid out to avoid harvester wheel tracks with 4 replicates of 4 treatments:

         - <b>StandingStubble</b> where the stubble that was left by the combine harvester remained standing and any residue that
         - <b>HarvesterWindrow</b> where the residue mown from the other two treatments was piled ontop of the standing stubble to simulate a harvester windrow with the residue from approximately 2 times the area applied
         - <b>MownStubble</b> where stubble was mown at 5cm height and removed from the plots
         - <b>BareSoil</b> where stubble was mown and removed and then plots were ploughed and cultivated to leave a bare soil.

        Following the establishment of treatments CS616 soil moisture sensors were installed in each plot at 0-20, 20-40 and 40-60 cm depth and logged at 1 hourly intervals from establishment in Autumn through until the following spring.
      Factors
        Factor Cover: Specification=[SurfaceOrganicMatter]
          SurfaceOrganicMatter StandingStubble: InitialResidueName=Barley; InitialResidueType=Barley; InitialResidueMass=2026; InitialStandingFraction=1; InitialCPR=0; InitialCNR=80; FractionFaecesAdded=0.5
          SurfaceOrganicMatter HarvesterWindrow: InitialResidueName=Barley; InitialResidueType=Barley; InitialResidueMass=8300; InitialStandingFraction=0; InitialCPR=0; InitialCNR=80; FractionFaecesAdded=0.5
          SurfaceOrganicMatter MownStubble: InitialResidueName=Barley; InitialResidueType=Barley; InitialResidueMass=400; InitialStandingFraction=1; InitialCPR=0; InitialCNR=80; FractionFaecesAdded=0.5
          SurfaceOrganicMatter BareSoil: InitialResidueName=Barley; InitialResidueType=Barley; InitialResidueMass=0; InitialStandingFraction=1; InitialCPR=0; InitialCNR=80; FractionFaecesAdded=0.5
      Simulation Base
        Weather: FileName=..\..\WeatherFiles\lincoln.met
        Clock: Start=2010-02-25; End=2010-08-11
        Summary
        Zone Field: Area=1; Slope=0; AspectAngle=0; Altitude=50
          Soil: SoilType=Sedementary; LocalName=Lincoln; Latitude=0; Longitude=0
            Physical
              Thickness  BD    AirDry  LL15   DUL   SAT    KS
              200        1.3   0.06    0.08   0.27  0.31   999
              200        1.3   0.124   0.124  0.25  0.358  300
              200        1.3   0.106   0.106  0.27  0.4    100
              200        1.52  0.07    0.07   0.2   0.314  90
              200        1.52  0.07    0.07   0.2   0.314  90
              200        1.52  0.165   0.165  0.3   0.358  90
              200        1.65  0.157   0.157  0.29  0.35   90
              200        1.65  0.125   0.125  0.25  0.318  90
              200        1.65  0.125   0.125  0.25  0.318  90
              200        1.65  0.125   0.125  0.25  0.318  90
              200        1.65  0.125   0.125  0.25  0.318  90
              200        1.65  0.125   0.125  0.25  0.318  90
              200        1.65  0.125   0.125  0.25  0.318  90
              200        1.65  0.125   0.125  0.25  0.318  90
              200        1.6   0.125   0.125  0.25  0.318  90
            SoilWater: SummerDate=1-Nov; SummerU=9; SummerCona=4.4; WinterDate=1-Apr; WinterU=9; WinterCona=4.4; DiffusConst=88; DiffusSlope=35; Salb=0.13; CN2Bare=73; CNRed=20; CNCov=0.8; slope=0; discharge_width=0; catchment_area=0; max_pond=0; PrecipitationInterception=0
              Thickness  SWCON  KLAT
              200        0.3    0
              200        0.6    0
              200        0.6    0
              200        0.6    0
              200        0.95   0
              200        0.95   0
              200        0.95   0
              200        0.95   0
              200        0.95   0
              200        0.95   0
              200        0.95   0
              200        0.95   0
              200        0.95   0
              200        0.95   0
              200        0.95   0
            Organic: FOMCNRatio=40
              Thickness  Carbon  SoilCNRatio  FBiom  FInert  FOM
              200        2.63    11           0.03   0.4     190.767
              200        1.25    11           0.02   0.7     156.187
              200        0.32    11           0.01   0.8     127.875
              200        0.21    11           0.01   0.9     104.695
              200        0.2     11           0.01   1       85.7171
              200        0.2     11           0.01   1       70.1792
              200        0.2     11           0.01   1       57.4579
              200        0.2     11           0.01   1       47.0426
              200        0.2     11           0.01   1       38.5152
              200        0.2     11           0.01   1       31.5336
              200        0.2     11           0.01   1       25.8175
              200        0.2     11           0.01   1       21.1376
              200        0.2     11           0.01   1       17.306
              200        0.2     11           0.01   1       14.1689
              200        0.2     11           0.01   1       11.6006
            Chemical
              Thickness  NO3N     NH4N  PH
              200        44.4445  0.1   6
              200        29.6296  0.1   6
              200        22.2222  0.1   6
              200        11.1111  0.1   6
              200        11.1111  0.1   6
              200        0        0.1   6
              200        0        0.1   6
              200        0        0.1   6
              200        0.1      0.1   6
              200        0.1      0.1   6
              200        0.1      0.1   6
              200        0.1      0.1   6
              200        0.1      0.1   6
              200        0.1      0.1   6
              200        0.1      0.1   6
            Sample InitialN: SWUnits=Volumetric; OCUnits=Total; PHUnits=Water
              Thickness=[200, 200, 200, 200, 200, 200, 200, 200, 200, 200, 200, 200, 200, 200, 200]
              SW=[0.253, 0.175, 0.15, 0.1, 0.13, 0.25, 0.29, 0.25, 0.25, 0.25, 0.25, 0.25, 0.25, 0.25, 0.25]
            CERESSoilTemperature
            Nutrient: same as Evaporation.Wellcamp.WellCamp.WellcampBase.Field.Soil.Nutrient
          Irrigation
          Fertiliser
          SurfaceOrganicMatter: InitialResidueName=Barley; InitialResidueType=Barley; InitialResidueMass=2026; InitialStandingFraction=1; InitialCPR=0; InitialCNR=80; FractionFaecesAdded=0.5
          MicroClimate: a_interception=0; b_interception=1; c_interception=0; d_interception=0; soil_albedo=0.3; SoilHeatFluxFraction=0.4; NightInterceptionFraction=0.5; ReferenceHeight=2
          Operations
            2010-03-05  [Irrigation].Apply(26.6);
            2010-03-08  [Irrigation].Apply(30.4);
            2010-03-09  [Irrigation].Apply(100);
            2010-03-12  [Irrigation].Apply(10);
          Manager ResiduePrecipitationInterception (disabled)
```csharp
using System;
using Models.Core;
using System.Collections.Generic;
using System.Text;
using Models.Soils;
using Models;
using System.Xml.Serialization;
using APSIM.Shared.Utilities;

namespace Models
{
    [Serializable] 
    public class Script : Model
    {
        [Link] Clock Clock;
        [Link] Soils.Soil Soil;
        [Link] Models.Surface.SurfaceOrganicMatter SOM;
        [Link] Weather Met;
        [Link] Irrigation Irrig;
               
        [XmlIgnore] public bool InitialDay { get; set; }

        [XmlIgnore] public double Precip { get; set; }
        [XmlIgnore] public double Maximum_interception { get; set; }
        [XmlIgnore] public double Residue_water { get; set; }
        [XmlIgnore] public double Interception_today { get; set; }
        [XmlIgnore] public double Evaporated_interception { get; set; }
        [XmlIgnore] public double SWC60 { get; set; }

        [EventSubscribe("Initialised")]
        private void OnInitialised(object sender, EventArgs e)
        {
            Precip = 0;
            Maximum_interception = 0;
            Residue_water = 0;
            Interception_today = 0;
            Evaporated_interception = 0;
            SWC60 = 0;
        }

        [EventSubscribe("DoManagementCalculations")]
        private void OnDoManagementCalculations(object sender, EventArgs e)
        {
//calculate the amount of water that is going to evaporate from the residue water pool

            if (Residue_water > Soil.SoilWater.Eo)
                Evaporated_interception = Soil.SoilWater.Eo;
            else
                Evaporated_interception = Residue_water;

            SWC60 = Soil.SoilWater.SWmm[0] + Soil.SoilWater.SWmm[1] + Soil.SoilWater.SWmm[2];

// remove evaporation from residue water pool               

            Residue_water = Residue_water - Evaporated_interception;
        }

        [EventSubscribe("DoManagement")]
        private void OnDoManagement(object sender, EventArgs e)
        {
//Set interception variables
            Precip = Met.Rain + Irrig.IrrigationApplied; 
            Maximum_interception = 0.0002 * SOM.Wt;
          
//Determine the amount of water intercepted by residue today
            if ((Precip * SOM.Cover) >= (Maximum_interception - Residue_water))
                Interception_today = (Maximum_interception - Residue_water);
            else
                Interception_today = (Precip * SOM.Cover);

// Send message to soil module to take interception out of water balance
    
            Soil.SoilWater.ResidueInterception = Interception_today;
            
//Add intercepted water into residual water pool

            Residue_water = Residue_water + Interception_today;



            

        }
    }
}
```
          Report ProfileWater
            VariableNames:
              [Clock].Today
              sum([Soil].SoilWater.SWmm[1:3] as ProfileWater
              Diff of sum([Soil].SoilWater.SWmm[1:3]) from 25-Feb to 11-Aug as ProfileWaterChange
            EventNames:
              [Clock].DoReport
          Report
  Folder Drainage
    Folder Libardi
      Memo
        Data used here were collected during an internal drainage experiment[Libardi2001], carried out on a sandy–loam Red Yellow Latosol (Typic Hapludox) near Piracicaba, SP, Brazil.  The soil had a fairly homogeneous
        profile down to the depth of 2 m. Soil water content values were calculated from tensiometer
        readings, through the use of laboratory established soil water retention curves and of soil water potential
        heads, measured with the same mercury manometer tensiometers.
      Experiment Libardi
        Factors: same as Evaporation.Wellcamp.WellCamp.Factors
        Simulation LibardiBase
          Clock: Start=1988-01-01; End=1988-01-30
          Summary SummaryFile
          Weather: FileName=dummy.met
          SoilArbitrator
          MicroClimate: a_interception=0; b_interception=1; c_interception=0; d_interception=0; soil_albedo=0.3; SoilHeatFluxFraction=0.4; NightInterceptionFraction=0.5; ReferenceHeight=2
          Zone Field: Area=1; Slope=0; AspectAngle=0; Altitude=50
            Report: EventNames=[Clock].DoReport
              VariableNames:
                [Clock].Today
                [Soil].SoilWater.Es
                [Soil].SoilWater.Drainage
                sum([Soil].SoilWater.SWmm) as TotalSW
                sum([Soil].DULmm) as DUL
                sum([Soil].LL15mm) as LL15
                [Soil].SoilWater.SW
            Soil: ASCOrder=Vertosol; SoilType=Clay; LocalName=Moola Grey Clay; Latitude=-27.581836; Longitude=151.320206
              Physical
                Thickness  BD  AirDry  LL15  DUL    SAT
                150        1   0.05    0.1   0.19   0.43
                150        1   0.05    0.1   0.243  0.457
                150        1   0.05    0.1   0.226  0.472
                150        1   0.05    0.1   0.227  0.491
                150        1   0.05    0.1   0.19   0.491
                150        1   0.05    0.1   0.201  0.487
                150        1   0.05    0.1   0.211  0.468
                150        1   0.05    0.1   0.207  0.472
                150        1   0.05    0.1   0.208  0.483
              Organic: same as Evaporation.TorStreet.TorStreet.TorStreetBase.Field.Soil.Organic
              SoilWater: SummerDate=1-Nov; SummerU=9; SummerCona=5; WinterDate=1-Apr; WinterU=9; WinterCona=5; DiffusConst=40; DiffusSlope=16; Salb=0.13; CN2Bare=50; CNRed=20; CNCov=0.8; max_pond=0; Thickness=[150, 150, 300, 300, 300, 300]; SWCON=[0.8, 0.8, 0.8, 0.8, 0.8, 0.8]; PrecipitationInterception=0
              Chemical
                Thickness  NO3N   NH4N      PH
                50         6.503  0.599004  7
                50         6.503  0.599004  7
                50         6.503  0.599004  7
                50         2.101  0.100001  7
                50         2.101  0.100001  7
                50         2.101  0.100001  7
                50         2.101  0.100001  7
              CERESSoilTemperature
              Nutrient: same as Evaporation.Wellcamp.WellCamp.WellcampBase.Field.Soil.Nutrient
              Sample Initial nitrogen: Thickness=[150, 150, 150, 150, 150, 150, 150, 150, 150]; SWUnits=Volumetric; OCUnits=Total; PHUnits=Water
                SW=[0.43, 0.457, 0.472, 0.491, 0.491, 0.487, 0.468, 0.472, 0.483]
            SurfaceOrganicMatter: InitialResidueName=wheat_stubble; InitialResidueType=wheat; InitialResidueMass=10; InitialStandingFraction=0; InitialCPR=0; InitialCNR=100; FractionFaecesAdded=0.5
  Folder WaterExtraction
    Experiment Lincoln2015
      Memo Experimental description
        ### Lincoln2015 (Rain-Shelter Trail)

        This dataset demonstrates the impact of three N (0, 50 and 250 kg/ha N) and two water regimes (dryland and fully irrigated) using a rain-shelter structure at Lincoln, New Zealand.  A crop of 'Discovery' wheat was sown in October and managed as a typical spring wheat crop.  Soil water content was measured with CS650 soil moisture probes positioned at 7 depths in each plot (192 probes in total) and logged at 15 min intervals for the duration of the experiment.  Total cover was measured using linear PAR sensors in each plot logged for the duration of the experiment and green cover was measured ever 3-4 days with NDVI and interpolated to daily values.
        Slurp is used to represent the crop in this test so it can focus on soil water and not be blured by the performance of the crop model.  To do this observed values for green and total cover, LAI, and Height were set in Slurp each day using a manager script.
      Factors
        Permutation
          Factor Nit
            CompositeFactor 0
              Specifications:
                [StateFactors].Script.Nit = 0
                [SetCropCanopy].Script.Nit = 0
                [Fert]
              Operations 0
                2015-10-09  [Irrigation].Apply(5);
                2015-11-01  [Irrigation].Apply(5);
                2015-11-01  [Fertiliser].Apply(35, Fertiliser.Types.UreaN, 20);
                2015-11-19  [Irrigation].Apply(30);
                Memo
                  Uniques fertigation event
            CompositeFactor 50
              Specifications:
                [StateFactors].Script.Nit = 50
                [SetCropCanopy].Script.Nit = 50
                [Fert]
              Operations 50
                2015-10-09  [Fertiliser].Apply(0, Fertiliser.Types.UreaN, 20);
                2015-10-09  [Irrigation].Apply(5);
                2015-11-01  [Fertiliser].Apply(35, Fertiliser.Types.UreaN, 20);
                2015-11-01  [Irrigation].Apply(5);
                2015-11-19  [Fertiliser].Apply(25, Fertiliser.Types.UreaN, 20);
                2015-11-19  [Irrigation].Apply(30);
            CompositeFactor 250
              Specifications:
                [StateFactors].Script.Nit = 250
                [SetCropCanopy].Script.Nit = 250
                [Fert]
              Operations 250
                2015-10-09  [Fertiliser].Apply(50, Fertiliser.Types.UreaN, 20);
                2015-10-09  [Irrigation].Apply(5);
                2015-11-01  [Fertiliser].Apply(100, Fertiliser.Types.UreaN, 20);
                2015-11-01  [Irrigation].Apply(5);
                2015-11-19  [Fertiliser].Apply(100, Fertiliser.Types.UreaN, 20);
                2015-11-19  [Irrigation].Apply(30);
          Factor Irr
            CompositeFactor Full
              Specifications:
                [Irrig]
                [StateFactors].Script.Irr = Full
                [SetCropCanopy].Script.Irr = Full
              Operations Full
                2015-09-30  [Irrigation].Apply(10);
                2015-10-01  [Irrigation].Apply(5);
                2015-10-09  [Irrigation].Apply(10);
                2015-10-16  [Irrigation].Apply(15);
                2015-10-22  [Irrigation].Apply(15);
                2015-10-30  [Irrigation].Apply(30);
                2015-11-06  [Irrigation].Apply(12.2);
                2015-11-12  [Irrigation].Apply(13);
                2015-11-12  [Irrigation].Apply(13);
                2015-11-26  [Irrigation].Apply(39);
                2015-12-03  [Irrigation].Apply(40);
                2015-12-24  [Irrigation].Apply(35);
                2015-12-31  [Irrigation].Apply(30);
                2016-01-07  [Irrigation].Apply(30);
            CompositeFactor Nil
              Specifications:
                [Irrig]
                [StateFactors].Script.Irr = Nil
                [SetCropCanopy].Script.Irr = Nil
              Operations Nil
                2015-09-30  [Irrigation].Apply(10);
                2015-10-01  [Irrigation].Apply(5);
                2015-10-09  [Irrigation].Apply(10);
                2015-12-24  [Irrigation].Apply(25);
                2016-02-03  [Irrigation].Apply(30);
                2016-02-04  [Irrigation].Apply(40);
              Memo
                Have added an extra irrigation, on 3 Nov,

                Data indcates water applied but no notes of it RFZ
      Simulation Lincoln2015
        Weather: FileName=%root%\Tests\WeatherFiles\lincoln.met
        Clock: Start=2015-09-07; End=2016-02-15
        Summary summaryfile
        SoilArbitrator Soil Arbitrator
        Zone RainShelter: Area=1; Slope=0; AspectAngle=0; Altitude=50
          Soil TempletonSiltLoam: SoilType=NZ_sedementary; Region=Plains; State=Canterbury; Country=New Zealand; Latitude=0; Longitude=0
            DataSource=Generic profile descriptions provided by Trevor Webb and data for functional horizions based on SWAMP project results
            Comments=Bulk density values were measured on the fine earth fraction so values entered into apsim soil are adjusted down to account for stone content (assuming stones are inert from all soil process so their mass and volume is removed from model paramaters).  SAT, DUL, LL15 and Air dry have been adjusted down to account for stone content.  OC has not been adjusted so the model will get the correct carbon and N amounts using the adjusted BD.
            Chemical
              Thickness  NO3N     NH4N      PH
              180        8.38     0.12      6
              150        0.744    0.096     6
              400        2.68775  0.06175   6
              270        2.70704  1.33815   6
              500        2.136    1.568     6
              -3300      1.36182  0.365455  6
            SoilWater: SummerDate=1-oct; SummerU=6; SummerCona=3; WinterDate=1-Apr; WinterU=2; WinterCona=3; DiffusConst=0; DiffusSlope=0; Salb=0.13; CN2Bare=77; CNRed=0; CNCov=0.8; max_pond=0; Thickness=[200, 200, 200, 200, 200, 200, 200, 200, 200]; SWCON=[0.5, 0.5, 0.5, 0.5, 0.5, 0.5, 0.5, 0.5, 0.5]; PrecipitationInterception=0
            Organic: FOMCNRatio=20
              Thickness  Carbon    SoilCNRatio  FBiom      FInert    FOM
              180        3         11           0.03       0.5       731.975
              150        0.9       11           0.02       0.7       584.494
              400        0.316004  11           0.0116634  0.85      320.777
              270        0.207954  11           0.0102229  0.94496   213.951
              500        0.200366  11           0.0100221  0.982659  101.063
              500        0.2       11           0.01       0.93      47.7389
            Sample: Thickness=[150, 150, 300, 300, 300, 300, 300]; SW=[0.18, 0.18, 0.26, 0.26, 0.23, 0.28, 0.29]; SWUnits=Volumetric; OCUnits=Total; PHUnits=Water
              Memo
                Using the retest sample values.
            Physical
              Thickness  BD   AirDry  LL15   DUL   SAT
              150        1    0.05    0.006  0.28  0.42
              150        1.1  0.1     0.1    0.28  0.42
              300        1.4  0.17    0.17   0.28  0.42
              300        1.3  0.17    0.17   0.28  0.42
              300        1.4  0.16    0.16   0.28  0.42
              300        1.4  0.16    0.16   0.28  0.42
              300        1.4  0.16    0.16   0.28  0.42
              SoilCrop SlurpSoil: LL=[0.12, 0.1, 0.17, 0.17, 0.23, 0.23, 0.23]; KL=[0.06, 0.06, 0.04, 0.04, 0.03, 0.005, 0]; XF=[1, 0.4, 1, 1, 1, 1, 1]
            CERESSoilTemperature
            Nutrient: same as Evaporation.Wellcamp.WellCamp.WellcampBase.Field.Soil.Nutrient
          MicroClimate: a_interception=0; b_interception=1; c_interception=0; d_interception=0; soil_albedo=0.23; SoilHeatFluxFraction=0.4; NightInterceptionFraction=0.5; ReferenceHeight=2
          Irrigation
          Fertiliser
          SurfaceOrganicMatter: InitialResidueName=wheat; InitialResidueType=wheat; InitialResidueMass=0; InitialStandingFraction=0; InitialCPR=0; InitialCNR=80; FractionFaecesAdded=0.5
          Plant Slurp: CropType=Slurp; IsEnding=false; DaysAfterEnding=0
          Operations Irrig
          Operations Fert
          Operations Sow
            2015-09-10  [Slurp].Sow(population:200, cultivar:"StaticCrop", depth:2, rowSpacing:130);
          Manager ClimateControl
            StartDate = 2015-10-01
            EndDate = 2016-02-28
```csharp
using System;
using Models.Core;
using APSIM.Shared.Utilities;



using System.Collections.Generic;
using System.Text;
using Models.PMF;
using Models;
using System.Xml.Serialization;

namespace Models
{
    [Serializable] 
    [System.Xml.Serialization.XmlInclude(typeof(Model))]
    public class Script : Model
    {
        [Link] Weather Met;
        [Link] Clock Clock;
    
        [Description("Start Date")]
        public DateTime StartDate { get; set; }
        
        [Description("End Date")]
        public DateTime EndDate { get; set; }
 
    
        [EventSubscribe("PreparingNewWeatherData")]
        private void OnPreparingNewWeatherData(object sender, EventArgs e)
        {
            if ((Clock.Today.Date >= StartDate) && (Clock.Today.Date <= EndDate))
                Met.Rain = 0;        
        }
    }
}
```
          Manager StateFactors
            Irr =
            Nit = 0
```csharp
using System;
using Models.Core;
using System.Collections.Generic;
using System.Text;
using Models.Soils;
using Models.Soils.Nutrients;
using Models.PMF;
using Models;
using System.Xml.Serialization;
using APSIM.Shared.Utilities;

namespace Models
{
    [Serializable] 
    public class Script : Model
    {
        [Link] Clock Clock;
        [Link] Irrigation Irrigation;
        [Link] Soil ThisSoil;
        [Link] Zone MyZone;
        public string Irr { get; set; }
        public double Nit { get; set; }
        
          
        private void SetSoilLayers()
        {
        
            int i = 0;
            if ((Irr == "Nil") && (Nit == 0))
            {
                if (ThisSoil.Thickness.Length != 7)
                {
                    throw new Exception("Soil layer exception");
                }
                ThisSoil.DUL[0] = 0.31;
                ThisSoil.DUL[1] = 0.34;
                ThisSoil.DUL[2] = 0.32;
                ThisSoil.DUL[3] = 0.23;
                ThisSoil.DUL[4] = 0.29;
                ThisSoil.DUL[5] = 0.29;
                ThisSoil.DUL[6] = 0.29;
                
                double[] nSW = { 0.18, 0.18, 0.26, 0.23, 0.29, 0.29, 0.27 };
                ThisSoil.SoilWater.Reset();
                ThisSoil.SoilWater.SW = nSW; 
            }   
            if ((Irr == "Nil") && (Nit == 50))
            {
                if (ThisSoil.Thickness.Length != 7)
                {
                    throw new Exception("Soil layer exception");
                }
                ThisSoil.DUL[0] = 0.30;
                ThisSoil.DUL[1] = 0.31;
                ThisSoil.DUL[2] = 0.29;
                ThisSoil.DUL[3] = 0.30;
                ThisSoil.DUL[4] = 0.31;
                ThisSoil.DUL[5] = 0.34;
                ThisSoil.DUL[6] = 0.30;
                
                double[] nSW = { 0.18, 0.18, 0.30, 0.25, 0.29, 0.34, 0.30 };
                ThisSoil.SoilWater.Reset();
                ThisSoil.SoilWater.SW = nSW; 
            }   
            if ((Irr == "Nil") && (Nit == 250))
            {
                if (ThisSoil.Thickness.Length != 7)
                {
                    throw new Exception("Soil layer exception");
                }
                ThisSoil.DUL[0] = 0.28;
                ThisSoil.DUL[1] = 0.24;
                ThisSoil.DUL[2] = 0.30;
                ThisSoil.DUL[3] = 0.27;
                ThisSoil.DUL[4] = 0.28;
                ThisSoil.DUL[5] = 0.36;
                ThisSoil.DUL[6] = 0.27;
                
                double[] nSW = { 0.18, 0.18, 0.3, 0.27, 0.28, 0.35, 0.27 };
                ThisSoil.SoilWater.Reset();
                ThisSoil.SoilWater.SW = nSW; 
            }   
            if ((Irr == "Full") && (Nit == 0))
            {
                if (ThisSoil.Thickness.Length != 7)
                {
                    throw new Exception("Soil layer exception");
                }
                ThisSoil.DUL[0] = 0.31;
                ThisSoil.DUL[1] = 0.34;
                ThisSoil.DUL[2] = 0.32;
                ThisSoil.DUL[3] = 0.23;
                ThisSoil.DUL[4] = 0.30;
                ThisSoil.DUL[5] = 0.33;
                ThisSoil.DUL[6] = 0.25;
                
                double[] nSW = { 0.18, 0.18, 0.26, 0.20, 0.30, 0.33, 0.25 };
                ThisSoil.SoilWater.Reset();
                ThisSoil.SoilWater.SW = nSW; 
            }   
            if ((Irr == "Full") && (Nit == 50))
            {
                if (ThisSoil.Thickness.Length != 7)
                {
                    throw new Exception("Soil layer exception");
                }
                ThisSoil.DUL[0] = 0.31;
                ThisSoil.DUL[1] = 0.28;
                ThisSoil.DUL[2] = 0.30;
                ThisSoil.DUL[3] = 0.29;
                ThisSoil.DUL[4] = 0.31;
                ThisSoil.DUL[5] = 0.33;
                ThisSoil.DUL[6] = 0.30;

                double[] nSW = { 0.18, 0.18, 0.28, 0.27, 0.28, 0.33, 0.30 };
                
                ThisSoil.SoilWater.Reset();
                
                ThisSoil.SoilWater.SW = nSW; 

            }
            if ((Irr == "Full") && (Nit == 250))
            {
                if (ThisSoil.Thickness.Length != 7)
                {
                    throw new Exception("Soil layer exception");
                }
                ThisSoil.DUL[0] = 0.26;
                ThisSoil.DUL[1] = 0.24;
                ThisSoil.DUL[2] = 0.26;
                ThisSoil.DUL[3] = 0.23;
                ThisSoil.DUL[4] = 0.27;
                ThisSoil.DUL[5] = 0.35;
                ThisSoil.DUL[6] = 0.22;
                
                double[] nSW = { 0.18, 0.18, 0.24, 0.23, 0.27, 0.35, 0.22 };
                ThisSoil.SoilWater.Reset();
                ThisSoil.SoilWater.SW = nSW; 
            }
        }

        [EventSubscribe("Commencing")]
        private void OnSimulationCommencing(object sender, EventArgs e)
        {
            SetSoilLayers();
        }
        
        [EventSubscribe("DoManagement")]
        private void OnDoManagement(object sender, EventArgs e)
        {
            //Specify irrigations that were only applied to some of the N treatments
            if (Irr == "Full")
            {
                if (Nit == 250)
                {
                    if ((DateUtilities.CompareDates("10-Dec", Clock.Today) == 0))
                        Irrigation.Apply(40);
                    if ((DateUtilities.CompareDates("17-Dec", Clock.Today) == 0))
                        Irrigation.Apply(39.7);
                    if ((DateUtilities.CompareDates("14-Jan", Clock.Today) == 0))
                        Irrigation.Apply(30);
                    if ((DateUtilities.CompareDates("21-Jan", Clock.Today) == 0))
                        Irrigation.Apply(20.1);
                }
                if (Nit == 50)
                {
                    if ((DateUtilities.CompareDates("10-Dec", Clock.Today) == 0))
                        Irrigation.Apply(40);
                    if ((DateUtilities.CompareDates("14-Jan", Clock.Today) == 0))
                        Irrigation.Apply(30);
                }
            }
            
        }
    }
}
```
          Manager SetCropCanopy
            CoverGreenFile = %root%\Tests\Validation\SoilWater\ObservedCovers\Lincoln2015_CoverGreen.csv
            CoverTotalFile = %root%\Tests\Validation\SoilWater\ObservedCovers\Lincoln2015_CoverTotal.csv
            Ext_coef = 0.8
            MaximumHeight = 600
            PotRootExtension = 30
            Nit =
            Irr =
            Treatment =
            leaflai = 0
            leaflaidead = 0
```csharp
using System;
using Models.Core;
using System.Collections.Generic;
using System.Text;
using Models.PMF;
using Models;
using System.Xml.Serialization;
using APSIM.Shared.Utilities;
using System.Data;

namespace Models
{
    [Serializable] 
    //[System.Xml.Serialization.XmlInclude(typeof(Model))]
    public class Script : Model
    {
        [Link] Clock Clock;
        [Link] Zone zone;
        [Link] Simulation Simulation;

        
        [Description("File of Observed Green Covers")]
        public string CoverGreenFile { get; set; }
        [Description("File of Observed Total Covers")]
        public string CoverTotalFile { get; set; }
        [Description("Extinction coefficient")]
        public  double Ext_coef { get; set; }
        [Description("Maximum height of the crop at full cover")]
        public double MaximumHeight { get; set; }
        [Description("Potential Root extension rate (mm)")]
        public double PotRootExtension {get; set;}
        
        [XmlIgnore] private DataTable CoverGreens { get; set; }
        [XmlIgnore] private DataTable CoverTotals { get; set; }

        public string Nit { get; set; }
        public string Irr { get; set; }
        public string Treatment { get; set; }
        
        private double CoverGreenRead { get; set; }
        private double CoverTotalRead { get; set; }
        public double leaflai { get; private set; }
        public double leaflaidead { get; private set; }
                
        [EventSubscribe("StartOfSimulation")]
        private void OnStartOfSimulation(object sender, EventArgs e)
        {
            
            Treatment = "Nit" + Nit + "Irr" + Irr;
            
            string fullFileNameGreen = PathUtilities.GetAbsolutePath(CoverGreenFile, Simulation.FileName);
            
            ApsimTextFile GreentextFile = new ApsimTextFile();
            GreentextFile.Open(fullFileNameGreen);
            CoverGreens = GreentextFile.ToTable();
            GreentextFile.Close();

            string fullFileNameTotal = PathUtilities.GetAbsolutePath(CoverTotalFile, Simulation.FileName);
            
            ApsimTextFile textFileTotal = new ApsimTextFile();
            textFileTotal.Open(fullFileNameTotal);
            CoverTotals = textFileTotal.ToTable();
            textFileTotal.Close();
        }

        [EventSubscribe("Sowing")]
        private void OnSowing(object sender, EventArgs e)
        {
            object LAIResetValue = 0;
            zone.Set("Slurp.Leaf.Area.FixedValue", LAIResetValue);  
            object HeightResetValue = 0;
            zone.Set("Slurp.Leaf.Tallness.FixedValue", HeightResetValue);
            object PotRootExtSet = PotRootExtension;
            zone.Set("Slurp.Root.RootFrontVelocity.Potential.FixedValue", PotRootExtSet);
            object LAIDeadResetValue = 0;
            zone.Set("Slurp.Leaf.LaiDead.FixedValue", LAIDeadResetValue);
            object kDead = Ext_coef;
            zone.Set("Slurp.Leaf.KDead", kDead);
            object GSmax = 0.011;
            zone.Set("Slurp.Leaf.Gsmax350",GSmax);
            object r50 = 150;
            zone.Set("Slurp.Leaf.R50",r50);
            object albedo = 0.25;
            zone.Set("Slurp.Leaf.Albedo",albedo);
        }
        
        [EventSubscribe("StartOfDay")]
        private void OnStartOfDay(object sender, EventArgs e)
        {
            foreach (DataRow row in CoverGreens.Rows)
            {
                DateTime TodayDate = Convert.ToDateTime(row["Date"]);
                if (TodayDate.Date == Clock.Today.Date)
                {
                    CoverGreenRead = Convert.ToDouble(row[Treatment]);
                }
            }

            foreach (DataRow row in CoverTotals.Rows)
            {
                DateTime TodayDate = Convert.ToDateTime(row["Date"]);
                if (TodayDate.Date == Clock.Today.Date)
                {
                    CoverTotalRead = Convert.ToDouble(row[Treatment]);
                }
            }
        
            if ((bool)zone.Get("Slurp.IsAlive") == true)
            {
                //Only assign cover valuse if crop is emerged
                
                if (CoverGreenRead == 1)
                    leaflai = Math.Log(0.01) / -Ext_coef;
                else
                {
                    if (CoverGreenRead > 0)
                        leaflai = Math.Log(1 - CoverGreenRead) / -Ext_coef;
                    else
                        leaflai = 0;
                }

                double CoverDead = CoverTotalRead - CoverGreenRead;
                if (CoverDead == 1)
                    leaflaidead = Math.Log(0.01) / -Ext_coef;
                else
                {
                    if (CoverDead > 0)
                        leaflaidead = Math.Log(1 - CoverDead) / -Ext_coef;
                    else
                        leaflaidead = 0;
                }
                //Summary.WriteMessage(this, "LAI " + leaflai);
                object LAIResetValue = leaflai;
                zone.Set("Slurp.Leaf.Area.FixedValue", LAIResetValue);  
                object HeightResetValue = CoverTotalRead * MaximumHeight;
                zone.Set("Slurp.Leaf.Tallness.FixedValue", HeightResetValue);  
                object LAIDeadResetValue = leaflaidead;
                zone.Set("Slurp.Leaf.LaiDead.FixedValue",LAIDeadResetValue);
            }
        }
    }
}
```
          Manager HarvestOnly
```csharp
using System;
using Models.Core;
using System.Collections.Generic;
using System.Text;
using Models.Soils;
using Models.Soils.Nutrients;
using Models.PMF;
using Models;
using System.Xml.Serialization;
using APSIM.Shared.Utilities;

namespace Models
{
    [Serializable] 
    public class Script : Model
    {
        [Link] Plant Wheat;

        [XmlIgnore] private RemovalFractions Remove { get; set; }
        [XmlIgnore] private bool Harvested {get; set;}
                
        [EventSubscribe("Commencing")]
        private void OnSimulationCommencing(object sender, EventArgs e)
        {
        Remove = new RemovalFractions();
        Harvested = false;
        }

        [EventSubscribe("DoManagement")]
        private void OnDoManagement(object sender, EventArgs e)
        {
            if ((Wheat.Phenology.CurrentPhaseName == "Ripening") & (Harvested == false))
            {
                Remove.SetFractionToRemove("Leaf", 0.0,"Live");
                Remove.SetFractionToResidue("Leaf", 0.0,"Live");
                Remove.SetFractionToRemove("Leaf", 0.0,"Dead");
                Remove.SetFractionToResidue("Leaf", 0.0,"Dead");
                Remove.SetFractionToRemove("Grain", 0.0);
                Remove.SetFractionToResidue("Grain", 0.0);
                Remove.SetFractionToRemove("Stem", 0.0);
                Remove.SetFractionToResidue("Stem", 0.0);
                Remove.SetFractionToRemove("Spike", 0.0);
                Remove.SetFractionToResidue("Spike", 0.0);
                Remove.SetFractionToRemove("Root", 0.0);
                Remove.SetFractionToResidue("Root", 0.0);
                Wheat.Harvest(Remove);
                Harvested = true;
            }
        }
    }
}
```
          Report
          Report ProfileWater
            VariableNames:
              [Clock].Today
              sum([Soil].SoilWater.SWmm as ProfileWater
              Diff of sum([Soil].SoilWater.SWmm) from 14-Oct to 15-Feb as ProfileWaterChange
            EventNames:
              [Clock].DoReport
      Folder SoilWaterLayers
    Experiment LandP
      Memo
        This experiment was run over 3 years in Lincoln, New Zealand on a shallow stony soil.  Treatments of Lucerne and Pasture (Ryegrass) were established in the Autumn of 2011 and irrigtion treatments were installed in the spring of 2011 and applied for three years.  Treatments were:

         - None where no irrigation was applied
         - TwoPerWeek where irrigation was applied twice per week during spring/summer/autumn to replace water use measured by neutron probe
         - OnePerWeek where the same amout of irrigation was applied as the above treatment but at weekly frequency (i.e fewer, larger irrigations)
         - ThreeWeekly where the same amount of irrigation was applied as abouve but at a 3 weekely frequency (i.e fewer, larger irrigations)

        Lucerne and pasture were defoliated at differing frequiencies following best mananagment practice resulting in 8-10 regrowth period per year for pasture and 5-6 for lucerne.  Neutron probes were installed to 1.6 m depth using a 20T digger with a pnumatic plate on its boom to drive and extract a pilot rod into the stony sub soil and then an aluminum access tube was installed into the resultant hole.  Neutron probes measurements were tatken at 7 - 10 day intervals during the irrigation season.  CS616 probes were also installed in the top soil at 0-15 and 15-30 cm depths in each plot and logged hourly.
        Slurp is used to represent the crop in this test so it can focus on soil water and not be blured by the performance of the crop model.  To do this observed values for green cover, LAI, and Height were set in Slurp each day using a manager script.
      Factors
        Permutation
          Factor Irrigation
            CompositeFactor TwoPerWeek
              Specifications:
                [IrrigationEvents]
                [SetCropVariables].Script.Irrigation = High
              Operations IrrigationEvents
                2011-11-07  [Irrigation].Apply(30);
                2011-11-25  [Irrigation].Apply(13.6);
                2011-11-28  [Irrigation].Apply(20.1);
                2011-11-29  [Irrigation].Apply(16.4);
                2011-12-05  [Irrigation].Apply(27);
                2011-12-15  [Irrigation].Apply(8);
                2011-12-26  [Irrigation].Apply(22.5);
                2011-12-29  [Irrigation].Apply(16.5);
                2012-01-05  [Irrigation].Apply(22.8);
                2012-01-09  [Irrigation].Apply(17.8);
                2012-01-12  [Irrigation].Apply(9.1);
                2012-01-16  [Irrigation].Apply(18.3);
                2012-01-19  [Irrigation].Apply(18.6);
                2012-01-23  [Irrigation].Apply(22.5);
                2012-01-30  [Irrigation].Apply(8);
                2012-02-02  [Irrigation].Apply(12);
                2012-02-07  [Irrigation].Apply(16.5);
                2012-02-09  [Irrigation].Apply(13.3);
                2012-02-13  [Irrigation].Apply(12.2);
                2012-02-20  [Irrigation].Apply(13.3);
                2012-02-23  [Irrigation].Apply(8.8);
                2012-03-29  [Irrigation].Apply(10);
                2012-04-02  [Irrigation].Apply(6.5);
                2012-04-05  [Irrigation].Apply(5);
                2012-04-10  [Irrigation].Apply(6.9);
                2012-04-26  [Irrigation].Apply(4.6);
                2012-04-30  [Irrigation].Apply(6.9);
                2012-05-03  [Irrigation].Apply(3.2);
                2012-11-01  [Irrigation].Apply(18);
                2012-11-15  [Irrigation].Apply(12);
                2012-11-22  [Irrigation].Apply(12);
                2012-11-26  [Irrigation].Apply(12);
                2012-11-29  [Irrigation].Apply(12);
                2012-12-03  [Irrigation].Apply(6);
                2012-12-06  [Irrigation].Apply(12);
                2012-12-13  [Irrigation].Apply(12);
                2012-12-17  [Irrigation].Apply(20.8);
                2012-12-20  [Irrigation].Apply(12);
                2012-12-24  [Irrigation].Apply(12);
                2012-12-27  [Irrigation].Apply(9);
                2012-12-31  [Irrigation].Apply(12);
                2013-01-03  [Irrigation].Apply(12);
                2013-01-07  [Irrigation].Apply(18);
                2013-01-10  [Irrigation].Apply(18);
                2013-01-14  [Irrigation].Apply(21);
                2013-01-21  [Irrigation].Apply(15);
                2013-01-24  [Irrigation].Apply(15);
                2013-01-28  [Irrigation].Apply(15);
                2013-01-31  [Irrigation].Apply(15);
                2013-02-04  [Irrigation].Apply(18);
                2013-02-07  [Irrigation].Apply(6);
                2013-02-11  [Irrigation].Apply(18.7);
                2013-02-14  [Irrigation].Apply(13.5);
                2013-02-18  [Irrigation].Apply(15);
                2013-02-21  [Irrigation].Apply(15);
                2013-02-25  [Irrigation].Apply(15);
                2013-02-28  [Irrigation].Apply(32);
                2013-03-07  [Irrigation].Apply(12);
                2013-03-11  [Irrigation].Apply(9);
                2013-03-14  [Irrigation].Apply(9);
                2013-03-28  [Irrigation].Apply(18);
                2013-04-04  [Irrigation].Apply(9);
                2013-04-11  [Irrigation].Apply(9);
                2013-10-24  [Irrigation].Apply(9);
                2013-10-31  [Irrigation].Apply(15);
                2013-11-04  [Irrigation].Apply(6);
                2013-11-07  [Irrigation].Apply(9);
                2013-11-11  [Irrigation].Apply(9);
                2013-11-14  [Irrigation].Apply(9);
                2013-11-18  [Irrigation].Apply(12);
                2013-11-21  [Irrigation].Apply(12);
                2013-11-25  [Irrigation].Apply(9);
                2013-12-02  [Irrigation].Apply(9);
                2013-12-05  [Irrigation].Apply(12);
                2013-12-09  [Irrigation].Apply(6);
                2013-12-12  [Irrigation].Apply(11);
                2013-12-17  [Irrigation].Apply(15);
                2013-12-23  [Irrigation].Apply(7);
                2014-01-06  [Irrigation].Apply(14);
                2014-01-09  [Irrigation].Apply(12.6);
                2014-01-13  [Irrigation].Apply(15.7);
                2014-01-16  [Irrigation].Apply(14.7);
                2014-01-20  [Irrigation].Apply(17.5);
                2014-01-23  [Irrigation].Apply(7.5);
                2014-01-30  [Irrigation].Apply(10);
                2014-02-03  [Irrigation].Apply(12);
                2014-02-05  [Irrigation].Apply(10);
                2014-02-10  [Irrigation].Apply(9);
                2014-02-17  [Irrigation].Apply(10);
                2014-02-20  [Irrigation].Apply(10);
            CompositeFactor OnePerWeek
              Specifications:
                [IrrigationEvents]
                [SetCropVariables].Script.Irrigation = Med
              Operations IrrigationEvents
                2011-11-07  [Irrigation].Apply(30);
                2011-11-25  [Irrigation].Apply(13.6);
                2011-11-29  [Irrigation].Apply(36.5);
                2011-12-15  [Irrigation].Apply(34.9);
                2011-12-29  [Irrigation].Apply(41.8);
                2012-01-05  [Irrigation].Apply(22.8);
                2012-01-12  [Irrigation].Apply(26.9);
                2012-01-19  [Irrigation].Apply(36.8);
                2012-02-02  [Irrigation].Apply(19.8);
                2012-02-09  [Irrigation].Apply(30);
                2012-02-16  [Irrigation].Apply(13);
                2012-02-23  [Irrigation].Apply(14.3);
                2012-03-29  [Irrigation].Apply(10);
                2012-04-05  [Irrigation].Apply(11.4);
                2012-04-26  [Irrigation].Apply(11.5);
                2012-05-03  [Irrigation].Apply(10.1);
                2012-11-01  [Irrigation].Apply(18);
                2012-11-15  [Irrigation].Apply(12);
                2012-11-29  [Irrigation].Apply(24);
                2012-12-13  [Irrigation].Apply(21);
                2012-12-27  [Irrigation].Apply(33);
                2013-01-10  [Irrigation].Apply(42);
                2013-01-24  [Irrigation].Apply(39);
                2013-02-07  [Irrigation].Apply(30);
                2013-02-21  [Irrigation].Apply(42);
                2013-02-28  [Irrigation].Apply(20);
                2013-03-07  [Irrigation].Apply(30);
                2013-04-04  [Irrigation].Apply(27);
                2013-04-18  [Irrigation].Apply(15);
                2013-10-24  [Irrigation].Apply(12);
                2013-11-07  [Irrigation].Apply(24);
                2013-11-21  [Irrigation].Apply(33);
                2013-12-05  [Irrigation].Apply(30);
                2013-12-19  [Irrigation].Apply(17);
                2014-01-02  [Irrigation].Apply(12.7);
                2014-01-16  [Irrigation].Apply(40.9);
                2014-01-30  [Irrigation].Apply(35);
                2014-02-13  [Irrigation].Apply(25);
                2014-02-27  [Irrigation].Apply(32);
            CompositeFactor ThreeWeekly
              Specifications:
                [IrrigationEvents]
                [SetCropVariables].Script.Irrigation = Low
              Operations IrrigationEvents
                2011-11-07  [Irrigation].Apply(30);
                2011-11-29  [Irrigation].Apply(47.6);
                2011-12-15  [Irrigation].Apply(34.9);
                2011-12-29  [Irrigation].Apply(41.8);
                2012-01-12  [Irrigation].Apply(49.8);
                2012-01-26  [Irrigation].Apply(36.8);
                2012-02-09  [Irrigation].Apply(49.6);
                2012-02-23  [Irrigation].Apply(34.3);
                2012-04-05  [Irrigation].Apply(21.4);
                2012-05-03  [Irrigation].Apply(23.7);
                2012-11-01  [Irrigation].Apply(18);
                2012-11-22  [Irrigation].Apply(12);
                2012-12-13  [Irrigation].Apply(27);
                2013-01-03  [Irrigation].Apply(42);
                2013-01-24  [Irrigation].Apply(45);
                2013-02-14  [Irrigation].Apply(90.6);
                2013-02-28  [Irrigation].Apply(20);
                2013-03-07  [Irrigation].Apply(30);
                2013-03-28  [Irrigation].Apply(18);
                2013-04-18  [Irrigation].Apply(15);
                2013-10-24  [Irrigation].Apply(12);
                2013-11-14  [Irrigation].Apply(33);
                2013-12-05  [Irrigation].Apply(36);
                2014-01-16  [Irrigation].Apply(44.7);
                2014-02-05  [Irrigation].Apply(33.5);
                2014-02-27  [Irrigation].Apply(32);
            CompositeFactor None
              Specifications:
                [IrrigationEvents]
                [SetCropVariables].Script.Irrigation = Rain
              Operations IrrigationEvents
                2013-02-28  [Irrigation].Apply(20);
          Factor CoverType
            CompositeFactor Lucerne
              Specifications:
                [SlurpSowingRule].Script.SowingDate=2011-03-10
                [SlurpSowingRule].Script.CultivarName=Lucerne
                [SetCropVariables].Script.MaximumHeight = 600
                [SetCropVariables].Script.Cover = Lucerne
                [SetCropVariables].Script.Ext_coef = 0.8
            CompositeFactor Pasture
              Specifications:
                [SlurpSowingRule].Script.SowingDate=2011-03-24
                [SlurpSowingRule].Script.CultivarName=Pasture
                [SetCropVariables].Script.MaximumHeight = 400
                [SetCropVariables].Script.Cover = Ryegrass
                [SetCropVariables].Script.Ext_coef = 0.65
      Simulation LandPBase
        Weather: FileName=%root%\Examples\WeatherFiles\lincoln.met
        Clock: Start=2011-03-01; End=2014-05-01
        Summary
        SoilArbitrator Soil Arbitrator
        Zone Field: Area=1; Slope=0; AspectAngle=0; Altitude=50
          Soil: Latitude=0; Longitude=0
            Chemical
              Thickness  NO3N     NH4N  PH
              100        180.833  0     6.6
              200        12.5     0     6.2
              300        1.38889  0     5.7
              300        1.38889  0     5.5
              300        0        0     5.5
              300        0        0     5.5
            InitialWater Initial water: PercentMethod=1; FractionFull=1
            Physical
              Thickness  BD   AirDry  LL15  DUL   SAT
              150        1.2  0.05    0.1   0.33  0.5
              150        1.2  0.1     0.1   0.33  0.5
              100        1.2  0.12    0.12  0.31  0.44
              200        1.2  0.06    0.06  0.15  0.46
              200        1.2  0.04    0.04  0.1   0.44
              200        1.2  0.02    0.02  0.06  0.44
              200        1.2  0.06    0.06  0.15  0.46
              200        1.2  0.04    0.04  0.1   0.44
              200        1.2  0.06    0.06  0.13  0.44
              200        1.2  0.06    0.06  0.13  0.44
              200        1.2  0.06    0.06  0.13  0.44
              200        1.2  0.06    0.06  0.13  0.44
              400        1.2  0.06    0.06  0.13  0.44
              SoilCrop SlurpSoil
                LL=[0.1, 0.1, 0.12, 0.06, 0.04, 0.02, 0.06, 0.04, 0.06, 0.06, 0.06, 0.06, 0.06]
                KL=[0.11, 0.11, 0.11, 0.11, 0.11, 0.11, 0.11, 0.11, 0.11, 0.11, 0.11, 0.11, 0.11]
                XF=[1, 1, 1, 1, 1, 1, 1, 1, 1, 1, 1, 1, 1]
            SoilWater: SummerDate=1-Nov; SummerU=9; SummerCona=4.4; WinterDate=1-Apr; WinterU=9; WinterCona=4.4; DiffusConst=88; DiffusSlope=35.4; Salb=0.18; CN2Bare=68; CNRed=20; CNCov=0.8; slope=0; discharge_width=0; catchment_area=0; max_pond=0; PrecipitationInterception=0
              Thickness  SWCON  KLAT
              150        0.55   0
              150        0.55   0
              100        0.55   0
              200        0.55   0
              200        0.55   0
              200        0.55   0
              200        0.55   0
              200        0.55   0
              200        0.55   0
              200        0.55   0
              200        0.55   0
              200        0.55   0
              400        0.55   0
            SoilNitrogen: fom_types=[default, manure, mucuna, lablab, shemp, stable]; fract_carb=[0.2, 0.3, 0.54, 0.57, 0.45, 0]; fract_cell=[0.7, 0.3, 0.37, 0.37, 0.47, 0.1]; fract_lign=[0.1, 0.4, 0.09, 0.06, 0.08, 0.9]
              SoilNitrogenNO3 NO3
              SoilNitrogenNH4 NH4
              SoilNitrogenUrea Urea
              SoilNitrogenPlantAvailableNO3 PlantAvailableNO3
              SoilNitrogenPlantAvailableNH4 PlantAvailableNH4
            Organic: FOMCNRatio=30
              Thickness  Carbon  SoilCNRatio  FBiom  FInert  FOM
              100        1.82    11.5         0.025  0.3     1243.93
              200        1.47    11.5         0.025  0.4     833.832
              300        1.2     11.5         0.015  0.75    457.617
              300        1.03    11.5         0.01   0.9     251.145
              300        0.47    11.5         0.01   0.96    137.831
              300        0.47    11.5         0.01   0.96    75.6435
            Sample Initial nitrogen: Thickness=[100, 200, 300, 300, 300, 300]; SWUnits=Volumetric; OCUnits=Total; PHUnits=Water
            CERESSoilTemperature
          Plant Slurp: CropType=Slurp; IsEnding=false; DaysAfterEnding=0
          MicroClimate: a_interception=0; b_interception=1; c_interception=0; d_interception=0; soil_albedo=0.23; SoilHeatFluxFraction=0.4; NightInterceptionFraction=0.5; ReferenceHeight=2
          Irrigation
          Fertiliser
          SurfaceOrganicMatter surface organic matter: InitialResidueName=wheat; InitialResidueType=wheat; InitialResidueMass=2000; InitialStandingFraction=0; InitialCPR=0; InitialCNR=80; FractionFaecesAdded=0.5
          Operations IrrigationEvents
            1998-10-02  [Irrigation].Apply(40);
            1998-10-26  [Irrigation].Apply(70);
            1998-12-15  [Irrigation].Apply(70);
            1998-12-29  [Irrigation].Apply(10);
            1998-12-30  [Irrigation].Apply(55);
            1999-01-07  [Irrigation].Apply(50);
            1999-01-21  [Irrigation].Apply(40);
            1999-02-10  [Irrigation].Apply(28);
            1999-02-19  [Irrigation].Apply(15);
            1999-03-09  [Irrigation].Apply(25);
            1998-12-29  [Fertiliser].Apply(150, Fertiliser.Types.UreaN, 10);
            2011-11-07  [Irrigation].Apply(30);
            2011-11-25  [Irrigation].Apply(13.6);
            2011-11-28  [Irrigation].Apply(20.1);
          Manager ExtraVariables
```csharp
using System;
using Models.Core;
using System.Collections.Generic;
using System.Text;
using Models.Soils;
using Models.PMF;
using Models;
using System.Xml.Serialization;
using APSIM.Shared.Utilities;

namespace Models
{
    [Serializable] 
    public class Script : Model
    {
        [Link] Clock Clock;
        [Link] Soils.Soil Soil;
        [Link] Models.Surface.SurfaceOrganicMatter SOM;
        [Link] Weather Met;
        [Link] Fertiliser Fert;
        [Link] Irrigation Irrig;
        [Link] Plant Slurp;
        [Link] Zone zone;
                    
        [XmlIgnore] public bool InitialDay { get; set; }
    
        
        [XmlIgnore] public double AccumEO { get; set; }
        [XmlIgnore] public double AccumEP { get; set; }
        [XmlIgnore] public double AccumES { get; set; }
        [XmlIgnore] public double AccumDrainage { get; set; }
        [XmlIgnore] public double AccumRunoff { get; set; }
        [XmlIgnore] public double AccumOutflowLat { get; set; }
        [XmlIgnore] public double AccumIrrigation { get; set; }
        [XmlIgnore] public double AccumRainfall { get; set; }
        [XmlIgnore] public double SoilWaterDeficit { get; set; }
    
        [XmlIgnore] public double OutFlowLat { get; set; }

        [EventSubscribe("Commencing")]
        private void OnSimulationCommencing(object sender, EventArgs e)
        {
            InitialDay = true;
        }
        
        [EventSubscribe("DoManagement")]
        private void OnDoManagement(object sender, EventArgs e)
        {
            //!!!!!! Water balance components !!!!!!
            //!!!!!!^^^^^^^^^^^^^^^^^^^^^^^^^^!!!!!!

            AccumIrrigation += Irrig.IrrigationApplied;
            AccumRainfall += Met.Rain;
            AccumEP -= (double)zone.Get("Slurp.Root.WaterUptake");
            double OutFlowLat = MathUtilities.Sum(Soil.SoilWater.LateralOutflow);
            AccumOutflowLat -= OutFlowLat;
        }
        
        [EventSubscribe("DoManagementCalculations")]
        private void OnDoManagementCalculations(object sender, EventArgs e)
        {
            AccumEO -= Soil.SoilWater.Eo;
            AccumES -= Soil.SoilWater.Es; 
            AccumDrainage -= Soil.SoilWater.Drainage;
            AccumRunoff -= Soil.SoilWater.Runoff;
        }
    }
}
```
          Manager SlurpSowingRule
            CultivarName = Lucerne
            InitialRootDepth = 15
            SowingDate = 2011-03-14
```csharp
using System;
using Models.Core;
using Models.PMF;
using APSIM.Shared.Utilities;
        
namespace Models
{
    [Serializable] 
    [System.Xml.Serialization.XmlInclude(typeof(Model))]
    public class Script : Model
    {
        [Link] Plant Slurp;
        [Link] Clock Clock;

        [Description("Cultivar")]
        public string CultivarName { get; set; }
        [Description("Initial Root Depth")]
        public double InitialRootDepth { get; set; }
        [Description("Sowing Date")]
        public DateTime SowingDate { get; set; }

               
        [EventSubscribe("DoManagement")]
        private void OnDoManagement(object sender, EventArgs e)
        {
            if (Clock.Today.Date == SowingDate)
                Slurp.Sow(cultivar: CultivarName, population: 1, depth: InitialRootDepth, rowSpacing: 150);
        }
    }
}
```
          Manager SetCropVariables
            CoverFile = %root%\Tests\Validation\SoilWater\ObservedCovers\LandPCover.csv
            Cover =
            Irrigation =
            Treatment =
            Ext_coef = 0.8
            MaximumHeight = 600
            leaflai = 0
```csharp
using System;
using Models.Core;
using System.Collections.Generic;
using System.Text;
using Models.PMF;
using Models;
using System.Xml.Serialization;
using APSIM.Shared.Utilities;
using System.Data;

namespace Models
{
    [Serializable] 
    //[System.Xml.Serialization.XmlInclude(typeof(Model))]
    public class Script : Model
    {
        [Link] Plant SCRUM;
        [Link] Clock Clock;
        [Link] Zone zone;
        [Link] Simulation Simulation;
        
        [Description("File of Yields")]
        public string CoverFile { get; set; }
       

        [XmlIgnore] private DataTable Covers { get; set; }

        public string Cover { get; set; }
        public string Irrigation { get; set; }
        public string Treatment { get; set; }
        public  double Ext_coef { get; set; }
        public double MaximumHeight { get; set; }
        private double CoverRead { get; set; }
        public double leaflai { get; private set; }
                
        [EventSubscribe("StartOfSimulation")]
        private void OnStartOfSimulation(object sender, EventArgs e)
        {
            
            Treatment = Cover + "_" + Irrigation;
            
            string fullFileName = PathUtilities.GetAbsolutePath(CoverFile, Simulation.FileName);
            
            ApsimTextFile textFile = new ApsimTextFile();
            textFile.Open(fullFileName);
            Covers = textFile.ToTable();
            textFile.Close();
        }

        [EventSubscribe("StartOfDay")]
        private void OnStartOfDay(object sender, EventArgs e)
        {
            foreach (DataRow row in Covers.Rows)
            {
                DateTime TodayDate = Convert.ToDateTime(row["Date"]);
                if (TodayDate.Date == Clock.Today.Date)
                {
                    CoverRead = Convert.ToDouble(row[Treatment]);
                }
            }
        
            if ((bool)zone.Get("Slurp.IsAlive") == true)
            {
                //Only assign cover valuse if crop is emerged
                
                if (CoverRead == 1)
                    leaflai = Math.Log(0.01) / -Ext_coef;
                else
                {
                    if (CoverRead > 0)
                        leaflai = Math.Log(1 - CoverRead) / -Ext_coef;
                    else
                        leaflai = 0;
                }
                //Summary.WriteMessage(this, "LAI " + leaflai);
                object LAIResetValue = leaflai;
                zone.Set("Slurp.Leaf.Area.FixedValue", LAIResetValue);  
                object HeightResetValue = CoverRead * MaximumHeight;
                zone.Set("Slurp.Leaf.Tallness.FixedValue", HeightResetValue);  
            }
        }
    }
}
```
          Report
          Report ProfileWater
            VariableNames:
              [Clock].Today
              sum([Soil].SoilWater.SWmm as ProfileWater
              Diff of sum([Soil].SoilWater.SWmm) from 2011-03-01 to 2014-05-01 as ProfileWaterChange
            EventNames:
              [Clock].DoReport
  Folder SensibilityTests
    Experiment ResidueEvaporationTest
      Factors
        Factor Residue
          CompositeFactor None
            Specifications:
              [AddResidue]
              [SurfaceOrganicMatter]
            Manager AddResidue
              ResidueDate = 25-feb
```csharp
using System;
using Models.Core;
using Models.PMF;
using APSIM.Shared.Utilities;
using Models.Surface;

namespace Models
{
    [Serializable]
    public class Script : Model
    {
        [Link] Clock Clock;
        [Link] SurfaceOrganicMatter SOM;
        
        [Description("Residue Addition Date")]
        public string ResidueDate { get; set; }

        [EventSubscribe("DoManagement")]
        private void OnDoManagement(object sender, EventArgs e)
        {
            if (DateUtilities.WithinDates(ResidueDate, Clock.Today, ResidueDate))
            {
                SOM.Add(0,30,20,"Potato","spudStover");
            }
        }
    }
}
```
            SurfaceOrganicMatter: InitialResidueName=Barley; InitialResidueType=barley; InitialResidueMass=0; InitialStandingFraction=0.5; InitialCPR=0; InitialCNR=80; FractionFaecesAdded=0.5
          CompositeFactor Early
            Specifications:
              [AddResidue]
              [SurfaceOrganicMatter]
            Manager AddResidue: same as SensibilityTests.ResidueEvaporationTest.Factors.Residue.None.AddResidue
            SurfaceOrganicMatter: InitialResidueName=Barley; InitialResidueType=barley; InitialResidueMass=2000; InitialStandingFraction=0.5; InitialCPR=0; InitialCNR=80; FractionFaecesAdded=0.5
          CompositeFactor Late
            Specifications:
              [AddResidue]
              [SurfaceOrganicMatter]
            Manager AddResidue
              ResidueDate = 1-Jun
```csharp
using System;
using Models.Core;
using Models.PMF;
using APSIM.Shared.Utilities;
using Models.Surface;

namespace Models
{
    [Serializable]
    public class Script : Model
    {
        [Link] Clock Clock;
        [Link] SurfaceOrganicMatter SOM;
        
        [Description("Residue Addition Date")]
        public string ResidueDate { get; set; }

        [EventSubscribe("DoManagement")]
        private void OnDoManagement(object sender, EventArgs e)
        {
            if (DateUtilities.WithinDates(ResidueDate, Clock.Today, ResidueDate))
            {
                SOM.Add(2000,30,20,"Potato","spudStover");
            }
        }
    }
}
```
            SurfaceOrganicMatter: InitialResidueName=Barley; InitialResidueType=barley; InitialResidueMass=0; InitialStandingFraction=0.5; InitialCPR=0; InitialCNR=80; FractionFaecesAdded=0.5
          CompositeFactor Both
            Specifications:
              [AddResidue]
              [SurfaceOrganicMatter]
            Manager AddResidue: same as SensibilityTests.ResidueEvaporationTest.Factors.Residue.Late.AddResidue
            SurfaceOrganicMatter: InitialResidueName=Barley; InitialResidueType=barley; InitialResidueMass=2000; InitialStandingFraction=0.5; InitialCPR=0; InitialCNR=80; FractionFaecesAdded=0.5
          CompositeFactor EarlyplusCrop
            Specifications:
              [AddResidue]
              [SurfaceOrganicMatter]
            Manager AddResidue
              ResidueDate = 1-Jun
              CropDate = 1-Apr
```csharp
using System;
using Models.Core;
using Models.PMF;
using APSIM.Shared.Utilities;
using Models.Surface;

namespace Models
{
    [Serializable]
    public class Script : Model
    {
        [Link] Clock Clock;
        [Link] SurfaceOrganicMatter SOM;
        [Link] Plant Slurp;
        
        [Description("Residue Addition Date")]
        public string ResidueDate { get; set; }
        [Description("Crop Sowing Date")]
        public string CropDate { get; set; }

        [EventSubscribe("DoManagement")]
        private void OnDoManagement(object sender, EventArgs e)
        {
            if (DateUtilities.WithinDates(ResidueDate, Clock.Today, ResidueDate))
            {
                SOM.Add(0,30,20,"Potato","spudStover");
            }
            if (DateUtilities.WithinDates(CropDate, Clock.Today, CropDate))
            {
                Slurp.Sow(population:200, cultivar:"StaticCrop", depth:2, rowSpacing:130);
            }
        }
    }
}
```
            SurfaceOrganicMatter: InitialResidueName=Barley; InitialResidueType=barley; InitialResidueMass=2000; InitialStandingFraction=0.5; InitialCPR=0; InitialCNR=80; FractionFaecesAdded=0.5
          CompositeFactor LateplusCrop
            Specifications:
              [AddResidue]
              [SurfaceOrganicMatter]
            Manager AddResidue
              ResidueDate = 1-Jun
              CropDate = 1-Apr
```csharp
using System;
using Models.Core;
using Models.PMF;
using APSIM.Shared.Utilities;
using Models.Surface;

namespace Models
{
    [Serializable]
    public class Script : Model
    {
        [Link] Clock Clock;
        [Link] SurfaceOrganicMatter SOM;
        [Link] Plant Slurp;
        
        [Description("Residue Addition Date")]
        public string ResidueDate { get; set; }
        [Description("Crop Sowing Date")]
        public string CropDate { get; set; }

        [EventSubscribe("DoManagement")]
        private void OnDoManagement(object sender, EventArgs e)
        {
            if (DateUtilities.WithinDates(ResidueDate, Clock.Today, ResidueDate))
            {
                SOM.Add(2000,30,20,"Potato","spudStover");
            }
            if (DateUtilities.WithinDates(CropDate, Clock.Today, CropDate))
            {
                Slurp.Sow(population:200, cultivar:"StaticCrop", depth:2, rowSpacing:130);
            }
        }
    }
}
```
            SurfaceOrganicMatter: InitialResidueName=Barley; InitialResidueType=barley; InitialResidueMass=0; InitialStandingFraction=0.5; InitialCPR=0; InitialCNR=80; FractionFaecesAdded=0.5
      Simulation Testy
        Weather: FileName=..\..\WeatherFiles\lincoln.met
        Clock: Start=2010-02-25; End=2010-08-11
        Summary
        MicroClimate: a_interception=0; b_interception=1; c_interception=0.3; d_interception=0; soil_albedo=0.3; SoilHeatFluxFraction=0.4; NightInterceptionFraction=0.5; ReferenceHeight=2
        Zone Field: Area=1; Slope=0; AspectAngle=0; Altitude=50
          Soil: SoilType=Sedementary; LocalName=Lincoln; Latitude=0; Longitude=0
            Physical
              Thickness  BD    AirDry  LL15   DUL   SAT    KS
              200        1.3   0.06    0.08   0.27  0.31   999
              200        1.3   0.124   0.124  0.25  0.358  300
              200        1.3   0.106   0.106  0.27  0.4    100
              200        1.52  0.07    0.07   0.2   0.314  90
              200        1.52  0.07    0.07   0.2   0.314  90
              200        1.52  0.165   0.165  0.3   0.358  90
              200        1.65  0.157   0.157  0.29  0.35   90
              200        1.65  0.125   0.125  0.25  0.318  90
              200        1.65  0.125   0.125  0.25  0.318  90
              200        1.65  0.125   0.125  0.25  0.318  90
              200        1.65  0.125   0.125  0.25  0.318  90
              200        1.65  0.125   0.125  0.25  0.318  90
              200        1.65  0.125   0.125  0.25  0.318  90
              200        1.65  0.125   0.125  0.25  0.318  90
              200        1.6   0.125   0.125  0.25  0.318  90
              SoilCrop SlurpSoil
                LL=[0.08, 0.124, 0.106, 0.07, 0.07, 0.165, 0.157, 0.125, 0.125, 0.125, 0.125, 0.125, 0.125, 0.125, 0.125]
                KL=[0.1, 0.1, 0.1, 0.1, 0.1, 0.1, 0.1, 0.1, 0.1, 0.1, 0.1, 0.1, 0.1, 0.1, 0.1]
                XF=[1, 1, 1, 1, 1, 1, 1, 1, 1, 1, 1, 1, 1, 1, 1]
            SoilWater: same as Evaporation.ABlock_Residues.Base.Field.Soil.SoilWater
            Organic: same as Evaporation.ABlock_Residues.Base.Field.Soil.Organic
            Chemical: same as Evaporation.ABlock_Residues.Base.Field.Soil.Chemical
            Sample InitialN: same as Evaporation.ABlock_Residues.Base.Field.Soil.InitialN
            CERESSoilTemperature
            Nutrient: same as Evaporation.Wellcamp.WellCamp.WellcampBase.Field.Soil.Nutrient
          Irrigation
          Fertiliser
          SurfaceOrganicMatter: InitialResidueName=Barley; InitialResidueType=barley; InitialResidueMass=2000; InitialStandingFraction=0.5; InitialCPR=0; InitialCNR=80; FractionFaecesAdded=0.5
          Operations: same as Evaporation.ABlock_Residues.Base.Field.Operations
          Report TestReport: EventNames=[Clock].DoReport
            VariableNames:
              sum of [Soil].SoilWater.PrecipitationInterception from 25-Feb to 11-Aug
              [Clock].Today
              sum of [Weather].Rain from 25-Feb to 11-Aug
              [Slurp].Leaf.CoverTotal
              [SurfaceOrganicMatter].Cover
          Manager AddResidue
            ResidueDate = 25-feb
            CropDate = 5-mar
```csharp
using System;
using Models.Core;
using Models.PMF;
using APSIM.Shared.Utilities;
using Models.Surface;

namespace Models
{
    [Serializable]
    public class Script : Model
    {
        [Link] Clock Clock;
        [Link] SurfaceOrganicMatter SOM;
        [Link] Plant Slurp;
        
        [Description("Residue Addition Date")]
        public string ResidueDate { get; set; }
        [Description("Crop Sowing Date")]
        public string CropDate { get; set; }

        [EventSubscribe("DoManagement")]
        private void OnDoManagement(object sender, EventArgs e)
        {
            if (DateUtilities.WithinDates(ResidueDate, Clock.Today, ResidueDate))
            {
                SOM.Add(1000,30,20,"Potato","spudStover");
            }
            if (DateUtilities.WithinDates(CropDate, Clock.Today, CropDate))
            {
                Slurp.Sow("StaticCrop",0,10,100,1,1);
            }
        }
    }
}
```
          Plant Slurp: CropType=Slurp; IsEnding=false; DaysAfterEnding=0
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