Simulations: Version=221
  DataStore
    ExcelInput: FileNames=[OxdefObserved.xlsx]
      SheetNames=[Scott1989_Harvest, Scott1989_TimeSeries, Scott1987_Harvest, Scott1987_TimeSeries, Rhine_timing, Rhine_duration, Mollabashi_TimeSeries]
    PredictedObserved Scott1989_InSeason_PredObs: PredictedTableName=Report_Day; ObservedTableName=Scott1989_TimeSeries; FieldNameUsedForMatch=SimulationName; FieldName2UsedForMatch=Clock.Today; AllColumns=false
    PredictedObserved Scott1989_Harvest_PredObs: PredictedTableName=Report_Harvest; ObservedTableName=Scott1989_Harvest; FieldNameUsedForMatch=SimulationName; AllColumns=false
    PredictedObserved Scott1987_InSeason_PredObs: PredictedTableName=Report_Day; ObservedTableName=Scott1987_TimeSeries; FieldNameUsedForMatch=SimulationName; FieldName2UsedForMatch=Clock.Today; AllColumns=false
    PredictedObserved Scott1987_Harvest_PredObs: PredictedTableName=Report_Harvest; ObservedTableName=Scott1987_Harvest; FieldNameUsedForMatch=SimulationName; AllColumns=false
    PredictedObserved RhineTiming_Harvest_PredObs: PredictedTableName=Report_Harvest; ObservedTableName=Rhine_timing; FieldNameUsedForMatch=SimulationName; FieldName2UsedForMatch=Year; AllColumns=false
    PredictedObserved RhineDuration_Harvest_PredObs: PredictedTableName=Report_Harvest; ObservedTableName=Rhine_duration; FieldNameUsedForMatch=SimulationName; FieldName2UsedForMatch=Year; AllColumns=false
    PredictedObserved Mollabashi_InSeason_PredObs: PredictedTableName=Report_Day; ObservedTableName=Mollabashi_TimeSeries; FieldNameUsedForMatch=SimulationName; FieldName2UsedForMatch=Clock.Today; AllColumns=false
  Folder Replacements
    Report Report_Day: EventNames=[Clock].DoReport
      VariableNames:
        [Clock].Today
        [Clock].Today.Year as Year
        [Soybean].AboveGroundLive.Wt
        [Soybean].AboveGround.Wt
        [Soybean].Grain.Wt
        [Soybean].Phenology.CurrentStageName
        [Soybean].Population
        [Swim3].WaterTable
        [Swim3].SW[1]
        [Swim3].SW[3]
        [Swim3].Es
        [Swim3].WaterTable
        [Swim3].Pond
        [Swim3].Runoff
        [Swim3].Drainage
        [Swim3].SubsurfaceDrain
        [Irrigation].IrrigationApplied
        [Soybean].DaysAfterSowing
        [Soybean].Root.Depth
        [Soybean].Nodule.NFixed
        [Soybean].Leaf.LAI
        [Soybean].Leaf.NodeNumber
        [Soybean].Leaf.Live.N
        sum([NO3].kgha)
        [Soybean].Total.NConc
        [Soybean].TotalLive.NConc
        [Soybean].Leaf.NodeNumber
        [Soybean].Leaf.Transpiration
        [Weather].Rain
        [Weather].Radn
        [Weather].VPD
        [Weather].MaxT
        [Weather].MinT
        [Weather].MeanT
    Report Report_Harvest: EventNames=[Soybean].Harvesting
      VariableNames:
        [Clock].Today
        [Clock].Today.Year as Year
        [Soybean].SowingDate as SowingDate
        [Soybean].Phenology.FloweringDAS as DTF
        [Soybean].Phenology.MaturityDAS as DTM
        [Soybean].Grain.Wt
        [Soybean].Grain.Wt * 10 as Yield_kgha
        [Soybean].Grain.N * 10 as GrainN_kgha
        [Soybean].Grain.Wt * 10 * 0.0149/0.85 as Yield_buac
        [Soybean].Grain.Wt/([Soybean].AboveGround.Wt+0.00001) as HI
        [Soybean].Grain.N/([Soybean].AboveGround.N+0.00001) as NHI
        [Soybean].AboveGround.Wt * 10 as Biomass_kgha
        [Soybean].AboveGround.N * 10 as BiomassN_kgha
        (([Soybean].AboveGround.Wt) - ([Soybean].Grain.Wt))*10 as StoverDM_kgha
        (([Soybean].AboveGround.N) - ([Soybean].Grain.N))*10 as StoverN_kgha
        [Soybean].LAI
        [Soybean].Leaf.NConc * 100 as LeafNConc
        sum of [Soybean].Nodule.NFixed from [Soybean].Sowing to [Soybean].Harvesting as n_fixed_tops
        Divide (GrainN_kgha, Yield_kgha)*100 as GrainN_conc
        Divide (StoverN_kgha, StoverDM_kgha)*100 as StoverN_conc
        [Soybean].Population
        [Soybean].Grain.Size * 1000 as GrainSize_mg
        [Soybean].Grain.Number as GrainNumber_m2
        sum([Soil].NO3.kgha[1:5]) as NO3_harvest_0to30cm
        sum([Soil].NO3.kgha[6:11]) as NO3_harvest_30to150cm
        //sum of [Swim].FlowNO3[11] from [Soybean].Sowing to [Soybean].Harvesting as GS_leaching_150cm
        [NO3].Flow[11] from [Soybean].Sowing to [Soybean].Harvesting as GS_leaching_150cm
        sum of sum([Soil].Nutrient.N2Oatm) from [Soybean].Sowing to [Soybean].Harvesting as GS_N20
        sum of sum([Soil].Nutrient.DenitrifiedN) from [Soybean].Sowing to [Soybean].Harvesting as GS_Denitrification
        //sum of [Fertiliser].NitrogenApplied from [Soybean].Sowing to [Soybean].Harvesting as N_fertilizer
        sum of sum([Soil].Nutrient.MineralisedN + [SurfaceOrganicMatter].SurfaceResidue.Decomposition.MineralisedN) from [Soybean].Sowing to [Soybean].Harvesting as GS_NetNMineralization
        sum of [Irrigation].IrrigationApplied from [Soybean].Sowing to [Soybean].Harvesting as TotalIrrigation
        //[Structure].FinalLeafNumber
        //[Structure].AllLeavesAppeared
  Memo
    4 papers
    1) Scott 1987 (doi  https://doi.org/10.2134/agronj1989.00021962008100040016x) (biomass, yield, many treatments: timing x duration of WL stress) - 16 treatments
    2) Scott 1989 (doi https://doi.org/10.1080/01904169009364134) (yield; duration and timing) - 4 treatmenmts
    3) Rhine 2010 (doi https://doi.org/10.1007/s00271-009-0168-x) (yield, duration and timing) - 9 treatments
    4) Ebrahimi-Mollabashi 2019 (doi https://doi.org/10.1016/j.fcr.2019.03.014) (root depth) - 6 treatments
  Folder USA
    Folder Arkansas
      Experiment Keiser1987a
        Factors
          Factor _: Specification=[WL]
            Operations V4_2d
              1987-06-20  [SwimSubsurfaceDrain].Open = false
              1987-06-20  [DumpWater].Script.Dump = true
              1987-06-22  [SwimSubsurfaceDrain].Open = true
              1987-06-22  [DumpWater].Script.Dump = false
            Operations V4_4d
              1987-06-20  [SwimSubsurfaceDrain].Open = false
              1987-06-20  [DumpWater].Script.Dump = true
              1987-06-24  [SwimSubsurfaceDrain].Open = true
              1987-06-24  [DumpWater].Script.Dump = false
            Operations V4_7d
              1987-06-20  [SwimSubsurfaceDrain].Open = false
              1987-06-20  [DumpWater].Script.Dump = true
              1987-06-27  [SwimSubsurfaceDrain].Open = true
              1987-06-27  [DumpWater].Script.Dump = false
            Operations V4_14d
              1987-06-20  [SwimSubsurfaceDrain].Open = false
              1987-06-20  [DumpWater].Script.Dump = true
              1987-07-04  [SwimSubsurfaceDrain].Open = true
              1987-07-04  [DumpWater].Script.Dump = false
            Operations R2_2d
              1987-07-20  [SwimSubsurfaceDrain].Open = false
              1987-07-20  [DumpWater].Script.Dump = true
              1987-07-23  [SwimSubsurfaceDrain].Open = true
              1987-07-23  [DumpWater].Script.Dump = false
            Operations R2_4d
              1987-07-20  [SwimSubsurfaceDrain].Open = false
              1987-07-20  [DumpWater].Script.Dump = true
              1987-07-25  [SwimSubsurfaceDrain].Open = true
              1987-07-25  [DumpWater].Script.Dump = false
            Operations R2_7d
              1987-07-20  [SwimSubsurfaceDrain].Open = false
              1987-07-20  [DumpWater].Script.Dump = true
              1987-07-28  [SwimSubsurfaceDrain].Open = true
              1987-07-28  [DumpWater].Script.Dump = false
            Operations R2_14d
              1987-07-20  [SwimSubsurfaceDrain].Open = false
              1987-07-20  [DumpWater].Script.Dump = true
              1987-08-05  [SwimSubsurfaceDrain].Open = true
              1987-08-05  [DumpWater].Script.Dump = false
        Simulation Base_Exp1
          Clock: Start=1987-01-01; End=1987-12-12
          Weather: FileName=ScottNEREC1987.met
          Summary summaryfile
          Zone Field: Area=1; Slope=0; AspectAngle=0; Altitude=50
            Manager Sow on a fixed date
              Crop = [soybean]
              SowDate = 05-Jun
              CultivarName = MG4_Oxdef
              SowingDepth = 30
              RowSpacing = 960
              Population = 35
```csharp
using APSIM.Shared.Utilities;
using Models.Utilities;
using Models.Soils;
using Models.PMF;
using Models.Core;
using System;
using System.Linq;

namespace Models
{
    [Serializable]
    public class Script : Model
    {
        [Link] Clock Clock;
        [Link] Summary Summary;
        [Link] Soil Soil;
        
        [Description("Crop")]
        public IPlant Crop { get; set; }

        [Description("Sowing date (d-mmm)")]
        public string SowDate { get; set; }

        [Display(Type = DisplayType.CultivarName)]
        [Description("Cultivar to be sown")]
        public string CultivarName { get; set; }

        [Description("Sowing depth (mm)")]
        public double SowingDepth { get; set; }

        [Description("Row spacing (mm)")]
        public double RowSpacing { get; set; }

        [Description("Plant population (/m2)")]
        public double Population { get; set; }

        [EventSubscribe("DoManagement")]
        private void OnDoManagement(object sender, EventArgs e)
        {
            if (DateUtilities.WithinDates(SowDate, Clock.Today, SowDate))
            {
                Crop.Sow(population: Population, cultivar: CultivarName, depth: SowingDepth, rowSpacing: RowSpacing);    
            }
        }
    }
}
```
            Manager Harvesting
              Crop = [soybean]
```csharp
using APSIM.Shared.Utilities;
using Models.Utilities;
using Models.Soils;
using Models.PMF;
using Models.Core;
using System;
using System.Linq;

namespace Models
{
    [Serializable] 
    public class Script : Model
    {
        [Description("Crop")]
        public IPlant Crop { get; set; }
        
        [EventSubscribe("DoManagement")]
        private void OnDoManagement(object sender, EventArgs e)
        {
            if (Crop.IsReadyForHarvesting)
            {
                Crop.Harvest();
                Crop.EndCrop();
            }
        }
    }
}
```
            SurfaceOrganicMatter: InitialResidueName=maize; InitialResidueType=maize; InitialResidueMass=1000; InitialStandingFraction=0; InitialCPR=0; InitialCNR=73
            Manager SWIMInitWt
              WTDepth = 1600
```csharp
using System;
using System.Linq;
using Models.Core;
using Models.Soils;
using Models.Interfaces;
using Models.PMF;
using APSIM.Shared.Utilities;

namespace Models;

[Serializable]
public class Script : Model
{
    [Link] IClock Clock;
    [Link] ISummary Summary;
    [Link] Swim3 Swim;
    
    [Description("WT depth (mm)")]
    public double WTDepth { get; set; }

    private bool initialized = false;

    [EventSubscribe("DoManagement")]
    private void DoDailyCalculations(object sender, EventArgs e)
    {
        if (!initialized)
        {
        	var dlayer = Swim.Thickness;
        	var profileDepth = dlayer.Sum();
        	// mm to cm
        	var bbcPotential = (profileDepth - WTDepth) / 10;
        	double[] initPsi = new double[dlayer.Length];
        	initPsi[0] = -WTDepth / 10;
        	initPsi[1] = initPsi[0] + (dlayer[0] + dlayer[1]) / 20;
        	for (int i = 2; i < dlayer.Length - 1; i++)
        	{
        		initPsi[i] = initPsi[i - 1] + (dlayer[i - 1] + dlayer[i]) / 20;
        	}
        	initPsi[dlayer.Length - 1] = bbcPotential;
        	Swim.PSI = initPsi;
        	Swim.SetLowerBCForGivenPotential(bbcPotential);
        	initialized = true;
        }
    }
}
```
            Plant soybean: ResourceName=Soybean
            Soil NER_Sharkey_Sm: SoilType=NER_Sharkey_Sm; Region=NER_Sharkey_Sm; State=IL; Country=USA; ApsoilNumber=1; Latitude=0; Longitude=0; DataSource=ssurgo2apsim; Comments=None
              Physical
                Thickness  ParticleSizeSand  ParticleSizeSilt  ParticleSizeClay  Rocks  BD     AirDry  LL15   DUL    SAT    KS
                10         17.2              33.7              49.1              0      1.311  0.25    0.29   0.421  0.505  350
                40         17.2              33.7              49.1              0      1.311  0.25    0.29   0.421  0.505  350
                50         17.2              33.7              49.1              0      1.311  0.25    0.29   0.421  0.505  300
                50         16.4              33.2              50.4              0      1.301  0.26    0.297  0.427  0.509  150
                150        13.7              31.4              54.9              0      1.261  0.29    0.322  0.445  0.524  50
                150        9.8               28.6              61.6              0      1.191  0.358   0.358  0.471  0.551  28.1
                150        5.8               25.9              68.3              0      1.108  0.395   0.395  0.495  0.582  34.5
                200        2.1               24.2              73.7              0      1.029  0.424   0.424  0.514  0.612  48.7
                200        1.3               27.8              70.9              0      1.052  0.409   0.409  0.503  0.603  51.8
                200        0.9               31.8              67.3              0      1.086  0.389   0.389  0.491  0.59   52.3
                300        0.3               36.9              62.8              0      1.127  0.364   0.364  0.476  0.575  52.1
                500        0                 40                60                0      1.154  0.348   0.348  0.467  0.564  50.8
                500        0                 40                60                0      1.154  0.348   0.348  0.467  0.564  50.6
                500        0                 40                60                0      1.154  0.348   0.348  0.467  0.564  50.6
                500        0                 40                60                0      1.154  0.348   0.348  0.467  0.564  50.6
                500        0                 40                60                0      1.154  0.348   0.348  0.467  0.564  50.6
                Rocks, ParticleSizeSilt source: Calculated
                SoilCrop MaizeSoil
                  LL=[0.29, 0.29, 0.29, 0.297, 0.322, 0.387, 0.43, 0.464, 0.46, 0.453, 0.445, 0.447, 0.455, 0.455, 0.455, 0.455]
                  KL=[0.08, 0.08, 0.08, 0.08, 0.08, 0.08, 0.08, 0.08, 0.08, 0.08, 0.04, 0.03, 0.02, 0.01, 0.01, 0]
                  XF=[0.9, 0.9, 0.9, 0.9, 0.6, 0.5, 0.5, 0.5, 0.5, 0.5, 0.4, 0.4, 0.4, 0, 0, 0]
                SoilCrop SoybeanSoil
                  LL=[0.29, 0.29, 0.29, 0.297, 0.322, 0.358, 0.395, 0.424, 0.409, 0.389, 0.364, 0.348, 0.348, 0.348, 0.348, 0.348]
                  KL=[0.08, 0.08, 0.08, 0.08, 0.08, 0.08, 0.08, 0.08, 0.08, 0.08, 0.04, 0.03, 0.02, 0.01, 0.01, 0]
                  XF=[1, 1, 0.8, 0.7, 0.6, 0.5, 0.4, 0.4, 0.4, 0.4, 0.4, 0.4, 0.4, 0, 0, 0]
              Swim3 Swim: hydrol_effective_depth=450; hydrol_effective_exponent=4.16; Salb=0.15; CN2Bare=66; CNRed=20; CNCov=0.8; KDul=0.25; PSIDul=-250; VC=true; DTMin=0; DTMax=1440; MaxWaterIncrement=10; SpaceWeightingFactor=0; SoluteSpaceWeightingFactor=0; Dis=0; Disp=0; A=0; DTHC=0; DTHP=0; vcon1=7.28e-09; vcon2=7.26e-07; eo_time=06:00; eo_durn=720; default_rain_time=00:00; default_rain_duration=720; Diagnostics=false
                SwimSubsurfaceDrain: DrainDepth=1190; DrainSpacing=18000; DrainRadius=100; Klat=250; ImpermDepth=3900; Open=true
              Solute NO3: InitialValuesUnits=ppm; WaterTableConcentration=0; D0=0; DepthConstant=0; MaxDepthSoluteAccessible=0; RunoffEffectivenessAtMovingSolute=0; MaxEffectiveRunoff=0
                Thickness  InitialValues  Exco  FIP
                10         1.31           0     1
                40         1.31           0     1
                50         1.31           0     1
                50         1.25           0     1
                150        1.05           0     1
                150        0.75           0     1
                150        0.45           0     1
                200        0.17           0     1
                200        0.15           0     1
                200        0.14           0     1
                300        0.08           0     1
                500        0.02           0     1
                500        0              0     1
                500        0              0     1
                500        0              0     1
                500        0              0     1
              Solute NH4: InitialValuesUnits=ppm; WaterTableConcentration=0; D0=0; DepthConstant=0; MaxDepthSoluteAccessible=0; RunoffEffectivenessAtMovingSolute=0; MaxEffectiveRunoff=0
                Thickness  InitialValues  Exco  FIP
                10         0.65           100   1
                40         0.65           100   1
                50         0.65           100   1
                50         0.62           100   1
                150        0.52           100   1
                150        0.37           100   1
                150        0.22           100   1
                200        0.09           100   1
                200        0.07           100   1
                200        0.07           100   1
                300        0.04           100   1
                500        0.01           100   1
                500        0              100   1
                500        0              100   1
                500        0              100   1
                500        0              100   1
              Solute UREA: InitialValuesUnits=kg/ha; WaterTableConcentration=0; D0=0; DepthConstant=0; MaxDepthSoluteAccessible=0; RunoffEffectivenessAtMovingSolute=0; MaxEffectiveRunoff=0
                Thickness  InitialValues  Exco  FIP
                10         0              0     1
                40         0              0     1
                50         0              0     1
                50         0              0     1
                150        0              0     1
                150        0              0     1
                150        0              0     1
                200        0              0     1
                200        0              0     1
                200        0              0     1
                300        0              0     1
                500        0              0     1
                500        0              0     1
                500        0              0     1
                500        0              0     1
                500        0              0     1
              Organic: FOMCNRatio=45; CarbonUnits=Total
                Thickness  Carbon  SoilCNRatio  FBiom  FInert  FOM
                10         1.31    13           0.215  0.42    119.823
                40         1.31    13           0.204  0.42    116.282
                50         1.31    13           0.111  0.42    112.002
                50         1.25    13           0.079  0.42    107.88
                150        1.05    13           0.054  0.512   96.401
                150        0.75    13           0.038  0.803   86.144
                150        0.45    13           0.031  0.825   76.978
                200        0.17    13           0.025  0.852   66.255
                200        0.15    13           0.021  0.882   57.027
                200        0.14    13           0.019  0.912   49.083
                300        0.08    13           0.016  0.949   39.194
                500        0.02    13           0.014  0.999   26.937
                500        0       13           0.012  0.999   18.514
                500        0       13           0.01   0.999   12.724
                500        0       13           0.009  0.999   8.745
                500        0       13           0.008  0.999   6.011
              Chemical: PHUnits=Water
                Thickness  PH    CEC
                10         7.73  17.2096
                40         7.73  17.2096
                50         7.73  17.2096
                50         7.74  17.3681
                150        7.78  17.9387
                150        7.83  18.7913
                150        7.89  19.6372
                200        7.96  20.2011
                200        8.08  19.3549
                200        8.21  18.3444
                300        8.37  16.9677
                500        8.47  16.065
                500        8.47  16.02
                500        8.47  16.02
                500        8.47  16.02
                500        8.47  16.02
                CEC source: Calculated
              Water: FilledFromTop=false
                Thickness=[10, 40, 50, 50, 150, 150, 150, 200, 200, 200, 300, 500, 500, 500, 500, 500, 500]
                InitialValues=[0.421, 0.421, 0.421, 0.427, 0.445, 0.471, 0.495, 0.514, 0.503, 0.491, 0.476, 0.467, 0.467, 0.467, 0.467, 0.467, 0.467]
              Nutrient
              SoilTemperature Temperature: InteractionsPerDay=8
            Irrigation
            Manager DumpWater
              ApplicationAmount = 100
```csharp
using System;
using Models.Core;
using Models.Interfaces;
using Models.PMF;
using APSIM.Shared.Utilities;

namespace Models
{
    [Serializable]
    public class Script : Model
    {
        [Link] IClock Clock;
        [Link] ISummary Summary;
        [Link] Irrigation Irrigation;
        
        [Description("Ammount of water to dump (mm).")]
        public double ApplicationAmount { get; set; }
        
        public bool Dump { get; set;} = false;

        [EventSubscribe("DoManagement")]
        private void DoDailyCalculations(object sender, EventArgs e)
        {
            if (!Dump)
                return;
            Irrigation.Apply(ApplicationAmount);
        }
    }
}
```
            Operations WL
            Manager SWIMSetSurfaceBC
              SurfaceBCType = PowerFunction
              MinimumSurfaceStorage = 10
              MaximumSurfaceStorage = 50
              InitialSurfaceStorage = 15
              PrecipitationConstant = 150
              RunoffRateFactor = 0.2
              RunoffRatePower = 2
```csharp
using Models.Climate;
using APSIM.Shared.Utilities;
using Models.Soils.Nutrients;
using Models.Soils;
using Models.PMF;
using Models.Core;
using System.Xml.Serialization;
using System;
using System.Linq;
using Models.AgPasture;
using Models.Interfaces;

namespace Models
{
    [Serializable] 
    [System.Xml.Serialization.XmlInclude(typeof(Model))]
    public class Script : Model
    {
        [Link] ISummary summary;
        [Link] private Swim3 swim;
        
        public enum SurfaceBCOptions { CurveNumber, PowerFunction };

        [Separator("Sets SWIMs surface boundary condition to either a curve number approach or a power function.")]
        

        [Description("What surface boundary condition?")] 
        public SurfaceBCOptions SurfaceBCType { get; set; }

        [Description("Minimum surface storage (mm):")] 
        [Display(EnabledCallback = "IsPowerFunction")] 
        public double MinimumSurfaceStorage { get; set; }

        [Description("Maximum surface storage (mm):")] 
        [Display(EnabledCallback = "IsPowerFunction")] 
        public double MaximumSurfaceStorage { get; set; }

        [Description("Initial surface storage (mm):")] 
        [Display(EnabledCallback = "IsPowerFunction")] 
        public double InitialSurfaceStorage { get; set; }

        [Description("Precipitation constant:")] 
        [Display(EnabledCallback = "IsPowerFunction")] 
        public double PrecipitationConstant { get; set; }

        [Description("Runoff rate factor:")] 
        [Display(EnabledCallback = "IsPowerFunction")] 
        public double RunoffRateFactor { get; set; }

        [Description("Runoff rate power:")] 
        [Display(EnabledCallback = "IsPowerFunction")] 
        public double RunoffRatePower { get; set; }

        /// <summary></summary>
        public bool IsPowerFunction => SurfaceBCType == SurfaceBCOptions.PowerFunction;


        [EventSubscribe("StartOfSimulation")]
        private void DoDailyInitialisation(object sender, EventArgs e)
        {
            summary.WriteMessage(this, "Script is setting surface boundary condition to " + SurfaceBCType, MessageType.Diagnostic);
            if (SurfaceBCType == SurfaceBCOptions.CurveNumber)
                swim.SetSurfaceBCForCurveNumber();
            else if (SurfaceBCType == SurfaceBCOptions.PowerFunction)
                swim.SetSurfaceBCForPowerFunction(minimumSurfaceStorage: 10, 
                                                    maximumSurfaceStorage: 20, 
                                                     initialSurfaceStorage: 15, 
                                                     precipitationConstant: 50, 
                                                     runoffRateFactor: 0.2, 
                                                     runoffRatePower: 2);
        }
    }
}
```
            Manager SWIMSetLowerBC
              LowerBCType = watertable
              LowerBCValue = 3000
```csharp
using Models.Climate;
using APSIM.Shared.Utilities;
using Models.Soils.Nutrients;
using Models.Soils;
using Models.PMF;
using Models.Core;
using System.Xml.Serialization;
using System;
using System.Linq;
using Models.AgPasture;
using Models.Interfaces;

namespace Models
{
    [Serializable] 
    [System.Xml.Serialization.XmlInclude(typeof(Model))]
    public class Script : Model
    {
        [Link] Clock clock;
        [Link] ISummary summary;
        [Link] private Swim3 swim;
        //[Link] private PastureSpecies ryegrass;
        //[Link] private SimpleGrazing grazing;
        
        public enum LowerBCTypeOptions {gradient,seepage,potential,watertable};

        [Separator("Sets the lower boundary condition type (and value if set to 'potential' for SWIM3. The change is applied at the beginning of the first day of the simulation.")]
        
        [Description("What lower boundary condition is wanted?")] public LowerBCTypeOptions LowerBCType { get; set; }


        [Display(VisibleCallback = "IsBCPotentialOrWater")]
        [Description("What should the lower BC potential be set to (should be positive for a watertable) (mm)?")] public double LowerBCValue { get; set; }
        
        public bool IsBCPotentialOrWater => LowerBCType == LowerBCTypeOptions.potential || LowerBCType == LowerBCTypeOptions.watertable;





        public double SoilWaterStart  { get; set; }
        public double SoilWaterEnd  { get; set; }

        [EventSubscribe("DoDailyInitialisation")]
        private void DoDailyInitialisation(object sender, EventArgs e)
        {
        }

        [EventSubscribe("DoReportCalculations")]
        private void DoReportCalculations(object sender, EventArgs e)
        {
        }

        [EventSubscribe("DoManagement")]
        private void DoDailyCalculations(object sender, EventArgs e)
        {
            if (clock.Today == clock.StartDate)
            {
                summary.WriteMessage(this, "Script is setting lower boundary condition to " + LowerBCType, MessageType.Diagnostic);
                if (LowerBCType == LowerBCTypeOptions.gradient)
                    swim.SetLowerBCForGradient(bbcGradient: 0.0);   // in cm/cm (ibbc=0) Note that this is the default setting
                else if (LowerBCType == LowerBCTypeOptions.potential)
                    swim.SetLowerBCForGivenPotential(bbcPotential: LowerBCValue /10.0 );    //  convert to cm (ibbc=1), DUL is -100 cm so values more positive will often result in inflow to the bottom of the soil profile. Input in mm so divide here.
                else if (LowerBCType == LowerBCTypeOptions.seepage)
                    swim.SetLowerBCForSeepage(bbcPotentialSeepage: 0.0);  // in cm (ibbc=3). This is for zero-tension lysimeters
                else if (LowerBCType == LowerBCTypeOptions.watertable)
                    swim.SetLowerBCForSeepage(LowerBCValue / 10.0);  // in cm (ibbc=4). This is for water tables
                else
                    throw new Exception("Wrong lower boundary condition type");
            }
        }
    }
}
```
            Report Report_Day: EventNames=[Clock].DoReport
              VariableNames:
                [Clock].Today
                [Soybean].Grain.Wt * 10 * 1.15 as Yield_kgha
                [Soybean].Grain.Wt * 10 * 0.0149/0.85 as Yield_buac
                [Soybean].AboveGround.Wt * 10 as Biomass_kgha
                [Soybean].AboveGround.N * 10 as BiomassN_kgha
                [Soybean].LAI
                Divide (GrainN_kgha, Yield_kgha)*100 as GrainN_conc
                Divide (StoverN_kgha, StoverDM_kgha)*100 as StoverN_conc
                [Soybean].Population
                [Soybean].Grain.Size * 1000 as GrainSize_mg
                [Soybean].Grain.Number as GrainNumber_m2
                sum([Soil].NO3.kgha[1:5]) as NO3_0to30cm
                sum of [Fertiliser].NitrogenApplied from [Soybean].Sowing to [Soybean].Harvesting as N_fertilizer
                sum of sum([Soil].Nutrient.MineralisedN + [SurfaceOrganicMatter].SurfaceResidue.Decomposition.MineralisedN) from [Soybean].Sowing to [Soybean].Harvesting as GS_NetNMineralization
                sum of [Irrigation].IrrigationApplied from [Soybean].Sowing to [Soybean].Harvesting as TotalIrrigation
                [Structure].FinalLeafNumber
                [Structure].AllLeavesAppeared
                [Soybean].Phenology.CurrentStageName
                [Weather].MaxT
                [Weather].MinT
                [Weather].Radn
                [Weather].Rain
                [Leaf].Photosynthesis.FW.Excess.PersistentReduction
                [Leaf].Photosynthesis.FW.Excess.Today
                [Leaf].Transpiration
                [Soybean].Leaf.Photosynthesis.FW.Deficient
                [Soybean].CumulativeExcessWaterStress
                [Root].WetRootFraction
                [Root].Depth
                [Swim3].SW[1]
                [Swim3].SW[3]
                [Swim3].Es
                [Swim3].WaterTable
                [Leaf].Photosynthesis.RueAct
                [Swim3].Pond
                [Swim3].Runoff
                [Swim3].Drainage
                [Swim3].SubsurfaceDrain
                [Irrigation].IrrigationApplied
                [Leaf].Transpiration + [Swim3].Es as evapotranspiration
                ((sum([Swim3].SWmm) - sum([Soil].Physical.LL15mm)) / (sum([Soil].Physical.SATmm) -  sum([Soil].Physical.LL15mm))) as SWRatio
            Report Report_Harvest: EventNames=[Maize].Harvesting
              VariableNames:
                [Clock].Today.Year as Year
                [Soybean].SowingDate as SowingDate
                [Soybean].Phenology.FloweringDAS as DTF
                [Soybean].Phenology.MaturityDAS as DTM
                [Soybean].Grain.Wt * 10 as Yield_kgha
                [Soybean].Grain.N * 10 as GrainN_kgha
                [Soybean].Grain.Wt * 10 * 0.0159/0.85 as Yield_buac
                [Soybean].Grain.Wt/([Soybean].AboveGround.Wt+0.00001) as HI
                [Soybean].Grain.N/([Soybean].AboveGround.N+0.00001) as NHI
                [Soybean].AboveGround.Wt * 10 as Biomass_kgha
                [Soybean].AboveGround.N * 10 as BiomassN_kgha
                (([Soybean].AboveGround.Wt) - ([Soybean].Grain.Wt))*10 as StoverDM_kgha
                (([Soybean].AboveGround.N) - ([Soybean].Grain.N))*10 as StoverN_kgha
                [Soybean].LAI
                Divide (GrainN_kgha, Yield_kgha)*100 as GrainN_conc
                Divide (StoverN_kgha, StoverDM_kgha)*100 as StoverN_conc
                [Soybean].Population
                [Soybean].Grain.Size * 1000 as GrainSize_mg
                [Soybean].Grain.Number as GrainNumber_m2
                sum([Soil].NO3.kgha[1:5]) as NO3_harvest_0to30cm
                sum([Soil].NO3.kgha[6:11]) as NO3_harvest_30to150cm
                //sum of [Swim].FlowNO3[11] from [Soybean].Sowing to [Soybean].Harvesting as GS_leaching_150cm
                [NO3].Flow[11] from [Soybean].Sowing to [Soybean].Harvesting as GS_leaching_150cm
                sum of sum([Soil].Nutrient.N2Oatm) from [Soybean].Sowing to [Soybean].Harvesting as GS_N20
                sum of sum([Soil].Nutrient.DenitrifiedN) from [Soybean].Sowing to [Soybean].Harvesting as GS_Denitrification
                sum of [Fertiliser].NitrogenApplied from [Soybean].Sowing to [Soybean].Harvesting as N_fertilizer
                sum of sum([Soil].Nutrient.MineralisedN + [SurfaceOrganicMatter].SurfaceResidue.Decomposition.MineralisedN) from [Soybean].Sowing to [Soybean].Harvesting as GS_NetNMineralization
                sum of [Irrigation].IrrigationApplied from [Soybean].Sowing to [Soybean].Harvesting as TotalIrrigation
                [Structure].FinalLeafNumber
                [Structure].AllLeavesAppeared
                //[Soybean].Grain.NConc as GrainN_conc  not working at harvest
          SoilArbitrator
          MicroClimate: a_interception=0; b_interception=1; c_interception=0; d_interception=0; SoilHeatFluxFraction=0.4; MinimumHeightDiffForNewLayer=0; NightInterceptionFraction=0.5; ReferenceHeight=2
      Experiment Keiser1987b
        Factors
          Factor _: Specification=[WL]
            Operations V4_2d: same as USA.Arkansas.Keiser1987a.Factors._.V4_2d
            Operations V4_4d: same as USA.Arkansas.Keiser1987a.Factors._.V4_4d
            Operations V4_7d: same as USA.Arkansas.Keiser1987a.Factors._.V4_7d
            Operations V4_14d: same as USA.Arkansas.Keiser1987a.Factors._.V4_14d
            Operations R2_2d
              1987-08-07  [SwimSubsurfaceDrain].Open = false
              1987-08-07  [DumpWater].Script.Dump = true
              1987-08-10  [SwimSubsurfaceDrain].Open = true
              1987-08-10  [DumpWater].Script.Dump = false
            Operations R2_4d: same as USA.Arkansas.Keiser1987b.Factors._.R2_2d
            Operations R2_7d: same as USA.Arkansas.Keiser1987a.Factors._.R2_7d
            Operations R2_14d: same as USA.Arkansas.Keiser1987a.Factors._.R2_14d
        Simulation Base_Exp2
          Clock: Start=1987-01-01; End=1987-12-12
          Weather: FileName=ScottNEREC1987.met
          Summary summaryfile
          Zone Field: Area=1; Slope=0; AspectAngle=0; Altitude=50
            Manager Sow on a fixed date
              Crop = [soybean]
              SowDate = 01-Jun
              CultivarName = MG4_Oxdef
              SowingDepth = 30
              RowSpacing = 960
              Population = 50
              script: same as in USA.Arkansas.Keiser1987a.Base_Exp1.Field.Sow on a fixed date
            Soil Crowley Soil: SoilType=RIC_Dewitt_3A; Region=RIC_Dewitt_3A; State=IL; Country=USA; ApsoilNumber=1; Latitude=0; Longitude=0; DataSource=ssurgo2apsim; Comments=None
              Physical
                Thickness  ParticleSizeSand  ParticleSizeSilt  ParticleSizeClay  Rocks  BD     AirDry  LL15   DUL    SAT    KS
                50         27.1              54.4              18.5              0      1.37   0.06    0.12   0.285  0.48   302
                50         27.1              54.4              18.5              0      1.37   0.06    0.12   0.285  0.48   302
                50         27.4              54.5              18.1              0      1.37   0.059   0.118  0.282  0.48   302
                150        28.5              54.6              16.9              0      1.37   0.088   0.11   0.31   0.48   104
                150        29.4              54.9              15.7              0      1.37   0.101   0.101  0.32   0.48   104
                150        20                35                45                0      1.346  0.15    0.15   0.36   0.482  104
                200        15                37                48                0      1.328  0.18    0.18   0.37   0.499  104
                200        12                48                40                0      1.365  0.25    0.25   0.391  0.485  58
                200        10                52                38                0      1.386  0.26    0.26   0.386  0.475  58
                300        7.8               54.2              38                0      1.386  0.255   0.255  0.385  0.473  58
                250        7.4               52.6              40                0      1.376  0.25    0.25   0.384  0.472  50
                250        7.4               50.6              42                0      1.36   0.25    0.25   0.383  0.47   50
                250        7.4               47.6              45                0      1.333  0.25    0.25   0.382  0.468  47
                250        7.4               47.6              45                0      1.334  0.25    0.25   0.381  0.465  47
                250        7.4               47.6              45                0      1.334  0.25    0.25   0.379  0.465  47
                250        7.4               47.6              45                0      1.334  0.25    0.25   0.378  0.465  47
                250        7.4               47.6              45                0      1.334  0.25    0.25   0.378  0.465  47
                250        7.4               47.6              45                0      1.334  0.25    0.25   0.378  0.465  47
                250        7.4               47.6              45                0      1.334  0.25    0.25   0.378  0.465  47
                250        7.4               47.6              45                0      1.334  0.25    0.25   0.378  0.465  47
                Rocks source: Calculated
                SoilCrop MaizeSoil
                  LL=[0.12, 0.12, 0.118, 0.11, 0.143, 0.22, 0.25, 0.26, 0.339, 0.346, 0.357, 0.364, 0.37, 0.37, 0.37, 0.37, 0.37, 0.37, 0.37, 0.37]
                  KL=[0.08, 0.08, 0.08, 0.08, 0.08, 0.08, 0.08, 0.08, 0.08, 0.04, 0.04, 0.03, 0.02, 0.02, 0.01, 0.01, 0.01, 0, 0, 0]
                  XF=[1, 1, 1, 0.9, 0.8, 0.7, 0.6, 0.5, 0.5, 0.6, 0.7, 0.4, 0.4, 0.4, 0, 0, 0, 0, 0, 0]
                SoilCrop SoybeanSoil
                  LL=[0.12, 0.12, 0.118, 0.11, 0.101, 0.15, 0.18, 0.25, 0.26, 0.255, 0.25, 0.25, 0.25, 0.25, 0.25, 0.25, 0.25, 0.25, 0.25, 0.25]
                  KL=[0.08, 0.08, 0.08, 0.08, 0.08, 0.08, 0.08, 0.08, 0.08, 0.04, 0.04, 0.03, 0.02, 0.02, 0.01, 0.01, 0.01, 0, 0, 0]
                  XF=[1, 1, 1, 1, 1, 1, 1, 1, 1, 1, 0.4, 0.4, 0.4, 0.4, 0, 0, 0, 0, 0, 0]
              Swim3 Swim: hydrol_effective_depth=450; hydrol_effective_exponent=4.16; Salb=0.15; CN2Bare=73; CNRed=20; CNCov=0.8; KDul=0.3; PSIDul=-250; VC=true; DTMin=0; DTMax=1440; MaxWaterIncrement=10; SpaceWeightingFactor=0; SoluteSpaceWeightingFactor=0; Dis=15; Disp=1; A=1; DTHC=0; DTHP=1; vcon1=7.28e-09; vcon2=7.26e-07; eo_time=06:00; eo_durn=720; default_rain_time=00:00; default_rain_duration=720; Diagnostics=false
                SwimSubsurfaceDrain: DrainDepth=1190; DrainSpacing=18000; DrainRadius=100; Klat=250; ImpermDepth=3900; Open=true
              Solute NO3: InitialValuesUnits=ppm; WaterTableConcentration=0; D0=0; DepthConstant=0; MaxDepthSoluteAccessible=0; RunoffEffectivenessAtMovingSolute=0; MaxEffectiveRunoff=0
                Thickness  InitialValues  Exco  FIP
                50         1.02           0     1
                50         1.02           0     1
                50         0.96           0     1
                150        0.75           0     1
                150        0.47           0     1
                150        0.44           0     1
                200        0.44           0     1
                200        0.44           0     1
                200        0.44           0     1
                300        0.27           0     1
                250        0.1            0     1
                250        0.04           0     1
                250        0.02           0     1
                250        0.01           0     1
                250        0              0     1
                250        0              0     1
                250        0              0     1
                250        0              0     1
                250        0              0     1
                250        0              0     1
              Solute NH4: InitialValuesUnits=ppm; WaterTableConcentration=0; D0=0; DepthConstant=0; MaxDepthSoluteAccessible=0; RunoffEffectivenessAtMovingSolute=0; MaxEffectiveRunoff=0
                Thickness  InitialValues  Exco  FIP
                50         0.51           100   1
                50         0.51           100   1
                50         0.48           100   1
                150        0.37           100   1
                150        0.24           100   1
                150        0.22           100   1
                200        0.22           100   1
                200        0.22           100   1
                200        0.22           100   1
                300        0.13           100   1
                250        0.05           100   1
                250        0.02           100   1
                250        0.01           100   1
                250        0              100   1
                250        0              100   1
                250        0              100   1
                250        0              100   1
                250        0              100   1
                250        0              100   1
                250        0              100   1
              Solute UREA: InitialValuesUnits=kg/ha; WaterTableConcentration=0; D0=0; DepthConstant=0; MaxDepthSoluteAccessible=0; RunoffEffectivenessAtMovingSolute=0; MaxEffectiveRunoff=0
                Thickness  InitialValues  Exco  FIP
                50         0              0     1
                50         0              0     1
                50         0              0     1
                150        0              0     1
                150        0              0     1
                150        0              0     1
                200        0              0     1
                200        0              0     1
                200        0              0     1
                300        0              0     1
                250        0              0     1
                250        0              0     1
                250        0              0     1
                250        0              0     1
                250        0              0     1
                250        0              0     1
                250        0              0     1
                250        0              0     1
                250        0              0     1
                250        0              0     1
              Organic: FOMCNRatio=45; CarbonUnits=Total
                Thickness  Carbon  SoilCNRatio  FBiom  FInert  FOM
                50         1.02    13           0.08   0.365   144.759784
                50         1.02    13           0.08   0.365   140.482
                50         0.96    13           0.071  0.365   132.3
                150        0.75    13           0.042  0.447   117.34
                150        0.47    13           0.028  0.699   104.071
                150        0.44    13           0.022  0.826   86.9275
                200        0.44    13           0.02   0.852   72.6079
                200        0.44    13           0.02   0.844   60.647
                200        0.44    13           0.02   0.856   50.6566829
                300        0.27    13           0.02   0.885   42.3122
                250        0.1     13           0.02   0.999   35.3423
                250        0.04    13           0.02   0.999   7.56983
                250        0.02    13           0.02   0.999   1.89246
                250        0.01    13           0.02   0.999   1.26164
                250        0.01    13           0.02   0.999   0.946229
                250        0.01    13           0.02   0.999   0.630819
                250        0.01    13           0      0.999   0.0630819
                250        0.01    13           0      0.999   0.0630819
                250        0.01    13           0      0.999   0.0630819
                250        0.01    13           0      0.999   0.0630819
              Chemical: PHUnits=Water
                Thickness=[50, 50, 50, 150, 150, 150, 200, 200, 200, 300, 250, 250, 250, 250, 250, 250, 250, 250, 250, 250]
                PH=[6.14, 6.2, 6.3, 6.4, 6.5, 6.7, 6.8, 7, 7.3, 7.4, 7.5, 7.6, 7.7, 7.8, 7.8, 7.8, 7.8, 7.8, 7.8, 7.8]
              Water: FilledFromTop=false
                Thickness=[50, 50, 50, 150, 150, 150, 200, 200, 200, 300, 250, 250, 250, 250, 250, 250, 250, 250, 250, 250]
                InitialValues=[0.285, 0.285, 0.282, 0.31, 0.32, 0.36, 0.37, 0.391, 0.386, 0.385, 0.384, 0.383, 0.382, 0.381, 0.379, 0.378, 0.378, 0.378, 0.378, 0.378]
              Nutrient
              SoilTemperature Temperature: InteractionsPerDay=8
            Manager Harvesting: same as USA.Arkansas.Keiser1987a.Base_Exp1.Field.Harvesting
            SurfaceOrganicMatter: InitialResidueName=maize; InitialResidueType=maize; InitialResidueMass=1000; InitialStandingFraction=0; InitialCPR=0; InitialCNR=73
            Report Report_Day: EventNames=[Clock].DoReport
            Manager SWIMInitWt: same as USA.Arkansas.Keiser1987a.Base_Exp1.Field.SWIMInitWt
            Plant soybean: ResourceName=Soybean
            Irrigation
            Report Report_Harvest: VariableNames=[Clock].Today as Date; EventNames=[Soybean].Harvesting
            Manager SWIMSetSurfaceBC: same as USA.Arkansas.Keiser1987a.Base_Exp1.Field.SWIMSetSurfaceBC
            Manager SWIMSetLowerBC: same as USA.Arkansas.Keiser1987a.Base_Exp1.Field.SWIMSetLowerBC
            Manager DumpWater: same as USA.Arkansas.Keiser1987a.Base_Exp1.Field.DumpWater
            Operations WL
          SoilArbitrator
          MicroClimate: a_interception=0; b_interception=1; c_interception=0; d_interception=0; SoilHeatFluxFraction=0.4; MinimumHeightDiffForNewLayer=0; NightInterceptionFraction=0.5; ReferenceHeight=2
      Experiment Keiser1989
        Factors
          Factor _: Specification=[WL]
            Operations Control
            Operations V1_7d
              1989-06-13  [SwimSubsurfaceDrain].Open = false
              1989-06-13  [DumpWater].Script.Dump = true
              1989-06-21  [SwimSubsurfaceDrain].Open = true
              1989-06-21  [DumpWater].Script.Dump = false
            Operations V4_7d
              1989-06-24  [SwimSubsurfaceDrain].Open = false
              1989-06-24  [DumpWater].Script.Dump = true
              1989-07-02  [SwimSubsurfaceDrain].Open = true
              1989-07-02  [DumpWater].Script.Dump = false
            Operations R2_7d
              1989-08-01  [SwimSubsurfaceDrain].Open = false
              1989-08-01  [DumpWater].Script.Dump = true
              1989-08-09  [SwimSubsurfaceDrain].Open = true
              1989-08-09  [DumpWater].Script.Dump = false
        Simulation Base_Exp3
          Clock: Start=1989-01-01; End=1989-12-12
          Weather: FileName=1989ScottNREC.met
          Summary summaryfile
          Zone paddock: Area=1; Slope=0; AspectAngle=0; Altitude=50
            Manager Sow on a fixed date
              Crop = [soybean]
              SowDate = 03-Jun
              CultivarName = MG4_1989
              SowingDepth = 75
              RowSpacing = 960
              Population = 20
              script: same as in USA.Arkansas.Keiser1987a.Base_Exp1.Field.Sow on a fixed date
            Manager Harvesting: same as USA.Arkansas.Keiser1987a.Base_Exp1.Field.Harvesting
            SurfaceOrganicMatter: InitialResidueName=maize; InitialResidueType=maize; InitialResidueMass=1000; InitialStandingFraction=0; InitialCPR=0; InitialCNR=73
            Report Report_Day: EventNames=[Clock].DoReport
            Manager SWIMInitWt: same as USA.Arkansas.Keiser1987a.Base_Exp1.Field.SWIMInitWt
            Plant soybean: ResourceName=Soybean
            Soil NER_Sharkey_Sm: same as USA.Arkansas.Keiser1987a.Base_Exp1.Field.NER_Sharkey_Sm
            Irrigation
            Report Report_Harvest: VariableNames=[Clock].Today as Date; EventNames=[Soybean].Harvesting
            Manager SWIMSetSurfaceBC: same as USA.Arkansas.Keiser1987a.Base_Exp1.Field.SWIMSetSurfaceBC
            Manager DumpWater
              ApplicationAmount = 50
              script: same as in USA.Arkansas.Keiser1987a.Base_Exp1.Field.DumpWater
            Manager SWIMSetLowerBC: same as USA.Arkansas.Keiser1987a.Base_Exp1.Field.SWIMSetLowerBC
            Operations WL
          SoilArbitrator
          MicroClimate: a_interception=0; b_interception=1; c_interception=0; d_interception=0; SoilHeatFluxFraction=0.4; MinimumHeightDiffForNewLayer=0; NightInterceptionFraction=0.5; ReferenceHeight=2
    Folder Missouri
      Experiment Hayward2003Timing
        Factors
          Factor _: Specification=[WL]
            Operations Control
            Operations V5_8d
              2003-05-26  [SwimSubsurfaceDrain].Open = false
              2003-05-26  [DumpWater].Script.Dump = true
              2003-06-04  [SwimSubsurfaceDrain].Open = true
              2003-06-04  [DumpWater].Script.Dump = false
              2004-05-25  [SwimSubsurfaceDrain].Open = false
              2004-05-25  [DumpWater].Script.Dump = true
              2004-06-03  [SwimSubsurfaceDrain].Open = true
              2004-06-03  [DumpWater].Script.Dump = false
            Operations R2_8d
              2003-07-05  [SwimSubsurfaceDrain].Open = false
              2003-07-05  [DumpWater].Script.Dump = true
              2003-07-13  [SwimSubsurfaceDrain].Open = true
              2003-07-13  [DumpWater].Script.Dump = false
              2004-07-05  [SwimSubsurfaceDrain].Open = false
              2004-07-05  [DumpWater].Script.Dump = true
              2004-07-13  [SwimSubsurfaceDrain].Open = true
              2004-07-13  [DumpWater].Script.Dump = false
            Operations R5_8d
              2003-08-05  [SwimSubsurfaceDrain].Open = false
              2003-08-05  [DumpWater].Script.Dump = true
              2003-08-15  [SwimSubsurfaceDrain].Open = true
              2003-08-15  [DumpWater].Script.Dump = false
              2004-08-05  [SwimSubsurfaceDrain].Open = false
              2004-08-05  [DumpWater].Script.Dump = true
              2004-08-15  [SwimSubsurfaceDrain].Open = true
              2004-08-15  [DumpWater].Script.Dump = false
        Simulation Base_Exp4
          Clock: Start=2003-01-01; End=2004-12-12
          Weather: FileName=RhineMissouri2002-04.met
          Summary summaryfile
          Zone paddock: Area=1; Slope=0; AspectAngle=0; Altitude=50
            Manager Sow on a fixed date
              Crop = [soybean]
              SowDate = 05-May
              CultivarName = MG4_Rhine
              SowingDepth = 30
              RowSpacing = 960
              Population = 41
              script: same as in USA.Arkansas.Keiser1987a.Base_Exp1.Field.Sow on a fixed date
            Manager Harvesting: same as USA.Arkansas.Keiser1987a.Base_Exp1.Field.Harvesting
            SurfaceOrganicMatter: InitialResidueName=maize; InitialResidueType=maize; InitialResidueMass=1000; InitialStandingFraction=0; InitialCPR=0; InitialCNR=45
            Report Report_Day: EventNames=[Clock].DoReport
            Manager SWIMInitWt
              WTDepth = 2000
              script: same as in USA.Arkansas.Keiser1987a.Base_Exp1.Field.SWIMInitWt
            Plant soybean: ResourceName=Soybean
            Soil NER_Sharkey_Sm: SoilType=NER_Sharkey_Sm; Region=NER_Sharkey_Sm; State=IL; Country=USA; ApsoilNumber=1; Latitude=0; Longitude=0; DataSource=ssurgo2apsim; Comments=None
              Physical: same as USA.Arkansas.Keiser1987a.Base_Exp1.Field.NER_Sharkey_Sm.Physical
              Swim3 Swim: hydrol_effective_depth=450; hydrol_effective_exponent=4.16; Salb=0.15; CN2Bare=66; CNRed=20; CNCov=0.8; KDul=0.25; PSIDul=-250; VC=true; DTMin=0; DTMax=1440; MaxWaterIncrement=5; SpaceWeightingFactor=0; SoluteSpaceWeightingFactor=0; Dis=0; Disp=0; A=0; DTHC=0; DTHP=0; vcon1=7.28e-09; vcon2=7.26e-07; eo_time=06:00; eo_durn=720; default_rain_time=00:00; default_rain_duration=720; Diagnostics=false
                SwimSubsurfaceDrain: DrainDepth=1190; DrainSpacing=18000; DrainRadius=100; Klat=250; ImpermDepth=3900; Open=true
              Solute NO3: same as USA.Arkansas.Keiser1987a.Base_Exp1.Field.NER_Sharkey_Sm.NO3
              Solute NH4: same as USA.Arkansas.Keiser1987a.Base_Exp1.Field.NER_Sharkey_Sm.NH4
              Solute UREA: same as USA.Arkansas.Keiser1987a.Base_Exp1.Field.NER_Sharkey_Sm.UREA
              Organic: same as USA.Arkansas.Keiser1987a.Base_Exp1.Field.NER_Sharkey_Sm.Organic
              Chemical: same as USA.Arkansas.Keiser1987a.Base_Exp1.Field.NER_Sharkey_Sm.Chemical
              Water: FilledFromTop=false
                Thickness=[10, 40, 50, 50, 150, 150, 150, 200, 200, 200, 300, 500, 500, 500, 500, 500, 500]
                InitialValues=[0.421, 0.421, 0.421, 0.427, 0.445, 0.471, 0.495, 0.514, 0.503, 0.491, 0.476, 0.467, 0.467, 0.467, 0.467, 0.467, 0.467]
              Nutrient
              SoilTemperature Temperature: InteractionsPerDay=8
            Irrigation
            Report Report_Harvest: VariableNames=[Clock].Today as Date; EventNames=[Soybean].Harvesting
            Manager SWIMSetSurfaceBC: same as USA.Arkansas.Keiser1987a.Base_Exp1.Field.SWIMSetSurfaceBC
            Manager DumpWater: same as USA.Arkansas.Keiser1987a.Base_Exp1.Field.DumpWater
            Operations WL
            Manager SWIMSetLowerBC: same as USA.Arkansas.Keiser1987a.Base_Exp1.Field.SWIMSetLowerBC
            Manager Reset on date
              ResetDate = 1-Jan
              OffsetDays = 0
              ResetWater = False
              ResetNutrients = True
              ResetSOM = True
```csharp
using Models.Soils.Nutrients;
using APSIM.Shared.Utilities;
using Models.Surface;
using Models.Utilities;
using Models.Soils.Nutrients;
using Models.Soils;
using Models.PMF;
using Models.Core;
using System;
using System.Linq;
using Models.Interfaces;

namespace Models
{
    [Serializable]
    public class Script : Model
    {
        [Link] private Clock Clock;
        [Link] private Plant Wheat;
        [Link] private ISoilWater SoilWater;
        [Link] private Nutrient nutrient;
        [Link] private SurfaceOrganicMatter SOM;
        [Link] private Summary Summary;

        [Description("Date to reset on:")]
        public string ResetDate {get;set;}
        
        [Description("Offset by Days (Negative is Days Before, Positive is Days After):")]
        public int OffsetDays {get;set;}

        [Description("Reset Water?")]
        public bool ResetWater {get;set;}

        [Description("Reset Soil Nutrients?")]
        public bool ResetNutrients {get;set;}

        [Description("Reset Surface Organic Matter?")]
        public bool ResetSOM {get;set;}

        [EventSubscribe("DoManagement")]
        private void OnDoManagement(object sender, EventArgs e)
        {
            DateTime offsetDate = DateUtilities.GetDate(ResetDate, Clock.Today).AddDays(OffsetDays);
            if (offsetDate.Equals(Clock.Today))
            {
                if (ResetWater)
                {
                    Summary.WriteMessage(this, "Reset Water", MessageType.Diagnostic);
                    SoilWater.Reset();
                }
                if (ResetNutrients)
                {
                    Summary.WriteMessage(this, "Reset Nitrogen", MessageType.Diagnostic);
                    nutrient.Reset();
                }
                if (ResetSOM)
                {
                    Summary.WriteMessage(this, "Reset Surface OM", MessageType.Diagnostic);
                    SOM.Reset();
                }
            }
        }
    }
}
```
          SoilArbitrator
          MicroClimate: a_interception=0; b_interception=1; c_interception=0; d_interception=0; SoilHeatFluxFraction=0.4; MinimumHeightDiffForNewLayer=0; NightInterceptionFraction=0.5; ReferenceHeight=2
      Experiment Hayward2003Duration
        Factors
          Factor _: Specification=[WL]
            Operations R2_0d
              2004-07-29  [SwimSubsurfaceDrain].Open = false
              2004-07-29  [DumpWater].Script.Dump = true
              2004-08-05  [SwimSubsurfaceDrain].Open = true
              2004-08-05  [DumpWater].Script.Dump = false
            Operations R2_2d
              2003-07-05  [SwimSubsurfaceDrain].Open = false
              2003-07-05  [DumpWater].Script.Dump = true
              2003-07-07  [SwimSubsurfaceDrain].Open = true
              2003-07-07  [DumpWater].Script.Dump = false
              2004-07-29  [SwimSubsurfaceDrain].Open = false
              2004-07-29  [DumpWater].Script.Dump = true
              2004-08-08  [SwimSubsurfaceDrain].Open = true
              2004-08-08  [DumpWater].Script.Dump = false
            Operations R2_4d
              2003-07-05  [SwimSubsurfaceDrain].Open = false
              2003-07-05  [DumpWater].Script.Dump = true
              2003-07-09  [SwimSubsurfaceDrain].Open = true
              2003-07-09  [DumpWater].Script.Dump = false
              2004-07-29  [SwimSubsurfaceDrain].Open = false
              2004-07-29  [DumpWater].Script.Dump = true
              2004-08-10  [SwimSubsurfaceDrain].Open = true
              2004-08-10  [DumpWater].Script.Dump = false
            Operations R2_6d
              2003-07-05  [SwimSubsurfaceDrain].Open = false
              2003-07-05  [DumpWater].Script.Dump = true
              2003-07-11  [SwimSubsurfaceDrain].Open = true
              2003-07-11  [DumpWater].Script.Dump = false
              2004-07-29  [SwimSubsurfaceDrain].Open = false
              2004-07-29  [DumpWater].Script.Dump = true
              2004-08-14  [SwimSubsurfaceDrain].Open = true
              2004-08-14  [DumpWater].Script.Dump = false
            Operations R2_8d
              2003-07-05  [SwimSubsurfaceDrain].Open = false
              2003-07-05  [DumpWater].Script.Dump = true
              2003-07-13  [SwimSubsurfaceDrain].Open = true
              2003-07-13  [DumpWater].Script.Dump = false
              2004-07-29  [SwimSubsurfaceDrain].Open = false
              2004-07-29  [DumpWater].Script.Dump = true
              2004-08-16  [SwimSubsurfaceDrain].Open = true
              2004-08-16  [DumpWater].Script.Dump = false
        Simulation Base_Exp5
          Clock: Start=2003-01-01; End=2003-12-12
          Weather: FileName=RhineMissouri2002-04.met
          Summary summaryfile
          Zone paddock: Area=1; Slope=0; AspectAngle=0; Altitude=50
            Manager Sow on a fixed date: same as USA.Missouri.Hayward2003Timing.Base_Exp4.paddock.Sow on a fixed date
            Manager Harvesting: same as USA.Arkansas.Keiser1987a.Base_Exp1.Field.Harvesting
            SurfaceOrganicMatter: InitialResidueName=maize; InitialResidueType=maize; InitialResidueMass=1000; InitialStandingFraction=0; InitialCPR=0; InitialCNR=45
            Report Report_Day: EventNames=[Clock].DoReport
            Manager SWIMInitWt: same as USA.Missouri.Hayward2003Timing.Base_Exp4.paddock.SWIMInitWt
            Plant soybean: ResourceName=Soybean
            Soil NER_Sharkey_Sm: same as USA.Arkansas.Keiser1987a.Base_Exp1.Field.NER_Sharkey_Sm
            Irrigation
            Report Report_Harvest: VariableNames=[Clock].Today as Date; EventNames=[Soybean].Harvesting
            Manager SWIMSetSurfaceBC: same as USA.Arkansas.Keiser1987a.Base_Exp1.Field.SWIMSetSurfaceBC
            Manager DumpWater: same as USA.Arkansas.Keiser1987a.Base_Exp1.Field.DumpWater
            Operations WL
            Manager SWIMSetLowerBC: same as USA.Arkansas.Keiser1987a.Base_Exp1.Field.SWIMSetLowerBC
            Manager Reset on date: same as USA.Missouri.Hayward2003Timing.Base_Exp4.paddock.Reset on date
          SoilArbitrator
          MicroClimate: a_interception=0; b_interception=1; c_interception=0; d_interception=0; SoilHeatFluxFraction=0.4; MinimumHeightDiffForNewLayer=0; NightInterceptionFraction=0.5; ReferenceHeight=2
    Folder Iowa
      Experiment Ames1977
        Factors
          Factor _: Specification=[WTBBC]
            Manager WT45_PreFlo
              StartDay = 174
              EndDay = 183
              WTBBC = 255
```csharp
using System;
using Models.Core;
using Models.Soils;
using Models.Interfaces;
using Models.PMF;
using APSIM.Shared.Utilities;

namespace Models;

[Serializable]
public class Script : Model
{
    [Link] IClock Clock;
    [Link] ISummary Summary;
    [Link] Swim3 swim;
    
    [Description("Start day of year")]
    public int StartDay { get; set; }
    
    [Description("End day of year")]
    public int EndDay { get; set; }
    
    [Description("WT BBC (Profile depth - WT depth) (cm)")]
    public double WTBBC { get; set; }
    

    [EventSubscribe("DoManagement")]
    private void DoDailyCalculations(object sender, EventArgs e)
    {
        if (Clock.Today.DayOfYear > StartDay && Clock.Today.DayOfYear < EndDay)
            swim.SetLowerBCForGivenPotential(WTBBC);
        else
            swim.SetLowerBCForGivenPotential(0);
    }
}
```
            Manager WT90_PreFlo
              StartDay = 174
              EndDay = 183
              WTBBC = 205
              script: same as in USA.Iowa.Ames1977.Factors._.WT45_PreFlo
            Manager WT45_PostFlo
              StartDay = 195
              EndDay = 204
              WTBBC = 255
              script: same as in USA.Iowa.Ames1977.Factors._.WT45_PreFlo
            Manager WT90_PostFlo
              StartDay = 195
              EndDay = 204
              WTBBC = 205
              script: same as in USA.Iowa.Ames1977.Factors._.WT45_PreFlo
            Manager WT45_PodSet
              StartDay = 221
              EndDay = 230
              WTBBC = 255
              script: same as in USA.Iowa.Ames1977.Factors._.WT45_PreFlo
            Manager WT90_PodSet
              StartDay = 221
              EndDay = 230
              WTBBC = 205
              script: same as in USA.Iowa.Ames1977.Factors._.WT45_PreFlo
        Simulation Base_Exp6
          Clock: Start=1977-01-01; End=1977-12-12
          Weather: FileName=Ames_1975_1979.met
          Summary summaryfile
          Zone paddock: Area=1; Slope=0; AspectAngle=0; Altitude=50
            Manager Sow on a fixed date
              Crop = [soybean]
              SowDate = 13-May
              CultivarName = MG3_Wayne_WL
              SowingDepth = 50
              RowSpacing = 760
              Population = 25
              script: same as in USA.Arkansas.Keiser1987a.Base_Exp1.Field.Sow on a fixed date
            Manager Harvesting: same as USA.Arkansas.Keiser1987a.Base_Exp1.Field.Harvesting
            SurfaceOrganicMatter: InitialResidueName=soybean; InitialResidueType=soybean; InitialResidueMass=1400; InitialStandingFraction=0; InitialCPR=0; InitialCNR=36.5
            Report Report_Day: EventNames=[Clock].DoReport
            Plant soybean: ResourceName=Soybean
            Soil Sparta Soil: State=IL; Country=USA; ApsoilNumber=1; Latitude=0; Longitude=0; DataSource=ssurgo2apsim; Comments=None
              Physical
                Thickness  ParticleSizeSand  ParticleSizeSilt  ParticleSizeClay  Rocks  BD     AirDry  LL15  DUL  SAT   KS
                50         16                80                4                 0      1.25   0.04    0.08  0.3  0.46  300
                100        16                80                4                 0      1.33   0.06    0.08  0.3  0.46  300
                150        16                80                4                 0      1.33   0.08    0.08  0.3  0.46  300
                300        16                80                4                 0      1.33   0.08    0.08  0.3  0.46  300
                300        16                80                4                 0      1.33   0.08    0.08  0.3  0.46  300
                300        16                80                4                 0      1.346  0.08    0.08  0.3  0.46  300
                300        16                80                4                 0      1.346  0.08    0.08  0.3  0.46  300
                300        16                80                4                 0      1.33   0.08    0.08  0.3  0.46  300
                300        16                80                4                 0      1.33   0.08    0.08  0.3  0.46  300
                300        16                80                4                 0      1.33   0.08    0.08  0.3  0.46  300
                300        16                80                4                 0      1.33   0.08    0.08  0.3  0.46  300
                300        16                80                4                 0      1.33   0.08    0.08  0.3  0.46  300
                Rocks source: Calculated
                SoilCrop MaizeSoil
                  LL=[0.08, 0.08, 0.08, 0.08, 0.11, 0.14, 0.17, 0.2, 0.23, 0.26, 0.29, 0.29]
                  KL=[0.08, 0.08, 0.08, 0.08, 0.07, 0.05, 0.03, 0.01, 0.01, 0.01, 0.01, 0.01]
                  XF=[1, 1, 1, 1, 1, 1, 1, 1, 1, 1, 0, 0]
                SoilCrop SoybeanSoil
                  LL=[0.08, 0.08, 0.08, 0.08, 0.11, 0.14, 0.17, 0.2, 0.23, 0.26, 0.29, 0.29]
                  KL=[0.08, 0.08, 0.08, 0.08, 0.08, 0.07, 0.05, 0.03, 0.01, 0.01, 0.01, 0.01]
                  XF=[1, 1, 1, 1, 1, 1, 1, 1, 1, 1, 1, 0]
              Swim3 Swim: hydrol_effective_depth=450; hydrol_effective_exponent=4.16; Salb=0.13; CN2Bare=64; CNRed=20; CNCov=0.8; KDul=0.1; PSIDul=-300; VC=true; DTMin=0; DTMax=1440; MaxWaterIncrement=10; SpaceWeightingFactor=0; SoluteSpaceWeightingFactor=0; Dis=15; Disp=1; A=1; DTHC=0; DTHP=1; vcon1=7.28e-09; vcon2=7.26e-07; eo_time=06:00; eo_durn=720; default_rain_time=00:00; default_rain_duration=720; Diagnostics=false
              Solute NO3: InitialValuesUnits=kg/ha; WaterTableConcentration=0; D0=0; DepthConstant=0; MaxDepthSoluteAccessible=0; RunoffEffectivenessAtMovingSolute=0; MaxEffectiveRunoff=0
                Thickness  InitialValues  Exco  FIP
                50         2              0     1
                100        2              0     1
                150        2              0     1
                300        2              0     1
                300        2              0     1
                300        2              0     1
                300        2              0     1
                300        1              0     1
                300        1              0     1
                300        1              0     1
                300        1              0     1
                300        1              0     1
              Solute NH4: InitialValuesUnits=kg/ha; WaterTableConcentration=0; D0=0; DepthConstant=0; MaxDepthSoluteAccessible=0; RunoffEffectivenessAtMovingSolute=0; MaxEffectiveRunoff=0
                Thickness  InitialValues  Exco  FIP
                50         3              100   1
                100        3              100   1
                150        3              100   1
                300        3              100   1
                300        3              100   1
                300        3              100   1
                300        3              100   1
                300        1              100   1
                300        1              100   1
                300        1              100   1
                300        1              100   1
                300        1              100   1
              Solute UREA: InitialValuesUnits=kg/ha; WaterTableConcentration=0; D0=0; DepthConstant=0; MaxDepthSoluteAccessible=0; RunoffEffectivenessAtMovingSolute=0; MaxEffectiveRunoff=0
                Thickness  InitialValues  Exco  FIP
                50         0              0     1
                100        0              0     1
                150        0              0     1
                300        0              0     1
                300        0              0     1
                300        0              0     1
                300        0              0     1
                300        0              0     1
                300        0              0     1
                300        0              0     1
                300        0              0     1
                300        0              0     1
              Organic: FOMCNRatio=45; CarbonUnits=Total
                Thickness  Carbon  SoilCNRatio  FBiom  FInert  FOM
                50         1.7     12           0.103  0.364   72.379892
                100        1.7     12           0.103  0.372   70.2408
                150        1.7     12           0.103  0.372   66.1502
                300        1.7     12           0.103  0.372   58.67
                300        1.7     12           0.016  0.5     52.0357
                300        1.7     12           0.017  0.637   43.4638
                300        1.5     12           0.027  0.748   36.304
                300        1.5     12           0.031  0.805   30.3235
                300        1.5     12           0.052  0.798   25.3283
                300        1.5     12           0.047  0.798   21.1561
                300        1.5     12           0.011  0.808   17.6711
                300        1.5     12           0.011  0.857   3.78492
              Chemical: PHUnits=Water
                Thickness  PH   CEC
                50         7.7  17.21
                100        7.7  17.21
                150        7.7  17.21
                300        7.7  17.368
                300        7.8  17.939
                300        7.8  18.791
                300        7.9  19.637
                300        8    20.201
                300        8.1  19.355
                300        8.2  18.344
                300        8.4  16.968
                300        8.5  16.065
                CEC source: Calculated
              Water: Thickness=[50, 100, 150, 300, 300, 300, 300, 300, 300, 300, 300, 300]; FilledFromTop=false
                InitialValues=[0.124, 0.124, 0.124, 0.124, 0.124, 0.124, 0.124, 0.124, 0.124, 0.124, 0.124, 0.124]
              Nutrient
              SoilTemperature Temperature: InteractionsPerDay=8
            Irrigation
            Report Report_Harvest: VariableNames=[Clock].Today as Date; EventNames=[Soybean].Harvesting
            Manager WTBBC
              StartDay = 0
              EndDay = 0
              WTBBC = -
              script: same as in USA.Iowa.Ames1977.Factors._.WT45_PreFlo
          SoilArbitrator
          MicroClimate: a_interception=0; b_interception=1; c_interception=0; d_interception=0; SoilHeatFluxFraction=0.4; MinimumHeightDiffForNewLayer=0; NightInterceptionFraction=0.5; ReferenceHeight=2
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