Simulations: Version=173
  DataStore
    ExcelInput: FileNames=[Kanawha_measured_data.xlsx]
      SheetNames=[Crop, Root, Nitrogen, Water, RootShootRatio, rootbylayer, Crop2Corn, Crop2Soy]
    PredictedObserved Maize_Crop: PredictedTableName=MaizeReport; ObservedTableName=Crop; FieldNameUsedForMatch=SimulationName; FieldName2UsedForMatch=Clock.Today; AllColumns=true
    PredictedObserved Maize_Root: PredictedTableName=MaizeReport; ObservedTableName=Root; FieldNameUsedForMatch=SimulationName; FieldName2UsedForMatch=Clock.Today; AllColumns=true
    PredictedObserved Maize_RS: PredictedTableName=MaizeReport; ObservedTableName=RootShootRatio; FieldNameUsedForMatch=SimulationName; FieldName2UsedForMatch=Clock.Today; AllColumns=true
    PredictedObserved Soybean_Crop: PredictedTableName=SoybeanReport; ObservedTableName=Crop; FieldNameUsedForMatch=SimulationName; FieldName2UsedForMatch=Clock.Today; AllColumns=true
    PredictedObserved Soybean_Root: PredictedTableName=SoybeanReport; ObservedTableName=Root; FieldNameUsedForMatch=SimulationName; FieldName2UsedForMatch=Clock.Today; AllColumns=true
  Folder Replacements
    Report MaizeReport: EventNames=[Clock].DoReport
      VariableNames:
        //========================================================
        //=======Systems variables for FACTS experiment assessment
        //========================================================
        //=======Dates|Phenology
        [Clock].Today
        [Clock].Today.DayOfYear
        [Maize].DaysAfterSowing
        [Maize].Phenology.CurrentStageName
        [Clock].Today.Year
        //=======Crop variables
        [Maize].AboveGroundLive.Wt * 10
        [Maize].AboveGroundLive.N * 10
        [Maize].AboveGroundLive.NConc * 100
        [Maize].Rachis.Live.Wt * 10
        [Maize].Rachis.Live.N * 10
        [Maize].Rachis.Live.NConc * 100
        [Maize].Husk.Live.Wt * 10
        [Maize].Husk.Live.N * 10
        [Maize].Husk.Live.NConc * 100
        [Maize].Rachis.Live.Wt * 10
        [Maize].Rachis.Live.N * 10
        [Maize].Rachis.Live.NConc * 100
        [Maize].Grain.Wt * 10
        [Maize].Grain.N * 10
        [Maize].Grain.Nconc * 100
        [Maize].Grain.Number
        [Maize].Grain.Size
        [Maize].Root.Live.Wt * 10
        [Maize].Root.Live.N * 10
        [Maize].Root.Live.NConc * 100
        [Maize].Root.Depth
        [Maize].Root.SpecificRootLength.FixedValue
        [Maize].Stem.Live.Wt * 10
        [Maize].Stem.Live.N * 10
        [Maize].Stem.Live.NConc * 100
        [Maize].Leaf.Live.Wt * 10
        [Maize].Leaf.Live.N * 10
        [Maize].Leaf.Live.NConc * 100
        [Maize].Leaf.Nconc * 100
        [Maize].Leaf.Dead.Wt * 10
        [Maize].Leaf.Dead.N * 10
        [Maize].Leaf.Dead.NConc * 100
        [Maize].Leaf.Wt * 10
        [Maize].Leaf.N * 10
        //=====For some reason I can't multiply Leaf.NConc by 100
        [Maize].Leaf.Nconc
        [Maize].Leaf.LAI
        [Maize].Leaf.SpecificArea
        [Maize].Leaf.SpecificNitrogen
        [Maize].Structure.LeafTipsAppeared
        [Maize].Leaf.LAITotal
        [Maize].Leaf.LAIDead
        [Maize].Structure.LeafTipsAppeared
        [Maize].Leaf.CohortArea
        [Maize].Leaf.PlantAppearedLeafNo
        [Maize].Leaf.ExpandedCohortNo
        [Maize].Leaf.AppearedCohortNo
        [Maize].Leaf.DeadCohortNo
        [Maize].Leaf.SenescingCohortNo
        [Maize].Leaf.DeadCohortNo + [Maize].Leaf.SenescingCohortNo as MaizeLeafDeadCohortNo2
        //=======ET/CO2/NO2
        [Maize].Leaf.Transpiration
        [Field].Soil.SoilWater.Es
        [Maize].Leaf.Transpiration + [Field].Soil.SoilWater.Es as Maize_ET
        //=====N2 generated from denitrification
        sum([Soil].Nutrient.Natm) as Nutrient.Natm
        //======N2O generated from both denitrification and nitrification
        sum([Soil].Nutrient.N2Oatm) as Nutrient.N2Oatm
        //======N2O generated from both denitrification and nitrification/sum of different pools
        sum([Nutrient].Denitrification.N2Oatm)+ sum([Nutrient].Nitrification.N2Oatm) as Nutrient.N2Oatm_2
        //====== N2O/separated pools
        sum([Nutrient].Denitrification.N2Oatm) as NO3.Denitrification.N2Oatm
        sum([Nutrient].Nitrification.N2Oatm) as NH4.Nitrification.N2Oatm
        //======Total CO2 lost to the atmosphere
        sum([Soil].Nutrient.Catm) as Nutrient.Catm
        //======Total CO2 lost to the atmosphere/sum of different pools/should be the same value
        sum([Soil].Nutrient.Humic.Decomposition.Catm) + sum([Soil].Nutrient.Microbial.Decomposition.Catm) + sum([Soil].Nutrient.FOMCarbohydrate.Decomposition.Catm) +sum([Soil].Nutrient.FOMCellulose.Decomposition.Catm) + sum([Soil].Nutrient.FOMLignin.Decomposition.Catm) +sum([SurfaceOrganicMatter].SurfaceResidue.Decomposition.Catm) as Nutrient.Catm_2
        //======Total CO2 lost to the atmosphere/Separated pools
        sum([Soil].Nutrient.Humic.Decomposition.Catm) as Humic.Decomposition.Catm
        sum([Soil].Nutrient.Microbial.Decomposition.Catm) as Microbial.Decomposition.Catm
        sum([Soil].Nutrient.FOMCarbohydrate.Decomposition.Catm) as FOMCarbohydrate.Decomposition.Catm
        sum([Soil].Nutrient.FOMCellulose.Decomposition.Catm) as FOMCellulose.Decomposition.Catm
        sum([Soil].Nutrient.FOMLignin.Decomposition.Catm) as FOMLignin.Decomposition.Catm
        sum([SurfaceOrganicMatter].SurfaceResidue.Decomposition.Catm) as SurfaceResidue.Decomposition.Catm
        //======Total N2O by layer
        sum([Soil].Nutrient.N2Oatm[1:5]) as Nutrient.N2Oatm_030
        sum([Soil].Nutrient.N2Oatm[6:7]) as Nutrient.N2Oatm_3060
        sum([Soil].Nutrient.N2Oatm[8:9]) as Nutrient.N2Oatm_6090
        sum([Soil].Nutrient.N2Oatm[10:11]) as Nutrient.N2Oatm_90120
        [Soil].Nutrient.N2Oatm[12] as Nutrient.N2Oatm_120150
        [Soil].Nutrient.N2Oatm[13] as Nutrient.N2Oatm_150180
        [Soil].Nutrient.N2Oatm[14] as Nutrient.N2Oatm_180210
        [Soil].Nutrient.N2Oatm[15] as Nutrient.N2Oatm_210240
        [Soil].Nutrient.N2Oatm[16] as Nutrient.N2Oatm_240270
        [Soil].Nutrient.N2Oatm[17] as Nutrient.N2Oatm_270300
        [Soil].Nutrient.N2Oatm[18] as Nutrient.N2Oatm_300330
        [Soil].Nutrient.N2Oatm[19] as Nutrient.N2Oatm_330360
        [Soil].Nutrient.N2Oatm[20] as Nutrient.N2Oatm_360390
        //=======Soil variables
        [Field].Soil.SoilWater.SW[4] as SW15
        ([Field].Soil.SoilWater.SW[6] + [Field].Soil.SoilWater.SW[7]) / 2 as SW45
        mean([Field].Soil.SoilWater.SW[6:7]) as SW45_2
        [Field].Soil.Temperature.Value[4] as ST15
        ([Field].Soil.Temperature.Value[6] + [Field].Soil.Temperature.Value[7]) / 2 as ST45
        sum([Field].Soil.Nutrient.NO3.kgha[1:5]) as NO3_0_30cm
        sum([Field].Soil.Nutrient.NO3.kgha[6:7]) as NO3_30_60cm
        sum([Field].Soil.Nutrient.NH4.kgha[1:5]) as NH4_0_30cm
        sum([Field].Soil.Nutrient.NH4.kgha[6:7]) as NH4_30_60cm
        [Field].Soil.SoilWater.WaterTable
        //=======Campbell sensors | soil_system_1_mesonet spreadsheet
        ([Soil].Water.Volumetric[5]*1.5 + [Soil].Water.Volumetric[6]*1)/2.5 as SW30
        ([Soil].Water.Volumetric[7] + [Soil].Water.Volumetric[8])/2 as SW60
        ([Soil].Water.Volumetric[11]*2 + [Soil].Water.Volumetric[12]*1)/3 as SW120
        ([Soil].Temperature.Value[3]*2 + [Soil].Temperature.Value[4]*1)/3 as ST10
        ([Soil].Temperature.Value[5]*1.5 + [Soil].Temperature.Value[6]*1)/2.5 as ST30
        ([Soil].Temperature.Value[7] + [Soil].Temperature.Value[8])/2 as ST60
        ([Soil].Temperature.Value[11]*2 + [Soil].Temperature.Value[12]*1)/3 as ST120
        //=======Detailed soil N
        sum([Field].Soil.Nutrient.NO3.kgha[1:3]) as NO3_0_10cm
        [Field].Soil.Nutrient.NO3.kgha[4] as NO3_10_20cm
        [Field].Soil.Nutrient.NO3.kgha[5] as NO3_20_30cm
        [Field].Soil.Nutrient.NO3.kgha[6] * 2/3 as NO3_30_40cm
        ([Field].Soil.Nutrient.NO3.kgha[6] * 1/3) + [Field].Soil.Nutrient.NO3.kgha[7] as NO3_40_60cm
        [Field].Soil.Nutrient.NO3.kgha[8] + ([Field].Soil.Nutrient.NO3.kgha[9] * 1/3) as NO3_60_80cm
        sum([Field].Soil.Nutrient.NH4.kgha[1:3]) as NH4_0_10cm
        [Field].Soil.Nutrient.NH4.kgha[4] as NH4_10_20cm
        [Field].Soil.Nutrient.NH4.kgha[5] as NH4_20_30cm
        [Field].Soil.Nutrient.NH4.kgha[6] * 2/3 as NH4_30_40cm
        ([Field].Soil.Nutrient.NH4.kgha[6] * 1/3) + [Field].Soil.Nutrient.NH4.kgha[7] as NH4_40_60cm
        [Field].Soil.Nutrient.NH4.kgha[8] + ([Field].Soil.Nutrient.NH4.kgha[9] * 1/3) as NH4_60_80cm
        //=======Root biomass per layer
        10 * (sum([Maize].Root.LayerLive.Wt[1:3]) + 0.5* [Maize].Root.LayerLive.Wt[4]) as rootmass_015
        10 * (0.5* [Maize].Root.LayerLive.Wt[4] + [Maize].Root.LayerLive.Wt[5]) as rootmass_1530
        10 * sum([Maize].Root.LayerLive.Wt[1:5]) as rootmass_030
        10 * sum([Maize].Root.LayerLive.Wt[6:7]) as rootmass_3060
        10 * sum([Maize].Root.LayerLive.Wt[8:9]) as rootmass_6090
        10 * sum([Maize].Root.LayerLive.Wt[10:11]) as rootmass_90120
        10 * [Maize].Root.LayerLive.Wt[12] as rootmass_120150
        10 * [Maize].Root.LayerLive.Wt[13] as rootmass_150180
        10 * [Maize].Root.LayerLive.Wt[14] as rootmass_180210
        10 * [Maize].Root.LayerLive.Wt[15] as rootmass_210240
        10 * [Maize].Root.LayerLive.Wt[16] as rootmass_240270
        10 * [Maize].Root.LayerLive.Wt[17] as rootmass_270300
        10 * [Maize].Root.LayerLive.Wt[18] as rootmass_300330
        10 * [Maize].Root.LayerLive.Wt[19] as rootmass_330360
        10 * [Maize].Root.LayerLive.Wt[20] as rootmass_360390
        //=======Root length | from m/m2 to km/m2
        //=======I think Root length output is root depth, so I tried to calculate root length
        (sum([Maize].Root.LayerLive.Wt[1:3]) + 0.5 * [Maize].Root.LayerLive.Wt[4]) * [Maize].Root.SpecificRootLength.FixedValue / 1000 as rootlength_015
        (0.5* [Maize].Root.LayerLive.Wt[4] + [Maize].Root.LayerLive.Wt[5]) * [Maize].Root.SpecificRootLength.FixedValue / 1000 as rootlength_1530
        sum([Maize].Root.LayerLive.Wt[1:5]) * [Maize].Root.SpecificRootLength.FixedValue / 1000 as rootlength_030
        sum([Maize].Root.LayerLive.Wt[6:7]) * [Maize].Root.SpecificRootLength.FixedValue / 1000 as rootlength_3060
        sum([Maize].Root.LayerLive.Wt[8:9]) * [Maize].Root.SpecificRootLength.FixedValue / 1000 as rootlength_6090
        sum([Maize].Root.LayerLive.Wt[10:11]) * [Maize].Root.SpecificRootLength.FixedValue / 1000 as rootlength_90120
        [Maize].Root.LayerLive.Wt[12] * [Maize].Root.SpecificRootLength.FixedValue / 1000 as rootlength_120150
        [Maize].Root.LayerLive.Wt[13] * [Maize].Root.SpecificRootLength.FixedValue / 1000 as rootlength_150180
        [Maize].Root.LayerLive.Wt[14] * [Maize].Root.SpecificRootLength.FixedValue / 1000 as rootlength_180210
        [Maize].Root.LayerLive.Wt[15] * [Maize].Root.SpecificRootLength.FixedValue / 1000 as rootlength_210240
        [Maize].Root.LayerLive.Wt[16] * [Maize].Root.SpecificRootLength.FixedValue / 1000 as rootlength_240270
        [Maize].Root.LayerLive.Wt[17] * [Maize].Root.SpecificRootLength.FixedValue / 1000 as rootlength_270300
        [Maize].Root.LayerLive.Wt[18] * [Maize].Root.SpecificRootLength.FixedValue / 1000 as rootlength_300330
        [Maize].Root.LayerLive.Wt[19] * [Maize].Root.SpecificRootLength.FixedValue / 1000 as rootlength_330360
        [Maize].Root.LayerLive.Wt[20] * [Maize].Root.SpecificRootLength.FixedValue / 1000 as rootlength_360390
        [Maize].Root.Live.Wt * [Maize].Root.SpecificRootLength.FixedValue / 1000 as totalrootlength
        //=======Root length density - RLD | from mm/mm3 to cm/cm3
        mean([Maize].Root.LengthDensity[1:5]) * 100 as lengthDensity_030
        mean([Maize].Root.LengthDensity[6:7]) * 100 as lengthDensity_3060
        mean([Maize].Root.LengthDensity[8:9]) * 100 as lengthDensity_6090
        mean([Maize].Root.LengthDensity[10:11]) * 100 as LengthDensity_90120
        [Maize].Root.LengthDensity[12] * 100 as lengthDensity_120150
        [Maize].Root.LengthDensity[13] * 100 as lengthDensity_150180
        [Maize].Root.LengthDensity[14] * 100 as lengthDensity_180210
        [Maize].Root.LengthDensity[15] * 100 as lengthDensity_210240
        [Maize].Root.LengthDensity[16] * 100 as lengthDensity_240270
        [Maize].Root.LengthDensity[17] * 100 as lengthDensity_270300
        [Maize].Root.LengthDensity[18] * 100 as lengthDensity_300330
        [Maize].Root.LengthDensity[19] * 100 as lengthDensity_330360
        [Maize].Root.LengthDensity[20] * 100 as lengthDensity_360390
        mean([Maize].Root.LengthDensity[1:20]) * 100 as totallengthDensity
        //=======Root Nitrogen per layer
        10 * (sum([Maize].Root.LayerLive.N[1:3]) + 0.5* [Maize].Root.LayerLive.N[4]) as rootN_015
        10 * (0.5* [Maize].Root.LayerLive.N[4] + [Maize].Root.LayerLive.N[5]) as rootN_1530
        10 * sum([Maize].Root.LayerLive.N[1:5]) as rootN_030
        10 * sum([Maize].Root.LayerLive.N[6:7]) as rootN_3060
        10 * sum([Maize].Root.LayerLive.N[8:9]) as rootN_6090
        10 * sum([Maize].Root.LayerLive.N[10:11]) as rootN_90120
        10 * [Maize].Root.LayerLive.N[12] as rootN_120150
        10 * [Maize].Root.LayerLive.N[13] as rootN_150180
        10 * [Maize].Root.LayerLive.N[14] as rootN_180210
        10 * [Maize].Root.LayerLive.N[15] as rootN_210240
        10 * [Maize].Root.LayerLive.N[16] as rootN_240270
        10 * [Maize].Root.LayerLive.N[17] as rootN_270300
        10 * [Maize].Root.LayerLive.N[18] as rootN_300330
        10 * [Maize].Root.LayerLive.N[19] as rootN_330360
        10 * [Maize].Root.LayerLive.N[20] as rootN_360390
        [Weather].Rain
        [Soil].SoilWater.Depth
        [Maize].Root.LayerLive.Wt
        [SurfaceOrganicMatter].Wt
        [SurfaceOrganicMatter].Cover
    Report SoybeanReport: EventNames=[Clock].DoReport
      VariableNames:
        //========================================================
        //=======Systems variables for FACTS experiment assessment
        //========================================================
        //=======Dates|Phenology
        [Clock].Today
        [Clock].Today.DayOfYear
        [Soybean].DaysAfterSowing
        [Soybean].Phenology.CurrentStageName
        //=======Crop variables
        [Soybean].AboveGroundLive.Wt * 10
        [Soybean].AboveGroundLive.N * 10
        [Soybean].AboveGroundLive.NConc * 100
        //=======Shell is equivalent to pod in measured data
        [Soybean].Shell.Live.Wt * 10
        [Soybean].Shell.Live.N * 10
        [Soybean].Shell.Live.NConc * 100
        //=======Check which one to use (I am using the total Wt)
        [Soybean].Shell.Wt * 10
        [Soybean].Shell.N * 10
        [Soybean].Shell.Nconc * 100
        [Soybean].Grain.Wt * 10
        [Soybean].Grain.N * 10
        [Soybean].Grain.Nconc * 100
        [Soybean].Root.Live.Wt * 10
        [Soybean].Root.Live.N * 10
        [Soybean].Root.Live.NConc * 100
        [Soybean].Root.Depth
        [Soybean].Root.SpecificRootLength.FixedValue
        [Soybean].Stem.Live.Wt * 10
        [Soybean].Stem.Live.N * 10
        [Soybean].Stem.Live.NConc * 100
        //=======Check which one to use (I am using the total Wt)
        [Soybean].Stem.Wt * 10
        [Soybean].Stem.N * 10
        [Soybean].Stem.Nconc * 100
        [Soybean].Leaf.Live.Wt * 10
        [Soybean].Leaf.Live.N * 10
        [Soybean].Leaf.Live.NConc * 100
        [Soybean].Leaf.Dead.Wt * 10
        [Soybean].Leaf.Dead.N * 10
        [Soybean].Leaf.Dead.NConc * 100
        [Soybean].Leaf.Wt * 10
        [Soybean].Leaf.N * 10
        //=====For some reason I can't multiply Leaf.NConc by 100
        [Soybean].Leaf.NConc
        [Soybean].Leaf.LAI
        //=======SLA units differ for maize (mm2/g) and soybean (m2/g)
        //=======For some reason, multiplying/dividing Leaf.SpecificArea by any number results zero
        //=======So I changed units of the measured data
        [Soybean].Leaf.SpecificArea
        [Soybean].Leaf.Detached.Wt
        [Soybean].Leaf.Dead.Wt
        [Soybean].Leaf.Senesced.Wt*10
        sum of [Soybean].Leaf.Senesced.Wt*10 from [Soybean].Sowing to [Soybean].Harvesting as LeafSencescedCumWt
        sum of [Soybean].Leaf.Detached.Wt*10 from [Soybean].Sowing to [Soybean].Harvesting as LeafDetachedCumWt
        [Soybean].Leaf.Detached.Wt*10
        [Soybean].Leaf.NodeNumber
        //=======ET/CO2/NO2
        [Soybean].Leaf.Transpiration
        [Field].Soil.SoilWater.Es
        [Soybean].Leaf.Transpiration + [Field].Soil.SoilWater.Es as Soybean_ET
        //=====N2 generated from denitrification
        sum([Soil].Nutrient.Natm) as Nutrient.Natm
        //======N2O generated from both denitrification and nitrification
        sum([Soil].Nutrient.N2Oatm) as Nutrient.N2Oatm
        //======N2O generated from both denitrification and nitrification/sum of different pools
        sum([Nutrient].Denitrification.N2Oatm)+ sum([Nutrient].Nitrification.N2Oatm) as Nutrient.N2Oatm_2
        //====== N2O/separated pools
        sum([Nutrient].Denitrification.N2Oatm) as NO3.Denitrification.N2Oatm
        sum([Nutrient].Nitrification.N2Oatm) as NH4.Nitrification.N2Oatm
        //======Total CO2 lost to the atmosphere
        sum([Soil].Nutrient.Catm) as Nutrient.Catm
        //======Total CO2 lost to the atmosphere/sum of different pools/should be the same value
        sum([Soil].Nutrient.Humic.Decomposition.Catm) + sum([Soil].Nutrient.Microbial.Decomposition.Catm) + sum([Soil].Nutrient.FOMCarbohydrate.Decomposition.Catm) +sum([Soil].Nutrient.FOMCellulose.Decomposition.Catm) + sum([Soil].Nutrient.FOMLignin.Decomposition.Catm) +sum([SurfaceOrganicMatter].SurfaceResidue.Decomposition.Catm) as Nutrient.Catm_2
        //======Total CO2 lost to the atmosphere/Separated pools
        sum([Soil].Nutrient.Humic.Decomposition.Catm) as Humic.Decomposition.Catm
        sum([Soil].Nutrient.Microbial.Decomposition.Catm) as Microbial.Decomposition.Catm
        sum([Soil].Nutrient.FOMCarbohydrate.Decomposition.Catm) as FOMCarbohydrate.Decomposition.Catm
        sum([Soil].Nutrient.FOMCellulose.Decomposition.Catm) as FOMCellulose.Decomposition.Catm
        sum([Soil].Nutrient.FOMLignin.Decomposition.Catm) as FOMLignin.Decomposition.Catm
        sum([SurfaceOrganicMatter].SurfaceResidue.Decomposition.Catm) as SurfaceResidue.Decomposition.Catm
        //======Total N2O by layer
        sum([Soil].Nutrient.N2Oatm[1:5]) as Nutrient.N2Oatm_030
        sum([Soil].Nutrient.N2Oatm[6:7]) as Nutrient.N2Oatm_3060
        sum([Soil].Nutrient.N2Oatm[8:9]) as Nutrient.N2Oatm_6090
        sum([Soil].Nutrient.N2Oatm[10:11]) as Nutrient.N2Oatm_90120
        [Soil].Nutrient.N2Oatm[12] as Nutrient.N2Oatm_120150
        [Soil].Nutrient.N2Oatm[13] as Nutrient.N2Oatm_150180
        [Soil].Nutrient.N2Oatm[14] as Nutrient.N2Oatm_180210
        [Soil].Nutrient.N2Oatm[15] as Nutrient.N2Oatm_210240
        [Soil].Nutrient.N2Oatm[16] as Nutrient.N2Oatm_240270
        [Soil].Nutrient.N2Oatm[17] as Nutrient.N2Oatm_270300
        [Soil].Nutrient.N2Oatm[18] as Nutrient.N2Oatm_300330
        [Soil].Nutrient.N2Oatm[19] as Nutrient.N2Oatm_330360
        [Soil].Nutrient.N2Oatm[20] as Nutrient.N2Oatm_360390
        //=======Soil variables
        [Field].Soil.SoilWater.SW[4] as SW15
        ([Field].Soil.SoilWater.SW[6] + [Field].Soil.SoilWater.SW[7]) / 2 as SW45
        [Field].Soil.Temperature.Value[4] as ST15
        ([Field].Soil.Temperature.Value[6] + [Field].Soil.Temperature.Value[7]) / 2 as ST45
        sum([Field].Soil.Nutrient.NO3.kgha[1:5]) as NO3_0_30cm
        sum([Field].Soil.Nutrient.NO3.kgha[6:7]) as NO3_30_60cm
        sum([Field].Soil.Nutrient.NH4.kgha[1:5]) as NH4_0_30cm
        sum([Field].Soil.Nutrient.NH4.kgha[6:7]) as NH4_30_60cm
        [Field].Soil.SoilWater.WaterTable
        //=======Detailed soil N
        sum([Field].Soil.Nutrient.NO3.kgha[1:3]) as NO3_0_10cm
        [Field].Soil.Nutrient.NO3.kgha[4] as NO3_10_20cm
        [Field].Soil.Nutrient.NO3.kgha[5] as NO3_20_30cm
        [Field].Soil.Nutrient.NO3.kgha[6] * 2/3 as NO3_30_40cm
        ([Field].Soil.Nutrient.NO3.kgha[6] * 1/3) + [Field].Soil.Nutrient.NO3.kgha[7] as NO3_40_60cm
        [Field].Soil.Nutrient.NO3.kgha[8] + ([Field].Soil.Nutrient.NO3.kgha[9] * 1/3) as NO3_60_80cm
        sum([Field].Soil.Nutrient.NH4.kgha[1:3]) as NH4_0_10cm
        [Field].Soil.Nutrient.NH4.kgha[4] as NH4_10_20cm
        [Field].Soil.Nutrient.NH4.kgha[5] as NH4_20_30cm
        [Field].Soil.Nutrient.NH4.kgha[6] * 2/3 as NH4_30_40cm
        ([Field].Soil.Nutrient.NH4.kgha[6] * 1/3) + [Field].Soil.Nutrient.NH4.kgha[7] as NH4_40_60cm
        [Field].Soil.Nutrient.NH4.kgha[8] + ([Field].Soil.Nutrient.NH4.kgha[9] * 1/3) as NH4_60_80cm
        //=======Soil variables and detailed soil N outputs are the same as MaizeReport
        //=======Root biomass per layer
        10 * (sum([Soybean].Root.LayerLive.Wt[1:3]) + 0.5* [Soybean].Root.LayerLive.Wt[4]) as rootmass_015
        10 * (0.5* [Soybean].Root.LayerLive.Wt[4] + [Soybean].Root.LayerLive.Wt[5]) as rootmass_1530
        10 * sum([Soybean].Root.LayerLive.Wt[1:5]) as rootmass_030
        10 * sum([Soybean].Root.LayerLive.Wt[6:7]) as rootmass_3060
        10 * sum([Soybean].Root.LayerLive.Wt[8:9]) as rootmass_6090
        10 * sum([Soybean].Root.LayerLive.Wt[10:11]) as rootmass_90120
        10 * sum([Soybean].Root.LayerLive.Wt[8:11]) as rootmass_90150
        10 * [Soybean].Root.LayerLive.Wt[12] as rootmass_120150
        10 * [Soybean].Root.LayerLive.Wt[13] as rootmass_150180
        10 * [Soybean].Root.LayerLive.Wt[14] as rootmass_180210
        10 * [Soybean].Root.LayerLive.Wt[15] as rootmass_210240
        10 * [Soybean].Root.LayerLive.Wt[16] as rootmass_240270
        10 * [Soybean].Root.LayerLive.Wt[17] as rootmass_270300
        10 * [Soybean].Root.LayerLive.Wt[18] as rootmass_300330
        10 * [Soybean].Root.LayerLive.Wt[19] as rootmass_330360
        10 * [Soybean].Root.LayerLive.Wt[20] as rootmass_360390
        //=======Root length | from m/m2 to km/m2
        //=======I think Root length output is actually root depth, so I tried to calculate root length
        (sum([Soybean].Root.LayerLive.Wt[1:3]) + 0.5 * [Soybean].Root.LayerLive.Wt[4]) * [Soybean].Root.SpecificRootLength.FixedValue / 1000 as rootlength_015
        (0.5* [Soybean].Root.LayerLive.Wt[4] + [Soybean].Root.LayerLive.Wt[5]) * [Soybean].Root.SpecificRootLength.FixedValue / 1000 as rootlength_1530
        sum([Soybean].Root.LayerLive.Wt[1:5]) * [Soybean].Root.SpecificRootLength.FixedValue / 1000 as rootlength_030
        sum([Soybean].Root.LayerLive.Wt[6:7]) * [Soybean].Root.SpecificRootLength.FixedValue / 1000 as rootlength_3060
        sum([Soybean].Root.LayerLive.Wt[8:9]) * [Soybean].Root.SpecificRootLength.FixedValue / 1000 as rootlength_6090
        sum([Soybean].Root.LayerLive.Wt[10:11]) * [Soybean].Root.SpecificRootLength.FixedValue / 1000 as rootlength_90120
        [Soybean].Root.LayerLive.Wt[12] * [Soybean].Root.SpecificRootLength.FixedValue / 1000 as rootlength_120150
        [Soybean].Root.LayerLive.Wt[13] * [Soybean].Root.SpecificRootLength.FixedValue / 1000 as rootlength_150180
        [Soybean].Root.LayerLive.Wt[14] * [Soybean].Root.SpecificRootLength.FixedValue / 1000 as rootlength_180210
        [Soybean].Root.LayerLive.Wt[15] * [Soybean].Root.SpecificRootLength.FixedValue / 1000 as rootlength_210240
        [Soybean].Root.LayerLive.Wt[16] * [Soybean].Root.SpecificRootLength.FixedValue / 1000 as rootlength_240270
        [Soybean].Root.LayerLive.Wt[17] * [Soybean].Root.SpecificRootLength.FixedValue / 1000 as rootlength_270300
        [Soybean].Root.LayerLive.Wt[18] * [Soybean].Root.SpecificRootLength.FixedValue / 1000 as rootlength_300330
        [Soybean].Root.LayerLive.Wt[19] * [Soybean].Root.SpecificRootLength.FixedValue / 1000 as rootlength_330360
        [Soybean].Root.LayerLive.Wt[20] * [Soybean].Root.SpecificRootLength.FixedValue / 1000 as rootlength_360390
        [Soybean].Root.Live.Wt * [Soybean].Root.SpecificRootLength.FixedValue / 1000 as totalrootlength
        //=======Root length density - RLD | from mm/mm3 to cm/cm3
        mean([Soybean].Root.LengthDensity[1:5]) * 100 as lengthDensity_030
        mean([Soybean].Root.LengthDensity[6:7]) * 100 as lengthDensity_3060
        mean([Soybean].Root.LengthDensity[8:9]) * 100 as lengthDensity_6090
        mean([Soybean].Root.LengthDensity[10:11]) * 100 as LengthDensity_90120
        [Soybean].Root.LengthDensity[12] * 100 as lengthDensity_120150
        [Soybean].Root.LengthDensity[13] * 100 as lengthDensity_150180
        [Soybean].Root.LengthDensity[14] * 100 as lengthDensity_180210
        [Soybean].Root.LengthDensity[15] * 100 as lengthDensity_210240
        [Soybean].Root.LengthDensity[16] * 100 as lengthDensity_240270
        [Soybean].Root.LengthDensity[17] * 100 as lengthDensity_270300
        [Soybean].Root.LengthDensity[18] * 100 as lengthDensity_300330
        [Soybean].Root.LengthDensity[19] * 100 as lengthDensity_330360
        [Soybean].Root.LengthDensity[20] * 100 as lengthDensity_360390
        mean([Soybean].Root.LengthDensity[1:20]) * 100 as totallengthDensity
        //=======Root Nitrogen per layer
        10 * (sum([Soybean].Root.LayerLive.N[1:3]) + 0.5* [Soybean].Root.LayerLive.N[4]) as rootN_015
        10 * (0.5* [Soybean].Root.LayerLive.N[4] + [Soybean].Root.LayerLive.N[5]) as rootN_1530
        10 * sum([Soybean].Root.LayerLive.N[1:5]) as rootN_030
        10 * sum([Soybean].Root.LayerLive.N[6:7]) as rootN_3060
        10 * sum([Soybean].Root.LayerLive.N[8:9]) as rootN_6090
        10 * sum([Soybean].Root.LayerLive.N[10:11]) as rootN_90120
        10 * [Soybean].Root.LayerLive.N[12] as rootN_120150
        10 * [Soybean].Root.LayerLive.N[13] as rootN_150180
        10 * [Soybean].Root.LayerLive.N[14] as rootN_180210
        10 * [Soybean].Root.LayerLive.N[15] as rootN_210240
        10 * [Soybean].Root.LayerLive.N[16] as rootN_240270
        10 * [Soybean].Root.LayerLive.N[17] as rootN_270300
        10 * [Soybean].Root.LayerLive.N[18] as rootN_300330
        10 * [Soybean].Root.LayerLive.N[19] as rootN_330360
        10 * [Soybean].Root.LayerLive.N[20] as rootN_360390
        //========Further checks
        [Soybean].Stem.SenescenceRate
        sum of [Soybean].Nodule.NFixed*10 from [Soybean].Sowing to [Soybean].Harvesting as Nfixed_kgha
        sum of sum([Soil].Nutrient.MineralisedN) from [Soybean].Sowing to [Soybean].Harvesting as MineralisedN_kgha
  Folder Kanawaha
    Experiment Kanawaha
      Factors
        Factor System: Specification=[Simulation].Field.Operations
          Operations 21
            2014-04-20  [SurfaceOrganicMatter].Incorporate(0.25, 150);
            2014-05-11  [Maize].Sow(population: 8, cultivar: "FACTS_P1151", depth: 50, rowSpacing: 760);
            2014-10-11  [Maize].Harvest;
            2014-10-11  [Maize].EndCrop;
            2015-05-15  [Soybean].Sow(population: 25, cultivar: "MG_2", depth: 50, rowSpacing: 760);
            2015-10-06  [Soybean].Harvest;
            2015-10-06  [Soybean].EndCrop;
            2015-11-11  [SurfaceOrganicMatter].Incorporate(0.05, 250);
            2016-05-04  [Fertiliser].Apply(168, Fertiliser.Types.UreaN, 50);
            2016-05-05  [SurfaceOrganicMatter].Incorporate(0.10, 100);
            2016-05-11  [Maize].Sow(population: 8, cultivar: "FACTS_P1151", depth: 50, rowSpacing: 760);
            2016-10-11  [Maize].Harvest;
            2016-10-11  [Maize].EndCrop;
            2016-11-12  [SurfaceOrganicMatter].Incorporate(0.75, 250);
            2017-04-23  [SurfaceOrganicMatter].Incorporate(0.25, 150);
            2017-05-05  [Fertiliser].Apply(0, Fertiliser.Types.UreaN, 50);
            2017-05-12  [Maize].Sow(population: 8.8, cultivar: "FACTS_P1151", depth: 50, rowSpacing: 760);
            2017-10-29  [Maize].Harvest;
            2017-10-29  [Maize].EndCrop;
            2017-11-12  [SurfaceOrganicMatter].Incorporate(0.75, 250);
            2018-04-17  [SurfaceOrganicMatter].Incorporate(0.25, 150);
            2018-05-29  [Soybean].Sow(population: 35, cultivar: "FACTS_P932T16", depth: 50, rowSpacing: 760);
            2018-10-30  [Soybean].Harvest;
            2018-10-30  [Soybean].EndCrop;
            2018-11-12  [SurfaceOrganicMatter].Incorporate(0.05, 250);
            2019-04-30  [Fertiliser].Apply(0, Fertiliser.Types.UreaN, 50);
            2019-05-03  [SurfaceOrganicMatter].Incorporate(0.25, 150);
            2019-05-04  [Maize].Sow(population: 8.4, cultivar: "FACTS_P1151", depth: 50, rowSpacing: 760);
            2019-10-19  [Maize].Harvest;
            2019-10-19  [Maize].EndCrop;
          Operations 22
            2014-04-20  [SurfaceOrganicMatter].Incorporate(0.25, 150);
            2014-05-11  [Maize].Sow(population: 8, cultivar: "FACTS_P1151", depth: 50, rowSpacing: 760);
            2014-10-11  [Maize].Harvest;
            2014-10-11  [Maize].EndCrop;
            2015-04-20  [SurfaceOrganicMatter].Incorporate(0.25, 150);
            2015-05-15  [Soybean].Sow(population: 25, cultivar: "MG_2", depth: 50, rowSpacing: 760);
            2015-10-06  [Soybean].Harvest;
            2015-10-06  [Soybean].EndCrop;
            2015-11-11  [SurfaceOrganicMatter].Incorporate(0.05, 250);
            2016-05-04  [Fertiliser].Apply(168, Fertiliser.Types.UreaN, 50);
            2016-05-05  [SurfaceOrganicMatter].Incorporate(0.10, 100);
            2016-05-11  [Maize].Sow(population: 8, cultivar: "FACTS_P1151", depth: 50, rowSpacing: 760);
            2016-10-11  [Maize].Harvest;
            2016-10-11  [Maize].EndCrop;
            2016-11-12  [SurfaceOrganicMatter].Incorporate(0.75, 250);
            2017-04-23  [SurfaceOrganicMatter].Incorporate(0.25, 150);
            2017-05-05  [Fertiliser].Apply(168, Fertiliser.Types.UreaN, 50);
            2017-05-12  [Maize].Sow(population: 8.8, cultivar: "FACTS_P1151", depth: 50, rowSpacing: 760);
            2017-10-29  [Maize].Harvest;
            2017-10-29  [Maize].EndCrop;
            2017-11-12  [SurfaceOrganicMatter].Incorporate(0.75, 250);
            2018-04-17  [SurfaceOrganicMatter].Incorporate(0.25, 150);
            2018-05-29  [Soybean].Sow(population: 35, cultivar: "FACTS_P932T16", depth: 50, rowSpacing: 760);
            2018-10-30  [Soybean].Harvest;
            2018-10-30  [Soybean].EndCrop;
            2018-11-12  [SurfaceOrganicMatter].Incorporate(0.05, 250);
            2019-04-30  [Fertiliser].Apply(168, Fertiliser.Types.UreaN, 50);
            2019-05-03  [SurfaceOrganicMatter].Incorporate(0.25, 150);
            2019-05-04  [Maize].Sow(population: 8.4, cultivar: "FACTS_P1151", depth: 50, rowSpacing: 760);
            2019-10-19  [Maize].Harvest;
            2019-10-19  [Maize].EndCrop;
          Operations 23
            2014-04-20  [SurfaceOrganicMatter].Incorporate(0.25, 150);
            2014-05-11  [Maize].Sow(population: 8, cultivar: "FACTS_P1151", depth: 50, rowSpacing: 760);
            2014-10-11  [Maize].Harvest;
            2014-10-11  [Maize].EndCrop;
            2015-04-20  [SurfaceOrganicMatter].Incorporate(0.25, 150);
            2015-05-15  [Soybean].Sow(population: 25, cultivar: "MG_2", depth: 50, rowSpacing: 760);
            2015-10-06  [Soybean].Harvest;
            2015-10-06  [Soybean].EndCrop;
            2015-11-11  [SurfaceOrganicMatter].Incorporate(0.05, 250);
            2016-05-04  [Fertiliser].Apply(168, Fertiliser.Types.UreaN, 50);
            2016-05-05  [SurfaceOrganicMatter].Incorporate(0.10, 100);
            2016-05-11  [Maize].Sow(population: 8, cultivar: "FACTS_P1151", depth: 50, rowSpacing: 760);
            2016-10-11  [Maize].Harvest;
            2016-10-11  [Maize].EndCrop;
            2016-11-12  [SurfaceOrganicMatter].Incorporate(0.75, 250);
            2017-04-23  [SurfaceOrganicMatter].Incorporate(0.25, 150);
            2017-05-05  [Fertiliser].Apply(336, Fertiliser.Types.UreaN, 50);
            2017-05-12  [Maize].Sow(population: 8.8, cultivar: "FACTS_P1151", depth: 50, rowSpacing: 760);
            2017-10-29  [Maize].Harvest;
            2017-10-29  [Maize].EndCrop;
            2017-11-12  [SurfaceOrganicMatter].Incorporate(0.75, 250);
            2018-04-17  [SurfaceOrganicMatter].Incorporate(0.25, 150);
            2018-05-29  [Soybean].Sow(population: 35, cultivar: "FACTS_P932T16", depth: 50, rowSpacing: 760);
            2018-10-30  [Soybean].Harvest;
            2018-10-30  [Soybean].EndCrop;
            2018-11-12  [SurfaceOrganicMatter].Incorporate(0.05, 250);
            2019-04-30  [Fertiliser].Apply(336, Fertiliser.Types.UreaN, 50);
            2019-05-03  [SurfaceOrganicMatter].Incorporate(0.25, 150);
            2019-05-04  [Maize].Sow(population: 8.4, cultivar: "FACTS_P1151", depth: 50, rowSpacing: 760);
            2019-10-19  [Maize].Harvest;
            2019-10-19  [Maize].EndCrop;
          Operations 24
            2014-04-20  [SurfaceOrganicMatter].Incorporate(0.25, 150);
            2014-05-11  [Maize].Sow(population: 8, cultivar: "FACTS_P1151", depth: 50, rowSpacing: 760);
            2014-10-11  [Maize].Harvest;
            2014-10-11  [Maize].EndCrop;
            2015-04-20  [SurfaceOrganicMatter].Incorporate(0.25, 150);
            2015-05-15  [Soybean].Sow(population: 25, cultivar: "MG_2", depth: 50, rowSpacing: 760);
            2015-10-06  [Soybean].Harvest;
            2015-10-06  [Soybean].EndCrop;
            2015-11-11  [SurfaceOrganicMatter].Incorporate(0.05, 250);
            2016-05-04  [Fertiliser].Apply(168, Fertiliser.Types.UreaN, 50);
            2016-05-05  [SurfaceOrganicMatter].Incorporate(0.10, 100);
            2016-05-11  [Maize].Sow(population: 8, cultivar: "FACTS_P1151", depth: 50, rowSpacing: 760);
            2016-10-11  [Maize].Harvest;
            2016-10-11  [Maize].EndCrop;
            2016-11-12  [SurfaceOrganicMatter].Incorporate(0.75, 250);
            2017-04-17  [SurfaceOrganicMatter].Incorporate(0.25, 150);
            2017-05-09  [Soybean].Sow(population: 25, cultivar: "FACTS_P932T16", depth: 50, rowSpacing: 760);
            2017-10-31  [Soybean].Harvest;
            2017-10-31  [Soybean].EndCrop;
            2017-11-12  [SurfaceOrganicMatter].Incorporate(0.05, 250);
            2018-05-17  [SurfaceOrganicMatter].Incorporate(0.25, 150);
            2018-05-17  [Fertiliser].Apply(168, Fertiliser.Types.UreaN, 50);
            2018-05-18  [Maize].Sow(population: 8.8, cultivar: "FACTS_P1151", depth: 50, rowSpacing: 760);
            2018-10-22  [Maize].Harvest;
            2018-10-22  [Maize].EndCrop;
            2018-11-12  [SurfaceOrganicMatter].Incorporate(0.75, 250);
            2019-04-21  [SurfaceOrganicMatter].Incorporate(0.25, 150);
            2019-05-06  [Soybean].Sow(population: 30, cultivar: "FACTS_P932T16", depth: 50, rowSpacing: 760);
            2019-10-20  [Soybean].Harvest;
            2019-10-20  [Soybean].EndCrop;
            2019-11-09  [SurfaceOrganicMatter].Incorporate(0.05, 250);
          Operations 21b
            2014-04-20  [SurfaceOrganicMatter].Incorporate(0.25, 150);
            2014-05-11  [Maize].Sow(population: 8, cultivar: "FACTS_P1151", depth: 50, rowSpacing: 760);
            2014-10-11  [Maize].Harvest;
            2014-10-11  [Maize].EndCrop;
            2015-04-20  [SurfaceOrganicMatter].Incorporate(0.25, 150);
            2015-05-15  [Soybean].Sow(population: 25, cultivar: "MG_2", depth: 50, rowSpacing: 760);
            2015-10-06  [Soybean].Harvest;
            2015-10-06  [Soybean].EndCrop;
            2015-11-11  [SurfaceOrganicMatter].Incorporate(0.05, 250);
            2016-05-04  [Fertiliser].Apply(168, Fertiliser.Types.UreaN, 50);
            2016-05-05  [SurfaceOrganicMatter].Incorporate(0.10, 100);
            2016-05-11  [Maize].Sow(population: 8, cultivar: "FACTS_P1151", depth: 50, rowSpacing: 760);
            2016-10-11  [Maize].Harvest;
            2016-10-11  [Maize].EndCrop;
            2016-11-12  [SurfaceOrganicMatter].Incorporate(0.75, 250);
            2017-04-17  [SurfaceOrganicMatter].Incorporate(0.25, 150);
            2017-05-09  [Soybean].Sow(population: 25, cultivar: "FACTS_P932T16", depth: 50, rowSpacing: 760);
            2017-10-31  [Soybean].Harvest;
            2017-10-31  [Soybean].EndCrop;
            2017-11-12  [SurfaceOrganicMatter].Incorporate(0.05, 250);
            2018-05-17  [SurfaceOrganicMatter].Incorporate(0.25, 150);
            2018-05-17  [Fertiliser].Apply(0, Fertiliser.Types.UreaN, 50);
            2018-05-18  [Maize].Sow(population: 8.8, cultivar: "FACTS_P1151", depth: 50, rowSpacing: 760);
            2018-10-22  [Maize].Harvest;
            2018-10-22  [Maize].EndCrop;
            2018-11-12  [SurfaceOrganicMatter].Incorporate(0.75, 250);
            2019-04-21  [SurfaceOrganicMatter].Incorporate(0.25, 150);
            2019-05-06  [Soybean].Sow(population: 30, cultivar: "FACTS_P932T16", depth: 50, rowSpacing: 760);
            2019-10-20  [Soybean].Harvest;
            2019-10-20  [Soybean].EndCrop;
            2019-11-09  [SurfaceOrganicMatter].Incorporate(0.05, 250);
          Operations 23b
            2014-04-20  [SurfaceOrganicMatter].Incorporate(0.25, 150);
            2014-05-11  [Maize].Sow(population: 8, cultivar: "FACTS_P1151", depth: 50, rowSpacing: 760);
            2014-10-11  [Maize].Harvest;
            2014-10-11  [Maize].EndCrop;
            2015-04-20  [SurfaceOrganicMatter].Incorporate(0.25, 150);
            2015-05-15  [Soybean].Sow(population: 25, cultivar: "MG_2", depth: 50, rowSpacing: 760);
            2015-10-06  [Soybean].Harvest;
            2015-10-06  [Soybean].EndCrop;
            2015-11-11  [SurfaceOrganicMatter].Incorporate(0.05, 250);
            2016-05-04  [Fertiliser].Apply(168, Fertiliser.Types.UreaN, 50);
            2016-05-05  [SurfaceOrganicMatter].Incorporate(0.10, 100);
            2016-05-11  [Maize].Sow(population: 8, cultivar: "FACTS_P1151", depth: 50, rowSpacing: 760);
            2016-10-11  [Maize].Harvest;
            2016-10-11  [Maize].EndCrop;
            2016-11-12  [SurfaceOrganicMatter].Incorporate(0.75, 250);
            2017-04-17  [SurfaceOrganicMatter].Incorporate(0.25, 150);
            2017-05-09  [Soybean].Sow(population: 25, cultivar: "FACTS_P932T16", depth: 50, rowSpacing: 760);
            2017-10-31  [Soybean].Harvest;
            2017-10-31  [Soybean].EndCrop;
            2017-11-12  [SurfaceOrganicMatter].Incorporate(0.05, 250);
            2018-05-17  [SurfaceOrganicMatter].Incorporate(0.25, 150);
            2018-05-17  [Fertiliser].Apply(336, Fertiliser.Types.UreaN, 50);
            2018-05-18  [Maize].Sow(population: 8.8, cultivar: "FACTS_P1151", depth: 50, rowSpacing: 760);
            2018-10-22  [Maize].Harvest;
            2018-10-22  [Maize].EndCrop;
            2018-11-12  [SurfaceOrganicMatter].Incorporate(0.75, 250);
            2019-04-21  [SurfaceOrganicMatter].Incorporate(0.25, 150);
            2019-05-06  [Soybean].Sow(population: 30, cultivar: "FACTS_P932T16", depth: 50, rowSpacing: 760);
            2019-10-20  [Soybean].Harvest;
            2019-10-20  [Soybean].EndCrop;
            2019-11-09  [SurfaceOrganicMatter].Incorporate(0.05, 250);
      Simulation KanawahaBase
        Clock: Start=2014-01-01; End=2019-12-31
        Summary SummaryFile
        Weather: FileName=Kanawaha.July5.2020.met
        SoilArbitrator Soil Arbitrator
        Zone Field: Area=1; Slope=0; AspectAngle=0; Altitude=50
          Operations
          Report MaizeReport: VariableNames=[Clock].Today; EventNames=[Maize].Harvesting
          Report SoybeanReport: VariableNames=[Clock].Today; EventNames=[Maize].Harvesting
          Fertiliser
          Soil
            Physical
              Thickness  ParticleSizeClay  ParticleSizeSand  ParticleSizeSilt  BD     AirDry  LL15   DUL    SAT    KS
              25         32                30                38                1.2    0.097   0.194  0.319  0.547  409
              25         32                30                38                1.2    0.097   0.194  0.319  0.547  409
              50         32                30                38                1.2    0.097   0.194  0.319  0.547  409
              100        32                30                38                1.2    0.155   0.194  0.319  0.547  409
              100        32                32                36                1.25   0.23    0.23   0.336  0.491  148
              150        32                32                36                1.35   0.23    0.23   0.336  0.491  148
              150        32                32                36                1.35   0.207   0.207  0.324  0.458  106
              150        27                39                34                1.4    0.171   0.171  0.304  0.426  134
              150        27                39                34                1.4    0.171   0.171  0.304  0.426  134
              150        21                44                35                1.598  0.132   0.132  0.276  0.397  205
              150        21                44                35                1.598  0.132   0.132  0.276  0.397  205
              300        21                44                35                1.598  0.132   0.132  0.276  0.397  205
              300        21                44                35                1.6    0.132   0.132  0.276  0.342  23.593
              300        21                44                35                1.6    0.132   0.132  0.276  0.335  16.369
              300        21                44                35                1.6    0.132   0.132  0.276  0.329  11.357
              300        21                44                35                1.6    0.132   0.132  0.276  0.323  7.88
              300        21                44                35                1.6    0.132   0.132  0.276  0.318  5.467
              300        21                44                35                1.6    0.132   0.132  0.276  0.314  3.793
              300        21                44                35                1.6    0.132   0.132  0.276  0.31   2.632
              300        21                44                35                1.6    0.132   0.132  0.276  0.306  1.826
              SoilCrop MaizeSoil
                LL=[0.194, 0.194, 0.194, 0.194, 0.23, 0.258, 0.248, 0.229, 0.238, 0.216, 0.224, 0.236, 0.248, 0.261, 0.264, 0.264, 0.264, 0.264, 0.264, 0.264]
                KL=[0.08, 0.08, 0.08, 0.08, 0.08, 0.08, 0.08, 0.08, 0.08, 0.08, 0.08, 0.04, 0.04, 0.03, 0.02, 0.02, 0.01, 0.01, 0, 0]
                XF=[1, 1, 1, 1, 1, 1, 1, 1, 1, 1, 1, 1, 1, 0.4, 0.4, 0, 0, 0, 0, 0]
              SoilCrop SoybeanSoil: same as Kanawaha.Kanawaha.KanawahaBase.Field.Soil.Physical.MaizeSoil
            WaterBalance SoilWater: SummerDate=1-Nov; SummerU=5; SummerCona=5; WinterDate=1-Apr; WinterU=5; WinterCona=5; DiffusConst=40; DiffusSlope=16; Salb=0.13; CN2Bare=72; CNRed=20; CNCov=0.8; PSIDul=-100
              Thickness=[25, 25, 50, 100, 100, 150, 150, 150, 150, 150, 150, 300, 300, 300, 300, 300, 300, 300, 300, 300, -]
              SWCON=[0.3, 0.3, 0.3, 0.3, 0.3, 0.3, 0.3, 0.3, 0.3, 0.3, 0.3, 0.3, 0.3, 0.3, 0.3, 0.3, 0.3, 0.3, 0.3, 0.3, -]
            Organic: FOMCNRatio=40; CarbonUnits=Total
              Thickness  Carbon  SoilCNRatio  FBiom  FInert  FOM
              25         3.35    12           0.25   0.365   483.114
              25         3.35    12           0.176  0.365   468.836
              50         3.35    12           0.111  0.365   441.533
              100        2.32    12           0.07   0.42    391.605
              100        2.32    12           0.05   0.456   347.322
              150        1.31    12           0.038  0.5     290.108
              150        1.31    12           0.031  0.718   242.318
              150        0.75    12           0.026  0.738   202.401
              150        0.75    12           0.023  0.757   169.06
              150        0.63    12           0.02   0.961   141.211
              150        0.63    12           0.018  0.97    117.949
              300        0.6     12           0.016  0.984   82.29
              300        0.58    12           0.014  0.999   57.412
              300        0.52    12           0.013  0.999   40.055
              300        0.5     12           0.012  0.999   40.055
              300        0.1     12           0.011  0.999   22.191
              300        0.1     12           0.01   0.999   22.191
              300        0.1     12           0.009  0.999   22.191
              300        0.1     12           0.009  0.999   22.191
              300        0.1     12           0.008  0.999   22.191
            Chemical: PHUnits=Water
              Thickness=[25, 25, 50, 100, 100, 150, 150, 150, 150, 150, 150, 300, 300, 300, 300, 300, 300, 300, 300, 300]
              PH=[7.4, 7.4, 7.4, 7.4, 7.4, 7.4, 7.4, 7.4, 7.4, 7.4, 7.4, 7.4, 7.4, 7.4, 7.4, 7.4, 7.4, 7.4, 7.4, 7.4]
            Water: InitialPAWmm=540.95; RelativeTo=LL15; FilledFromTop=false
              Thickness=[25, 25, 50, 100, 100, 150, 150, 150, 150, 150, 150, 300, 300, 300, 300, 300, 300, 300, 300, 300]
              InitialValues=[0.319, 0.319, 0.319, 0.319, 0.336, 0.336, 0.324, 0.304, 0.304, 0.276, 0.276, 0.276, 0.276, 0.276, 0.276, 0.276, 0.276, 0.276, 0.276, 0.276]
            CERESSoilTemperature Temperature
            Nutrient
            Solute NO3: InitialValuesUnits=ppm; WaterTableConcentration=0; D0=0; DepthConstant=0; MaxDepthSoluteAccessible=0; RunoffEffectivenessAtMovingSolute=0; MaxEffectiveRunoff=0
              Thickness=[25, 25, 50, 100, 100, 150, 150, 150, 150, 150, 150, 300, 300, 300, 300, 300, 300, 300, 300, 300]
              InitialValues=[0.96, 1.28, 1.28, 1.76, 2.08, 2.123, 1.877, 1.619, 1.143, 0.75, 0.417, 0.271, 0.167, 0.167, 0.146, 0.146, 0.083, 0.063, 0.042, 0]
            Solute NH4: InitialValuesUnits=ppm; WaterTableConcentration=0; D0=0; DepthConstant=0; MaxDepthSoluteAccessible=0; RunoffEffectivenessAtMovingSolute=0; MaxEffectiveRunoff=0
              Thickness=[25, 25, 50, 100, 100, 150, 150, 150, 150, 150, 150, 300, 300, 300, 300, 300, 300, 300, 300, 300]
              InitialValues=[2.24, 2.56, 2.56, 0.96, 0.64, 0.296, 0.247, 0.143, 0.143, 0, 0, 0, 0.146, 0, 0, 0, 0, 0, 0, 0]
            Solute Urea: InitialValuesUnits=kg/ha; WaterTableConcentration=0; D0=0; DepthConstant=0; MaxDepthSoluteAccessible=0; RunoffEffectivenessAtMovingSolute=0; MaxEffectiveRunoff=0
              Thickness=[25, 25, 50, 100, 100, 150, 150, 150, 150, 150, 150, 300, 300, 300, 300, 300, 300, 300, 300, 300]
              InitialValues=[0, 0, 0, 0, 0, 0, 0, 0, 0, 0, 0, 0, 0, 0, 0, 0, 0, 0, 0, 0]
          SurfaceOrganicMatter: InitialResidueName=soybean; InitialResidueType=base_type; InitialResidueMass=1400; InitialStandingFraction=0; InitialCPR=0; InitialCNR=36.5
          Plant Maize
            Folder FACTS
              Cultivar FACTS_P1151
                Command:
                  [Phenology].Juvenile.Target.FixedValue = 240
                  [Phenology].Photosensitive.Target.XYPairs.Y = 0,0,0
                  [Phenology].FlagLeafToFlowering.Target.FixedValue = 1
                  [Phenology].FloweringToGrainFilling.Target.FixedValue = 150
                  [Phenology].GrainFilling.Target.FixedValue = 620
                  [Phenology].Maturing.Target.FixedValue=50
                  [Phenology].MaturityToHarvestRipe.Target.FixedValue=50
                  [Maize].Grain.MaximumGrainsPerCob.FixedValue = 630
                  [Maize].Grain.MaximumPotentialGrainSize.FixedValue = 0.3
                  [Grain].MaximumNConc.InitialPhase.InitialNconc.FixedValue=0.03
                  [Maize].Root.SpecificRootLength.FixedValue=170
                  [Maize].Root.RootFrontVelocity.PotentialRootFrontVelocity.PreFlowering.RootFrontVelocity.FixedValue=22
                  [Maize].Root.MaximumNConc.FixedValue=0.015
                  [Maize].Root.MinimumNConc.FixedValue=0.015
          Plant Soybean
            Folder FACTS
              Cultivar FACTS_P92Y75
                Command:
                  [Phenology].Vegetative.Target.FixedValue = 300
                  [Phenology].EarlyFlowering.Target.FixedValue = 100
                  [Phenology].EarlyGrainFilling.Target.FractionofGrainfilling.FixedValue = 0.15
                  [Phenology].LateGrainFilling.Target.EntireGrainfillPeriod.FixedValue = 660
                  [Phenology].VegetativePhotoperiodModifier.XYPairs.X = 13.59, 17.61
                  [Phenology].ReproductivePhotoperiodModifier.XYPairs.X = 13.59, 17.61
                  [Leaf].AreaLargestLeaf.FixedValue=0.007
                  [Soybean].Root.SpecificRootLength.FixedValue=130
                  [Soybean].Root.RootFrontVelocity.PotentialRootFrontVelocity.early.Function.FixedValue=22
                  [Stem].PotentialGrowth.PartitionFraction.StemGrowthPhase.StemFraction.FixedValue=0.35
                  [Soybean].Root.MaximumNConc.FixedValue=0.02
                  [Soybean].Root.MinimumNConc.FixedValue=0.009
                  [Soybean].Grain.MaximumNConc.FixedValue=0.065
                  [Soybean].Grain.MinimumNConc.FixedValue=0.051
              Cultivar FACTS_P932T16
                Command:
                  [Phenology].Vegetative.Target.FixedValue = 330
                  [Phenology].EarlyFlowering.Target.FixedValue = 100
                  [Phenology].EarlyGrainFilling.Target.FractionofGrainfilling.FixedValue = 0.05
                  [Phenology].LateGrainFilling.Target.EntireGrainfillPeriod.FixedValue = 660
                  [Phenology].VegetativePhotoperiodModifier.XYPairs.X = 13.5, 17.5
                  [Phenology].ReproductivePhotoperiodModifier.XYPairs.X = 13.5, 17.5
                  [Soybean].Root.SpecificRootLength.FixedValue=130
                  [Soybean].Root.RootFrontVelocity.PotentialRootFrontVelocity.early.Function.FixedValue=22
                  [Stem].PotentialGrowth.PartitionFraction.StemGrowthPhase.StemFraction.FixedValue=0.35
                  [Soybean].Root.MaximumNConc.FixedValue=0.02
                  [Soybean].Root.MinimumNConc.FixedValue=0.009
                  [Soybean].Grain.MaximumNConc.FixedValue=0.065
                  [Soybean].Grain.MinimumNConc.FixedValue=0.051
              Cultivar MG_2
                Command:
                  [Phenology].Vegetative.Target.FixedValue = 300
                  [Phenology].EarlyFlowering.Target.FixedValue = 100
                  [Phenology].EarlyGrainFilling.Target.FractionofGrainfilling.FixedValue = 0.15
                  [Phenology].LateGrainFilling.Target.EntireGrainfillPeriod.FixedValue = 660
                  [Phenology].VegetativePhotoperiodModifier.XYPairs.X = 13.59, 17.61
                  [Phenology].ReproductivePhotoperiodModifier.XYPairs.X = 13.59, 17.61
                  [Soybean].Root.SpecificRootLength.FixedValue=130
                  [Soybean].Root.RootFrontVelocity.PotentialRootFrontVelocity.early.Function.FixedValue=22
                  [Stem].PotentialGrowth.PartitionFraction.StemGrowthPhase.StemFraction.FixedValue=0.35
                  [Soybean].Root.MaximumNConc.FixedValue=0.02
                  [Soybean].Root.MinimumNConc.FixedValue=0.009
                  [Soybean].Grain.MaximumNConc.FixedValue=0.065
                  [Soybean].Grain.MinimumNConc.FixedValue=0.051
              Cultivar MG_3: same as Kanawaha.Kanawaha.KanawahaBase.Field.Soybean.FACTS.FACTS_P932T16
          MicroClimate: a_interception=0; b_interception=1; c_interception=0; d_interception=0; SoilHeatFluxFraction=0.4; MinimumHeightDiffForNewLayer=0; NightInterceptionFraction=0.5; ReferenceHeight=2
          Report MaizeReportHarvest: VariableNames=[Clock].Today; EventNames=[Clock].DoReport
          Manager WaterTableManager2015
            InitialWaterTableDepth = 2000
            InSeasonWaterTableDepth = 1250
            StartDate = 05/01/2015 00:00:00
            EndDate = 05/20/2015 00:00:00
```csharp
using Models.Interfaces;
using Models.Soils;
using APSIM.Shared.Utilities;
using Models.PMF;
using Models.Core;
using System;
using Models.Soils.Nutrients;
        
        namespace Models
        {
           [Serializable] 
           [System.Xml.Serialization.XmlInclude(typeof(Model))]
            public class Script : Model
            {      
        [Link] private Soil Soil;
        [Link] private Clock Clock;
        [Link]
        private ISoilWater waterBalance;

               [Description("Initial Water Table Depth (mm)")]
               public double InitialWaterTableDepth { get; set; }

              [Description("InSeason Table Depth (mm)")]
               public double InSeasonWaterTableDepth { get; set; }

               [Description("Start Date")]
               public DateTime StartDate { get; set; }

               [Description("End Date")]
               public DateTime EndDate { get; set; }


        [EventSubscribe("StartOfSimulation")]
        private void OnSimulationCommencing(object sender, EventArgs e)
        {
        //(waterBalance).WaterTable = InitialWaterTableDepth;
        }       

               [EventSubscribe("DoManagement")]
               private void OnDoManagement(object sender, EventArgs e)
               {
                if (Clock.Today.Date >= StartDate && Clock.Today.Date >= EndDate)
                   (waterBalance).WaterTable = InSeasonWaterTableDepth;
                else
                    (waterBalance).WaterTable = InitialWaterTableDepth;
               }
            }
        }
```
          Manager WaterTableManager2016
            InitialWaterTableDepth = 2000
            InSeasonWaterTableDepth = 1250
            StartDate = 05/01/2016 00:00:00
            EndDate = 05/20/2016 00:00:00
            script: same as in Kanawaha.Kanawaha.KanawahaBase.Field.WaterTableManager2015
          Manager WaterTableManager2017
            InitialWaterTableDepth = 2000
            InSeasonWaterTableDepth = 1250
            StartDate = 05/01/2017 00:00:00
            EndDate = 05/20/2017 00:00:00
            script: same as in Kanawaha.Kanawaha.KanawahaBase.Field.WaterTableManager2015
          Manager WaterTableManager2018
            InitialWaterTableDepth = 2000
            InSeasonWaterTableDepth = 1250
            StartDate = 05/01/2018 00:00:00
            EndDate = 05/20/2018 00:00:00
            script: same as in Kanawaha.Kanawaha.KanawahaBase.Field.WaterTableManager2015
          Manager WaterTableManager2019
            InitialWaterTableDepth = 2000
            InSeasonWaterTableDepth = 1250
            StartDate = 05/01/2019 00:00:00
            EndDate = 05/20/2019 00:00:00
            script: same as in Kanawaha.Kanawaha.KanawahaBase.Field.WaterTableManager2015
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