Simulations: Version=3
  DataStore
    ExcelInput Observed: FileName=observed.xlsx; SheetNames=[ObsSoil, ObsCrop]
    PredictedObserved: PredictedTableName=HarvestReport; ObservedTableName=ObsCrop; FieldNameUsedForMatch=Clock.Today.Year
  Experiment Pendleton
    Factors
      Factor Burn: Specifications=[BurnOperations]
        Operations Spring
        Operations Fall
        Operations Nil
      Factor N: Specifications=[NOperations]
        Operations 0
          1931-10-15  [Fertiliser].Apply(Amount: 0, Type: Fertiliser.Types.NO3N);
          1933-10-15  [Fertiliser].Apply(Amount: 0, Type: Fertiliser.Types.NO3N);
          1935-10-15  [Fertiliser].Apply(Amount: 0, Type: Fertiliser.Types.NO3N);
          1937-10-15  [Fertiliser].Apply(Amount: 0, Type: Fertiliser.Types.NO3N);
          1939-10-15  [Fertiliser].Apply(Amount: 0, Type: Fertiliser.Types.NO3N);
          1941-10-15  [Fertiliser].Apply(Amount: 0, Type: Fertiliser.Types.NO3N);
          1943-10-15  [Fertiliser].Apply(Amount: 0, Type: Fertiliser.Types.NO3N);
          1945-10-15  [Fertiliser].Apply(Amount: 0, Type: Fertiliser.Types.NO3N);
          1947-10-15  [Fertiliser].Apply(Amount: 0, Type: Fertiliser.Types.NO3N);
          1949-10-15  [Fertiliser].Apply(Amount: 0, Type: Fertiliser.Types.NO3N);
          1951-10-15  [Fertiliser].Apply(Amount: 0, Type: Fertiliser.Types.NO3N);
          1953-10-15  [Fertiliser].Apply(Amount: 0, Type: Fertiliser.Types.NO3N);
          1955-10-15  [Fertiliser].Apply(Amount: 0, Type: Fertiliser.Types.NO3N);
          1957-10-15  [Fertiliser].Apply(Amount: 0, Type: Fertiliser.Types.NO3N);
          1959-10-15  [Fertiliser].Apply(Amount: 0, Type: Fertiliser.Types.NO3N);
          1961-10-15  [Fertiliser].Apply(Amount: 0, Type: Fertiliser.Types.NO3N);
          1963-10-15  [Fertiliser].Apply(Amount: 0, Type: Fertiliser.Types.NO3N);
          1965-10-15  [Fertiliser].Apply(Amount: 0, Type: Fertiliser.Types.NO3N);
          1967-10-15  [Fertiliser].Apply(Amount: 0, Type: Fertiliser.Types.NO3N);
          1969-10-15  [Fertiliser].Apply(Amount: 0, Type: Fertiliser.Types.NO3N);
          1971-10-15  [Fertiliser].Apply(Amount: 0, Type: Fertiliser.Types.NO3N);
          1973-10-15  [Fertiliser].Apply(Amount: 0, Type: Fertiliser.Types.NO3N);
          1975-10-15  [Fertiliser].Apply(Amount: 0, Type: Fertiliser.Types.NO3N);
          1977-10-15  [Fertiliser].Apply(Amount: 0, Type: Fertiliser.Types.NO3N);
          1979-10-15  [Fertiliser].Apply(Amount: 0, Type: Fertiliser.Types.NO3N);
          1981-10-15  [Fertiliser].Apply(Amount: 0, Type: Fertiliser.Types.NO3N);
          1983-10-15  [Fertiliser].Apply(Amount: 0, Type: Fertiliser.Types.NO3N);
          1985-10-15  [Fertiliser].Apply(Amount: 0, Type: Fertiliser.Types.NO3N);
          1987-10-15  [Fertiliser].Apply(Amount: 0, Type: Fertiliser.Types.NO3N);
          1989-10-15  [Fertiliser].Apply(Amount: 0, Type: Fertiliser.Types.NO3N);
          1991-10-15  [Fertiliser].Apply(Amount: 0, Type: Fertiliser.Types.NO3N);
          1993-10-15  [Fertiliser].Apply(Amount: 0, Type: Fertiliser.Types.NO3N);
          1995-10-15  [Fertiliser].Apply(Amount: 0, Type: Fertiliser.Types.NO3N);
          1997-10-15  [Fertiliser].Apply(Amount: 0, Type: Fertiliser.Types.NO3N);
          1999-10-15  [Fertiliser].Apply(Amount: 0, Type: Fertiliser.Types.NO3N);
        Operations 45
          1931-10-15  [Fertiliser].Apply(Amount: 45, Type: Fertiliser.Types.NO3N);
          1933-10-15  [Fertiliser].Apply(Amount: 45, Type: Fertiliser.Types.NO3N);
          1935-10-15  [Fertiliser].Apply(Amount: 45, Type: Fertiliser.Types.NO3N);
          1937-10-15  [Fertiliser].Apply(Amount: 45, Type: Fertiliser.Types.NO3N);
          1939-10-15  [Fertiliser].Apply(Amount: 45, Type: Fertiliser.Types.NO3N);
          1941-10-15  [Fertiliser].Apply(Amount: 45, Type: Fertiliser.Types.NO3N);
          1943-10-15  [Fertiliser].Apply(Amount: 45, Type: Fertiliser.Types.NO3N);
          1945-10-15  [Fertiliser].Apply(Amount: 45, Type: Fertiliser.Types.NO3N);
          1947-10-15  [Fertiliser].Apply(Amount: 45, Type: Fertiliser.Types.NO3N);
          1949-10-15  [Fertiliser].Apply(Amount: 45, Type: Fertiliser.Types.NO3N);
          1951-10-15  [Fertiliser].Apply(Amount: 45, Type: Fertiliser.Types.NO3N);
          1953-10-15  [Fertiliser].Apply(Amount: 45, Type: Fertiliser.Types.NO3N);
          1955-10-15  [Fertiliser].Apply(Amount: 45, Type: Fertiliser.Types.NO3N);
          1957-10-15  [Fertiliser].Apply(Amount: 45, Type: Fertiliser.Types.NO3N);
          1959-10-15  [Fertiliser].Apply(Amount: 45, Type: Fertiliser.Types.NO3N);
          1961-10-15  [Fertiliser].Apply(Amount: 45, Type: Fertiliser.Types.NO3N);
          1963-10-15  [Fertiliser].Apply(Amount: 45, Type: Fertiliser.Types.NO3N);
          1965-10-15  [Fertiliser].Apply(Amount: 45, Type: Fertiliser.Types.NO3N);
          1967-10-15  [Fertiliser].Apply(Amount: 45, Type: Fertiliser.Types.NO3N);
          1969-10-15  [Fertiliser].Apply(Amount: 45, Type: Fertiliser.Types.NO3N);
          1971-10-15  [Fertiliser].Apply(Amount: 45, Type: Fertiliser.Types.NO3N);
          1973-10-15  [Fertiliser].Apply(Amount: 45, Type: Fertiliser.Types.NO3N);
          1975-10-15  [Fertiliser].Apply(Amount: 45, Type: Fertiliser.Types.NO3N);
          1977-10-15  [Fertiliser].Apply(Amount: 45, Type: Fertiliser.Types.NO3N);
          1979-10-15  [Fertiliser].Apply(Amount: 45, Type: Fertiliser.Types.NO3N);
          1981-10-15  [Fertiliser].Apply(Amount: 45, Type: Fertiliser.Types.NO3N);
          1983-10-15  [Fertiliser].Apply(Amount: 45, Type: Fertiliser.Types.NO3N);
          1985-10-15  [Fertiliser].Apply(Amount: 45, Type: Fertiliser.Types.NO3N);
          1987-10-15  [Fertiliser].Apply(Amount: 45, Type: Fertiliser.Types.NO3N);
          1989-10-15  [Fertiliser].Apply(Amount: 45, Type: Fertiliser.Types.NO3N);
          1991-10-15  [Fertiliser].Apply(Amount: 45, Type: Fertiliser.Types.NO3N);
          1993-10-15  [Fertiliser].Apply(Amount: 45, Type: Fertiliser.Types.NO3N);
          1995-10-15  [Fertiliser].Apply(Amount: 45, Type: Fertiliser.Types.NO3N);
          1997-10-15  [Fertiliser].Apply(Amount: 45, Type: Fertiliser.Types.NO3N);
          1999-10-15  [Fertiliser].Apply(Amount: 45, Type: Fertiliser.Types.NO3N);
        Operations 90
          1931-10-15  [Fertiliser].Apply(Amount: 90, Type: Fertiliser.Types.NO3N);
          1933-10-15  [Fertiliser].Apply(Amount: 90, Type: Fertiliser.Types.NO3N);
          1935-10-15  [Fertiliser].Apply(Amount: 90, Type: Fertiliser.Types.NO3N);
          1937-10-15  [Fertiliser].Apply(Amount: 90, Type: Fertiliser.Types.NO3N);
          1939-10-15  [Fertiliser].Apply(Amount: 90, Type: Fertiliser.Types.NO3N);
          1941-10-15  [Fertiliser].Apply(Amount: 90, Type: Fertiliser.Types.NO3N);
          1943-10-15  [Fertiliser].Apply(Amount: 90, Type: Fertiliser.Types.NO3N);
          1945-10-15  [Fertiliser].Apply(Amount: 90, Type: Fertiliser.Types.NO3N);
          1947-10-15  [Fertiliser].Apply(Amount: 90, Type: Fertiliser.Types.NO3N);
          1949-10-15  [Fertiliser].Apply(Amount: 90, Type: Fertiliser.Types.NO3N);
          1951-10-15  [Fertiliser].Apply(Amount: 90, Type: Fertiliser.Types.NO3N);
          1953-10-15  [Fertiliser].Apply(Amount: 90, Type: Fertiliser.Types.NO3N);
          1955-10-15  [Fertiliser].Apply(Amount: 90, Type: Fertiliser.Types.NO3N);
          1957-10-15  [Fertiliser].Apply(Amount: 90, Type: Fertiliser.Types.NO3N);
          1959-10-15  [Fertiliser].Apply(Amount: 90, Type: Fertiliser.Types.NO3N);
          1961-10-15  [Fertiliser].Apply(Amount: 90, Type: Fertiliser.Types.NO3N);
          1963-10-15  [Fertiliser].Apply(Amount: 90, Type: Fertiliser.Types.NO3N);
          1965-10-15  [Fertiliser].Apply(Amount: 90, Type: Fertiliser.Types.NO3N);
          1967-10-15  [Fertiliser].Apply(Amount: 90, Type: Fertiliser.Types.NO3N);
          1969-10-15  [Fertiliser].Apply(Amount: 90, Type: Fertiliser.Types.NO3N);
          1971-10-15  [Fertiliser].Apply(Amount: 90, Type: Fertiliser.Types.NO3N);
          1973-10-15  [Fertiliser].Apply(Amount: 90, Type: Fertiliser.Types.NO3N);
          1975-10-15  [Fertiliser].Apply(Amount: 90, Type: Fertiliser.Types.NO3N);
          1977-10-15  [Fertiliser].Apply(Amount: 90, Type: Fertiliser.Types.NO3N);
          1979-10-15  [Fertiliser].Apply(Amount: 90, Type: Fertiliser.Types.NO3N);
          1981-10-15  [Fertiliser].Apply(Amount: 90, Type: Fertiliser.Types.NO3N);
          1983-10-15  [Fertiliser].Apply(Amount: 90, Type: Fertiliser.Types.NO3N);
          1985-10-15  [Fertiliser].Apply(Amount: 90, Type: Fertiliser.Types.NO3N);
          1987-10-15  [Fertiliser].Apply(Amount: 90, Type: Fertiliser.Types.NO3N);
          1989-10-15  [Fertiliser].Apply(Amount: 90, Type: Fertiliser.Types.NO3N);
          1991-10-15  [Fertiliser].Apply(Amount: 90, Type: Fertiliser.Types.NO3N);
          1993-10-15  [Fertiliser].Apply(Amount: 90, Type: Fertiliser.Types.NO3N);
          1995-10-15  [Fertiliser].Apply(Amount: 90, Type: Fertiliser.Types.NO3N);
          1997-10-15  [Fertiliser].Apply(Amount: 90, Type: Fertiliser.Types.NO3N);
          1999-10-15  [Fertiliser].Apply(Amount: 90, Type: Fertiliser.Types.NO3N);
        Operations Manure
          1931-04-15  [SurfaceOrganicMatter].Add(mass: 11379, N: 100, P:0.0, type: "wheat", name: "");
          1933-04-15  [SurfaceOrganicMatter].Add(mass: 11379, N: 100, P:0.0, type: "wheat", name: "");
          1935-04-15  [SurfaceOrganicMatter].Add(mass: 11379, N: 100, P:0.0, type: "wheat", name: "");
          1937-04-15  [SurfaceOrganicMatter].Add(mass: 11379, N: 100, P:0.0, type: "wheat", name: "");
          1939-04-15  [SurfaceOrganicMatter].Add(mass: 11379, N: 100, P:0.0, type: "wheat", name: "");
          1941-04-15  [SurfaceOrganicMatter].Add(mass: 11379, N: 100, P:0.0, type: "wheat", name: "");
          1943-04-15  [SurfaceOrganicMatter].Add(mass: 0, N: 100, P:0.0, type: "wheat", name: "");
          1945-04-15  [SurfaceOrganicMatter].Add(mass: 0, N: 100, P:0.0, type: "wheat", name: "");
          1947-04-15  [SurfaceOrganicMatter].Add(mass: 0, N: 100, P:0.0, type: "wheat", name: "");
          1949-04-15  [SurfaceOrganicMatter].Add(mass: 11379, N: 100, P:0.0, type: "wheat", name: "");
          1951-04-15  [SurfaceOrganicMatter].Add(mass: 11379, N: 100, P:0.0, type: "wheat", name: "");
          1953-04-15  [SurfaceOrganicMatter].Add(mass: 11379, N: 100, P:0.0, type: "wheat", name: "");
          1955-04-15  [SurfaceOrganicMatter].Add(mass: 11379, N: 100, P:0.0, type: "wheat", name: "");
          1957-04-15  [SurfaceOrganicMatter].Add(mass: 11379, N: 100, P:0.0, type: "wheat", name: "");
          1959-04-15  [SurfaceOrganicMatter].Add(mass: 11379, N: 100, P:0.0, type: "wheat", name: "");
          1961-04-15  [SurfaceOrganicMatter].Add(mass: 11379, N: 100, P:0.0, type: "wheat", name: "");
          1963-04-15  [SurfaceOrganicMatter].Add(mass: 11379, N: 100, P:0.0, type: "wheat", name: "");
          1965-04-15  [SurfaceOrganicMatter].Add(mass: 11379, N: 100, P:0.0, type: "wheat", name: "");
          1967-04-15  [SurfaceOrganicMatter].Add(mass: 11379, N: 100, P:0.0, type: "wheat", name: "");
          1969-04-15  [SurfaceOrganicMatter].Add(mass: 11379, N: 100, P:0.0, type: "wheat", name: "");
          1971-04-15  [SurfaceOrganicMatter].Add(mass: 11379, N: 100, P:0.0, type: "wheat", name: "");
          1973-04-15  [SurfaceOrganicMatter].Add(mass: 11379, N: 100, P:0.0, type: "wheat", name: "");
          1975-04-15  [SurfaceOrganicMatter].Add(mass: 11379, N: 100, P:0.0, type: "wheat", name: "");
          1977-04-15  [SurfaceOrganicMatter].Add(mass: 11379, N: 100, P:0.0, type: "wheat", name: "");
          1979-04-15  [SurfaceOrganicMatter].Add(mass: 11379, N: 100, P:0.0, type: "wheat", name: "");
          1981-04-15  [SurfaceOrganicMatter].Add(mass: 11379, N: 100, P:0.0, type: "wheat", name: "");
          1983-04-15  [SurfaceOrganicMatter].Add(mass: 11379, N: 100, P:0.0, type: "wheat", name: "");
          1985-04-15  [SurfaceOrganicMatter].Add(mass: 11379, N: 100, P:0.0, type: "wheat", name: "");
          1987-04-15  [SurfaceOrganicMatter].Add(mass: 11379, N: 100, P:0.0, type: "wheat", name: "");
          1989-04-15  [SurfaceOrganicMatter].Add(mass: 11379, N: 100, P:0.0, type: "wheat", name: "");
          1991-04-15  [SurfaceOrganicMatter].Add(mass: 11379, N: 100, P:0.0, type: "wheat", name: "");
          1993-04-15  [SurfaceOrganicMatter].Add(mass: 11379, N: 100, P:0.0, type: "wheat", name: "");
          1995-04-15  [SurfaceOrganicMatter].Add(mass: 11379, N: 100, P:0.0, type: "wheat", name: "");
          1997-04-15  [SurfaceOrganicMatter].Add(mass: 11379, N: 100, P:0.0, type: "wheat", name: "");
          1999-04-15  [SurfaceOrganicMatter].Add(mass: 11379, N: 100, P:0.0, type: "wheat", name: "");
        Operations PeaVine
          1931-04-15  [SurfaceOrganicMatter].Add(mass: 2009, N: 73, P:0.0, type: "wheat", name: "");
          1933-04-15  [SurfaceOrganicMatter].Add(mass: 2009, N: 73, P:0.0, type: "wheat", name: "");
          1935-04-15  [SurfaceOrganicMatter].Add(mass: 2009, N: 73, P:0.0, type: "wheat", name: "");
          1937-04-15  [SurfaceOrganicMatter].Add(mass: 2009, N: 73, P:0.0, type: "wheat", name: "");
          1939-04-15  [SurfaceOrganicMatter].Add(mass: 2009, N: 73, P:0.0, type: "wheat", name: "");
          1941-04-15  [SurfaceOrganicMatter].Add(mass: 2009, N: 73, P:0.0, type: "wheat", name: "");
          1943-04-15  [SurfaceOrganicMatter].Add(mass: 2009, N: 73, P:0.0, type: "wheat", name: "");
          1945-04-15  [SurfaceOrganicMatter].Add(mass: 2009, N: 73, P:0.0, type: "wheat", name: "");
          1947-04-15  [SurfaceOrganicMatter].Add(mass: 2009, N: 73, P:0.0, type: "wheat", name: "");
          1949-04-15  [SurfaceOrganicMatter].Add(mass: 2009, N: 73, P:0.0, type: "wheat", name: "");
          1951-04-15  [SurfaceOrganicMatter].Add(mass: 2009, N: 35, P:0.0, type: "wheat", name: "");
          1953-04-15  [SurfaceOrganicMatter].Add(mass: 2009, N: 35, P:0.0, type: "wheat", name: "");
          1955-04-15  [SurfaceOrganicMatter].Add(mass: 2009, N: 35, P:0.0, type: "wheat", name: "");
          1957-04-15  [SurfaceOrganicMatter].Add(mass: 2009, N: 35, P:0.0, type: "wheat", name: "");
          1959-04-15  [SurfaceOrganicMatter].Add(mass: 2009, N: 35, P:0.0, type: "wheat", name: "");
          1961-04-15  [SurfaceOrganicMatter].Add(mass: 2009, N: 35, P:0.0, type: "wheat", name: "");
          1963-04-15  [SurfaceOrganicMatter].Add(mass: 2009, N: 35, P:0.0, type: "wheat", name: "");
          1965-04-15  [SurfaceOrganicMatter].Add(mass: 2009, N: 35, P:0.0, type: "wheat", name: "");
          1967-04-15  [SurfaceOrganicMatter].Add(mass: 2009, N: 35, P:0.0, type: "wheat", name: "");
          1969-04-15  [SurfaceOrganicMatter].Add(mass: 2009, N: 35, P:0.0, type: "wheat", name: "");
          1971-04-15  [SurfaceOrganicMatter].Add(mass: 2009, N: 35, P:0.0, type: "wheat", name: "");
          1973-04-15  [SurfaceOrganicMatter].Add(mass: 2009, N: 35, P:0.0, type: "wheat", name: "");
          1975-04-15  [SurfaceOrganicMatter].Add(mass: 2009, N: 35, P:0.0, type: "wheat", name: "");
          1977-04-15  [SurfaceOrganicMatter].Add(mass: 2009, N: 35, P:0.0, type: "wheat", name: "");
          1979-04-15  [SurfaceOrganicMatter].Add(mass: 2009, N: 35, P:0.0, type: "wheat", name: "");
          1981-04-15  [SurfaceOrganicMatter].Add(mass: 2009, N: 35, P:0.0, type: "wheat", name: "");
          1983-04-15  [SurfaceOrganicMatter].Add(mass: 2009, N: 35, P:0.0, type: "wheat", name: "");
          1985-04-15  [SurfaceOrganicMatter].Add(mass: 2009, N: 35, P:0.0, type: "wheat", name: "");
          1987-04-15  [SurfaceOrganicMatter].Add(mass: 2009, N: 35, P:0.0, type: "wheat", name: "");
          1989-04-15  [SurfaceOrganicMatter].Add(mass: 2009, N: 35, P:0.0, type: "wheat", name: "");
          1991-04-15  [SurfaceOrganicMatter].Add(mass: 2009, N: 35, P:0.0, type: "wheat", name: "");
          1993-04-15  [SurfaceOrganicMatter].Add(mass: 2009, N: 35, P:0.0, type: "wheat", name: "");
          1995-04-15  [SurfaceOrganicMatter].Add(mass: 2009, N: 35, P:0.0, type: "wheat", name: "");
          1997-04-15  [SurfaceOrganicMatter].Add(mass: 2009, N: 35, P:0.0, type: "wheat", name: "");
          1999-04-15  [SurfaceOrganicMatter].Add(mass: 2009, N: 35, P:0.0, type: "wheat", name: "");
    Simulation PendletonBaseSimulation
      Weather: FileName=pendletonAPSIMtav.met
      Clock: StartDate=1930-01-01; EndDate=1996-12-31
      Summary summaryfile
      Zone Field: Area=1; Slope=0
        Operations SowOperations
          1931-10-15  [Wheat].Sow(cultivar:PendletonTall, depth:30, population:100, rowSpacing:300);
          1933-10-15  [Wheat].Sow(cultivar:PendletonTall, depth:30, population:100, rowSpacing:300);
          1935-10-15  [Wheat].Sow(cultivar:PendletonTall, depth:30, population:100, rowSpacing:300);
          1937-10-15  [Wheat].Sow(cultivar:PendletonTall, depth:30, population:100, rowSpacing:300);
          1939-10-15  [Wheat].Sow(cultivar:PendletonTall, depth:30, population:100, rowSpacing:300);
          1941-10-15  [Wheat].Sow(cultivar:PendletonTall, depth:30, population:100, rowSpacing:300);
          1943-10-15  [Wheat].Sow(cultivar:PendletonTall, depth:30, population:100, rowSpacing:300);
          1945-10-15  [Wheat].Sow(cultivar:PendletonTall, depth:30, population:100, rowSpacing:300);
          1947-10-15  [Wheat].Sow(cultivar:PendletonTall, depth:30, population:100, rowSpacing:300);
          1949-10-15  [Wheat].Sow(cultivar:PendletonTall, depth:30, population:100, rowSpacing:300);
          1951-10-15  [Wheat].Sow(cultivar:PendletonTall, depth:30, population:100, rowSpacing:300);
          1953-10-15  [Wheat].Sow(cultivar:PendletonTall, depth:30, population:100, rowSpacing:300);
          1955-10-15  [Wheat].Sow(cultivar:PendletonTall, depth:30, population:100, rowSpacing:300);
          1957-10-15  [Wheat].Sow(cultivar:PendletonTall, depth:30, population:100, rowSpacing:300);
          1959-10-15  [Wheat].Sow(cultivar:PendletonTall, depth:30, population:100, rowSpacing:300);
          1961-10-15  [Wheat].Sow(cultivar:PendletonTall, depth:30, population:100, rowSpacing:300);
          1963-10-15  [Wheat].Sow(cultivar:PendletonTall, depth:30, population:100, rowSpacing:300);
          1965-10-15  [Wheat].Sow(cultivar:PendletonDwarf, depth:30, population:100, rowSpacing:300);
          1967-10-15  [Wheat].Sow(cultivar:PendletonDwarf, depth:30, population:100, rowSpacing:300);
          1969-10-15  [Wheat].Sow(cultivar:PendletonDwarf, depth:30, population:100, rowSpacing:300);
          1971-10-15  [Wheat].Sow(cultivar:PendletonDwarf, depth:30, population:100, rowSpacing:300);
          1973-10-15  [Wheat].Sow(cultivar:PendletonDwarf, depth:30, population:100, rowSpacing:300);
          1975-10-15  [Wheat].Sow(cultivar:PendletonDwarf, depth:30, population:100, rowSpacing:300);
          1977-10-15  [Wheat].Sow(cultivar:PendletonDwarf, depth:30, population:100, rowSpacing:300);
          1979-10-15  [Wheat].Sow(cultivar:PendletonDwarf, depth:30, population:100, rowSpacing:300);
          1981-10-15  [Wheat].Sow(cultivar:PendletonDwarf, depth:30, population:100, rowSpacing:300);
          1983-10-15  [Wheat].Sow(cultivar:PendletonDwarf, depth:30, population:100, rowSpacing:300);
          1985-10-15  [Wheat].Sow(cultivar:PendletonDwarf, depth:30, population:100, rowSpacing:300);
          1987-10-15  [Wheat].Sow(cultivar:PendletonDwarf, depth:30, population:100, rowSpacing:300);
          1989-10-15  [Wheat].Sow(cultivar:PendletonDwarf, depth:30, population:100, rowSpacing:300);
          1991-10-15  [Wheat].Sow(cultivar:PendletonDwarf, depth:30, population:100, rowSpacing:300);
          1993-10-15  [Wheat].Sow(cultivar:PendletonDwarf, depth:30, population:100, rowSpacing:300);
          1995-10-15  [Wheat].Sow(cultivar:PendletonDwarf, depth:30, population:100, rowSpacing:300);
          1997-10-15  [Wheat].Sow(cultivar:PendletonDwarf, depth:30, population:100, rowSpacing:300);
          1999-10-15  [Wheat].Sow(cultivar:PendletonDwarf, depth:30, population:100, rowSpacing:300);
        Operations TillageOperations
        Operations BurnOperations
        Operations NOperations
        Report: EventNames=[Clock].DoReport
          VariableNames:
            [Clock].Today
            [Soil].SoilNitrogen.oc[1:3]
        Report HarvestReport: EventNames=[Wheat].Harvesting
          VariableNames:
            [Clock].Today.Year
            [Wheat].Grain.Wt
            [Wheat].AboveGround.Wt
            sum([Soil].SoilNitrogen.TotalC[1:2]) as SOC30
            [Soil].SoilNitrogen.TotalC[3] as SOC60
            sum([Soil].SoilNitrogen.TotalN[1:2]) as SON30
            [Soil].SoilNitrogen.TotalN[3] as SON60
            sum([Soil].SoilNitrogen.TotalC[1:2])/sum([Soil].SoilNitrogen.TotalN[1:2]) as CNR30
            [Soil].SoilNitrogen.TotalC[3]/[Soil].SoilNitrogen.TotalN[3] as CNR60
        SurfaceOrganicMatter stubble: PoolName=wheat; type=wheat; mass=1000; standing_fraction=0; cnr=80; CriticalResidueWeight=2000; OptimumDecompTemp=20; MaxCumulativeEOS=20; CNRatioDecompCoeff=0.277; CNRatioDecompThreshold=25; TotalLeachRain=25; MinRainToLeach=10; CriticalMinimumOrganicC=0.004; DefaultCPRatio=0; DefaultStandingFraction=0; StandingExtinctCoeff=0.5; FractionFaecesAdded=0.5
          Pools:
            {PoolName=wheat, ResidueType=wheat, Mass=1000, CNRatio=80, StandingFraction=0}
          ResidueTypes ResidueTypesList: LoadFromResource=ResidueTypes
        Plant15 wheat: ResourceName=Wheat; AutoHarvest=false; CropType=wheat
        MicroClimate: a_interception=0; b_interception=1; c_interception=0; d_interception=0; soil_albedo=0.23; sun_angle=15; soil_heat_flux_fraction=0.4; night_interception_fraction=0.5; refheight=2; albedo=0.15; emissivity=0.96; RadIntTotal=0
        Manager Harvesting
          Crop = wheat
```csharp
using System;
using Models.Core;
using Models.PMF;
using Models.Soils;
using Models.Utilities;
using APSIM.Shared.Utilities;

namespace Models
{
	[Serializable] 
	public class Script : Model
	{
		[Description("Crop")]
		public ICrop Crop { get; set; }
        
		[EventSubscribe("DoManagement")]
		private void OnDoManagement(object sender, EventArgs e)
		{
			if (Crop.IsReadyForHarvesting)
			{
				Crop.Harvest();
				Crop.EndCrop();
			}
		}
	}
}
```
        Manager SowingFertiliser
          Amount = 160
          CropName = wheat
```csharp
using System;
using Models.Core;
using Models.PMF;
namespace Models
{
	[Serializable]
	public class Script : Model
	{
		[Link] Clock Clock;
		[Link] Fertiliser Fertiliser;
		[Link] Summary Summary;
		
		
		[Description("Amount of fertiliser to be applied (kg/ha)")]
		public double Amount { get; set; }
		
		[Description("Crop to be fertilised")]
		public string CropName { get; set; }
		
		
		

		[EventSubscribe("Sowing")]
		private void OnSowing(object sender, EventArgs e)
		{
			Model crop = sender as Model;
			if (crop.Name.ToLower() == CropName.ToLower())
				Fertiliser.Apply(Amount: Amount, Type: Fertiliser.Types.NO3N);
		}
		
	}
}
```
        Fertiliser
        Soil: ASCOrder=Sodosol; ASCSubOrder=Red; SoilType=Sandy loam; Site=Tarlee; NearestTown=Tarlee; Region=Mid North; State=South Australia; Country=Australia; ApsoilNumber=610; Latitude=-34.276; Longitude=138.759; LocationAccuracy=+/- 20m
          DataSource=Characterisation 2008 by University of Adelaide, CSIRO Sustainable Ecosystems and Allan Mayfield Consulting, Clare, SA
          Comments=Roots: Wheat 90cm; barley and oats estimated; OC WB as measured; Strongly duplex low-moderate clay soil. Surface CEC low, moderate below. Texture change at about 7cm. Little chemical impediment to root growth, but high ESP below about 60cm may result in slaking or dispersion and high bulk density.
          Water
            Thickness  BD    AirDry  LL15  DUL   SAT   KS
            150        1.24  0.055   0.11  0.32  0.52  562
            150        1.25  0.055   0.11  0.32  0.52  562
            300        1.26  0.09    0.11  0.31  0.51  557
            300        1.29  0.1     0.1   0.31  0.5   959
            300        1.3   0.1     0.1   0.3   0.49  1063
            300        1.3   0.1     0.1   0.3   0.49  1063
            300        1.3   0.1     0.1   0.3   0.49  1063
            SoilCrop WheatSoil: LL=[0.11, 0.11, 0.11, 0.1, 0.1, 0.1, 0.1]; KL=[0.06, 0.06, 0.05, 0.04, 0.04, 0.02, 0.01]; XF=[1, 1, 1, 1, 1, 0, 0]
          SoilWater: SummerDate=1-Apr; SummerU=6; SummerCona=3.5; WinterDate=1-Nov; WinterU=2; WinterCona=2; DiffusConst=88; DiffusSlope=35; Salb=0.13; CN2Bare=73; CNRed=20; CNCov=0.8; max_pond=0; Thickness=[100, 200, 300, 300, 900]; SWCON=[0.5, 0.5, 0.5, 0.5, 0.5]; residueinterception=0
          SoilNitrogen: fom_type=[default, manure, mucuna, lablab, shemp, stable]; fract_carb=[0.2, 0.3, 0.54, 0.57, 0.45, 0]; fract_cell=[0.7, 0.3, 0.37, 0.37, 0.47, 0.1]; fract_lign=[0.1, 0.4, 0.09, 0.06, 0.08, 0.9]; wfpsN2N2O_x=[22, 88]; wfpsN2N2O_y=[0.1, 1]
          SoilOrganicMatter: RootCN=57; RootWt=1109; SoilCN=12; EnrACoeff=7.4; EnrBCoeff=0.2; OCUnits=Total
            Thickness  OC     FBiom  FInert
            150        1.42   0.04   0.35
            150        1.2    0.03   0.5
            300        0.95   0.02   0.65
            300        0.5    0.02   0.75
            300        0.225  0.015  0.85
            300        0.15   0.01   0.99
            300        0.15   0.01   0.99
          Analysis: Thickness=[150, 150, 300, 300, 300, 300, 300]; PH=[6.64, 6.64, 6.64, 6.64, 6.64, 6.64, 6.64]; PHUnits=Water; BoronUnits=HotWater
          InitialWater Initial water: PercentMethod=FilledFromTop; FractionFull=1
          Sample Initial conditions: NO3Units=kgha; NH4Units=ppm; SWUnits=Volumetric; OCUnits=Total; PHUnits=Water
            Thickness  NO3   NH4
            100        10.2  0.0355556
            200        19.9  0
            300        19    0
            300        15.5  0
            300        21.1  0
            300        17.7  0
            300        17.7  0
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