Simulations: Version=6
  DataStore
    ExcelInput Observed: FileName=observed.xlsx; SheetNames=[ObsCrop, ObsSoil]
    PredictedObserved: PredictedTableName=HarvestReport; ObservedTableName=ObsCrop; FieldNameUsedForMatch=Clock.Today.Year
    PredictedObserved PredictedObservedSoil: PredictedTableName=Report; ObservedTableName=ObsSoil; FieldNameUsedForMatch=Clock.Today
  Experiment Tarlee
    Factors
      Factor Rotation: Specifications=[operations]
        Operations WW
          1978-07-18  [Wheat].Sow(cultivar:hartog, depth:30, population:100, rowSpacing:300);
          1979-06-21  [Wheat].Sow(cultivar:hartog, depth:30, population:100, rowSpacing:300);
          1980-07-16  [Wheat].Sow(cultivar:hartog, depth:30, population:100, rowSpacing:300);
          1981-07-16  [Wheat].Sow(cultivar:hartog, depth:30, population:100, rowSpacing:300);
          1982-06-07  [Wheat].Sow(cultivar:hartog, depth:30, population:100, rowSpacing:300);
          1983-06-04  [Wheat].Sow(cultivar:hartog, depth:30, population:100, rowSpacing:300);
          1984-06-26  [Wheat].Sow(cultivar:hartog, depth:30, population:100, rowSpacing:300);
          1985-06-11  [Wheat].Sow(cultivar:hartog, depth:30, population:100, rowSpacing:300);
          1986-07-21  [Wheat].Sow(cultivar:hartog, depth:30, population:100, rowSpacing:300);
          1987-06-02  [Wheat].Sow(cultivar:hartog, depth:30, population:100, rowSpacing:300);
          1988-06-23  [Wheat].Sow(cultivar:hartog, depth:30, population:100, rowSpacing:300);
          1989-06-06  [Wheat].Sow(cultivar:hartog, depth:30, population:100, rowSpacing:300);
          1990-07-23  [Wheat].Sow(cultivar:hartog, depth:30, population:100, rowSpacing:300);
          1991-06-26  [Wheat].Sow(cultivar:hartog, depth:30, population:100, rowSpacing:300);
          1992-06-01  [Wheat].Sow(cultivar:hartog, depth:30, population:100, rowSpacing:300);
          1993-06-24  [Wheat].Sow(cultivar:hartog, depth:30, population:100, rowSpacing:300);
          1994-06-24  [Wheat].Sow(cultivar:hartog, depth:30, population:100, rowSpacing:300);
          1995-06-24  [Wheat].Sow(cultivar:hartog, depth:30, population:100, rowSpacing:300);
          1996-06-23  [Wheat].Sow(cultivar:hartog, depth:30, population:100, rowSpacing:300);
        Operations WF
          1979-06-21  [Wheat].Sow(cultivar:hartog, depth:30, population:100, rowSpacing:300);
          1981-07-16  [Wheat].Sow(cultivar:hartog, depth:30, population:100, rowSpacing:300);
          1983-06-04  [Wheat].Sow(cultivar:hartog, depth:30, population:100, rowSpacing:300);
          1985-06-11  [Wheat].Sow(cultivar:hartog, depth:30, population:100, rowSpacing:300);
          1987-06-02  [Wheat].Sow(cultivar:hartog, depth:30, population:100, rowSpacing:300);
          1989-06-06  [Wheat].Sow(cultivar:hartog, depth:30, population:100, rowSpacing:300);
          1991-06-26  [Wheat].Sow(cultivar:hartog, depth:30, population:100, rowSpacing:300);
          1993-06-24  [Wheat].Sow(cultivar:hartog, depth:30, population:100, rowSpacing:300);
          1995-06-24  [Wheat].Sow(cultivar:hartog, depth:30, population:100, rowSpacing:300);
      Factor Stubble: Specifications=[stubbleoperations]
        Operations Burnt
          1978-12-31  [SurfaceOrganicMatter].Incorporate(fraction: 0.90, depth: 0)
          1979-12-31  [SurfaceOrganicMatter].Incorporate(fraction: 0.90, depth: 0)
          1980-12-31  [SurfaceOrganicMatter].Incorporate(fraction: 0.90, depth: 0)
          1981-12-31  [SurfaceOrganicMatter].Incorporate(fraction: 0.90, depth: 0)
          1982-12-31  [SurfaceOrganicMatter].Incorporate(fraction: 0.90, depth: 0)
          1983-12-31  [SurfaceOrganicMatter].Incorporate(fraction: 0.90, depth: 0)
          1984-12-31  [SurfaceOrganicMatter].Incorporate(fraction: 0.90, depth: 0)
          1985-12-31  [SurfaceOrganicMatter].Incorporate(fraction: 0.90, depth: 0)
          1986-12-31  [SurfaceOrganicMatter].Incorporate(fraction: 0.90, depth: 0)
          1987-12-31  [SurfaceOrganicMatter].Incorporate(fraction: 0.90, depth: 0)
          1988-12-31  [SurfaceOrganicMatter].Incorporate(fraction: 0.90, depth: 0)
          1989-12-31  [SurfaceOrganicMatter].Incorporate(fraction: 0.90, depth: 0)
          1990-12-31  [SurfaceOrganicMatter].Incorporate(fraction: 0.90, depth: 0)
          1991-12-31  [SurfaceOrganicMatter].Incorporate(fraction: 0.90, depth: 0)
          1992-12-31  [SurfaceOrganicMatter].Incorporate(fraction: 0.90, depth: 0)
          1993-12-31  [SurfaceOrganicMatter].Incorporate(fraction: 0.90, depth: 0)
          1994-12-31  [SurfaceOrganicMatter].Incorporate(fraction: 0.90, depth: 0)
          1995-12-31  [SurfaceOrganicMatter].Incorporate(fraction: 0.90, depth: 0)
        Operations Incorporated
          1978-12-31  [SurfaceOrganicMatter].Incorporate(fraction: 0.90, depth: 100)
          1979-12-31  [SurfaceOrganicMatter].Incorporate(fraction: 0.90, depth: 100)
          1980-12-31  [SurfaceOrganicMatter].Incorporate(fraction: 0.90, depth: 100)
          1981-12-31  [SurfaceOrganicMatter].Incorporate(fraction: 0.90, depth: 100)
          1982-12-31  [SurfaceOrganicMatter].Incorporate(fraction: 0.90, depth: 100)
          1983-12-31  [SurfaceOrganicMatter].Incorporate(fraction: 0.90, depth: 100)
          1984-12-31  [SurfaceOrganicMatter].Incorporate(fraction: 0.90, depth: 100)
          1985-12-31  [SurfaceOrganicMatter].Incorporate(fraction: 0.90, depth: 100)
          1986-12-31  [SurfaceOrganicMatter].Incorporate(fraction: 0.90, depth: 100)
          1987-12-31  [SurfaceOrganicMatter].Incorporate(fraction: 0.90, depth: 100)
          1988-12-31  [SurfaceOrganicMatter].Incorporate(fraction: 0.90, depth: 100)
          1989-12-31  [SurfaceOrganicMatter].Incorporate(fraction: 0.90, depth: 100)
          1990-12-31  [SurfaceOrganicMatter].Incorporate(fraction: 0.90, depth: 100)
          1991-12-31  [SurfaceOrganicMatter].Incorporate(fraction: 0.90, depth: 100)
          1992-12-31  [SurfaceOrganicMatter].Incorporate(fraction: 0.90, depth: 100)
          1993-12-31  [SurfaceOrganicMatter].Incorporate(fraction: 0.90, depth: 100)
          1994-12-31  [SurfaceOrganicMatter].Incorporate(fraction: 0.90, depth: 100)
          1995-12-31  [SurfaceOrganicMatter].Incorporate(fraction: 0.90, depth: 100)
        Operations Retained
      Factor N: Specifications=[SowingFertiliser].Script.Amount = 0,40,80
    Simulation TarleeBaseSimulation
      Weather: FileName=Tarlee.met
      Clock: StartDate=1978-01-01; EndDate=1996-12-31
      Summary summaryfile
      Zone Field: Area=1; Slope=0
        Operations: same as Tarlee.Factors.Rotation.WW
        Operations stubbleoperations
        Report: EventNames=[Clock].EndOfMonth
          VariableNames:
            [Clock].Today
            [Soil].SoilNitrogen.oc[1:3]
            [Soil].SoilNitrogen.TotalC[1] as TOC0_10cm
            [Soil].SoilNitrogen.TotalC[2] as TOC10_30cm
            [Soil].SoilNitrogen.TotalC[3] as TOC30_60cm
            ([Soil].SoilNitrogen.TotalC[1]+[Soil].SoilNitrogen.TotalC[2]) as TOC0_30cm
        Report HarvestReport: EventNames=[Wheat].Harvesting
          VariableNames:
            [Clock].Today.Year
            [Wheat].Grain.Wt
            [Wheat].AboveGround.Wt
            [Wheat].Grain.Size
        SurfaceOrganicMatter stubble: PoolName=wheat; type=wheat; mass=1000; standing_fraction=0; cnr=80; CriticalResidueWeight=2000; OptimumDecompTemp=20; MaxCumulativeEOS=20; CNRatioDecompCoeff=0.277; CNRatioDecompThreshold=25; TotalLeachRain=25; MinRainToLeach=10; CriticalMinimumOrganicC=0.004; DefaultCPRatio=0; DefaultStandingFraction=0; StandingExtinctCoeff=0.5; FractionFaecesAdded=0.5
          Pools:
            {PoolName=wheat, ResidueType=wheat, Mass=1000, CNRatio=80, StandingFraction=0}
          ResidueTypes ResidueTypesList: LoadFromResource=ResidueTypes
        Plant15 wheat: ResourceName=Wheat; AutoHarvest=false; CropType=wheat
        MicroClimate: a_interception=0; b_interception=1; c_interception=0; d_interception=0; soil_albedo=0.23; sun_angle=15; soil_heat_flux_fraction=0.4; night_interception_fraction=0.5; refheight=2; albedo=0.15; emissivity=0.96; RadIntTotal=0
        Manager Harvesting
          Crop = wheat
```csharp
using System;
using Models.Core;
using Models.PMF;
using Models.Soils;
using Models.Utilities;
using APSIM.Shared.Utilities;

namespace Models
{
	[Serializable] 
	public class Script : Model
	{
		[Description("Crop")]
		public ICrop Crop { get; set; }
        
		[EventSubscribe("DoManagement")]
		private void OnDoManagement(object sender, EventArgs e)
		{
			if (Crop.IsReadyForHarvesting)
			{
				Crop.Harvest();
				Crop.EndCrop();
			}
		}
	}
}
```
        Soil: ASCOrder=Sodosol; ASCSubOrder=Red; SoilType=Sand; Site=Tarlee; NearestTown=Tarlee; Region=Mid North; State=South Australia; Country=Australia; ApsoilNumber=610; Latitude=-34.276; Longitude=138.759; LocationAccuracy=+/- 20m
          DataSource=Characterisation 2008 by University of Adelaide, CSIRO Sustainable Ecosystems and Allan Mayfield Consulting, Clare, SA
          Comments=Roots: Wheat 90cm; barley and oats estimated; OC WB as measured; Strongly duplex low-moderate clay soil. Surface CEC low, moderate below. Texture change at about 7cm. Little chemical impediment to root growth, but high ESP below about 60cm may result in slaking or dispersion and high bulk density.
          Water
            Thickness  BD    AirDry  LL15   DUL    SAT
            100        1.54  0.055   0.11   0.223  0.389
            200        1.41  0.167   0.209  0.388  0.438
            300        1.53  0.22    0.22   0.342  0.393
            300        1.57  0.22    0.22   0.293  0.378
            350        1.6   0.22    0.22   0.264  0.366
            SoilCrop WheatSoil: LL=[0.11, 0.209, 0.24, 0.225, 0.222]; KL=[0.06, 0.06, 0.06, 0.04, 0.04]; XF=[1, 1, 1, 1, 1]
          SoilWater: SummerDate=1-Nov; SummerU=6; SummerCona=3.5; WinterDate=1-Apr; WinterU=2; WinterCona=2; DiffusConst=88; DiffusSlope=35; Salb=0.13; CN2Bare=73; CNRed=20; CNCov=0.8; max_pond=0; Thickness=[100, 200, 300, 300, 350]; SWCON=[0.5, 0.5, 0.5, 0.5, 0.5]; residueinterception=0
          SoilNitrogen: fom_type=[default, manure, mucuna, lablab, shemp, stable]; fract_carb=[0.2, 0.3, 0.54, 0.57, 0.45, 0]; fract_cell=[0.7, 0.3, 0.37, 0.37, 0.47, 0.1]; fract_lign=[0.1, 0.4, 0.09, 0.06, 0.08, 0.9]; wfpsN2N2O_x=[22, 88]; wfpsN2N2O_y=[0.1, 1]
          SoilOrganicMatter: RootCN=40; RootWt=5000; SoilCN=12; EnrACoeff=7.4; EnrBCoeff=0.2; OCUnits=Total
            Thickness  OC    FBiom  FInert
            100        0.96  0.04   0.1
            200        0.72  0.02   0.15
            300        0.38  0.02   0.5
            300        0.12  0.02   0.99
            350        0.12  0.01   0.99
          Analysis: Thickness=[100, 200, 300, 300, 350]; PH=[7, 7.9, 8.9, 9.2, 9.2]; PHUnits=Water; BoronUnits=HotWater
          InitialWater Initial water: PercentMethod=FilledFromTop; FractionFull=1
          Sample Initial conditions: Thickness=[1800]; NO3=[10]; NH4=[1]; NO3Units=kgha; NH4Units=kgha; SWUnits=Volumetric; OCUnits=Total; PHUnits=Water
          CERESSoilTemperature
        Manager SowingFertiliser
          Amount = 160
          CropName = wheat
```csharp
using System;
using Models.Core;
using Models.PMF;
namespace Models
{
	[Serializable]
	public class Script : Model
	{
		[Link] Clock Clock;
		[Link] Fertiliser Fertiliser;
		[Link] Summary Summary;
		
		
		[Description("Amount of fertiliser to be applied (kg/ha)")]
		public double Amount { get; set; }
		
		[Description("Crop to be fertilised")]
		public string CropName { get; set; }
		
		
		

		[EventSubscribe("Sowing")]
		private void OnSowing(object sender, EventArgs e)
		{
			Model crop = sender as Model;
			if (crop.Name.ToLower() == CropName.ToLower())
				Fertiliser.Apply(Amount: Amount, Type: Fertiliser.Types.NO3N);
		}
		
	}
}
```
        Fertiliser
        SoluteManager
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