Simulations: Version=206
  DataStore
    ExcelInput ExcelMultiInput: FileNames=[GrassPatch2024_Observed.xlsx]; SheetNames=[Observed]
    PredictedObserved DailyObsPred (disabled): PredictedTableName=DailyReport; ObservedTableName=Observed; FieldNameUsedForMatch=SimulationName; FieldName2UsedForMatch=Clock.Today; AllColumns=false
      Tests: POName=DailyObsPred
        AcceptedStats:
          Name                   n     Slope         Intercept   SEslope      SEintercept  R2           RMSE       NSE         ME          MAE         RSR       RMR
          ET                     123   1.13169       -0.428525   0.0437149    0.169573     0.847065     0.75711    0.750672    0.0416707   0.558234    0.497294  0
          ProfileWater           1327  0.876588      76.0389     0.0130203    5.47947      0.7738       58.7876    0.702733    25.8355     33.06       0.545016  0
          Soil.SoilWater.SW(1)   1300  0.000187106   0.209326    0.000113886  0.00216848   0.00207521   18.9789    -0.0810339  -5.20763    5.28548     1.03933   0
          Soil.SoilWater.SW(10)  8     -0.411168     0.612361    0.204164     0.087484     0.403332     0.0113816  -3.15811    0.00772724  0.00919543  1.90744   0
          Soil.SoilWater.SW(2)   1323  -9.03035e-05  0.237103    7.90585e-05  0.00185795   0.000986689  23.4358    -0.0848838  -6.54813    6.60052     1.04118   0
          Soil.SoilWater.SW(3)   1323  7.41365e-05   0.225765    6.63683e-05  0.00193967   0.000943693  29.1595    -0.0857037  -8.19945    8.22086     1.04158   0
          Soil.SoilWater.SW(4)   1323  0.00032245    0.209832    5.67479e-05  0.00181599   0.0238581    31.9313    -0.0847602  -8.95944    8.97693     1.04112   0
          Soil.SoilWater.SW(5)   1323  0.000184327   0.244192    5.45151e-05  0.00180824   0.00858025   33.0939    -0.0856543  -9.31536    9.33089     1.04155   0
          Soil.SoilWater.SW(6)   1218  0.983201      0.00665286  0.00580358   0.00166975   0.959354     0.0168556  0.958159    0.00202203  0.00893392  0.204467  0
          Soil.SoilWater.SW(7)   1194  0.995766      0.00138347  0.00547865   0.00136097   0.965173     0.0121361  0.964171    0.00036727  0.00674653  0.189207  0
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        AcceptedStatsName=Name n Slope Intercept SEslope SEintercept R2 RMSE NSE ME MAE RSR
    PredictedObserved HarvestObsPred (disabled): PredictedTableName=HarvestReport; ObservedTableName=Observed; FieldNameUsedForMatch=SimulationName; FieldName2UsedForMatch=Wheat.Phenology.CurrentStageName; AllColumns=false
      Tests: POName=HarvestObsPred
        AcceptedStats:
          Name                                  n    Slope      Intercept   SEslope     SEintercept  R2          RMSE        NSE         ME           MAE         RSR       RMR
          Wheat.AboveGround.N                   67   1.12809    -1.00273    0.0391678   0.525848     0.927336    2.09151     0.875576    0.540148     1.59606     0.350095  0
          Wheat.AboveGround.Wt                  211  1.01911    34.1751     0.0202867   28.6588      0.923515    188.663     0.904426    58.5184      140.453     0.308417  0
          Wheat.Grain.N                         135  1.07639    -0.257745   0.0362834   0.353004     0.868717    1.79883     0.808865    0.415699     1.36719     0.435568  0
          Wheat.Grain.Nconc                     136  0.52548    0.0109277   0.0578165   0.00130116   0.381364    0.00332647  0.31597     0.000420536  0.00251003  0.824015  0
          Wheat.Grain.Number                    195  0.819153   2260.06     0.0213448   308.959      0.88414     2247.71     0.879203    -81.8409     1634.74     0.346666  0
          Wheat.Grain.Protein                   114  0.424157   7.85561     0.0562272   0.726492     0.336911    2.10436     0.263918    0.550644     1.57133     0.854181  0
          Wheat.Grain.Wt                        233  0.978713   11.017      0.0292591   15.5104      0.828875    103.644     0.801774    0.879252     78.6576     0.444269  0
          Wheat.Leaf.CohortMaxSize(1)           10   0.0270759  255.563     0.0327969   7.48653      0.078506    51.271      -0.92608    36.4016      40.5202     1.31661   0
          Wheat.Leaf.CohortMaxSize(10)          10   1.11919    -412.466    0.256733    521.362      0.703745    224.554     -0.300948   -171.57      207.903     1.08206   0
          Wheat.Leaf.CohortMaxSize(11)          10   0.825212   365.905     0.266736    598.083      0.54471     196.601     0.391552    -23.5263     115.224     0.740002  0
          Wheat.Leaf.CohortMaxSize(12)          10   0.848404   253.801     0.223896    493.954      0.642195    151.745     0.416747    -79.2873     105.917     0.724519  0
          Wheat.Leaf.CohortMaxSize(13)          10   1.09708    -403.529    1.01788     2346.69      0.126797    703.826     -7.88491    -180.887     351.071     2.82779   0
          Wheat.Leaf.CohortMaxSize(14)          10   1.30676    -642.351    0.429337    1019.71      0.536608    603.245     -0.59098    71.3164      415.854     1.19661   0
          Wheat.Leaf.CohortMaxSize(15)          9    -0.26027   2713.41     0.159916    364.78       0.274529    585.946     -0.830732   -109.076     515.056     1.27566   0
          Wheat.Leaf.CohortMaxSize(16)          3    -0.645839  2788.84     7.95817     13511.1      0.00654291  1245.82     -65.0428    6.01155      1116.21     6.6354    0
          Wheat.Leaf.CohortMaxSize(17)          2    3.1965     -3522.2732  0           0            1           590.025     -4.43529    -197.771     555.892     1.64853   0
          Wheat.Leaf.CohortMaxSize(18)          1    -          -           -           -            -           985.267     -           985.267      985.267     -         0
          Wheat.Leaf.CohortMaxSize(2)           10   0.0630555  275.197     0.29264     121.589      0.00577     139.081     -3.00585    -108.611     115.388     1.89875   0
          Wheat.Leaf.CohortMaxSize(3)           10   0.289291   221.125     0.270354    144.318      0.125205    181.922     -2.6244     -152.132     163.333     1.80609   0
          Wheat.Leaf.CohortMaxSize(4)           10   0.345581   263.167     0.345159    223.342      0.111353    208.379     -1.99176    -152.884     173.867     1.64091   0
          Wheat.Leaf.CohortMaxSize(5)           10   0.249259   458.154     0.277019    225.53       0.0919017   229.975     -0.868592   -139.856     146.902     1.29682   0
          Wheat.Leaf.CohortMaxSize(6)           10   0.345905   476.527     0.195687    187.624      0.280871    242.414     -0.0368856  -130.978     145.477     0.966021  0
          Wheat.Leaf.CohortMaxSize(7)           10   0.441949   501.987     0.142766    157.184      0.545013    176.986     0.296106    -101.041     122.714     0.79593   0
          Wheat.Leaf.CohortMaxSize(8)           10   0.589766   515.86      0.179194    229.582      0.575192    169.291     0.574802    1.17705      117.592     0.61861   0
          Wheat.Leaf.CohortMaxSize(9)           10   0.793068   300.515     0.327977    507.562      0.422258    241.916     0.0929616   -15.3812     161.582     0.903512  0
          Wheat.Phenology.FlagLeafDAS.Value()   255  0.974146   6.29479     0.00979673  1.35981      0.97505     8.03204     0.971245    2.92157      5.87059     0.16924   0
          Wheat.Phenology.FloweringDAS.Value()  299  0.943644   8.35638     0.00705763  1.10217      0.983658    6.98781     0.982029    0.0602007    4.93645     0.133831  0
        AcceptedStatsName=Name n Slope Intercept SEslope SEintercept R2 RMSE NSE ME MAE RSR
  Folder Replacements
    Report HarvestReport: EventNames=[Wheat].Harvesting
      VariableNames:
        [Clock].Today
        [Wheat].SowingDate
        [Wheat].SowingData.Cultivar
        [Wheat].SowingData.Population
        [Wheat].Phenology.CurrentPhase.Name
        [Wheat].Phenology.CurrentStageName
        [Wheat].Phenology.EmergenceDAS
        [Wheat].Phenology.TerminalSpikeletDAS
        [Wheat].Phenology.FlagLeafDAS
        [Wheat].Phenology.HeadingDAS
        [Wheat].Phenology.FloweringDAS
        [Wheat].Phenology.MaturityDAS
        [Wheat].Grain.Wt
        [Wheat].Grain.N
        [Wheat].Grain.Number
        [Wheat].Grain.Size
        [Wheat].Grain.NConc
        [Wheat].AboveGround.Wt
        [Wheat].AboveGround.N
        [Wheat].Grain.Protein
        [Wheat].Grain.Size
        [Wheat].Phenology.FinalLeafNumber
        [Wheat].Leaf.MainStemPopulation
        [Wheat].SowingData.Cultivar
        [Wheat].SowingDate.DayOfYear
        [Clock].StartDate
        ([Wheat].Phenology.FloweringDAS - [Wheat].Phenology.EmergenceDAS) as FloweringDAE
        [IWeather].Latitude
        [IWeather].Longitude
        [IWeather].FileName
        [IWeather].CO2
        [IWeather].Amp
        [IWeather].Tav
        [LocationInfo].Script.Country
        [LocationInfo].Script.State
        [LocationInfo].Script.Region
    Report DailyReport: EventNames=[Clock].DoReport
      VariableNames:
        [Clock].Today
        [Soil].Water.Volumetric
        sum([Soil].Water.MM) as ProfileWater
        sum([Soil].NO3.kgha) as TotalNO3
        [IWeather].Radn
        [IWeather].MeanT
        [Wheat].AboveGround.N
        [Wheat].AboveGround.Wt
        [Wheat].AboveGroundLive.N
        [Wheat].AboveGroundLive.Wt
        [Wheat].AboveGroundDead.N
        [Wheat].AboveGroundDead.Wt
        [Wheat].Ear.N
        [Wheat].Ear.NConc
        [Wheat].Ear.Wt
        [Wheat].Grain.N
        [Wheat].Grain.NConc
        [Wheat].Grain.Number
        [Wheat].Grain.Size
        [Wheat].Grain.Wt
        [Wheat].Leaf.Tips
        [Wheat].Leaf.CoverGreen
        [NDVIModel].Script.NDVI
        [Wheat].Leaf.CoverGreen*100 as GreenCover
        [Wheat].Leaf.CoverTotal
        [Wheat].Leaf.Dead.N
        [Wheat].Leaf.Dead.NConc
        [Wheat].Leaf.Dead.Wt
        [Wheat].Leaf.DeadCohortNo
        [Wheat].Leaf.SenescingCohortNo
        [Wheat].Leaf.Ligules
        [Wheat].Leaf.Fn
        [Wheat].Leaf.Fw
        [Wheat].Leaf.Photosynthesis.FT
        [Wheat].Leaf.Height
        [Wheat].Leaf.InitialisedCohortNo
        [Wheat].Leaf.LAI
        [Wheat].Leaf.Live.N
        [Wheat].Leaf.Live.NConc
        [Wheat].Leaf.Live.Wt
        [Wheat].Leaf.SpecificArea
        [Wheat].Leaf.SpecificNitrogen
        [Wheat].Leaf.Transpiration
        [Wheat].Phenology.CurrentPhase.Name
        [Wheat].Phenology.CurrentStageName
        [Wheat].Phenology.EmergenceDAS
        [Wheat].Phenology.Stage
        [Wheat].Phenology.ThermalTime
        [Wheat].Phenology.Zadok.Stage
        [Wheat].Root.Depth
        [Wheat].Root.N
        [Wheat].Root.Wt
        [Wheat].Root.NConc
        [Wheat].Spike.N
        [Wheat].Spike.NConc
        [Wheat].Spike.Wt
        [Wheat].Stem.N
        [Wheat].Stem.NConc
        [Wheat].Stem.Wt
        [Wheat].StemPlusSpike.Wt
        [Wheat].StemPlusSpike.N
        [Wheat].SowingData.Cultivar
        [Wheat].SowingDate
        [Wheat].Structure.Height / 10 as Height
        [Wheat].Leaf.Height
        [Wheat].Phenology.HaunStage
        [Wheat].Phenology.HaunStage
        [Wheat].Leaf.Height
        [Wheat].Leaf.Tips
        [Wheat].Leaf.FinalLeafNumber
        [Wheat].Leaf.MainStemPopulation
        [Wheat].Leaf.StemPopulation
        [Wheat].Phenology.PTQ
        [Wheat].Phenology.Phyllochron
        [Wheat].Total.N
        [Wheat].Total.Wt
        ([Wheat].Leaf.Transpiration + [Soil].SoilWater.Es + [MicroClimate].PrecipitationInterception) as ET
        [IWeather].MeanT
        [Wheat].Phenology.Photoperiod
        [Wheat].Phenology.AccumulatedTT
        [Soil].Temperature.AverageSoilTemperature[1]
    Manager Harvesting
```csharp
using APSIM.Core;
using Models.Soils.Nutrients;
using System;
using Models.Core;
using System.Collections.Generic;
using System.Text;
using Models.Soils;
using Models.PMF;
using Models;
using System.Xml.Serialization;
using APSIM.Shared.Utilities;
using Models.PMF.Phen;

namespace Models
{
    [Serializable] 
    public class Script : Model, IStructureDependency
    {
        [Link] private Plant Wheat;
        [Link] private Simulation sim;
        [Link] private Clock clock;
        [Link(Type = LinkType.Path, Path = "[Wheat].Phenology")]
        private Phenology phenology;
        public IStructure Structure { private get; set; }


//        [EventSubscribe("DoManagement")]
//        private void OnDoManagement(object sender, EventArgs e)
//        {
//            if (phenology.CurrentPhase.Name == "GrainRipening")
//           // if (phenology.CurrentPhase.Name == "ReadyForHarvesting")
//            
//            {
//                Wheat.Harvest();
//                Wheat.EndCrop();
//                Structure.Set("Clock.EndDate", clock.Today, relativeTo: sim);  
//            }
//        }

        [EventSubscribe("EndOfDay")]
        private void OnEndOfDay(object sender, EventArgs e)
        {
            if ((clock.Today.Equals(clock.EndDate))&&(Wheat.IsAlive))
            {
                Wheat.Harvest();
                Wheat.EndCrop();
                Structure.Set("Clock.EndDate", clock.Today, relativeTo: sim);  
            }
        }

    }
}
```
  Experiment FAR WAE W24-49
    Factors
      Permutation
        Factor Cv
          CompositeFactor Osprey
            Specifications:
              [Sowing].Script.SowDate = 10-Apr
              [IrrDate].Script.Amount = 15
              [Clock].StartDate = 2024-04-01
              //[Sowing].Script.CultivarName = Osprey
          CompositeFactor Rosella
            Specifications:
              [Sowing].Script.SowDate = 10-Apr
              [IrrDate].Script.Amount = 15
              [Clock].StartDate = 2024-04-01
              //[Sowing].Script.CultivarName = Rosella
          CompositeFactor Whistler
            Specifications:
              [Sowing].Script.SowDate = 10-Apr
              [IrrDate].Script.Amount = 15
              [Clock].StartDate = 2024-04-01
              //[Sowing].Script.CultivarName = Whistler
          CompositeFactor Wylah
            Specifications:
              [Sowing].Script.SowDate = 10-Apr
              [IrrDate].Script.Amount = 15
              [Clock].StartDate = 2024-04-01
              //[Sowing].Script.CultivarName = Wylah
          CompositeFactor Wedgetail
            Specifications:
              [Sowing].Script.SowDate = 10-Apr
              [IrrDate].Script.Amount = 15
              [Clock].StartDate = 2024-04-01
              //[Sowing].Script.CultivarName = Wedgetail
          CompositeFactor Kittyhawk
            Specifications:
              [Sowing].Script.SowDate = 10-Apr
              [IrrDate].Script.Amount = 15
              [Clock].StartDate = 2024-04-01
              //[Sowing].Script.CultivarName = Kittyhawk
          CompositeFactor Illabo
            Specifications:
              [Sowing].Script.SowDate = 10-Apr
              [IrrDate].Script.Amount = 15
              [Clock].StartDate = 2024-04-01
              //[Sowing].Script.CultivarName = Illabo
          CompositeFactor Mowhawk
            Specifications:
              [Sowing].Script.SowDate = 10-Apr
              [IrrDate].Script.Amount = 15
              [Clock].StartDate = 2024-04-01
              //[Sowing].Script.CultivarName = Mowhawk
          CompositeFactor Meering
            Specifications:
              [Sowing].Script.SowDate = 11-May
              [Clock].StartDate = 2024-04-01
              //[Sowing].Script.CultivarName = Meering
          CompositeFactor Janz
            Specifications:
              [Sowing].Script.SowDate = 11-May
              [Clock].StartDate = 2024-04-01
              //[Sowing].Script.CultivarName = Janz
          CompositeFactor Yitpi
            Specifications:
              [Sowing].Script.SowDate = 11-May
              [Clock].StartDate = 2024-04-01
              //[Sowing].Script.CultivarName = Yitpi
          CompositeFactor Wyalkatchem
            Specifications:
              [Sowing].Script.SowDate = 11-May
              [Clock].StartDate = 2024-04-01
              //[Sowing].Script.CultivarName = Wyalkatchem
          CompositeFactor Gregory
            Specifications:
              [Sowing].Script.SowDate = 11-May
              [Clock].StartDate = 2024-04-01
              //[Sowing].Script.CultivarName = Gregory
          CompositeFactor Mace
            Specifications:
              [Sowing].Script.SowDate = 11-May
              [Clock].StartDate = 2024-04-01
              //[Sowing].Script.CultivarName = Mace
          CompositeFactor Scepter
            Specifications:
              [Sowing].Script.SowDate = 11-May
              [Clock].StartDate = 2024-04-01
              //[Sowing].Script.CultivarName = Scepter
          CompositeFactor Sunmaster
            Specifications:
              [Sowing].Script.SowDate = 11-May
              [Clock].StartDate = 2024-04-01
              //[Sowing].Script.CultivarName = Sunmaster
    Simulation GrassPatch2024Base
      Weather
        FileName=%root%/Tests/Validation/Wheat/met/Grass Patch_-33.25_121.60.met
      Clock: Start=2024-03-03; End=2024-11-30
      Summary
      SoilArbitrator
      MicroClimate: a_interception=0; b_interception=1; c_interception=0; d_interception=0; SoilHeatFluxFraction=0.4; MinimumHeightDiffForNewLayer=0; NightInterceptionFraction=0.5; ReferenceHeight=2
      Manager LocationInfo
        Country = Australia
        State = Victoria
        Region = South
```csharp
using Models.Soils;
using System;
using Models.Core;
using Models.PMF;
using APSIM.Shared.Utilities;

namespace Models
{
    [Serializable]
    public class Script : Model
    {
        [Link] Clock Clock;
        [Link] Fertiliser Fertiliser;
        [Link] Summary Summary;
        
        [Description("Country")]
        public string Country { get; set; }

        [Description("State")]
        public string State { get; set; }

        [Description("Region")]
        public string Region { get; set; }

    }
}
```
      Zone Field: Area=1; Slope=0; AspectAngle=0; Altitude=50
        Report DailyReport: EventNames=[Wheat].Harvesting
          VariableNames:
            [Clock].Today
            [Wheat].Phenology.FloweringDAS
            [Wheat].Phenology.FlagLeafDAS
            [Wheat].Phenology.TerminalSpikeletDAS
            [Wheat].Phenology.Stage
        Report HarvestReport: EventNames=[Clock].DoReport
          VariableNames:
            [Clock].Today
            [Wheat].Phenology.Stage
            [Wheat].Phenology.Zadok.Stage
            [Wheat].Phenology.FloweringDAS
            [Wheat].Phenology.FlagLeafDAS
            [Wheat].Phenology.TerminalSpikeletDAS
        Fertiliser
        SurfaceOrganicMatter: InitialResidueName=lentil_stubble; InitialResidueType=lentil; InitialResidueMass=250; InitialStandingFraction=0.8; InitialCPR=0; InitialCNR=40
        Plant Wheat
          Cultivar Meering
            Command:
              [Phenology].Phyllochron.BasePhyllochron.FixedValue = 90
              [Phenology].PhyllochronPpSensitivity.FixedValue = 0.212225680614483
              [Phenology].CAMP.FLNparams.MinLN = 8
              [Phenology].CAMP.FLNparams.PpLN = 3.0
              [Phenology].CAMP.FLNparams.VrnLN = 1.0
              [Phenology].CAMP.FLNparams.VxPLN = 1.0
              [Phenology].CAMP.EnvData.VrnTreatTemp = 5.8
              [Phenology].CAMP.EnvData.VrnTreatDuration = 60
              [Phenology].HeadEmergenceLongDayBase.FixedValue = 170
              [Phenology].HeadEmergencePpSensitivity.FixedValue = 0.0
          Cultivar Sunmaster: same as FAR WAE W24-49.GrassPatch2024Base.Field.Wheat.Meering
          Cultivar Osprey
            Command:
              [Phenology].Phyllochron.BasePhyllochron.FixedValue = 95
              [Phenology].PhyllochronPpSensitivity.FixedValue = 0.212225680614483
              [Phenology].CAMP.FLNparams.MinLN = 8.5
              [Phenology].CAMP.FLNparams.PpLN = 3.0
              [Phenology].CAMP.FLNparams.VrnLN = 5.0
              [Phenology].CAMP.FLNparams.VxPLN = 1.0
              [Phenology].CAMP.EnvData.VrnTreatTemp = 5.8
              [Phenology].CAMP.EnvData.VrnTreatDuration = 60
              [Phenology].HeadEmergenceLongDayBase.FixedValue = 170
              [Phenology].HeadEmergencePpSensitivity.FixedValue = 0.0
          Cultivar Wylah: same as FAR WAE W24-49.GrassPatch2024Base.Field.Wheat.Osprey
          Cultivar Mowhawk: same as FAR WAE W24-49.GrassPatch2024Base.Field.Wheat.Osprey
        Manager Sowing
          SowDate =
          Treat =
          CultivarName = Hartog
          SowingDepth = 30
          RowSpacing = 225
          Population = 150
```csharp
using Newtonsoft.Json;
using System.Data;
using System.Xml.Serialization;
using Models;
using System.Text;
using System.Collections.Generic;
using Models.Interfaces;
using System;
using Models.Core;
using Models.PMF;
using Models.Soils;
using Models.Utilities;
using APSIM.Shared.Utilities;

namespace Models
{
    [Serializable]
    public class Script : Model
    {
        [Link] Clock Clock;
        [Link] Fertiliser Fertiliser;
        [Link] Summary Summary;
        [Link] Soil Soil;
        [Link] Plant Wheat;
        [Link] Simulation Simulation;
        Accumulator accumulatedRain;
        
        [Description("Sowing date (d-mmm)")]
        public string SowDate { get; set; }
        [Description("Treatment Name")]
        public string Treat { get; set; }
        [Display(Type = DisplayType.CultivarName)]
        [Description("Cultivar to be sown")]
        public string CultivarName { get; set; }
        [Description("Sowing depth (mm)")]
        public double SowingDepth { get; set; }
        [Description("Row spacing (mm)")]
        public double RowSpacing { get; set; }
        [Description("Plant population (/m2)")]
        public double Population { get; set; }



        [EventSubscribe("DoManagement")]
        private void OnDoManagement(object sender, EventArgs e)
        {

            if (DateUtilities.WithinDates(SowDate, Clock.Today, SowDate))
            {
               Wheat.Sow(population: Population, cultivar: CultivarName, depth: SowingDepth, rowSpacing: RowSpacing);    
            }            
        
        }
        
    }
}
```
        Manager SowingFertiliser
          Amount = 120
          CropName = wheat
```csharp
using Models.Soils;
using System;
using Models.Core;
using Models.PMF;
namespace Models
{
    [Serializable]
    public class Script : Model
    {
        [Link] Clock Clock;
        [Link] Fertiliser Fertiliser;
        [Link] Summary Summary;
        
        
        [Description("Amount of fertiliser to be applied (50:50 Urea:MAP, kg/ha)")]
        public double Amount { get; set;}
        
        [Description("Crop to be fertilised")]
        public string CropName { get; set;}
        
        
        

        [EventSubscribe("Sowing")]
        private void OnSowing(object sender, EventArgs e)
        {
            Model crop = sender as Model;
            if (crop.Name.ToLower()==CropName.ToLower())
                Fertiliser.Apply(amount: Amount*0.5, type: "MAP");
                Fertiliser.Apply(amount: Amount*0.5, type: "UreaGranular");
        }
        
    }
}
```
        Manager Harvesting
```csharp
using APSIM.Core;
using System;
using Models.Core;
using Models.PMF;
using Models.Soils;
using Models.Utilities;
using APSIM.Shared.Utilities;

namespace Models
{
    [Serializable]
    public class Script : Model, IStructureDependency
    {
        [Link] private Plant Wheat;
        [Link] private Clock Clock;
        [Link] private Simulation sim;
        public IStructure Structure { private get; set; }


        

        [EventSubscribe("DoManagement")]
        private void OnDoManagement(object sender, EventArgs e)
        {
            if (Wheat.IsReadyForHarvesting)
            {
               Wheat.Harvest();
               Wheat.EndCrop();  
               Structure.Set("Clock.EndDate", Clock.Today.AddDays(1), relativeTo: sim);  
            }
        
        }
        
    }
}
```
        Operations Management
        Irrigation
        Manager NDVIModel
          DrySoilNDVI = 0.1
          WetSoilNDVI = 0.12
          GreenCropNDVI = 0.85
          DeadCropNDVI = 0.1
          NDVI = 0
```csharp
using System;
using Models.Core;
using Models.Interfaces;
using Models.PMF;
using APSIM.Shared.Utilities;
using Models.WaterModel;

namespace Models
{
    [Serializable]
    public class Script : Model
    {
        [Link] IClock Clock;
        [Link] ISummary Summary;
        [Link] ICanopy WheatCanopy;
        [Link] EvaporationModel EvapModel;
        
        [Description("Dry soil NDVI")]
        public double DrySoilNDVI { get; set; }
        
        [Description("Wet soil NDVI")]
        public double WetSoilNDVI { get; set; }

        [Description("Green Crop NDVI")]
        public double GreenCropNDVI { get; set; }
        
        [Description("Dead Crop NDVI")]
        public double DeadCropNDVI { get; set; }
                
        [Description("Daily Estimated NDVI")]
        public double NDVI { get; set; }

        [EventSubscribe("DoManagement")]
        private void DoDailyCalculations(object sender, EventArgs e)
        {
            double SoilNDVI = WetSoilNDVI;
            if (EvapModel.t > 1)
               SoilNDVI = DrySoilNDVI;

            NDVI = GreenCropNDVI * WheatCanopy.CoverGreen;
            NDVI += DeadCropNDVI * (WheatCanopy.CoverTotal - WheatCanopy.CoverGreen);
            NDVI += SoilNDVI * (1 - WheatCanopy.CoverTotal);            
            
        }
    }
}
```
        Soil Clay(Scaddan NT 30 No1104): ASCOrder=Dermosol; ASCSubOrder=Yellow Dermosol; SoilType=Clay loam; LocalName=Clays & shallow loamy duplexes; Site=Scaddan; NearestTown=Scaddan; Region=Southern Region; State=Western Australia; Country=Australia; ApsoilNumber=1104; Latitude=-33.3343; Longitude=121.55; LocationAccuracy=+/- 20m; YearOfSampling=2010; DataSource=CSIRO Yvette Oliver - PA and SW project 2014
          Comments=Clay - NT 30 PAWC from 2010, Chem from 2015, other parameters estimated
          Physical
            Thickness  ParticleSizeSand  ParticleSizeSilt  ParticleSizeClay  Rocks  BD   AirDry  LL15      DUL       SAT
            100        76.14             1                 22.86             0      1.5  0.083   0.166589  0.301285  0.394
            100        51.54             7.76              40.7              0      1.4  0.176   0.22      0.385224  0.442
            100        59.12             5.85              35.03             0      1.4  0.18    0.23      0.364775  0.442
            100        61.6              4.81              33.6              0      1.4  0.18    0.22      0.334719  0.442
            100        58.65             7.7               33.65             0      1.5  0.18    0.214933  0.286095  0.383962
            100        60.94             6.84              32.22             0      1.5  0.18    0.214933  0.299963  0.383962
            200        59.52             1.93              38.55             0      1.5  0.18    0.214933  0.276096  0.383962
            BD, LL15 source: Estimated based on local knowledge
            DUL source: Field measured and checked for sensibility
            SAT source: Calculated from measured, estimated or calculated BD
            SoilCrop wheatSoil: LL=[0.12, 0.19, 0.18, 0.18, 0.24, 0.24, 0.18]; KL=[0.06, 0.06, 0.06, 0.06, 0.06, 0.04, 0.04]; XF=[1, 1, 1, 1, 1, 1, 1]
            SoilCrop barleySoil: LL=[0.166589, 0.22, 0.23, 0.22, 0.214933, 0.216371, 0.222357]; KL=[0.06, 0.06, 0.06, 0.06, 0.06, 0.04, 0.04]; XF=[1, 1, 1, 1, 1, 1, 1]
              LL source: Estimated based on local knowledge
            SoilCrop canolaSoil: same as FAR WAE W24-49.GrassPatch2024Base.Field.Clay(Scaddan NT 30 No1104).Physical.barleySoil
            SoilCrop SCRUMSoil: LL=[0.166589, 0.22, 0.23, 0.22, 0.214933, 0.216371, 0.222357]; KL=[0.06, 0.06, 0.06, 0.06, 0.06, 0.04, 0.04]; XF=[1, 1, 1, 1, 1, 1, 1]
              LL source: Field measured and checked for sensibility
          WaterBalance SoilWater: SummerDate=1-Nov; SummerU=6; SummerCona=3.5; WinterDate=1-Apr; WinterU=2; WinterCona=2; DiffusConst=40; DiffusSlope=16; Salb=0.13; CN2Bare=73; CNRed=20; CNCov=0.8; PSIDul=-100; Thickness=[100, 100, 100, 100, 100, 100, 200]; SWCON=[0.5, 0.3, 0.3, 0.5, 0.3, 0.3, 0.5]
          Organic: FOMCNRatio=40; CarbonUnits=WalkleyBlack
            Thickness  Carbon  SoilCNRatio  FBiom  FInert  FOM
            100        0.61    12           0.04   0.4     340.921
            100        0.26    12           0.03   0.5     234.311
            100        0.21    12           0.02   0.5     161.04
            100        0.21    12           0.01   0.7     110.681
            100        0.12    12           0.01   0.7     76.0697
            100        0.06    12           0.01   0.95    52.2819
            200        0.09    12           0.01   0.95    24.6962
          Chemical: PHUnits=1
            Thickness  PH   EC     ESP
            100        7.1  0.266  22.7523
            100        8.3  0.525  29.5165
            100        8.5  0.448  34.8273
            100        8.4  0.585  37.0433
            100        8.3  0.683  40.0573
            100        8.2  0.649  44.4648
            200        8    0.594  49.7682
            EC, PH source: Measured
            ESP source: C
          Nutrient
          Solute NO3: Thickness=[100, 100, 100, 100, 100, 100, 200]; InitialValues=[10, 8, 5, 5, 2, 2, 1]; InitialValuesUnits=kg/ha; WaterTableConcentration=0; D0=0; DepthConstant=0; MaxDepthSoluteAccessible=0; RunoffEffectivenessAtMovingSolute=0; MaxEffectiveRunoff=0
          Solute NH4: Thickness=[100, 100, 100, 100, 100, 100, 200]; InitialValues=[2, 1.5, 1.5, 1, 1, 1, 0]; InitialValuesUnits=kg/ha; WaterTableConcentration=0; D0=0; DepthConstant=0; MaxDepthSoluteAccessible=0; RunoffEffectivenessAtMovingSolute=0; MaxEffectiveRunoff=0
          Solute Urea: Thickness=[100, 100, 100, 100, 100, 100, 200]; InitialValues=[0, 0, 0, 0, 0, 0, 0]; InitialValuesUnits=kg/ha; WaterTableConcentration=0; D0=0; DepthConstant=0; MaxDepthSoluteAccessible=0; RunoffEffectivenessAtMovingSolute=0; MaxEffectiveRunoff=0
          Water: Thickness=[100, 100, 100, 100, 100, 100, 200]; FilledFromTop=false
            InitialValues=[0.180058, 0.236522, 0.243478, 0.231472, 0.222049, 0.223436, 0.221049]
          SoilTemperature Temperature
        Manager IrrDate
          IrrigateDates = 10-Apr
          Amount = 0
          Depth = 0
          Efficiency = 1
          WillRunoff = False
```csharp
using Models.Soils;
using System;
using System.Linq;
using Models.Core;
using Models.PMF;
using APSIM.Shared.Utilities;
namespace Models
{
    [Serializable]
    public class Script : Model
    {
        [Link] Clock Clock;
        [Link] Irrigation Irrigation;
        
        [Separator("A component to apply irrigation on one or more dates on every year of the simulation")]

        [Description("Enter the irrigation dates as dd-mmm with comma separation (any year information entered will be ignored)")] 
        public string[] IrrigateDates { get; set; }
        
        [Description("Amount of irrigation to be applied (mm)")] 
        public double Amount { get; set; }
        
        [Description("Depth in the soil to apply the  irrigation (mm)")] 
        public double Depth { get; set; }
        
        [Description("Efficiency of irrigation (0-1)")] 
        public double Efficiency { get; set; }
        
        [Description("Will the irrigation runoff?")] 
        public bool WillRunoff { get; set; }
        
        [EventSubscribe("DoManagement")]
        private void OnDoManagement(object sender, EventArgs e)
        {
            foreach (string ddMMM in IrrigateDates)
            {
                if (DateUtilities.DatesEqual(ddMMM, Clock.Today))
                    Irrigation.Apply(amount: Amount, depth: Depth, efficiency: Efficiency, willRunoff: WillRunoff);
            }
        }
    }
}
```
        Manager FertDate0
          FertiliserType = UreaGranular
          FertiliserDates = 25-jul
          Amount = 80
```csharp
using Models.Soils;
using System;
using System.Linq;
using Models.Core;
using Models.PMF;
using APSIM.Shared.Utilities;
namespace Models
{
    [Serializable]
    public class Script : Model
    {
        [Link] Clock Clock;
        [Link] Fertiliser Fertiliser;
        
        [Separator("A component to apply fertiliser on one or more dates on every year of the simulation")]

        [Description("Type of fertiliser to apply? ")] 
        [Display(Type = DisplayType.FertiliserType)]public string FertiliserType { get; set; }

        [Description("Enter the fertilisation dates as dd-mmm with comma separation (any year information entered will be ignored): ")] 
        public string[] FertiliserDates { get; set; } 

        [Description("Amount of fertiliser to be applied each time (kg /ha)")] 
        public double Amount { get; set; }

      
        [EventSubscribe("DoManagement")]
        private void OnDoManagement(object sender, EventArgs e)
        {
            foreach (string ddMMM in FertiliserDates)
            {
                if (DateUtilities.DatesEqual(ddMMM, Clock.Today))
                {
                    Fertiliser.Apply(amount: Amount, type: FertiliserType);
                }
            }
        }
    }
}
```
        SetModelParamsBySimulation SetPhenoDatesExternally: SetEventName=[Plant].PlantSowing
          ParameterFile=%root%/Tests/Validation/Wheat/inputs/GrassPatch2024_PhenoDatesInput.csv
        SetModelParamsBySimulation SetHaunRelatedExternally: SetEventName=[Plant].PlantSowing
          ParameterFile=%root%/Tests/Validation/Wheat/inputs/GrassPatch2024_HaunStagesInput.csv
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