Simulations: Version=126
  Memo TitlePage
    # The APSIM Wheat Model

    _Brown, H.E., Huth, N.I. and Holzworth, D.P._
  Memo Introduction
    The APSIM wheat model has been developed using the Plant Modelling Framework (PMF) of [brown_plant_2014]. This new framework provides a library of plant organ and process submodels that can be coupled, at runtime, to construct a model in much the same way that models can be coupled to construct a simulation. This means that dynamic composition of lower level process and organ classes (e.g. photosynthesis, leaf) into larger constructions (e.g. maize, wheat, sorghum) can be achieved by the model developer without additional coding.

    The wheat model consists of:

    * a phenology model to simulate development through sequential developmental phases
    * a structure model to simulate plant morphology
    * a collection of organs to simulate the various plant parts
    * an arbitrator to allocate resources (N, biomass) to the various plant organs

    This work builds upon earlier APSIM Wheat models such as NWheat ([Asseng200225], [KeatingNWheat]), NWheatS ([Asseng1998163]), Cropmod-Wheat ([Wang2002GenericCropModel]), and the earlier versions developed in Plant (<a href=\"http://www.apsim.info/Documentation/Model,CropandSoil/CropModuleDocumentation/Wheat.aspx">APSIM Wheat 7.5</a>") and then within the Plant Modelling Framework ([brown_plant_2014]).
  Replacements
    Report HarvestReport: EventNames=[Wheat].Harvesting
      VariableNames:
        [Clock].Today
        [Wheat].SowingDate
        [Wheat].SowingData.Cultivar
        [Wheat].Phenology.CurrentPhase.Name
        [Wheat].Phenology.CurrentStageName
        [Wheat].Phenology.EmergenceDAS
        [Wheat].Phenology.TerminalSpikeletDAS
        [Wheat].Phenology.FlagLeafDAS
        [Wheat].Phenology.HeadingDAS
        [Wheat].Phenology.FloweringDAS
        [Wheat].Phenology.MaturityDAS
        [Wheat].Phenology.FinalLeafNumber
        [Wheat].SowingDate.DayOfYear
        [Clock].StartDate
        ([Wheat].Phenology.FloweringDAS - [Wheat].Phenology.EmergenceDAS) as FloweringDAE
        [Wheat].SowingData.Cultivar
    Report DailyReport: EventNames=[Clock].DoReport
      VariableNames:
        [Clock].Today
        [Wheat].Phenology.CurrentPhase.Name
        [Wheat].Phenology.CurrentStageName
        [Wheat].Phenology.EmergenceDAS
        [Wheat].Phenology.Stage
        [Wheat].Phenology.ThermalTime
        [Wheat].Phenology.Zadok.Stage
        [Wheat].SowingData.Cultivar
        [Wheat].Phenology.HaunStage
        [Wheat].Phenology.HaunStage
        [IWeather].MeanT
        [IWeather].MaxT
        [Wheat].Phenology.Photoperiod
        [Wheat].Phenology.AccumulatedTT
        [Wheat].Leaf.ExpandedCohortNo
        [Wheat].Phenology.CAMP.Vrn1
        [Wheat].Phenology.CAMP.BaseVrn1
        [Wheat].Phenology.CAMP.MethColdVrn1
        [Wheat].Phenology.CAMP.ColdVrn1
        [Wheat].Phenology.CAMP.Vrn2
        [Wheat].Phenology.CAMP.Vrn3
        [Wheat].Phenology.CAMP.VrnX
        [IWeather].MinT
        [IWeather].MaxT
    Manager SetCropParams
```csharp
using Models.Core;
using System;
namespace Models
{
	[Serializable]
    public class Script : Model
    {
        [Link] Zone zone;
        [EventSubscribe("PlantSowing")]
        private void OnPlantSowing(object sender, EventArgs e)
        {
            object PpFac12 = 0;
            zone.Set("Wheat.Phenology.CAMP.PpResponse.XYPairs.Y[3]", PpFac12);  
            object DeVernFac = -5;
            zone.Set("Wheat.Phenology.CAMP.DailyColdVrn1.Response.DeVernalisationRate.FixedValue", DeVernFac);  
            object maxLAR = 0.014;
            zone.Set("Wheat.Phenology.MaxLAR.FixedValue",maxLAR);
            object PTQhf = 0.6;
            zone.Set("Wheat.Phenology.PTQhf.FixedValue",PTQhf);
        }
    }
}
```
  DataStore
    ExcelInput ExcelMultiInput: FileNames=[2020Results.xlsx, PalmerstonNorth1989.xlsx]; SheetNames=[Observed]
    PredictedObserved DailyObsPred: PredictedTableName=DailyReport; ObservedTableName=Observed; FieldNameUsedForMatch=Clock.Today; AllColumns=false
    PredictedObserved HarvestObsPred: PredictedTableName=HarvestReport; ObservedTableName=Observed; FieldNameUsedForMatch=Wheat.Phenology.CurrentStageName; AllColumns=false
  Folder Validation
    Memo
      A test dataset has been developed to test the APSIM Wheat model for a range of environmental (soil and climate) conditions, management options (sowing dates, populations, nitrogen rates, row spacing, irrigation), genetic backgrounds (different regions, cultivar types) and for special considerations such as crop damage.  These tests have been grouped into various geographical regions to allow the user to evaluate the suitability of the model for their particular region of interest.  Graphs of model performance are provided for yield, biomass production, canopy development, phenological development, water and nitrogen uptake, and grain yield components.
    Folder New Zealand
      Experiment Leeston2013
        Memo
          The design, management and yield results of this trial have been described in full by [Craigie_Wheat_2015].  In brief, this trial was conducted to assess the impact of earlier sowing on potential yields of 'Wakanui' wheat grown at Wakanui (the cultivar was named after the area) in Mid Canterbury, New Zealand.  it was a 4 x 4 factorial with 4 replicates of the following treatments:

          1. Sowing date (20 February, 10 March, 28 March, 23 April)
          2. Sowing density (50,100,150 and 200 plants/m^2^

          In addition to yield, measurements of leaf appearance and senescence and canopy cover (measured with NDVI)  were measured at 10 - 14 day intervals and biomass measurements were taken at growth stages 32 and 65.

          Considerable canopy decay was observed during the winter for the early sown treatments and we have not introduced mechanisms into the model to capture this yet so there is a genral over prediction of canopy size and biomass in these first sowing dates.
        Factors
          Permutation
            Factor Sow: Specification=[Sowing].Script.SowDate = 20-Feb,26-Mar,16-Apr
            Factor Popn: Specification=[Sowing].Script.Population = 50,100,150,200,250
        Simulation Leeston2013Base
          Clock: Start=2013-02-01; End=2014-02-15
          Summary summaryfile
          Weather: FileName=Leeston.met
          Zone paddock: Area=1; Slope=0; AspectAngle=0; Altitude=50
            Folder Manager folder
              Operations IrrigationEvents
              Operations FertiliserEvents
                2013-10-17  [Fertiliser].Apply(92, Fertiliser.Types.UreaN, 10);
                2013-10-30  [Fertiliser].Apply(32, Fertiliser.Types.UreaN, 10);
              Manager Sowing
                SowDate =
                Population = 150
                CultivarName = Wakanui
                SowingDepth = 50
                RowSpacing = 150
```csharp
using Models.Soils.Nutrients;
using System;
using Models.Core;
using Models.PMF;
using Models.Soils;
using Models.Soils.Nutrients;
using Models.Utilities;
using APSIM.Shared.Utilities;

namespace Models
{
    [Serializable]
    public class Script : Model
    {
        [Link] Clock Clock;
        [Link] Summary Summary;
        [Link] Soil Soil;
        [Link] Plant Wheat;
        Accumulator accumulatedRain;
        
        [Description("Sowing date (d-mmm)")]
        public string SowDate { get; set; }
        [Description("Cultivar to be sown")]
        public string CultivarName { get; set; }
        [Description("Sowing depth (mm)")]
        public double SowingDepth { get; set; }
        [Description("Row spacing (mm)")]
        public double RowSpacing { get; set; }
        [Description("Plant population (/m2)")]
        public double Population { get; set; }
        


        [EventSubscribe("DoManagement")]
        private void OnDoManagement(object sender, EventArgs e)
        {
            if (DateUtilities.WithinDates(SowDate, Clock.Today, SowDate))
            {
                Wheat.Sow(population: Population, cultivar: CultivarName, depth: SowingDepth, rowSpacing: RowSpacing);    
                if(SowDate == "20-Feb")
                {
                    Wheat.SetEmergenceDate("27-Feb");
                }
                if(SowDate == "26-Mar")
                {
                    Wheat.SetEmergenceDate("3-Apr");
                }
                if(SowDate == "16-Apr")
                {
                    Wheat.SetEmergenceDate("28-Apr");
                }
            }
        
        }
        
    }
}
```
              Operations HarvestEvents
                2014-02-04  [Wheat].Harvest();
                2014-02-04  [Wheat].EndCrop();
            Irrigation
            Soil: SoilType=LincolnSoil; LocalName=Lincoln; Site=Lincoln; NearestTown=Unknown; Region=NZ; NaturalVegetation=Unknown; Latitude=0; Longitude=0
              Physical
                Thickness  BD   AirDry  LL15  DUL   SAT
                100        1.3  0.05    0.08  0.31  0.44
                200        1.3  0.05    0.07  0.3   0.44
                200        1.3  0.05    0.07  0.28  0.44
                200        1.3  0.05    0.09  0.31  0.44
                200        1.3  0.05    0.11  0.3   0.44
                200        1.3  0.05    0.16  0.28  0.44
                200        1.3  0.05    0.15  0.3   0.44
                200        1.3  0.05    0.12  0.34  0.44
                1000       1.3  0.05    0.12  0.34  0.44
                SoilCrop WheatSoil: LL=[0.08, 0.07, 0.07, 0.09, 0.11, 0.16, 0.15, 0.12, 0.12]; KL=[0.06, 0.06, 0.06, 0.06, 0.03, 0.02, 0.02, 0.02, 0.02]; XF=[1, 1, 1, 1, 1, 1, 1, 1, 1]
              WaterBalance SoilWater: SummerDate=1-Nov; SummerU=7; SummerCona=3; WinterDate=1-Apr; WinterU=7; WinterCona=3; DiffusConst=40; DiffusSlope=16; Salb=0.2; CN2Bare=75; CNRed=20; CNCov=0.8; DischargeWidth=0; CatchmentArea=0
                Thickness  SWCON  KLAT
                100        0.6    0
                200        0.6    0
                200        0.6    0
                200        0.6    0
                200        0.6    0
                200        0.6    0
                200        0.6    0
                200        0.6    0
              Organic: FOMCNRatio=15
                Thickness  Carbon  SoilCNRatio  FBiom  FInert  FOM
                100        4       11           0.04   0.31    1031.07
                200        3       11           0.03   0.4     691.146
                200        2       11           0.02   0.5     463.289
                200        1       11           0.01   0.6     310.552
                200        1       11           0.01   0.7     208.169
                200        1       11           0.01   0.9     139.54
                200        0.9     11           0.01   0.99    93.5364
                200        0.9     11           0.01   0.99    62.6993
              Chemical
                Thickness  NO3N     NH4N  PH
                100        30.7692  1.3   6
                200        11.5385  1     6
                200        7.69231  1     6
                200        3.84615  0.8   6
                200        3.84615  0.8   6
                200        3.84615  0.5   6
                200        3.84615  0.5   6
                200        3.84615  0.5   6
              Sample Initial water: Thickness=[100, 200, 200, 200, 200, 200, 200, 200]; SW=[0.24, 0.27, 0.26, 0.23, 0.24, 0.23, 0.23, 0.18]; SWUnits=Volumetric; OCUnits=Total; PHUnits=Water
              CERESSoilTemperature Temperature
              Nutrient
            SurfaceOrganicMatter Surface Organic Matter: InitialResidueName=wheat_stubble; InitialResidueType=wheat; InitialResidueMass=0; InitialStandingFraction=0; InitialCPR=0; InitialCNR=25
            Fertiliser
            MicroClimate: a_interception=0; b_interception=1; c_interception=0; d_interception=0; soil_albedo=0.23; SoilHeatFluxFraction=0.4; MinimumHeightDiffForNewLayer=0; NightInterceptionFraction=0.5; ReferenceHeight=2
            Plant Wheat
            Report DailyReport
            Report HarvestReport
            Report SupReport (disabled): EventNames=[Clock].DoReport
              VariableNames:
                [Clock].Today
                [Leaf].CohortSize
                [Wheat].Arbitrator.DM.Allocated
                [Wheat].Arbitrator.DM.TotalPlantDemand
                [Wheat].Arbitrator.DM.NutrientLimitation
                [Wheat].Arbitrator.DM.SinkLimitation
                [Wheat].Arbitrator.DM.TotalFixationSupply
                [Wheat].Arbitrator.FN
                [Wheat].Arbitrator.N.TotalPlantDemand
                [Wheat].Leaf.CohortMaxSize
                [Wheat].Leaf.CohortParameters.GrowthDuration
                [Wheat].Leaf.CohortParameters.LagDuration
                [Wheat].Leaf.CohortParameters.MaxArea
                [Wheat].Leaf.CohortParameters.SenescenceDuration
                [Wheat].Leaf.CohortParameters.SpecificLeafAreaMax
                [Wheat].Leaf.CohortParameters.SpecificLeafAreaMin
                [Wheat].Leaf.Photosynthesis.FT
                [Wheat].Leaf.Photosynthesis.FVPD
                [Wheat].Leaf.Photosynthesis.RueAct
                [Wheat].Phenology.CAMP.Vrn1
                [Wheat].Phenology.CAMP.BaseVrn1
                [Wheat].Phenology.CAMP.MethColdVrn1
                [Wheat].Phenology.CAMP.ColdVrn1
                [Wheat].Phenology.CAMP.Vrn2
                [Wheat].Phenology.CAMP.Vrn3
                [Wheat].Phenology.CAMP.VrnX
                [IWeather].MinT
                [IWeather].MaxT
            Manager SetCropParams
              LN = 0
              SN = 0
              LV = 0
              SV = 0
          SoilArbitrator Soil Arbitrator
      Experiment Leeston2014
        Memo: same as Validation.New Zealand.Leeston2013.Memo
        Factors
          Permutation
            Factor Sow: Specification=[Sowing].Script.SowDate = 20-Feb,10-Mar,26-Mar,23-Apr
            Factor Popn: Specification=[Sowing].Script.Population = 50,200
        Simulation Wakanui2014Base
          Clock: Start=2014-02-01; End=2015-02-15
          Summary summaryfile
          Weather: FileName=Leeston.met
          Zone paddock: Area=1; Slope=0; AspectAngle=0; Altitude=50
            Folder Manager folder
              Operations IrrigationEvents
                2014-10-13  [Irrigation].Apply(50.0);
                2014-10-27  [Irrigation].Apply(50.0);
                2014-11-05  [Irrigation].Apply(50.0);
                2014-11-18  [Irrigation].Apply(50.0);
              Operations FertiliserEvents
                2014-09-10  [Fertiliser].Apply(101, Fertiliser.Types.UreaN, 10);
                2014-10-10  [Fertiliser].Apply(87, Fertiliser.Types.UreaN, 10);
              Manager Sowing
                SowDate =
                Population = 150
                CultivarName = Wakanui
                SowingDepth = 50
                RowSpacing = 150
```csharp
using Models.Soils.Nutrients;
using System;
using Models.Core;
using Models.PMF;
using Models.Soils;
using Models.Soils.Nutrients;
using Models.Utilities;
using APSIM.Shared.Utilities;

namespace Models
{
    [Serializable]
    public class Script : Model
    {
        [Link] Clock Clock;
        [Link] Summary Summary;
        [Link] Soil Soil;
        [Link] Plant Wheat;
        Accumulator accumulatedRain;
        
        [Description("Sowing date (d-mmm)")]
        public string SowDate { get; set; }
        [Display(Type = DisplayType.CultivarName)]
        [Description("Cultivar to be sown")]
        public string CultivarName { get; set; }
        [Description("Sowing depth (mm)")]
        public double SowingDepth { get; set; }
        [Description("Row spacing (mm)")]
        public double RowSpacing { get; set; }
        [Description("Plant population (/m2)")]
        public double Population { get; set; }
        


        [EventSubscribe("DoManagement")]
        private void OnDoManagement(object sender, EventArgs e)
        {
            if (DateUtilities.WithinDates(SowDate, Clock.Today, SowDate))
            {
                Wheat.Sow(population: Population, cultivar: CultivarName, depth: SowingDepth, rowSpacing: RowSpacing);    
                if(SowDate == "20-Feb")
                {
                    Wheat.SetEmergenceDate("26-Feb");
                }
                if(SowDate == "10-Mar")
                {
                    Wheat.SetEmergenceDate("17-Mar");
                }
                if(SowDate == "26-Mar")
                {
                    Wheat.SetEmergenceDate("6-Apr");
                }
                if(SowDate == "23-Apr")
                {
                    Wheat.SetEmergenceDate("8-May");
                }
            }
        
        }
        
    }
}
```
              Operations HarvestEvents
                2015-02-04  [Wheat].Harvest();
                2015-02-04  [Wheat].EndCrop();
            Irrigation
            Soil: SoilType=LincolnSoil; LocalName=Lincoln; Site=Lincoln; NearestTown=Unknown; Region=NZ; NaturalVegetation=Unknown; Latitude=0; Longitude=0
              Physical
                Thickness  BD   AirDry  LL15  DUL   SAT
                100        1.3  0.05    0.08  0.31  0.44
                200        1.3  0.05    0.07  0.3   0.44
                200        1.3  0.05    0.07  0.28  0.44
                200        1.3  0.05    0.09  0.31  0.44
                200        1.3  0.05    0.11  0.3   0.44
                200        1.3  0.05    0.16  0.28  0.44
                200        1.3  0.05    0.15  0.3   0.44
                200        1.3  0.05    0.12  0.34  0.44
                SoilCrop WheatSoil: LL=[0.08, 0.07, 0.07, 0.09, 0.11, 0.16, 0.15, 0.12]; KL=[0.06, 0.06, 0.06, 0.06, 0.03, 0.02, 0.02, 0.02]; XF=[1, 1, 1, 1, 1, 1, 1, 1]
              WaterBalance SoilWater: same as Validation.New Zealand.Leeston2013.Leeston2013Base.paddock.Soil.SoilWater
              Organic: same as Validation.New Zealand.Leeston2013.Leeston2013Base.paddock.Soil.Organic
              Chemical: same as Validation.New Zealand.Leeston2013.Leeston2013Base.paddock.Soil.Chemical
              Sample Initial water: same as Validation.New Zealand.Leeston2013.Leeston2013Base.paddock.Soil.Initial water
              CERESSoilTemperature Temperature
              Nutrient
            SurfaceOrganicMatter Surface Organic Matter: InitialResidueName=wheat_stubble; InitialResidueType=wheat; InitialResidueMass=1000; InitialStandingFraction=0; InitialCPR=0; InitialCNR=80
            Fertiliser
            MicroClimate: a_interception=0; b_interception=1; c_interception=0; d_interception=0; soil_albedo=0.23; SoilHeatFluxFraction=0.4; MinimumHeightDiffForNewLayer=0; NightInterceptionFraction=0.5; ReferenceHeight=2
            Plant Wheat
            Report DailyReport
            Report HarvestReport
            Report SupReport (disabled): EventNames=[Clock].DoReport
              VariableNames:
                [Clock].Today
                [Leaf].CohortSize
                [Wheat].Arbitrator.DM.Allocated
                [Wheat].Arbitrator.DM.TotalPlantDemand
                [Wheat].Arbitrator.DM.NutrientLimitation
                [Wheat].Arbitrator.DM.SinkLimitation
                [Wheat].Arbitrator.DM.TotalFixationSupply
                [Wheat].Arbitrator.FN
                [Wheat].Arbitrator.N.TotalPlantDemand
                [Wheat].Leaf.CohortMaxSize
                [Wheat].Leaf.CohortParameters.GrowthDuration
                [Wheat].Leaf.CohortParameters.LagDuration
                [Wheat].Leaf.CohortParameters.MaxArea
                [Wheat].Leaf.CohortParameters.SenescenceDuration
                [Wheat].Leaf.CohortParameters.SpecificLeafAreaMax
                [Wheat].Leaf.CohortParameters.SpecificLeafAreaMin
                [Wheat].Leaf.Photosynthesis.FT
                [Wheat].Leaf.Photosynthesis.FVPD
                [Wheat].Leaf.Photosynthesis.RueAct
            Manager SetCropParams
              LN = 0
              SN = 0
              LV = 0
              SV = 0
          SoilArbitrator Soil Arbitrator
        Memo Leaf Size Predictions
          This graph shows different leaf size profiles measured for winter wheat sown on a range of different dates.  Leaves that emerge during cooler conditions achieve a smallter maximum size than the equivelent leaf appearanign in warm conditions.
      Experiment Wakanui2015
        Memo: same as Validation.New Zealand.Leeston2013.Memo
        Factors
          Permutation
            Factor Sow: Specification=[Sowing].Script.SowDate = 20-Feb,10-Mar,20-Mar,09-Apr
            Factor Cm: Specification=[Sowing].Script.PGRTreatment = Normal,Elite
        Simulation Wakanui2015Base
          Clock: Start=2015-02-01; End=2016-02-15
          Summary summaryfile
          Weather: FileName=Wakanui.met
          Zone paddock: Area=1; Slope=0; AspectAngle=0; Altitude=50
            Folder Manager folder
              Operations IrrigationEvents
                2015-10-19  [Irrigation].Apply(40.0);
                2015-11-08  [Irrigation].Apply(40.0);
                2015-11-26  [Irrigation].Apply(40.0);
                2015-12-12  [Irrigation].Apply(45.0);
                2015-12-28  [Irrigation].Apply(45.0);
              Operations FertiliserEvents
                2015-09-18  [Fertiliser].Apply(26, Fertiliser.Types.UreaN, 10);
                2015-09-26  [Fertiliser].Apply(51, Fertiliser.Types.UreaN, 10);
                2015-10-10  [Fertiliser].Apply(92, Fertiliser.Types.UreaN, 10);
                2015-10-29  [Fertiliser].Apply(115, Fertiliser.Types.UreaN, 10);
              Manager Sowing
                SowDate = 24-Jul
                PGRTreatment = 0
                CultivarName = Wakanui
                SowingDepth = 50
                RowSpacing = 150
```csharp
using Models.Soils.Nutrients;
using System;
using Models.Core;
using Models.PMF;
using Models.Soils;
using Models.Soils.Nutrients;
using Models.Utilities;
using APSIM.Shared.Utilities;

namespace Models
{
    [Serializable]
    public class Script : Model
    {
        [Link] Clock Clock;
        [Link] Summary Summary;
        [Link] Soil Soil;
        [Link] Plant Wheat;
        Accumulator accumulatedRain;
        
        [Description("Sowing date (d-mmm)")]
        public string SowDate { get; set; }
        [Description("Cultivar to be sown")]
        public string CultivarName { get; set; }
        [Description("Sowing depth (mm)")]
        public double SowingDepth { get; set; }
        [Description("Row spacing (mm)")]
        public double RowSpacing { get; set; }
        [Description("PGR treatment applied")]
        public string PGRTreatment { get; set; }
        


        [EventSubscribe("DoManagement")]
        private void OnDoManagement(object sender, EventArgs e)
        {
            if (DateUtilities.WithinDates(SowDate, Clock.Today, SowDate))
            {
                Wheat.Sow(population: 150, cultivar: CultivarName, depth: SowingDepth, rowSpacing: RowSpacing);    
                if(SowDate == "20-Feb")
                {
                    Wheat.SetEmergenceDate("27-Feb");
                }
                if(SowDate == "10-Mar")
                {
                    Wheat.SetEmergenceDate("17-Mar");
                }
                if(SowDate == "20-Mar")
                {
                    Wheat.SetEmergenceDate("29-Mar");
                }
                if(SowDate == "09-Apr")
                {
                    Wheat.SetEmergenceDate("22-Apr");
                }
            }
        
        }
        
    }
}
```
              Operations HarvestEvents
                2016-02-04  [Wheat].Harvest();
                2016-02-04  [Wheat].EndCrop();
            Irrigation
            Soil: SoilType=LincolnSoil; LocalName=Lincoln; Site=Lincoln; NearestTown=Unknown; Region=NZ; NaturalVegetation=Unknown; Latitude=0; Longitude=0
              Physical: same as Validation.New Zealand.Leeston2014.Wakanui2014Base.paddock.Soil.Physical
              WaterBalance SoilWater: same as Validation.New Zealand.Leeston2013.Leeston2013Base.paddock.Soil.SoilWater
              Organic: same as Validation.New Zealand.Leeston2013.Leeston2013Base.paddock.Soil.Organic
              Chemical
                Thickness  NO3N     NH4N  PH
                100        30.7692  1.3   6
                200        3.84615  1     6
                200        7.69231  1     6
                200        3.84615  0.8   6
                200        3.84615  0.8   6
                200        3.84615  0.5   6
                200        3.84615  0.5   6
                200        3.84615  0.5   6
              Sample Initial water: same as Validation.New Zealand.Leeston2013.Leeston2013Base.paddock.Soil.Initial water
              CERESSoilTemperature Temperature
              Nutrient
            SurfaceOrganicMatter Surface Organic Matter: InitialResidueName=wheat_stubble; InitialResidueType=whiteclover; InitialResidueMass=1000; InitialStandingFraction=0; InitialCPR=0; InitialCNR=80
            Fertiliser
            MicroClimate: a_interception=0; b_interception=1; c_interception=0; d_interception=0; soil_albedo=0.23; SoilHeatFluxFraction=0.4; MinimumHeightDiffForNewLayer=0; NightInterceptionFraction=0.5; ReferenceHeight=2
            Plant Wheat
            Report DailyReport
            Report HarvestReport
            Report SupReport (disabled): same as Validation.New Zealand.Leeston2014.Wakanui2014Base.paddock.SupReport
            Manager SetCropParams
              LN = 0
              SN = 0
              LV = 0
              SV = 0
          SoilArbitrator Soil Arbitrator
        Memo Leaf Size Predictions
          This graph shows different leaf size profiles measured for winter wheat sown on a range of different dates.  Leaves that emerge during cooler conditions achieve a smallter maximum size than the equivelent leaf appearanign in warm conditions.
      Experiment Wakanui2016
        Memo: same as Validation.New Zealand.Leeston2013.Memo
        Factors
          Permutation
            Factor Sow: Specification=[Sowing].Script.SowDate = 24-Feb,08-Mar,29-Mar,14-Apr
            Factor Cm: Specification=[Defoliation].Script.Defoliated = Normal,Defoliation
        Simulation Wakanui2016Base
          Clock: Start=2016-02-01; End=2017-02-15
          Summary summaryfile
          Weather: FileName=Wakanui.met
          Zone paddock: Area=1; Slope=0; AspectAngle=0; Altitude=50
            Folder Manager folder
              Operations IrrigationEvents
                2014-10-13  [Irrigation].Apply(0.0);
                2014-10-27  [Irrigation].Apply(0.0);
                2014-11-05  [Irrigation].Apply(0.0);
                2014-11-18  [Irrigation].Apply(0.0);
              Operations FertiliserEvents
                2014-09-13  [Fertiliser].Apply(0, Fertiliser.Types.UreaN, 10);
                2014-10-13  [Fertiliser].Apply(0, Fertiliser.Types.UreaN, 10);
              Manager Sowing
                SowDate =
                CultivarName = Wakanui
                SowingDepth = 50
                RowSpacing = 150
                Population = 150
```csharp
using Models.Soils.Nutrients;
using System;
using Models.Core;
using Models.PMF;
using Models.Soils;
using Models.Soils.Nutrients;
using Models.Utilities;
using APSIM.Shared.Utilities;

namespace Models
{
    [Serializable]
    public class Script : Model
    {
        [Link] Clock Clock;
        [Link] Summary Summary;
        [Link] Soil Soil;
        [Link] Plant Wheat;
        Accumulator accumulatedRain;
        
        [Description("Sowing date (d-mmm)")]
        public string SowDate { get; set; }
        [Description("Cultivar to be sown")]
        public string CultivarName { get; set; }
        [Description("Sowing depth (mm)")]
        public double SowingDepth { get; set; }
        [Description("Row spacing (mm)")]
        public double RowSpacing { get; set; }
        [Description("Plant population (/m2)")]
        public double Population { get; set; }
        


        [EventSubscribe("DoManagement")]
        private void OnDoManagement(object sender, EventArgs e)
        {
            if (DateUtilities.WithinDates(SowDate, Clock.Today, SowDate))
            {
                Wheat.Sow(population: Population, cultivar: CultivarName, depth: SowingDepth, rowSpacing: RowSpacing);    
                if(SowDate == "24-Feb")
                {
                    Wheat.SetEmergenceDate("2-Mar");
                }
                if(SowDate == "08-Mar")
                {
                    Wheat.SetEmergenceDate("17-Mar");
                }
                if(SowDate == "29-Mar")
                {
                    Wheat.SetEmergenceDate("8-Apr");
                }
                if(SowDate == "14-Apr")
                {
                    Wheat.SetEmergenceDate("26-Apr");
                }
            }
        
        }
        
    }
}
```
              Operations HarvestEvents
                2017-02-10  [Wheat].Harvest();
                2017-02-10  [Wheat].EndCrop();
              Manager Defoliation
                Defoliated = False
                NibblingDate = 10/31/2002 00:00:00
                ProportionNibbled = 0.5
```csharp
using System.Xml.Serialization;
using Models.PMF.Interfaces;
using Models.PMF;
using Models.Core;
using System.Collections.Generic;
using System;

namespace Models
{
    [Serializable] 
    [System.Xml.Serialization.XmlInclude(typeof(Model))]
    public class Script : Model
    {
        [Link] Plant Wheat;
        [Link] Clock Clock;

        [Description("Date that mouse damage event occurs")]
        public DateTime NibblingDate { get; set; }
        [Description("Proportion of the crop removed by mice")]
        public double ProportionNibbled { get; set; }
        [Description("Switch if crop is defoliated")]
        public string Defoliated {get; set;}
        
        [XmlIgnore] private RemovalFractions Remove { get; set; }
        
        [EventSubscribe("StartOfSimulation")]
        private void OnSimulationCommencing(object sender, EventArgs e)
        {
            Remove = new RemovalFractions();
        }
        
        [EventSubscribe("DoManagement")]
        private void OnDoManagement(object sender, EventArgs e)
        {
            //Set up  array of remove fractions to send with Cut method.  Each member in the array corresponds to an organ in the same order they are set up in.

            if (Clock.Today.Date == NibblingDate)
            {
                //Harvest with manager specified removal fractions
                Remove.SetFractionToRemove("Grain", 0);
                Remove.SetFractionToRemove("Leaf", 0, "live");
                Remove.SetFractionToRemove("Leaf", 0, "dead");
                Remove.SetFractionToRemove("Stem", 0);
                Remove.SetFractionToRemove("Spike", 0);
                Remove.SetFractionToRemove("Root", 0);
                Remove.SetFractionToResidue("Grain", ProportionNibbled);
                Remove.SetFractionToResidue("Leaf", ProportionNibbled, "live");
                Remove.SetFractionToResidue("Leaf", ProportionNibbled, "dead");
                Remove.SetFractionToResidue("Stem", ProportionNibbled);
                Remove.SetFractionToResidue("Spike", ProportionNibbled);
                Remove.SetFractionToResidue("Root", 0);
                Remove.SetThinningProportion = ProportionNibbled;
                Wheat.RemoveBiomass("Thin", Remove);
            }
        }
    }
}
```
            Irrigation
            Soil: same as Validation.New Zealand.Leeston2014.Wakanui2014Base.paddock.Soil
            SurfaceOrganicMatter Surface Organic Matter: InitialResidueName=wheat_stubble; InitialResidueType=wheat; InitialResidueMass=1000; InitialStandingFraction=0; InitialCPR=0; InitialCNR=80
            Fertiliser
            MicroClimate: a_interception=0; b_interception=1; c_interception=0; d_interception=0; soil_albedo=0.23; SoilHeatFluxFraction=0.4; MinimumHeightDiffForNewLayer=0; NightInterceptionFraction=0.5; ReferenceHeight=2
            Plant Wheat
            Report DailyReport
            Report HarvestReport
            Report SupReport (disabled): same as Validation.New Zealand.Leeston2014.Wakanui2014Base.paddock.SupReport
            Manager SetCropParams
              LN = 0
              SN = 0
              LV = 0
              SV = 0
          SoilArbitrator Soil Arbitrator
        Memo Leaf Size Predictions
          This graph shows different leaf size profiles measured for winter wheat sown on a range of different dates.  Leaves that emerge during cooler conditions achieve a smallter maximum size than the equivelent leaf appearanign in warm conditions.
      Experiment Wakanui2017
        Memo: same as Validation.New Zealand.Leeston2013.Memo
        Factors
          Permutation
            Factor Sow: Specification=[Sowing].Script.SowDate = 09-Mar,30-Mar,19-Apr
            Factor Cm: Specification=[Defoliation].Script.Defoliated = Normal,Defoliation
        Simulation Wakanui2017Base
          Clock: Start=2017-02-01; End=2018-02-15
          Summary summaryfile
          Weather: FileName=Wakanui.met
          Zone paddock: Area=1; Slope=0; AspectAngle=0; Altitude=50
            Folder Manager folder
              Operations IrrigationEvents: same as Validation.New Zealand.Leeston2014.Wakanui2014Base.paddock.Manager folder.IrrigationEvents
              Operations FertiliserEvents
                2014-09-13  [Fertiliser].Apply(100, Fertiliser.Types.UreaN, 10);
                2014-10-13  [Fertiliser].Apply(150, Fertiliser.Types.UreaN, 10);
              Manager Sowing
                SowDate =
                CultivarName = Wakanui
                SowingDepth = 50
                RowSpacing = 150
                Population = 150
```csharp
using Models.Soils.Nutrients;
using System;
using Models.Core;
using Models.PMF;
using Models.Soils;
using Models.Soils.Nutrients;
using Models.Utilities;
using APSIM.Shared.Utilities;

namespace Models
{
    [Serializable]
    public class Script : Model
    {
        [Link] Clock Clock;
        [Link] Summary Summary;
        [Link] Soil Soil;
        [Link] Plant Wheat;
        Accumulator accumulatedRain;
        
        [Description("Sowing date (d-mmm)")]
        public string SowDate { get; set; }
        [Description("Cultivar to be sown")]
        public string CultivarName { get; set; }
        [Description("Sowing depth (mm)")]
        public double SowingDepth { get; set; }
        [Description("Row spacing (mm)")]
        public double RowSpacing { get; set; }
        [Description("Plant population (/m2)")]
        public double Population { get; set; }
        


        [EventSubscribe("DoManagement")]
        private void OnDoManagement(object sender, EventArgs e)
        {
            if (DateUtilities.WithinDates(SowDate, Clock.Today, SowDate))
            {
                Wheat.Sow(population: Population, cultivar: CultivarName, depth: SowingDepth, rowSpacing: RowSpacing);    
            }
                if(SowDate == "09-Mar")
                {
                    Wheat.SetEmergenceDate("16-Mar");
                }
                if(SowDate == "30-Mar")
                {
                    Wheat.SetEmergenceDate("11-Apr");
                }
                if(SowDate == "19-Apr")
                {
                    Wheat.SetEmergenceDate("30-Apr");
                }
        }
        
    }
}
```
              Operations HarvestEvents
                2018-02-04  [Wheat].Harvest();
                2018-02-04  [Wheat].EndCrop();
              Manager Defoliation: same as Validation.New Zealand.Wakanui2016.Wakanui2016Base.paddock.Manager folder.Defoliation
            Irrigation
            Soil: same as Validation.New Zealand.Leeston2014.Wakanui2014Base.paddock.Soil
            SurfaceOrganicMatter Surface Organic Matter: InitialResidueName=wheat_stubble; InitialResidueType=wheat; InitialResidueMass=1000; InitialStandingFraction=0; InitialCPR=0; InitialCNR=80
            Fertiliser
            MicroClimate: a_interception=0; b_interception=1; c_interception=0; d_interception=0; soil_albedo=0.23; SoilHeatFluxFraction=0.4; MinimumHeightDiffForNewLayer=0; NightInterceptionFraction=0.5; ReferenceHeight=2
            Plant Wheat
            Report DailyReport
            Report HarvestReport
            Manager SetCropParams
              LN = 0
              SN = 0
              LV = 0
              SV = 0
          SoilArbitrator Soil Arbitrator
      Experiment PalmerstonNorth1989
        Memo: same as Validation.New Zealand.Leeston2013.Memo
        Factors
          Permutation
            Factor Sow
              Specification=[Sowing].Script.SowDate = 2-Jun,24-Jul,18-Sep,25-Nov,21-Feb,5-Apr
            Factor Cultivar: Specification=[Sowing].Script.CultivarName = BattenSpring,Otane,Rongotea
        Simulation PalmerstonNorth1989Base
          Clock: Start=1989-06-01; End=1990-09-01
          Summary summaryfile
          Weather: FileName=PalmerstonNorth.met
          Zone paddock: Area=1; Slope=0; AspectAngle=0; Altitude=50
            Folder Manager folder
              Manager Sowing
                SowDate =
                CultivarName = Wakanui
                SowingDepth = 50
                RowSpacing = 150
                Population = 150
                IsSown = False
```csharp
using Models.Soils.Nutrients;
using System;
using Models.Core;
using Models.PMF;
using Models.Soils;
using Models.Soils.Nutrients;
using Models.Utilities;
using APSIM.Shared.Utilities;

namespace Models
{
    [Serializable]
    public class Script : Model
    {
        [Link] Clock Clock;
        [Link] Summary Summary;
        [Link] Soil Soil;
        [Link] Plant Wheat;
        Accumulator accumulatedRain;
        
        [Description("Sowing date (d-mmm)")]
        public string SowDate { get; set; }
        [Description("Cultivar to be sown")]
        public string CultivarName { get; set; }
        [Description("Sowing depth (mm)")]
        public double SowingDepth { get; set; }
        [Description("Row spacing (mm)")]
        public double RowSpacing { get; set; }
        [Description("Plant population (/m2)")]
        public double Population { get; set; }

        public bool IsSown {get;set;}

        [EventSubscribe("StartOfSimulation")]
        private void OnStartOfSimulation(object sender, EventArgs e)
        {
            IsSown = false;
        }

        [EventSubscribe("DoManagement")]
        private void OnDoManagement(object sender, EventArgs e)
        {
            if ((DateUtilities.WithinDates(SowDate, Clock.Today, SowDate))&&IsSown==false)
            {
            	IsSown=true;
                Wheat.Sow(population: Population, cultivar: CultivarName, depth: SowingDepth, rowSpacing: RowSpacing);    
            }
        }
        
    }
}
```
              Operations HarvestEvents
                1990-09-01  [Wheat].Harvest();
                1990-09-01  [Wheat].EndCrop();
            Irrigation
            Soil: same as Validation.New Zealand.Leeston2013.Leeston2013Base.paddock.Soil
            SurfaceOrganicMatter Surface Organic Matter: InitialResidueName=wheat_stubble; InitialResidueType=whiteclover; InitialResidueMass=1000; InitialStandingFraction=0; InitialCPR=0; InitialCNR=25
            Fertiliser
            MicroClimate: a_interception=0; b_interception=1; c_interception=0; d_interception=0; soil_albedo=0.23; SoilHeatFluxFraction=0.4; MinimumHeightDiffForNewLayer=0; NightInterceptionFraction=0.5; ReferenceHeight=2
            Plant Wheat
            Report DailyReport
            Report HarvestReport
            Report SupReport (disabled): same as Validation.New Zealand.Leeston2013.Leeston2013Base.paddock.SupReport
            Manager SetCropParams
              LN = 0
              SN = 0
              LV = 0
              SV = 0
          SoilArbitrator Soil Arbitrator
    Memo Memo1: same as Validation.Memo
    Folder Sensibility (disabled)
      Experiment SowBattenSpring
        Factors
          Factor Sow
            Specification=[Clock].StartDate = 2000-01-01,2000-01-08,2000-01-15,2000-01-22,2000-01-29,2000-02-05,2000-02-12,2000-02-19,2000-02-26,2000-03-04,2000-03-11,2000-03-18,2000-03-25,2000-04-01,2000-04-08,2000-04-15,2000-04-22,2000-04-29,2000-05-06,2000-05-13,2000-05-20,2000-05-27,2000-06-03,2000-06-10,2000-06-17,2000-06-24,2000-07-01,2000-07-08,2000-07-15,2000-07-22,2000-07-29,2000-08-05,2000-08-12,2000-08-19,2000-08-26,2000-09-02,2000-09-09,2000-09-16,2000-09-23,2000-09-30,2000-10-07,2000-10-14,2000-10-21,2000-10-28,2000-11-04,2000-11-11,2000-11-18,2000-11-25,2000-12-02,2000-12-09,2000-12-16,2000-12-23,2000-12-30
        Simulation LincolnCPTBattenSpring
          Clock: Start=1991-06-08; End=2013-07-01
          Summary summaryfile
          Weather: FileName=lincoln.met
          Zone paddock: Area=1; Slope=0; AspectAngle=0; Altitude=50
            Irrigation
            Soil: SoilType=LincolnSoil; LocalName=Lincoln; Site=Lincoln; NearestTown=Unknown; Region=NZ; NaturalVegetation=Unknown; Latitude=0; Longitude=0
              Physical
                Thickness  BD   AirDry  LL15  DUL   SAT
                100        1.3  0.05    0.08  0.31  0.44
                200        1.3  0.05    0.07  0.3   0.44
                200        1.3  0.05    0.07  0.28  0.44
                200        1.3  0.05    0.09  0.31  0.44
                200        1.3  0.05    0.11  0.3   0.44
                200        1.3  0.05    0.16  0.28  0.44
                200        1.3  0.05    0.15  0.3   0.44
                200        1.3  0.05    0.12  0.34  0.44
                SoilCrop WheatSoil: LL=[0.08, 0.07, 0.07, 0.09, 0.11, 0.16, 0.15, 0.12]; KL=[0.06, 0.06, 0.06, 0.04, 0.03, 0.02, 0.02, 0.02]; XF=[1, 1, 1, 1, 0.6, 0.4, 0.4, 0.4]
              WaterBalance SoilWater: SummerDate=1-Nov; SummerU=7; SummerCona=3; WinterDate=1-Apr; WinterU=7; WinterCona=3; DiffusConst=40; DiffusSlope=16; Salb=0.2; CN2Bare=75; CNRed=20; CNCov=0.8; DischargeWidth=0; CatchmentArea=0
                Thickness  SWCON  KLAT
                100        0.6    0
                200        0.6    0
                200        0.6    0
                200        0.6    0
                200        0.6    0
                200        0.6    0
                200        0.6    0
                200        0.6    0
              Organic: FOMCNRatio=0
                Thickness  Carbon  SoilCNRatio  FBiom  FInert  FOM
                100        0.35    0            0.04   0.31    0
                200        0.27    0            0.03   0.31    0
                200        0.24    0            0.02   0.31    0
                200        0.16    0            0.01   0.31    0
                200        0.16    0            0.01   0.31    0
                200        0.3     0            0.01   0.25    0
                200        0.1     0            0.01   0.2     0
                200        0.1     0            0.01   0.2     0
              Chemical
                Thickness  NO3N  NH4N  PH
                100        24.9  1.3   8.5
                200        16    1     8.5
                200        9.8   1     8.6
                200        9.8   0.8   8.6
                200        2.1   0.8   8.6
                200        2.1   0.5   8.6
                200        2.1   0.5   8.6
                200        2.1   0.5   8.6
              Sample Initial water: Thickness=[100, 200, 200, 200, 200, 200, 200, 200]; SW=[0.27, 0.3, 0.28, 0.25, 0.24, 0.27, 0.27, 0.21]; SWUnits=Volumetric; OCUnits=Total; PHUnits=Water
              CERESSoilTemperature Temperature
              Nutrient
            SurfaceOrganicMatter Surface Organic Matter: InitialResidueName=wheat_stubble; InitialResidueType=wheat; InitialResidueMass=1000; InitialStandingFraction=0; InitialCPR=0; InitialCNR=80
            Fertiliser
            MicroClimate: a_interception=0; b_interception=1; c_interception=0; d_interception=0; soil_albedo=0.23; SoilHeatFluxFraction=0.4; MinimumHeightDiffForNewLayer=0; NightInterceptionFraction=0.5; ReferenceHeight=2
            Plant Wheat
            Report HarvestReport
            Manager SowAndHarvest
              Cultivar = BattenSpring
              Sown = False
              Harvested = False
              EndSet = False
```csharp
using Models.PMF.Phen;
using System;
using Models.Core;
using Models.PMF;
using APSIM.Shared.Utilities;
using System.Xml.Serialization;
        
namespace Models
{
    [Serializable] 
    [System.Xml.Serialization.XmlInclude(typeof(Model))]
    public class Script : Model
    {
        [Link] private Plant Wheat;
        [Link] private Clock Clock;
        [Link] private Simulation sim;
        [Link] private Summary Summary;
        [Link(Type = LinkType.Path, Path = "[Wheat].Phenology")]
        private Phenology phenology;
        
        [Description("Cultivar")]
        public string Cultivar { get; set; }
        
        [XmlIgnore] public bool Sown { get; set; }
        [XmlIgnore] public bool Harvested { get; set; }
        [XmlIgnore] public bool EndSet { get; set; }
        
        [EventSubscribe("StartOfSimulation")]
        private void OnSimulationCommencing(object sender, EventArgs e)
        {
            Sown = false;
            Harvested = false;
            EndSet = false;
        }
        
        [EventSubscribe("DoManagement")]
        private void OnDoManagement(object sender, EventArgs e)
        {
            if (Sown == false)
            {
                Wheat.Sow(population: 200, cultivar: Cultivar, depth: 15, rowSpacing: 150, budNumber: 1);
                Sown = true;
            }
            
            if (phenology.CurrentPhase.Name == "ReadyForHarvesting")
            {
                Wheat.Harvest();
                Wheat.EndCrop();
                Harvested = true;
                Summary.WriteMessage(this, "Flowering reached so setting end date to stop simulation");
            }
            
            if ((Harvested == true) && (EndSet == false))
            {
                sim.Set("Clock.EndDate", Clock.Today.AddDays(1));
                EndSet = true;
            }
        }
    }
}
```
          SoilArbitrator Soil Arbitrator
      Experiment V0P0
        Factors: same as Validation.Sensibility.SowBattenSpring.Factors
        Simulation LincolnV0P0
          Clock: Start=1991-06-08; End=2013-07-01
          Summary summaryfile
          Weather: FileName=lincoln.met
          Zone paddock: Area=1; Slope=0; AspectAngle=0; Altitude=50
            Irrigation
            Soil: same as Validation.Sensibility.SowBattenSpring.LincolnCPTBattenSpring.paddock.Soil
            SurfaceOrganicMatter Surface Organic Matter: InitialResidueName=wheat_stubble; InitialResidueType=wheat; InitialResidueMass=1000; InitialStandingFraction=0; InitialCPR=0; InitialCNR=80
            Fertiliser
            MicroClimate: a_interception=0; b_interception=1; c_interception=0; d_interception=0; soil_albedo=0.23; SoilHeatFluxFraction=0.4; MinimumHeightDiffForNewLayer=0; NightInterceptionFraction=0.5; ReferenceHeight=2
            Plant Wheat
              Cultivar V0P0
                Command:
                  [Phenology].CAMP.FLNparams.LV = 8
                  [Phenology].CAMP.FLNparams.LN = 8
                  [Phenology].CAMP.FLNparams.SV = 8
                  [Phenology].CAMP.FLNparams.SN = 8
            Report HarvestReport
            Manager SowAndHarvest
              Cultivar = V0P0
              Sown = False
              Harvested = False
              EndSet = False
              script: same as in Validation.Sensibility.SowBattenSpring.LincolnCPTBattenSpring.paddock.SowAndHarvest
          SoilArbitrator Soil Arbitrator
      Experiment V0P1
        Factors: same as Validation.Sensibility.SowBattenSpring.Factors
        Simulation LincolnV0P1
          Clock: Start=1991-06-08; End=2013-07-01
          Summary summaryfile
          Weather: FileName=lincoln.met
          Zone paddock: Area=1; Slope=0; AspectAngle=0; Altitude=50
            Irrigation
            Soil: same as Validation.Sensibility.SowBattenSpring.LincolnCPTBattenSpring.paddock.Soil
            SurfaceOrganicMatter Surface Organic Matter: InitialResidueName=wheat_stubble; InitialResidueType=wheat; InitialResidueMass=1000; InitialStandingFraction=0; InitialCPR=0; InitialCNR=80
            Fertiliser
            MicroClimate: a_interception=0; b_interception=1; c_interception=0; d_interception=0; soil_albedo=0.23; SoilHeatFluxFraction=0.4; MinimumHeightDiffForNewLayer=0; NightInterceptionFraction=0.5; ReferenceHeight=2
            Plant Wheat
              Cultivar V0P1
                Command:
                  [Phenology].CAMP.FLNparams.LV = 8
                  [Phenology].CAMP.FLNparams.LN = 8
                  [Phenology].CAMP.FLNparams.SV = 12
                  [Phenology].CAMP.FLNparams.SN = 12
            Report HarvestReport
            Manager SowAndHarvest
              Cultivar = V0P1
              Sown = False
              Harvested = False
              EndSet = False
              script: same as in Validation.Sensibility.SowBattenSpring.LincolnCPTBattenSpring.paddock.SowAndHarvest
          SoilArbitrator Soil Arbitrator
      Experiment V1P0
        Factors: same as Validation.Sensibility.SowBattenSpring.Factors
        Simulation LincolnV1P0
          Clock: Start=1991-06-08; End=2013-07-01
          Summary summaryfile
          Weather: FileName=lincoln.met
          Zone paddock: Area=1; Slope=0; AspectAngle=0; Altitude=50
            Irrigation
            Soil: same as Validation.Sensibility.SowBattenSpring.LincolnCPTBattenSpring.paddock.Soil
            SurfaceOrganicMatter Surface Organic Matter: InitialResidueName=wheat_stubble; InitialResidueType=wheat; InitialResidueMass=1000; InitialStandingFraction=0; InitialCPR=0; InitialCNR=80
            Fertiliser
            MicroClimate: a_interception=0; b_interception=1; c_interception=0; d_interception=0; soil_albedo=0.23; SoilHeatFluxFraction=0.4; MinimumHeightDiffForNewLayer=0; NightInterceptionFraction=0.5; ReferenceHeight=2
            Plant Wheat
              Cultivar V1P0
                Command:
                  [Phenology].CAMP.FLNparams.LV = 8
                  [Phenology].CAMP.FLNparams.LN = 18
                  [Phenology].CAMP.FLNparams.SV = 8
                  [Phenology].CAMP.FLNparams.SN = 18
            Report HarvestReport
            Manager SowAndHarvest
              Cultivar = V1P0
              Sown = False
              Harvested = False
              EndSet = False
              script: same as in Validation.Sensibility.SowBattenSpring.LincolnCPTBattenSpring.paddock.SowAndHarvest
            Report DailyReport
          SoilArbitrator Soil Arbitrator
      Experiment V1P01
        Factors
          Factor Sow: Specification=[Clock].StartDate = 2000-09-09,2000-09-30
        Simulation LincolnV1P01: same as Validation.Sensibility.V1P0.LincolnV1P0
      Experiment Wakanui2017test
        Memo
          The design, management and yield results of this trial have been described in full by [Craigie_Wheat_2015].  In brief, this trial was conducted to assess the impact of earlier sowing on potential yields of 'Wakanui' wheat grown at Wakanui (the cultivar was named after the area) in Mid Canterbury, New Zealand.  it was a 4 x 4 factorial with 4 replicates of the following treatments:

          1. Sowing date (20 February, 10 March, 28 March, 23 April)
          2. Sowing density (50,100,150 and 200 plants/m^2^

          In addition to yield, measurements of leaf appearance and senescence and canopy cover (measured with NDVI)  were measured at 10 - 14 day intervals and biomass measurements were taken at growth stages 32 and 65.

          Considerable canopy decay was observed during the winter for the early sown treatments and we have not introduced mechanisms into the model to capture this yet so there is a genral over prediction of canopy size and biomass in these first sowing dates.
        Factors
          Permutation
            Factor Sow: Specification=[Sowing].Script.SowDate = 19-Apr
            Factor Cv: Specification=[Sowing].Script.CultivarName = Wakanui,LV9,LV11,LV13,LV15
        Simulation Wakanui2017test
          Clock: Start=2017-02-01; End=2018-02-15
          Summary summaryfile
          Weather: FileName=Wakanui.met
          Zone paddock: Area=1; Slope=0; AspectAngle=0; Altitude=50
            Folder Manager folder
              Operations IrrigationEvents
                2014-10-13  [Irrigation].Apply(50.0);
                2014-10-27  [Irrigation].Apply(50.0);
                2014-11-05  [Irrigation].Apply(50.0);
                2014-11-18  [Irrigation].Apply(50.0);
              Operations FertiliserEvents
                2014-09-13  [Fertiliser].Apply(100, Fertiliser.Types.UreaN, 10);
                2014-10-13  [Fertiliser].Apply(150, Fertiliser.Types.UreaN, 10);
              Manager Sowing
                SowDate =
                CultivarName = Wakanui
                SowingDepth = 50
                RowSpacing = 150
                Population = 150
                script: same as in Validation.New Zealand.Wakanui2017.Wakanui2017Base.paddock.Manager folder.Sowing
              Operations HarvestEvents
                2018-02-04  [Wheat].Harvest();
                2018-02-04  [Wheat].EndCrop();
              Manager Defoliation
                Defoliated = False
                NibblingDate = 10/31/2002 00:00:00
                ProportionNibbled = 0.5
                script: same as in Validation.New Zealand.Wakanui2016.Wakanui2016Base.paddock.Manager folder.Defoliation
            Irrigation
            Soil: SoilType=LincolnSoil; LocalName=Lincoln; Site=Lincoln; NearestTown=Unknown; Region=NZ; NaturalVegetation=Unknown; Latitude=0; Longitude=0
              Physical
                Thickness  BD   AirDry  LL15  DUL   SAT
                100        1.3  0.05    0.08  0.31  0.44
                200        1.3  0.05    0.07  0.3   0.44
                200        1.3  0.05    0.07  0.28  0.44
                200        1.3  0.05    0.09  0.31  0.44
                200        1.3  0.05    0.11  0.3   0.44
                200        1.3  0.05    0.16  0.28  0.44
                200        1.3  0.05    0.15  0.3   0.44
                200        1.3  0.05    0.12  0.34  0.44
                SoilCrop WheatSoil: LL=[0.08, 0.07, 0.07, 0.09, 0.11, 0.16, 0.15, 0.12]; KL=[0.06, 0.06, 0.06, 0.06, 0.03, 0.02, 0.02, 0.02]; XF=[1, 1, 1, 1, 1, 1, 1, 1]
              WaterBalance SoilWater: same as Validation.Sensibility.SowBattenSpring.LincolnCPTBattenSpring.paddock.Soil.SoilWater
              Organic: FOMCNRatio=15
                Thickness  Carbon  SoilCNRatio  FBiom  FInert  FOM
                100        4       11           0.04   0.31    1031.07
                200        3       11           0.03   0.4     691.146
                200        2       11           0.02   0.5     463.289
                200        1       11           0.01   0.6     310.552
                200        1       11           0.01   0.7     208.169
                200        1       11           0.01   0.9     139.54
                200        0.9     11           0.01   0.99    93.5364
                200        0.9     11           0.01   0.99    62.6993
              Chemical
                Thickness  NO3N     NH4N  PH
                100        30.7692  1.3   6
                200        11.5385  1     6
                200        7.69231  1     6
                200        3.84615  0.8   6
                200        3.84615  0.8   6
                200        3.84615  0.5   6
                200        3.84615  0.5   6
                200        3.84615  0.5   6
              Sample Initial water: Thickness=[100, 200, 200, 200, 200, 200, 200, 200]; SW=[0.24, 0.27, 0.26, 0.23, 0.24, 0.23, 0.23, 0.18]; SWUnits=Volumetric; OCUnits=Total; PHUnits=Water
              CERESSoilTemperature Temperature
              Nutrient
            SurfaceOrganicMatter Surface Organic Matter: InitialResidueName=wheat_stubble; InitialResidueType=wheat; InitialResidueMass=1000; InitialStandingFraction=0; InitialCPR=0; InitialCNR=80
            Fertiliser
            MicroClimate: a_interception=0; b_interception=1; c_interception=0; d_interception=0; soil_albedo=0.23; SoilHeatFluxFraction=0.4; MinimumHeightDiffForNewLayer=0; NightInterceptionFraction=0.5; ReferenceHeight=2
            Plant Wheat
              Cultivar LV9
                Command:
                  [Phenology].HeadEmergenceLongDayBase.FixedValue = 4
                  [Leaf].ExtinctionCoeff.VegetativePhase.FixedValue = 0.7
                  [Grain].NumberFunction.GrainNumber.GrainsPerGramOfStem.FixedValue = 22
                  [Grain].MaximumPotentialGrainSize.FixedValue = 0.045
                  [Leaf].CohortParameters.MaxArea.AreaLargestLeaves.FixedValue = 3000
                  [Phenology].MaxLAR.FixedValue = 0.011
                  [Phenology].PTQhf.FixedValue = 0.3
                  [Phenology].CAMP.FLNparams.LV = 9.0
                  [Phenology].CAMP.FLNparams.SV = 9.0
                  [Phenology].CAMP.FLNparams.LN = 18.0
                  [Phenology].CAMP.FLNparams.SN = 20.0
              Cultivar LV11
                Command:
                  [Phenology].HeadEmergenceLongDayBase.FixedValue = 4
                  [Leaf].ExtinctionCoeff.VegetativePhase.FixedValue = 0.7
                  [Grain].NumberFunction.GrainNumber.GrainsPerGramOfStem.FixedValue = 22
                  [Grain].MaximumPotentialGrainSize.FixedValue = 0.045
                  [Leaf].CohortParameters.MaxArea.AreaLargestLeaves.FixedValue = 3000
                  [Phenology].MaxLAR.FixedValue = 0.011
                  [Phenology].PTQhf.FixedValue = 0.3
                  [Phenology].CAMP.FLNparams.LV = 11.0
                  [Phenology].CAMP.FLNparams.SV = 11.0
                  [Phenology].CAMP.FLNparams.LN = 18.0
                  [Phenology].CAMP.FLNparams.SN = 20.0
              Cultivar LV13
                Command:
                  [Phenology].HeadEmergenceLongDayBase.FixedValue = 4
                  [Leaf].ExtinctionCoeff.VegetativePhase.FixedValue = 0.7
                  [Grain].NumberFunction.GrainNumber.GrainsPerGramOfStem.FixedValue = 22
                  [Grain].MaximumPotentialGrainSize.FixedValue = 0.045
                  [Leaf].CohortParameters.MaxArea.AreaLargestLeaves.FixedValue = 3000
                  [Phenology].MaxLAR.FixedValue = 0.011
                  [Phenology].PTQhf.FixedValue = 0.3
                  [Phenology].CAMP.FLNparams.LV = 13.0
                  [Phenology].CAMP.FLNparams.SV = 13.0
                  [Phenology].CAMP.FLNparams.LN = 18.0
                  [Phenology].CAMP.FLNparams.SN = 20.0
              Cultivar LV15
                Command:
                  [Phenology].HeadEmergenceLongDayBase.FixedValue = 4
                  [Leaf].ExtinctionCoeff.VegetativePhase.FixedValue = 0.7
                  [Grain].NumberFunction.GrainNumber.GrainsPerGramOfStem.FixedValue = 22
                  [Grain].MaximumPotentialGrainSize.FixedValue = 0.045
                  [Leaf].CohortParameters.MaxArea.AreaLargestLeaves.FixedValue = 3000
                  [Phenology].MaxLAR.FixedValue = 0.011
                  [Phenology].PTQhf.FixedValue = 0.3
                  [Phenology].CAMP.FLNparams.LV = 15.0
                  [Phenology].CAMP.FLNparams.SV = 15.0
                  [Phenology].CAMP.FLNparams.LN = 18.0
                  [Phenology].CAMP.FLNparams.SN = 20.0
            Report DailyReport
            Report HarvestReport
            Manager SetCropParams
              LN = 0
              SN = 0
              LV = 0
              SV = 0
          SoilArbitrator Soil Arbitrator
      Experiment PalmerstonNorthCE
        Factors
          Permutation
            Factor Treat
              CompositeFactor 5oC8h
                Specifications:
                  [Experiment].Script.TreatTemp = 5.0
                  [Experiment].Script.TreatPp = 8.0
              CompositeFactor 5oC16h
                Specifications:
                  [Experiment].Script.TreatTemp = 5.0
                  [Experiment].Script.TreatPp = 16.0
              CompositeFactor 8oC8h
                Specifications:
                  [Experiment].Script.TreatTemp = 8.0
                  [Experiment].Script.TreatPp = 8.0
              CompositeFactor 8oC16h
                Specifications:
                  [Experiment].Script.TreatTemp = 8.0
                  [Experiment].Script.TreatPp = 16.0
              CompositeFactor 11oC8h
                Specifications:
                  [Experiment].Script.TreatTemp = 16.0
                  [Experiment].Script.TreatPp = 8.0
              CompositeFactor 11oC16h
                Specifications:
                  [Experiment].Script.TreatTemp = 16.0
                  [Experiment].Script.TreatPp = 16.0
              CompositeFactor 25oC8h
                Specifications:
                  [Experiment].Script.TreatTemp = 23.6
                  [Experiment].Script.TreatPp = 8.0
              CompositeFactor 1oC0h
                Specifications:
                  [Experiment].Script.TreatTemp = 1.0
                  [Experiment].Script.TreatPp = 16
            Factor Cv
              CompositeFactor Winter: Specifications=[Experiment].Script.CultivarName=CRWT153
            Factor Durat: Specification=[Experiment].Script.TransitionWeek = 50
        Simulation PNGrowthRooms
          Clock: Start=2000-01-01; End=2001-05-31
          Summary SummaryFile
          SoilArbitrator
          ControlledEnvironment: MaxT=23.6; MinT=23.6; Rain=0; Radn=17.64; PanEvap=5; VP=2; Wind=3; CO2=350; AirPressure=1010; Latitude=-27; Longitude=0; DayLength=16; SunRise=0; SunSet=0
          Zone Field: Area=1; Slope=0; AspectAngle=0; Altitude=50
            Fertiliser
            Soil: ASCOrder=Vertosol; ASCSubOrder=Black; SoilType=Clay; Site=Norwin; NearestTown=Norwin; Region=Darling Downs and Granite Belt; State=Queensland; Country=Australia; NaturalVegetation=Qld. Bluegrass, possible Qld. Blue gum; ApsoilNumber=900; Latitude=-27.581836; Longitude=151.320206; LocationAccuracy=+/- 20m
              DataSource=CSIRO Sustainable Ecosystems, Toowoomba; Characteriesd as part of the GRDC funded project"Doing it better, doing it smarter, managing soil water in Australian agriculture' 2011
              Comments=OC, CLL for all crops estimated-based on Bongeen Mywybilla Soil No1
              Physical
                Thickness  BD       AirDry    LL15      DUL       SAT       KS
                150        1.01056  0.13025   0.2605    0.521     0.588655  20
                150        1.07146  0.198689  0.248362  0.496723  0.565677  20
                300        1.09394  0.28      0.28      0.488438  0.557193  20
                300        1.15861  0.28      0.28      0.480297  0.532787  20
                300        1.17301  0.28      0.28      0.471584  0.527354  20
                300        1.16287  0.28      0.28      0.457071  0.53118   20
                300        1.1875   0.28      0.28      0.452332  0.521888  20
                SoilCrop WheatSoil: LL=[0.261, 0.248, 0.28, 0.306, 0.36, 0.392, 0.446]; KL=[0.06, 0.06, 0.06, 0.04, 0.04, 0.02, 0.01]; XF=[1, 1, 1, 1, 1, 1, 1]
              WaterBalance SoilWater: SummerDate=1-Nov; SummerU=5; SummerCona=5; WinterDate=1-Apr; WinterU=5; WinterCona=5; DiffusConst=40; DiffusSlope=16; Salb=0.12; CN2Bare=73; CNRed=20; CNCov=0.8; Thickness=[150, 150, 300, 300, 300, 300, 300]; SWCON=[0.3, 0.3, 0.3, 0.3, 0.3, 0.3, 0.3]
              Organic: FOMCNRatio=40
                Thickness  Carbon  SoilCNRatio  FBiom  FInert  FOM
                150        1.2     12           0.04   0.4     347.129
                150        0.96    12           0.02   0.6     270.344
                300        0.6     12           0.02   0.8     163.972
                300        0.3     12           0.02   1       99.4541
                300        0.18    12           0.01   1       60.322
                300        0.12    12           0.01   1       36.5871
                300        0.12    12           0.01   1       22.1912
              Chemical
                Thickness  NO3N  NH4N  PH
                150        1     0.1   8
                150        1     0.1   8
                300        1     0.1   8
                300        1     0.1   8
                300        1     0.1   8
                300        1     0.1   8
                300        1     0.1   8
              InitialWater: PercentMethod=1; FractionFull=1
              Sample InitialN: Thickness=[150, 150, 300, 300, 300, 300, 300]; SWUnits=Volumetric; OCUnits=Total; PHUnits=Water
              CERESSoilTemperature Temperature
              Nutrient
            SurfaceOrganicMatter: InitialResidueName=wheat_stubble; InitialResidueType=wheat; InitialResidueMass=500; InitialStandingFraction=0; InitialCPR=0; InitialCNR=100
            Plant Wheat
              Cultivar LV15: same as Validation.Sensibility.Wakanui2017test.Wakanui2017test.paddock.Wheat.LV15
            MicroClimate: a_interception=0; b_interception=1; c_interception=0; d_interception=0; soil_albedo=0.3; SoilHeatFluxFraction=0.4; MinimumHeightDiffForNewLayer=0; NightInterceptionFraction=0.5; ReferenceHeight=2
            Manager Experiment
              CultivarName =
              SowingDepth = 100
              TransitionWeek = 0
              TreatTemp = 0
              TreatPp = 0
```csharp
using Models.PMF.Phen;
using APSIM.Shared.Utilities;
using Models.Utilities;
using Models.Soils;
using Models.PMF;
using Models.Core;
using System;
using Models.Climate;

namespace Models
{
    [Serializable]
    public class Script : Model
    {
        [Link] private Clock clock;
        [Link] private Summary summary;
        [Link] private Plant wheat;
        [Link] private ControlledEnvironment ci;
        [Link]
        private Phenology phenology;

        [Display(Type = DisplayType.CultivarName)]
        [Description("Cultivar to be sown")]
        public string CultivarName { get; set; }
        [Description("Sowing depth (mm)")]
        public double SowingDepth { get; set; }
        [Description("Treatment duration (Weeks)")]
        public double TransitionWeek { get; set; }
        [Description("Treatment temperature (oC)")]
        public double TreatTemp { get; set; }
        [Description("Treatment photoperiod (h)")]
        public double TreatPp { get; set; }
        private double DAS {get; set;}
        private bool FirstDay = true;
        private double Weeks {get; set;}
        private bool Transitioned = false;
        private bool Emerged = false;

        [EventSubscribe("PreparingNewWeatherData")]
        private void OnPreparingNewWeatherData(object sender, EventArgs e)
        {
            if (FirstDay)
            {
                wheat.Sow(population: 100, cultivar: CultivarName, depth: SowingDepth, rowSpacing: 150);    
                FirstDay = false;
                summary.WriteMessage(this,"Wheat crop sown");
            }

            if((phenology.AccumulatedTT >= 90)&&(Emerged==false))
            {
                wheat.SetEmergenceDate(clock.Today.ToString("d-MMM"));
                Emerged =true;
            }

            DAS += 1;
            Weeks = DAS/7.0;
            if (Weeks <= TransitionWeek)
            {
                ci.MaxT = TreatTemp;
                ci.MinT = TreatTemp;
                ci.DayLength = TreatPp;
                ci.Radn = TreatPp * 3600 * 0.000153 * 2; //Hours * s/h * MJ/m2/s * Coeff_PAR->Total 
            }
            else
            {
                if (Transitioned = false)
                {
                    Transitioned = true;
                    summary.WriteMessage(this,"Plants moved to post treatment chamber");
                }
                ci.MaxT=23.6;
                ci.MinT=23.6;
                ci.DayLength = 16;
                ci.Radn = 16 * 3600 * 0.000153 * 2; //Hours * s/h * MJ/m2/s * Coeff_PAR->Total 
            }
        }
    }
}
```
            Manager HarvestAtFlowering
```csharp
using Models.PMF.Phen;
using APSIM.Shared.Utilities;
using Models.Utilities;
using Models.Soils;
using Models.PMF;
using Models.Core;
using System;
using Models.Soils.Nutrients;

namespace Models
{
    [Serializable]
    public class Script : Model
    {
        [Link] private Plant Wheat;
        [Link] private Clock clock;
        [Link(Type = LinkType.Path, Path = "[Wheat].Phenology")]
        private Phenology phenology;

        [EventSubscribe("DoManagement")]
        private void OnDoManagement(object sender, EventArgs e)
        {
            if (phenology.CurrentPhase.Name=="GrainFilling")
            {
               Wheat.Harvest();
               Wheat.EndCrop();    
               clock.EndDate = clock.Today.Date;
            }
        
        }
        
    }
}
```
            Report DailyReport
            Report HarvestReport
      Experiment LincolnCE
        Factors
          Permutation
            Factor Treat
              CompositeFactor LV
                Specifications:
                  [Experimental].Script.TreatPp = 15
                  [Experimental].Script.Vern = Full
                  [Experimental].Script.EmergeDate = 8-Jan
              CompositeFactor LN
                Specifications:
                  [Experimental].Script.TreatPp = 15
                  [Experimental].Script.Vern = Nil
                  [Experimental].Script.EmergeDate = 8-Jan
              CompositeFactor SV
                Specifications:
                  [Experimental].Script.TreatPp = 8
                  [Experimental].Script.Vern = Full
                  [Experimental].Script.EmergeDate = 8-Jan
              CompositeFactor SN
                Specifications:
                  [Experimental].Script.TreatPp = 8
                  [Experimental].Script.Vern = Nil
                  [Experimental].Script.EmergeDate = 8-Jan
            Factor Cv: Specification=[Experimental].Script.CultivarName = CRWT153
            Factor Durat: Specification=[Experimental].Script.TransitionWeek = 50
        Simulation LincolnUniBiotron
          Clock: Start=2000-01-01; End=2001-05-31
          Summary SummaryFile
          SoilArbitrator
          ControlledEnvironment: MaxT=23.6; MinT=23.6; Rain=0; Radn=15; PanEvap=5; VP=2; Wind=3; CO2=350; AirPressure=1010; Latitude=-27; Longitude=0; DayLength=16; SunRise=0; SunSet=0
          Zone Field: Area=1; Slope=0; AspectAngle=0; Altitude=50
            Fertiliser
            Soil: same as Validation.Sensibility.PalmerstonNorthCE.PNGrowthRooms.Field.Soil
            SurfaceOrganicMatter: InitialResidueName=wheat_stubble; InitialResidueType=wheat; InitialResidueMass=500; InitialStandingFraction=0; InitialCPR=0; InitialCNR=100
            Plant Wheat
            MicroClimate: a_interception=0; b_interception=1; c_interception=0; d_interception=0; soil_albedo=0.3; SoilHeatFluxFraction=0.4; MinimumHeightDiffForNewLayer=0; NightInterceptionFraction=0.5; ReferenceHeight=2
            Manager Experimental
              TreatPp = 0
              Vern =
              EmergeDate =
              CultivarName =
              TransitionWeek = 0
              SowingDepth = 20
```csharp
using Models.Climate;
using System;
using Models.Core;
using Models.PMF;
using Models.Soils;
using Models.Utilities;
using APSIM.Shared.Utilities;

namespace Models
{
    [Serializable]
    public class Script : Model
    {
        [Link] Clock clock;
        [Link] Plant wheat;
        [Link] ControlledEnvironment ci;

        [Display(Type = DisplayType.CultivarName)]
        [Description("Cultivar to be sown")]
        public string CultivarName { get; set; }
        [Description("Sowing depth (mm)")]
        public double SowingDepth { get; set; }
        [Description("Vernalisation")]
        public string Vern { get; set; }
        [Description("Treatment photoperiod (h)")]
        public double TreatPp { get; set; }
        [Description("Treatment duration (Weeks)")]
        public double TransitionWeek { get; set; }
        private double DAS {get; set;}
        private bool FirstDay = true;
        [Description("Emergence Date (d-MMM)")]
        public string EmergeDate {get; set;}

        [EventSubscribe("PreparingNewWeatherData")]
        private void OnPreparingNewWeatherData(object sender, EventArgs e)
        {
            if (FirstDay)
            {
                wheat.Sow(population: 100, cultivar: CultivarName, depth: SowingDepth, rowSpacing: 150);    
                wheat.SetEmergenceDate(EmergeDate);
                FirstDay = false;
            }
            DAS += 1;
            if ((DAS <= 350)&&(Vern=="Full"))
            {
                ci.MaxT = 1.0;
                ci.MinT = 1.0;
                ci.DayLength = 0;
            }
            else
            {
                ci.MaxT=23.6;
                ci.MinT=23.6;
                ci.DayLength = TreatPp;
                ci.Radn = ((TreatPp - 2) * 3600 * 0.000153 * 2) + (2 * 3600 * 0.000153); //Full light(Hours * s/h * MJ/m2/s * Coeff_PAR->Total) + 2 hour at half light (Hours * s/h * MJ/m2/s) 
            }
        }
    }
}
```
            Manager HarvestAtFlowering: same as Validation.Sensibility.PalmerstonNorthCE.PNGrowthRooms.Field.HarvestAtFlowering
            Report DailyReport
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