Simulations: Version=222
  Playlist WithCanopyData
    Text:
      APS*, GattonRowSpacing, Mer86, Mer73, Cunderdin97, Wongan83, Konya*, Lincoln*, Leeston*, Wakanui*
      Wagga1991, Wagga2013, Wagga2014, Ginninderraa1991, Mouse, ArazonaFACE*, Jamma
  Memo TitlePage
    # The APSIM Wheat Model

    _Brown, H.E., Huth, N.I. and Holzworth, D.P._
  Memo Introduction
    The APSIM wheat model has been developed using the Plant Modelling Framework (PMF) of [#brown_plant_2014]. This new framework provides a library of plant organ and process submodels that can be coupled, at runtime, to construct a model in much the same way that models can be coupled to construct a simulation. This means that dynamic composition of lower level process and organ classes (e.g. photosynthesis, leaf) into larger constructions (e.g. maize, wheat, sorghum) can be achieved by the model developer without additional coding.

    The wheat model consists of:

    * a phenology model to simulate development through sequential developmental phases
    * a structure model to simulate plant morphology
    * a collection of organs to simulate the various plant parts
    * an arbitrator to allocate resources (N, biomass) to the various plant organs

    This work builds upon earlier APSIM Wheat models such as NWheat ([#Asseng200225], [#KeatingNWheat]), NWheatS ([#Asseng1998163]), Cropmod-Wheat ([#Wang2002GenericCropModel]), and the earlier versions developed in Plant ([APSIM Wheat 7.5](https://www.apsim.info/documentation/model-documentation/crop-module-documentation/wheat/)) and then within the Plant Modelling Framework ([#brown_plant_2014]).
  DataStore
    ExcelInput ExcelMultiInput: SheetNames=[Observed, MaxLeafSize]
      FileNames=[data/Observed.xlsx, data/Gatton2014_2016.xlsx, data/2020Results.xlsx, data/PalmerstonNorth1989.xlsx, data/Maricopa.xlsx, data/Lincoln1992.xlsx]
    PredictedObserved DailyObsPred: PredictedTableName=DailyReport; ObservedTableName=Observed; FieldNameUsedForMatch=SimulationName; FieldName2UsedForMatch=Clock.Today; AllColumns=false
      Tests: POName=DailyObsPred
        AcceptedStats:
          Name                   n     Slope         Intercept   SEslope      SEintercept  R2           RMSE       NSE         ME          MAE         RSR       RMR
          ET                     123   1.13169       -0.428525   0.0437149    0.169573     0.847065     0.75711    0.750672    0.0416707   0.558234    0.497294  0
          ProfileWater           1327  0.876588      76.0389     0.0130203    5.47947      0.7738       58.7876    0.702733    25.8355     33.06       0.545016  0
          Soil.SoilWater.SW(1)   1300  0.000187106   0.209326    0.000113886  0.00216848   0.00207521   18.9789    -0.0810339  -5.20763    5.28548     1.03933   0
          Soil.SoilWater.SW(10)  8     -0.411168     0.612361    0.204164     0.087484     0.403332     0.0113816  -3.15811    0.00772724  0.00919543  1.90744   0
          Soil.SoilWater.SW(2)   1323  -9.03035e-05  0.237103    7.90585e-05  0.00185795   0.000986689  23.4358    -0.0848838  -6.54813    6.60052     1.04118   0
          Soil.SoilWater.SW(3)   1323  7.41365e-05   0.225765    6.63683e-05  0.00193967   0.000943693  29.1595    -0.0857037  -8.19945    8.22086     1.04158   0
          Soil.SoilWater.SW(4)   1323  0.00032245    0.209832    5.67479e-05  0.00181599   0.0238581    31.9313    -0.0847602  -8.95944    8.97693     1.04112   0
          Soil.SoilWater.SW(5)   1323  0.000184327   0.244192    5.45151e-05  0.00180824   0.00858025   33.0939    -0.0856543  -9.31536    9.33089     1.04155   0
          Soil.SoilWater.SW(6)   1218  0.983201      0.00665286  0.00580358   0.00166975   0.959354     0.0168556  0.958159    0.00202203  0.00893392  0.204467  0
          Soil.SoilWater.SW(7)   1194  0.995766      0.00138347  0.00547865   0.00136097   0.965173     0.0121361  0.964171    0.00036727  0.00674653  0.189207  0
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        AcceptedStatsName=Name n Slope Intercept SEslope SEintercept R2 RMSE NSE ME MAE RSR
    PredictedObserved HarvestObsPred: PredictedTableName=HarvestReport; ObservedTableName=Observed; FieldNameUsedForMatch=SimulationName; FieldName2UsedForMatch=Wheat.Phenology.CurrentStageName; AllColumns=false
      Tests: POName=HarvestObsPred
        AcceptedStats:
          Name                                  n    Slope      Intercept   SEslope     SEintercept  R2          RMSE        NSE         ME           MAE         RSR       RMR
          Wheat.AboveGround.N                   67   1.12809    -1.00273    0.0391678   0.525848     0.927336    2.09151     0.875576    0.540148     1.59606     0.350095  0
          Wheat.AboveGround.Wt                  211  1.01911    34.1751     0.0202867   28.6588      0.923515    188.663     0.904426    58.5184      140.453     0.308417  0
          Wheat.Grain.N                         135  1.07639    -0.257745   0.0362834   0.353004     0.868717    1.79883     0.808865    0.415699     1.36719     0.435568  0
          Wheat.Grain.Nconc                     136  0.52548    0.0109277   0.0578165   0.00130116   0.381364    0.00332647  0.31597     0.000420536  0.00251003  0.824015  0
          Wheat.Grain.Number                    195  0.819153   2260.06     0.0213448   308.959      0.88414     2247.71     0.879203    -81.8409     1634.74     0.346666  0
          Wheat.Grain.Protein                   114  0.424157   7.85561     0.0562272   0.726492     0.336911    2.10436     0.263918    0.550644     1.57133     0.854181  0
          Wheat.Grain.Wt                        233  0.978713   11.017      0.0292591   15.5104      0.828875    103.644     0.801774    0.879252     78.6576     0.444269  0
          Wheat.Leaf.CohortMaxSize(1)           10   0.0270759  255.563     0.0327969   7.48653      0.078506    51.271      -0.92608    36.4016      40.5202     1.31661   0
          Wheat.Leaf.CohortMaxSize(10)          10   1.11919    -412.466    0.256733    521.362      0.703745    224.554     -0.300948   -171.57      207.903     1.08206   0
          Wheat.Leaf.CohortMaxSize(11)          10   0.825212   365.905     0.266736    598.083      0.54471     196.601     0.391552    -23.5263     115.224     0.740002  0
          Wheat.Leaf.CohortMaxSize(12)          10   0.848404   253.801     0.223896    493.954      0.642195    151.745     0.416747    -79.2873     105.917     0.724519  0
          Wheat.Leaf.CohortMaxSize(13)          10   1.09708    -403.529    1.01788     2346.69      0.126797    703.826     -7.88491    -180.887     351.071     2.82779   0
          Wheat.Leaf.CohortMaxSize(14)          10   1.30676    -642.351    0.429337    1019.71      0.536608    603.245     -0.59098    71.3164      415.854     1.19661   0
          Wheat.Leaf.CohortMaxSize(15)          9    -0.26027   2713.41     0.159916    364.78       0.274529    585.946     -0.830732   -109.076     515.056     1.27566   0
          Wheat.Leaf.CohortMaxSize(16)          3    -0.645839  2788.84     7.95817     13511.1      0.00654291  1245.82     -65.0428    6.01155      1116.21     6.6354    0
          Wheat.Leaf.CohortMaxSize(17)          2    3.1965     -3522.2732  0           0            1           590.025     -4.43529    -197.771     555.892     1.64853   0
          Wheat.Leaf.CohortMaxSize(18)          1    -          -           -           -            -           985.267     -           985.267      985.267     -         0
          Wheat.Leaf.CohortMaxSize(2)           10   0.0630555  275.197     0.29264     121.589      0.00577     139.081     -3.00585    -108.611     115.388     1.89875   0
          Wheat.Leaf.CohortMaxSize(3)           10   0.289291   221.125     0.270354    144.318      0.125205    181.922     -2.6244     -152.132     163.333     1.80609   0
          Wheat.Leaf.CohortMaxSize(4)           10   0.345581   263.167     0.345159    223.342      0.111353    208.379     -1.99176    -152.884     173.867     1.64091   0
          Wheat.Leaf.CohortMaxSize(5)           10   0.249259   458.154     0.277019    225.53       0.0919017   229.975     -0.868592   -139.856     146.902     1.29682   0
          Wheat.Leaf.CohortMaxSize(6)           10   0.345905   476.527     0.195687    187.624      0.280871    242.414     -0.0368856  -130.978     145.477     0.966021  0
          Wheat.Leaf.CohortMaxSize(7)           10   0.441949   501.987     0.142766    157.184      0.545013    176.986     0.296106    -101.041     122.714     0.79593   0
          Wheat.Leaf.CohortMaxSize(8)           10   0.589766   515.86      0.179194    229.582      0.575192    169.291     0.574802    1.17705      117.592     0.61861   0
          Wheat.Leaf.CohortMaxSize(9)           10   0.793068   300.515     0.327977    507.562      0.422258    241.916     0.0929616   -15.3812     161.582     0.903512  0
          Wheat.Phenology.FlagLeafDAS.Value()   255  0.974146   6.29479     0.00979673  1.35981      0.97505     8.03204     0.971245    2.92157      5.87059     0.16924   0
          Wheat.Phenology.FloweringDAS.Value()  299  0.943644   8.35638     0.00705763  1.10217      0.983658    6.98781     0.982029    0.0602007    4.93645     0.133831  0
        AcceptedStatsName=Name n Slope Intercept SEslope SEintercept R2 RMSE NSE ME MAE RSR
    PredictedObserved NDVIObsPred: PredictedTableName=NDVIDailyReport; ObservedTableName=Observed; FieldNameUsedForMatch=SimulationName; FieldName2UsedForMatch=Clock.Today; AllColumns=false
      Tests: same as DataStore.HarvestObsPred.Tests
    PredictedObserved LeafSizeObsPred: PredictedTableName=MaxLeafSizeReport; ObservedTableName=MaxLeafSize; FieldNameUsedForMatch=SimulationName; FieldName2UsedForMatch=OutputMaxLeafSize.Script.LeafPosition; AllColumns=false
  Folder Validation
    Memo
      A test dataset has been developed to test the APSIM Wheat model for a range of environmental (soil and climate) conditions, management options (sowing dates, populations, nitrogen rates, row spacing, irrigation), genetic backgrounds (different regions, cultivar types) and for special considerations such as crop damage.  These tests have been grouped into various geographical regions to allow the user to evaluate the suitability of the model for their particular region of interest.  Graphs of model performance are provided for yield, biomass production, canopy development, phenological development, water and nitrogen uptake, and grain yield components.
    Folder Combined Results
      Memo Combined Results
        Simulation results for the combined datasets from the various countries are shown in the following graphs.  The model is able to adequately capture the influence of growing conditions (soil, climate) and management (population, Nitrogen, irrigation, sowing date).
    Folder SE Queensland
      Memo
        South-eastern Queensland has a warm subtropical environment.  Daytime temperatures are moderate due to the relatively low latitudes for wheat growing in Australia, but inland continental conditions can provide cool nights with occaisional frosts.  Many of the datasets used here have been published as part of previous APSIM Wheat model tests.  Further datasets have been added to provide information on phenological development of modern cultivars.
      Experiment APS26
        Memo
          This trial was conducted at Gatton in 1995 using the local variety, Hartog.  It consisted of 4 Nitrogen rates (0,40,80,160) with two irrigation rates (minimal amount for establishment, fully irrigated).  Yields ranged from 1.4 t/ha to 5.4 t/ha.
        Factors
          Permutation
            Factor NRate: Specification=[ApplyFertiliser].Script.Amount=0,40,80,160
            Factor Water: Specification=[IrrigationSchedule]
              Operations Wet
                1995-05-31  [Irrigation].Apply(amount:31);
                1995-06-01  [Irrigation].Apply(amount:13);
                1995-06-02  [Irrigation].Apply(amount:26);
                1995-06-05  [Irrigation].Apply(amount:26);
                1995-06-06  [Irrigation].Apply(amount:26);
                1995-06-07  [Irrigation].Apply(amount:26);
                1995-06-08  [Irrigation].Apply(amount:26);
                1995-06-15  [Wheat].Sow(population:120, cultivar:"Hartog", depth:40, rowSpacing:250);
                1995-07-05  [Irrigation].Apply(amount:26);
                1995-07-21  [Irrigation].Apply(amount:14);
                1995-08-01  [Irrigation].Apply(amount:28);
                1995-08-11  [Irrigation].Apply(amount:30);
                1995-08-25  [Irrigation].Apply(amount:15);
                1995-08-31  [Irrigation].Apply(amount:14);
                1995-09-04  [Irrigation].Apply(amount:15);
                1995-09-15  [Irrigation].Apply(amount:25);
                1995-09-22  [Irrigation].Apply(amount:20);
                1995-10-02  [Irrigation].Apply(amount:11);
              Operations Dry
                1995-06-15  [Wheat].Sow(population:120, cultivar:"Hartog", depth:40, rowSpacing:250);
        Simulation APS26NRate160WaterWet
          Clock: Start=1995-06-13; End=1995-10-31
          Summary summaryfile
          Weather: FileName=met/APS26Silo.met
          SoilArbitrator Soil Arbitrator
          Zone paddock: Area=1; Slope=0; AspectAngle=0; Altitude=50
            Plant Wheat
            Soil APS26Field: SoilType=APS26Soil; LocalName=APS26Site; Site=APS26Site; NearestTown=Unknown; Region=Lawes; NaturalVegetation=Unknown; Latitude=0; Longitude=0
              Physical
                Thickness  BD    AirDry  LL15  DUL   SAT
                150        1.38  0.1     0.2   0.38  0.44
                150        1.38  0.1     0.2   0.38  0.44
                300        1.38  0.1     0.2   0.38  0.44
                300        1.38  0.1     0.2   0.38  0.44
                300        1.46  0.1     0.21  0.38  0.43
                300        1.51  0.1     0.19  0.4   0.42
                300        1.49  0.1     0.14  0.38  0.43
                300        1.47  0.1     0.14  0.38  0.43
                300        1.47  0.1     0.19  0.33  0.43
                SoilCrop WheatSoil: LL=[0.24, 0.24, 0.22, 0.24, 0.23, 0.23, 0.18, 0.18, 0.18]; KL=[0.06, 0.045, 0.045, 0.04, 0.04, 0.06, 0.06, 0.06, 0.06]; XF=[1, 1, 1, 1, 1, 1, 1, 1, 1]
              WaterBalance SoilWater: SummerDate=1-Nov; SummerU=6; SummerCona=3.5; WinterDate=1-Apr; WinterU=6; WinterCona=3.5; DiffusConst=10; DiffusSlope=16; Salb=0.13; CN2Bare=78; CNRed=20; CNCov=0.8; DischargeWidth=0; CatchmentArea=0; PSIDul=-100
                Thickness  SWCON  KLAT
                150        0.3    0
                150        0.3    0
                150        0.3    0
                150        0.3    0
                300        0.3    0
                300        0.3    0
                300        0.3    0
                300        0.3    0
                300        0.3    0
                300        0.3    0
              Organic: FOMCNRatio=40; CarbonUnits=Total
                Thickness  Carbon  SoilCNRatio  FBiom  FInert  FOM
                150        2.2     14.5         0.024  0.45    118.866
                150        1.6     14.5         0.024  0.6     98.5437
                150        1.35    14.5         0.01   0.7     81.6956
                150        0.95    14.5         0.01   0.85    67.728
                300        1       14.5         0.01   0.9     46.5487
                300        0.8     14.5         0.01   0.95    31.9925
                300        0.45    14.5         0.01   0.95    21.9881
                300        0.45    14.5         0.01   0.95    15.1122
                300        0.45    14.5         0.01   0.95    10.3864
                300        0.45    14.5         0.01   0.95    7.13848
              Chemical: Thickness=[150, 150, 150, 150, 300, 300, 300, 300, 300, 300]; PH=[7.5, 8, 8, 8, 8, 8, 8, 8, 8, 8]; PHUnits=Water
              Water: Thickness=[150, 150, 150, 150, 300, 300, 300, 300, 300, 300]; FilledFromTop=false
                InitialValues=[0.3274, 0.3429, 0.334, 0.334, 0.3303, 0.3106, 0.306, 0.2694, 0.269, 0.269]
              Nutrient
              Solute NO3: Thickness=[150, 150, 150, 150, 300, 300, 300, 300, 300, 300]; InitialValues=[1.5, 1.8, 1.5, 1.5, 0.4, 0.2, 0.4, 0.3, 0.3, 0.3]; InitialValuesUnits=ppm; WaterTableConcentration=0; D0=0; DepthConstant=0; MaxDepthSoluteAccessible=0; RunoffEffectivenessAtMovingSolute=0; MaxEffectiveRunoff=0
              Solute NH4: Thickness=[150, 150, 150, 150, 300, 300, 300, 300, 300, 300]; InitialValues=[0.5, 0.8, 0.5, 0.5, 0.42, 0.42, 0.37, 0.25, 0.3, 0.3]; InitialValuesUnits=ppm; WaterTableConcentration=0; D0=0; DepthConstant=0; MaxDepthSoluteAccessible=0; RunoffEffectivenessAtMovingSolute=0; MaxEffectiveRunoff=0
              Solute Urea: Thickness=[150, 150, 150, 150, 300, 300, 300, 300, 300, 300]; InitialValues=[0, 0, 0, 0, 0, 0, 0, 0, 0, 0]; InitialValuesUnits=kg/ha; WaterTableConcentration=0; D0=0; DepthConstant=0; MaxDepthSoluteAccessible=0; RunoffEffectivenessAtMovingSolute=0; MaxEffectiveRunoff=0
              SoilTemperature Temperature: InteractionsPerDay=8
            Manager ApplyFertiliser
              FertDayOfYear = 186
              Amount = 160
```csharp
using Models.Soils;
using System;
using Models.Core;
using Models.PMF;
using APSIM.Shared.Utilities;

namespace Models
{
    [Serializable]
    public class Script : Model
    {
        [Link] Clock Clock;
        [Link] Fertiliser Fertiliser;
        [Link] Summary Summary;
        
        [Description("Day of year fertiliser is to be applied")]
        public int FertDayOfYear { get; set; }

        [Description("Amount of fertiliser to be applied")]
        public double Amount { get; set; }

        [EventSubscribe("DoManagement")]
        private void OnDoManagement(object sender, EventArgs e)
        {
            if (Clock.Today.DayOfYear == FertDayOfYear)
            {
                Fertiliser.Apply(amount: Amount, type: "NO3N");
            }
        
        }
        
    }
}
```
            Fertiliser
            Operations IrrigationSchedule: same as Validation.SE Queensland.APS26.Factors.Permutation.Water.Wet
            Irrigation
            SurfaceOrganicMatter: InitialResidueName=wheat_stubble; InitialResidueType=Wheat; InitialResidueMass=0; InitialStandingFraction=0; InitialCPR=0; InitialCNR=80
            MicroClimate: a_interception=0; b_interception=1; c_interception=0; d_interception=0; SoilHeatFluxFraction=0.4; MinimumHeightDiffForNewLayer=0; NightInterceptionFraction=0.5; ReferenceHeight=2
            Manager Harvesting
            Report DailyReport
            Report HarvestReport
          Manager LocationInfo
            Country = Australia
            State = Queensland
            Region = QLD Coast
```csharp
using Models.Soils;
using System;
using Models.Core;
using Models.PMF;
using APSIM.Shared.Utilities;

namespace Models
{
    [Serializable]
    public class Script : Model
    {
        [Link] Clock Clock;
        [Link] Fertiliser Fertiliser;
        [Link] Summary Summary;
        
        [Description("Country")]
        public string Country { get; set; }

        [Description("State")]
        public string State { get; set; }

        [Description("Region")]
        public string Region { get; set; }

    }
}
```
      Experiment APS6
        Memo
          NOTE: High N treatment logdged.  Final grain sizes were less than expected.
        Factors
          Factor NRate: Specification=[ApplyFertiliser]
            Operations 0
            Operations 40
              1992-06-16  [Fertiliser].Apply(amount: 40, type: "NO3N");
            Operations 80
              1992-06-16  [Fertiliser].Apply(amount: 80, type: "NO3N");
            Operations 120
              1992-06-16  [Fertiliser].Apply(amount: 60, type: "NO3N");
              1992-08-05  [Fertiliser].Apply(amount: 60, type: "NO3N");
            Operations 160
              1992-06-16  [Fertiliser].Apply(amount: 40, type: "NO3N");
              1992-08-05  [Fertiliser].Apply(amount: 120, type: "NO3N");
            Operations 360
              1992-06-16  [Fertiliser].Apply(amount: 120, type: "NO3N");
              1992-08-05  [Fertiliser].Apply(amount: 120, type: "NO3N");
              1992-09-08  [Fertiliser].Apply(amount: 120, type: "NO3N");
        Simulation APS6Base
          Clock: Start=1992-06-14; End=1992-11-17
          Summary summaryfile
          Weather: FileName=met/APS6.met
          Zone paddock: Area=1; Slope=0; AspectAngle=0; Altitude=50
            Irrigation
            Fertiliser
            Soil APS6Field: SoilType=APS6Soil; LocalName=APS6Site; Site=APS6Site; NearestTown=Unknown; Region=Lawes; NaturalVegetation=Unknown; Latitude=0; Longitude=0
              Physical
                Thickness  BD    AirDry  LL15  DUL   SAT
                150        1.38  0.1     0.2   0.38  0.43
                150        1.34  0.1     0.2   0.38  0.43
                300        1.35  0.1     0.22  0.4   0.43
                300        1.5   0.1     0.18  0.4   0.43
                300        1.49  0.1     0.14  0.39  0.42
                300        1.46  0.1     0.2   0.38  0.4
                300        1.46  0.1     0.2   0.38  0.4
                SoilCrop WheatSoil: LL=[0.2, 0.2, 0.22, 0.18, 0.14, 0.25, 0.28]; KL=[0.06, 0.05, 0.05, 0.04, 0.04, 0.06, 0.06]; XF=[1, 1, 1, 1, 1, 1, 1]
              WaterBalance SoilWater: SummerDate=1-Nov; SummerU=6; SummerCona=3.5; WinterDate=1-Apr; WinterU=6; WinterCona=3.5; DiffusConst=88; DiffusSlope=35.4; Salb=0.13; CN2Bare=60; CNRed=20; CNCov=0.8; DischargeWidth=0; CatchmentArea=0; PSIDul=-100
                Thickness  SWCON  KLAT
                150        0.3    0
                150        0.3    0
                300        0.3    0
                300        0.3    0
                300        0.3    0
                300        0.3    0
                300        0.3    0
              Organic: FOMCNRatio=60; CarbonUnits=Total
                Thickness  Carbon  SoilCNRatio  FBiom  FInert  FOM
                150        2.2     14.5         0.03   0.45    694.258
                150        1.6     14.5         0.02   0.6     540.689
                300        1.15    14.5         0.01   0.78    327.944
                300        1       14.5         0.01   0.9     198.908
                300        0.8     14.5         0.01   0.99    120.644
                300        0.45    14.5         0.01   0.99    73.1743
                300        0.45    14.5         0.01   0.99    44.3824
              Chemical: Thickness=[150, 150, 300, 300, 300, 300, 300]; PH=[7.5, 8, 8, 8, 8, 8, 8]; PHUnits=Water
              Water: Thickness=[150, 150, 300, 300, 300, 300, 300]; InitialValues=[0.326, 0.326, 0.346, 0.333, 0.315, 0.326, 0.326]; FilledFromTop=false
              Nutrient
              Solute NO3: Thickness=[150, 150, 300, 300, 300, 300, 300]; InitialValues=[1.3, 0.6, 0.25, 0.2, 0.1, 0.1, 0.1]; InitialValuesUnits=ppm; WaterTableConcentration=0; D0=0; DepthConstant=0; MaxDepthSoluteAccessible=0; RunoffEffectivenessAtMovingSolute=0; MaxEffectiveRunoff=0
              Solute NH4: Thickness=[150, 150, 300, 300, 300, 300, 300]; InitialValues=[1.3, 1, 1, 0.8, 0.8, 0.5, 0.5]; InitialValuesUnits=ppm; WaterTableConcentration=0; D0=0; DepthConstant=0; MaxDepthSoluteAccessible=0; RunoffEffectivenessAtMovingSolute=0; MaxEffectiveRunoff=0
              Solute Urea: Thickness=[150, 150, 300, 300, 300, 300, 300]; InitialValues=[0, 0, 0, 0, 0, 0, 0]; InitialValuesUnits=kg/ha; WaterTableConcentration=0; D0=0; DepthConstant=0; MaxDepthSoluteAccessible=0; RunoffEffectivenessAtMovingSolute=0; MaxEffectiveRunoff=0
              SoilTemperature Temperature: InteractionsPerDay=8
            SurfaceOrganicMatter: InitialResidueName=wheat_stubble; InitialResidueType=wheat; InitialResidueMass=500; InitialStandingFraction=0; InitialCPR=0; InitialCNR=100
            Plant Wheat
            Operations ApplyFertiliser
              1992-06-16  [Fertiliser].Apply(amount: 0, type: "NO3N");
            Operations IrrigationSchedule
              1992-06-17  [Wheat].Sow(population:121.61, cultivar:"Hartog", depth:30, rowSpacing:250);
              1992-06-24  [Irrigation].Apply(amount:10);
              1992-06-26  [Irrigation].Apply(amount:10);
              1992-07-28  [Irrigation].Apply(amount:30);
              1992-08-05  [Irrigation].Apply(amount:30);
              1992-08-19  [Irrigation].Apply(amount:40);
              1992-08-26  [Irrigation].Apply(amount:40);
              1992-09-09  [Irrigation].Apply(amount:40);
              1992-09-21  [Irrigation].Apply(amount:40);
              1992-10-01  [Irrigation].Apply(amount:50);
              1992-10-07  [Irrigation].Apply(amount:20);
              1992-10-08  [Irrigation].Apply(amount:20);
              1992-10-09  [Irrigation].Apply(amount:20);
              1992-10-13  [Irrigation].Apply(amount:20);
            MicroClimate: a_interception=0; b_interception=1; c_interception=0; d_interception=0; SoilHeatFluxFraction=0.4; MinimumHeightDiffForNewLayer=0; NightInterceptionFraction=0.5; ReferenceHeight=2
            Report DailyReport
            Report HarvestReport
            Manager HarvestAfterDate
              HarvestDate = 1-nov
```csharp
using Models.Soils;
using System;
using Models.Core;
using System.Text;
using Models.PMF;
using Models;
using APSIM.Shared.Utilities;
using Models.PMF.Phen;

namespace Models
{
    [Serializable] 
    public class Script : Model
    {
        [Link] ISummary summary;
        [Link] private Plant wheat;
        [Link(Type = LinkType.Path, Path = "[Wheat].Phenology")]
        private Phenology phenology;
                [Link] Clock Clock;

        private bool Harvestable = false;

        [Description("Harvest Date (d-mmm)")]
        public string HarvestDate { get; set; }   
      
        [EventSubscribe("DoManagement")]
        private void OnDoManagement(object sender, EventArgs e)
        {
           
            if (Harvestable && (phenology.Stage >= 10))
            {
                wheat.Harvest();
                wheat.EndCrop();                
            }
            
            if (DateUtilities.DatesAreEqual(HarvestDate, Clock.Today))
                Harvestable = true;

        }
    }
}
```
            Report MaxLeafSizeReport
            Manager OutputMaxLeafSize
```csharp
using APSIM.Core;
using Models.Core.Run;
using Newtonsoft.Json;
using APSIM.Shared.Utilities;
using Models.Soils.Arbitrator;
using Models.PMF.Organs;
using Models.PMF;
using Models.Interfaces;
using Models.Core;
using System.Xml.Serialization;
using System.Collections.Generic;
using System;
using Models.PMF.Struct;
using Models.Soils;

namespace Models
{
    [Serializable] 
    public class Script : Model, IStructureDependency
    {
        public  event EventHandler ReportLeafSize;
        [Link] private Zone zone;
        [Link] private Clock clock;
        public IStructure Structure { private get; set; }
        
        
        [JsonIgnore] public int NextLeafPosition { get; set; }
        [JsonIgnore] public int LeafPosition { get; set; }
        [JsonIgnore] public double MaxLeafSize { get; set; }
        

        [EventSubscribe("[Wheat].Sowing")]
        private void OnSow(object sender, EventArgs e)
        {
        LeafPosition = 0;
        NextLeafPosition = 1;
        }
        
        [EventSubscribe("DoManagement")]
        private void OnDoManagement(object sender, EventArgs e)
        {
            double haunStage = (double)Structure.Get("Wheat.Phenology.HaunStage.Value()", relativeTo: zone);
            double maxLeafSize = (double)Structure.Get("Wheat.Leaf.MaximumSize.Value()", relativeTo: zone) * 1000000;
            
            if (haunStage > NextLeafPosition) 
            {
                
                LeafPosition = (int)haunStage;
                NextLeafPosition = LeafPosition+1;
                MaxLeafSize = maxLeafSize;
                if (ReportLeafSize != null)
                    ReportLeafSize.Invoke(this, new EventArgs());
            }
        }
    }
}
```
          SoilArbitrator Soil Arbitrator
          Manager LocationInfo: same as Validation.SE Queensland.APS26.APS26NRate160WaterWet.LocationInfo
      Experiment APS14
        Factors
          Permutation
            Factor Stubble: Specification=[OMSchedule]
              Operations Bare
                1993-06-03  [SurfaceOrganicMatter].Incorporate(fraction: 1.0, depth:100);
              Operations Lucerne
                1993-06-03  [SurfaceOrganicMatter].Add(mass: 3560, N: 108.8, P:0.0, type: "lucerne", name: "");
                1993-06-03  [SurfaceOrganicMatter].Incorporate(fraction: 1.0, depth:100);
              Operations Straw
                1993-06-03  [SurfaceOrganicMatter].Add(mass: 3584, N: 28.8, P:0.0, type: "barley", name: "");
                1993-06-03  [SurfaceOrganicMatter].Incorporate(fraction: 1.0, depth:100);
            Factor NRate: Specification=[FertiliserSchedule]
              Operations 000
                1993-06-18  [Fertiliser].Apply(amount: 0, type: "NO3N");
              Operations 040
                1993-06-18  [Fertiliser].Apply(amount: 40, type: "NO3N");
              Operations 080
                1993-06-18  [Fertiliser].Apply(amount: 80, type: "NO3N");
              Operations 200
                1993-06-18  [Fertiliser].Apply(amount: 120, type: "NO3N");
                1993-08-18  [Fertiliser].Apply(amount: 80, type: "NO3N");
        Simulation APS14StubbleBareNRate0
          Clock: Start=1993-06-02; End=1993-11-26
          Summary summaryfile
          Weather: FileName=met/APS14.met
          Zone paddock: Area=1; Slope=0; AspectAngle=0; Altitude=50
            Irrigation
            Fertiliser
            Soil APS14Field: SoilType=Clay Loam; LocalName=Gatton; Site=Gatton; NearestTown=Gatton; Region=Lockyer Valley; State=Qld; Country=Australia; NaturalVegetation=Unknown; Latitude=0; Longitude=0
              Physical
                Thickness  BD    AirDry  LL15  DUL   SAT
                150        1.38  0.1     0.2   0.38  0.43
                150        1.34  0.2     0.2   0.38  0.43
                150        1.31  0.24    0.24  0.4   0.45
                150        1.4   0.19    0.19  0.41  0.45
                300        1.5   0.18    0.18  0.4   0.43
                300        1.49  0.14    0.14  0.39  0.43
                300        1.46  0.2     0.2   0.38  0.4
                300        1.46  0.2     0.2   0.38  0.4
                SoilCrop WheatSoil: LL=[0.2, 0.2, 0.24, 0.19, 0.18, 0.14, 0.25, 0.28]; KL=[0.06, 0.06, 0.06, 0.05, 0.04, 0.03, 0.02, 0.02]; XF=[1, 1, 1, 1, 1, 1, 1, 1]
              WaterBalance SoilWater: SummerDate=1-Nov; SummerU=6; SummerCona=3.5; WinterDate=1-Apr; WinterU=6; WinterCona=3.5; DiffusConst=40; DiffusSlope=16; Salb=0.13; CN2Bare=60; CNRed=20; CNCov=0.8; DischargeWidth=0; CatchmentArea=0; PSIDul=-100
                Thickness  SWCON  KLAT
                150        0.3    0
                150        0.3    0
                150        0.3    0
                150        0.3    0
                300        0.3    0
                300        0.3    0
                300        0.3    0
                300        0.3    0
              Organic: FOMCNRatio=40; CarbonUnits=Total
                Thickness  Carbon  SoilCNRatio  FBiom  FInert  FOM
                150        2.2     14.5         0.02   0.4     430.132
                150        1.6     14.5         0.02   0.6     334.987
                150        1.35    14.5         0.01   0.7     260.888
                150        0.95    14.5         0.01   0.8     203.18
                300        1       14.5         0.01   0.9     123.235
                300        0.8     14.5         0.01   0.9     74.7457
                300        0.45    14.5         0.01   0.9     45.3356
                300        0.45    14.5         0.01   0.9     27.4974
              Chemical: Thickness=[150, 150, 150, 150, 300, 300, 300, 300]; PH=[7.5, 8, 8, 8, 8, 8, 8, 8]; PHUnits=Water
              Water: Thickness=[150, 150, 150, 150, 300, 300, 300, 300]; InitialValues=[0.336, 0.336, 0.302, 0.302, 0.319, 0.345, 0.294, 0.264]; FilledFromTop=false
              Nutrient
              Solute NO3: Thickness=[150, 150, 150, 150, 300, 300, 300, 300]; InitialValues=[2, 0.5, 0.2, 0.2, 0.2, 0.2, 0.2, 0.2]; InitialValuesUnits=ppm; WaterTableConcentration=0; D0=0; DepthConstant=0; MaxDepthSoluteAccessible=0; RunoffEffectivenessAtMovingSolute=0; MaxEffectiveRunoff=0
              Solute NH4: Thickness=[150, 150, 150, 150, 300, 300, 300, 300]; InitialValues=[0.3, 0.3, 0.2, 0.1, 0.1, 0.1, 0.1, 0.1]; InitialValuesUnits=ppm; WaterTableConcentration=0; D0=0; DepthConstant=0; MaxDepthSoluteAccessible=0; RunoffEffectivenessAtMovingSolute=0; MaxEffectiveRunoff=0
              Solute Urea: Thickness=[150, 150, 150, 150, 300, 300, 300, 300]; InitialValues=[0, 0, 0, 0, 0, 0, 0, 0]; InitialValuesUnits=kg/ha; WaterTableConcentration=0; D0=0; DepthConstant=0; MaxDepthSoluteAccessible=0; RunoffEffectivenessAtMovingSolute=0; MaxEffectiveRunoff=0
              SoilTemperature Temperature: InteractionsPerDay=8
            SurfaceOrganicMatter: InitialResidueName=wheat_stubble; InitialResidueType=Wheat; InitialResidueMass=500; InitialStandingFraction=0; InitialCPR=0; InitialCNR=120
            Plant Wheat
            Operations IrrigationSchedule
              1993-06-04  [Irrigation].Apply(amount:14);
              1993-06-18  [Irrigation].Apply(amount:26);
              1993-06-23  [Irrigation].Apply(amount:13);
              1993-07-09  [Irrigation].Apply(amount:25);
              1993-07-22  [Irrigation].Apply(amount:20);
              1993-08-06  [Irrigation].Apply(amount:31);
              1993-08-18  [Irrigation].Apply(amount:36);
              1993-08-27  [Irrigation].Apply(amount:38);
              1993-09-06  [Irrigation].Apply(amount:33);
              1993-09-24  [Irrigation].Apply(amount:35);
              1993-10-01  [Irrigation].Apply(amount:36);
            MicroClimate: a_interception=0; b_interception=1; c_interception=0; d_interception=0; SoilHeatFluxFraction=0.4; MinimumHeightDiffForNewLayer=0; NightInterceptionFraction=0.5; ReferenceHeight=2
            Operations FertiliserSchedule
              1993-06-18  [Fertiliser].Apply(amount: 0, type: "NO3N");
            Operations OMSchedule
              1993-06-03  [SurfaceOrganicMatter].Add(mass: 0, N: 0, P:0.0, type: "wheat", name: "");
              1993-06-03  [SurfaceOrganicMatter].Incorporate(fraction: 1.0, depth:100);
            Operations SowingSchedule
              1993-06-29  [Wheat].Sow(population:114, cultivar:"Hartog", depth:30, rowSpacing:250);
            Report DailyReport
            Report HarvestReport
            Manager Harvesting
          SoilArbitrator Soil Arbitrator
          Manager LocationInfo: same as Validation.SE Queensland.APS26.APS26NRate160WaterWet.LocationInfo
      Experiment APS2
        Memo
          This simple experiment was conducted to investigate the impact of time of sowing on canopy development and growth of wheat.  Wheat (cv. Hartog) was sown at Gatton on 30th of May and 30th of July in 1991.  Data were collected on canopy development, biomass accumulation and yield.
        Factors
          Factor TOS: Specification=[Sowing]
            Operations 1
              1991-05-29  [Wheat].Sow(population: 60, cultivar: "Hartog", depth: 30, rowSpacing: 250);
              1991-05-29  [Wheat].Phenology.SetPhaseCompletionDate("1-Jun","Emerging");
              1991-05-29  [Fertiliser].Apply(amount: 40, type: "UreaN");
              1991-06-18  [Fertiliser].Apply(amount: 60, type: "UreaN");
              1991-08-20  [Fertiliser].Apply(amount: 60, type: "UreaN");
              1991-05-31  [Irrigation].Apply(amount:20, depth:0,efficiency:1, willRunoff:false);
              1991-06-03  [Irrigation].Apply(amount:20, depth:0,efficiency:1, willRunoff:false);
              1991-06-17  [Irrigation].Apply(amount:40, depth:0,efficiency:1, willRunoff:false);
              1991-07-07  [Irrigation].Apply(amount:40, depth:0,efficiency:1, willRunoff:false);
              1991-07-31  [Irrigation].Apply(amount:40, depth:0,efficiency:1, willRunoff:false);
              1991-08-20  [Irrigation].Apply(amount:40, depth:0,efficiency:1, willRunoff:false);
              1991-08-30  [Irrigation].Apply(amount:40, depth:0,efficiency:1, willRunoff:false);
              1991-09-09  [Irrigation].Apply(amount:40, depth:0,efficiency:1, willRunoff:false);
              1991-09-19  [Irrigation].Apply(amount:40, depth:0,efficiency:1, willRunoff:false);
              1991-09-29  [Irrigation].Apply(amount:50, depth:0,efficiency:1, willRunoff:false);
              1991-10-09  [Irrigation].Apply(amount:50, depth:0,efficiency:1, willRunoff:false);
              1991-10-19  [Irrigation].Apply(amount:50, depth:0,efficiency:1, willRunoff:false);
              1991-10-29  [Irrigation].Apply(amount:50, depth:0,efficiency:1, willRunoff:false);
              1991-11-08  [Irrigation].Apply(amount:50, depth:0,efficiency:1, willRunoff:false);
              1991-10-19  [Wheat].Harvest();
              1991-10-19  [Wheat].EndCrop();
            Operations 2
              1991-05-29  [Fertiliser].Apply(amount: 40, type: "UreaN");
              1991-07-30  [Wheat].Sow(population: 60, cultivar: "Hartog", depth: 30, rowSpacing: 250);
              1991-07-30  [Wheat].Phenology.SetPhaseCompletionDate("1-Aug","Emerging");
              1991-08-20  [Fertiliser].Apply(amount: 40, type: "UreaN");
              1991-09-02  [Fertiliser].Apply(amount: 20, type: "UreaN");
              1991-05-31  [Irrigation].Apply(amount:20, depth:0,efficiency:1, willRunoff:false);
              1991-06-03  [Irrigation].Apply(amount:20, depth:0,efficiency:1, willRunoff:false);
              1991-06-17  [Irrigation].Apply(amount:40, depth:0,efficiency:1, willRunoff:false);
              1991-07-07  [Irrigation].Apply(amount:40, depth:0,efficiency:1, willRunoff:false);
              1991-07-31  [Irrigation].Apply(amount:40, depth:0,efficiency:1, willRunoff:false);
              1991-08-20  [Irrigation].Apply(amount:40, depth:0,efficiency:1, willRunoff:false);
              1991-08-30  [Irrigation].Apply(amount:40, depth:0,efficiency:1, willRunoff:false);
              1991-09-09  [Irrigation].Apply(amount:40, depth:0,efficiency:1, willRunoff:false);
              1991-09-19  [Irrigation].Apply(amount:40, depth:0,efficiency:1, willRunoff:false);
              1991-09-29  [Irrigation].Apply(amount:50, depth:0,efficiency:1, willRunoff:false);
              1991-10-09  [Irrigation].Apply(amount:50, depth:0,efficiency:1, willRunoff:false);
              1991-10-19  [Irrigation].Apply(amount:50, depth:0,efficiency:1, willRunoff:false);
              1991-10-29  [Irrigation].Apply(amount:50, depth:0,efficiency:1, willRunoff:false);
              1991-11-08  [Irrigation].Apply(amount:50, depth:0,efficiency:1, willRunoff:false);
              1991-11-13  [Wheat].Harvest();
              1991-11-13  [Wheat].EndCrop();
        Simulation APS2Base
          Clock: Start=1991-05-29; End=1991-12-30
          Summary summaryfile
          Weather: FileName=met/aps02.met
          SoilArbitrator Soil Arbitrator
          Zone Field: Area=1; Slope=0; AspectAngle=0; Altitude=50
            Irrigation
            Fertiliser
            Soil APS6Field: SoilType=APS6Soil; LocalName=APS6Site; Site=APS6Site; NearestTown=Unknown; Region=Lawes; NaturalVegetation=Unknown; Latitude=0; Longitude=0
              Physical
                Thickness  BD    AirDry  LL15  DUL   SAT
                150        1.38  0.1     0.2   0.38  0.43
                150        1.34  0.1     0.2   0.38  0.43
                300        1.35  0.1     0.22  0.4   0.43
                300        1.5   0.1     0.18  0.4   0.43
                300        1.49  0.1     0.14  0.39  0.42
                300        1.46  0.1     0.2   0.38  0.4
                300        1.46  0.1     0.2   0.38  0.4
                SoilCrop WheatSoil: LL=[0.2, 0.2, 0.22, 0.18, 0.14, 0.2, 0.2]; KL=[0.06, 0.06, 0.06, 0.06, 0.06, 0.06, 0.06]; XF=[1, 1, 1, 1, 1, 1, 1]
              WaterBalance SoilWater: same as Validation.SE Queensland.APS6.APS6Base.paddock.APS6Field.SoilWater
              Organic: FOMCNRatio=20; CarbonUnits=Total
                Thickness  Carbon  SoilCNRatio  FBiom  FInert  FOM
                150        2.2     14.5         0.03   0.45    173.565
                150        1.6     14.5         0.02   0.6     135.172
                300        1.15    14.5         0.01   0.78    81.9861
                300        1       14.5         0.01   0.9     49.7271
                300        0.8     14.5         0.01   0.99    30.161
                300        0.45    14.5         0.01   0.99    18.2936
                300        0.45    14.5         0.01   0.99    11.0956
              Chemical: Thickness=[150, 150, 300, 300, 300, 300, 300]; PH=[7.5, 8, 8, 8, 8, 8, 8]; PHUnits=Water
              Water: Thickness=[150, 150, 300, 300, 300, 300, 300]; InitialValues=[0.2, 0.28, 0.29, 0.34, 0.32, 0.32, 0.32]; FilledFromTop=false
              Nutrient
              Solute NO3: Thickness=[150, 150, 300, 300, 300, 300, 300]; InitialValues=[14.3, 5.9, 1.35, 1, 0.2, 0.1, 0.1]; InitialValuesUnits=ppm; WaterTableConcentration=0; D0=0; DepthConstant=0; MaxDepthSoluteAccessible=0; RunoffEffectivenessAtMovingSolute=0; MaxEffectiveRunoff=0
              Solute NH4: Thickness=[150, 150, 300, 300, 300, 300, 300]; InitialValues=[1.5, 1.5, 1, 1, 0.5, 0.5, 0.5]; InitialValuesUnits=ppm; WaterTableConcentration=0; D0=0; DepthConstant=0; MaxDepthSoluteAccessible=0; RunoffEffectivenessAtMovingSolute=0; MaxEffectiveRunoff=0
              Solute Urea: same as Validation.SE Queensland.APS6.APS6Base.paddock.APS6Field.Urea
              SoilTemperature Temperature: InteractionsPerDay=8
            Operations Sowing
            SurfaceOrganicMatter: InitialResidueName=wheat_stubble; InitialResidueType=wheat; InitialResidueMass=500; InitialStandingFraction=0; InitialCPR=0; InitialCNR=100
            Plant Wheat
            MicroClimate: a_interception=0; b_interception=1; c_interception=0; d_interception=0; SoilHeatFluxFraction=0.4; MinimumHeightDiffForNewLayer=0; NightInterceptionFraction=0.5; ReferenceHeight=2
            Report DailyReport
            Report HarvestReport
            Manager OutputMaxLeafSize
            Report MaxLeafSizeReport
          Manager LocationInfo: same as Validation.SE Queensland.APS26.APS26NRate160WaterWet.LocationInfo
      Experiment GattonRowSpacing
        Memo
          This simple experiment was conducted to investigate the light interception and subsequent growth of wheat under different populations invoked using row spacing.  Wheat was sown at Gatton on 15th of June 2011 at 25cm row spacing.  Soon after emergence, alternate rows were removed from selected plots to produce half populations at 50cm row spacing.  A zero N treatment was used to identfy the inherent fertility of the site to assist in model parameterisation.  Data were collected on light interception,  canopy development, biomass accumulation and yield.
        Factors
          Factor RowSpace: Specification=[Sowing]
            Operations 25cm
              2011-06-15  [Wheat].Sow(population:160, cultivar:"Hartog", depth:30, rowSpacing:250);
              2011-08-15  [Fertiliser].Apply(amount: 100, type: "UreaN");
              2011-11-05  [Wheat].Harvest();
              2011-11-05  [Wheat].EndCrop();
            Operations 50cm
              2011-06-15  [Wheat].Sow(population:80, cultivar:"Hartog", depth:30, rowSpacing:500);
              2011-08-15  [Fertiliser].Apply(amount: 100, type: "UreaN");
              2011-11-05  [Wheat].Harvest();
              2011-11-05  [Wheat].EndCrop();
            Operations N0
              2011-06-15  [Wheat].Sow(population:160, cultivar:"Hartog", depth:30, rowSpacing:250);
              2011-11-05  [Wheat].Harvest();
              2011-11-05  [Wheat].EndCrop();
        Simulation RowSpace
          Clock: Start=2011-05-01; End=2011-11-12
          Summary summaryfile
          Weather: FileName=met/Gatton2011.met
          SoilArbitrator Soil Arbitrator
          Zone Field: Area=1; Slope=0; AspectAngle=0; Altitude=50
            Irrigation
            Fertiliser
            Operations Sowing: same as Validation.SE Queensland.GattonRowSpacing.Factors.RowSpace.N0
            Soil: SoilType=Black Vertosol; Site=Lawes; NearestTown=Lawes, Q 4343; Region=Lockyer; State=Queensland; Country=Australia; NaturalVegetation=Blue Gum, Moreton Bay Ash, Tea Tree; ApsoilNumber=37; Latitude=-27.537; Longitude=152.336; LocationAccuracy=+-20m; DataSource=CSIRO Sustainable Ecosystems, Toowoomba
              Comments=Soil naming structure: \State\Region\Classification-Local Name (Site/district and locator number); oc and ph estimated
              Physical
                Thickness  BD    AirDry  LL15  DUL   SAT
                150        1.32  0.13    0.26  0.41  0.47
                150        1.3   0.208   0.26  0.43  0.48
                300        1.23  0.26    0.26  0.46  0.51
                300        1.27  0.26    0.26  0.44  0.49
                300        1.37  0.25    0.25  0.4   0.45
                300        1.35  0.26    0.26  0.41  0.46
                300        1.35  0.26    0.26  0.38  0.46
                SoilCrop WheatSoil: LL=[0.26, 0.26, 0.26, 0.26, 0.25, 0.29, 0.36]; KL=[0.06, 0.06, 0.06, 0.04, 0.04, 0.02, 0.02]; XF=[1, 1, 1, 1, 1, 1, 1]
              WaterBalance SoilWater: SummerDate=1-Nov; SummerU=6; SummerCona=3.5; WinterDate=1-Apr; WinterU=4; WinterCona=2.5; DiffusConst=40; DiffusSlope=16; Salb=0.12; CN2Bare=73; CNRed=20; CNCov=0.8; PSIDul=-100; Thickness=[150, 150, 300, 300, 300, 300, 300]; SWCON=[0.3, 0.3, 0.3, 0.3, 0.3, 0.3, 0.3]
              Organic: FOMCNRatio=40; CarbonUnits=Total
                Thickness  Carbon  SoilCNRatio  FBiom  FInert  FOM
                150        0.9538  12           0.04   0.4     347.129
                150        0.9538  12           0.02   0.6     270.344
                300        0.9615  12           0.02   0.8     163.972
                300        0.8462  12           0.02   1       99.4541
                300        0.5462  12           0.01   1       60.322
                300        0.2615  12           0.01   1       36.5871
                300        0.2     12           0.01   1       22.1912
              Chemical: Thickness=[150, 150, 300, 300, 300, 300, 300]; PH=[8, 8, 8, 8, 8, 8, 8]; PHUnits=Water
              Water: Thickness=[150, 150, 300, 300, 300, 300, 300]; InitialValues=[0.41, 0.43, 0.46, 0.44, 0.4, 0.41, 0.38]; FilledFromTop=true
              Nutrient
              Solute NO3: Thickness=[150, 150, 300, 300, 300, 300, 300]; InitialValuesUnits=ppm; WaterTableConcentration=0; D0=0; DepthConstant=0; MaxDepthSoluteAccessible=0; RunoffEffectivenessAtMovingSolute=0; MaxEffectiveRunoff=0
                InitialValues=[38.0228, 12.9554, 0.421763, 0.421763, 0.421763, 0.421763, 0.421763]
              Solute NH4: Thickness=[150, 150, 300, 300, 300, 300, 300]; InitialValuesUnits=ppm; WaterTableConcentration=0; D0=0; DepthConstant=0; MaxDepthSoluteAccessible=0; RunoffEffectivenessAtMovingSolute=0; MaxEffectiveRunoff=0
                InitialValues=[0.380228, 0.15486, 0.0421763, 0.0421763, 0.0421763, 0.0421763, 0.0421763]
              Solute Urea: same as Validation.SE Queensland.APS6.APS6Base.paddock.APS6Field.Urea
              SoilTemperature Temperature: InteractionsPerDay=8
            SurfaceOrganicMatter: InitialResidueName=wheat_stubble; InitialResidueType=wheat; InitialResidueMass=500; InitialStandingFraction=0; InitialCPR=0; InitialCNR=100
            Plant Wheat
            MicroClimate: a_interception=0; b_interception=1; c_interception=0; d_interception=0; SoilHeatFluxFraction=0.4; MinimumHeightDiffForNewLayer=0; NightInterceptionFraction=0.5; ReferenceHeight=2
            Manager Automatic irrigation based on water deficit
              AutoIrrigationOn = True
              FASWThreshold = 0.9
              FASWDepth = 600
```csharp
using APSIM.Numerics;
using Models.Soils.Nutrients;
using System;
using Models.Core;
using System.Collections.Generic;
using System.Text;
using Models.Soils;
using Models.PMF;
using Models;
using System.Xml.Serialization;
using APSIM.Shared.Utilities;
using Models.Interfaces;

namespace Models
{
    [Serializable] 
    public class Script : Model
    {
        [Link] private Zone zone;
        [Link] private Irrigation irrigation;
        [Link] private Soil soil;
        [Link]
        private IPhysical soilPhysical;
        [Link]
        private ISoilWater waterBalance;
        public double FASW { get; set; }
        public double WaterDeficit  { get; set; }
    
        
        [Description("Auto irrigation on?")]
        public bool AutoIrrigationOn { get; set; }

        [Description("Threshold fraction available water (0-1)")]
        public double FASWThreshold { get; set; }

        [Description("Soil depth (mm) to which fraction available water is calculated")]
        public double FASWDepth { get; set; }

        [EventSubscribe("DoManagement")]
        private void OnDoManagement(object sender, EventArgs e)
        {
            CalculateFASW();
            if (AutoIrrigationOn)
            {
                if (FASW < FASWThreshold)
                {
                    double amount = 10;
                    irrigation.Apply(WaterDeficit, depth: 0);
                }
            }
        }
        
        private void CalculateFASW()
        {
            double[] LL15 = MathUtilities.Multiply(soilPhysical.LL15, soilPhysical.Thickness);
            double[] DUL = MathUtilities.Multiply(soilPhysical.DUL, soilPhysical.Thickness);
        
            int nlayr = GetLayerIndex();
            double cumdep = MathUtilities.Sum(soilPhysical.Thickness, 0, nlayr, 0.0);

            double excess_fr = MathUtilities.Divide((cumdep - FASWDepth), soilPhysical.Thickness[nlayr], 0.0);

            // note that results may be strange if swdep < ll15
            double avail_sw = (MathUtilities.Sum(waterBalance.SWmm, 0, nlayr, 0.0)
                              - excess_fr * waterBalance.SWmm[nlayr])
                              - (MathUtilities.Sum(LL15, 0, nlayr, 0.0)
                              - excess_fr * LL15[nlayr]);


            double pot_avail_sw = (MathUtilities.Sum(DUL, 0, nlayr, 0.0)
                                  - excess_fr * DUL[nlayr])
                                  - (MathUtilities.Sum(LL15, 0, nlayr, 0.0)
                                  - excess_fr * LL15[nlayr]);

            FASW = MathUtilities.Divide(avail_sw, pot_avail_sw, 0.0);
            WaterDeficit = MathUtilities.Constrain(pot_avail_sw - avail_sw, 0.0, 100000);
        }

        private int GetLayerIndex()
        {
            double[] cumThickness = soilPhysical.ThicknessCumulative;
            for (int i = 1; i < cumThickness.Length; i++)
            {
                if (FASWDepth < cumThickness[i])
                    return i - 1;
            }
            
            return cumThickness.Length - 1;
        }

    }
}
```
            Report HarvestReport
            Report DailyReport
          Manager LocationInfo
            Country = Australia
            State = Queensland
            Region =
            script: same as in Validation.SE Queensland.APS26.APS26NRate160WaterWet.LocationInfo
      Experiment Gatton94
        Memo
          This simple experiment was conducted to investigate the impact of time of sowing on  wheat.  Wheat (cv. Hartog and Batavia) was sown at Gatton on six dates during 1994.  Various data were collected. However final growth data was compromised by mouse damage.  The dataset is used here to study the impact of sowing time on phenological development.
        Factors
          Permutation
            Factor Cv: Specification=[Sowing].Script.CultivarName = Hartog, Batavia
            Factor TOS
              Specification=[Sowing].Script.SowDate = 29-Apr, 20-May, 10-Jun, 4-Jul, 22-Jul, 15-Aug
        Simulation Gatton94Base
          Clock: Start=1994-04-29; End=1994-12-30
          Summary summaryfile
          Weather: FileName=met/Gatton1994.met
          SoilArbitrator Soil Arbitrator
          Zone Field: Area=1; Slope=0; AspectAngle=0; Altitude=50
            Irrigation
            Fertiliser
            Soil APS6Field: SoilType=APS6Soil; LocalName=APS6Site; Site=APS6Site; NearestTown=Unknown; Region=Lawes; NaturalVegetation=Unknown; Latitude=0; Longitude=0
              Physical
                Thickness  BD    AirDry  LL15  DUL   SAT
                150        1.38  0.1     0.2   0.38  0.43
                150        1.34  0.1     0.2   0.38  0.43
                300        1.35  0.1     0.22  0.4   0.43
                300        1.5   0.1     0.18  0.4   0.43
                300        1.49  0.1     0.14  0.39  0.42
                300        1.46  0.1     0.2   0.38  0.4
                300        1.46  0.1     0.2   0.38  0.4
                SoilCrop WheatSoil: LL=[0.2, 0.2, 0.22, 0.18, 0.14, 0.25, 0.28]; KL=[0.06, 0.06, 0.06, 0.06, 0.06, 0.06, 0.06]; XF=[1, 1, 1, 1, 1, 1, 1]
              WaterBalance SoilWater: same as Validation.SE Queensland.APS6.APS6Base.paddock.APS6Field.SoilWater
              Organic: same as Validation.SE Queensland.APS6.APS6Base.paddock.APS6Field.Organic
              Chemical: Thickness=[150, 150, 300, 300, 300, 300, 300]; PH=[7.5, 8, 8, 8, 8, 8, 8]; PHUnits=Water
              Water: Thickness=[150, 150, 300, 300, 300, 300, 300]; InitialValues=[0.326, 0.326, 0.346, 0.333, 0.315, 0.326, 0.326]; FilledFromTop=false
              Nutrient
              Solute NO3: same as Validation.SE Queensland.APS6.APS6Base.paddock.APS6Field.NO3
              Solute NH4: same as Validation.SE Queensland.APS6.APS6Base.paddock.APS6Field.NH4
              Solute Urea: same as Validation.SE Queensland.APS6.APS6Base.paddock.APS6Field.Urea
              SoilTemperature Temperature: InteractionsPerDay=8
            SurfaceOrganicMatter: InitialResidueName=wheat_stubble; InitialResidueType=wheat; InitialResidueMass=500; InitialStandingFraction=0; InitialCPR=0; InitialCNR=100
            Plant Wheat
            MicroClimate: a_interception=0; b_interception=1; c_interception=0; d_interception=0; SoilHeatFluxFraction=0.4; MinimumHeightDiffForNewLayer=0; NightInterceptionFraction=0.5; ReferenceHeight=2
            Report DailyReport
            Report HarvestReport
            Manager Sowing
              SowDate = 25-May
              CultivarName = Hartog
              SowingDepth = 40
              RowSpacing = 250
              Population = 100
```csharp
using Models.Soils.Nutrients;
using System;
using Models.Core;
using Models.PMF;
using Models.Soils;
using Models.Soils.Nutrients;
using Models.Utilities;
using APSIM.Shared.Utilities;

namespace Models
{
    [Serializable]
    public class Script : Model
    {
        [Link] Clock Clock;
        [Link] Fertiliser Fertiliser;
        [Link] Summary Summary;
        [Link] Plant Wheat;
        [Link] Soil Soil;
        Accumulator accumulatedRain;
        
        [Description("Sowing date (d-mmm)")]
        public string SowDate { get; set; }
        [Description("Cultivar to be sown")]
        public string CultivarName { get; set; }
        [Description("Sowing depth (mm)")]
        public double SowingDepth { get; set; }
        [Description("Row spacing (mm)")]
        public double RowSpacing { get; set; }
        [Description("Plant population (/m2)")]
        public double Population { get; set; }
        
        


        [EventSubscribe("DoManagement")]
        private void OnDoManagement(object sender, EventArgs e)
        {
        
            
            if (DateUtilities.WithinDates(SowDate, Clock.Today, SowDate))
            {
                Wheat.Sow(population: Population, cultivar: CultivarName, depth: SowingDepth, rowSpacing: RowSpacing);    
            }
        
        }
        
    }
}
```
            Manager Harvesting
            Manager AutoIrrigate
              AutoIrrigationOn = True
              StartStageName = Emergence
              EndStageName = EndGrainFill
              FASWThreshold = 0.9
              FASWDepth = 1000
```csharp
using APSIM.Numerics;
using Models.PMF.Phen;
using APSIM.Shared.Utilities;
using System.Xml.Serialization;
using Models;
using Models.PMF;
using Models.Soils;
using System.Text;
using System.Collections.Generic;
using Models.Core;
using System;
using Models.Soils.Nutrients;
using Models.Interfaces;

namespace Models
{
    [Serializable] 
    public class Script : Model
    {
        [Link] private Plant Chickpea;
        [Link] private Zone zone;
        [Link] private Irrigation irrigation;
        [Link] private Soil soil;
        [Link]
        private Phenology phenology;
        [Link]
        private IPhysical soilPhysical;
        [Link]
        private ISoilWater waterBalance;
        public double FASW { get; set; }
        public double WaterDeficit  { get; set; }
    
        
        [Description("Auto irrigation on?")]
        public bool AutoIrrigationOn { get; set; }
        
        [Description("Irrigation window start stage")]
        public string StartStageName { get; set; }
        [Description("Irrigation window end stage")]
        public string EndStageName { get; set; }

        [Description("Threshold fraction available water (0-1)")]
        public double FASWThreshold { get; set; }

        [Description("Soil depth (mm) to which fraction available water is calculated")]
        public double FASWDepth { get; set; }

        [EventSubscribe("DoManagement")]
        private void OnDoManagement(object sender, EventArgs e)
        {
            CalculateFASW();
            if (AutoIrrigationOn && phenology.Between(StartStageName, EndStageName))
            {
                if (FASW < FASWThreshold)
                {
                    double amount = 10;
                    irrigation.Apply(WaterDeficit, depth: 0);
                }
            }
        }
        
        private void CalculateFASW()
        {
            double[] LL15 = MathUtilities.Multiply(soilPhysical.LL15, soilPhysical.Thickness);
            double[] DUL = MathUtilities.Multiply(soilPhysical.DUL, soilPhysical.Thickness);
        
            int nlayr = GetLayerIndex();
            double cumdep = MathUtilities.Sum(soilPhysical.Thickness, 0, nlayr, 0.0);

            double excess_fr = MathUtilities.Divide((cumdep - FASWDepth), soilPhysical.Thickness[nlayr], 0.0);

            // note that results may be strange if swdep < ll15
            double avail_sw = (MathUtilities.Sum(waterBalance.SWmm, 0, nlayr, 0.0)
                              - excess_fr * waterBalance.SWmm[nlayr])
                              - (MathUtilities.Sum(LL15, 0, nlayr, 0.0)
                              - excess_fr * LL15[nlayr]);


            double pot_avail_sw = (MathUtilities.Sum(DUL, 0, nlayr, 0.0)
                                  - excess_fr * DUL[nlayr])
                                  - (MathUtilities.Sum(LL15, 0, nlayr, 0.0)
                                  - excess_fr * LL15[nlayr]);

            FASW = MathUtilities.Divide(avail_sw, pot_avail_sw, 0.0);
            WaterDeficit = MathUtilities.Constrain(pot_avail_sw - avail_sw, 0.0, 100000);
        }

        private int GetLayerIndex()
        {
            double[] cumThickness = soilPhysical.ThicknessCumulative;
            for (int i = 1; i < cumThickness.Length; i++)
            {
                if (FASWDepth < cumThickness[i])
                    return i - 1;
            }
            
            return cumThickness.Length - 1;
        }

    }
}
```
            Operations ApplyFertiliser
              1994-04-29  [Fertiliser].Apply(amount: 200, type: "NO3N");
              Memo
                Add sufficient N to remove limitation
          Manager LocationInfo: same as Validation.SE Queensland.APS26.APS26NRate160WaterWet.LocationInfo
      Experiment Gatton2009
        Factors
          Permutation
            Factor TOS: Specification=[SowingRule].Script.TOS = 1, 2, 3
            Factor Cv
              Specification=[SowingRule].Script.Cultivar = Bolac, Derrimut, Gregory, Gladius, H46, Hartog, Janz, Kellalac, Kennedy, MacKellar, Ruby, Ventura, Wedgetail, Wyalkatchem, Yitpi, Young
        Simulation Gatton2009Base
          Clock: Start=2009-04-01; End=2009-12-30
          Summary summaryfile
          Weather: FileName=met/Gatton2009.met
          SoilArbitrator Soil Arbitrator
          Zone Field: Area=1; Slope=0; AspectAngle=0; Altitude=50
            Irrigation
            Fertiliser
            Soil APS6Field: same as Validation.SE Queensland.Gatton94.Gatton94Base.Field.APS6Field
            Manager SowingRule
              TOS = 1
              Cultivar = Hartog
```csharp
using Models.Soils;
using System;
using Models.Core;
using Models.PMF;
namespace Models
{
           
    [Serializable] 
    [System.Xml.Serialization.XmlInclude(typeof(Model))]
    public class Script : Model
    {
    
        [Link] Plant Wheat;
        [Link] Clock Clock;
            
        [Description("Time of Sowing")]
        public int TOS { get; set; }

        [Description("Cultivar")]
        public String Cultivar { get; set; }
        
        [EventSubscribe("DoManagement")]
        private void OnDoManagement(object sender, EventArgs e)
        {
            if ((Clock.Today.DayOfYear == 120) && (TOS == 1)) 
            {
                Wheat.Sow(population: 100, cultivar: Cultivar, depth: 30, rowSpacing: 250);
                Wheat.Phenology.SetPhaseCompletionDate("10-May","Emerging");
            }
            if((Clock.Today.DayOfYear == 150) && (TOS == 2)) 
            {
                Wheat.Sow(population: 100, cultivar: Cultivar, depth: 30, rowSpacing: 250);
                Wheat.Phenology.SetPhaseCompletionDate("10-Jun","Emerging");
            }
            if((Clock.Today.DayOfYear == 177) && (TOS == 3))
            {
                Wheat.Sow(population: 100, cultivar: Cultivar, depth: 30, rowSpacing: 250);
                Wheat.Phenology.SetPhaseCompletionDate("11-Jul","Emerging");
            }
        }


    }
}
```
            SurfaceOrganicMatter: InitialResidueName=wheat_stubble; InitialResidueType=wheat; InitialResidueMass=500; InitialStandingFraction=0; InitialCPR=0; InitialCNR=100
            Plant Wheat
            MicroClimate: a_interception=0; b_interception=1; c_interception=0; d_interception=0; SoilHeatFluxFraction=0.4; MinimumHeightDiffForNewLayer=0; NightInterceptionFraction=0.5; ReferenceHeight=2
            Report DailyReport
            Report HarvestReport
            Operations Harvesting
              2009-12-30  [Wheat].Harvest()
          Manager LocationInfo: same as Validation.SE Queensland.APS26.APS26NRate160WaterWet.LocationInfo
      Experiment Gatton2011: DisabledSimNames=[Gatton2011TOS2CvEaglehawk]
        Factors
          Permutation
            Factor TOS: Specification=[SowingRule].Script.TOS = 1, 2
            Factor Cv
              Specification=[SowingRule].Script.Cultivar = Axe, Bolac, Derrimut, Eaglehawk, Gregory, Lincoln, Mace, Scout
        Simulation Gatton2011Base
          Clock: Start=2011-05-05; End=2011-12-01
          Summary summaryfile
          Weather: FileName=met/Gatton2011.met
          SoilArbitrator Soil Arbitrator
          Zone Field: Area=1; Slope=0; AspectAngle=0; Altitude=50
            Irrigation
            Fertiliser
            Soil APS6Field: same as Validation.SE Queensland.Gatton94.Gatton94Base.Field.APS6Field
            Manager SowingRule
              TOS = 1
              Cultivar = Hartog
```csharp
using Models.Soils;
using System;
using Models.Core;
using Models.PMF;
namespace Models
{
           
    [Serializable] 
    [System.Xml.Serialization.XmlInclude(typeof(Model))]
    public class Script : Model
    {
    
        [Link] Plant Wheat;
        [Link] Clock Clock;
            
        [Description("Time of Sowing")]
        public int TOS { get; set; }

        [Description("Cultivar")]
        public String Cultivar { get; set; }
        
        [EventSubscribe("DoManagement")]
        private void OnDoManagement(object sender, EventArgs e)
        {
            if ((Clock.Today.DayOfYear == 136) && (TOS == 1)) //16 May
            {
                Wheat.Sow(population: 100, cultivar: Cultivar, depth: 30, rowSpacing: 250);
                Wheat.Phenology.SetPhaseCompletionDate("22-May","Emerging");
            }
            if ((Clock.Today.DayOfYear == 177) && (TOS == 2)) //26 June
            {
                Wheat.Sow(population: 100, cultivar: Cultivar, depth: 30, rowSpacing: 250);
                Wheat.Phenology.SetPhaseCompletionDate("30-Jun","Emerging");
            }
        }
    }
}
```
            Operations
              2011-05-13  [Fertiliser].Apply(amount: 55, type: "UreaN");
              2011-05-13  [Irrigation].Apply(amount:11);
              2011-06-30  [Fertiliser].Apply(amount: 43, type: "UreaN");
              2011-08-08  [Fertiliser].Apply(amount: 90, type: "UreaN");
              2011-12-01  [Wheat].Harvest();
              2011-12-01  [Wheat].EndCrop();
            SurfaceOrganicMatter: InitialResidueName=wheat_stubble; InitialResidueType=wheat; InitialResidueMass=500; InitialStandingFraction=0; InitialCPR=0; InitialCNR=100
            Plant Wheat
            MicroClimate: a_interception=0; b_interception=1; c_interception=0; d_interception=0; SoilHeatFluxFraction=0.4; MinimumHeightDiffForNewLayer=0; NightInterceptionFraction=0.5; ReferenceHeight=2
            Report DailyReport
            Report HarvestReport
          Manager LocationInfo: same as Validation.SE Queensland.APS26.APS26NRate160WaterWet.LocationInfo
      Experiment Gatton2014
        Factors
          Permutation
            Factor TOS: Specification=[Sowing].Script.SowDate = 11-Apr, 13-May, 16-Jul, 12-Aug
            Factor Cv
              Specification=[Sowing].Script.CultivarName = Axe, Bolac, Braewood, Calingiri, Catalina, Crusader, Derrimut, Eaglehawk, Ellison, Forrest, Gauntlet, Gregory, H45, Hume, Janz, Kellalac, Lancer, Mace, Magenta, Merinda, Ouyen, Peake, Revenue, Rosella, Scout, Scythe, Spitfire, Strzelecki, Sunbri, Sunstate, Suntop, Wedgetail, Whistler, Wills, Wyalkatchem, Yitpi, Young
        Simulation 14SOWbase
          Clock: Start=2014-04-10; End=2015-04-01
          Summary SummaryFile
          Weather: FileName=met/14SSOW-1.met
          SoilArbitrator
          Zone Field: Area=1; Slope=0; AspectAngle=0; Altitude=50
            Report DailyReport
            Report HarvestReport
            Fertiliser
            Soil: ASCOrder=Vertosol; ASCSubOrder=Black; SoilType=Clay; Site=Norwin; NearestTown=Norwin; Region=Darling Downs and Granite Belt; State=Queensland; Country=Australia; NaturalVegetation=Qld. Bluegrass, possible Qld. Blue gum; ApsoilNumber=900; Latitude=-27.5818; Longitude=151.3202; LocationAccuracy=+/- 20m
              DataSource=CSIRO Sustainable Ecosystems, Toowoomba; Characteriesd as part of the GRDC funded project"Doing it better, doing it smarter, managing soil water in Australian agriculture' 2011
              Comments=OC, CLL for all crops estimated-based on Bongeen Mywybilla Soil No1
              Physical
                Thickness  BD      AirDry  LL15    DUL     SAT     KS
                150        1.0106  0.1303  0.2605  0.521   0.5887  20
                150        1.0715  0.1987  0.2484  0.4967  0.5657  20
                300        1.0939  0.28    0.28    0.4884  0.5572  20
                300        1.1586  0.28    0.28    0.4803  0.5328  20
                300        1.173   0.28    0.28    0.4716  0.5274  20
                300        1.1629  0.28    0.28    0.4571  0.5312  20
                300        1.1875  0.28    0.28    0.4523  0.5219  20
                SoilCrop WheatSoil: LL=[0.261, 0.248, 0.28, 0.306, 0.36, 0.392, 0.446]; KL=[0.06, 0.06, 0.06, 0.04, 0.04, 0.02, 0.01]; XF=[1, 1, 1, 1, 1, 1, 1]
              WaterBalance SoilWater: SummerDate=1-Nov; SummerU=5; SummerCona=5; WinterDate=1-Apr; WinterU=5; WinterCona=5; DiffusConst=40; DiffusSlope=16; Salb=0.12; CN2Bare=73; CNRed=20; CNCov=0.8; PSIDul=-100; Thickness=[150, 150, 300, 300, 300, 300, 300]; SWCON=[0.3, 0.3, 0.3, 0.3, 0.3, 0.3, 0.3]
              Organic: FOMCNRatio=40; CarbonUnits=Total
                Thickness  Carbon  SoilCNRatio  FBiom  FInert  FOM
                150        1.2     12           0.04   0.4     347.129
                150        0.96    12           0.02   0.6     270.3444
                300        0.6     12           0.02   0.8     163.9721
                300        0.3     12           0.02   1       99.4541
                300        0.18    12           0.01   1       60.322
                300        0.12    12           0.01   1       36.5871
                300        0.12    12           0.01   1       22.1912
              Chemical: Thickness=[150, 150, 300, 300, 300, 300, 300]; PH=[8, 8, 8, 8, 8, 8, 8]; PHUnits=Water
              Water: Thickness=[150, 150, 300, 300, 300, 300, 300]; InitialValues=[0.521, 0.4967, 0.4884, 0.4803, 0.4716, 0.4571, 0.4523]; FilledFromTop=false
              Nutrient
              Solute NO3: Thickness=[150, 150, 300, 300, 300, 300, 300]; InitialValues=[1, 1, 1, 1, 1, 1, 1]; InitialValuesUnits=ppm; WaterTableConcentration=0; D0=0; DepthConstant=0; MaxDepthSoluteAccessible=0; RunoffEffectivenessAtMovingSolute=0; MaxEffectiveRunoff=0
              Solute NH4: Thickness=[150, 150, 300, 300, 300, 300, 300]; InitialValues=[0.1, 0.1, 0.1, 0.1, 0.1, 0.1, 0.1]; InitialValuesUnits=ppm; WaterTableConcentration=0; D0=0; DepthConstant=0; MaxDepthSoluteAccessible=0; RunoffEffectivenessAtMovingSolute=0; MaxEffectiveRunoff=0
              Solute Urea: same as Validation.SE Queensland.APS6.APS6Base.paddock.APS6Field.Urea
              SoilTemperature Temperature: InteractionsPerDay=8
            SurfaceOrganicMatter: InitialResidueName=wheat_stubble; InitialResidueType=wheat; InitialResidueMass=500; InitialStandingFraction=0; InitialCPR=0; InitialCNR=100
            Plant Wheat
            MicroClimate: a_interception=0; b_interception=1; c_interception=0; d_interception=0; SoilHeatFluxFraction=0.4; MinimumHeightDiffForNewLayer=0; NightInterceptionFraction=0.5; ReferenceHeight=2
            Manager SowingFertiliser
              Amount = 300
              CropName = wheat
```csharp
using Models.Soils;
using System;
using Models.Core;
using Models.PMF;
namespace Models
{
    [Serializable]
    public class Script : Model
    {
        [Link] Clock Clock;
        [Link] Fertiliser Fertiliser;
        [Link] Summary Summary;
        
        
        [Description("Amount of fertiliser to be applied (kg/ha)")]
        public double Amount { get; set;}
        
        [Description("Crop to be fertilised")]
        public string CropName { get; set;}
        
        
        

        [EventSubscribe("Sowing")]
        private void OnSowing(object sender, EventArgs e)
        {
            Model crop = sender as Model;
            if (crop.Name.ToLower()==CropName.ToLower())
                Fertiliser.Apply(amount: Amount, type: "NO3N");
        }
        
    }
}
```
            Manager Harvesting
            Manager Sowing
              SowDate = =
              CultivarName = Hartog
              SowingDepth = 50
              RowSpacing = 250
              Population = 150
```csharp
using Models.Soils.Nutrients;
using System;
using Models.Core;
using Models.PMF;
using Models.Soils;
using Models.Soils.Nutrients;
using Models.Utilities;
using APSIM.Shared.Utilities;

namespace Models
{
    [Serializable]
    public class Script : Model
    {
        [Link] Clock Clock;
        [Link] Fertiliser Fertiliser;
        [Link] Summary Summary;
        [Link] Plant Wheat;
        [Link] Soil Soil;
        Accumulator accumulatedRain;
        
        [Description("Sowing date (d-mmm)")]
        public string SowDate { get; set; }
        [Description("Cultivar to be sown")]
        public string CultivarName { get; set; }
        [Description("Sowing depth (mm)")]
        public double SowingDepth { get; set; }
        [Description("Row spacing (mm)")]
        public double RowSpacing { get; set; }
        [Description("Plant population (/m2)")]
        public double Population { get; set; }
        
        


        [EventSubscribe("DoManagement")]
        private void OnDoManagement(object sender, EventArgs e)
        {
        
            
            if (DateUtilities.WithinDates(SowDate, Clock.Today, SowDate))
            {
                Wheat.Sow(population: Population, cultivar: CultivarName, depth: SowingDepth, rowSpacing: RowSpacing);

                if(SowDate == "11-Apr")
                {
                    Wheat.Phenology.SetPhaseCompletionDate("16-Apr","Emerging");
                }
                if(SowDate == "13-May")
                {
                    Wheat.Phenology.SetPhaseCompletionDate("20-May","Emerging");
                }
                if(SowDate == "16-Jul")
                {
                    Wheat.Phenology.SetPhaseCompletionDate("23-Jul","Emerging");
                }
                if(SowDate == "12-Aug")
                {
                    Wheat.Phenology.SetPhaseCompletionDate("19-Aug","Emerging");
                }
            }
        
        }
        
    }
}
```
          Manager LocationInfo: same as Validation.SE Queensland.GattonRowSpacing.RowSpace.LocationInfo
      Experiment Gatton2014AE
        Factors
          Permutation
            Factor V
              CompositeFactor 1
                Specifications:
                  [Sowing].Script.SowDate = 19-Jun
                  [Sowing].Script.EmergeDate = 23-Jun
              CompositeFactor 2
                Specifications:
                  [Sowing].Script.SowDate = 24-Apr
                  [Sowing].Script.EmergeDate = 21-Jun
            Factor P
              CompositeFactor 1: Specifications=[PhotoperiodExtension].Script.ExtraHours = 0
              CompositeFactor 2: Specifications=[PhotoperiodExtension].Script.ExtraHours = 8
            Factor Cv: same as Validation.SE Queensland.Gatton2014.Factors.Permutation.Cv
        Simulation 14VPbase
          Clock: Start=2014-04-23; End=2015-04-15
          Summary SummaryFile
          Weather: FileName=met/14SSOW-1.met
          SoilArbitrator
          Zone Field: Area=1; Slope=0; AspectAngle=0; Altitude=50
            Report DailyReport
            Report HarvestReport
            Fertiliser
            Soil: same as Validation.SE Queensland.Gatton2014.14SOWbase.Field.Soil
            SurfaceOrganicMatter: InitialResidueName=wheat_stubble; InitialResidueType=wheat; InitialResidueMass=500; InitialStandingFraction=0; InitialCPR=0; InitialCNR=100
            Plant Wheat
            MicroClimate: a_interception=0; b_interception=1; c_interception=0; d_interception=0; SoilHeatFluxFraction=0.4; MinimumHeightDiffForNewLayer=0; NightInterceptionFraction=0.5; ReferenceHeight=2
            Manager SowingFertiliser: same as Validation.SE Queensland.Gatton2014.14SOWbase.Field.SowingFertiliser
            Manager Harvesting
            Manager Sowing
              SowDate =
              EmergeDate =
              CultivarName =
              SowingDepth = 30
              RowSpacing = 250
              Population = 150
```csharp
using Models.Soils.Nutrients;
using System;
using Models.Core;
using Models.PMF;
using Models.Soils;
using Models.Soils.Nutrients;
using Models.Utilities;
using APSIM.Shared.Utilities;

namespace Models
{
    [Serializable]
    public class Script : Model
    {
        [Link] Clock Clock;
        [Link] Fertiliser Fertiliser;
        [Link] Summary Summary;
        [Link] Plant Wheat;
        [Link] Soil Soil;
        Accumulator accumulatedRain;
        
        [Description("Sowing date (d-mmm)")]
        public string SowDate { get; set; }
        [Description("Emergence date (d-mmm)")]
        public string EmergeDate { get; set; }
        [Description("Cultivar to be sown")]
        public string CultivarName { get; set; }
        [Description("Sowing depth (mm)")]
        public double SowingDepth { get; set; }
        [Description("Row spacing (mm)")]
        public double RowSpacing { get; set; }
        [Description("Plant population (/m2)")]
        public double Population { get; set; }
        
        


        [EventSubscribe("DoManagement")]
        private void OnDoManagement(object sender, EventArgs e)
        {
        
            
            if (DateUtilities.WithinDates(SowDate, Clock.Today, SowDate))
            {
                Wheat.Sow(population: Population, cultivar: CultivarName, depth: SowingDepth, rowSpacing: RowSpacing);    
                Wheat.Phenology.SetPhaseCompletionDate(EmergeDate,"Emerging");
            }
        
        }
        
    }
}
```
            Manager PreSowVernalisation
              StartDate = 04/24/2014 00:00:00
              EndDate = 06/18/2014 00:00:00
```csharp
using Models.Soils;
using System.Xml.Serialization;
using Models;
using Models.PMF;
using System.Text;
using System.Collections.Generic;
using APSIM.Shared.Utilities;
using Models.Core;
using System;
using Models.Climate;

namespace Models
{
    [Serializable] 
    [System.Xml.Serialization.XmlInclude(typeof(Model))]
    public class Script : Model
    {
        [Link] Weather Met;
        [Link] Clock Clock;
    
        [Description("Start Date")]
        public DateTime StartDate { get; set; }
        
        [Description("End Date")]
        public DateTime EndDate { get; set; }
 
    
        [EventSubscribe("PreparingNewWeatherData")]
        private void OnPreparingNewWeatherData(object sender, EventArgs e)
        {
            if ((Clock.Today.Date >= StartDate) && (Clock.Today.Date <= EndDate))
                Met.MaxT = 4.0;
                Met.MinT = 4.0;        
        }
    }
}
```
            Manager PhotoperiodExtension
              StartDate = 04/20/2014 00:00:00
              EndDate = 11/01/2014 00:00:00
              ExtraHours = -
```csharp
using Models.Soils;
using System.Xml.Serialization;
using Models;
using Models.PMF;
using System.Text;
using System.Collections.Generic;
using APSIM.Shared.Utilities;
using Models.Core;
using System;
using Models.Climate;

namespace Models
{
    [Serializable] 
    [System.Xml.Serialization.XmlInclude(typeof(Model))]
    public class Script : Model
    {
        [Link] Weather Met;
        [Link] Clock Clock;
    
        [Description("Start Date")]
        public DateTime StartDate { get; set; }
        
        [Description("End Date")]
        public DateTime EndDate { get; set; }
 
        [Description("Photoperiod extension (hours)")]
        public double ExtraHours { get; set; }
        [EventSubscribe("PreparingNewWeatherData")]
        private void OnPreparingNewWeatherData(object sender, EventArgs e)
        {
            if ((Clock.Today.Date >= StartDate) && (Clock.Today.Date <= EndDate))
                Met.DayLength = Met.CalculateDayLength(-6) + ExtraHours;
        }
    }
}
```
          Manager LocationInfo: same as Validation.SE Queensland.GattonRowSpacing.RowSpace.LocationInfo
      Experiment TraitMod2015
        Factors
          Permutation
            Factor TOS: Specification=[Sowing].Script.SowDate = 21-May, 22-Jun
            Factor Cv
              Specification=[Sowing].Script.CultivarName = Drysdale, Gregory, Hartog, Spitfire, Suntop
        Simulation 15TraitModbase
          Weather: FileName=met/gatton-15-g3.met
          Clock: Start=2015-05-19; End=2015-11-17
          Summary
          SoilArbitrator
          Zone Field: Area=1; Slope=0; AspectAngle=0; Altitude=50
            Soil: SoilType=Black Vertosol; Site=Lawes; NearestTown=Lawes, Q 4343; Region=Lockyer; State=Queensland; Country=Australia; NaturalVegetation=Blue Gum, Moreton Bay Ash, Tea Tree; ApsoilNumber=38; Latitude=-27.537; Longitude=152.336; LocationAccuracy=+-20m; DataSource=CSIRO Sustainable Ecosystems, Toowoomba
              Comments=Soil naming structure: \State\Region\Classification-Local Name (Site/district and locator number); oc and ph estimated
              Physical: same as Validation.SE Queensland.GattonRowSpacing.RowSpace.Field.Soil.Physical
              WaterBalance SoilWater: same as Validation.SE Queensland.GattonRowSpacing.RowSpace.Field.Soil.SoilWater
              Organic: same as Validation.SE Queensland.GattonRowSpacing.RowSpace.Field.Soil.Organic
              Chemical: Thickness=[150, 150, 300, 300, 300, 300, 300]; PH=[8, 8, 8, 8, 8, 8, 8]; PHUnits=Water
              Water: Thickness=[150, 150, 300, 300, 300, 300, 300]; InitialValues=[0.41, 0.43, 0.46, 0.44, 0.4, 0.41, 0.38]; FilledFromTop=true
              Nutrient
              Solute NO3: Thickness=[150, 150, 300, 300, 300, 300, 300]; InitialValuesUnits=ppm; WaterTableConcentration=0; D0=0; DepthConstant=0; MaxDepthSoluteAccessible=0; RunoffEffectivenessAtMovingSolute=0; MaxEffectiveRunoff=0
                InitialValues=[10.101, 10.2564, 2.71003, 0.787402, 0.486618, 0.246914, 0.246914]
              Solute NH4: Thickness=[150, 150, 300, 300, 300, 300, 300]; InitialValuesUnits=ppm; WaterTableConcentration=0; D0=0; DepthConstant=0; MaxDepthSoluteAccessible=0; RunoffEffectivenessAtMovingSolute=0; MaxEffectiveRunoff=0
                InitialValues=[0.505051, 0.512821, 0.271003, 0.262467, 0.243309, 0.246914, 0.246914]
              Solute Urea: same as Validation.SE Queensland.APS6.APS6Base.paddock.APS6Field.Urea
              SoilTemperature Temperature: InteractionsPerDay=8
            Report DailyReport
            Report HarvestReport
            Fertiliser
            SurfaceOrganicMatter: InitialResidueName=wheat_stubble; InitialResidueType=wheat; InitialResidueMass=500; InitialStandingFraction=0; InitialCPR=0; InitialCNR=100
            Plant Wheat
            MicroClimate: a_interception=0; b_interception=1; c_interception=0; d_interception=0; SoilHeatFluxFraction=0.4; MinimumHeightDiffForNewLayer=0; NightInterceptionFraction=0.5; ReferenceHeight=2
            Manager SowingFertiliser: same as Validation.SE Queensland.Gatton2014.14SOWbase.Field.SowingFertiliser
            Manager Harvesting
            Manager Sowing
              SowDate = 19-Jun
              CultivarName = Hartog
              SowingDepth = 50
              RowSpacing = 250
              Population = 150
```csharp
using Models.Soils.Nutrients;
using System;
using Models.Core;
using Models.PMF;
using Models.Soils;
using Models.Soils.Nutrients;
using Models.Utilities;
using APSIM.Shared.Utilities;

namespace Models
{
    [Serializable]
    public class Script : Model
    {
        [Link] Clock Clock;
        [Link] Fertiliser Fertiliser;
        [Link] Summary Summary;
        [Link] Plant Wheat;
        [Link] Soil Soil;
        Accumulator accumulatedRain;
        
        [Description("Sowing date (d-mmm)")]
        public string SowDate { get; set; }
        [Description("Cultivar to be sown")]
        public string CultivarName { get; set; }
        [Description("Sowing depth (mm)")]
        public double SowingDepth { get; set; }
        [Description("Row spacing (mm)")]
        public double RowSpacing { get; set; }
        [Description("Plant population (/m2)")]
        public double Population { get; set; }
        
        


        [EventSubscribe("DoManagement")]
        private void OnDoManagement(object sender, EventArgs e)
        {
        
            
            if (DateUtilities.WithinDates(SowDate, Clock.Today, SowDate))
            {
                Wheat.Sow(population: Population, cultivar: CultivarName, depth: SowingDepth, rowSpacing: RowSpacing);    
                if(SowDate == "21-May")
                {
                    Wheat.Phenology.SetPhaseCompletionDate("27-May","Emerging");
                }
                if(SowDate == "22-Jun")
                {
                    Wheat.Phenology.SetPhaseCompletionDate("30-Jun","Emerging");
                }
            }
        
        }
        
    }
}
```
            Operations Management
              2015-06-23  [Fertiliser].Apply(amount: 205, type: "UreaGranular");
              2015-05-22  [Irrigation].Apply(amount:24);
              2015-06-26  [Irrigation].Apply(amount:25);
              2015-07-14  [Irrigation].Apply(amount:26);
              2015-07-31  [Irrigation].Apply(amount:26);
              2015-08-14  [Irrigation].Apply(amount:25);
              2015-08-26  [Irrigation].Apply(amount:25);
              2015-09-09  [Irrigation].Apply(amount:25);
              2015-10-12  [Irrigation].Apply(amount:25);
            Irrigation
          Manager LocationInfo: same as Validation.SE Queensland.APS26.APS26NRate160WaterWet.LocationInfo
      Experiment TraitMod2016
        Factors
          Permutation
            Factor TOS: Specification=[Sowing].Script.SowDate = 21-May
            Factor Cv
              Specification=[Sowing].Script.CultivarName = Drysdale, Gregory, Hartog, Spitfire, Suntop
        Simulation 16TraitModbase
          Weather: FileName=met/gatton2016.met
          Summary
          SoilArbitrator
          Clock: Start=2016-05-15; End=2016-12-17
          Zone Field: Area=1; Slope=0; AspectAngle=0; Altitude=50
            Soil: same as Validation.SE Queensland.TraitMod2015.15TraitModbase.Field.Soil
            Report DailyReport
            Report HarvestReport
            Fertiliser
            SurfaceOrganicMatter: InitialResidueName=wheat_stubble; InitialResidueType=wheat; InitialResidueMass=500; InitialStandingFraction=0; InitialCPR=0; InitialCNR=100
            Plant Wheat
            MicroClimate: a_interception=0; b_interception=1; c_interception=0; d_interception=0; SoilHeatFluxFraction=0.4; MinimumHeightDiffForNewLayer=0; NightInterceptionFraction=0.5; ReferenceHeight=2
            Manager SowingFertiliser: same as Validation.SE Queensland.Gatton2014.14SOWbase.Field.SowingFertiliser
            Manager Harvesting
            Manager Sowing
              SowDate =
              CultivarName =
              SowingDepth = 50
              RowSpacing = 250
              Population = 150
```csharp
using Models.Soils.Nutrients;
using System;
using Models.Core;
using Models.PMF;
using Models.Soils;
using Models.Soils.Nutrients;
using Models.Utilities;
using APSIM.Shared.Utilities;

namespace Models
{
    [Serializable]
    public class Script : Model
    {
        [Link] Clock Clock;
        [Link] Fertiliser Fertiliser;
        [Link] Summary Summary;
        [Link] Plant Wheat;
        [Link] Soil Soil;
        Accumulator accumulatedRain;
        
        [Description("Sowing date (d-mmm)")]
        public string SowDate { get; set; }
        [Description("Cultivar to be sown")]
        public string CultivarName { get; set; }
        [Description("Sowing depth (mm)")]
        public double SowingDepth { get; set; }
        [Description("Row spacing (mm)")]
        public double RowSpacing { get; set; }
        [Description("Plant population (/m2)")]
        public double Population { get; set; }
        
        


        [EventSubscribe("DoManagement")]
        private void OnDoManagement(object sender, EventArgs e)
        {
        
            
            if (DateUtilities.WithinDates(SowDate, Clock.Today, SowDate))
            {
                Wheat.Sow(population: Population, cultivar: CultivarName, depth: SowingDepth, rowSpacing: RowSpacing);    
                Wheat.Phenology.SetPhaseCompletionDate("24-May","Emerging");
            }
        
        }
        
    }
}
```
            Operations Management
              2016-05-10  [Fertiliser].Apply(amount: 310, type: "UreaGranular")
              2016-05-19  [Irrigation].Apply(amount: 30, depth: 0, efficiency: 1, willRunoff: false)
              2016-07-22  [Irrigation].Apply(amount: 30, depth: 0, efficiency: 1, willRunoff: false)
              2016-08-05  [Irrigation].Apply(amount: 30, depth: 0, efficiency: 1, willRunoff: false)
              2016-08-12  [Irrigation].Apply(amount: 30, depth: 0, efficiency: 1, willRunoff: false)
              2016-08-29  [Irrigation].Apply(amount: 30, depth: 0, efficiency: 1, willRunoff: false)
              2016-09-07  [Irrigation].Apply(amount: 30, depth: 0, efficiency: 1, willRunoff: false)
            Irrigation
          Manager LocationInfo: same as Validation.SE Queensland.APS26.APS26NRate160WaterWet.LocationInfo
      PredictedObserved SEQObsPred: PredictedTableName=HarvestReport; ObservedTableName=Observed; FieldNameUsedForMatch=SimulationName; FieldName2UsedForMatch=Wheat.Phenology.CurrentStageName; AllColumns=false
    Folder Western Australia
      Memo
        The wheat belt of Western Australia has a Mediteranean climate (winter dominant rainfall patterns) with mostly sandy soils.  Data from [#Asseng1998163].   and some more recent studies have been included to extend the range of conditions studied and to include more modern cultivars.
      Experiment Mer86
        Factors
          Permutation
            Factor NRate: Specification=[FertiliserOperations]
              Operations 15
                1986-06-14  [Fertiliser].Apply(amount: 15, type: "NO3N", depth: 50);
              Operations 60
                1986-05-29  [Fertiliser].Apply(amount: 30, type: "NO3N", depth: 50);
            Factor Water: Specification=[IrrigationOperations]
              Operations Dry
                1986-09-03  [Irrigation].Apply (amount:0);
                1986-09-05  [Irrigation].Apply (amount:0);
                1986-09-10  [Irrigation].Apply (amount:0);
                1986-09-11  [Irrigation].Apply (amount:0);
                1986-09-14  [Irrigation].Apply (amount:0);
                1986-09-16  [Irrigation].Apply (amount:0);
                1986-09-18  [Irrigation].Apply (amount:0);
                1986-09-21  [Irrigation].Apply (amount:0);
                1986-09-23  [Irrigation].Apply (amount:0);
                1986-09-24  [Irrigation].Apply (amount:0);
                1986-09-30  [Irrigation].Apply (amount:0);
                1986-10-02  [Irrigation].Apply (amount:0);
                1986-10-04  [Irrigation].Apply (amount:0);
                1986-10-10  [Irrigation].Apply (amount:0);
                1986-10-12  [Irrigation].Apply (amount:0);
                1986-10-14  [Irrigation].Apply (amount:0);
                1986-10-16  [Irrigation].Apply (amount:0);
                1986-10-18  [Irrigation].Apply (amount:0);
                1986-10-20  [Irrigation].Apply (amount:0);
                1986-10-22  [Irrigation].Apply (amount:0);
                1986-10-25  [Irrigation].Apply (amount:0);
                1986-10-26  [Irrigation].Apply (amount:0);
                1986-10-28  [Irrigation].Apply (amount:0);
                1986-10-30  [Irrigation].Apply (amount:0);
                1986-11-01  [Irrigation].Apply (amount:0);
                1986-11-03  [Irrigation].Apply (amount:0);
                1986-11-05  [Irrigation].Apply (amount:0);
                1986-11-07  [Irrigation].Apply (amount:0);
              Operations Wet
                1986-09-03  [Irrigation].Apply (amount:10);
                1986-09-05  [Irrigation].Apply (amount:20);
                1986-09-10  [Irrigation].Apply (amount:20);
                1986-09-11  [Irrigation].Apply (amount:10);
                1986-09-14  [Irrigation].Apply (amount:10);
                1986-09-16  [Irrigation].Apply (amount:10);
                1986-09-18  [Irrigation].Apply (amount:10);
                1986-09-21  [Irrigation].Apply (amount:10);
                1986-09-23  [Irrigation].Apply (amount:10);
                1986-09-24  [Irrigation].Apply (amount:20);
                1986-09-30  [Irrigation].Apply (amount:30);
                1986-10-02  [Irrigation].Apply (amount:20);
                1986-10-04  [Irrigation].Apply (amount:20);
                1986-10-10  [Irrigation].Apply (amount:20);
                1986-10-12  [Irrigation].Apply (amount:20);
                1986-10-14  [Irrigation].Apply (amount:20);
                1986-10-16  [Irrigation].Apply (amount:20);
                1986-10-18  [Irrigation].Apply (amount:20);
                1986-10-20  [Irrigation].Apply (amount:20);
                1986-10-22  [Irrigation].Apply (amount:20);
                1986-10-25  [Irrigation].Apply (amount:20);
                1986-10-26  [Irrigation].Apply (amount:20);
                1986-10-28  [Irrigation].Apply (amount:20);
                1986-10-30  [Irrigation].Apply (amount:20);
                1986-11-01  [Irrigation].Apply (amount:20);
                1986-11-03  [Irrigation].Apply (amount:20);
                1986-11-05  [Irrigation].Apply (amount:20);
                1986-11-07  [Irrigation].Apply (amount:20);
        Simulation Mer86Base
          Clock: Start=1986-05-01; End=1986-11-30
          Summary summaryfile
          Weather: FileName=met/MER-86.met
          Zone paddock: Area=1; Slope=0; AspectAngle=0; Altitude=50
            Soil MER-86Field: SoilType=sand; LocalName=Merredin; Site=Merredin; NearestTown=Unknown; Region=WA; NaturalVegetation=Unknown; Latitude=0; Longitude=0
              Physical
                Thickness  BD    AirDry  LL15  DUL   SAT
                100        1.7   0.03    0.03  0.16  0.26
                100        1.75  0.03    0.03  0.21  0.26
                100        1.8   0.03    0.03  0.22  0.25
                100        1.85  0.04    0.05  0.23  0.24
                100        1.85  0.04    0.1   0.22  0.23
                100        1.85  0.04    0.12  0.22  0.22
                100        1.85  0.04    0.17  0.22  0.22
                200        1.85  0.04    0.17  0.22  0.23
                200        1.85  0.04    0.17  0.22  0.23
                200        1.85  0.04    0.17  0.22  0.23
                SoilCrop WheatSoil
                  LL=[0.03, 0.03, 0.03, 0.05, 0.1, 0.12, 0.17, 0.17, 0.17, 0.17]
                  KL=[0.06, 0.06, 0.06, 0.06, 0.06, 0.06, 0.06, 0.06, 0.06, 0.06]
                  XF=[0.2, 0.6, 0.6, 0.6, 0.6, 0.6, 0.6, 0.6, 0.6, 0.6]
              WaterBalance SoilWater: SummerDate=1-Nov; SummerU=6; SummerCona=2; WinterDate=1-Apr; WinterU=6; WinterCona=2; DiffusConst=88; DiffusSlope=35; Salb=0.13; CN2Bare=60; CNRed=20; CNCov=0.8; DischargeWidth=0; CatchmentArea=0; PSIDul=-100
                Thickness  SWCON  KLAT
                100        1      0
                100        1      0
                100        1      0
                100        1      0
                100        0.3    0
                100        1      0
                100        1      0
                200        1      0
                200        1      0
                200        1      0
              Organic: FOMCNRatio=40; CarbonUnits=Total
                Thickness  Carbon  SoilCNRatio  FBiom  FInert  FOM
                100        0.5     13           0.04   0.1     237.652
                100        0.1     13           0.03   0.1     188.677
                100        0.1     13           0.02   0.2     149.795
                100        0.05    13           0.01   0.8     118.926
                100        0.05    13           0.01   0.9     94.4178
                100        0.05    13           0.01   0.9     74.9605
                100        0.05    13           0.01   0.9     59.5128
                200        0.05    13           0.01   0.9     37.5117
                200        0.05    13           0.01   0.9     23.6441
                200        0.05    13           0.01   0.9     14.9032
              Chemical: Thickness=[100, 100, 100, 100, 100, 100, 100, 200, 200, 200]; PH=[4.7, 4.7, 4.7, 6, 6, 6, 6, 6, 6, 6]; PHUnits=Water
              Water: Thickness=[100, 100, 100, 100, 100, 100, 100, 200, 200, 200]; InitialValues=[0.03, 0.03, 0.07, 0.1, 0.22, 0.22, 0.22, 0.22, 0.21, 0.19]; FilledFromTop=false
              Nutrient
              Solute NO3: Thickness=[100, 100, 100, 100, 100, 100, 100, 200, 200, 200]; InitialValues=[10, 5, 0.3, 0, 0, 0, 0, 0, 0, 0]; InitialValuesUnits=ppm; WaterTableConcentration=0; D0=0; DepthConstant=0; MaxDepthSoluteAccessible=0; RunoffEffectivenessAtMovingSolute=0; MaxEffectiveRunoff=0
              Solute NH4: Thickness=[100, 100, 100, 100, 100, 100, 100, 200, 200, 200]; InitialValues=[5, 3, 1, 0, 0, 0, 0, 0, 0, 0]; InitialValuesUnits=ppm; WaterTableConcentration=0; D0=0; DepthConstant=0; MaxDepthSoluteAccessible=0; RunoffEffectivenessAtMovingSolute=0; MaxEffectiveRunoff=0
              Solute Urea: Thickness=[100, 100, 100, 100, 100, 100, 100, 200, 200, 200]; InitialValues=[0, 0, 0, 0, 0, 0, 0, 0, 0, 0]; InitialValuesUnits=kg/ha; WaterTableConcentration=0; D0=0; DepthConstant=0; MaxDepthSoluteAccessible=0; RunoffEffectivenessAtMovingSolute=0; MaxEffectiveRunoff=0
              SoilTemperature Temperature: InteractionsPerDay=8
            Irrigation
            SurfaceOrganicMatter: InitialResidueName=wheat_stubble; InitialResidueType=wheat; InitialResidueMass=0; InitialStandingFraction=0; InitialCPR=0; InitialCNR=80
            Operations SowingOperations
              1986-05-29  [Wheat].Sow(population:149, cultivar:"Gutha", depth:30, rowSpacing:250);
            Plant Wheat
            MicroClimate: a_interception=0; b_interception=1; c_interception=0; d_interception=0; SoilHeatFluxFraction=0.4; MinimumHeightDiffForNewLayer=0; NightInterceptionFraction=0.5; ReferenceHeight=2
            MicroClimate MicroClimate1: a_interception=0; b_interception=1; c_interception=0; d_interception=0; SoilHeatFluxFraction=0.4; MinimumHeightDiffForNewLayer=0; NightInterceptionFraction=0.5; ReferenceHeight=2
            Fertiliser
            Operations FertiliserOperations
              1986-06-14  [Fertiliser].Apply(amount: 15, type: "NO3N", depth: 50);
            Operations IrrigationOperations: same as Validation.Western Australia.Mer86.Factors.Permutation.Water.Wet
            Report DailyReport
            Report HarvestReport
            Manager Harvesting
          SoilArbitrator Soil Arbitrator
          Manager LocationInfo
            Country = Australia
            State = Western Australia
            Region = WA Eastern Zone
            script: same as in Validation.SE Queensland.APS26.APS26NRate160WaterWet.LocationInfo
      Experiment Mer73
        Factors
          Permutation
            Factor NRate: Specification=[FertiliserOperations]
              Operations 0
                1986-06-14  [Fertiliser].Apply(amount: 0, type: "NO3N", depth: 50);
              Operations 15
                1973-06-21  [Fertiliser].Apply(amount: 15, type: "NO3N", depth: 50);
            Factor Water: Specification=[IrrigationOperations]
              Operations Dry: same as Validation.Western Australia.Mer86.Factors.Permutation.Water.Dry
              Operations 40
                1973-09-21  [Irrigation].Apply (amount:40);
              Operations 150
                1973-08-28  [Irrigation].Apply (amount:20);
                1973-09-21  [Irrigation].Apply (amount:30);
                1973-10-12  [Irrigation].Apply (amount:50);
                1973-10-28  [Irrigation].Apply (amount:50);
        Simulation Mer73Base
          Clock: Start=1973-05-01; End=1973-11-30
          Summary summaryfile
          Weather: FileName=met/MER-73.met
          Zone paddock: Area=1; Slope=0; AspectAngle=0; Altitude=50
            Soil MER-73Field: SoilType=sand; LocalName=Merredin; Site=Merredin; NearestTown=Unknown; Region=WA; NaturalVegetation=Unknown; Latitude=0; Longitude=0
              Physical
                Thickness  BD    AirDry  LL15  DUL   SAT
                100        1.7   0.03    0.03  0.15  0.28
                100        1.85  0.03    0.04  0.2   0.27
                100        1.75  0.03    0.04  0.2   0.27
                100        1.7   0.04    0.05  0.2   0.25
                100        1.7   0.04    0.05  0.21  0.25
                100        1.85  0.04    0.08  0.21  0.25
                100        1.95  0.04    0.11  0.21  0.25
                200        2     0.04    0.14  0.21  0.23
                200        2     0.04    0.16  0.23  0.23
                200        2     0.04    0.14  0.23  0.23
                SoilCrop WheatSoil
                  LL=[0.03, 0.03, 0.03, 0.05, 0.1, 0.12, 0.17, 0.17, 0.17, 0.17]
                  KL=[0.06, 0.06, 0.06, 0.06, 0.06, 0.06, 0.06, 0.06, 0.06, 0.06]
                  XF=[0.2, 0.2, 0.4, 0.4, 0.4, 0.4, 0.4, 0.4, 0.2, 0]
              WaterBalance SoilWater: SummerDate=1-Nov; SummerU=6; SummerCona=2; WinterDate=1-Apr; WinterU=6; WinterCona=2; DiffusConst=88; DiffusSlope=35; Salb=0.13; CN2Bare=60; CNRed=20; CNCov=0.8; DischargeWidth=0; CatchmentArea=0; PSIDul=-100
                Thickness  SWCON  KLAT
                100        1      0
                100        1      0
                100        1      0
                100        1      0
                100        0.1    0
                100        1      0
                100        1      0
                200        1      0
                200        1      0
                200        1      0
              Organic: FOMCNRatio=20; CarbonUnits=Total
                Thickness  Carbon  SoilCNRatio  FBiom  FInert  FOM
                100        1.2     13           0.04   0.1     356.478
                100        0.8     13           0.03   0.1     283.016
                100        0.3     13           0.02   0.2     224.693
                100        0.05    13           0.01   0.8     178.389
                100        0.05    13           0.01   0.9     141.627
                100        0.05    13           0.01   0.9     112.441
                100        0.05    13           0.01   0.9     89.2692
                200        0.05    13           0.01   0.9     56.2676
                200        0.05    13           0.01   0.9     35.4662
                200        0.05    13           0.01   0.9     22.3548
              Chemical: Thickness=[100, 100, 100, 100, 100, 100, 100, 200, 200, 200]; PH=[4.7, 4.7, 4.7, 6, 6, 6, 6, 6, 6, 6]; PHUnits=Water
              Water: Thickness=[100, 100, 100, 100, 100, 100, 100, 200, 200, 200]; InitialValues=[0.03, 0.03, 0.07, 0.1, 0.22, 0.22, 0.22, 0.22, 0.21, 0.19]; FilledFromTop=false
              Nutrient
              Solute NO3: Thickness=[100, 100, 100, 100, 100, 100, 100, 200, 200, 200]; InitialValues=[2, 1, 0, 0, 0, 0, 0, 0, 0, 0]; InitialValuesUnits=ppm; WaterTableConcentration=0; D0=0; DepthConstant=0; MaxDepthSoluteAccessible=0; RunoffEffectivenessAtMovingSolute=0; MaxEffectiveRunoff=0
              Solute NH4: Thickness=[100, 100, 100, 100, 100, 100, 100, 200, 200, 200]; InitialValues=[1, 0, 0, 0, 0, 0, 0, 0, 0, 0]; InitialValuesUnits=ppm; WaterTableConcentration=0; D0=0; DepthConstant=0; MaxDepthSoluteAccessible=0; RunoffEffectivenessAtMovingSolute=0; MaxEffectiveRunoff=0
              Solute Urea: same as Validation.Western Australia.Mer86.Mer86Base.paddock.MER-86Field.Urea
              SoilTemperature Temperature: InteractionsPerDay=8
            Irrigation
            SurfaceOrganicMatter: InitialResidueName=wheat_stubble; InitialResidueType=wheat; InitialResidueMass=2500; InitialStandingFraction=0; InitialCPR=0; InitialCNR=30
            Operations SowingOperations
              1973-06-21  [Wheat].Sow(population:100, cultivar:"Gamenya", depth:30, rowSpacing:250);
            Plant Wheat
            MicroClimate: a_interception=0; b_interception=1; c_interception=0; d_interception=0; SoilHeatFluxFraction=0.4; MinimumHeightDiffForNewLayer=0; NightInterceptionFraction=0.5; ReferenceHeight=2
            Fertiliser
            Operations FertiliserOperations
              1986-06-14  [Fertiliser].Apply(amount: 15, type: "NO3N", depth: 50);
            Operations IrrigationOperations: same as Validation.Western Australia.Mer86.Factors.Permutation.Water.Wet
            Report HarvestReport
            Manager Harvesting
            Report DailyReport
          SoilArbitrator Soil Arbitrator
          Manager LocationInfo: same as Validation.Western Australia.Mer86.Mer86Base.LocationInfo
      Experiment Cunderdin97
        Factors
          Permutation
            Factor Sow: Specification=[SowingSchedule]
              Operations SpearEarly
                1997-06-06  [Wheat].Sow(population:150, cultivar:"Spear", depth:30, rowSpacing:250);
              Operations SpearMid
                1997-07-08  [Wheat].Sow(population:108, cultivar:"Spear", depth:30, rowSpacing:250);
              Operations WilgoyneEarly
                1997-06-06  [Wheat].Sow(population:150, cultivar:"Wilgoyne", depth:30, rowSpacing:250);
              Operations WilgoyneMid
                1997-07-08  [Wheat].Sow(population:108, cultivar:"Wilgoyne", depth:30, rowSpacing:250);
              Operations WilgoyneLate
                1997-07-30  [Wheat].Sow(population:100, cultivar:"Wilgoyne", depth:30, rowSpacing:250);
            Factor SowN: Specification=[SowingFertiliser].Script.Amount=0,50
            Factor TopN: Specification=[TopdressFertiliser].Script.Amount=0,30
            Factor Irr: Specification=[IrrigationSchedule]
              Operations Wet
                1997-09-23  [Irrigation].Apply(amount:15);
                1997-10-01  [Irrigation].Apply(amount:15);
                1997-10-06  [Irrigation].Apply(amount:15);
                1997-10-14  [Irrigation].Apply(amount:20);
                1997-10-21  [Irrigation].Apply(amount:17.5);
                1997-10-26  [Irrigation].Apply(amount:17.5);
              Operations Dry
        Simulation Cunderdin97Base
          Clock: Start=1997-04-16; End=1997-12-30
          Summary summaryfile
          Weather: FileName=met/Cunderdin.met
          SoilArbitrator Soil Arbitrator
          Zone paddock: Area=1; Slope=0; AspectAngle=0; Altitude=50
            Irrigation
            Soil: SoilType=heavy; LocalName=Beverley; Site=Cunderdin; NearestTown=Cunderdin; Region=WA; NaturalVegetation=Unknown; Latitude=0; Longitude=0
              Physical
                Thickness  BD   AirDry  LL15   DUL    SAT
                50         1.3  0.034   0.07   0.156  0.48
                50         1.3  0.034   0.07   0.156  0.48
                100        1.4  0.121   0.121  0.22   0.44
                100        1.4  0.123   0.123  0.224  0.44
                100        1.5  0.132   0.132  0.243  0.4
                100        1.5  0.132   0.132  0.243  0.4
                100        1.5  0.135   0.135  0.243  0.4
                100        1.5  0.145   0.145  0.243  0.4
                200        1.5  0.145   0.145  0.243  0.4
                200        1.5  0.145   0.145  0.243  0.4
                200        1.5  0.145   0.145  0.243  0.4
                200        1.5  0.145   0.145  0.243  0.4
                200        1.5  0.145   0.145  0.243  0.4
                200        1.5  0.145   0.145  0.243  0.4
                200        1.5  0.145   0.145  0.243  0.4
                200        1.5  0.145   0.145  0.243  0.4
                200        1.5  0.145   0.145  0.243  0.4
                SoilCrop wheatSoil
                  LL=[0.07, 0.07, 0.121, 0.123, 0.132, 0.132, 0.135, 0.145, 0.145, 0.145, 0.145, 0.145, 0.145, 0.145, 0.145, 0.145, 0.145]
                  KL=[0.06, 0.06, 0.05, 0.05, 0.04, 0.04, 0.04, 0.04, 0.03, 0.03, 0.03, 0.03, 0.03, 0.03, 0.03, 0.03, 0.03]
                  XF=[0.7, 0.6, 0.5, 0.5, 0.5, 0.5, 0.5, 0.5, 0.3, 0.3, 0.3, 0.3, 0.3, 0.3, 0.3, 0.3, 0.3]
              WaterBalance SoilWater: SummerDate=1-Nov; SummerU=7.5; SummerCona=3; WinterDate=1-Apr; WinterU=2; WinterCona=2; DiffusConst=88; DiffusSlope=35; Salb=0.13; CN2Bare=25; CNRed=20; CNCov=0.8; DischargeWidth=0; CatchmentArea=0; PSIDul=-100
                Thickness  SWCON  KLAT
                50         0.6    0
                50         0.6    0
                100        0.6    0
                100        0.6    0
                100        0.6    0
                100        0.6    0
                100        0.6    0
                100        0.6    0
                200        0.6    0
                200        0.6    0
                200        0.6    0
                200        0.6    0
                200        0.6    0
                200        0.6    0
                200        0.6    0
                200        0.6    0
                200        0.6    0
              Organic: FOMCNRatio=40; CarbonUnits=Total
                Thickness  Carbon  SoilCNRatio  FBiom  FInert  FOM
                50         0.73    13           0.03   0.3     69.1755
                50         0.73    13           0.03   0.3     65.1471
                100        0.46    13           0.02   0.3     57.7803
                100        0.39    13           0.01   0.4     51.2465
                100        0.3     13           0.01   0.8     45.4516
                100        0.22    13           0.01   0.9     40.3119
                100        0.19    13           0.01   0.9     35.7535
                100        0.19    13           0.01   0.9     31.7105
                200        0.1     13           0.01   0.9     24.9443
                200        0.1     13           0.01   0.9     19.6219
                200        0.1     13           0.01   0.9     15.4351
                200        0.1     13           0.01   0.9     12.1417
                200        0.1     13           0.01   0.9     9.55101
                200        0.1     13           0.01   0.9     7.51309
                200        0.1     13           0.01   0.9     5.91001
                200        0.1     13           0.01   0.9     4.64898
                200        0.1     13           0.01   0.9     3.65701
              Chemical: PH=[4.7, 4.7, 4.7, 4.7, 6, 6, 6, 6, 6, 6, 6, 6, 6, 6, 6, 6, 6]; PHUnits=Water
                Thickness=[50, 50, 100, 100, 100, 100, 100, 100, 200, 200, 200, 200, 200, 200, 200, 200, 200]
              Water: FilledFromTop=false
                Thickness=[50, 50, 100, 100, 100, 100, 100, 100, 200, 200, 200, 200, 200, 200, 200, 200, 200]
                InitialValues=[0.034, 0.156, 0.22, 0.224, 0.244, 0.245, 0.246, 0.243, 0.24, 0.145, 0.145, 0.145, 0.145, 0.145, 0.145, 0.145, 0.145]
              Nutrient
              Solute NO3: InitialValues=[23, 23, 12, 9, 9, 9, 9, 6, 6, 6, 6, 6, 2, 2, 2, 2, 2]; InitialValuesUnits=ppm; WaterTableConcentration=0; D0=0; DepthConstant=0; MaxDepthSoluteAccessible=0; RunoffEffectivenessAtMovingSolute=0; MaxEffectiveRunoff=0
                Thickness=[50, 50, 100, 100, 100, 100, 100, 100, 200, 200, 200, 200, 200, 200, 200, 200, 200]
              Solute NH4: InitialValues=[2, 2, 1, 2, 1, 1, 1, 1, 1, 1, 1, 1, 1, 1, 1, 1, 1]; InitialValuesUnits=ppm; WaterTableConcentration=0; D0=0; DepthConstant=0; MaxDepthSoluteAccessible=0; RunoffEffectivenessAtMovingSolute=0; MaxEffectiveRunoff=0
                Thickness=[50, 50, 100, 100, 100, 100, 100, 100, 200, 200, 200, 200, 200, 200, 200, 200, 200]
              Solute Urea: InitialValues=[0, 0, 0, 0, 0, 0, 0, 0, 0, 0, 0, 0, 0, 0, 0, 0, 0]; InitialValuesUnits=kg/ha; WaterTableConcentration=0; D0=0; DepthConstant=0; MaxDepthSoluteAccessible=0; RunoffEffectivenessAtMovingSolute=0; MaxEffectiveRunoff=0
                Thickness=[50, 50, 100, 100, 100, 100, 100, 100, 200, 200, 200, 200, 200, 200, 200, 200, 200]
              SoilTemperature Temperature: InteractionsPerDay=8
            SurfaceOrganicMatter: InitialResidueName=wheat_stubble; InitialResidueType=wheat; InitialResidueMass=500; InitialStandingFraction=0; InitialCPR=0; InitialCNR=120
            Fertiliser
            Plant Wheat
            Operations IrrigationSchedule: same as Validation.SE Queensland.APS14.APS14StubbleBareNRate0.paddock.IrrigationSchedule
            MicroClimate: a_interception=0; b_interception=1; c_interception=0; d_interception=0; SoilHeatFluxFraction=0.4; MinimumHeightDiffForNewLayer=0; NightInterceptionFraction=0.5; ReferenceHeight=2
            Operations SowingSchedule
              1993-06-29  [Wheat].Sow(population:114, cultivar:"Hartog", depth:30, rowSpacing:250);
            Manager SowingFertiliser
              Amount = 160
```csharp
using Models.Soils;
using System;
using Models.Core;
using Models.PMF;
using APSIM.Shared.Utilities;

namespace Models
{
    [Serializable]
    public class Script : Model
    {
        [Link] Clock Clock;
        [Link] Fertiliser Fertiliser;
        [Link] Summary Summary;
        
        [Description("Amount of fertiliser to be applied")]
        public double Amount { get; set; }

        [EventSubscribe("Sowing")]
        private void OnSowing(object sender, EventArgs e)
        {
            Fertiliser.Apply(amount: Amount, type: "NO3N");
        }
        
    }
}
```
            Manager TopdressFertiliser
              FertDayOfYear = 239
              Amount = 0
              script: same as in Validation.SE Queensland.APS26.APS26NRate160WaterWet.paddock.ApplyFertiliser
            Report DailyReport
            Report HarvestReport
            Manager Harvesting
          Manager LocationInfo
            Country = Australia
            State = Western Australia
            Region = WA Central Zone
            script: same as in Validation.SE Queensland.APS26.APS26NRate160WaterWet.LocationInfo
      Experiment Wongan83
        Factors
          Permutation
            Factor Soil
              CompositeFactor Ripped: Specifications=[Physical]
                Physical
                  Thickness  BD    AirDry  LL15  DUL   SAT
                  50         1.31  0.04    0.07  0.11  0.35
                  50         1.31  0.05    0.07  0.11  0.35
                  100        1.45  0.05    0.08  0.14  0.35
                  200        1.48  0.05    0.09  0.14  0.35
                  200        1.53  0.05    0.09  0.15  0.35
                  200        1.5   0.05    0.09  0.15  0.35
                  400        1.5   0.05    0.1   0.16  0.35
                  400        1.5   0.05    0.11  0.17  0.35
                  600        1.5   0.05    0.13  0.17  0.35
                  600        1.5   0.05    0.13  0.17  0.35
                  SoilCrop WheatSoil
                    LL=[0.08, 0.08, 0.09, 0.1, 0.11, 0.12, 0.12, 0.12, 0.14, 0.14]
                    KL=[0.06, 0.06, 0.06, 0.06, 0.06, 0.06, 0.06, 0.06, 0.06, 0.06]
                    XF=[1, 1, 1, 1, 1, 1, 1, 1, 1, 1]
              CompositeFactor UnRipped: Specifications=[Physical]
                Physical
                  Thickness  BD    AirDry  LL15  DUL   SAT
                  50         1.31  0.04    0.07  0.11  0.35
                  50         1.31  0.05    0.07  0.11  0.35
                  100        1.45  0.05    0.08  0.14  0.35
                  200        1.48  0.05    0.09  0.14  0.35
                  200        1.53  0.05    0.09  0.15  0.35
                  200        1.5   0.05    0.09  0.15  0.35
                  400        1.5   0.05    0.1   0.16  0.35
                  400        1.5   0.05    0.11  0.17  0.35
                  600        1.5   0.05    0.13  0.17  0.35
                  600        1.5   0.05    0.13  0.17  0.35
                  SoilCrop WheatSoil
                    LL=[0.08, 0.08, 0.09, 0.1, 0.11, 0.12, 0.12, 0.12, 0.14, 0.14]
                    KL=[0.06, 0.06, 0.06, 0.06, 0.06, 0.06, 0.06, 0.06, 0.06, 0.06]
                    XF=[0.2, 0.2, 0.2, 0.7, 1, 1, 1, 1, 1, 1]
            Factor N: Specification=[SowingFertiliser].Script.Amount=0,10,25,50,100
        Simulation WonganBase
          Clock: Start=1983-06-13; End=1983-12-01
          Summary summaryfile
          Weather: FileName=met/Wongan83.met
          Zone paddock: Area=1; Slope=0; AspectAngle=0; Altitude=50
            Irrigation
            Soil WonganSoil: SoilType=sand; LocalName=WonganSite; Site=WonganSite; NearestTown=Unknown; Region=WA; NaturalVegetation=Unknown; Latitude=0; Longitude=0
              Physical
                Thickness  BD    AirDry  LL15  DUL   SAT
                50         1.31  0.04    0.07  0.13  0.35
                50         1.31  0.05    0.07  0.13  0.35
                100        1.45  0.05    0.08  0.14  0.35
                200        1.48  0.05    0.09  0.14  0.35
                200        1.53  0.05    0.09  0.15  0.35
                200        1.5   0.05    0.09  0.15  0.35
                400        1.5   0.05    0.1   0.16  0.35
                400        1.5   0.05    0.11  0.17  0.35
                600        1.5   0.05    0.13  0.17  0.35
                600        1.5   0.05    0.13  0.17  0.35
                SoilCrop WheatSoil
                  LL=[0.08, 0.08, 0.09, 0.1, 0.11, 0.12, 0.12, 0.12, 0.14, 0.14]
                  KL=[0.06, 0.06, 0.06, 0.06, 0.06, 0.06, 0.06, 0.06, 0.06, 0.06]
                  XF=[0.2, 0.2, 0.2, 0.7, 1, 1, 1, 1, 1, 1]
              WaterBalance SoilWater: SummerDate=1-Nov; SummerU=6; SummerCona=2; WinterDate=1-Apr; WinterU=2; WinterCona=2; DiffusConst=88; DiffusSlope=35; Salb=0.13; CN2Bare=60; CNRed=20; CNCov=0.8; PSIDul=-100; Thickness=[50, 50, 100, 200, 200, 200, 400, 400, 600, 600]
                SWCON=[0.35, 0.35, 0.35, 0.35, 0.35, 0.35, 0.35, 0.35, 0.35, 0.35]
              Organic: FOMCNRatio=40; CarbonUnits=Total
                Thickness  Carbon  SoilCNRatio  FBiom  FInert  FOM
                50         1.23    13           0.04   0.1     292.785
                50         0.43    13           0.04   0.1     277.513
                100        0.37    13           0.03   0.1     249.317
                200        0.26    13           0.02   0.2     201.228
                200        0.21    13           0.01   0.8     162.415
                200        0.2     13           0.01   0.9     131.088
                400        0.18    13           0.01   0.9     85.3957
                400        0.18    13           0.01   0.9     55.6301
                600        0.17    13           0.01   0.9     29.2496
                600        0.17    13           0.01   0.9     15.3791
              Chemical: Thickness=[50, 50, 100, 200, 200, 200, 400, 400, 600, 600]; PH=[4.7, 5.1, 5.1, 6, 6, 6, 6, 6, 6, 6]; PHUnits=Water
              Water: Thickness=[50, 50, 100, 200, 200, 200, 400, 400, 600, 600]; InitialValues=[0.07, 0.07, 0.13, 0.14, 0.14, 0.11, 0.1, 0.11, 0.12, 0.13]; FilledFromTop=false
              Nutrient
              Solute NO3: Thickness=[50, 50, 100, 200, 200, 200, 400, 400, 600, 600]; InitialValues=[7, 7, 5, 3, 2, 2, 2, 1, 1, 1]; InitialValuesUnits=ppm; WaterTableConcentration=0; D0=0; DepthConstant=0; MaxDepthSoluteAccessible=0; RunoffEffectivenessAtMovingSolute=0; MaxEffectiveRunoff=0
              Solute NH4: Thickness=[50, 50, 100, 200, 200, 200, 400, 400, 600, 600]; InitialValues=[2, 2, 1, 1, 0, 0, 0, 0, 0, 0]; InitialValuesUnits=ppm; WaterTableConcentration=0; D0=0; DepthConstant=0; MaxDepthSoluteAccessible=0; RunoffEffectivenessAtMovingSolute=0; MaxEffectiveRunoff=0
              Solute Urea: Thickness=[50, 50, 100, 200, 200, 200, 400, 400, 600, 600]; InitialValues=[0, 0, 0, 0, 0, 0, 0, 0, 0, 0]; InitialValuesUnits=kg/ha; WaterTableConcentration=0; D0=0; DepthConstant=0; MaxDepthSoluteAccessible=0; RunoffEffectivenessAtMovingSolute=0; MaxEffectiveRunoff=0
              SoilTemperature Temperature: InteractionsPerDay=8
            SurfaceOrganicMatter: InitialResidueName=wheat_stubble; InitialResidueType=wheat; InitialResidueMass=1000; InitialStandingFraction=0; InitialCPR=0; InitialCNR=20
            Fertiliser
            Plant Wheat
            MicroClimate: a_interception=0; b_interception=1; c_interception=0; d_interception=0; SoilHeatFluxFraction=0.4; MinimumHeightDiffForNewLayer=0; NightInterceptionFraction=0.5; ReferenceHeight=2
            Operations SowingSchedule
              1983-06-14  [Wheat].Sow(population:159, cultivar:"gamenya", depth:80, rowSpacing:250);
              1983-12-01  [Wheat].Harvest();
              1983-12-01  [Wheat].EndCrop();
            Manager SowingFertiliser
              Amount = 0
              script: same as in Validation.Western Australia.Cunderdin97.Cunderdin97Base.paddock.SowingFertiliser
            Report HarvestReport
            Report DailyReport
          SoilArbitrator Soil Arbitrator
          Manager LocationInfo: same as Validation.Western Australia.Cunderdin97.Cunderdin97Base.LocationInfo
      PredictedObserved WAtObsPred: PredictedTableName=HarvestReport; ObservedTableName=Observed; FieldNameUsedForMatch=SimulationName; FieldName2UsedForMatch=Wheat.Phenology.CurrentStageName; AllColumns=false
    Folder Turkey
      Memo
        The dataset of [#Tari2016] includes 4 irrigation deficit treatments applied at each of 3 plant growth stages.  The experiment was conducted at Konya in the Central Anatolia region of Turkey. Yields ranged from 2.88 t/ha to 6.82 t/ha.  These treatments were reproduced over two growing seasons, resulting in 44 individual wheat crops including differing levels of water stress at different stages of development.  Soil data have been estimated from that provided within the original publication.
      Experiment Konya09
        Factors
          Factor Water: Specification=[IrrigationSchedule]
            Operations AAA
              2010-04-09  [Irrigation].Apply(amount:150);
              2010-05-06  [Irrigation].Apply(amount:154);
              2010-05-26  [Irrigation].Apply(amount:152);
            Operations BAA
              2010-04-09  [Irrigation].Apply(amount:97);
              2010-05-06  [Irrigation].Apply(amount:154);
              2010-05-26  [Irrigation].Apply(amount:152);
            Operations CAA
              2010-04-09  [Irrigation].Apply(amount:52);
              2010-05-06  [Irrigation].Apply(amount:154);
              2010-05-26  [Irrigation].Apply(amount:152);
            Operations DAA
              2010-04-09  [Irrigation].Apply(amount:0);
              2010-05-06  [Irrigation].Apply(amount:154);
              2010-05-26  [Irrigation].Apply(amount:152);
            Operations ABA
              2010-04-09  [Irrigation].Apply(amount:150);
              2010-05-06  [Irrigation].Apply(amount:100);
              2010-05-26  [Irrigation].Apply(amount:152);
            Operations ACA
              2010-04-09  [Irrigation].Apply(amount:150);
              2010-05-06  [Irrigation].Apply(amount:54);
              2010-05-26  [Irrigation].Apply(amount:152);
            Operations ADA
              2010-04-09  [Irrigation].Apply(amount:150);
              2010-05-06  [Irrigation].Apply(amount:0);
              2010-05-26  [Irrigation].Apply(amount:152);
            Operations AAB
              2010-04-09  [Irrigation].Apply(amount:150);
              2010-05-06  [Irrigation].Apply(amount:154);
              2010-05-26  [Irrigation].Apply(amount:98);
            Operations AAC
              2010-04-09  [Irrigation].Apply(amount:150);
              2010-05-06  [Irrigation].Apply(amount:154);
              2010-05-26  [Irrigation].Apply(amount:53);
            Operations AAD
              2010-04-09  [Irrigation].Apply(amount:150);
              2010-05-06  [Irrigation].Apply(amount:154);
              2010-05-26  [Irrigation].Apply(amount:0);
            Operations ABB
              2010-04-09  [Irrigation].Apply(amount:150);
              2010-05-06  [Irrigation].Apply(amount:100);
              2010-05-26  [Irrigation].Apply(amount:99);
            Operations ACC
              2010-04-09  [Irrigation].Apply(amount:150);
              2010-05-06  [Irrigation].Apply(amount:54);
              2010-05-26  [Irrigation].Apply(amount:53);
            Operations ADD
              2010-04-09  [Irrigation].Apply(amount:150);
              2010-05-06  [Irrigation].Apply(amount:0);
              2010-05-26  [Irrigation].Apply(amount:0);
            Operations BAB
              2010-04-09  [Irrigation].Apply(amount:97);
              2010-05-06  [Irrigation].Apply(amount:154);
              2010-05-26  [Irrigation].Apply(amount:99);
            Operations CAC
              2010-04-09  [Irrigation].Apply(amount:52);
              2010-05-06  [Irrigation].Apply(amount:154);
              2010-05-26  [Irrigation].Apply(amount:53);
            Operations DAD
              2010-04-09  [Irrigation].Apply(amount:0);
              2010-05-06  [Irrigation].Apply(amount:154);
              2010-05-26  [Irrigation].Apply(amount:0);
            Operations BBA
              2010-04-09  [Irrigation].Apply(amount:97);
              2010-05-06  [Irrigation].Apply(amount:100);
              2010-05-26  [Irrigation].Apply(amount:152);
            Operations CCA
              2010-04-09  [Irrigation].Apply(amount:52);
              2010-05-06  [Irrigation].Apply(amount:54);
              2010-05-26  [Irrigation].Apply(amount:152);
            Operations DDA
              2010-04-09  [Irrigation].Apply(amount:0);
              2010-05-06  [Irrigation].Apply(amount:0);
              2010-05-26  [Irrigation].Apply(amount:152);
            Operations BBB
              2010-04-09  [Irrigation].Apply(amount:97);
              2010-05-06  [Irrigation].Apply(amount:100);
              2010-05-26  [Irrigation].Apply(amount:99);
            Operations CCC
              2010-04-09  [Irrigation].Apply(amount:52);
              2010-05-06  [Irrigation].Apply(amount:54);
              2010-05-26  [Irrigation].Apply(amount:53);
            Operations DDD
              2010-04-09  [Irrigation].Apply(amount:0);
              2010-05-06  [Irrigation].Apply(amount:0);
              2010-05-26  [Irrigation].Apply(amount:0);
        Simulation Konya09
          Clock: Start=2009-11-12; End=2010-07-30
          Summary summaryfile
          Weather: FileName=met/Konya.met
          SoilArbitrator Soil Arbitrator
          Zone paddock: Area=1; Slope=0; AspectAngle=0; Altitude=50
            Irrigation
            Fertiliser
            SurfaceOrganicMatter: InitialResidueName=wheat; InitialResidueType=wheat; InitialResidueMass=1000; InitialStandingFraction=0; InitialCPR=0; InitialCNR=80
            Plant Wheat
            Operations CropSchedule
              2009-11-12  [Wheat].Sow(population:360, cultivar:"Konya", depth:20, rowSpacing:135);
              2009-11-12  [Fertiliser].Apply(amount: 80, type: "UreaN");
              2010-02-01  [Fertiliser].Apply(amount: 80, type: "UreaN");
              2010-07-14  [Wheat].Harvest();
              2010-07-14  [Wheat].EndCrop();
            Operations IrrigationSchedule
            MicroClimate: a_interception=0; b_interception=1; c_interception=0; d_interception=0; SoilHeatFluxFraction=0.4; MinimumHeightDiffForNewLayer=0; NightInterceptionFraction=0.5; ReferenceHeight=2
            Soil: Site=Konya; NearestTown=Konya; Region=Central Anatolia; Country=Turkey; Latitude=0; Longitude=0
              Physical
                Thickness  BD    AirDry  LL15  DUL    SAT
                150        1.56  0.05    0.12  0.253  0.411
                150        1.56  0.12    0.12  0.253  0.411
                300        1.56  0.12    0.12  0.253  0.41
                300        1.56  0.12    0.12  0.253  0.41
                300        1.56  0.12    0.12  0.25   0.4
                400        1.56  0.12    0.12  0.25   0.4
                400        1.56  0.12    0.12  0.25   0.4
                SoilCrop WheatSoil: LL=[0.12, 0.12, 0.12, 0.12, 0.25, 0.25, 0.25]; KL=[0.06, 0.06, 0.04, 0.02, 0.02, 0.01, 0.01]; XF=[1, 1, 1, 1, 1, 1, 1]
              WaterBalance SoilWater: SummerDate=1-Apr; SummerU=6; SummerCona=3.5; WinterDate=1-Nov; WinterU=2; WinterCona=2; DiffusConst=44; DiffusSlope=16; Salb=0.13; CN2Bare=75; CNRed=20; CNCov=0.8; PSIDul=-100; Thickness=[150, 150, 300, 300, 300, 300, 300, 300]; SWCON=[0.5, 0.4, 0.3, 0.3, 0.2, 0.1, 0.1, 0.1]
              Organic: FOMCNRatio=45; CarbonUnits=Total
                Thickness  Carbon  SoilCNRatio  FBiom  FInert  FOM
                150        1       12.5         0.03   0.4     468.708
                150        0.5     12.5         0.02   0.6     378.303
                300        0.5     12.5         0.02   0.7     246.441
                300        0.5     12.5         0.02   0.8     160.541
                300        0.5     12.5         0.01   0.9     104.583
                300        0.5     12.5         0.01   0.9     68.1294
                300        0.5     12.5         0.01   1       44.3822
                300        0.5     12.5         0.01   1       28.9123
              Chemical: Thickness=[150, 150, 300, 300, 300, 300, 300, 300]; PH=[7.9, 7.9, 7.9, 8, 8, 8, 8, 8]; PHUnits=Water
              Water: Thickness=[150, 150, 300, 300, 300, 400, 400]; InitialValues=[0.253, 0.253, 0.253, 0.253, 0.25, 0.25, 0.25]; FilledFromTop=false
              Nutrient
              Solute NO3: Thickness=[150, 150, 300, 300, 300, 300, 300, 300]; InitialValues=[10, 10, 10, 10, 2, 2, 2, 2]; InitialValuesUnits=ppm; WaterTableConcentration=0; D0=0; DepthConstant=0; MaxDepthSoluteAccessible=0; RunoffEffectivenessAtMovingSolute=0; MaxEffectiveRunoff=0
              Solute NH4: Thickness=[150, 150, 300, 300, 300, 300, 300, 300]; InitialValues=[0, 0, 0, 0, 0, 0, 0, 0]; InitialValuesUnits=ppm; WaterTableConcentration=0; D0=0; DepthConstant=0; MaxDepthSoluteAccessible=0; RunoffEffectivenessAtMovingSolute=0; MaxEffectiveRunoff=0
              Solute Urea: Thickness=[150, 150, 300, 300, 300, 300, 300, 300]; InitialValues=[0, 0, 0, 0, 0, 0, 0, 0]; InitialValuesUnits=kg/ha; WaterTableConcentration=0; D0=0; DepthConstant=0; MaxDepthSoluteAccessible=0; RunoffEffectivenessAtMovingSolute=0; MaxEffectiveRunoff=0
              SoilTemperature Temperature: InteractionsPerDay=8
            Report DailyReport
            Report HarvestReport
          Manager LocationInfo
            Country =
            State =
            Region =
            script: same as in Validation.SE Queensland.APS26.APS26NRate160WaterWet.LocationInfo
      Experiment Konya11
        Factors
          Factor Water: Specification=[IrrigationSchedule]
            Operations AAA
              2012-04-16  [Irrigation].Apply(amount:100);
              2012-05-21  [Irrigation].Apply(amount:148);
              2012-06-08  [Irrigation].Apply(amount:161);
            Operations BAA
              2012-04-16  [Irrigation].Apply(amount:65);
              2012-05-21  [Irrigation].Apply(amount:148);
              2012-06-08  [Irrigation].Apply(amount:161);
            Operations CAA
              2012-04-16  [Irrigation].Apply(amount:35);
              2012-05-21  [Irrigation].Apply(amount:148);
              2012-06-08  [Irrigation].Apply(amount:161);
            Operations DAA
              2012-04-16  [Irrigation].Apply(amount:0);
              2012-05-21  [Irrigation].Apply(amount:148);
              2012-06-08  [Irrigation].Apply(amount:161);
            Operations ABA
              2012-04-16  [Irrigation].Apply(amount:100);
              2012-05-21  [Irrigation].Apply(amount:96);
              2012-06-08  [Irrigation].Apply(amount:161);
            Operations ACA
              2012-04-16  [Irrigation].Apply(amount:100);
              2012-05-21  [Irrigation].Apply(amount:52);
              2012-06-08  [Irrigation].Apply(amount:161);
            Operations ADA
              2012-04-16  [Irrigation].Apply(amount:100);
              2012-05-21  [Irrigation].Apply(amount:0);
              2012-06-08  [Irrigation].Apply(amount:161);
            Operations AAB
              2012-04-16  [Irrigation].Apply(amount:100);
              2012-05-21  [Irrigation].Apply(amount:148);
              2012-06-08  [Irrigation].Apply(amount:105);
            Operations AAC
              2012-04-16  [Irrigation].Apply(amount:100);
              2012-05-21  [Irrigation].Apply(amount:148);
              2012-06-08  [Irrigation].Apply(amount:56);
            Operations AAD
              2012-04-16  [Irrigation].Apply(amount:100);
              2012-05-21  [Irrigation].Apply(amount:148);
              2012-06-08  [Irrigation].Apply(amount:0);
            Operations ABB
              2012-04-16  [Irrigation].Apply(amount:100);
              2012-05-21  [Irrigation].Apply(amount:96);
              2012-06-08  [Irrigation].Apply(amount:105);
            Operations ACC
              2012-04-16  [Irrigation].Apply(amount:100);
              2012-05-21  [Irrigation].Apply(amount:52);
              2012-06-08  [Irrigation].Apply(amount:56);
            Operations ADD
              2012-04-16  [Irrigation].Apply(amount:100);
              2012-05-21  [Irrigation].Apply(amount:0);
              2012-06-08  [Irrigation].Apply(amount:0);
            Operations BAB
              2012-04-16  [Irrigation].Apply(amount:65);
              2012-05-21  [Irrigation].Apply(amount:148);
              2012-06-08  [Irrigation].Apply(amount:105);
            Operations CAC
              2012-04-16  [Irrigation].Apply(amount:35);
              2012-05-21  [Irrigation].Apply(amount:148);
              2012-06-08  [Irrigation].Apply(amount:56);
            Operations DAD
              2012-04-16  [Irrigation].Apply(amount:0);
              2012-05-21  [Irrigation].Apply(amount:148);
              2012-06-08  [Irrigation].Apply(amount:0);
            Operations BBA
              2012-04-16  [Irrigation].Apply(amount:65);
              2012-05-21  [Irrigation].Apply(amount:96);
              2012-06-08  [Irrigation].Apply(amount:161);
            Operations CCA
              2012-04-16  [Irrigation].Apply(amount:35);
              2012-05-21  [Irrigation].Apply(amount:52);
              2012-06-08  [Irrigation].Apply(amount:161);
            Operations DDA
              2012-04-16  [Irrigation].Apply(amount:0);
              2012-05-21  [Irrigation].Apply(amount:0);
              2012-06-08  [Irrigation].Apply(amount:161);
            Operations BBB
              2012-04-16  [Irrigation].Apply(amount:65);
              2012-05-21  [Irrigation].Apply(amount:96);
              2012-06-08  [Irrigation].Apply(amount:105);
            Operations CCC
              2012-04-16  [Irrigation].Apply(amount:35);
              2012-05-21  [Irrigation].Apply(amount:52);
              2012-06-08  [Irrigation].Apply(amount:56);
            Operations DDD
              2012-04-16  [Irrigation].Apply(amount:0);
              2012-05-21  [Irrigation].Apply(amount:0);
              2012-06-08  [Irrigation].Apply(amount:0);
        Simulation Konya11
          Clock: Start=2011-11-16; End=2012-07-30
          Summary summaryfile
          Weather: FileName=met/Konya.met
          SoilArbitrator Soil Arbitrator
          Zone paddock: Area=1; Slope=0; AspectAngle=0; Altitude=50
            Irrigation
            Fertiliser
            SurfaceOrganicMatter: InitialResidueName=canola; InitialResidueType=canola; InitialResidueMass=1000; InitialStandingFraction=0; InitialCPR=0; InitialCNR=80
            Plant Wheat
            Operations CropSchedule
              2011-11-16  [Wheat].Sow(population:360, cultivar:"Konya", depth:50, rowSpacing:135);
              2011-11-16  [Fertiliser].Apply(amount: 80, type: "UreaN");
              2012-02-01  [Fertiliser].Apply(amount: 80, type: "UreaN");
              2012-07-16  [Wheat].Harvest();
              2012-07-16  [Wheat].EndCrop();
            Operations IrrigationSchedule
            MicroClimate: a_interception=0; b_interception=1; c_interception=0; d_interception=0; SoilHeatFluxFraction=0.4; MinimumHeightDiffForNewLayer=0; NightInterceptionFraction=0.5; ReferenceHeight=2
            Soil: Site=Konya; NearestTown=Konya; Region=Central Anatolia; Country=Turkey; Latitude=0; Longitude=0
              Physical: same as Validation.Turkey.Konya09.Konya09.paddock.Soil.Physical
              WaterBalance SoilWater: SummerDate=1-Apr; SummerU=6; SummerCona=3.5; WinterDate=1-Nov; WinterU=2; WinterCona=2; DiffusConst=44; DiffusSlope=16; Salb=0.13; CN2Bare=84; CNRed=20; CNCov=0.8; PSIDul=-100; Thickness=[150, 150, 300, 300, 300, 300, 300, 300]; SWCON=[0.5, 0.4, 0.3, 0.3, 0.2, 0.1, 0.1, 0.1]
              Organic: same as Validation.Turkey.Konya09.Konya09.paddock.Soil.Organic
              Chemical: Thickness=[150, 150, 300, 300, 300, 300, 300, 300]; PH=[7.9, 7.9, 7.9, 8, 8, 8, 8, 8]; PHUnits=Water
              Water: Thickness=[150, 150, 300, 300, 300, 400, 400]; InitialValues=[0.253, 0.253, 0.253, 0.253, 0.25, 0.25, 0.25]; FilledFromTop=false
              Nutrient
              Solute NO3: same as Validation.Turkey.Konya09.Konya09.paddock.Soil.NO3
              Solute NH4: same as Validation.Turkey.Konya09.Konya09.paddock.Soil.NH4
              Solute Urea: same as Validation.Turkey.Konya09.Konya09.paddock.Soil.Urea
              SoilTemperature Temperature: InteractionsPerDay=8
            Report DailyReport
            Report HarvestReport
          Manager LocationInfo: same as Validation.Turkey.Konya09.Konya09.LocationInfo
    Folder New Zealand
      Experiment PalmerstonNorth1989
        Memo
          The design, management and yield results of this trial have been described in full by [#Craigie_Wheat_2015].  In brief, this trial was conducted to assess the impact of earlier sowing on potential yields of 'Wakanui' wheat grown at Wakanui (the cultivar was named after the area) in Mid Canterbury, New Zealand.  it was a 4 x 4 factorial with 4 replicates of the following treatments:

          1. Sowing date (20 February, 10 March, 28 March, 23 April)
          2. Sowing density (50,100,150 and 200 plants/m^2^

          In addition to yield, measurements of leaf appearance and senescence and canopy cover (measured with NDVI)  were measured at 10 - 14 day intervals and biomass measurements were taken at growth stages 32 and 65.

          Considerable canopy decay was observed during the winter for the early sown treatments and we have not introduced mechanisms into the model to capture this yet so there is a genral over prediction of canopy size and biomass in these first sowing dates.
        Factors
          Permutation
            Factor Sow
              Specification=[Sowing].Script.SowDate = 2-Jun,24-Jul,18-Sep,25-Nov,21-Feb,5-Apr
            Factor Cv: Specification=[Sowing].Script.CultivarName = BattenSpring,Otane,Rongotea
        Simulation PalmerstonNorth1989Base
          Clock: Start=1989-06-01; End=1991-06-01
          Summary summaryfile
          Weather: FileName=met/PalmerstonNorth.met
          Zone paddock: Area=1; Slope=0; AspectAngle=0; Altitude=50
            Manager Sowing
              SowDate =
              CultivarName = Wakanui
              SowingDepth = 15
              RowSpacing = 150
              Population = 150
```csharp
using Models.Soils.Nutrients;
using System;
using Models.Core;
using Models.PMF;
using Models.Soils;
using Models.Soils.Nutrients;
using Models.Utilities;
using APSIM.Shared.Utilities;

namespace Models
{
    [Serializable]
    public class Script : Model
    {
        [Link] Clock Clock;
        [Link] Summary Summary;
        [Link] Soil Soil;
        [Link] Plant Wheat;
        Accumulator accumulatedRain;
        
        [Description("Sowing date (d-mmm)")]
        public string SowDate { get; set; }
        [Description("Cultivar to be sown")]
        public string CultivarName { get; set; }
        [Description("Sowing depth (mm)")]
        public double SowingDepth { get; set; }
        [Description("Row spacing (mm)")]
        public double RowSpacing { get; set; }
        [Description("Plant population (/m2)")]
        public double Population { get; set; }

        public bool IsSown {get;set;}

        [EventSubscribe("StartOfSimulation")]
        private void OnStartOfSimulation(object sender, EventArgs e)
        {
            IsSown = false;
        }

        [EventSubscribe("DoManagement")]
        private void OnDoManagement(object sender, EventArgs e)
        {
            if ((DateUtilities.WithinDates(SowDate, Clock.Today, SowDate))&&IsSown==false)
            {
                IsSown=true;
                Wheat.Sow(population: Population, cultivar: CultivarName, depth: SowingDepth, rowSpacing: RowSpacing);    
            }
        }
        
    }
}
```
            Operations HarvestEvents
              1991-02-04  [Wheat].Harvest();
              1991-02-04  [Wheat].EndCrop();
            Irrigation
            Soil: SoilType=LincolnSoil; LocalName=Lincoln; Site=Lincoln; NearestTown=Unknown; Region=NZ; NaturalVegetation=Unknown; Latitude=0; Longitude=0
              Physical
                Thickness  ParticleSizeSand  ParticleSizeSilt  ParticleSizeClay  Rocks  BD   AirDry  LL15  DUL   SAT
                100        5                 65                30                0      1.3  0.05    0.08  0.31  0.44
                200        5                 65                30                0      1.3  0.05    0.07  0.3   0.44
                200        5                 65                30                0      1.3  0.05    0.07  0.28  0.44
                200        5                 65                30                0      1.3  0.05    0.09  0.31  0.44
                200        5                 65                30                0      1.3  0.05    0.11  0.3   0.44
                200        5                 65                30                0      1.3  0.05    0.16  0.28  0.44
                200        5                 65                30                0      1.3  0.05    0.15  0.3   0.44
                200        5                 65                30                0      1.3  0.05    0.12  0.34  0.44
                1000       5                 65                30                0      1.3  0.05    0.12  0.34  0.44
                Rocks, ParticleSizeSand, ParticleSizeSilt, ParticleSizeClay source: Calculated
                SoilCrop WheatSoil: LL=[0.08, 0.07, 0.07, 0.09, 0.11, 0.16, 0.15, 0.12, 0.12]; KL=[0.06, 0.06, 0.06, 0.06, 0.03, 0.02, 0.02, 0.02, 0.02]; XF=[1, 1, 1, 1, 1, 1, 1, 1, 1]
              WaterBalance SoilWater: SummerDate=1-Nov; SummerU=7; SummerCona=3; WinterDate=1-Apr; WinterU=7; WinterCona=3; DiffusConst=40; DiffusSlope=16; Salb=0.2; CN2Bare=75; CNRed=20; CNCov=0.8; DischargeWidth=0; CatchmentArea=0; PSIDul=-100
                Thickness  SWCON  KLAT
                100        0.6    0
                200        0.6    0
                200        0.6    0
                200        0.6    0
                200        0.6    0
                200        0.6    0
                200        0.6    0
                200        0.6    0
              Organic: FOMCNRatio=15; CarbonUnits=Total
                Thickness  Carbon  SoilCNRatio  FBiom  FInert  FOM
                100        4       11           0.04   0.31    1031.07
                200        3       11           0.03   0.4     691.146
                200        2       11           0.02   0.5     463.289
                200        1       11           0.01   0.6     310.552
                200        1       11           0.01   0.7     208.169
                200        1       11           0.01   0.9     139.54
                200        0.9     11           0.01   0.99    93.5364
                200        0.9     11           0.01   0.99    62.6993
              Chemical: PHUnits=Water
                Thickness  PH  CEC
                100        6   17.345
                200        6   15.095
                200        6   12.845
                200        6   10.595
                200        6   10.595
                200        6   10.595
                200        6   10.37
                200        6   10.37
                CEC source: Calculated
              Water: Thickness=[100, 200, 200, 200, 200, 200, 200, 200]; InitialValues=[0.24, 0.27, 0.26, 0.23, 0.24, 0.23, 0.23, 0.18]; FilledFromTop=false
              Nutrient
              Solute NO3: Thickness=[100, 200, 200, 200, 200, 200, 200, 200]; InitialValuesUnits=ppm; WaterTableConcentration=0; D0=0; DepthConstant=0; MaxDepthSoluteAccessible=0; RunoffEffectivenessAtMovingSolute=0; MaxEffectiveRunoff=0
                InitialValues=[30.7692, 11.5385, 7.69231, 3.84615, 3.84615, 3.84615, 3.84615, 3.84615]
              Solute NH4: Thickness=[100, 200, 200, 200, 200, 200, 200, 200]; InitialValues=[1.3, 1, 1, 0.8, 0.8, 0.5, 0.5, 0.5]; InitialValuesUnits=ppm; WaterTableConcentration=0; D0=0; DepthConstant=0; MaxDepthSoluteAccessible=0; RunoffEffectivenessAtMovingSolute=0; MaxEffectiveRunoff=0
              Solute Urea: Thickness=[100, 200, 200, 200, 200, 200, 200, 200]; InitialValues=[0, 0, 0, 0, 0, 0, 0, 0]; InitialValuesUnits=kg/ha; WaterTableConcentration=0; D0=0; DepthConstant=0; MaxDepthSoluteAccessible=0; RunoffEffectivenessAtMovingSolute=0; MaxEffectiveRunoff=0
              SoilTemperature Temperature: InteractionsPerDay=8
            SurfaceOrganicMatter Surface Organic Matter: InitialResidueName=wheat_stubble; InitialResidueType=whiteclover; InitialResidueMass=1000; InitialStandingFraction=0; InitialCPR=0; InitialCNR=25
            Fertiliser
            MicroClimate: a_interception=0; b_interception=1; c_interception=0; d_interception=0; SoilHeatFluxFraction=0.4; MinimumHeightDiffForNewLayer=0; NightInterceptionFraction=0.5; ReferenceHeight=2
            Plant Wheat
            Report DailyReport
            Report HarvestReport
          SoilArbitrator Soil Arbitrator
          Manager LocationInfo
            Country = New Zealand
            State = Manawatu-Wanganui Region
            Region =
            script: same as in Validation.SE Queensland.APS26.APS26NRate160WaterWet.LocationInfo
      Experiment Lincoln1991
        Memo
          This is a water response trial run in the rain out shelter at Plant and Food Research in Lincoln, New Zealand.  It is described in full by [#Jamieson_WaterResponse_1995] but briefly.  A winter crop of 'Batten' wheat was sown at 300 plants/m^2^ on the 8th of June 1991 and range of irrigation amount and timing treatments were applied.  Six of these treatments have been included in this validation:

          01. Full irrigation where measured ET was replaced weekly
          03. Short Early Drought where irrigation was withheld from sowing until late October then full irrigation was applied
          05. Long Early Drought where irrigation was withheld from sowing until mid December then full irrigation was applied
          06. Long Late Drought where full irrigation was applied from sowing until mid September then withheld for the rest of the season
          07. Moderate Late Drought where full irrigation was applied from sowing until mid October then withheld for the rest of the season
          08. Short Late Drought where full irrigation was applied from sowing until Early November then withheld for the rest of the season
          11. Nil where no water was applied and the crop grew on soil stored water only.

          Irrigation was applied at weekly intervals through and assemply of low rate drip emitters on each plot.  Soil water content was measured weekly with a neutron probe and biomass was measured at 10 - 14 day intervals.  Samples throughtout the crop were from two 0.1m^2^ quatrants and the final harvest sample was from a 1 m^2^ quadrant.  Each treatment was replicated twice and there was considerable soil variation from plot to plot so each treatment was initianilised with unique soil parameters which best described the soil they were growing on.
        Factors
          Factor Irrig
            CompositeFactor 01
              Specifications:
                [IrrigationEvents]
                [Physical]
                [Water].Thickness=200,200,200,200,200,200,200,200
                [Water].InitialValues=0.27,0.3,0.28,0.25,0.24,0.27,0.27,0.21
              Operations IrrigationEvents
                1991-06-10  [Irrigation].Apply(7);
                1991-08-16  [Irrigation].Apply(7);
                1991-08-29  [Irrigation].Apply(20);
                1991-09-07  [Irrigation].Apply(12);
                1991-09-12  [Irrigation].Apply(22);
                1991-09-19  [Irrigation].Apply(4);
                1991-09-26  [Irrigation].Apply(7);
                1991-10-03  [Irrigation].Apply(27);
                1991-10-10  [Irrigation].Apply(18);
                1991-10-17  [Irrigation].Apply(30);
                1991-10-24  [Irrigation].Apply(42);
                1991-10-31  [Irrigation].Apply(33);
                1991-11-07  [Irrigation].Apply(24);
                1991-11-14  [Irrigation].Apply(28);
                1991-11-21  [Irrigation].Apply(37);
                1991-11-27  [Irrigation].Apply(51);
                1991-12-05  [Irrigation].Apply(36);
                1991-12-12  [Irrigation].Apply(38);
                1991-12-19  [Irrigation].Apply(35);
                1991-12-26  [Irrigation].Apply(47);
                1992-01-03  [Irrigation].Apply(40);
                1992-01-09  [Irrigation].Apply(41);
              Physical
                Thickness  BD   AirDry  LL15  DUL   SAT
                200        1.3  0.08    0.08  0.29  0.44
                200        1.3  0.07    0.07  0.3   0.4
                200        1.3  0.07    0.07  0.28  0.4
                200        1.3  0.09    0.09  0.26  0.38
                200        1.3  0.11    0.11  0.26  0.38
                200        1.3  0.16    0.16  0.28  0.38
                200        1.3  0.15    0.15  0.27  0.38
                200        1.3  0.12    0.12  0.22  0.38
                SoilCrop WheatSoil: LL=[0.08, 0.07, 0.07, 0.09, 0.11, 0.16, 0.15, 0.12]; KL=[0.05, 0.03, 0.02, 0.03, 0.03, 0.03, 0.01, 0.01]; XF=[1, 1, 1, 1, 1, 1, 1, 1]
            CompositeFactor 03
              Specifications:
                [IrrigationEvents]
                [Physical]
                [Water].Thickness=200,200,200,200,200,200,200,200
                [Water].InitialValues=0.279,0.2677,0.2491,0.2705,0.311,0.2536,0.2764,0.1422
              Operations IrrigationEvents
                1991-06-10  [Irrigation].Apply(7);
                1991-08-16  [Irrigation].Apply(7);
                1991-08-29  [Irrigation].Apply(20);
                1991-09-26  [Irrigation].Apply(7);
                1991-10-24  [Irrigation].Apply(42);
                1991-10-31  [Irrigation].Apply(33);
                1991-11-07  [Irrigation].Apply(24);
                1991-11-14  [Irrigation].Apply(28);
                1991-11-21  [Irrigation].Apply(37);
                1991-11-27  [Irrigation].Apply(51);
                1991-12-05  [Irrigation].Apply(36);
                1991-12-12  [Irrigation].Apply(38);
                1991-12-19  [Irrigation].Apply(35);
                1991-12-26  [Irrigation].Apply(47);
                1992-01-03  [Irrigation].Apply(40);
                1992-01-09  [Irrigation].Apply(41);
              Physical
                Thickness  BD   AirDry  LL15  DUL     SAT
                200        1.3  0.05    0.08  0.279   0.44
                200        1.3  0.05    0.12  0.2677  0.44
                200        1.3  0.05    0.12  0.26    0.44
                200        1.3  0.05    0.12  0.2705  0.44
                200        1.3  0.05    0.15  0.311   0.44
                200        1.3  0.05    0.16  0.2536  0.44
                200        1.3  0.05    0.15  0.2764  0.44
                200        1.3  0.05    0.08  0.1422  0.44
                SoilCrop WheatSoil: LL=[0.08, 0.12, 0.12, 0.12, 0.15, 0.16, 0.15, 0.08]; KL=[0.05, 0.03, 0.02, 0.03, 0.03, 0.03, 0.01, 0.01]; XF=[1, 1, 1, 1, 1, 1, 1, 1]
            CompositeFactor 05
              Specifications:
                [IrrigationEvents]
                [Physical]
                [Water].Thickness=200,200,200,200,200,200,200,200
                [Water].InitialValues=0.2655,0.27,0.209,0.3114,0.3079,0.3007,0.2871,0.3117
              Operations IrrigationEvents
                1991-06-10  [Irrigation].Apply(7);
                1991-08-16  [Irrigation].Apply(7);
                1991-08-29  [Irrigation].Apply(20);
                1991-09-26  [Irrigation].Apply(7);
                1991-12-19  [Irrigation].Apply(35);
                1991-12-26  [Irrigation].Apply(47);
                1992-01-03  [Irrigation].Apply(40);
              Physical
                Thickness  BD   AirDry  LL15  DUL     SAT
                200        1.3  0.06    0.06  0.31    0.44
                200        1.3  0.09    0.09  0.3     0.44
                200        1.3  0.07    0.07  0.28    0.44
                200        1.3  0.12    0.12  0.3114  0.44
                200        1.3  0.16    0.16  0.3079  0.44
                200        1.3  0.16    0.16  0.3007  0.44
                200        1.3  0.15    0.15  0.2871  0.44
                200        1.3  0.16    0.16  0.3117  0.44
                SoilCrop WheatSoil: LL=[0.06, 0.09, 0.07, 0.12, 0.16, 0.16, 0.15, 0.16]; KL=[0.05, 0.03, 0.02, 0.03, 0.03, 0.03, 0.01, 0.01]; XF=[1, 1, 1, 1, 1, 1, 1, 1]
            CompositeFactor 06
              Specifications:
                [IrrigationEvents]
                [Physical]
                [Water].Thickness=200,200,200,200,200,200,200,200
                [Water].InitialValues=0.2805,0.2796,0.27,0.296,0.231,0.2453,0.2042,0.156
              Operations IrrigationEvents
                1991-06-10  [Irrigation].Apply(7);
                1991-08-16  [Irrigation].Apply(7);
                1991-08-29  [Irrigation].Apply(20);
                1991-09-07  [Irrigation].Apply(12);
                1991-09-12  [Irrigation].Apply(22);
                1991-09-19  [Irrigation].Apply(14);
                1991-09-26  [Irrigation].Apply(7);
              Physical
                Thickness  BD   AirDry  LL15  DUL    SAT
                200        1.3  0.08    0.08  0.281  0.44
                200        1.3  0.08    0.08  0.28   0.44
                200        1.3  0.09    0.09  0.27   0.44
                200        1.3  0.12    0.12  0.296  0.44
                200        1.3  0.11    0.11  0.231  0.44
                200        1.3  0.16    0.16  0.245  0.44
                200        1.3  0.1     0.1   0.204  0.44
                200        1.3  0.08    0.08  0.156  0.44
                SoilCrop WheatSoil: LL=[0.08, 0.08, 0.09, 0.12, 0.11, 0.16, 0.1, 0.08]; KL=[0.05, 0.03, 0.02, 0.03, 0.03, 0.03, 0.01, 0.01]; XF=[1, 1, 1, 1, 1, 1, 1, 1]
            CompositeFactor 07
              Specifications:
                [IrrigationEvents]
                [Physical]
                [Water].Thickness=200,200,200,200,200,200,200,200
                [Water].InitialValues=0.278,0.2682,0.2536,0.2364,0.2635,0.277,0.3392,0.2
              Operations IrrigationEvents
                1991-06-10  [Irrigation].Apply(7);
                1991-08-16  [Irrigation].Apply(7);
                1991-08-29  [Irrigation].Apply(20);
                1991-09-07  [Irrigation].Apply(12);
                1991-09-12  [Irrigation].Apply(22);
                1991-09-19  [Irrigation].Apply(14);
                1991-09-26  [Irrigation].Apply(7);
                1991-10-03  [Irrigation].Apply(27);
                1991-10-10  [Irrigation].Apply(18);
                1991-10-17  [Irrigation].Apply(30);
              Physical
                Thickness  BD   AirDry  LL15  DUL     SAT
                200        1.3  0.08    0.08  0.31    0.44
                200        1.3  0.07    0.07  0.27    0.44
                200        1.3  0.06    0.06  0.2536  0.44
                200        1.3  0.09    0.09  0.2364  0.44
                200        1.3  0.15    0.15  0.2635  0.44
                200        1.3  0.16    0.16  0.277   0.44
                200        1.3  0.15    0.15  0.3392  0.44
                200        1.3  0.08    0.08  0.2     0.44
                SoilCrop WheatSoil: LL=[0.08, 0.07, 0.06, 0.09, 0.15, 0.16, 0.15, 0.08]; KL=[0.05, 0.03, 0.02, 0.03, 0.03, 0.03, 0.01, 0.01]; XF=[1, 1, 1, 1, 1, 1, 1, 1]
            CompositeFactor 08
              Specifications:
                [IrrigationEvents]
                [Physical]
                [Water].Thickness=200,200,200,200,200,200,200,200
                [Water].InitialValues=0.281,0.2785,0.2754,0.2698,0.252,0.2672,0.2623,0.1995
              Operations IrrigationEvents
                1991-06-10  [Irrigation].Apply(7);
                1991-08-16  [Irrigation].Apply(7);
                1991-08-29  [Irrigation].Apply(20);
                1991-09-07  [Irrigation].Apply(12);
                1991-09-12  [Irrigation].Apply(22);
                1991-09-19  [Irrigation].Apply(14);
                1991-09-26  [Irrigation].Apply(7);
                1991-10-03  [Irrigation].Apply(27);
                1991-10-10  [Irrigation].Apply(18);
                1991-10-17  [Irrigation].Apply(30);
                1991-10-24  [Irrigation].Apply(42);
                1991-10-31  [Irrigation].Apply(33);
                1991-11-07  [Irrigation].Apply(24);
              Physical
                Thickness  BD   AirDry  LL15  DUL     SAT
                200        1.3  0.08    0.08  0.31    0.44
                200        1.3  0.12    0.12  0.2785  0.44
                200        1.3  0.09    0.09  0.2754  0.44
                200        1.3  0.09    0.09  0.2698  0.44
                200        1.3  0.13    0.13  0.252   0.44
                200        1.3  0.16    0.16  0.2672  0.44
                200        1.3  0.15    0.15  0.2623  0.44
                200        1.3  0.1     0.1   0.1995  0.44
                SoilCrop WheatSoil: LL=[0.08, 0.12, 0.09, 0.09, 0.13, 0.16, 0.15, 0.1]; KL=[0.05, 0.03, 0.02, 0.03, 0.03, 0.03, 0.01, 0.01]; XF=[1, 1, 1, 1, 1, 1, 1, 1]
            CompositeFactor 11
              Specifications:
                [IrrigationEvents]
                [Physical]
                [Water].Thickness=200,200,200,200,200,200,200,200
                [Water].InitialValues=0.2375,0.2666,0.2634,0.2309,0.238,0.2339,0.2282,0.1847
              Operations IrrigationEvents
                1991-06-10  [Irrigation].Apply(7);
                1991-08-16  [Irrigation].Apply(7);
                1991-09-26  [Irrigation].Apply(7);
              Physical
                Thickness  BD   AirDry  LL15  DUL     SAT
                200        1.3  0.07    0.07  0.31    0.44
                200        1.3  0.11    0.11  0.2666  0.44
                200        1.3  0.12    0.12  0.2634  0.44
                200        1.3  0.09    0.09  0.2309  0.34
                200        1.3  0.15    0.15  0.238   0.24
                200        1.3  0.17    0.17  0.2339  0.34
                200        1.3  0.12    0.12  0.2282  0.3
                200        1.3  0.09    0.09  0.1847  0.28
                SoilCrop WheatSoil: LL=[0.07, 0.11, 0.12, 0.09, 0.15, 0.17, 0.12, 0.09]; KL=[0.05, 0.03, 0.02, 0.03, 0.03, 0.03, 0.01, 0.005]; XF=[1, 1, 1, 1, 1, 1, 1, 1]
        Simulation LincolnBase
          Clock: Start=1991-06-08; End=1992-02-28
          Summary summaryfile
          Weather: FileName=met/lincoln.met
          Zone paddock: Area=1; Slope=0; AspectAngle=0; Altitude=50
            Operations
              1991-06-08  [Wheat].Sow(population:250, cultivar:"BattenSpring", depth:40, rowSpacing:150);
            Operations IrrigationEvents
              1991-08-30  [Irrigation].Apply(0);
              1991-09-08  [Irrigation].Apply(0);
              1991-09-13  [Irrigation].Apply(0);
              1991-09-20  [Irrigation].Apply(0);
              1991-10-04  [Irrigation].Apply(0);
              1991-10-11  [Irrigation].Apply(18);
              1991-10-18  [Irrigation].Apply(30);
              1991-10-25  [Irrigation].Apply(42);
              1991-11-01  [Irrigation].Apply(33);
              1991-11-08  [Irrigation].Apply(24);
              1991-11-15  [Irrigation].Apply(28);
              1991-11-22  [Irrigation].Apply(37);
              1991-11-28  [Irrigation].Apply(51);
              1991-12-06  [Irrigation].Apply(36);
              1991-12-13  [Irrigation].Apply(38);
              1991-12-20  [Irrigation].Apply(35);
              1991-12-27  [Irrigation].Apply(47);
              1992-01-04  [Irrigation].Apply(40);
              1992-01-10  [Irrigation].Apply(41);
            Operations FertiliserEvents
              1991-06-10  [Fertiliser].Apply(30, "NO3N", 0);
              1991-08-16  [Fertiliser].Apply(100, "NO3N",0);
              1991-09-26  [Fertiliser].Apply(50, "NO3N",0);
            Operations HarvestOperations
              1992-01-21  [Wheat].Harvest();
              1992-01-21  [Wheat].EndCrop();
            Irrigation
            Soil Templeton Silt Loam: SoilType=LincolnSoil; LocalName=Lincoln; Site=Lincoln; NearestTown=Unknown; Region=NZ; NaturalVegetation=Unknown; Latitude=0; Longitude=0
              Physical
                Thickness  ParticleSizeSand  ParticleSizeSilt  ParticleSizeClay  Rocks  BD   AirDry  LL15  DUL   SAT
                100        5                 65                30                0      1.3  0.05    0.08  0.31  0.44
                200        5                 65                30                0      1.3  0.05    0.07  0.3   0.44
                200        5                 65                30                0      1.3  0.05    0.07  0.28  0.44
                200        5                 65                30                0      1.3  0.05    0.09  0.31  0.44
                200        5                 65                30                0      1.3  0.05    0.11  0.3   0.44
                200        5                 65                30                0      1.3  0.05    0.16  0.28  0.44
                200        5                 65                30                0      1.3  0.05    0.15  0.3   0.44
                200        5                 65                30                0      1.3  0.05    0.12  0.34  0.44
                Rocks, ParticleSizeSand, ParticleSizeSilt, ParticleSizeClay source: Calculated
                SoilCrop WheatSoil: LL=[0.08, 0.07, 0.07, 0.09, 0.11, 0.16, 0.15, 0.12]; KL=[0.06, 0.06, 0.06, 0.04, 0.03, 0.02, 0.02, 0.02]; XF=[1, 1, 1, 1, 1, 1, 1, 1]
              WaterBalance SoilWater: SummerDate=1-Nov; SummerU=7; SummerCona=3; WinterDate=1-Apr; WinterU=3; WinterCona=2; DiffusConst=0; DiffusSlope=0; Salb=0.2; CN2Bare=75; CNRed=20; CNCov=0.8; DischargeWidth=0; CatchmentArea=0; PSIDul=-100
                Thickness  SWCON  KLAT
                100        0.6    0
                200        0.6    0
                200        0.6    0
                200        0.6    0
                200        0.6    0
                200        0.6    0
                200        0.6    0
                200        0.6    0
              Organic: FOMCNRatio=30; CarbonUnits=Total
                Thickness  Carbon  SoilCNRatio  FBiom  FInert  FOM
                100        0.35    11           0.04   0.31    0
                200        0.27    11           0.03   0.31    0
                200        0.24    11           0.02   0.31    0
                200        0.16    11           0.01   0.31    0
                200        0.16    11           0.01   0.31    0
                200        0.3     11           0.01   0.25    0
                200        0.1     11           0.01   0.2     0
                200        0.1     11           0.01   0.2     0
              Chemical: PHUnits=Water
                Thickness  PH   CEC
                100        8.5  9.1325
                200        8.5  8.9525
                200        8.6  8.885
                200        8.6  8.705
                200        8.6  8.705
                200        8.6  9.02
                200        8.6  8.57
                200        8.6  8.57
                CEC source: Calculated
              Water: Thickness=[100, 200, 200, 200, 200, 200, 200, 200]; InitialValues=[0.27, 0.3, 0.28, 0.25, 0.24, 0.27, 0.27, 0.21]; FilledFromTop=false
              Nutrient
              Solute NO3: Thickness=[100, 200, 200, 200, 200, 200, 200, 200]; InitialValues=[24.9, 16, 9.8, 9.8, 2.1, 2.1, 2.1, 2.1]; InitialValuesUnits=ppm; WaterTableConcentration=0; D0=0; DepthConstant=0; MaxDepthSoluteAccessible=0; RunoffEffectivenessAtMovingSolute=0; MaxEffectiveRunoff=0
              Solute NH4: same as Validation.New Zealand.PalmerstonNorth1989.PalmerstonNorth1989Base.paddock.Soil.NH4
              Solute Urea: same as Validation.New Zealand.PalmerstonNorth1989.PalmerstonNorth1989Base.paddock.Soil.Urea
              SoilTemperature Temperature: InteractionsPerDay=8
            SurfaceOrganicMatter Surface Organic Matter: InitialResidueName=wheat_stubble; InitialResidueType=wheat; InitialResidueMass=1000; InitialStandingFraction=0; InitialCPR=0; InitialCNR=80
            Fertiliser
            MicroClimate: a_interception=0; b_interception=1; c_interception=0; d_interception=0; SoilHeatFluxFraction=0.4; MinimumHeightDiffForNewLayer=0; NightInterceptionFraction=0.5; ReferenceHeight=2
            Plant Wheat
            Manager ResetSW
              reset_date = 09/02/1991 00:00:00
```csharp
using Models.Interfaces;
using APSIM.Shared.Utilities;
using Models.Surface;
using Models.Soils;
using Models.PMF.OilPalm;
using Models.PMF;
using Models.Core;
using System;
using Models.Soils.Nutrients;

namespace Models
{
    [Serializable]
    [System.Xml.Serialization.XmlInclude(typeof(Model))]
    public class Script : Model
    {
        [Link] private Clock Clock;
        [Link] private Soil Soil;
        [Link] private SurfaceOrganicMatter SurfaceOM;
        [Link]
        private ISoilWater waterBalance;
        [Description("Reset date")]
        public DateTime reset_date { get; set; }

        
        [EventSubscribe("DoManagement")]
        private void OnDoManagement(object sender, EventArgs e)
        {
            if (Clock.Today == reset_date)
                waterBalance.Reset();
        }
    }
}
```
            Manager ClimateControl
              StartDate = 06/08/1991 00:00:00
              EndDate = 12/31/1992 00:00:00
```csharp
using Models.Soils;
using System.Xml.Serialization;
using Models;
using Models.PMF;
using System.Text;
using System.Collections.Generic;
using APSIM.Shared.Utilities;
using Models.Core;
using System;
using Models.Climate;

namespace Models
{
    [Serializable] 
    [System.Xml.Serialization.XmlInclude(typeof(Model))]
    public class Script : Model
    {
        [Link] Weather Met;
        [Link] Clock Clock;
    
        [Description("Start Date")]
        public DateTime StartDate { get; set; }
        
        [Description("End Date")]
        public DateTime EndDate { get; set; }
 
    
        [EventSubscribe("PreparingNewWeatherData")]
        private void OnPreparingNewWeatherData(object sender, EventArgs e)
        {
            if ((Clock.Today.Date >= StartDate) && (Clock.Today.Date <= EndDate))
                Met.Rain = 0;        
        }
    }
}
```
            Report DailyReport
            Report HarvestReport
          SoilArbitrator Soil Arbitrator
          Manager LocationInfo
            Country = New Zealand
            State = Canterbury Region
            Region =
            script: same as in Validation.SE Queensland.APS26.APS26NRate160WaterWet.LocationInfo
      Experiment Lincoln1992
        Memo
          This trial has never been formally written up.  It was conducted at Plant and Foods A Block, Lincoln, New Zealand with 'Batten' Wheat grown on a Templeton silt loam (160mm AWC/m).  It was a 2 x 2 x 4 factorial with the following treatments:

          1. Sowing Date (5 May 1992 and 5 Aug 1992)
          2. Irrigation (Nil and 120 mm)
          3. Nitrogen (0, Low, Medium and High)

          The N applied to the Low, Medium and High N treatments was 100, 150 and 250 kg/ha, respectively, for the May sowing and 50, 100 and 150, respectively, for the August sowing.

          Could not find informaiton confirming sowing rate so assumed typical values of 300 plants per m/2  for the spring sowing 100 plants per m/2 for May sowing.
          Emergence was recorded as the 28th of May for the first planting.  The model was predicting this early so delayed sowing date to get emergence date correct..
        Factors
          Permutation
            Factor Sow
              CompositeFactor 5May
                Specifications:
                  [Operations]
                  [Fertilise].Script.SDSwitch = 1.0
                Operations
                  1992-05-15  [Wheat].Sow(population:100, cultivar:"BattenSpring", depth:40, rowSpacing:150);
              CompositeFactor 5Aug
                Specifications:
                  [Operations]
                  [Fertilise].Script.SDSwitch = 0.0
                Operations
                  1992-08-05  [Wheat].Sow(population:300, cultivar:"BattenSpring", depth:20, rowSpacing:150);
            Factor Nit
              CompositeFactor 0
                Specifications:
                  [Fertilise].Script.Amount1 = 0.0
                  [Fertilise].Script.Amount2 = 0.0
                  [Fertilise].Script.Amount3 = 0.0
                  [Fertilise].Script.Amount4 = 0.0
              CompositeFactor 1
                Specifications:
                  [Fertilise].Script.Amount1 = 50
                  [Fertilise].Script.Amount2 = 50
                  [Fertilise].Script.Amount3 = 0.0
                  [Fertilise].Script.Amount4 = 0.0
              CompositeFactor 2
                Specifications:
                  [Fertilise].Script.Amount1 = 50.0
                  [Fertilise].Script.Amount2 = 100.0
                  [Fertilise].Script.Amount3 = 0.0
                  [Fertilise].Script.Amount4 = 0.0
              CompositeFactor 3
                Specifications:
                  [Fertilise].Script.Amount1 = 50.0
                  [Fertilise].Script.Amount2 = 100.0
                  [Fertilise].Script.Amount3 = 50.0
                  [Fertilise].Script.Amount4 = 50.0
        Simulation SDtrialBase
          Clock: Start=1992-05-01; End=1993-05-01
          Summary summaryfile
          Weather: FileName=met/lincoln.met
          Zone paddock: Area=1; Slope=0; AspectAngle=0; Altitude=50
            Operations
            Operations IrrigationEvents
            Operations HarvestOperations
              1993-03-03  [Wheat].Harvest();
              1993-03-03  [Wheat].EndCrop();
            Manager Fertilise
              FertDate1 = 05-Aug
              FertDate2 = 01-Oct
              FertDate3 = 20-Oct
              FertDate4 = 25-Nov
              Amount1 = 0
              Amount2 = 0
              Amount3 = 0
              Amount4 = 0
              SDSwitch = 0
```csharp
using Models.Soils;
using System;
using Models.Core;
using Models.PMF;
using APSIM.Shared.Utilities;
namespace Models
{
    [Serializable]
    public class Script : Model
    {
        [Link] Clock Clock;
        [Link] Fertiliser Fertiliser;
        
        [Description("Date to fertilise")]
        public string FertDate1 { get; set; }
        [Description("Date to fertilise")]
        public string FertDate2 { get; set; }
        [Description("Date to fertilise")]
        public string FertDate3 { get; set; }
        [Description("Date to fertilise")]
        public string FertDate4 { get; set; }
        
        [Description("Amount of fertiliser to be applied (kg/ha)")]
        public double Amount1 { get; set; }
        [Description("Amount of fertiliser to be applied (kg/ha)")]
        public double Amount2 { get; set; }
        [Description("Amount of fertiliser to be applied (kg/ha)")]
        public double Amount3 { get; set; }
        [Description("Amount of fertiliser to be applied (kg/ha)")]
        public double Amount4 { get; set; }
        
        [Description("Amount of fertiliser to be applied (kg/ha)")]
        public double SDSwitch { get; set; }
        
        [EventSubscribe("DoManagement")]
        private void OnDoManagement(object sender, EventArgs e)
        {
            if (DateUtilities.WithinDates(FertDate1, Clock.Today, FertDate1))
                Fertiliser.Apply(amount: Amount1 * SDSwitch, type: "NO3N");
            if (DateUtilities.WithinDates(FertDate2, Clock.Today, FertDate2))
                Fertiliser.Apply(amount: Amount2, type: "NO3N");
            if (DateUtilities.WithinDates(FertDate3, Clock.Today, FertDate3))
                Fertiliser.Apply(amount: Amount3, type: "NO3N");
            if (DateUtilities.WithinDates(FertDate4, Clock.Today, FertDate4))
                Fertiliser.Apply(amount: Amount4 * SDSwitch, type: "NO3N");
        }
    }
}
```
            Irrigation
            Soil Templeton Silt Loam: SoilType=LincolnSoil; LocalName=Lincoln; Site=Lincoln; NearestTown=Unknown; Region=NZ; NaturalVegetation=Unknown; Latitude=0; Longitude=0
              Physical
                Thickness  ParticleSizeSand  ParticleSizeSilt  ParticleSizeClay  Rocks  BD   AirDry  LL15  DUL   SAT
                100        5                 65                30                0      1.3  0.08    0.12  0.31  0.44
                200        5                 65                30                0      1.3  0.12    0.12  0.3   0.44
                200        5                 65                30                0      1.3  0.1     0.1   0.28  0.44
                200        5                 65                30                0      1.3  0.09    0.09  0.31  0.44
                200        5                 65                30                0      1.3  0.11    0.11  0.3   0.44
                200        5                 65                30                0      1.3  0.16    0.16  0.28  0.44
                100        5                 65                30                0      1.3  0.15    0.15  0.3   0.44
                200        5                 65                30                0      1.3  0.12    0.12  0.34  0.44
                200        5                 65                30                0      1.3  0.12    0.12  0.34  0.44
                Rocks, ParticleSizeSand, ParticleSizeSilt, ParticleSizeClay source: Calculated (layer 1, 2, 3, 4, 5, 6, 7, 8)
                SoilCrop WheatSoil: LL=[0.12, 0.12, 0.1, 0.09, 0.11, 0.16, 0.15, 0.12, 0.12]; KL=[0.06, 0.06, 0.06, 0.04, 0.03, 0.02, 0.02, 0.02, 0.02]; XF=[1, 1, 1, 1, 1, 1, 1, 1, 1]
                  LL, XF source: Calculated (layer 9)
              WaterBalance SoilWater: same as Validation.New Zealand.PalmerstonNorth1989.PalmerstonNorth1989Base.paddock.Soil.SoilWater
              Organic: FOMCNRatio=30; CarbonUnits=Total
                Thickness  Carbon  SoilCNRatio  FBiom  FInert  FOM
                100        2.4     11.5         0.025  0.3     171.845
                200        2.1     11.5         0.025  0.4     115.191
                200        1.6     11.5         0.015  0.75    77.2148
                200        1.03    11.5         0.01   0.9     51.7586
                200        0.47    11.5         0.01   0.96    34.6949
                200        0.47    11.5         0.01   0.96    23.2567
                200        0.47    11.5         0.01   0.96    15.5894
                200        0.47    11.5         0.01   0.96    10.4499
              Chemical: PHUnits=Water
                Thickness  PH   CEC
                100        6.6  13.745
                200        6.2  13.07
                200        5.7  11.945
                200        5.5  10.6625
                200        5.5  9.4025
                200        5.5  9.4025
                200        5.5  9.4025
                200        5.5  9.4025
                CEC source: Calculated
              Water: Thickness=[100, 200, 200, 200, 200, 200, 100, 200, 200]; InitialValues=[0.31, 0.3, 0.28, 0.31, 0.3, 0.28, 0.3, 0.34, 0.34]; FilledFromTop=false
              Nutrient
              Solute NO3: Thickness=[100, 200, 200, 200, 200, 200, 200, 200]; InitialValuesUnits=ppm; WaterTableConcentration=0; D0=0; DepthConstant=0; MaxDepthSoluteAccessible=0; RunoffEffectivenessAtMovingSolute=0; MaxEffectiveRunoff=0
                InitialValues=[19.2308, 4.23077, 4.23077, 3.84615, 3.46154, 1.53846, 1.15385, 0.769231]
              Solute NH4: Thickness=[100, 200, 200, 200, 200, 200, 200, 200]; InitialValues=[0.39, 0.6, 0.6, 0.5, 0.5, 0.5, 0.5, 0.5]; InitialValuesUnits=ppm; WaterTableConcentration=0; D0=0; DepthConstant=0; MaxDepthSoluteAccessible=0; RunoffEffectivenessAtMovingSolute=0; MaxEffectiveRunoff=0
              Solute Urea: same as Validation.New Zealand.PalmerstonNorth1989.PalmerstonNorth1989Base.paddock.Soil.Urea
              SoilTemperature Temperature: InteractionsPerDay=8
            SurfaceOrganicMatter Surface Organic Matter: InitialResidueName=wheat_stubble; InitialResidueType=wheat; InitialResidueMass=0; InitialStandingFraction=0; InitialCPR=0; InitialCNR=80
            Fertiliser
            MicroClimate: a_interception=0; b_interception=1; c_interception=0; d_interception=0; SoilHeatFluxFraction=0.4; MinimumHeightDiffForNewLayer=0; NightInterceptionFraction=0.5; ReferenceHeight=2
            Plant Wheat
            Report DailyReport
            Report HarvestReport
          SoilArbitrator Soil Arbitrator
          Manager LocationInfo: same as Validation.New Zealand.Lincoln1991.LincolnBase.LocationInfo
      Experiment Lincoln1994
        Memo: same as Validation.New Zealand.PalmerstonNorth1989.Memo
        Factors
          Permutation
            Factor Sow: Specification=[Sowing].Script.SowDate = 5-Apr,20-Jun,1-Sep,27-Oct,22-Dec
            Factor Cv: Specification=[Sowing].Script.CultivarName = BattenSpring,BattenWinter
        Simulation Lincoln1994Base
          Clock: Start=1994-04-01; End=1995-12-01
          Summary summaryfile
          Weather: FileName=met/lincoln.met
          Zone paddock: Area=1; Slope=0; AspectAngle=0; Altitude=50
            Manager Sowing
              SowDate =
              CultivarName = Wakanui
              SowingDepth = 50
              RowSpacing = 150
              Population = 150
```csharp
using Models.Soils.Nutrients;
using System;
using Models.Core;
using Models.PMF;
using Models.Soils;
using Models.Soils.Nutrients;
using Models.Utilities;
using APSIM.Shared.Utilities;

namespace Models
{
    [Serializable]
    public class Script : Model
    {
        [Link] Clock Clock;
        [Link] Summary Summary;
        [Link] Soil Soil;
        [Link] Plant Wheat;
        Accumulator accumulatedRain;
        
        [Description("Sowing date (d-mmm)")]
        public string SowDate { get; set; }
        [Description("Cultivar to be sown")]
        public string CultivarName { get; set; }
        [Description("Sowing depth (mm)")]
        public double SowingDepth { get; set; }
        [Description("Row spacing (mm)")]
        public double RowSpacing { get; set; }
        [Description("Plant population (/m2)")]
        public double Population { get; set; }

        public bool IsSown {get;set;}

        [EventSubscribe("StartOfSimulation")]
        private void OnStartOfSimulation(object sender, EventArgs e)
        {
            IsSown = false;
        }

        [EventSubscribe("DoManagement")]
        private void OnDoManagement(object sender, EventArgs e)
        {
            if ((DateUtilities.WithinDates(SowDate, Clock.Today, SowDate))&&IsSown==false)
            {
                IsSown=true;
                Wheat.Sow(population: Population, cultivar: CultivarName, depth: SowingDepth, rowSpacing: RowSpacing);    
                if(SowDate == "05-Apr")
                {
                    Wheat.Phenology.SetPhaseCompletionDate("13-Apr","Emerging");
                }
                if(SowDate == "20-Jun")
                {
                    Wheat.Phenology.SetPhaseCompletionDate("22-Jul","Emerging");
                }
                if(SowDate == "1-Sep")
                {
                    Wheat.Phenology.SetPhaseCompletionDate("19-Sep","Emerging");
                }
                if(SowDate == "27-Oct")
                {
                    Wheat.Phenology.SetPhaseCompletionDate("5-Nov","Emerging");
                }
                if(SowDate == "22-Dec")
                {
                    Wheat.Phenology.SetPhaseCompletionDate("30-Dec","Emerging");
                }
              
            }
        }
        
    }
}
```
            Operations HarvestEvents
              1995-12-01  [Wheat].Harvest();
              1995-12-01  [Wheat].EndCrop();
            Irrigation
            Soil: SoilType=LincolnSoil; LocalName=Lincoln; Site=Lincoln; NearestTown=Unknown; Region=NZ; NaturalVegetation=Unknown; Latitude=0; Longitude=0
              Physical Templeton Silt Loam: same as Validation.New Zealand.PalmerstonNorth1989.PalmerstonNorth1989Base.paddock.Soil.Physical
              WaterBalance SoilWater: same as Validation.New Zealand.PalmerstonNorth1989.PalmerstonNorth1989Base.paddock.Soil.SoilWater
              Organic: same as Validation.New Zealand.PalmerstonNorth1989.PalmerstonNorth1989Base.paddock.Soil.Organic
              Chemical: same as Validation.New Zealand.PalmerstonNorth1989.PalmerstonNorth1989Base.paddock.Soil.Chemical
              Water: Thickness=[100, 200, 200, 200, 200, 200, 200, 200]; InitialValues=[0.24, 0.27, 0.26, 0.23, 0.24, 0.23, 0.23, 0.18]; FilledFromTop=false
              Nutrient
              Solute NO3: same as Validation.New Zealand.PalmerstonNorth1989.PalmerstonNorth1989Base.paddock.Soil.NO3
              Solute NH4: same as Validation.New Zealand.PalmerstonNorth1989.PalmerstonNorth1989Base.paddock.Soil.NH4
              Solute Urea: same as Validation.New Zealand.PalmerstonNorth1989.PalmerstonNorth1989Base.paddock.Soil.Urea
              SoilTemperature Temperature: InteractionsPerDay=8
            SurfaceOrganicMatter Surface Organic Matter: InitialResidueName=wheat_stubble; InitialResidueType=whiteclover; InitialResidueMass=1000; InitialStandingFraction=0; InitialCPR=0; InitialCNR=25
            Fertiliser
            MicroClimate: a_interception=0; b_interception=1; c_interception=0; d_interception=0; SoilHeatFluxFraction=0.4; MinimumHeightDiffForNewLayer=0; NightInterceptionFraction=0.5; ReferenceHeight=2
            Plant Wheat
            Report DailyReport
            Report HarvestReport
          SoilArbitrator Soil Arbitrator
          Manager LocationInfo: same as Validation.New Zealand.Lincoln1991.LincolnBase.LocationInfo
      Experiment Lincoln2010
        Factors
          Permutation
            Factor Sow
              CompositeFactor 27Aug
                Specifications:
                  [Operations]
                  [Fertilise].Script.SDSwitch = 1.0
                Operations
                  2010-09-04  [Wheat].Sow(population:200, cultivar:"Conquest", depth:40, rowSpacing:150);
              CompositeFactor 27Sep
                Specifications:
                  [Operations]
                  [Fertilise].Script.SDSwitch = 0.0
                Operations
                  2010-09-27  [Wheat].Sow(population:200, cultivar:"Conquest", depth:40, rowSpacing:150);
            Factor Irr: Specification=[IrrigationEvents]
              Operations Full
                2010-11-02  [Irrigation].Apply(31);
                2010-11-15  [Irrigation].Apply(39);
                2010-11-23  [Irrigation].Apply(8);
                2010-11-24  [Irrigation].Apply(19);
                2010-12-01  [Irrigation].Apply(39);
                2010-12-08  [Irrigation].Apply(25);
                2010-12-15  [Irrigation].Apply(37);
                2010-12-22  [Irrigation].Apply(32);
                2010-12-29  [Irrigation].Apply(18);
                2011-01-12  [Irrigation].Apply(27);
              Operations Half
                2010-11-02  [Irrigation].Apply(16);
                2010-11-15  [Irrigation].Apply(20);
                2010-11-23  [Irrigation].Apply(8);
                2010-11-24  [Irrigation].Apply(10);
                2010-12-01  [Irrigation].Apply(19);
                2010-12-08  [Irrigation].Apply(12);
                2010-12-15  [Irrigation].Apply(18);
                2010-12-22  [Irrigation].Apply(16);
                2010-12-29  [Irrigation].Apply(9);
                2011-01-12  [Irrigation].Apply(13);
              Operations Half2
                2010-11-02  [Irrigation].Apply(0);
                2010-11-15  [Irrigation].Apply(36);
                2010-11-23  [Irrigation].Apply(8);
                2010-11-24  [Irrigation].Apply(0);
                2010-12-01  [Irrigation].Apply(29);
                2010-12-08  [Irrigation].Apply(0);
                2010-12-15  [Irrigation].Apply(30);
                2010-12-22  [Irrigation].Apply(0);
                2010-12-29  [Irrigation].Apply(25);
                2011-01-12  [Irrigation].Apply(0);
              Operations Nil
                2010-11-23  [Irrigation].Apply(8);
        Memo
          - Could not find informaiton confirming sowing rate.  Protocole said aim for 300 plants per m/2 which is usual for a spring sowing but very high for an Autumn sowing.  Assumed 100 plants per m/2 for May sowing and 300 for August.
          - Emergence was recorded as the 28th of May for the first planting.  The model was predicting this early so delayed sowing date to get emergence date correct..
        Simulation Baxters
          Clock: Start=2010-08-27; End=2011-03-30
          Summary summaryfile
          Weather: FileName=met/lincoln.met
          Zone paddock: Area=1; Slope=0; AspectAngle=0; Altitude=50
            Operations
            Operations IrrigationEvents
            Manager Fertilise: same as Validation.New Zealand.Lincoln1992.SDtrialBase.paddock.Fertilise
            Irrigation
            SurfaceOrganicMatter Surface Organic Matter: InitialResidueName=wheat_stubble; InitialResidueType=wheat; InitialResidueMass=0; InitialStandingFraction=0; InitialCPR=0; InitialCNR=80
            Fertiliser
            MicroClimate: a_interception=0; b_interception=1; c_interception=0; d_interception=0; SoilHeatFluxFraction=0.4; MinimumHeightDiffForNewLayer=0; NightInterceptionFraction=0.5; ReferenceHeight=2
            Plant Wheat
            Report DailyReport
            Report HarvestReport
            Soil: Latitude=0; Longitude=0
              Chemical: PHUnits=Water
                Thickness  PH   CEC
                100        6.6  12.44
                200        6.2  11.6525
                300        5.7  11.045
                300        5.5  10.6625
                300        5.5  9.4025
                300        5.5  9.4025
                CEC source: Calculated
              Physical Lismore Shallow Silt Loam
                Thickness  ParticleSizeSand  ParticleSizeSilt  ParticleSizeClay  Rocks     BD   AirDry  LL15  DUL   SAT
                200        5                 65                30                0         1.2  0.05    0.1   0.32  0.46
                200        5                 65                30                0         1.2  0.1     0.1   0.32  0.46
                200        5                 65                30                0.213941  1.2  0.07    0.07  0.13  0.4
                200        5                 65                30                0.410456  1.2  0.07    0.07  0.1   0.3
                200        5                 65                30                0.410456  1.2  0.08    0.08  0.11  0.3
                200        5                 65                30                0.410456  1.2  0.07    0.07  0.1   0.3
                200        5                 65                30                0.410456  1.2  0.07    0.07  0.1   0.3
                200        5                 65                30                0.410456  1.2  0.07    0.07  0.1   0.3
                Rocks, ParticleSizeSand, ParticleSizeSilt, ParticleSizeClay source: Calculated
                SoilCrop WheatSoil: LL=[0.1, 0.1, 0.07, 0.07, 0.08, 0.07, 0.07, 0.07]; KL=[0.06, 0.06, 0.06, 0.06, 0.04, 0.025, 0.01, 0.005]; XF=[1, 1, 1, 1, 1, 1, 1, 1]
              WaterBalance SoilWater: SummerDate=1-Nov; SummerU=6; SummerCona=2; WinterDate=1-Apr; WinterU=9; WinterCona=4.4; DiffusConst=0; DiffusSlope=0; Salb=0.18; CN2Bare=68; CNRed=20; CNCov=0.8; DischargeWidth=0; CatchmentArea=0; PSIDul=-100
                Thickness  SWCON  KLAT
                200        0.7    0
                200        0.7    0
                200        0.95   0
                200        0.95   0
                200        0.95   0
                200        0.95   0
                200        0.95   0
                200        0.95   0
              Organic: FOMCNRatio=30; CarbonUnits=Total
                Thickness  Carbon  SoilCNRatio  FBiom  FInert  FOM
                100        1.82    11.5         0.025  0.3     1243.93
                200        1.47    11.5         0.025  0.4     833.832
                300        1.2     11.5         0.015  0.75    457.617
                300        1.03    11.5         0.01   0.9     251.145
                300        0.47    11.5         0.01   0.96    137.831
                300        0.47    11.5         0.01   0.96    75.6435
              Water: Thickness=[200, 200, 200, 200, 200, 200, 200, 200]; InitialValues=[0.29, 0.28, 0.16, 0.15, 0.1, 0.1, 0.11, 0.12]; FilledFromTop=false
              Nutrient
              Solute NO3: Thickness=[100, 200, 300, 300, 300, 300]; InitialValues=[180.8333, 12.5, 1.3889, 1.3889, 0, 0]; InitialValuesUnits=ppm; WaterTableConcentration=0; D0=0; DepthConstant=0; MaxDepthSoluteAccessible=0; RunoffEffectivenessAtMovingSolute=0; MaxEffectiveRunoff=0
              Solute NH4: Thickness=[100, 200, 300, 300, 300, 300]; InitialValues=[0, 0, 0, 0, 0, 0]; InitialValuesUnits=ppm; WaterTableConcentration=0; D0=0; DepthConstant=0; MaxDepthSoluteAccessible=0; RunoffEffectivenessAtMovingSolute=0; MaxEffectiveRunoff=0
              Solute Urea: Thickness=[100, 200, 300, 300, 300, 300]; InitialValues=[0, 0, 0, 0, 0, 0]; InitialValuesUnits=kg/ha; WaterTableConcentration=0; D0=0; DepthConstant=0; MaxDepthSoluteAccessible=0; RunoffEffectivenessAtMovingSolute=0; MaxEffectiveRunoff=0
              SoilTemperature Temperature: InteractionsPerDay=8
            Operations HarvestOperations
              2011-02-11  [Wheat].Harvest();
              2011-02-11  [Wheat].EndCrop();
          SoilArbitrator Soil Arbitrator
          Manager LocationInfo: same as Validation.New Zealand.Lincoln1991.LincolnBase.LocationInfo
        Memo Memo1
          This is a water response trial run in the rain out shelter at Plant and Food Research in Lincoln, New Zealand.  It is described in full by [#Chakwizira_wheat_2014] but briefly.  An Autumn crop of 'Wakanui' wheat was sown at 165 plants/m^2^ on the 28th of March 2013 and 6 irrigation timing treatments were applied:

          1. Full irrigation where measured ET was replaced weekly
          .
          2. Nill irrigation.
          3. Very Early Drought where irrigation was withheld from sowing until the beginning of stem extension.
          4. Early Drought where irrigation was withheld between Flag leaf and the beginning of grain fill.
          5. Middle Drought where irrigation was withheld between Flag leaf and 1 week into grain fill.
          6. Late Drought where irrigation was withheld from heading until harvest.

          Irrigation was applied at weekly intervals through and assemply of low rate drip emitters on each plot.  Soil water content was measured weekly with a neutron probe and biomass was measured on 5 occasions throughout the crop.  Samples throughtout the crop were from a 0.43m^2^ quatrant and the final harvest sample was from a 1 m^2^ quadrant.  Each treatment was replicated four times and there was considerable soil variation from plot to plot so each treatment was initianilised with unique soil parameters which best described the soil they were growing on.
      Experiment Leeston2013
        Memo: same as Validation.New Zealand.PalmerstonNorth1989.Memo
        Factors
          Permutation
            Factor Sow: Specification=[Sowing].Script.SowDate = 20-Feb,26-Mar,16-Apr
            Factor Popn: Specification=[Sowing].Script.Population = 50,100,150,200,250
        Simulation Leeston2013Base
          Clock: Start=2013-02-01; End=2014-02-15
          Summary summaryfile
          Weather: FileName=met/Leeston.met
          Zone paddock: Area=1; Slope=0; AspectAngle=0; Altitude=50
            Operations IrrigationEvents
            Operations FertiliserEvents
              2013-10-17  [Fertiliser].Apply(92, "UreaN", 10);
              2013-10-30  [Fertiliser].Apply(32, "UreaN", 10);
            Manager Sowing
              SowDate =
              CultivarName = Wakanui
              SowingDepth = 50
              RowSpacing = 150
              Population = 150
```csharp
using Models.Soils.Nutrients;
using System;
using Models.Core;
using Models.PMF;
using Models.Soils;
using Models.Soils.Nutrients;
using Models.Utilities;
using APSIM.Shared.Utilities;

namespace Models
{
    [Serializable]
    public class Script : Model
    {
        [Link] Clock Clock;
        [Link] Summary Summary;
        [Link] Soil Soil;
        [Link] Plant Wheat;
        Accumulator accumulatedRain;
        
        [Description("Sowing date (d-mmm)")]
        public string SowDate { get; set; }
        [Description("Cultivar to be sown")]
        public string CultivarName { get; set; }
        [Description("Sowing depth (mm)")]
        public double SowingDepth { get; set; }
        [Description("Row spacing (mm)")]
        public double RowSpacing { get; set; }
        [Description("Plant population (/m2)")]
        public double Population { get; set; }
        


        [EventSubscribe("DoManagement")]
        private void OnDoManagement(object sender, EventArgs e)
        {
            if (DateUtilities.WithinDates(SowDate, Clock.Today, SowDate))
            {
                Wheat.Sow(population: Population, cultivar: CultivarName, depth: SowingDepth, rowSpacing: RowSpacing);    
                if(SowDate == "20-Feb")
                {
                    Wheat.Phenology.SetPhaseCompletionDate("27-Feb","Emerging");
                }
                if(SowDate == "26-Mar")
                {
                    Wheat.Phenology.SetPhaseCompletionDate("3-Apr","Emerging");
                }
                if(SowDate == "16-Apr")
                {
                    Wheat.Phenology.SetPhaseCompletionDate("28-Apr","Emerging");
                }
            }
        
        }
        
    }
}
```
            Operations HarvestEvents
              2014-02-04  [Wheat].Harvest();
              2014-02-04  [Wheat].EndCrop();
            Irrigation
            Soil: same as Validation.New Zealand.PalmerstonNorth1989.PalmerstonNorth1989Base.paddock.Soil
            SurfaceOrganicMatter Surface Organic Matter: InitialResidueName=wheat_stubble; InitialResidueType=whiteclover; InitialResidueMass=1000; InitialStandingFraction=0; InitialCPR=0; InitialCNR=25
            Fertiliser
            MicroClimate: a_interception=0; b_interception=1; c_interception=0; d_interception=0; SoilHeatFluxFraction=0.4; MinimumHeightDiffForNewLayer=0; NightInterceptionFraction=0.5; ReferenceHeight=2
            Plant Wheat
            Report DailyReport
            Report HarvestReport
            Report NDVIDailyReport
            Spectral: DrySoilNDVI=0.16; WetSoilNDVI=0.21; GreenCropNDVI=0.82; DeadCropNDVI=0.1
          SoilArbitrator Soil Arbitrator
          Manager LocationInfo: same as Validation.New Zealand.Lincoln1991.LincolnBase.LocationInfo
      Experiment Leeston2014
        Memo: same as Validation.New Zealand.PalmerstonNorth1989.Memo
        Factors
          Permutation
            Factor Sow: Specification=[Sowing].Script.SowDate = 20-Feb,10-Mar,26-Mar,23-Apr
            Factor Popn: Specification=[Sowing].Script.Population = 50,200
        Simulation Wakanui2014Base
          Clock: Start=2014-02-01; End=2015-02-15
          Summary summaryfile
          Weather: FileName=met/Leeston.met
          Zone paddock: Area=1; Slope=0; AspectAngle=0; Altitude=50
            Operations IrrigationEvents
              2014-11-05  [Irrigation].Apply(50.0);
              2014-11-18  [Irrigation].Apply(50.0);
              2014-12-05  [Irrigation].Apply(50.0);
              2014-12-18  [Irrigation].Apply(50.0);
            Operations FertiliserEvents
              2014-09-10  [Fertiliser].Apply(101, "UreaN", 10);
              2014-10-10  [Fertiliser].Apply(87, "UreaN", 10);
            Manager Sowing
              SowDate =
              CultivarName = Wakanui
              SowingDepth = 50
              RowSpacing = 150
              Population = 150
```csharp
using Models.Soils.Nutrients;
using System;
using Models.Core;
using Models.PMF;
using Models.Soils;
using Models.Soils.Nutrients;
using Models.Utilities;
using APSIM.Shared.Utilities;

namespace Models
{
    [Serializable]
    public class Script : Model
    {
        [Link] Clock Clock;
        [Link] Summary Summary;
        [Link] Soil Soil;
        [Link] Plant Wheat;
        Accumulator accumulatedRain;
        
        [Description("Sowing date (d-mmm)")]
        public string SowDate { get; set; }
        [Display(Type = DisplayType.CultivarName)]
        [Description("Cultivar to be sown")]
        public string CultivarName { get; set; }
        [Description("Sowing depth (mm)")]
        public double SowingDepth { get; set; }
        [Description("Row spacing (mm)")]
        public double RowSpacing { get; set; }
        [Description("Plant population (/m2)")]
        public double Population { get; set; }
        


        [EventSubscribe("DoManagement")]
        private void OnDoManagement(object sender, EventArgs e)
        {
            if (DateUtilities.WithinDates(SowDate, Clock.Today, SowDate))
            {
                Wheat.Sow(population: Population, cultivar: CultivarName, depth: SowingDepth, rowSpacing: RowSpacing);    
                if(SowDate == "20-Feb")
                {
                    Wheat.Phenology.SetPhaseCompletionDate("26-Feb","Emerging");
                }
                if(SowDate == "10-Mar")
                {
                    Wheat.Phenology.SetPhaseCompletionDate("17-Mar","Emerging");
                }
                if(SowDate == "26-Mar")
                {
                    Wheat.Phenology.SetPhaseCompletionDate("6-Apr","Emerging");
                }
                if(SowDate == "23-Apr")
                {
                    Wheat.Phenology.SetPhaseCompletionDate("8-May","Emerging");
                }
            }
        
        }
        
    }
}
```
            Operations HarvestEvents
              2015-02-04  [Wheat].Harvest();
              2015-02-04  [Wheat].EndCrop();
            Irrigation
            Soil: SoilType=LincolnSoil; LocalName=Lincoln; Site=Lincoln; NearestTown=Unknown; Region=NZ; NaturalVegetation=Unknown; Latitude=0; Longitude=0
              Physical
                Thickness  ParticleSizeSand  ParticleSizeSilt  ParticleSizeClay  Rocks  BD   AirDry  LL15  DUL   SAT
                100        5                 65                30                0      1.3  0.05    0.08  0.31  0.44
                200        5                 65                30                0      1.3  0.05    0.07  0.3   0.44
                200        5                 65                30                0      1.3  0.05    0.07  0.28  0.44
                200        5                 65                30                0      1.3  0.05    0.09  0.31  0.44
                200        5                 65                30                0      1.3  0.05    0.11  0.3   0.44
                200        5                 65                30                0      1.3  0.05    0.16  0.28  0.44
                200        5                 65                30                0      1.3  0.05    0.15  0.3   0.44
                200        5                 65                30                0      1.3  0.05    0.12  0.34  0.44
                Rocks, ParticleSizeSand, ParticleSizeSilt, ParticleSizeClay source: Calculated
                SoilCrop WheatSoil: LL=[0.08, 0.07, 0.07, 0.09, 0.11, 0.16, 0.15, 0.12]; KL=[0.06, 0.06, 0.06, 0.06, 0.03, 0.02, 0.02, 0.02]; XF=[1, 1, 1, 1, 1, 1, 1, 1]
              WaterBalance SoilWater: same as Validation.New Zealand.PalmerstonNorth1989.PalmerstonNorth1989Base.paddock.Soil.SoilWater
              Organic: same as Validation.New Zealand.PalmerstonNorth1989.PalmerstonNorth1989Base.paddock.Soil.Organic
              Chemical: same as Validation.New Zealand.PalmerstonNorth1989.PalmerstonNorth1989Base.paddock.Soil.Chemical
              Water: Thickness=[100, 200, 200, 200, 200, 200, 200, 200]; InitialValues=[0.24, 0.27, 0.26, 0.23, 0.24, 0.23, 0.23, 0.18]; FilledFromTop=false
              Nutrient
              Solute NO3: same as Validation.New Zealand.PalmerstonNorth1989.PalmerstonNorth1989Base.paddock.Soil.NO3
              Solute NH4: same as Validation.New Zealand.PalmerstonNorth1989.PalmerstonNorth1989Base.paddock.Soil.NH4
              Solute Urea: same as Validation.New Zealand.PalmerstonNorth1989.PalmerstonNorth1989Base.paddock.Soil.Urea
              SoilTemperature Temperature: InteractionsPerDay=8
            SurfaceOrganicMatter Surface Organic Matter: InitialResidueName=wheat_stubble; InitialResidueType=wheat; InitialResidueMass=1000; InitialStandingFraction=0; InitialCPR=0; InitialCNR=80
            Fertiliser
            MicroClimate: a_interception=0; b_interception=1; c_interception=0; d_interception=0; SoilHeatFluxFraction=0.4; MinimumHeightDiffForNewLayer=0; NightInterceptionFraction=0.5; ReferenceHeight=2
            Plant Wheat
            Report DailyReport
            Report HarvestReport
            Manager OutputMaxLeafSize
            Report MaxLeafSizeReport
            Report NDVIDailyReport
            Spectral: DrySoilNDVI=0.16; WetSoilNDVI=0.21; GreenCropNDVI=0.82; DeadCropNDVI=0.1
          SoilArbitrator Soil Arbitrator
          Manager LocationInfo: same as Validation.New Zealand.Lincoln1991.LincolnBase.LocationInfo
        Memo Leaf Size Predictions
          This graph shows different leaf size profiles measured for winter wheat sown on a range of different dates.  Leaves that emerge during cooler conditions achieve a smallter maximum size than the equivelent leaf appearanign in warm conditions.
      Experiment Lincoln2014
        Memo Phenology Not modeled
          The purpose of this experiment is to test model predictions of canopy development, biomass accumulation and partition in response to water stress.  The cultivars used is well parameterised but behaved differently due to the presence of the rainshelter.  However, detailed zadoc scoring was conducted for this experiment.  As such, the timing of phenology stages was set (using the SetModelParamsBySimulation model in the base simulation) to ensure good alignment of the models phenology with the experiment so model comparisons of biomass could be made without confunding of poor phenology predictions.
        Memo: same as Validation.New Zealand.Lincoln2010.Memo1
        Factors
          Factor Irrig
            CompositeFactor Full
              Specifications:
                [IrrigationEvents]
                [Physical]
                [Water].Thickness=200,200,200,200,200,200,200,200
                [Water].InitialValues=0.32,0.2782,0.276,0.2502,0.2507,0.2398,0.1892,0.1962
              Operations IrrigationEvents
                2013-05-14  [Irrigation].Apply(25);
                2013-05-29  [Irrigation].Apply(9.2);
                2013-06-11  [Irrigation].Apply(12);
                2013-09-16  [Irrigation].Apply(34.6);
                2013-09-25  [Irrigation].Apply(46.3);
                2013-10-01  [Irrigation].Apply(19.3);
                2013-10-08  [Irrigation].Apply(24.9);
                2013-10-15  [Irrigation].Apply(21);
                2013-10-22  [Irrigation].Apply(39);
                2013-10-29  [Irrigation].Apply(44,1);
                2013-11-05  [Irrigation].Apply(40,1);
                2013-11-12  [Irrigation].Apply(35,1);
                2013-11-19  [Irrigation].Apply(33,1);
                2013-11-26  [Irrigation].Apply(32,1);
                2013-12-03  [Irrigation].Apply(35,1);
                2013-12-10  [Irrigation].Apply(49,1);
                2013-12-17  [Irrigation].Apply(47,1);
                2013-12-24  [Irrigation].Apply(0);
                2013-12-31  [Irrigation].Apply(0);
                2013-09-10  [Irrigation].Apply(5);
              Physical
                Thickness  BD     AirDry  LL15  DUL   SAT
                200        1      0.05    0.1   0.32  0.42
                200        1.324  0.12    0.15  0.3   0.41
                200        1.35   0.1     0.1   0.28  0.37
                200        1.301  0.08    0.08  0.31  0.37
                200        1.301  0.06    0.07  0.27  0.33
                200        1.301  0.06    0.08  0.25  0.32
                200        1.301  0.1     0.1   0.21  0.3
                200        1.301  0.1     0.1   0.23  0.31
                200        1.3    0.1     0.1   0.23  0.31
                200        1.3    0.1     0.1   0.23  0.31
                SoilCrop WheatSoil
                  LL=[0.1, 0.12, 0.1, 0.08, 0.06, 0.08, 0.1, 0.1, 0.1, 0.1]
                  KL=[0.06, 0.03, 0.03, 0.03, 0.03, 0.03, 0.03, 0.02, 0.02, 0.02]
                  XF=[1, 1, 1, 1, 1, 1, 1, 1, 1, 1]
            CompositeFactor Nil
              Specifications:
                [IrrigationEvents]
                [Physical]
                [Water].Thickness=200,200,200,200,200,200,200,200,200,200
                [Water].InitialValues=0.32,0.2825,0.2638,0.2062,0.2425,0.2425,0.1882,0.1822,0.182,0.182
              Physical
                Thickness  BD     AirDry  LL15  DUL   SAT
                200        1      0.06    0.1   0.32  0.36
                200        1.324  0.11    0.11  0.29  0.36
                200        1.35   0.08    0.08  0.28  0.4
                200        1.301  0.05    0.05  0.25  0.33
                200        1.301  0.07    0.07  0.3   0.33
                200        1.301  0.1     0.1   0.3   0.32
                200        1.301  0.1     0.1   0.23  0.3
                200        1.301  0.08    0.08  0.22  0.31
                200        1.3    0.08    0.08  0.22  0.31
                200        1.3    0.08    0.08  0.22  0.31
                SoilCrop WheatSoil
                  LL=[0.1, 0.11, 0.09, 0.05, 0.07, 0.1, 0.1, 0.11, 0.11, 0.11]
                  KL=[0.06, 0.03, 0.03, 0.03, 0.03, 0.03, 0.03, 0.02, 0.02, 0.02]
                  XF=[1, 1, 1, 1, 1, 1, 1, 1, 1, 1]
              Operations IrrigationEvents
                2013-09-16  [Irrigation].Apply(4.6);
                2013-09-25  [Irrigation].Apply(3.5);
                2013-09-10  [Irrigation].Apply(5);
                2013-09-10  [Irrigation].Apply(5);
            CompositeFactor VeryEarly
              Specifications:
                [IrrigationEvents]
                [Physical]
                [Water].Thickness=200,200,200,200,200,200,200,200
                [Water].InitialValues=0.32,0.2865,0.276,0.2745,0.2912,0.2228,0.2037,0.1818
              Physical
                Thickness  BD     AirDry  LL15  DUL   SAT
                200        1      0.06    0.06  0.32  0.419
                200        1.324  0.12    0.12  0.29  0.405
                200        1.35   0.09    0.09  0.28  0.37
                200        1.301  0.08    0.08  0.27  0.37
                200        1.301  0.06    0.07  0.3   0.33
                200        1.301  0.06    0.08  0.25  0.32
                200        1.301  0.1     0.1   0.23  0.3
                200        1.301  0.1     0.1   0.21  0.31
                200        1.3    0.1     0.1   0.21  0.31
                200        1.3    0.1     0.1   0.21  0.31
                SoilCrop WheatSoil
                  LL=[0.06, 0.12, 0.09, 0.08, 0.07, 0.08, 0.1, 0.1, 0.1, 0.1]
                  KL=[0.06, 0.03, 0.03, 0.03, 0.03, 0.03, 0.03, 0.02, 0.02, 0.02]
                  XF=[1, 1, 1, 1, 1, 1, 1, 1, 1, 1]
              Operations IrrigationEvents
                2013-09-16  [Irrigation].Apply(4.6);
                2013-09-25  [Irrigation].Apply(3.5);
                2013-11-19  [Irrigation].Apply(33,1);
                2013-11-26  [Irrigation].Apply(32,1);
                2013-12-03  [Irrigation].Apply(35,18);
                2013-12-10  [Irrigation].Apply(49,1);
                2013-12-17  [Irrigation].Apply(47,1);
                2013-12-24  [Irrigation].Apply(49,1);
                2013-09-10  [Irrigation].Apply(5);
            CompositeFactor Early
              Specifications:
                [IrrigationEvents]
                [Physical]
                [Water].Thickness=200,200,200,200,200,200,200,200
                [Water].InitialValues=0.32,0.278,0.2695,0.2698,0.2572,0.2442,0.1508,0.1605
              Physical
                Thickness  BD     AirDry  LL15  DUL   SAT
                200        1      0.05    0.06  0.32  0.42
                200        1.324  0.1     0.1   0.3   0.405
                200        1.35   0.1     0.1   0.3   0.37
                200        1.301  0.08    0.08  0.3   0.37
                200        1.301  0.07    0.07  0.32  0.33
                200        1.301  0.08    0.08  0.3   0.32
                200        1.301  0.08    0.08  0.21  0.3
                200        1.301  0.08    0.08  0.21  0.31
                200        1.3    0.08    0.08  0.21  0.31
                200        1.3    0.08    0.08  0.21  0.31
                SoilCrop WheatSoil
                  LL=[0.06, 0.1, 0.1, 0.08, 0.07, 0.08, 0.08, 0.08, 0.08, 0.08]
                  KL=[0.06, 0.03, 0.03, 0.03, 0.03, 0.03, 0.03, 0.02, 0.02, 0.02]
                  XF=[1, 1, 1, 1, 1, 1, 1, 1, 1, 1]
              Operations IrrigationEvents
                2013-05-14  [Irrigation].Apply(25);
                2013-05-29  [Irrigation].Apply(9.2);
                2013-06-11  [Irrigation].Apply(12);
                2013-09-16  [Irrigation].Apply(34.6);
                2013-09-25  [Irrigation].Apply(46.5);
                2013-12-10  [Irrigation].Apply(49,1);
                2013-12-17  [Irrigation].Apply(47,1);
                2013-12-24  [Irrigation].Apply(49,1);
                2013-12-31  [Irrigation].Apply(20.3,1);
                2013-12-24  [Irrigation].Apply(49,1);
                2013-12-31  [Irrigation].Apply(20.3,1);
                2013-09-10  [Irrigation].Apply(5);
            CompositeFactor Middle
              Specifications:
                [IrrigationEvents]
                [Physical]
                [Water].Thickness=200,200,200,200,200,200,200,200
                [Water].InitialValues=0.32,0.2788,0.271,0.2795,0.2275,0.1905,0.2318,0.2385
              Physical
                Thickness  BD     AirDry  LL15  DUL   SAT
                200        1      0.06    0.06  0.32  0.419
                200        1.324  0.12    0.12  0.3   0.405
                200        1.35   0.09    0.09  0.29  0.37
                200        1.301  0.05    0.05  0.3   0.37
                200        1.301  0.05    0.05  0.25  0.33
                200        1.301  0.05    0.05  0.24  0.32
                200        1.301  0.12    0.12  0.26  0.3
                200        1.301  0.1     0.1   0.26  0.31
                200        1.3    0.1     0.1   0.26  0.31
                200        1.3    0.1     0.1   0.26  0.31
                SoilCrop WheatSoil
                  LL=[0.06, 0.12, 0.09, 0.05, 0.05, 0.05, 0.12, 0.1, 0.1, 0.1]
                  KL=[0.06, 0.03, 0.03, 0.03, 0.03, 0.03, 0.03, 0.02, 0.02, 0.02]
                  XF=[1, 1, 1, 1, 1, 1, 1, 1, 1, 1]
              Operations IrrigationEvents
                2013-05-14  [Irrigation].Apply(25);
                2013-05-29  [Irrigation].Apply(9.2);
                2013-06-11  [Irrigation].Apply(12);
                2013-09-16  [Irrigation].Apply(34.6);
                2013-09-25  [Irrigation].Apply(46.3);
                2013-10-01  [Irrigation].Apply(19.3);
                2013-12-17  [Irrigation].Apply(47,1);
                2013-12-24  [Irrigation].Apply(49,1);
                2013-12-31  [Irrigation].Apply(20.3,1);
                2013-09-10  [Irrigation].Apply(5);
            CompositeFactor Late
              Specifications:
                [IrrigationEvents]
                [Physical]
                [Water].Thickness=200,200,200,200,200,200,200,200
                [Water].InitialValues=0.32,0.2785,0.274,0.2708,0.2715,0.2312,0.199,0.228
              Physical
                Thickness  BD     AirDry  LL15  DUL   SAT
                200        1      0.05    0.05  0.32  0.419
                200        1.324  0.12    0.12  0.3   0.405
                200        1.35   0.1     0.1   0.29  0.37
                200        1.301  0.05    0.05  0.32  0.37
                200        1.301  0.06    0.06  0.3   0.33
                200        1.301  0.06    0.06  0.3   0.32
                200        1.301  0.1     0.1   0.27  0.3
                200        1.301  0.1     0.1   0.26  0.31
                200        1.3    0.1     0.1   0.26  0.31
                200        1.3    0.1     0.1   0.26  0.31
                SoilCrop WheatSoil
                  LL=[0.1, 0.12, 0.1, 0.08, 0.06, 0.08, 0.1, 0.1, 0.1, 0.1]
                  KL=[0.06, 0.03, 0.03, 0.03, 0.03, 0.03, 0.03, 0.02, 0.02, 0.02]
                  XF=[1, 1, 1, 1, 1, 1, 1, 1, 1, 1]
              Operations IrrigationEvents
                2013-05-14  [Irrigation].Apply(25);
                2013-05-29  [Irrigation].Apply(9.2);
                2013-06-11  [Irrigation].Apply(12);
                2013-09-16  [Irrigation].Apply(34.6);
                2013-09-25  [Irrigation].Apply(46.3);
                2013-10-01  [Irrigation].Apply(19.3);
                2013-10-08  [Irrigation].Apply(24.9);
                2013-10-15  [Irrigation].Apply(21);
                2013-10-22  [Irrigation].Apply(39);
                2013-10-29  [Irrigation].Apply(0);
        Simulation Rainshelter2013
          Clock: Start=2013-03-22; End=2014-04-01
          Summary summaryfile
          Weather: FileName=met/lincoln.met
          SoilArbitrator Soil Arbitrator
          Zone paddock: Area=1; Slope=0; AspectAngle=0; Altitude=50
            Soil TempletonSiltLoam: SoilType=NZ_sedementary; Region=Plains; State=Canterbury; Country=New Zealand; Latitude=0; Longitude=0
              DataSource=Generic profile descriptions provided by Trevor Webb and data for functional horizions based on SWAMP project results
              Comments=Bulk density values were measured on the fine earth fraction so values entered into apsim soil are adjusted down to account for stone content (assuming stones are inert from all soil process so their mass and volume is removed from model paramaters).  SAT, DUL, LL15 and Air dry have been adjusted down to account for stone content.  OC has not been adjusted so the model will get the correct carbon and N amounts using the adjusted BD.
              Chemical: PHUnits=Water
                Thickness  PH  CEC
                180        6   14.2515
                150        6   11.150525
                400        6   9.056
                270        6   8.813
                500        6   8.7959
                CEC source: Calculated
              Physical
                Thickness  ParticleSizeSand  ParticleSizeSilt  ParticleSizeClay  Rocks     BD     AirDry  LL15  DUL   SAT
                200        5                 65                30                0.274682  1      0.05    0.1   0.32  0.42
                200        5                 65                30                0.118945  1.324  0.12    0.15  0.35  0.41
                200        5                 65                30                0.188999  1.35   0.1     0.1   0.3   0.37
                200        5                 65                30                0.218457  1.301  0.08    0.08  0.3   0.37
                200        5                 65                30                0.302948  1.301  0.06    0.07  0.28  0.33
                200        5                 65                30                0.324071  1.301  0.06    0.08  0.25  0.32
                200        5                 65                30                0.366317  1.301  0.1     0.1   0.23  0.3
                200        5                 65                30                0.345194  1.301  0.1     0.1   0.24  0.31
                Rocks, ParticleSizeSand, ParticleSizeSilt, ParticleSizeClay source: Calculated
                SoilCrop WheatSoil: LL=[0.1, 0.12, 0.1, 0.08, 0.06, 0.08, 0.1, 0.1]; KL=[0.06, 0.06, 0.1, 0.1, 0.05, 0.03, 0.02, 0.01]; XF=[1, 1, 1, 1, 1, 1, 1, 1]
              WaterBalance SoilWater: SummerDate=1-oct; SummerU=6; SummerCona=3; WinterDate=1-Apr; WinterU=2; WinterCona=1; DiffusConst=0; DiffusSlope=0; Salb=0.13; CN2Bare=0; CNRed=0; CNCov=0.8; PSIDul=-100; Thickness=[200, 200, 200, 200, 200, 200, 200, 200]; SWCON=[1, 1, 1, 1, 1, 1, 1, 1]
              Organic: FOMCNRatio=40; CarbonUnits=Total
                Thickness  Carbon  SoilCNRatio  FBiom   FInert  FOM
                180        2.6251  11           0.0333  0.4371  427.528
                150        1.2469  11           0.0187  0.6569  316.72
                400        0.316   11           0.0117  0.8496  142.312
                270        0.208   11           0.0102  0.945   82.9318
                500        0.2004  11           0.01    0.9827  30.5089
              Water: Thickness=[200, 200, 200, 200, 200, 200, 200, 200]; InitialValues=[0.35, 0.35, 0.25, 0.25, 0.25, 0.2, 0.18, 0.2]; FilledFromTop=false
              Nutrient
              Solute NO3: Thickness=[180, 150, 400, 270, 500]; InitialValues=[265, 40.2427, 5.01813, 2.41979, 1.9216]; InitialValuesUnits=ppm; WaterTableConcentration=0; D0=0; DepthConstant=0; MaxDepthSoluteAccessible=0; RunoffEffectivenessAtMovingSolute=0; MaxEffectiveRunoff=0
              Solute NH4: Thickness=[180, 150, 400, 270, 500]; InitialValues=[1.5, 0.854582, 0.442264, 0.38432, 0.38432]; InitialValuesUnits=ppm; WaterTableConcentration=0; D0=0; DepthConstant=0; MaxDepthSoluteAccessible=0; RunoffEffectivenessAtMovingSolute=0; MaxEffectiveRunoff=0
              Solute Urea: Thickness=[180, 150, 400, 270, 500]; InitialValues=[0, 0, 0, 0, 0]; InitialValuesUnits=kg/ha; WaterTableConcentration=0; D0=0; DepthConstant=0; MaxDepthSoluteAccessible=0; RunoffEffectivenessAtMovingSolute=0; MaxEffectiveRunoff=0
              SoilTemperature Temperature: InteractionsPerDay=8
            Plant Wheat
            Operations SowingAndHarvest
              2013-03-25  [Wheat].Sow(population:165, cultivar:"Wakanui", depth:30, rowSpacing:130);
              2014-01-26  [Wheat].Harvest();
              2014-01-26  [Wheat].EndCrop();
            Operations IrrigationEvents
              2013-05-14  [Irrigation].Apply(25);
              2013-05-29  [Irrigation].Apply(9.2);
              2013-06-11  [Irrigation].Apply(12);
              2013-09-16  [Irrigation].Apply(34.6);
              2013-09-25  [Irrigation].Apply(43);
              2013-10-01  [Irrigation].Apply(19.3);
              2013-10-08  [Irrigation].Apply(24.9);
              2013-10-15  [Irrigation].Apply(21);
              2013-10-22  [Irrigation].Apply(39);
              2013-10-29  [Irrigation].Apply(44);
              2013-11-05  [Irrigation].Apply(40);
              2013-11-12  [Irrigation].Apply(35);
              2013-11-19  [Irrigation].Apply(33);
              2013-11-26  [Irrigation].Apply(32);
              2013-12-03  [Irrigation].Apply(35);
              2013-12-10  [Irrigation].Apply(49);
              2013-12-17  [Irrigation].Apply(47);
              2013-12-24  [Irrigation].Apply(0);
              2013-12-31  [Irrigation].Apply(0);
            Operations FertiliserEvents
              2013-09-26  [Fertiliser].Apply(100, "UreaN", 10);
              2013-11-13  [Fertiliser].Apply(100, "UreaN", 10);
            Operations Flood
              2013-06-18  [Irrigation].Apply(120);
              2013-04-12  [Irrigation].Apply(5);
            Irrigation
            Manager ClimateControl
              StartDate = 04/15/2013 00:00:00
              EndDate = 05/01/2014 00:00:00
              script: same as in Validation.New Zealand.Lincoln1991.LincolnBase.paddock.ClimateControl
            SurfaceOrganicMatter Surface Organic Matter: InitialResidueName=wheat_stubble; InitialResidueType=wheat; InitialResidueMass=500; InitialStandingFraction=0; InitialCPR=0; InitialCNR=80
            Fertiliser
            MicroClimate: a_interception=0; b_interception=1; c_interception=0; d_interception=0; SoilHeatFluxFraction=0.4; MinimumHeightDiffForNewLayer=0; NightInterceptionFraction=0.5; ReferenceHeight=2
            Report DailyReport
            Report HarvestReport
            Manager OutputMaxLeafSize
            Report MaxLeafSizeReport
            SetModelParamsBySimulation SetPhenologyParams: SetEventName=[Plant].PlantSowing; ParameterFile=inputs/Lincoln2014ParameterSets.csv
          Manager LocationInfo: same as Validation.New Zealand.Lincoln1991.LincolnBase.LocationInfo
      Experiment Lincoln2015
        Memo
          ### Lincoln2012 (Rain-Shelter Trail)

          Testing of APSIM Maize under New Zealand conditions was undertaken using the data of [#Teixeira_etal_2014].  This dataset includes the impact of three N (0 to 250 kg/ha N) and two water regimes (dryland and fully irrigated) using a rain-shelter structure.  Observations include biomass growth and nitrogen content of individual organs, soil water contents, leaf area index, phenology and yield components. Total biomass ranged from 8000 kg/ha for dryland nil N crops to up to 28000kg/ha for fully irrigated and N fertilised crops.  Dryland crops recovered 25 percent less N from applied fertilizer than irrigated crops.
        Factors
          Permutation
            Factor Nit
              CompositeFactor 0
                Specifications:
                  [StateFactors].Script.Nit = 0
                  [Fert]
                Operations 0
                  2015-10-09  [Irrigation].Apply(5);
                  2015-11-01  [Irrigation].Apply(5);
                  2015-11-01  [Fertiliser].Apply(35, "UreaN", 20);
                  2015-11-19  [Irrigation].Apply(30);
                  Memo
                    Uniques fertigation event
              CompositeFactor 50
                Specifications:
                  [StateFactors].Script.Nit = 50
                  [Fert]
                Operations 50
                  2015-10-09  [Fertiliser].Apply(0, "UreaN", 20);
                  2015-10-09  [Irrigation].Apply(5);
                  2015-11-01  [Fertiliser].Apply(35, "UreaN", 20);
                  2015-11-01  [Irrigation].Apply(5);
                  2015-11-19  [Fertiliser].Apply(25, "UreaN", 20);
                  2015-11-19  [Irrigation].Apply(30);
              CompositeFactor 250
                Specifications:
                  [StateFactors].Script.Nit = 250
                  [Fert]
                Operations 250
                  2015-10-09  [Fertiliser].Apply(50, "UreaN", 20);
                  2015-10-09  [Irrigation].Apply(5);
                  2015-11-01  [Fertiliser].Apply(100, "UreaN", 20);
                  2015-11-01  [Irrigation].Apply(5);
                  2015-11-19  [Fertiliser].Apply(100, "UreaN", 20);
                  2015-11-19  [Irrigation].Apply(30);
            Factor Irr
              CompositeFactor Full
                Specifications:
                  [Irrig]
                  [StateFactors].Script.Irr = Full
                Operations Full
                  2015-09-30  [Irrigation].Apply(10);
                  2015-10-01  [Irrigation].Apply(5);
                  2015-10-09  [Irrigation].Apply(10);
                  2015-10-16  [Irrigation].Apply(15);
                  2015-10-22  [Irrigation].Apply(15);
                  2015-10-30  [Irrigation].Apply(30);
                  2015-11-06  [Irrigation].Apply(12.2);
                  2015-11-12  [Irrigation].Apply(13);
                  2015-11-12  [Irrigation].Apply(13);
                  2015-11-26  [Irrigation].Apply(39);
                  2015-12-03  [Irrigation].Apply(40);
                  2015-12-24  [Irrigation].Apply(35);
                  2015-12-31  [Irrigation].Apply(30);
                  2016-01-07  [Irrigation].Apply(30);
              CompositeFactor Nil
                Specifications:
                  [Irrig]
                  [StateFactors].Script.Irr = Nil
                Operations Nil
                  2015-09-30  [Irrigation].Apply(10);
                  2015-10-01  [Irrigation].Apply(5);
                  2015-10-09  [Irrigation].Apply(10);
                  2015-12-24  [Irrigation].Apply(25);
                  2016-02-03  [Irrigation].Apply(30);
                  2016-02-04  [Irrigation].Apply(40);
                  Memo
                    Have added an extra irrigation, on 3 Nov,

                    Data indcates water applied but no notes of it RFZ
        Simulation Lincoln2015
          Weather: FileName=met/lincoln.met
          Clock: Start=2015-09-07; End=2016-02-15
          Summary summaryfile
          SoilArbitrator Soil Arbitrator
          Zone RainShelter: Area=1; Slope=0; AspectAngle=0; Altitude=50
            Plant Wheat
            Soil TempletonSiltLoam: SoilType=NZ_sedementary; Region=Plains; State=Canterbury; Country=New Zealand; Latitude=0; Longitude=0
              DataSource=Generic profile descriptions provided by Trevor Webb and data for functional horizions based on SWAMP project results
              Comments=Bulk density values were measured on the fine earth fraction so values entered into apsim soil are adjusted down to account for stone content (assuming stones are inert from all soil process so their mass and volume is removed from model paramaters).  SAT, DUL, LL15 and Air dry have been adjusted down to account for stone content.  OC has not been adjusted so the model will get the correct carbon and N amounts using the adjusted BD.
              Chemical: PHUnits=Water
                Thickness  PH  CEC
                180        6   15.095
                150        6   10.37
                400        6   9.056
                270        6   8.813
                500        6   8.7959
                300        6   8.795
                CEC source: Calculated
              WaterBalance SoilWater: SummerDate=1-oct; SummerU=6; SummerCona=3; WinterDate=1-Apr; WinterU=2; WinterCona=3; DiffusConst=0; DiffusSlope=0; Salb=0.13; CN2Bare=77; CNRed=0; CNCov=0.8; PSIDul=-100; Thickness=[200, 200, 200, 200, 200, 200, 200, 200, 200]; SWCON=[0.5, 0.5, 0.5, 0.5, 0.5, 0.5, 0.5, 0.5, 0.5]
              Organic: FOMCNRatio=20; CarbonUnits=Total
                Thickness  Carbon  SoilCNRatio  FBiom   FInert  FOM
                180        3       11           0.03    0.5     731.975
                150        0.9     11           0.02    0.7     584.494
                400        0.316   11           0.0117  0.85    320.777
                270        0.208   11           0.0102  0.945   213.951
                500        0.2004  11           0.01    0.9827  101.063
                500        0.2     11           0.01    0.93    47.7389
              Water: Thickness=[150, 150, 300, 300, 300, 300, 300]; InitialValues=[0.18, 0.18, 0.26, 0.26, 0.23, 0.28, 0.29]; FilledFromTop=false
                Memo
                  Using the retest sample values.
              Physical
                Thickness  ParticleSizeSand  ParticleSizeSilt  ParticleSizeClay  Rocks     BD   AirDry  LL15  DUL   SAT
                150        5                 65                30                0.274682  1    0.05    0.05  0.28  0.42
                150        5                 65                30                0.227888  1.1  0.1     0.1   0.28  0.42
                300        5                 65                30                0         1.4  0.17    0.17  0.28  0.42
                300        5                 65                30                0.113501  1.3  0.17    0.17  0.28  0.42
                300        5                 65                30                0         1.4  0.16    0.16  0.28  0.42
                300        5                 65                30                0         1.4  0.16    0.16  0.28  0.42
                300        5                 65                30                0         1.4  0.16    0.16  0.28  0.42
                Rocks, ParticleSizeSand, ParticleSizeSilt, ParticleSizeClay source: Calculated
                SoilCrop WheatSoil: LL=[0.12, 0.1, 0.17, 0.17, 0.23, 0.23, 0.22]; KL=[0.06, 0.06, 0.04, 0.04, 0.03, 0.005, 0]; XF=[1, 0.4, 1, 1, 1, 1, 1]
                Memo
                  Soil Physical properties are set under Factors to account for soil variation between plots
              Nutrient
              Solute NO3: Thickness=[180, 150, 400, 270, 500, 300]; InitialValues=[8.38, 0.744, 2.68775, 2.70704, 2.136, 1.3618]; InitialValuesUnits=ppm; WaterTableConcentration=0; D0=0; DepthConstant=0; MaxDepthSoluteAccessible=0; RunoffEffectivenessAtMovingSolute=0; MaxEffectiveRunoff=0
              Solute NH4: Thickness=[180, 150, 400, 270, 500, 300]; InitialValues=[0.12, 0.096, 0.06175, 1.33815, 1.568, 0.365455]; InitialValuesUnits=ppm; WaterTableConcentration=0; D0=0; DepthConstant=0; MaxDepthSoluteAccessible=0; RunoffEffectivenessAtMovingSolute=0; MaxEffectiveRunoff=0
              Solute Urea: Thickness=[180, 150, 400, 270, 500, 300]; InitialValues=[0, 0, 0, 0, 0, 0]; InitialValuesUnits=kg/ha; WaterTableConcentration=0; D0=0; DepthConstant=0; MaxDepthSoluteAccessible=0; RunoffEffectivenessAtMovingSolute=0; MaxEffectiveRunoff=0
              SoilTemperature Temperature: InteractionsPerDay=8
            MicroClimate: a_interception=0; b_interception=1; c_interception=0; d_interception=0; SoilHeatFluxFraction=0.4; MinimumHeightDiffForNewLayer=0; NightInterceptionFraction=0.5; ReferenceHeight=2
            Irrigation
            Fertiliser
            SurfaceOrganicMatter: InitialResidueName=wheat; InitialResidueType=wheat; InitialResidueMass=0; InitialStandingFraction=0; InitialCPR=0; InitialCNR=80
            Operations Irrig
            Operations Fert
            Operations Sow
              2015-09-10  [Wheat].Sow(population:200, cultivar:"Discovery", depth:80, rowSpacing:130);
            Manager ClimateControl
              StartDate = 10/01/2015 00:00:00
              EndDate = 02/28/2016 00:00:00
              script: same as in Validation.New Zealand.Lincoln1991.LincolnBase.paddock.ClimateControl
            Manager StateFactors
```csharp
using Models.Interfaces;
using APSIM.Shared.Utilities;
using System.Xml.Serialization;
using Models;
using Models.PMF;
using Models.Soils;
using System.Text;
using System.Collections.Generic;
using Models.Core;
using System;
using Models.Soils.Nutrients;

namespace Models
{
    [Serializable] 
    public class Script : Model
    {
        [Link] private Clock Clock;
        [Link] private Irrigation Irrigation;
        [Link] private Soil ThisSoil;
        [Link] private Zone MyZone;
        [Link]
        private IPhysical soilPhysical;
        [Link]
        private ISoilWater waterBalance;
        public string Irr { get; set; }
        public double Nit { get; set; }
        
          
        private void SetSoilLayers()
        {
        
            int i = 0;
            if ((Irr == "Nil") && (Nit == 0))
            {
                if (soilPhysical.Thickness.Length != 7)
                {
                    throw new Exception("Soil layer exception");
                }
                soilPhysical.DUL[0] = 0.31;
                soilPhysical.DUL[1] = 0.34;
                soilPhysical.DUL[2] = 0.32;
                soilPhysical.DUL[3] = 0.23;
                soilPhysical.DUL[4] = 0.29;
                soilPhysical.DUL[5] = 0.29;
                soilPhysical.DUL[6] = 0.29;
                
                double[] nSW = { 0.18, 0.18, 0.26, 0.23, 0.29, 0.29, 0.27 };
                waterBalance.Reset();
                waterBalance.SW = nSW; 
            }   
            if ((Irr == "Nil") && (Nit == 50))
            {
                if (soilPhysical.Thickness.Length != 7)
                {
                    throw new Exception("Soil layer exception");
                }
                soilPhysical.DUL[0] = 0.30;
                soilPhysical.DUL[1] = 0.31;
                soilPhysical.DUL[2] = 0.29;
                soilPhysical.DUL[3] = 0.30;
                soilPhysical.DUL[4] = 0.31;
                soilPhysical.DUL[5] = 0.34;
                soilPhysical.DUL[6] = 0.30;
                
                double[] nSW = { 0.18, 0.18, 0.30, 0.25, 0.29, 0.34, 0.30 };
                waterBalance.Reset();
                waterBalance.SW = nSW; 
            }   
            if ((Irr == "Nil") && (Nit == 250))
            {
                if (soilPhysical.Thickness.Length != 7)
                {
                    throw new Exception("Soil layer exception");
                }
                soilPhysical.DUL[0] = 0.28;
                soilPhysical.DUL[1] = 0.24;
                soilPhysical.DUL[2] = 0.30;
                soilPhysical.DUL[3] = 0.27;
                soilPhysical.DUL[4] = 0.28;
                soilPhysical.DUL[5] = 0.36;
                soilPhysical.DUL[6] = 0.27;
                
                double[] nSW = { 0.18, 0.18, 0.3, 0.27, 0.28, 0.35, 0.27 };
                waterBalance.Reset();
                waterBalance.SW = nSW; 
            }   
            if ((Irr == "Full") && (Nit == 0))
            {
                if (soilPhysical.Thickness.Length != 7)
                {
                    throw new Exception("Soil layer exception");
                }
                soilPhysical.DUL[0] = 0.31;
                soilPhysical.DUL[1] = 0.34;
                soilPhysical.DUL[2] = 0.32;
                soilPhysical.DUL[3] = 0.23;
                soilPhysical.DUL[4] = 0.30;
                soilPhysical.DUL[5] = 0.33;
                soilPhysical.DUL[6] = 0.25;
                
                double[] nSW = { 0.18, 0.18, 0.26, 0.20, 0.30, 0.33, 0.25 };
                waterBalance.Reset();
                waterBalance.SW = nSW; 
            }   
            if ((Irr == "Full") && (Nit == 50))
            {
                if (soilPhysical.Thickness.Length != 7)
                {
                    throw new Exception("Soil layer exception");
                }
                soilPhysical.DUL[0] = 0.31;
                soilPhysical.DUL[1] = 0.28;
                soilPhysical.DUL[2] = 0.30;
                soilPhysical.DUL[3] = 0.29;
                soilPhysical.DUL[4] = 0.31;
                soilPhysical.DUL[5] = 0.33;
                soilPhysical.DUL[6] = 0.30;

                double[] nSW = { 0.18, 0.18, 0.28, 0.27, 0.28, 0.33, 0.30 };
                
                waterBalance.Reset();
                
                waterBalance.SW = nSW; 

            }
            if ((Irr == "Full") && (Nit == 250))
            {
                if (soilPhysical.Thickness.Length != 7)
                {
                    throw new Exception("Soil layer exception");
                }
                soilPhysical.DUL[0] = 0.26;
                soilPhysical.DUL[1] = 0.24;
                soilPhysical.DUL[2] = 0.26;
                soilPhysical.DUL[3] = 0.23;
                soilPhysical.DUL[4] = 0.27;
                soilPhysical.DUL[5] = 0.35;
                soilPhysical.DUL[6] = 0.22;
                
                double[] nSW = { 0.18, 0.18, 0.24, 0.23, 0.27, 0.35, 0.22 };
                waterBalance.Reset();
                waterBalance.SW = nSW; 
            }
        }

        [EventSubscribe("StartOfSimulation")]
        private void OnSimulationCommencing(object sender, EventArgs e)
        {
            SetSoilLayers();
        }
        
        [EventSubscribe("DoManagement")]
        private void OnDoManagement(object sender, EventArgs e)
        {
            //Specify irrigations that were only applied to some of the N treatments
            if (Irr == "Full")
            {
                if (Nit == 250)
                {
                    if ((DateUtilities.CompareDates("10-Dec", Clock.Today) == 0))
                        Irrigation.Apply(40);
                    if ((DateUtilities.CompareDates("17-Dec", Clock.Today) == 0))
                        Irrigation.Apply(39.7);
                    if ((DateUtilities.CompareDates("14-Jan", Clock.Today) == 0))
                        Irrigation.Apply(30);
                    if ((DateUtilities.CompareDates("21-Jan", Clock.Today) == 0))
                        Irrigation.Apply(20.1);
                }
                if (Nit == 50)
                {
                    if ((DateUtilities.CompareDates("10-Dec", Clock.Today) == 0))
                        Irrigation.Apply(40);
                    if ((DateUtilities.CompareDates("14-Jan", Clock.Today) == 0))
                        Irrigation.Apply(30);
                }
            }
            
        }
    }
}
```
            Report DailyReport
            Report HarvestReport
            Manager HarvestOnly
```csharp
using Newtonsoft.Json;
using Models.Soils.Nutrients;
using System;
using Models.Core;
using System.Collections.Generic;
using System.Text;
using Models.Soils;
using Models.PMF;
using Models;
using System.Xml.Serialization;
using APSIM.Shared.Utilities;
using Models.PMF.Phen;

namespace Models
{
    [Serializable] 
    public class Script : Model
    {
        [Link] private Plant Wheat;
        [Link(Type = LinkType.Path, Path = "[Wheat].Phenology")]
        private Phenology phenology;


        [JsonIgnore] private bool Harvested {get; set;}
                
        [EventSubscribe("StartOfSimulation")]
        private void OnSimulationCommencing(object sender, EventArgs e)
        {
        
        Harvested = false;
        }

        [EventSubscribe("DoManagement")]
        private void OnDoManagement(object sender, EventArgs e)
        {
            if ((phenology.Stage >= 10) & (Harvested == false))
            {
                Wheat.Harvest(removeBiomassFromOrgans: false);
                Harvested = true;
            }
        }
    }
}
```
            Report NDVIDailyReport
            Spectral: DrySoilNDVI=0.16; WetSoilNDVI=0.21; GreenCropNDVI=0.82; DeadCropNDVI=0.1
          Manager LocationInfo: same as Validation.New Zealand.Lincoln1991.LincolnBase.LocationInfo
      Experiment Wakanui2015
        Memo: same as Validation.New Zealand.PalmerstonNorth1989.Memo
        Factors
          Permutation
            Factor Sow: Specification=[Sowing].Script.SowDate = 20-Feb,10-Mar,20-Mar,09-Apr
            Factor Cm: Specification=[Sowing].Script.PGRTreatment = Normal
        Simulation Wakanui2015Base
          Clock: Start=2015-02-01; End=2016-02-15
          Summary summaryfile
          Weather: FileName=met/Wakanui.met
          Zone paddock: Area=1; Slope=0; AspectAngle=0; Altitude=50
            Operations IrrigationEvents
              2015-10-19  [Irrigation].Apply(40.0);
              2015-11-08  [Irrigation].Apply(40.0);
              2015-11-26  [Irrigation].Apply(40.0);
              2015-12-12  [Irrigation].Apply(45.0);
              2015-12-28  [Irrigation].Apply(45.0);
            Operations FertiliserEvents
              2015-09-18  [Fertiliser].Apply(26, "UreaN", 10);
              2015-09-26  [Fertiliser].Apply(51, "UreaN", 10);
              2015-10-10  [Fertiliser].Apply(92, "UreaN", 10);
              2015-10-29  [Fertiliser].Apply(115, "UreaN", 10);
            Manager Sowing
              SowDate = 24-Jul
              CultivarName = Wakanui
              SowingDepth = 50
              RowSpacing = 150
              PGRTreatment = 0
```csharp
using Models.Soils.Nutrients;
using System;
using Models.Core;
using Models.PMF;
using Models.Soils;
using Models.Soils.Nutrients;
using Models.Utilities;
using APSIM.Shared.Utilities;

namespace Models
{
    [Serializable]
    public class Script : Model
    {
        [Link] Clock Clock;
        [Link] Summary Summary;
        [Link] Soil Soil;
        [Link] Plant Wheat;
        Accumulator accumulatedRain;
        
        [Description("Sowing date (d-mmm)")]
        public string SowDate { get; set; }
        [Description("Cultivar to be sown")]
        public string CultivarName { get; set; }
        [Description("Sowing depth (mm)")]
        public double SowingDepth { get; set; }
        [Description("Row spacing (mm)")]
        public double RowSpacing { get; set; }
        [Description("PGR treatment applied")]
        public string PGRTreatment { get; set; }
        


        [EventSubscribe("DoManagement")]
        private void OnDoManagement(object sender, EventArgs e)
        {
            if (DateUtilities.WithinDates(SowDate, Clock.Today, SowDate))
            {
                Wheat.Sow(population: 150, cultivar: CultivarName, depth: SowingDepth, rowSpacing: RowSpacing);    
                if(SowDate == "20-Feb")
                {
                    Wheat.Phenology.SetPhaseCompletionDate("27-Feb","Emerging");
                }
                if(SowDate == "10-Mar")
                {
                    Wheat.Phenology.SetPhaseCompletionDate("17-Mar","Emerging");
                }
                if(SowDate == "20-Mar")
                {
                    Wheat.Phenology.SetPhaseCompletionDate("29-Mar","Emerging");
                }
                if(SowDate == "09-Apr")
                {
                    Wheat.Phenology.SetPhaseCompletionDate("22-Apr","Emerging");
                }
            }
        
        }
        
    }
}
```
            Operations HarvestEvents
              2016-02-12  [Wheat].Harvest();
              2016-02-12  [Wheat].EndCrop();
            Irrigation
            Soil: SoilType=LincolnSoil; LocalName=Lincoln; Site=Lincoln; NearestTown=Unknown; Region=NZ; NaturalVegetation=Unknown; Latitude=0; Longitude=0
              Physical: same as Validation.New Zealand.Leeston2014.Wakanui2014Base.paddock.Soil.Physical
              WaterBalance SoilWater: same as Validation.New Zealand.PalmerstonNorth1989.PalmerstonNorth1989Base.paddock.Soil.SoilWater
              Organic: same as Validation.New Zealand.PalmerstonNorth1989.PalmerstonNorth1989Base.paddock.Soil.Organic
              Chemical: same as Validation.New Zealand.PalmerstonNorth1989.PalmerstonNorth1989Base.paddock.Soil.Chemical
              Water: Thickness=[100, 200, 200, 200, 200, 200, 200, 200]; InitialValues=[0.24, 0.27, 0.26, 0.23, 0.24, 0.23, 0.23, 0.18]; FilledFromTop=false
              Nutrient
              Solute NO3: Thickness=[100, 200, 200, 200, 200, 200, 200, 200]; InitialValuesUnits=ppm; WaterTableConcentration=0; D0=0; DepthConstant=0; MaxDepthSoluteAccessible=0; RunoffEffectivenessAtMovingSolute=0; MaxEffectiveRunoff=0
                InitialValues=[30.7692, 3.84615, 7.69231, 3.84615, 3.84615, 3.84615, 3.84615, 3.84615]
              Solute NH4: same as Validation.New Zealand.PalmerstonNorth1989.PalmerstonNorth1989Base.paddock.Soil.NH4
              Solute Urea: same as Validation.New Zealand.PalmerstonNorth1989.PalmerstonNorth1989Base.paddock.Soil.Urea
              SoilTemperature Temperature: InteractionsPerDay=8
            SurfaceOrganicMatter Surface Organic Matter: InitialResidueName=wheat_stubble; InitialResidueType=whiteclover; InitialResidueMass=1000; InitialStandingFraction=0; InitialCPR=0; InitialCNR=80
            Fertiliser
            MicroClimate: a_interception=0; b_interception=1; c_interception=0; d_interception=0; SoilHeatFluxFraction=0.4; MinimumHeightDiffForNewLayer=0; NightInterceptionFraction=0.5; ReferenceHeight=2
            Plant Wheat
            Report DailyReport
            Report HarvestReport
            Manager OutputMaxLeafSize
            Report MaxLeafSizeReport
            Report NDVIDailyReport
            Spectral: DrySoilNDVI=0.16; WetSoilNDVI=0.21; GreenCropNDVI=0.89; DeadCropNDVI=0.1
          SoilArbitrator Soil Arbitrator
          Manager LocationInfo: same as Validation.New Zealand.Lincoln1991.LincolnBase.LocationInfo
        Memo Leaf Size Predictions
          This graph shows different leaf size profiles measured for winter wheat sown on a range of different dates.  Leaves that emerge during cooler conditions achieve a smallter maximum size than the equivelent leaf appearanign in warm conditions.
      Experiment Wakanui2016
        Memo: same as Validation.New Zealand.PalmerstonNorth1989.Memo
        Factors
          Permutation
            Factor Sow: Specification=[Sowing].Script.SowDate = 24-Feb,08-Mar,29-Mar,14-Apr
            Factor Cm: Specification=[Defoliation].Script.Defoliated = Normal
        Simulation Wakanui2016Base
          Clock: Start=2016-02-01; End=2017-02-15
          Summary summaryfile
          Weather: FileName=met/Wakanui.met
          Zone paddock: Area=1; Slope=0; AspectAngle=0; Altitude=50
            Operations IrrigationEvents
              2016-11-20  [Irrigation].Apply(25.0);
              2016-12-10  [Irrigation].Apply(25.0);
            Operations FertiliserEvents
              2016-09-11  [Fertiliser].Apply(92, "UreaN", 10);
              2016-10-28  [Fertiliser].Apply(97, "UreaN", 10);
              2016-11-02  [Fertiliser].Apply(69, "UreaN", 10);
            Manager Sowing
              SowDate =
              CultivarName = Wakanui
              SowingDepth = 50
              RowSpacing = 150
              Population = 150
```csharp
using Models.Soils.Nutrients;
using System;
using Models.Core;
using Models.PMF;
using Models.Soils;
using Models.Soils.Nutrients;
using Models.Utilities;
using APSIM.Shared.Utilities;

namespace Models
{
    [Serializable]
    public class Script : Model
    {
        [Link] Clock Clock;
        [Link] Summary Summary;
        [Link] Soil Soil;
        [Link] Plant Wheat;
        Accumulator accumulatedRain;
        
        [Description("Sowing date (d-mmm)")]
        public string SowDate { get; set; }
        [Description("Cultivar to be sown")]
        public string CultivarName { get; set; }
        [Description("Sowing depth (mm)")]
        public double SowingDepth { get; set; }
        [Description("Row spacing (mm)")]
        public double RowSpacing { get; set; }
        [Description("Plant population (/m2)")]
        public double Population { get; set; }
        


        [EventSubscribe("DoManagement")]
        private void OnDoManagement(object sender, EventArgs e)
        {
            if (DateUtilities.WithinDates(SowDate, Clock.Today, SowDate))
            {
                Wheat.Sow(population: Population, cultivar: CultivarName, depth: SowingDepth, rowSpacing: RowSpacing);    
                if(SowDate == "24-Feb")
                {
                    Wheat.Phenology.SetPhaseCompletionDate("2-Mar","Emerging");
                }
                if(SowDate == "08-Mar")
                {
                    Wheat.Phenology.SetPhaseCompletionDate("17-Mar","Emerging");
                }
                if(SowDate == "29-Mar")
                {
                    Wheat.Phenology.SetPhaseCompletionDate("11-Apr","Emerging");
                }
                if(SowDate == "14-Apr")
                {
                    Wheat.Phenology.SetPhaseCompletionDate("26-Apr","Emerging");
                }
            }
        
        }
        
    }
}
```
            Operations HarvestEvents
              2017-02-12  [Wheat].Harvest();
              2017-02-12  [Wheat].EndCrop();
            Manager Defoliation
              NibblingDate = 10/31/2002 00:00:00
              ProportionNibbled = 0.5
              Defoliated = False
```csharp
using APSIM.Core;
using Models.Soils;
using System.Xml.Serialization;
using Models.PMF;
using Models.Core;
using System.Collections.Generic;
using System;
using Newtonsoft.Json;
using Models.PMF.Interfaces;

namespace Models
{
    [Serializable] 
    [System.Xml.Serialization.XmlInclude(typeof(Model))]
    public class Script : Model, IStructureDependency
    {
        [Link] private Plant Wheat;
        [Link] private Clock Clock;
        
        public IStructure Structure { private get; set; }

        [Description("Date that mouse damage event occurs")]
        public DateTime NibblingDate { get; set; }
        [Description("Proportion of the crop removed by mice")]
        public double ProportionNibbled { get; set; }
        [Description("Switch if crop is defoliated")]
        public string Defoliated {get; set;}
        

        
        [EventSubscribe("StartOfSimulation")]
        private void OnSimulationCommencing(object sender, EventArgs e)
        {
            
        }
        
        [EventSubscribe("DoManagement")]
        private void OnDoManagement(object sender, EventArgs e)
        {
            //Set up  array of remove fractions to send with Cut method.  Each member in the array corresponds to an organ in the same order they are set up in.

            if (Clock.Today.Date == NibblingDate)
            {
                //Harvest with manager specified removal fractions
                Wheat.structure?.DoThin(ProportionNibbled);
                var Grain =   Structure.FindChild<IHasDamageableBiomass>("Grain", relativeTo: (INodeModel)Wheat);
                var Leaf =   Structure.FindChild<IHasDamageableBiomass>("Leaf", relativeTo: (INodeModel)Wheat);
                var Stem =   Structure.FindChild<IHasDamageableBiomass>("Stem", relativeTo: (INodeModel)Wheat);
                var Spike =   Structure.FindChild<IHasDamageableBiomass>("Spike", relativeTo: (INodeModel)Wheat);
                var Root =   Structure.FindChild<IHasDamageableBiomass>("Root", relativeTo: (INodeModel)Wheat);
                Grain.RemoveBiomass(liveToRemove: 0, deadToRemove: 0.0, liveToResidue: ProportionNibbled, deadToResidue: 0.0);
                Leaf.RemoveBiomass(liveToRemove: 0, deadToRemove: 0.0, liveToResidue: ProportionNibbled, deadToResidue: 0.0);
                Stem.RemoveBiomass(liveToRemove: 0, deadToRemove: 0.0, liveToResidue: ProportionNibbled, deadToResidue: 0.0);
                Spike.RemoveBiomass(liveToRemove: 0, deadToRemove: 0.0, liveToResidue: ProportionNibbled, deadToResidue: 0.0);
                Root.RemoveBiomass(liveToRemove: 0, deadToRemove: 0.0, liveToResidue: 0, deadToResidue: 0.0);

            }
        }
    }
}
```
            Irrigation
            Soil: same as Validation.New Zealand.Leeston2014.Wakanui2014Base.paddock.Soil
            SurfaceOrganicMatter Surface Organic Matter: InitialResidueName=wheat_stubble; InitialResidueType=wheat; InitialResidueMass=1000; InitialStandingFraction=0; InitialCPR=0; InitialCNR=80
            Fertiliser
            MicroClimate: a_interception=0; b_interception=1; c_interception=0; d_interception=0; SoilHeatFluxFraction=0.4; MinimumHeightDiffForNewLayer=0; NightInterceptionFraction=0.5; ReferenceHeight=2
            Plant Wheat
            Report DailyReport
            Report HarvestReport
            Manager MaxLeafSize
            Report MaxLeafSizeReport
            Report NDVIDailyReport
            Spectral: DrySoilNDVI=0.16; WetSoilNDVI=0.21; GreenCropNDVI=0.89; DeadCropNDVI=0.1
            Manager OutputMaxLeafSize: same as Validation.SE Queensland.APS6.APS6Base.paddock.OutputMaxLeafSize
          SoilArbitrator Soil Arbitrator
          Manager LocationInfo: same as Validation.New Zealand.Lincoln1991.LincolnBase.LocationInfo
        Memo Leaf Size Predictions
          This graph shows different leaf size profiles measured for winter wheat sown on a range of different dates.  Leaves that emerge during cooler conditions achieve a smallter maximum size than the equivelent leaf appearanign in warm conditions.
      Experiment Wakanui2017
        Memo: same as Validation.New Zealand.PalmerstonNorth1989.Memo
        Factors
          Permutation
            Factor Sow: Specification=[Sowing].Script.SowDate = 09-Mar,30-Mar,19-Apr
            Factor Cm: Specification=[Defoliation].Script.Defoliated = Normal
        Simulation Wakanui2017Base
          Clock: Start=2017-02-01; End=2018-02-15
          Summary summaryfile
          Weather: FileName=met/Wakanui.met
          Zone paddock: Area=1; Slope=0; AspectAngle=0; Altitude=50
            Operations IrrigationEvents
              2017-11-11  [Irrigation].Apply(40.0);
              2017-12-02  [Irrigation].Apply(40.0);
              2017-12-24  [Irrigation].Apply(45.0);
            Operations FertiliserEvents
              2017-09-13  [Fertiliser].Apply(100, "UreaN", 10);
              2017-10-13  [Fertiliser].Apply(100, "UreaN", 10);
              2017-11-02  [Fertiliser].Apply(70, "UreaN", 10);
            Manager Sowing
              SowDate =
              CultivarName = Wakanui
              SowingDepth = 50
              RowSpacing = 150
              Population = 150
```csharp
using Models.Soils.Nutrients;
using System;
using Models.Core;
using Models.PMF;
using Models.Soils;
using Models.Soils.Nutrients;
using Models.Utilities;
using APSIM.Shared.Utilities;

namespace Models
{
    [Serializable]
    public class Script : Model
    {
        [Link] Clock Clock;
        [Link] Summary Summary;
        [Link] Soil Soil;
        [Link] Plant Wheat;
        Accumulator accumulatedRain;
        
        [Description("Sowing date (d-mmm)")]
        public string SowDate { get; set; }
        [Description("Cultivar to be sown")]
        public string CultivarName { get; set; }
        [Description("Sowing depth (mm)")]
        public double SowingDepth { get; set; }
        [Description("Row spacing (mm)")]
        public double RowSpacing { get; set; }
        [Description("Plant population (/m2)")]
        public double Population { get; set; }
        


        [EventSubscribe("DoManagement")]
        private void OnDoManagement(object sender, EventArgs e)
        {
            if (DateUtilities.WithinDates(SowDate, Clock.Today, SowDate))
            {
                Wheat.Sow(population: Population, cultivar: CultivarName, depth: SowingDepth, rowSpacing: RowSpacing);    
            }
                if(SowDate == "09-Mar")
                {
                    Wheat.Phenology.SetPhaseCompletionDate("16-Mar","Emerging");
                }
                if(SowDate == "30-Mar")
                {
                    Wheat.Phenology.SetPhaseCompletionDate("11-Apr","Emerging");
                }
                if(SowDate == "19-Apr")
                {
                    Wheat.Phenology.SetPhaseCompletionDate("30-Apr","Emerging");
                }
        }
        
    }
}
```
            Operations HarvestEvents
              2018-02-04  [Wheat].Harvest();
              2018-02-04  [Wheat].EndCrop();
            Manager Defoliation: same as Validation.New Zealand.Wakanui2016.Wakanui2016Base.paddock.Defoliation
            Irrigation
            Soil: same as Validation.New Zealand.Leeston2014.Wakanui2014Base.paddock.Soil
            SurfaceOrganicMatter Surface Organic Matter: InitialResidueName=wheat_stubble; InitialResidueType=wheat; InitialResidueMass=1000; InitialStandingFraction=0; InitialCPR=0; InitialCNR=80
            Fertiliser
            MicroClimate: a_interception=0; b_interception=1; c_interception=0; d_interception=0; SoilHeatFluxFraction=0.4; MinimumHeightDiffForNewLayer=0; NightInterceptionFraction=0.5; ReferenceHeight=2
            Plant Wheat
            Report DailyReport
            Report HarvestReport
            Manager MaxLeafSize
            Report MaxLeafSizeReport
            Report NDVIDailyReport
            Spectral: DrySoilNDVI=0.16; WetSoilNDVI=0.21; GreenCropNDVI=0.89; DeadCropNDVI=0.1
            Manager OutputMaxLeafSize: same as Validation.SE Queensland.APS6.APS6Base.paddock.OutputMaxLeafSize
          SoilArbitrator Soil Arbitrator
          Manager LocationInfo: same as Validation.New Zealand.Lincoln1991.LincolnBase.LocationInfo
      PredictedObserved NZObsPred: PredictedTableName=HarvestReport; ObservedTableName=Observed; FieldNameUsedForMatch=SimulationName; FieldName2UsedForMatch=Wheat.Phenology.CurrentStageName; AllColumns=false
    Folder Southern Australia
      Folder van Herwaarden et al  1998
        Experiment Wagga1991
          Factors
            Factor N: Specification=[NSchedule]
              Operations 0
                1991-05-26  [Fertiliser].Apply(amount: 0, type: "UreaGranular");
              Operations 40
                1991-05-26  [Fertiliser].Apply(amount: 40, type: "UreaGranular");
              Operations 80
                1991-05-26  [Fertiliser].Apply(amount: 80, type: "UreaGranular");
              Operations 120
                1991-05-26  [Fertiliser].Apply(amount: 120, type: "UreaGranular");
              Operations 160
                1991-05-26  [Fertiliser].Apply(amount: 80, type: "UreaGranular");
                1991-07-31  [Fertiliser].Apply(amount: 80, type: "UreaGranular");
              Operations 200
                1991-05-26  [Fertiliser].Apply(amount: 80, type: "UreaGranular");
                1991-07-31  [Fertiliser].Apply(amount: 120, type: "UreaGranular");
          Simulation Wagga91Base
            Memo Phenology Not modeled
              This is a critical experiment for testing the models performance in a "Haying Off" situation.  As such, we have forced the phenology to occur on observed days to take that coufounding out of the models predictions of biomass response to N rate and water stress.
            Clock: Start=1991-05-24; End=1991-12-12
            Summary summaryfile
            Weather: FileName=met/Wagga1991.met
            SoilArbitrator Soil Arbitrator
            Zone paddock: Area=1; Slope=0; AspectAngle=0; Altitude=50
              Irrigation
              Fertiliser
              SurfaceOrganicMatter: InitialResidueName=canola; InitialResidueType=canola; InitialResidueMass=1000; InitialStandingFraction=0; InitialCPR=0; InitialCNR=80
              Plant Wheat
              Operations CropSchedule
                1991-05-26  [Wheat].Sow(population:138, cultivar:"Matong", depth:30, rowSpacing:200);
              Operations NSchedule
              MicroClimate: a_interception=0; b_interception=1; c_interception=0; d_interception=0; SoilHeatFluxFraction=0.4; MinimumHeightDiffForNewLayer=0; NightInterceptionFraction=0.5; ReferenceHeight=2
              Soil: ASCOrder=Kandasol; ASCSubOrder=Red; SoilType=?; Site=Generic; NearestTown=Wagga Wagga; Region=Riverina; State=New South Wales; Country=Australia; ApsoilNumber=498-GENERIC; Latitude=-35.1155; Longitude=147.3695; LocationAccuracy=Regional Soil Type; DataSource=Generic soil; Comments=Generic soil developed for CSU.
                Physical
                  Thickness  BD    AirDry  LL15  DUL   SAT
                  100        1.48  0.055   0.11  0.29  0.35
                  150        1.5   0.104   0.13  0.27  0.34
                  150        1.45  0.15    0.15  0.25  0.32
                  150        1.37  0.15    0.15  0.28  0.36
                  150        1.43  0.15    0.15  0.29  0.35
                  300        1.55  0.15    0.15  0.31  0.34
                  300        1.67  0.15    0.15  0.31  0.34
                  300        1.62  0.15    0.15  0.32  0.35
                  SoilCrop WheatSoil: LL=[0.11, 0.13, 0.15, 0.17, 0.19, 0.22, 0.23, 0.25]; KL=[0.06, 0.06, 0.06, 0.04, 0.03, 0.02, 0.02, 0.01]; XF=[1, 1, 1, 0.9, 0.9, 0.9, 0.9, 0.8]
                WaterBalance SoilWater: SummerDate=1-Nov; SummerU=6; SummerCona=3.5; WinterDate=1-Apr; WinterU=2; WinterCona=2; DiffusConst=44; DiffusSlope=16; Salb=0.13; CN2Bare=75; CNRed=20; CNCov=0.8; PSIDul=-100; Thickness=[100, 150, 150, 150, 150, 300, 300, 300]; SWCON=[0.5, 0.4, 0.3, 0.3, 0.2, 0.1, 0.1, 0.1]
                Organic: FOMCNRatio=45; CarbonUnits=Total
                  Thickness  Carbon  SoilCNRatio  FBiom  FInert  FOM
                  100        1       12.5         0.03   0.4     437.343
                  150        0.5     12.5         0.02   0.6     330.124
                  150        0.5     12.5         0.02   0.7     249.19
                  150        0.5     12.5         0.02   0.8     188.099
                  150        0.5     12.5         0.01   0.9     141.984
                  300        0.5     12.5         0.01   0.9     80.9003
                  300        0.5     12.5         0.01   1       46.0956
                  300        0.5     12.5         0.01   1       26.2645
                Chemical: Thickness=[100, 150, 150, 150, 150, 300, 300, 300]; PH=[6, 6, 6, 6, 6, 6, 6, 6]; PHUnits=Water
                Water: Thickness=[100, 150, 150, 150, 150, 300, 300, 300]; InitialValues=[0.29, 0.27, 0.25, 0.28, 0.29, 0.30995, 0.15, 0.15]; FilledFromTop=true
                Nutrient
                Solute NO3: Thickness=[100, 150, 150, 150, 150, 300, 300, 300]; InitialValues=[25, 22, 16, 5, 1, 1, 1, 1]; InitialValuesUnits=ppm; WaterTableConcentration=0; D0=0; DepthConstant=0; MaxDepthSoluteAccessible=0; RunoffEffectivenessAtMovingSolute=0; MaxEffectiveRunoff=0
                Solute NH4: Thickness=[100, 150, 150, 150, 150, 300, 300, 300]; InitialValues=[0, 0, 0, 0, 0, 0, 0, 0.0666667]; InitialValuesUnits=ppm; WaterTableConcentration=0; D0=0; DepthConstant=0; MaxDepthSoluteAccessible=0; RunoffEffectivenessAtMovingSolute=0; MaxEffectiveRunoff=0
                Solute Urea: Thickness=[100, 150, 150, 150, 150, 300, 300, 300]; InitialValues=[0, 0, 0, 0, 0, 0, 0, 0]; InitialValuesUnits=kg/ha; WaterTableConcentration=0; D0=0; DepthConstant=0; MaxDepthSoluteAccessible=0; RunoffEffectivenessAtMovingSolute=0; MaxEffectiveRunoff=0
                SoilTemperature Temperature: InteractionsPerDay=8
              Report DailyReport
              Report HarvestReport
              Manager Harvesting
              Report analysis: EventNames=[Clock].EndOfDay
                VariableNames:
                  [Clock].Today
                  [Wheat].Leaf.DMDemand.Total
                  [Wheat].Stem.DMDemand.Total
                  [Wheat].Spike.DMDemand.Total
                  [Wheat].Grain.DMDemand.Total
                  [Wheat].Leaf.DMDemand.Structural
                  [Wheat].Stem.DMDemand.Structural
                  [Wheat].Spike.DMDemand.Structural
                  [Wheat].Grain.DMDemand.Structural
                  [Wheat].Leaf.DMDemand.Storage
                  [Wheat].Stem.DMDemand.Storage
                  [Wheat].Spike.DMDemand.Storage
                  [Wheat].Grain.DMDemand.Storage
                  [Wheat].Root.Depth
                  [Wheat].Phenology.CurrentStageName
              SetModelParamsBySimulation SetPhenologyParams: SetEventName=[Plant].PlantSowing; ParameterFile=inputs/Wagga1991ParameterSets.csv
            Manager LocationInfo
              Country = Australia
              State = New South Wales
              Region = NSW VIC Slopes
              script: same as in Validation.SE Queensland.APS26.APS26NRate160WaterWet.LocationInfo
        Experiment Ginninderra1991
          Factors
            Permutation
              Factor N: Specification=[NSchedule]
                Operations 0
                  1991-06-21  [Fertiliser].Apply(amount: 0, type: "UreaN");
                Operations 40
                  1991-06-21  [Fertiliser].Apply(amount: 40, type: "UreaN");
                Operations 80
                  1991-06-21  [Fertiliser].Apply(amount: 80, type: "UreaN");
                Operations 120
                  1991-06-21  [Fertiliser].Apply(amount: 120, type: "UreaN");
                Operations 160
                  1991-06-21  [Fertiliser].Apply(amount: 160, type: "UreaN");
                Operations 200
                  1991-06-21  [Fertiliser].Apply(amount: 200, type: "UreaN");
                Operations 240
                  1991-06-21  [Fertiliser].Apply(amount: 240, type: "UreaN");
              Factor Cv: Specification=[CropSchedule]
                Operations Janz
                  1991-06-21  [Wheat].Sow(population:180, cultivar:"Janz", depth:30, rowSpacing:200);
                  1991-11-10  [Irrigation].Apply(amount:27);
                  1991-11-20  [Irrigation].Apply(amount:28);
                  1991-12-21  [Wheat].Harvest();
                  1991-12-21  [Wheat].EndCrop();
          Simulation Ginninderra91Base
            Clock: Start=1991-06-20; End=1991-12-31
            Summary summaryfile
            Weather: FileName=met/Ginninderra.met
            SoilArbitrator Soil Arbitrator
            Zone paddock: Area=1; Slope=0; AspectAngle=0; Altitude=50
              Irrigation
              Fertiliser
              SurfaceOrganicMatter: InitialResidueName=canola; InitialResidueType=canola; InitialResidueMass=1000; InitialStandingFraction=0; InitialCPR=0; InitialCNR=80
              Plant Wheat
              Operations CropSchedule: same as Validation.Southern Australia.van Herwaarden et al  1998.Ginninderra1991.Factors.Permutation.Cv.Janz
              Operations NSchedule
              MicroClimate: a_interception=0; b_interception=1; c_interception=0; d_interception=0; SoilHeatFluxFraction=0.4; MinimumHeightDiffForNewLayer=0; NightInterceptionFraction=0.5; ReferenceHeight=2
              Soil: SoilType=unknown; LocalName=Ginninderra; Site=Ginninderra; NearestTown=Ginninderra; Region=ACT; NaturalVegetation=Unknown; Latitude=0; Longitude=0
                Water: FilledFromTop=true
                  Thickness=[100, 100, 100, 100, 100, 100, 100, 100, 100, 100, 100, 100, 100, 100, 100, 100, 100, 100, 100, 100]
                  InitialValues=[0.3, 0.32, 0.32, 0.33, 0.35, 0.37, 0.36, 0.35, 0.34, 0.33, 0.34, 0.35, 0.36, 0.37, 0.37, 0.355, 0.35, 0.33, 0.33, 0.33]
                Physical
                  Thickness  BD    AirDry  LL15   DUL    SAT
                  100        1.45  0.04    0.073  0.3    0.414
                  100        1.5   0.04    0.075  0.32   0.394
                  100        1.55  0.06    0.074  0.32   0.375
                  100        1.5   0.1     0.12   0.33   0.394
                  100        1.52  0.1     0.16   0.35   0.386
                  100        1.55  0.1     0.25   0.37   0.375
                  100        1.57  0.1     0.25   0.36   0.367
                  100        1.6   0.1     0.24   0.35   0.355
                  100        1.62  0.1     0.259  0.34   0.347
                  100        1.65  0.1     0.281  0.33   0.335
                  100        1.62  0.1     0.295  0.34   0.347
                  100        1.6   0.1     0.272  0.35   0.355
                  100        1.58  0.1     0.269  0.36   0.363
                  100        1.55  0.1     0.264  0.37   0.375
                  100        1.55  0.1     0.256  0.37   0.375
                  100        1.55  0.1     0.256  0.355  0.375
                  100        1.55  0.1     0.256  0.35   0.375
                  100        1.55  0.1     0.256  0.33   0.375
                  100        1.55  0.1     0.256  0.33   0.375
                  100        1.55  0.1     0.256  0.33   0.375
                  SoilCrop wheatSoil
                    LL=[0.073, 0.075, 0.074, 0.12, 0.16, 0.25, 0.25, 0.24, 0.259, 0.281, 0.295, 0.272, 0.269, 0.264, 0.256, 0.256, 0.256, 0.256, 0.256, 0.256]
                    KL=[0.08, 0.08, 0.08, 0.08, 0.08, 0.08, 0.08, 0.08, 0.08, 0.07, 0.07, 0.06, 0.06, 0.05, 0.05, 0.04, 0.04, 0.03, 0.02, 0.01]
                    XF=[1, 1, 1, 1, 1, 1, 1, 1, 1, 1, 1, 1, 1, 1, 1, 0, 0, 0, 0, 0]
                WaterBalance SoilWater: SummerDate=1-Nov; SummerU=2; SummerCona=2; WinterDate=1-Apr; WinterU=2; WinterCona=2; DiffusConst=88; DiffusSlope=35.4; Salb=0.13; CN2Bare=72; CNRed=20; CNCov=0.8; DischargeWidth=0; CatchmentArea=0; PSIDul=-100
                  Thickness  SWCON  KLAT
                  100        0.4    0
                  100        0.4    0
                  100        0.4    0
                  100        0.4    0
                  100        0.4    0
                  100        0.4    0
                  100        0.4    0
                  100        0.4    0
                  100        0.4    0
                  100        0.4    0
                  100        0.4    0
                  100        0.4    0
                  100        0.4    0
                  100        0.4    0
                  100        0.4    0
                  100        0.4    0
                  100        0.4    0
                  100        0.4    0
                  100        0.4    0
                  100        0.4    0
                Organic: FOMCNRatio=40; CarbonUnits=Total
                  Thickness  Carbon  SoilCNRatio  FBiom  FInert  FOM
                  100        0.83    14.5         0.04   0.36    293.181
                  100        0.35    14.5         0.03   0.35    252.343
                  100        0.33    14.5         0.03   0.45    217.194
                  100        0.22    14.5         0.02   0.45    186.94
                  100        0.22    14.5         0.02   0.59    160.901
                  100        0.22    14.5         0.02   0.6     138.489
                  100        0.19    14.5         0.02   0.84    119.198
                  100        0.17    14.5         0.02   0.8     102.595
                  100        0.15    14.5         0.01   0.8     88.3043
                  100        0.12    14.5         0.01   0.99    76.0042
                  100        0.11    14.5         0.01   0.99    65.4174
                  100        0.1     14.5         0.01   0.99    56.3053
                  100        0.1     14.5         0.01   0.99    48.4624
                  100        0.1     14.5         0.01   0.99    41.712
                  100        0.1     14.5         0.01   0.99    35.9019
                  100        0.1     14.5         0.01   0.99    30.901
                  100        0.1     14.5         0.01   0.99    26.5967
                  100        0.1     14.5         0.01   0.99    22.892
                  100        0.1     14.5         0.01   0.99    19.7034
                  100        0.1     14.5         0.01   0.99    16.9588
                Chemical: PHUnits=Water
                  Thickness=[100, 100, 100, 100, 100, 100, 100, 100, 100, 100, 100, 100, 100, 100, 100, 100, 100, 100, 100, 100]
                  PH=[5.8, 5.9, 6.6, 6.8, 7, 7.1, 7.2, 7.3, 7.4, 7.4, 7.6, 7.8, 8, 8.2, 8.3, 8.4, 8.4, 8.5, 8.5, 8.5]
                Nutrient
                Solute NO3: InitialValuesUnits=ppm; WaterTableConcentration=0; D0=0; DepthConstant=0; MaxDepthSoluteAccessible=0; RunoffEffectivenessAtMovingSolute=0; MaxEffectiveRunoff=0
                  Thickness=[100, 100, 100, 100, 100, 100, 100, 100, 100, 100, 100, 100, 100, 100, 100, 100, 100, 100, 100, 100]
                  InitialValues=[12.8949, 12.8949, 12.8949, 12.8949, 12.8949, 12.8949, 12.8949, 12.8949, 12.8949, 12.8949, 6.32911, 6.32911, 6.32911, 6.32911, 6.32911, 1.29032, 1.29032, 1.29032, 1.29032, 1.29032]
                Solute NH4: InitialValuesUnits=ppm; WaterTableConcentration=0; D0=0; DepthConstant=0; MaxDepthSoluteAccessible=0; RunoffEffectivenessAtMovingSolute=0; MaxEffectiveRunoff=0
                  Thickness=[100, 100, 100, 100, 100, 100, 100, 100, 100, 100, 100, 100, 100, 100, 100, 100, 100, 100, 100, 100]
                  InitialValues=[0.0644745, 0.0644745, 0.0644745, 0.0644745, 0.0644745, 0.0644745, 0.0644745, 0.0644745, 0.0644745, 0.0644745, 0.0126582, 0.0126582, 0.0126582, 0.0126582, 0.0126582, 0.0129032, 0.0129032, 0.0129032, 0.0129032, 0.0129032]
                Solute Urea: InitialValuesUnits=kg/ha; WaterTableConcentration=0; D0=0; DepthConstant=0; MaxDepthSoluteAccessible=0; RunoffEffectivenessAtMovingSolute=0; MaxEffectiveRunoff=0
                  Thickness=[100, 100, 100, 100, 100, 100, 100, 100, 100, 100, 100, 100, 100, 100, 100, 100, 100, 100, 100, 100]
                  InitialValues=[0, 0, 0, 0, 0, 0, 0, 0, 0, 0, 0, 0, 0, 0, 0, 0, 0, 0, 0, 0]
                SoilTemperature Temperature: InteractionsPerDay=8
              Report DailyReport
              Report HarvestReport
            Manager LocationInfo
              Country = Australia
              State = Australian Capital Territory
              Region =
              script: same as in Validation.SE Queensland.APS26.APS26NRate160WaterWet.LocationInfo
      Folder Wagga1314
        Memo
          The dataset of [#Zeleke2016] includes plantings of two wheat varieties (Gregory, Livingston) under two water regimes (dry and irrigated) for 2013 and 2014 at the Wagga Wagga Agricultural Research Institute. Yields ranged from 1.63 t/ha to 6.01 t/ha.
        Experiment Wagga2013
          Factors
            Permutation
              Factor Cv: Specification=[CropSchedule]
                Operations Gregory
                  2013-06-24  [Wheat].Sow(population:120, cultivar:"Gregory", depth:30, rowSpacing:200);
                  2013-06-24  [Fertiliser].Apply(amount: 100, type: "UreaN");
                Operations Livingston
                  2013-06-24  [Wheat].Sow(population:120, cultivar:"Livingston", depth:30, rowSpacing:200);
                  2013-06-24  [Fertiliser].Apply(amount: 100, type: "UreaN");
              Factor Water: Specification=[IrrigationSchedule]
                Operations Wet
                  2013-09-10  [Irrigation].Apply(amount:26);
                  2013-09-11  [Irrigation].Apply(amount:26);
                  2013-09-26  [Irrigation].Apply(amount:26);
                  2013-10-01  [Irrigation].Apply(amount:26);
                  2013-10-04  [Irrigation].Apply(amount:26);
                  2013-10-09  [Irrigation].Apply(amount:26);
                  2013-10-10  [Irrigation].Apply(amount:26);
                  2013-10-14  [Irrigation].Apply(amount:26);
                  2013-10-15  [Irrigation].Apply(amount:26);
                  2013-10-16  [Irrigation].Apply(amount:26);
                Operations Dry
          Simulation Ketema2013
            Clock: Start=2013-06-24; End=2013-12-30
            Summary summaryfile
            Weather: FileName=met/Wagga1314.met
            SoilArbitrator Soil Arbitrator
            Zone paddock: Area=1; Slope=0; AspectAngle=0; Altitude=50
              Irrigation
              Fertiliser
              SurfaceOrganicMatter: InitialResidueName=canola; InitialResidueType=canola; InitialResidueMass=1000; InitialStandingFraction=0; InitialCPR=0; InitialCNR=80
              Plant Wheat
              Operations CropSchedule
              Operations IrrigationSchedule
              MicroClimate: a_interception=0; b_interception=1; c_interception=0; d_interception=0; SoilHeatFluxFraction=0.4; MinimumHeightDiffForNewLayer=0; NightInterceptionFraction=0.5; ReferenceHeight=2
              Soil: ASCOrder=Kandasol; ASCSubOrder=Red; SoilType=?; Site=Generic; NearestTown=Wagga Wagga; Region=Riverina; State=New South Wales; Country=Australia; ApsoilNumber=498-GENERIC; Latitude=-35.1155; Longitude=147.3695; LocationAccuracy=Regional Soil Type; DataSource=Generic soil; Comments=Generic soil developed for CSU.
                Physical
                  Thickness  BD    AirDry  LL15  DUL   SAT
                  100        1.48  0.055   0.11  0.29  0.35
                  150        1.5   0.104   0.13  0.27  0.34
                  150        1.45  0.15    0.15  0.25  0.32
                  150        1.37  0.15    0.15  0.28  0.36
                  150        1.43  0.15    0.15  0.29  0.35
                  300        1.55  0.15    0.15  0.31  0.34
                  300        1.67  0.15    0.15  0.31  0.34
                  300        1.62  0.15    0.15  0.32  0.35
                  SoilCrop WheatSoil: LL=[0.11, 0.13, 0.15, 0.17, 0.19, 0.22, 0.26, 0.28]; KL=[0.06, 0.06, 0.04, 0.04, 0.04, 0.04, 0.02, 0.02]; XF=[1, 1, 1, 0.9, 0.9, 0.9, 0.9, 0.8]
                WaterBalance SoilWater: SummerDate=1-Nov; SummerU=6; SummerCona=3.5; WinterDate=1-Apr; WinterU=2; WinterCona=2; DiffusConst=44; DiffusSlope=16; Salb=0.13; CN2Bare=84; CNRed=20; CNCov=0.8; PSIDul=-100; Thickness=[100, 150, 150, 150, 150, 300, 300, 300]; SWCON=[0.5, 0.4, 0.3, 0.3, 0.2, 0.1, 0.1, 0.1]
                Organic: same as Validation.Southern Australia.van Herwaarden et al  1998.Wagga1991.Wagga91Base.paddock.Soil.Organic
                Chemical: Thickness=[100, 150, 150, 150, 150, 300, 300, 300]; PH=[6, 6, 6, 6, 6, 6, 6, 6]; PHUnits=Water
                Water: Thickness=[100, 150, 150, 150, 150, 300, 300, 300]; InitialValues=[0.272, 0.256, 0.24, 0.267, 0.276, 0.294, 0.294, 0.303]; FilledFromTop=false
                Nutrient
                Solute NO3: Thickness=[100, 150, 150, 150, 150, 300, 300, 300]; InitialValues=[0.542, 0.542, 0.542, 0.542, 0.542, 0.542, 0.694667, 1]; InitialValuesUnits=ppm; WaterTableConcentration=0; D0=0; DepthConstant=0; MaxDepthSoluteAccessible=0; RunoffEffectivenessAtMovingSolute=0; MaxEffectiveRunoff=0
                Solute NH4: Thickness=[100, 150, 150, 150, 150, 300, 300, 300]; InitialValues=[0, 0, 0, 0, 0, 0, 0.0666667, 0.2]; InitialValuesUnits=ppm; WaterTableConcentration=0; D0=0; DepthConstant=0; MaxDepthSoluteAccessible=0; RunoffEffectivenessAtMovingSolute=0; MaxEffectiveRunoff=0
                Solute Urea: same as Validation.Southern Australia.van Herwaarden et al  1998.Wagga1991.Wagga91Base.paddock.Soil.Urea
                SoilTemperature Temperature: InteractionsPerDay=8
              Report DailyReport
              Report HarvestReport
              Manager Harvesting
            Manager LocationInfo: same as Validation.Southern Australia.van Herwaarden et al  1998.Wagga1991.Wagga91Base.LocationInfo
        Experiment Wagga2014
          Factors
            Permutation
              Factor Cv: Specification=[CropSchedule]
                Operations Gregory
                  2014-04-30  [Wheat].Sow(population:120, cultivar:"Gregory", depth:30, rowSpacing:200);
                  2014-04-30  [Fertiliser].Apply(amount: 100, type: "UreaN");
                  2014-07-01  [Fertiliser].Apply(amount: 50, type: "UreaN");
                Operations Livingston
                  2014-04-30  [Wheat].Sow(population:120, cultivar:"Livingston", depth:30, rowSpacing:200);
                  2014-04-30  [Fertiliser].Apply(amount: 100, type: "UreaN");
                  2014-07-01  [Fertiliser].Apply(amount: 50, type: "UreaN");
              Factor Water: Specification=[IrrigationSchedule]
                Operations Wet
                  2014-05-16  [Irrigation].Apply(amount:26);
                  2014-08-11  [Irrigation].Apply(amount:26);
                  2014-08-12  [Irrigation].Apply(amount:26);
                  2014-08-18  [Irrigation].Apply(amount:26);
                  2014-08-25  [Irrigation].Apply(amount:26);
                  2014-09-01  [Irrigation].Apply(amount:21);
                  2014-09-05  [Irrigation].Apply(amount:26);
                  2014-09-22  [Irrigation].Apply(amount:26);
                  2014-10-10  [Irrigation].Apply(amount:26);
                Operations Dry
          Simulation Ketema2014
            Clock: Start=2014-04-30; End=2014-12-30
            Summary summaryfile
            Weather: FileName=met/Wagga1314.met
            SoilArbitrator Soil Arbitrator
            Zone paddock: Area=1; Slope=0; AspectAngle=0; Altitude=50
              Irrigation
              Fertiliser
              SurfaceOrganicMatter: InitialResidueName=wheat; InitialResidueType=wheat; InitialResidueMass=1000; InitialStandingFraction=0; InitialCPR=0; InitialCNR=80
              Plant Wheat
              Operations CropSchedule
              Operations IrrigationSchedule
              MicroClimate: a_interception=0; b_interception=1; c_interception=0; d_interception=0; SoilHeatFluxFraction=0.4; MinimumHeightDiffForNewLayer=0; NightInterceptionFraction=0.5; ReferenceHeight=2
              Soil: same as Validation.Southern Australia.Wagga1314.Wagga2013.Ketema2013.paddock.Soil
              Report HarvestReport
              Report DailyReport
              Manager Harvesting
            Manager LocationInfo: same as Validation.Southern Australia.van Herwaarden et al  1998.Wagga1991.Wagga91Base.LocationInfo
      Folder YarrabahCreek
        Memo
          This trial was conducted on a Vertosol soil on the Liverpool Plains, central-eastern Australia in 2001.  Hybrid Mercury was sown on 19th of June and biomass, leaf area, phenology, soil water (Neutron Moisture Meter) and water use (Bowen Ratio method) were monitored.  More information can be found in [#Young2008].
        Simulation YarrabahCreek
          Clock: Start=2001-06-19; End=2001-12-05
          Summary summaryfile
          Weather: FileName=met/Ycreek.met
          SoilArbitrator Soil Arbitrator
          Zone Field: Area=1; Slope=0; AspectAngle=0; Altitude=50
            Irrigation
            Fertiliser
            Operations CropManagement
              2001-06-19  [Wheat].Sow(population:70, cultivar:"Mercury", depth:30, rowSpacing:250);
              2001-06-19  [Fertiliser].Apply(amount: 120, type: "UreaN");
              2001-12-05  [Wheat].Harvest();
            Soil: SoilType=APS6Soil; LocalName=APS6Site; Site=APS6Site; NearestTown=Unknown; Region=Lawes; NaturalVegetation=Unknown; Latitude=0; Longitude=0
              Physical
                Thickness  BD   AirDry  LL15  DUL   SAT
                100        1    0.1     0.27  0.47  0.51
                200        1.1  0.1     0.27  0.49  0.51
                200        1.1  0.1     0.3   0.55  0.57
                200        1.1  0.1     0.32  0.55  0.55
                200        1.1  0.1     0.34  0.53  0.54
                200        1.2  0.1     0.38  0.53  0.54
                200        1.2  0.1     0.42  0.53  0.54
                200        1.2  0.1     0.42  0.5   0.51
                200        1.2  0.1     0.42  0.48  0.51
                200        1.2  0.1     0.42  0.48  0.51
                SoilCrop WheatSoil: LL=[0.27, 0.27, 0.3, 0.32, 0.34, 0.38, 0.42, 0.42, 0.42, 0.42]; KL=[0.12, 0.12, 0.08, 0.06, 0.06, 0.06, 0.06, 0.06, 0, 0]; XF=[1, 1, 1, 1, 1, 1, 1, 1, 0, 0]
              WaterBalance SoilWater: SummerDate=1-Nov; SummerU=9; SummerCona=5; WinterDate=1-Apr; WinterU=9; WinterCona=5; DiffusConst=40; DiffusSlope=16; Salb=0.13; CN2Bare=78; CNRed=20; CNCov=0.8; DischargeWidth=0; CatchmentArea=0; PSIDul=-100
                Thickness  SWCON  KLAT
                150        0.2    0
                150        0.2    0
                300        0.2    0
                300        0.2    0
                300        0.2    0
                300        0.2    0
                300        0.2    0
              Organic: FOMCNRatio=60; CarbonUnits=Total
                Thickness  Carbon  SoilCNRatio  FBiom  FInert  FOM
                100        1.83    14.5         0.03   0.45    2.82811
                200        1.35    14.5         0.03   0.45    2.06229
                200        1.19    14.5         0.02   0.6     1.50385
                200        1.11    14.5         0.015  0.7     1.09663
                200        0.97    14.5         0.01   0.85    0.799675
                200        0.8     14.5         0.01   0.9     0.583133
                200        0.64    14.5         0.01   0.99    0.425228
                200        0.5     14.5         0.01   0.99    0.310082
                200        0.38    14.5         0.01   0.99    0.226116
                200        0.27    14.5         0.01   0.99    0.164887
              Chemical: Thickness=[150, 150, 300, 300, 300, 300, 300]; PH=[7.5, 8, 8, 8, 8, 8, 8]; PHUnits=Water
              Water: Thickness=[100, 200, 200, 200, 200, 200, 200, 200, 200, 200]; FilledFromTop=false
                InitialValues=[0.42, 0.46, 0.54, 0.55, 0.53, 0.51, 0.54, 0.5, 0.466, 0.43]
              Nutrient
              Solute NO3: Thickness=[150, 150, 300, 300, 300, 300, 300]; InitialValues=[19.4545, 10, 5.30303, 2.54902, 2.54902, 2.54902, 2.54902]; InitialValuesUnits=ppm; WaterTableConcentration=0; D0=0; DepthConstant=0; MaxDepthSoluteAccessible=0; RunoffEffectivenessAtMovingSolute=0; MaxEffectiveRunoff=0
              Solute NH4: same as Validation.SE Queensland.Gatton2014.14SOWbase.Field.Soil.NH4
              Solute Urea: same as Validation.SE Queensland.APS6.APS6Base.paddock.APS6Field.Urea
              SoilTemperature Temperature: InteractionsPerDay=8
            SurfaceOrganicMatter: InitialResidueName=wheat_stubble; InitialResidueType=wheat; InitialResidueMass=2000; InitialStandingFraction=0; InitialCPR=0; InitialCNR=100
            Plant Wheat
            MicroClimate: a_interception=0; b_interception=1; c_interception=0; d_interception=0; SoilHeatFluxFraction=0.4; MinimumHeightDiffForNewLayer=0; NightInterceptionFraction=0.5; ReferenceHeight=2
            Report DailyReport
            Report HarvestReport
          Manager LocationInfo
            Country = Australia
            State = New South Wales
            Region = NSW North East QLD South East
            script: same as in Validation.SE Queensland.APS26.APS26NRate160WaterWet.LocationInfo
      Experiment Mouse
        Factors
          Permutation
            Factor Removal
              Specification=[MouseActivity].Script.ProportionNibbled = 0.00, 0.05,0.10,0.25,0.50
            Factor Date
              Specification=[MouseActivity].Script.NibblingDate = 2002-09-10, 2002-10-11, 2002-10-31, 2002-12-13
        Simulation MouseBase
          Clock: Start=2002-07-10; End=2002-12-31
          Summary summaryfile
          Weather: FileName=met/hall2002.met
          SoilArbitrator Soil Arbitrator
          Zone paddock: Area=1; Slope=0; AspectAngle=0; Altitude=50
            Irrigation
            Soil: SoilType=unknown; LocalName=Ginninderra; Site=Ginninderra; NearestTown=Ginninderra; Region=ACT; NaturalVegetation=Unknown; Latitude=0; Longitude=0
              Water: FilledFromTop=true
                Thickness=[100, 100, 100, 100, 100, 100, 100, 100, 100, 100, 100, 100, 100, 100, 100, 100, 100, 100, 100, 100]
                InitialValues=[0.21, 0.234, 0.22, 0.29, 0.293, 0.37, 0.36, 0.35, 0.34, 0.33, 0.34, 0.35, 0.36, 0.37, 0.37, 0.355, 0.35, 0.33, 0.33, 0.33]
              Physical
                Thickness  BD    AirDry  LL15   DUL    SAT
                100        1.45  0.04    0.073  0.21   0.414
                100        1.5   0.04    0.075  0.234  0.394
                100        1.55  0.06    0.074  0.22   0.375
                100        1.5   0.1     0.12   0.29   0.394
                100        1.52  0.1     0.16   0.293  0.386
                100        1.55  0.1     0.25   0.37   0.375
                100        1.57  0.1     0.25   0.36   0.367
                100        1.6   0.1     0.24   0.35   0.355
                100        1.62  0.1     0.259  0.34   0.347
                100        1.65  0.1     0.281  0.33   0.335
                100        1.62  0.1     0.295  0.34   0.347
                100        1.6   0.1     0.272  0.35   0.355
                100        1.58  0.1     0.269  0.36   0.363
                100        1.55  0.1     0.264  0.37   0.375
                100        1.55  0.1     0.256  0.37   0.375
                100        1.55  0.1     0.256  0.355  0.375
                100        1.55  0.1     0.256  0.35   0.375
                100        1.55  0.1     0.256  0.33   0.375
                100        1.55  0.1     0.256  0.33   0.375
                100        1.55  0.1     0.256  0.33   0.375
                SoilCrop wheatSoil
                  LL=[0.073, 0.075, 0.074, 0.12, 0.16, 0.25, 0.25, 0.24, 0.259, 0.281, 0.295, 0.272, 0.269, 0.264, 0.256, 0.256, 0.256, 0.256, 0.256, 0.256]
                  KL=[0.08, 0.08, 0.08, 0.08, 0.08, 0.08, 0.08, 0.08, 0.08, 0.07, 0.07, 0.06, 0.06, 0.05, 0.05, 0.04, 0.04, 0.03, 0.02, 0.01]
                  XF=[1, 1, 1, 1, 1, 1, 1, 1, 1, 1, 1, 1, 1, 1, 1, 1, 1, 1, 0, 0]
              WaterBalance SoilWater: same as Validation.Southern Australia.van Herwaarden et al  1998.Ginninderra1991.Ginninderra91Base.paddock.Soil.SoilWater
              Organic: same as Validation.Southern Australia.van Herwaarden et al  1998.Ginninderra1991.Ginninderra91Base.paddock.Soil.Organic
              Chemical: same as Validation.Southern Australia.van Herwaarden et al  1998.Ginninderra1991.Ginninderra91Base.paddock.Soil.Chemical
              Nutrient
              Solute NO3: InitialValuesUnits=ppm; WaterTableConcentration=0; D0=0; DepthConstant=0; MaxDepthSoluteAccessible=0; RunoffEffectivenessAtMovingSolute=0; MaxEffectiveRunoff=0
                Thickness=[100, 100, 100, 100, 100, 100, 100, 100, 100, 100, 100, 100, 100, 100, 100, 100, 100, 100, 100, 100]
                InitialValues=[10, 15, 10, 8, 5, 2, 1, 1, 1, 1, 1, 1, 1, 1, 0, 0, 0, 0, 0, 0]
              Solute NH4: InitialValuesUnits=ppm; WaterTableConcentration=0; D0=0; DepthConstant=0; MaxDepthSoluteAccessible=0; RunoffEffectivenessAtMovingSolute=0; MaxEffectiveRunoff=0
                Thickness=[100, 100, 100, 100, 100, 100, 100, 100, 100, 100, 100, 100, 100, 100, 100, 100, 100, 100, 100, 100]
                InitialValues=[1, 1, 1, 1, 1, 1, 1, 1, 1, 1, 1, 1, 1, 1, 0, 0, 0, 0, 0, 0]
              Solute Urea: same as Validation.Southern Australia.van Herwaarden et al  1998.Ginninderra1991.Ginninderra91Base.paddock.Soil.Urea
              SoilTemperature Temperature: InteractionsPerDay=8
            SurfaceOrganicMatter: InitialResidueName=canola_stubble; InitialResidueType=canola; InitialResidueMass=1000; InitialStandingFraction=0; InitialCPR=0; InitialCNR=20
            Fertiliser
            Plant Wheat
            Operations IrrigationSchedule
              2002-11-08  [Irrigation].Apply(amount:35);
              2002-11-22  [Irrigation].Apply(amount:35);
            MicroClimate: a_interception=0; b_interception=1; c_interception=0; d_interception=0; SoilHeatFluxFraction=0.4; MinimumHeightDiffForNewLayer=0; NightInterceptionFraction=0.5; ReferenceHeight=2
            Operations SowingSchedule
              2002-08-15  [Wheat].Sow(population:100, cultivar:"H45", depth:30, rowSpacing:250);
            Manager SowingFertiliser
              Amount = 100
              script: same as in Validation.Western Australia.Cunderdin97.Cunderdin97Base.paddock.SowingFertiliser
            Manager MouseActivity
              NibblingDate = 10/31/2002 00:00:00
              ProportionNibbled = 0.5
```csharp
using APSIM.Core;
using Models.Soils;
using System.Xml.Serialization;
using Models.PMF;
using Models.Core;
using System.Collections.Generic;
using System;
using Newtonsoft.Json;
using Models.PMF.Interfaces;

namespace Models
{
    [Serializable] 
    [System.Xml.Serialization.XmlInclude(typeof(Model))]
    public class Script : Model, IStructureDependency
    {
        [Link] private Plant Wheat;
        [Link] private Clock Clock;
        
        public IStructure Structure { private get; set; }

        [Description("Date that mouse damage event occurs")]
        public DateTime NibblingDate { get; set; }
        [Description("Proportion of the crop removed by mice")]
        public double ProportionNibbled { get; set; }
        

        
        [EventSubscribe("StartOfSimulation")]
        private void OnSimulationCommencing(object sender, EventArgs e)
        {
            
        }
        
        [EventSubscribe("DoManagement")]
        private void OnDoManagement(object sender, EventArgs e)
        {
            //Set up  array of remove fractions to send with Cut method.  Each member in the array corresponds to an organ in the same order they are set up in.

            if (Clock.Today.Date == NibblingDate)
            {
                //Harvest with manager specified removal fractions
                Wheat.structure?.DoThin(ProportionNibbled);
                var Grain =   Structure.FindChild<IHasDamageableBiomass>("Grain", relativeTo: (INodeModel)Wheat);
                var Leaf =   Structure.FindChild<IHasDamageableBiomass>("Leaf", relativeTo: (INodeModel)Wheat);
                var Stem =   Structure.FindChild<IHasDamageableBiomass>("Stem", relativeTo: (INodeModel)Wheat);
                var Spike =   Structure.FindChild<IHasDamageableBiomass>("Spike", relativeTo: (INodeModel)Wheat);
                var Root =   Structure.FindChild<IHasDamageableBiomass>("Root", relativeTo: (INodeModel)Wheat);
                Grain.RemoveBiomass(liveToRemove: 0, deadToRemove: 0.0, liveToResidue: ProportionNibbled, deadToResidue: 0.0);
                Leaf.RemoveBiomass(liveToRemove: 0, deadToRemove: 0.0, liveToResidue: ProportionNibbled, deadToResidue: 0.0);
                Stem.RemoveBiomass(liveToRemove: 0, deadToRemove: 0.0, liveToResidue: ProportionNibbled, deadToResidue: 0.0);
                Spike.RemoveBiomass(liveToRemove: 0, deadToRemove: 0.0, liveToResidue: ProportionNibbled, deadToResidue: 0.0);
                Root.RemoveBiomass(liveToRemove: 0, deadToRemove: 0.0, liveToResidue: 0, deadToResidue: 0.0);

            }
        }
    }
}
```
            Report DailyReport
            Report HarvestReport
            Manager HarvestingLate
```csharp
using APSIM.Core;
using Models.Soils.Nutrients;
using System;
using Models.Core;
using System.Collections.Generic;
using System.Text;
using Models.Soils;
using Models.PMF;
using Models;
using System.Xml.Serialization;
using APSIM.Shared.Utilities;
using Models.PMF.Phen;

namespace Models
{
    [Serializable] 
    public class Script : Model, IStructureDependency
    {
        [Link] private Plant Wheat;
        [Link] private Simulation sim;
        [Link] private Clock clock;
        [Link(Type = LinkType.Path, Path = "[Wheat].Phenology")]
        private Phenology phenology;
        public IStructure Structure { private get; set; }


        

        [EventSubscribe("DoManagement")]
        private void OnDoManagement(object sender, EventArgs e)
        {
            if (phenology.CurrentPhase.Name == "GrainRipening" && DateUtilities.CompareDates("27/12/2002", clock.Today) == 1)
            {
                Wheat.Harvest();
                Wheat.EndCrop();
                Structure.Set("Clock.EndDate", clock.Today, relativeTo: sim);  
            }
        }

        [EventSubscribe("EndOfDay")]
        private void OnEndOfDay(object sender, EventArgs e)
        {
            if ((clock.Today.Equals(clock.EndDate))&&(Wheat.IsAlive))
            {
                Wheat.Harvest();
                Wheat.EndCrop();
                Structure.Set("Clock.EndDate", clock.Today, relativeTo: sim);  
            }
        }

    }
}
```
          Manager LocationInfo
            Country = Australia
            State = New South Wales
            Region =
            script: same as in Validation.SE Queensland.APS26.APS26NRate160WaterWet.LocationInfo
      PredictedObserved SAObsPred: PredictedTableName=HarvestReport; ObservedTableName=Observed; FieldNameUsedForMatch=SimulationName; FieldName2UsedForMatch=Wheat.Phenology.CurrentStageName; AllColumns=false
    Folder Europe
      Folder Belgium
        Memo
          This trial was conducted at Lonzee near Gembuloux in Belgium and is described in detail by [#Dufranne_Belgium_2011] and [#Moureaux_BelgumWheat_2008].  The trial  was run to measure carbon flux from wheat crops using eddy covariance but sufficient crop information was collected to make it suitable as a model validataion dataset also.  Crops of wheat (cultivars 'Dekan', 'Rosario', 'Ararat' for the three respective sowing dates) were sown on 14/10/2004, 13/10/2004 and 13/11/2004.  Standard management practices for winter wheat in this area were followed.  Dates for the timing of key phenological events were used to determine the developmental coefficients for each of the cultivars.
        Simulation Lonzee04
          Clock: Start=2004-10-14; End=2005-08-31
          Summary summaryfile
          Weather: FileName=met/BrusselsSouth.met
          SoilArbitrator Soil Arbitrator
          Zone Field: Area=1; Slope=0; AspectAngle=0; Altitude=50
            Irrigation
            Fertiliser
            Operations CropManagement
              2004-10-14  [Wheat].Sow(population:100, cultivar:"Dekan", depth:30, rowSpacing:250);
              2005-03-22  [Fertiliser].Apply(amount: 45, type: "NO3N");
              2005-04-12  [Fertiliser].Apply(amount: 35, type: "NO3N");
              2005-05-12  [Fertiliser].Apply(amount: 40.5, type: "NO3N");
              2005-05-30  [Fertiliser].Apply(amount: 80, type: "NO3N");
              2005-08-04  [Wheat].Harvest();
              2005-08-04  [Wheat].EndCrop();
            SurfaceOrganicMatter: InitialResidueName=wheat_stubble; InitialResidueType=wheat; InitialResidueMass=3000; InitialStandingFraction=0; InitialCPR=0; InitialCNR=30
            Plant Wheat
            MicroClimate: a_interception=0; b_interception=0; c_interception=0; d_interception=0; SoilHeatFluxFraction=0.4; MinimumHeightDiffForNewLayer=0; NightInterceptionFraction=0.5; ReferenceHeight=2
            Soil: SoilType=APS26Soil; LocalName=APS26Site; Site=APS26Site; NearestTown=Unknown; Region=Lawes; NaturalVegetation=Unknown; Latitude=0; Longitude=0
              Physical
                Thickness  BD   AirDry  LL15  DUL   SAT
                100        1.4  0.04    0.15  0.38  0.45
                100        1.4  0.04    0.15  0.38  0.45
                100        1.4  0.06    0.15  0.38  0.45
                100        1.4  0.06    0.15  0.38  0.45
                100        1.4  0.06    0.15  0.38  0.45
                100        1.4  0.06    0.15  0.38  0.45
                100        1.4  0.06    0.15  0.38  0.45
                100        1.4  0.1     0.15  0.38  0.45
                100        1.4  0.1     0.15  0.38  0.45
                100        1.4  0.1     0.15  0.38  0.45
                100        1.4  0.1     0.15  0.38  0.45
                100        1.4  0.1     0.15  0.38  0.45
                100        1.4  0.1     0.15  0.38  0.45
                100        1.4  0.1     0.15  0.38  0.45
                100        1.4  0.1     0.15  0.38  0.45
                SoilCrop WheatSoil
                  LL=[0.15, 0.15, 0.15, 0.15, 0.15, 0.15, 0.15, 0.15, 0.15, 0.15, 0.15, 0.15, 0.15, 0.15, 0.15]
                  KL=[0.1, 0.08, 0.06, 0.06, 0.06, 0.06, 0.06, 0.06, 0.06, 0.06, 0.06, 0.06, 0.06, 0.06, 0.06]
                  XF=[1, 1, 1, 1, 1, 1, 1, 1, 1, 1, 1, 1, 1, 1, 1]
              WaterBalance SoilWater: SummerDate=1-Nov; SummerU=4; SummerCona=2; WinterDate=1-Apr; WinterU=2; WinterCona=2; DiffusConst=40; DiffusSlope=16; Salb=0.13; CN2Bare=72; CNRed=20; CNCov=0.8; DischargeWidth=0; CatchmentArea=0; PSIDul=-100
                Thickness  SWCON  KLAT
                150        0.4    0
                150        0.4    0
                150        0.4    0
                150        0.4    0
                300        0.4    0
                300        0.4    0
                300        0.4    0
                300        0.4    0
                300        0.4    0
                300        0.4    0
              Organic: FOMCNRatio=40; CarbonUnits=Total
                Thickness  Carbon  SoilCNRatio  FBiom  FInert  FOM
                100        2       14.5         0.06   0.16    381.534
                100        1.5     14.5         0.04   0.2     312.374
                100        1       14.5         0.03   0.3     255.75
                100        0.5     14.5         0.02   0.7     209.39
                100        0.3     14.5         0.02   0.9     171.434
                100        0.2     14.5         0.02   0.99    140.358
                100        0.2     14.5         0.02   0.99    114.916
                100        0.1     14.5         0.02   0.99    94.0851
                100        0.1     14.5         0.01   0.99    77.0304
                100        0.1     14.5         0.01   0.99    63.0671
                100        0.1     14.5         0.01   0.99    51.635
                100        0.1     14.5         0.01   0.99    42.2752
                100        0.1     14.5         0.01   0.99    34.612
                100        0.1     14.5         0.01   0.99    28.3379
                100        0.1     14.5         0.01   0.99    23.2011
              Chemical: PHUnits=Water
                Thickness=[100, 100, 100, 100, 100, 100, 100, 100, 100, 100, 100, 100, 100, 100, 100]
                PH=[5.8, 5.9, 6.6, 6.8, 7, 7.1, 7.2, 7.3, 7.4, 7.4, 7.6, 7.8, 8, 8.2, 8.3]
              Water: Thickness=[100, 1400]; InitialValues=[0.27, 0.38]; FilledFromTop=false
              Nutrient
              Solute NO3: InitialValues=[30, 20, 20, 20, 10, 10, 5, 5, 1, 1, 1, 1, 1, 1, 0]; InitialValuesUnits=ppm; WaterTableConcentration=0; D0=0; DepthConstant=0; MaxDepthSoluteAccessible=0; RunoffEffectivenessAtMovingSolute=0; MaxEffectiveRunoff=0
                Thickness=[100, 100, 100, 100, 100, 100, 100, 100, 100, 100, 100, 100, 100, 100, 100]
              Solute NH4: InitialValues=[1, 1, 1, 1, 1, 1, 1, 1, 1, 1, 1, 1, 1, 1, 0]; InitialValuesUnits=ppm; WaterTableConcentration=0; D0=0; DepthConstant=0; MaxDepthSoluteAccessible=0; RunoffEffectivenessAtMovingSolute=0; MaxEffectiveRunoff=0
                Thickness=[100, 100, 100, 100, 100, 100, 100, 100, 100, 100, 100, 100, 100, 100, 100]
              Solute Urea: InitialValues=[0, 0, 0, 0, 0, 0, 0, 0, 0, 0, 0, 0, 0, 0, 0]; InitialValuesUnits=kg/ha; WaterTableConcentration=0; D0=0; DepthConstant=0; MaxDepthSoluteAccessible=0; RunoffEffectivenessAtMovingSolute=0; MaxEffectiveRunoff=0
                Thickness=[100, 100, 100, 100, 100, 100, 100, 100, 100, 100, 100, 100, 100, 100, 100]
              SoilTemperature Temperature: InteractionsPerDay=8
            Report HarvestReport
            Report DailyReport
          Manager LocationInfo: same as Validation.Turkey.Konya09.Konya09.LocationInfo
        Simulation Lonzee06
          Clock: Start=2006-10-13; End=2007-08-31
          Summary summaryfile
          Weather: FileName=met/BrusselsSouth.met
          SoilArbitrator Soil Arbitrator
          Zone Field: Area=1; Slope=0; AspectAngle=0; Altitude=50
            Irrigation
            Fertiliser
            Operations CropManagement
              2006-10-13  [Wheat].Sow(population:100, cultivar:"Rosario", depth:30, rowSpacing:250);
              2007-03-17  [Fertiliser].Apply(amount: 40, type: "NO3N");
              2007-04-12  [Fertiliser].Apply(amount: 60, type: "NO3N");
              2007-05-08  [Fertiliser].Apply(amount: 94.5, type: "NO3N");
              2007-08-06  [Wheat].Harvest();
              2007-08-06  [Wheat].EndCrop();
            SurfaceOrganicMatter: InitialResidueName=wheat_stubble; InitialResidueType=wheat; InitialResidueMass=3000; InitialStandingFraction=0; InitialCPR=0; InitialCNR=30
            Plant Wheat
            MicroClimate: a_interception=0; b_interception=0; c_interception=0; d_interception=0; SoilHeatFluxFraction=0.4; MinimumHeightDiffForNewLayer=0; NightInterceptionFraction=0.5; ReferenceHeight=2
            Soil: same as Validation.Europe.Belgium.Lonzee04.Field.Soil
            Report HarvestReport
            Report DailyReport
          Manager LocationInfo: same as Validation.Turkey.Konya09.Konya09.LocationInfo
        Simulation Lonzee08
          Clock: Start=2008-11-13; End=2009-08-31
          Summary summaryfile
          Weather: FileName=met/BrusselsSouth.met
          SoilArbitrator Soil Arbitrator
          Zone Field: Area=1; Slope=0; AspectAngle=0; Altitude=50
            Irrigation
            Fertiliser
            Operations CropManagement
              2008-11-13  [Wheat].Sow(population:100, cultivar:"Ararat", depth:30, rowSpacing:250);
              2009-03-18  [Fertiliser].Apply(amount: 80, type: "NO3N");
              2009-04-24  [Fertiliser].Apply(amount: 40, type: "NO3N");
              2009-05-28  [Fertiliser].Apply(amount: 90, type: "NO3N");
              2009-08-08  [Wheat].Harvest();
              2009-08-08  [Wheat].EndCrop();
            SurfaceOrganicMatter: InitialResidueName=wheat_stubble; InitialResidueType=wheat; InitialResidueMass=3000; InitialStandingFraction=0; InitialCPR=0; InitialCNR=30
            Plant Wheat
            MicroClimate: a_interception=0; b_interception=0; c_interception=0; d_interception=0; SoilHeatFluxFraction=0.4; MinimumHeightDiffForNewLayer=0; NightInterceptionFraction=0.5; ReferenceHeight=2
            Soil: same as Validation.Europe.Belgium.Lonzee04.Field.Soil
            Report DailyReport
            Report HarvestReport
          Manager LocationInfo: same as Validation.Turkey.Konya09.Konya09.LocationInfo
    Folder NorthAmerica
      Folder Arizona
        Memo
          These FACE trials were conducted to investigate the effects of atmospheric CO2 concentrations and water stress on wheat growth and development [#Hanksar_1996_FACE].  It was conducted at Maricopa, Arazona using Free Air Carbon Enrichment to create elevated CO2 treatments:

          1. Normal CO2  (370 ppm) (that is no longer normal)
          2. High CO2 (550 ppm)

          Irrigation treatmetnts were also applied in the 1992 and 1993 experiments with:

          1. High Irrigation (~600 mm)
          2. Low irrigation (~265 mm)

          Nitrogen treatments were applied in 1994 and 1995 with:
          1. High Nitrogen ()
          2. Low Nitrogen ()

          Crop development, Biomass production and soil moisture were monitored throughout the crops duration.
        Experiment MaricopaFACE92_93
          Factors
            Factor Treatment
              CompositeFactor 901_CO2_370_Irrig_Low
                Specifications:
                  [Weather].FileName = %root%\Tests\Validation\Wheat\met\MARA1992-1993.met
                  [Operations]
                  [Water].Depth=0-50,50-150,150-300,300-500,500-600,600-700,700-900,900-1100,1100-1200,1200-1300,1300-1500,1500-1700,1700-1900,1900-2100
                  [Water].InitialValues = 0.25, 0.253, 0.253, 0.228, 0.202, 0.202, 0.198, 0.192, 0.185, 0.185, 0.189, 0.19, 0.198, 0.196
                  [NO3].InitialValues = 24.9, 24.9, 16, 9.8, 9.8, 2.1, 2.1, 2.1, 2.1, 0.2, 0.2, 0.2, 0.2, 0.2
                  [NH4].InitialValues = 0.8, 0.8, 0.6, 0.4, 0.4, 0.2, 0.2, 0.2, 0.2, 0.2, 0.2, 0.2, 0.2, 0.2
                Operations
                  1992-12-15  [SurfaceOrganicMatter].Add(mass:1100, N:5.83, P:0, type:Wheat, name:Wheat)
                  1992-12-15  [SurfaceOrganicMatter].Incorporate(fraction: 1, depth: 300)
                  1992-12-18  [ISoilWater].Reset()
                  1992-12-18  [Soil].Nutrient.Reset()
                  1992-12-26  [Irrigation].Apply(amount:317, depth:230)
                  1993-01-30  [Irrigation].Apply(amount:30, depth:230)
                  1993-01-31  [Irrigation].Apply(amount:7, depth:230)
                  1993-03-18  [Irrigation].Apply(amount:17, depth:230)
                  1993-03-25  [Irrigation].Apply(amount:15, depth:230)
                  1993-04-05  [Irrigation].Apply(amount:27, depth:230)
                  1993-04-06  [Irrigation].Apply(amount:4, depth:230)
                  1993-04-12  [Irrigation].Apply(amount:18, depth:230)
                  1993-04-17  [Irrigation].Apply(amount:16, depth:230)
                  1993-04-18  [Irrigation].Apply(amount:6, depth:230)
                  1993-04-21  [Irrigation].Apply(amount:18, depth:230)
                  1993-04-26  [Irrigation].Apply(amount:24, depth:230)
                  1993-04-27  [Irrigation].Apply(amount:6, depth:230)
                  1993-04-30  [Irrigation].Apply(amount:21, depth:230)
                  1993-05-05  [Irrigation].Apply(amount:20.5, depth:230)
                  1993-05-10  [Irrigation].Apply(amount:20.5, depth:230)
                  1993-05-11  [Irrigation].Apply(amount:4.5, depth:230)
                  1993-05-14  [Irrigation].Apply(amount:20.5, depth:230)
                  1992-12-27  [Fertiliser].Apply(amount: 54, type: "NO3N", depth: 10)
                  1993-01-30  [Fertiliser].Apply(amount: 92, type: "NO3N", depth: 20)
                  1993-03-18  [Fertiliser].Apply(amount: 59, type: "NO3N", depth: 20)
                  1993-04-05  [Fertiliser].Apply(amount: 72, type: "NO3N", depth: 20)
              CompositeFactor 902_CO2_370_Irrig_High
                Specifications:
                  [Weather].FileName = %root%\Tests\Validation\Wheat\met\MARA1992-1993.met
                  [Operations]
                  [Water].Depth = 0-50,50-150,150-300,300-500,500-600,600-700,700-900,900-1100,1100-1200,1200-1300,1300-1500,1500-1700,1700-1900,1900-2100
                  [Water].InitialValues = 0.22, 0.22, 0.22, 0.228, 0.216, 0.216, 0.167, 0.169, 0.181, 0.181, 0.174, 0.184, 0.178, 0.175
                  [NO3].InitialValues = 26.2, 26.2, 14.4, 5.7, 5.7, 1.8, 1.8, 1.8, 1.8, 0.2, 0.2, 0.2, 0.2, 0.2
                  [NH4].InitialValues = 0.7, 0.7, 0.6, 0.3, 0.3, 0.2, 0.2, 0.2, 0.2, 0.2, 0.2, 0.2, 0.2, 0.2
                Operations
                  1992-12-15  [SurfaceOrganicMatter].Add(mass:1100, N:5.83, P:0, type:Wheat, name:Wheat)
                  1992-12-15  [SurfaceOrganicMatter].Incorporate(fraction: 1, depth: 300)
                  1992-12-18  [ISoilWater].Reset()
                  1992-12-18  [Soil].Nutrient.Reset()
                  1992-12-26  [Irrigation].Apply(amount:317, depth:230)
                  1993-01-30  [Irrigation].Apply(amount:30, depth:230)
                  1993-01-31  [Irrigation].Apply(amount:7, depth:230)
                  1993-03-01  [Irrigation].Apply(amount:12.5, depth:230)
                  1993-03-09  [Irrigation].Apply(amount:60, depth:230)
                  1993-03-18  [Irrigation].Apply(amount:34, depth:230)
                  1993-03-25  [Irrigation].Apply(amount:50, depth:230)
                  1993-04-05  [Irrigation].Apply(amount:54, depth:230)
                  1993-04-06  [Irrigation].Apply(amount:4, depth:230)
                  1993-04-12  [Irrigation].Apply(amount:47, depth:230)
                  1993-04-17  [Irrigation].Apply(amount:38, depth:230)
                  1993-04-18  [Irrigation].Apply(amount:6, depth:230)
                  1993-04-21  [Irrigation].Apply(amount:36, depth:230)
                  1993-04-26  [Irrigation].Apply(amount:48, depth:230)
                  1993-04-27  [Irrigation].Apply(amount:6, depth:230)
                  1993-04-30  [Irrigation].Apply(amount:42, depth:230)
                  1993-05-05  [Irrigation].Apply(amount:41, depth:230)
                  1993-05-10  [Irrigation].Apply(amount:41, depth:230)
                  1993-05-11  [Irrigation].Apply(amount:4.5, depth:230)
                  1993-05-14  [Irrigation].Apply(amount:41, depth:230)
                  1992-12-27  [Fertiliser].Apply(amount: 54, type: "NO3N", depth: 10)
                  1993-01-30  [Fertiliser].Apply(amount: 92, type: "NO3N", depth: 20)
                  1993-03-18  [Fertiliser].Apply(amount: 59, type: "NO3N", depth: 20)
                  1993-04-05  [Fertiliser].Apply(amount: 72, type: "NO3N", depth: 20)
              CompositeFactor 903_CO2_550_Irrig_Low
                Specifications:
                  [Weather].FileName = %root%\Tests\Validation\Wheat\met\MARC1992-1993.met
                  [Operations]
                  [Water].Depth=0-50,50-150,150-300,300-500,500-600,600-700,700-900,900-1100,1100-1200,1200-1300,1300-1500,1500-1700,1700-1900,1900-2100
                  [Water].InitialValues = 0.258, 0.258, 0.258, 0.247, 0.23, 0.23, 0.148, 0.107, 0.101, 0.101, 0.116, 0.132, 0.139, 0.133
                  [NO3].InitialValues = 19.8, 19.8, 13.5, 6.2, 6.2, 1.2, 1.2, 1.2, 1.2, 0.1, 0.1, 0.1, 0.1, 0.1
                  [NH4].InitialValues = 0.7, 0.7, 0.6, 0.4, 0.4, 0.2, 0.2, 0.2, 0.2, 0.1, 0.1, 0.1, 0.1, 0.1
                Operations
                  1992-12-15  [SurfaceOrganicMatter].Add(mass:1100, N:5.83, P:0, type:Wheat, name:Wheat)
                  1992-12-15  [SurfaceOrganicMatter].Incorporate(fraction: 1, depth: 300)
                  1992-12-18  [ISoilWater].Reset()
                  1992-12-18  [Soil].Nutrient.Reset()
                  1992-12-26  [Irrigation].Apply(amount:317, depth:230)
                  1993-01-30  [Irrigation].Apply(amount:30, depth:230)
                  1993-01-31  [Irrigation].Apply(amount:7, depth:230)
                  1993-03-18  [Irrigation].Apply(amount:17, depth:230)
                  1993-03-25  [Irrigation].Apply(amount:15, depth:230)
                  1993-04-05  [Irrigation].Apply(amount:27, depth:230)
                  1993-04-06  [Irrigation].Apply(amount:4, depth:230)
                  1993-04-12  [Irrigation].Apply(amount:18, depth:230)
                  1993-04-17  [Irrigation].Apply(amount:16, depth:230)
                  1993-04-18  [Irrigation].Apply(amount:6, depth:230)
                  1993-04-21  [Irrigation].Apply(amount:18, depth:230)
                  1993-04-26  [Irrigation].Apply(amount:24, depth:230)
                  1993-04-27  [Irrigation].Apply(amount:6, depth:230)
                  1993-04-30  [Irrigation].Apply(amount:21, depth:230)
                  1993-05-05  [Irrigation].Apply(amount:20.5, depth:230)
                  1993-05-10  [Irrigation].Apply(amount:20.5, depth:230)
                  1993-05-11  [Irrigation].Apply(amount:4.5, depth:230)
                  1993-05-14  [Irrigation].Apply(amount:20.5, depth:230)
                  1992-12-27  [Fertiliser].Apply(amount: 54, type: "NO3N", depth: 10)
                  1993-01-30  [Fertiliser].Apply(amount: 92, type: "NO3N", depth: 20)
                  1993-03-18  [Fertiliser].Apply(amount: 59, type: "NO3N", depth: 20)
                  1993-04-05  [Fertiliser].Apply(amount: 72, type: "NO3N", depth: 20)
              CompositeFactor 904_CO2_550_Irrig_High
                Specifications:
                  [Weather].FileName = %root%\Tests\Validation\Wheat\met\MARC1992-1993.met
                  [Operations]
                  [Water].Depth=0-50,50-150,150-300,300-500,500-600,600-700,700-900,900-1100,1100-1200,1200-1300,1300-1500,1500-1700,1700-1900,1900-2100
                  [Water].InitialValues = 0.235, 0.235, 0.235, 0.252, 0.231, 0.231, 0.152, 0.119, 0.104, 0.104, 0.12, 0.142, 0.152, 0.139
                  [NO3].InitialValues = 24.2, 24.2, 10.8, 5.9, 5.9, 0.8, 0.8, 0.8, 0.8, 0.1, 0.1, 0.1, 0.2, 0.1
                  [NH4].InitialValues = 0.8, 0.8, 0.6, 0.4, 0.4, 0.2, 0.2, 0.2, 0.2, 0.1, 0.1, 0.1, 0.2, 0.1
                Operations: same as Validation.NorthAmerica.Arizona.MaricopaFACE92_93.Factors.Treatment.902_CO2_370_Irrig_High.Operations
          Simulation Maricopa92_93
            Clock: Start=1992-12-15; End=1993-05-31
            Summary
            Weather: FileName=met/MARA1992-1993.met
            SoilArbitrator
            MicroClimate: a_interception=0; b_interception=1; c_interception=0; d_interception=0; SoilHeatFluxFraction=0.4; MinimumHeightDiffForNewLayer=0; NightInterceptionFraction=0.5; ReferenceHeight=2
            Zone Field: Area=1; Slope=0; AspectAngle=0; Altitude=50
              Operations
              Soil AZMC920001: Site=Maricopa; Region=Maricopa; State=Arizona; Country=USA; ApsoilNumber=AZMC920001; Latitude=0; Longitude=0
                SoilType=fine-loamy, mixed (calcareous), hyperthermic Typic Torrifluvents
                Physical
                  Thickness  ParticleSizeSand  ParticleSizeSilt  ParticleSizeClay  Rocks  BD    AirDry  LL15   DUL   SAT    KS
                  50         35                31                34                0      1.31  0.1     0.202  0.36  0.417  1032
                  100        35                31                34                0      1.27  0.1     0.201  0.36  0.424  1032
                  150        35                31                34                0      1.27  0.15    0.199  0.36  0.424  1032
                  200        35                31                34                0      1.3   0.198   0.198  0.3   0.419  1032
                  100        35                31                34                0      1.47  0.198   0.198  0.27  0.387  1032
                  100        35                31                34                0      1.47  0.198   0.198  0.27  0.387  1032
                  200        45                25                30                0      1.57  0.145   0.145  0.22  0.359  1032
                  200        55                20                25                0      1.57  0.107   0.107  0.2   0.347  1032
                  100        55                20                25                0      1.57  0.1     0.1    0.2   0.347  1032
                  100        55                20                25                0      1.57  0.101   0.101  0.2   0.347  1032
                  200        60                20                20                0      1.57  0.116   0.116  0.2   0.336  1032
                  200        60                20                20                0      1.57  0.125   0.125  0.2   0.336  1032
                  200        65                17                18                0      1.57  0.1     0.1    0.2   0.331  1032
                  200        65                17                18                0      1.57  0.1     0.1    0.2   0.331  1032
                  SoilCrop WheatSoil
                    LL=[0.202, 0.201, 0.199, 0.198, 0.198, 0.198, 0.145, 0.107, 0.1, 0.101, 0.116, 0.125, 0.1, 0.1]
                    KL=[0.1, 0.1, 0.1, 0.08, 0.07, 0.06, 0.05, 0.04, 0.03, 0.02, 0.01, 0, 0, 0]
                    XF=[1, 1, 1, 1, 1, 1, 1, 1, 1, 1, 1, 1, 1, 1]
                Swim3: hydrol_effective_depth=450; hydrol_effective_exponent=4.16; Salb=0.2; CN2Bare=0; CNRed=20; CNCov=0.8; KDul=1; PSIDul=-100; VC=true; DTMin=0; DTMax=60; MaxWaterIncrement=5; SpaceWeightingFactor=0; SoluteSpaceWeightingFactor=1; Dis=0; Disp=1; A=2; DTHC=0.1; DTHP=2; vcon1=7.28e-09; vcon2=7.26e-07; eo_time=06:00; eo_durn=720; default_rain_time=00:00; default_rain_duration=720; Diagnostics=false
                Solute NO3: InitialValuesUnits=ppm; WaterTableConcentration=0; D0=0; DepthConstant=0; MaxDepthSoluteAccessible=0; RunoffEffectivenessAtMovingSolute=0; MaxEffectiveRunoff=0
                  Thickness  InitialValues  Exco  FIP
                  50         24.9           0     1
                  100        24.9           0     1
                  150        16             0     1
                  200        9.8            0     1
                  100        9.8            0     1
                  100        2.1            0     1
                  200        2.1            0     1
                  200        2.1            0     1
                  100        2.1            0     1
                  100        0.2            0     1
                  200        0.2            0     1
                  200        0.2            0     1
                  200        0.2            0     1
                  200        0.2            0     1
                Solute NH4: InitialValuesUnits=ppm; WaterTableConcentration=0; D0=0; DepthConstant=0; MaxDepthSoluteAccessible=0; RunoffEffectivenessAtMovingSolute=0; MaxEffectiveRunoff=0
                  Thickness  InitialValues  Exco  FIP
                  50         0.8            1     1
                  100        0.8            1     1
                  150        0.6            1     1
                  200        0.4            1     1
                  100        0.4            1     1
                  100        0.2            1     1
                  200        0.2            1     1
                  200        0.2            1     1
                  100        0.2            1     1
                  100        0.2            1     1
                  200        0.2            1     1
                  200        0.2            1     1
                  200        0.2            1     1
                  200        0.2            1     1
                Solute Urea: InitialValuesUnits=kg/ha; WaterTableConcentration=0; D0=0; DepthConstant=0; MaxDepthSoluteAccessible=0; RunoffEffectivenessAtMovingSolute=0; MaxEffectiveRunoff=0
                  Thickness  InitialValues  Exco  FIP
                  50         0              0     1
                  100        0              0     1
                  150        0              0     1
                  200        0              0     1
                  100        0              0     1
                  100        0              0     1
                  200        0              0     1
                  200        0              0     1
                  100        0              0     1
                  100        0              0     1
                  200        0              0     1
                  200        0              0     1
                  200        0              0     1
                  200        0              0     1
                Water: FilledFromTop=false
                  Thickness=[50, 100, 150, 200, 100, 100, 200, 200, 100, 100, 200, 200, 200, 200]
                  InitialValues=[0.36, 0.36, 0.36, 0.3, 0.27, 0.27, 0.22, 0.2, 0.2, 0.2, 0.2, 0.2, 0.2, 0.2]
                Organic: FOMCNRatio=40; CarbonUnits=Total
                  Thickness  Carbon  SoilCNRatio  FBiom  FInert  FOM
                  50         0.41    10           0.025  0.4     924
                  100        0.35    10           0.02   0.6     765
                  150        0.27    10           0.015  0.8     590
                  200        0.24    10           0.01   0.9     537
                  100        0.16    10           0.01   0.95    405
                  100        0.16    10           0.01   0.95    405
                  200        0.3     10           0.01   0.95    810
                  200        0.1     10           0.01   0.95    270
                  100        0.1     10           0.01   0.95    270
                  100        0.1     10           0.01   0.95    270
                  200        0       10           0.01   0.95    0
                  200        0       10           0.01   0.95    0
                  200        0       10           0.01   0.95    0
                  200        0       10           0.01   0.95    0
                Chemical: PHUnits=Water
                  Thickness  PH   CEC
                  50         8.5  255
                  100        8.5  255
                  150        8.5  255
                  200        8.6  245
                  100        8.6  235
                  100        8.6  235
                  200        8.6  207
                  200        8.6  173
                  100        8.6  173
                  100        8.6  173
                  200        8.6  138
                  200        8.6  138
                  200        8.6  124
                  200        8.6  124
                Nutrient
                OutputLayers ObservedLayers: Thickness=[300, 200, 200, 200, 200, 200, 200, 200, 200, 200]
                LayerStructure: Thickness=[5, 50, 50, 50, 50, 50, 50, 50, 50, 50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]
                SoilTemperature Temperature: InteractionsPerDay=8
              SurfaceOrganicMatter: InitialResidueName=wheat_stubble; InitialResidueType=wheat; InitialResidueMass=0; InitialStandingFraction=0; InitialCPR=0; InitialCNR=60
              Irrigation
              Fertiliser
              Plant Wheat
              Report HarvestReport
              Manager Sow
                SowDate = 26-Dec
                CultivarName = Yecora
                SowingDepth = 60
                RowSpacing = 250
                Population = 130
                EmergDate = 1-jan
```csharp
using Newtonsoft.Json;
using System.Data;
using System.Xml.Serialization;
using Models;
using System.Text;
using System.Collections.Generic;
using Models.Interfaces;
using System;
using Models.Core;
using Models.PMF;
using Models.Soils;
using Models.Utilities;
using APSIM.Shared.Utilities;

namespace Models
{
    [Serializable]
    public class Script : Model
    {
        [Link] Clock Clock;
        [Link] Plant Wheat;
        
        [Description("Sowing date (d-mmm)")]
        public string SowDate { get; set; }
        [Display(Type = DisplayType.CultivarName)]
        [Description("Cultivar to be sown")]
        public string CultivarName { get; set; }
        [Description("Sowing depth (mm)")]
        public double SowingDepth { get; set; }
        [Description("Row spacing (mm)")]
        public double RowSpacing { get; set; }
        [Description("Plant population (/m2)")]
        public double Population { get; set; }
        [Description("Emergence date (d-mmm)")]
        public string EmergDate { get; set; }
        


        [EventSubscribe("DoManagement")]
        private void OnDoManagement(object sender, EventArgs e)
        {

            if (DateUtilities.WithinDates(SowDate, Clock.Today, SowDate))
            {
                Wheat.Sow(population: Population, cultivar: CultivarName, depth: SowingDepth, rowSpacing: RowSpacing);    
                Wheat.Phenology.SetPhaseCompletionDate(EmergDate,"Emerging");
            }
        
        }
        
    }
}
```
              Manager Harvest
```csharp
using Models.PMF.Phen;
using APSIM.Shared.Utilities;
using System.Xml.Serialization;
using Models;
using Models.PMF;
using Models.Soils;
using System.Text;
using System.Collections.Generic;
using Models.Core;
using System;
using Models.Soils.Nutrients;

namespace Models
{
    [Serializable] 
    public class Script : Model
    {
        [Link] private Plant Wheat;
        [Link(Type = LinkType.Path, Path = "[Wheat].Phenology")]
        private Phenology phenology;
        [Link] private Clock clock;
        [EventSubscribe("DoManagement")]
        private void OnDoManagement(object sender, EventArgs e)
        {
            if (DateUtilities.WithinDates(clock.EndDate, clock.Today, clock.EndDate))
            {
                Wheat.Harvest();
                Wheat.EndCrop();
            }
        }
    }
}
```
              Manager ForceCropFits
```csharp
using APSIM.Core;
using APSIM.Shared.Utilities;
using System.Xml.Serialization;
using Models;
using Models.PMF;
using System.Text;
using System.Collections.Generic;
using Models.Core;
using System;
using Models.Soils;

namespace Models
{
    [Serializable] 
    public class Script : Model, IStructureDependency
    {
        [Link] private Plant Plant;
        [Link] private Clock Clock;
        [Link] private Zone zone;
        public IStructure Structure { private get; set; }
        

        

        [EventSubscribe("Sowing")]
        private void OnSowing(object sender, EventArgs e)
        {
            double resetvalue = 9;
            object ResetValue = resetvalue;
            Structure.Set("Wheat.Phenology.CAMP.FLNparams.MinLN", ResetValue, relativeTo: zone);
            resetvalue = 0;
            ResetValue = resetvalue;
            Structure.Set("Wheat.Phenology.CAMP.FLNparams.VrnLN", ResetValue, relativeTo: zone);
            resetvalue = 0;
            ResetValue = resetvalue;
            Structure.Set("Wheat.Phenology.CAMP.FLNparams.PpLN", ResetValue, relativeTo: zone);
            resetvalue = 0;
            ResetValue = resetvalue;
            Structure.Set("Wheat.Phenology.CAMP.FLNparams.VxPLN", ResetValue, relativeTo: zone);
            resetvalue = 1.0;
            ResetValue = resetvalue;
            Structure.Set("Wheat.Leaf.Photosynthesis.FVPD.XYPairs.Y[3]", ResetValue, relativeTo: zone);
        }
    }
}
```
              Report DailyReport
              SetModelParamsBySimulation SetPhenologyParams: SetEventName=[Plant].Sowing; ParameterFile=inputs/MaricopaParameterOverWrites.csv
              Report NDVIDailyReport
              Report ExtraReport: EventNames=[Clock].DoReport
                VariableNames:
                  [Clock].Today
                  [Fertiliser].NitrogenApplied
                  [Irrigation].IrrigationApplied
                  [Weather].CO2
              Spectral: DrySoilNDVI=0.18; WetSoilNDVI=0.2; GreenCropNDVI=0.95; DeadCropNDVI=0.1
            Manager LocationInfo: same as Validation.Turkey.Konya09.Konya09.LocationInfo
        Experiment MaricopaFACE93_94
          Factors
            Factor Treatment
              CompositeFactor 905_CO2_370_Irrig_Low
                Specifications:
                  [Weather].FileName = %root%\Tests\Validation\Wheat\met\MARA1993-1994.met
                  [Operations]
                  [Water].Depth=0-50,50-150,150-300,300-500,500-600,600-700,700-900,900-1100,1100-1200,1200-1300,1300-1500,1500-1700,1700-1900,1900-2100
                  [Water].InitialValues = 0.313, 0.313, 0.313, 0.281, 0.226, 0.226, 0.217, 0.211, 0.206, 0.206, 0.211, 0.214, 0.224, 0.237
                  [NO3].InitialValues = 6, 6, 28.3, 19, 19, 8.8, 8.8, 8.8, 8.8, 8.8, 8.8, 8.8, 8.8, 8.8
                  [NH4].InitialValues = 0.7, 0.7, 0.6, 0.3, 0.3, 0.2, 0.2, 0.2, 0.2, 0.2, 0.2, 0.2, 0.2, 0.2
                Operations
                  1993-12-09  [SurfaceOrganicMatter].Add(mass:1100, N:5.83, P:0, type:Wheat, name:Wheat)
                  1993-12-09  [SurfaceOrganicMatter].Incorporate(fraction: 1, depth: 300)
                  1993-12-09  [ISoilWater].Reset()
                  1993-12-09  [Soil].Nutrient.Reset()
                  1993-12-13  [Irrigation].Apply(amount:13, depth:0)
                  1993-12-17  [Irrigation].Apply(amount:17, depth:230)
                  1994-02-03  [Irrigation].Apply(amount:30, depth:230)
                  1994-03-15  [Irrigation].Apply(amount:30, depth:230)
                  1994-03-27  [Irrigation].Apply(amount:30, depth:230)
                  1994-04-07  [Irrigation].Apply(amount:50, depth:230)
                  1994-04-18  [Irrigation].Apply(amount:50, depth:230)
                  1994-04-29  [Irrigation].Apply(amount:7, depth:230)
                  1994-05-03  [Irrigation].Apply(amount:60, depth:230)
                  1993-12-02  [Fertiliser].Apply(amount: 54, type: "NO3N", depth: 10)
                  1994-02-03  [Fertiliser].Apply(amount: 92, type: "NO3N", depth: 10)
                  1994-03-16  [Fertiliser].Apply(amount: 69, type: "NO3N", depth: 10)
                  1994-04-08  [Fertiliser].Apply(amount: 46, type: "NO3N", depth: 11)
              CompositeFactor 906_CO2_370_Irrig_High
                Specifications:
                  [Weather].FileName = %root%\Tests\Validation\Wheat\met\MARA1993-1994.met
                  [Operations]
                  [Water].Depth=0-50,50-150,150-300,300-500,500-600,600-700,700-900,900-1100,1100-1200,1200-1300,1300-1500,1500-1700,1700-1900,1900-2100
                  [Water].InitialValues = 0.302, 0.302, 0.302, 0.286, 0.217, 0.217, 0.186, 0.2, 0.199, 0.199, 0.197, 0.204, 0.208, 0.209
                  [NO3].InitialValues = 4.2, 4.2, 12, 10.6, 10.6, 3.4, 3.4, 3.4, 3.4, 3.4, 3.4, 3.4, 3.4, 3.4
                  [NH4].InitialValues = 0.7, 0.7, 0.6, 0.3, 0.3, 0.2, 0.2, 0.2, 0.2, 0.2, 0.2, 0.2, 0.2, 0.2
                Operations
                  1993-12-09  [SurfaceOrganicMatter].Add(mass:1100, N:5.83, P:0, type:Wheat, name:Wheat)
                  1993-12-09  [SurfaceOrganicMatter].Incorporate(fraction: 1, depth: 300)
                  1993-12-09  [ISoilWater].Reset()
                  1993-12-09  [Soil].Nutrient.Reset()
                  1993-12-13  [Irrigation].Apply(amount:13, depth:0)
                  1993-12-17  [Irrigation].Apply(amount:17, depth:230)
                  1994-01-21  [Irrigation].Apply(amount:30, depth:230)
                  1994-02-03  [Irrigation].Apply(amount:30, depth:230)
                  1994-02-23  [Irrigation].Apply(amount:35, depth:230)
                  1994-03-03  [Irrigation].Apply(amount:30, depth:230)
                  1994-03-15  [Irrigation].Apply(amount:36, depth:230)
                  1994-03-20  [Irrigation].Apply(amount:25, depth:230)
                  1994-03-27  [Irrigation].Apply(amount:30, depth:230)
                  1994-04-03  [Irrigation].Apply(amount:30, depth:230)
                  1994-04-07  [Irrigation].Apply(amount:50, depth:230)
                  1994-04-13  [Irrigation].Apply(amount:50, depth:230)
                  1994-04-18  [Irrigation].Apply(amount:50, depth:230)
                  1994-04-24  [Irrigation].Apply(amount:50, depth:230)
                  1994-04-29  [Irrigation].Apply(amount:7, depth:230)
                  1994-05-03  [Irrigation].Apply(amount:60, depth:230)
                  1994-05-09  [Irrigation].Apply(amount:48, depth:230)
                  1994-05-15  [Irrigation].Apply(amount:38, depth:230)
                  1993-12-02  [Fertiliser].Apply(amount: 54, type: "NO3N", depth: 10)
                  1994-02-03  [Fertiliser].Apply(amount: 92, type: "NO3N", depth: 10)
                  1994-03-16  [Fertiliser].Apply(amount: 69, type: "NO3N", depth: 10)
                  1994-04-08  [Fertiliser].Apply(amount: 46, type: "NO3N", depth: 11)
              CompositeFactor 907_CO2_550_Irrig_Low
                Specifications:
                  [Weather].FileName = %root%\Tests\Validation\Wheat\met\MARC1993-1994.met
                  [Operations]
                  [Water].Depth=0-50,50-150,150-300,300-500,500-600,600-700,700-900,900-1100,1100-1200,1200-1300,1300-1500,1500-1700,1700-1900,1900-2100
                  [Water].InitialValues = 0.295, 0.295, 0.295, 0.287, 0.235, 0.235, 0.145, 0.126, 0.126, 0.126, 0.16, 0.158, 0.173, 0.174
                  [NO3].InitialValues = 7.2, 7.2, 11.8, 10.9, 10.9, 5.5, 5.5, 5.5, 5.5, 5.5, 5.5, 5.5, 5.5, 5.5
                  [NH4].InitialValues = 0.7, 0.7, 0.6, 0.3, 0.3, 0.2, 0.2, 0.2, 0.2, 0.2, 0.2, 0.2, 0.2, 0.2
                Operations
                  1993-12-09  [SurfaceOrganicMatter].Add(mass:1100, N:5.83, P:0, type:Wheat, name:Wheat)
                  1993-12-09  [SurfaceOrganicMatter].Incorporate(fraction: 1, depth: 300)
                  1993-12-09  [ISoilWater].Reset()
                  1993-12-09  [Soil].Nutrient.Reset()
                  1993-12-13  [Irrigation].Apply(amount:13, depth:0)
                  1993-12-17  [Irrigation].Apply(amount:17, depth:230)
                  1994-02-03  [Irrigation].Apply(amount:30, depth:230)
                  1994-03-15  [Irrigation].Apply(amount:30, depth:230)
                  1994-03-27  [Irrigation].Apply(amount:30, depth:230)
                  1994-04-07  [Irrigation].Apply(amount:50, depth:230)
                  1994-04-18  [Irrigation].Apply(amount:50, depth:230)
                  1994-04-29  [Irrigation].Apply(amount:7, depth:230)
                  1994-05-03  [Irrigation].Apply(amount:60, depth:230)
                  1993-12-02  [Fertiliser].Apply(amount: 54, type: "NO3N", depth: 10)
                  1994-02-03  [Fertiliser].Apply(amount: 92, type: "NO3N", depth: 10)
                  1994-03-16  [Fertiliser].Apply(amount: 69, type: "NO3N", depth: 10)
                  1994-04-08  [Fertiliser].Apply(amount: 46, type: "NO3N", depth: 11)
              CompositeFactor 908_CO2_550_Irrig_High
                Specifications:
                  [Weather].FileName = %root%\Tests\Validation\Wheat\met\MARC1993-1994.met
                  [Operations]
                  [Water].Depth=0-50,50-150,150-300,300-500,500-600,600-700,700-900,900-1100,1100-1200,1200-1300,1300-1500,1500-1700,1700-1900,1900-2100
                  [Water].InitialValues = 0.31, 0.31, 0.31, 0.296, 0.242, 0.242, 0.163, 0.142, 0.129, 0.129, 0.151, 0.155, 0.166, 0.166
                  [NO3].InitialValues = 10.6, 10.6, 14.8, 14.3, 14.3, 7.1, 7.1, 7.1, 7.1, 7.1, 7.1, 7.1, 7.1, 7.1
                  [NH4].InitialValues = 0.7, 0.7, 0.6, 0.3, 0.3, 0.2, 0.2, 0.2, 0.2, 0.2, 0.2, 0.2, 0.2, 0.2
                Operations: same as Validation.NorthAmerica.Arizona.MaricopaFACE93_94.Factors.Treatment.906_CO2_370_Irrig_High.Operations
          Simulation Maricopa93_94
            Clock: Start=1993-12-13; End=1994-06-01
            Summary
            Weather: FileName=met/MARC1993-1994.met
            SoilArbitrator
            MicroClimate: a_interception=0; b_interception=1; c_interception=0; d_interception=0; SoilHeatFluxFraction=0.4; MinimumHeightDiffForNewLayer=0; NightInterceptionFraction=0.5; ReferenceHeight=2
            Zone Field: Area=1; Slope=0; AspectAngle=0; Altitude=50
              Operations
              Soil AZMC920001: same as Validation.NorthAmerica.Arizona.MaricopaFACE92_93.Maricopa92_93.Field.AZMC920001
              SurfaceOrganicMatter: InitialResidueName=wheat_stubble; InitialResidueType=wheat; InitialResidueMass=0; InitialStandingFraction=0; InitialCPR=0; InitialCNR=60
              Irrigation
              Fertiliser
              Plant Wheat
              Report HarvestReport
              Manager Sow
                SowDate = 13-Dec
                CultivarName = Yecora
                SowingDepth = 50
                RowSpacing = 250
                Population = 190
                EmergDate = 28-Dec
                script: same as in Validation.NorthAmerica.Arizona.MaricopaFACE92_93.Maricopa92_93.Field.Sow
              Manager Harvest
```csharp
using Models.PMF.Phen;
using APSIM.Shared.Utilities;
using System.Xml.Serialization;
using Models;
using Models.PMF;
using Models.Soils;
using System.Text;
using System.Collections.Generic;
using Models.Core;
using System;
using Models.Soils.Nutrients;

namespace Models
{
    [Serializable] 
    public class Script : Model
    {
        [Link] private Plant Wheat;
        [Link(Type = LinkType.Path, Path = "[Wheat].Phenology")]
        private Phenology phenology;
        [Link] private Clock clock;
        [EventSubscribe("DoManagementCalculations")]
        private void OnDoManagement(object sender, EventArgs e)
        {
            if (DateUtilities.WithinDates(clock.EndDate, clock.Today, clock.EndDate))
            {
                Wheat.Harvest();
                Wheat.EndCrop();
            }
        }
    }
}
```
              Manager ForceCropFits
                script: same as in Validation.NorthAmerica.Arizona.MaricopaFACE92_93.Maricopa92_93.Field.ForceCropFits
              Report DailyReport
              SetModelParamsBySimulation SetPhenologyParams: SetEventName=[Plant].Sowing; ParameterFile=inputs/MaricopaParameterOverWrites.csv
              Report NDVIDailyReport
              Report ExtraReport: EventNames=[Clock].DoReport
                VariableNames:
                  [Clock].Today
                  [Fertiliser].NitrogenApplied
                  [Irrigation].IrrigationApplied
                  [Weather].CO2
              Spectral: DrySoilNDVI=0.18; WetSoilNDVI=0.2; GreenCropNDVI=0.95; DeadCropNDVI=0.1
            Manager LocationInfo: same as Validation.Turkey.Konya09.Konya09.LocationInfo
        Experiment MaricopaFACE95_96
          Factors
            Factor Treatment
              CompositeFactor 909_CO2_370_Nit_Low
                Specifications:
                  [Weather].FileName = %root%\Tests\Validation\Wheat\met\MARB1995-1996.met
                  [Operations]
                  [Water].Depth=0-50,50-150,150-300,300-500,500-600,600-700,700-900,900-1100,1100-1200,1200-1300,1300-1500,1500-1700,1700-1900,1900-2100
                  [Water].InitialValues = 0.292, 0.292, 0.292, 0.271, 0.224, 0.224, 0.165, 0.179, 0.189, 0.189, 0.19, 0.188, 0.171, 0.164
                  [NO3].InitialValues = 3.51, 3.51, 6.82, 6.22, 6.22, 4.01, 4.01, 2.07, 2.07, 2.69, 2.69, 2.47, 1.76, 1.76
                  [NH4].InitialValues = 2.6, 2.6, 2.21, 1.4, 1.4, 0.86, 0.86, 0.71, 0.71, 0.64, 0.64, 1.13, 0.4, 0.4
                Operations
                  1995-12-18  [SurfaceOrganicMatter].Add(mass:500, N:5, P:0, type:Wheat, name:Wheat)
                  1995-12-18  [SurfaceOrganicMatter].Incorporate(fraction: 1, depth: 100)
                  1995-12-18  [ISoilWater].Reset()
                  1995-12-18  [Soil].Nutrient.Reset()
                  1995-12-21  [Irrigation].Apply(amount:30, depth:0)
                  1996-01-30  [Irrigation].Apply(amount:30, depth:230)
                  1996-01-31  [Irrigation].Apply(amount:25, depth:230)
                  1996-02-22  [Irrigation].Apply(amount:40, depth:230)
                  1996-03-05  [Irrigation].Apply(amount:33, depth:230)
                  1996-03-11  [Irrigation].Apply(amount:45, depth:230)
                  1996-03-22  [Irrigation].Apply(amount:45, depth:230)
                  1996-03-30  [Irrigation].Apply(amount:54, depth:230)
                  1996-03-31  [Irrigation].Apply(amount:2, depth:230)
                  1996-04-05  [Irrigation].Apply(amount:45, depth:230)
                  1996-04-10  [Irrigation].Apply(amount:45, depth:230)
                  1996-04-15  [Irrigation].Apply(amount:30, depth:230)
                  1996-04-18  [Irrigation].Apply(amount:43, depth:230)
                  1996-04-22  [Irrigation].Apply(amount:43, depth:230)
                  1996-04-26  [Irrigation].Apply(amount:42, depth:230)
                  1996-05-01  [Irrigation].Apply(amount:40, depth:230)
                  1995-12-21  [Fertiliser].Apply(amount: 0.1, type: "NO3N", depth: 20)
                  1995-12-21  [Fertiliser].Apply(amount: 1.79, type: "NO3N", depth: 20)
                  1996-01-30  [Fertiliser].Apply(amount: 15, type: "NO3N", depth: 20)
                  1996-01-31  [Fertiliser].Apply(amount: 0.04, type: "NO3N", depth: 20)
                  1996-01-31  [Fertiliser].Apply(amount: 1.72, type: "NO3N", depth: 20)
                  1996-02-22  [Fertiliser].Apply(amount: 30, type: "NO3N", depth: 20)
                  1996-02-22  [Fertiliser].Apply(amount: 0.05, type: "NO3N", depth: 20)
                  1996-02-22  [Fertiliser].Apply(amount: 2.24, type: "NO3N", depth: 20)
                  1996-03-05  [Fertiliser].Apply(amount: 0.04, type: "NO3N", depth: 20)
                  1996-03-05  [Fertiliser].Apply(amount: 1.85, type: "NO3N", depth: 20)
                  1996-03-11  [Fertiliser].Apply(amount: 0.05, type: "NO3N", depth: 20)
                  1996-03-11  [Fertiliser].Apply(amount: 2.52, type: "NO3N", depth: 20)
                  1996-03-22  [Fertiliser].Apply(amount: 0.05, type: "NO3N", depth: 20)
                  1996-03-22  [Fertiliser].Apply(amount: 2.52, type: "NO3N", depth: 20)
                  1996-03-30  [Fertiliser].Apply(amount: 25, type: "NO3N", depth: 20)
                  1996-03-31  [Fertiliser].Apply(amount: 0.05, type: "NO3N", depth: 20)
                  1996-03-31  [Fertiliser].Apply(amount: 2.44, type: "NO3N", depth: 20)
                  1996-04-06  [Fertiliser].Apply(amount: 0.04, type: "NO3N", depth: 20)
                  1996-04-06  [Fertiliser].Apply(amount: 1.29, type: "NO3N", depth: 20)
                  1996-04-10  [Fertiliser].Apply(amount: 0.03, type: "NO3N", depth: 20)
                  1996-04-10  [Fertiliser].Apply(amount: 1.56, type: "NO3N", depth: 20)
                  1996-04-15  [Fertiliser].Apply(amount: 0.01, type: "NO3N", depth: 20)
                  1996-04-15  [Fertiliser].Apply(amount: 1.13, type: "NO3N", depth: 20)
                  1996-04-19  [Fertiliser].Apply(amount: 0.01, type: "NO3N", depth: 20)
                  1996-04-19  [Fertiliser].Apply(amount: 2.16, type: "NO3N", depth: 20)
                  1996-04-23  [Fertiliser].Apply(amount: 0.04, type: "NO3N", depth: 20)
                  1996-04-23  [Fertiliser].Apply(amount: 3.38, type: "NO3N", depth: 20)
                  1996-04-26  [Fertiliser].Apply(amount: 0.03, type: "NO3N", depth: 20)
                  1996-04-26  [Fertiliser].Apply(amount: 2.94, type: "NO3N", depth: 20)
                  1996-05-02  [Fertiliser].Apply(amount: 0.05, type: "NO3N", depth: 20)
                  1996-05-02  [Fertiliser].Apply(amount: 1.55, type: "NO3N", depth: 20)
              CompositeFactor 910_CO2_370_Nit_High
                Specifications:
                  [Weather].FileName = %root%\Tests\Validation\Wheat\met\MARB1995-1996.met
                  [Operations]
                  [Water].Depth=0-50,50-150,150-300,300-500,500-600,600-700,700-900,900-1100,1100-1200,1200-1300,1300-1500,1500-1700,1700-1900,1900-2100
                  [Water].InitialValues = 0.281, 0.281, 0.281, 0.277, 0.246, 0.246, 0.202, 0.189, 0.186, 0.186, 0.195, 0.191, 0.169, 0.148
                  [NO3].InitialValues = 7.25, 7.25, 10.13, 7.8, 7.8, 3.67, 3.67, 1.56, 1.56, 0.76, 0.76, 0.35, 0.88, 0.88
                  [NH4].InitialValues = 1.99, 1.99, 1.87, 1.77, 1.77, 0.85, 0.85, 0.43, 0.43, 0.97, 0.97, 0.39, 0.69, 0.69
                Operations
                  1995-12-18  [SurfaceOrganicMatter].Add(mass:500, N:5, P:0, type:Wheat, name:Wheat)
                  1995-12-18  [SurfaceOrganicMatter].Incorporate(fraction: 1, depth: 100)
                  1995-12-18  [ISoilWater].Reset()
                  1995-12-18  [Soil].Nutrient.Reset()
                  1995-12-21  [Irrigation].Apply(amount:30, depth:0)
                  1996-01-30  [Irrigation].Apply(amount:30, depth:230)
                  1996-01-31  [Irrigation].Apply(amount:25, depth:230)
                  1996-02-22  [Irrigation].Apply(amount:40, depth:230)
                  1996-03-05  [Irrigation].Apply(amount:33, depth:230)
                  1996-03-11  [Irrigation].Apply(amount:45, depth:230)
                  1996-03-22  [Irrigation].Apply(amount:45, depth:230)
                  1996-03-30  [Irrigation].Apply(amount:54, depth:230)
                  1996-03-31  [Irrigation].Apply(amount:2, depth:230)
                  1996-04-05  [Irrigation].Apply(amount:45, depth:230)
                  1996-04-10  [Irrigation].Apply(amount:45, depth:230)
                  1996-04-15  [Irrigation].Apply(amount:30, depth:230)
                  1996-04-18  [Irrigation].Apply(amount:43, depth:230)
                  1996-04-22  [Irrigation].Apply(amount:43, depth:230)
                  1996-04-26  [Irrigation].Apply(amount:42, depth:230)
                  1996-05-01  [Irrigation].Apply(amount:54, depth:230)
                  1996-05-06  [Irrigation].Apply(amount:47, depth:230)
                  1995-12-21  [Fertiliser].Apply(amount: 0.1, type: "NO3N", depth: 20)
                  1995-12-21  [Fertiliser].Apply(amount: 1.79, type: "NO3N", depth: 20)
                  1996-01-30  [Fertiliser].Apply(amount: 50, type: "NO3N", depth: 20)
                  1996-01-31  [Fertiliser].Apply(amount: 0.04, type: "NO3N", depth: 20)
                  1996-01-31  [Fertiliser].Apply(amount: 1.72, type: "NO3N", depth: 20)
                  1996-02-22  [Fertiliser].Apply(amount: 125, type: "NO3N", depth: 20)
                  1996-02-22  [Fertiliser].Apply(amount: 0.05, type: "NO3N", depth: 20)
                  1996-02-22  [Fertiliser].Apply(amount: 2.24, type: "NO3N", depth: 20)
                  1996-03-05  [Fertiliser].Apply(amount: 0.04, type: "NO3N", depth: 20)
                  1996-03-05  [Fertiliser].Apply(amount: 1.85, type: "NO3N", depth: 20)
                  1996-03-11  [Fertiliser].Apply(amount: 0.05, type: "NO3N", depth: 20)
                  1996-03-11  [Fertiliser].Apply(amount: 2.52, type: "NO3N", depth: 20)
                  1996-03-22  [Fertiliser].Apply(amount: 0.05, type: "NO3N", depth: 20)
                  1996-03-22  [Fertiliser].Apply(amount: 2.52, type: "NO3N", depth: 20)
                  1996-03-30  [Fertiliser].Apply(amount: 125, type: "NO3N", depth: 20)
                  1996-03-31  [Fertiliser].Apply(amount: 0.05, type: "NO3N", depth: 20)
                  1996-03-31  [Fertiliser].Apply(amount: 2.44, type: "NO3N", depth: 20)
                  1996-04-06  [Fertiliser].Apply(amount: 0.04, type: "NO3N", depth: 20)
                  1996-04-06  [Fertiliser].Apply(amount: 1.29, type: "NO3N", depth: 20)
                  1996-04-10  [Fertiliser].Apply(amount: 0.03, type: "NO3N", depth: 20)
                  1996-04-10  [Fertiliser].Apply(amount: 1.56, type: "NO3N", depth: 20)
                  1996-04-15  [Fertiliser].Apply(amount: 0.01, type: "NO3N", depth: 20)
                  1996-04-15  [Fertiliser].Apply(amount: 1.13, type: "NO3N", depth: 20)
                  1996-04-18  [Fertiliser].Apply(amount: 50, type: "NO3N", depth: 20)
                  1996-04-19  [Fertiliser].Apply(amount: 0.01, type: "NO3N", depth: 20)
                  1996-04-19  [Fertiliser].Apply(amount: 2.16, type: "NO3N", depth: 20)
                  1996-04-23  [Fertiliser].Apply(amount: 0.04, type: "NO3N", depth: 20)
                  1996-04-23  [Fertiliser].Apply(amount: 3.38, type: "NO3N", depth: 20)
                  1996-04-26  [Fertiliser].Apply(amount: 0.03, type: "NO3N", depth: 20)
                  1996-04-26  [Fertiliser].Apply(amount: 2.94, type: "NO3N", depth: 20)
                  1996-05-02  [Fertiliser].Apply(amount: 0.07, type: "NO3N", depth: 20)
                  1996-05-02  [Fertiliser].Apply(amount: 2.1, type: "NO3N", depth: 20)
                  1996-05-06  [Fertiliser].Apply(amount: 0.05, type: "NO3N", depth: 20)
                  1996-05-06  [Fertiliser].Apply(amount: 2.63, type: "NO3N", depth: 20)
              CompositeFactor 911_CO2_550_Nit_Low
                Specifications:
                  [Weather].FileName = %root%\Tests\Validation\Wheat\met\MARC1995-1996.met
                  [Operations]
                  [Water].Depth=0-50,50-150,150-300,300-500,500-600,600-700,700-900,900-1100,1100-1200,1200-1300,1300-1500,1500-1700,1700-1900,1900-2100
                  [Water].InitialValues = 0.288, 0.288, 0.288, 0.263, 0.235, 0.235, 0.186, 0.138, 0.118, 0.118, 0.127, 0.125, 0.131, 0.158
                  [NO3].InitialValues = 6.39, 6.39, 6.49, 5.92, 5.92, 2.82, 2.82, 1.06, 1.06, 1.37, 1.37, 2.11, 1.31, 1.31
                  [NH4].InitialValues = 2.13, 2.13, 2.28, 1.46, 1.46, 0.82, 0.82, 0.49, 0.49, 0.54, 0.54, 0.39, 0.31, 0.31
                Operations: same as Validation.NorthAmerica.Arizona.MaricopaFACE95_96.Factors.Treatment.909_CO2_370_Nit_Low.Operations
              CompositeFactor 912_CO2_550_Nit_High
                Specifications:
                  [Weather].FileName = %root%\Tests\Validation\Wheat\met\MARC1995-1996.met
                  [Operations]
                  [Water].Depth=0-50,50-150,150-300,300-500,500-600,600-700,700-900,900-1100,1100-1200,1200-1300,1300-1500,1500-1700,1700-1900,1900-2100
                  [Water].InitialValues = 0.296, 0.296, 0.296, 0.259, 0.233, 0.233, 0.175, 0.137, 0.143, 0.143, 0.141, 0.125, 0.103, 0.106
                  [NO3].InitialValues = 5.75, 5.75, 8.7, 7.76, 7.76, 4.16, 4.16, 1.92, 1.92, 0.73, 0.73, 0.43, 0.53, 0.53
                  [NH4].InitialValues = 2.26, 2.26, 2.37, 1.99, 1.99, 0.95, 0.95, 0.7, 0.7, 0.65, 0.65, 0.32, 0.42, 0.42
                Operations: same as Validation.NorthAmerica.Arizona.MaricopaFACE95_96.Factors.Treatment.910_CO2_370_Nit_High.Operations
          Simulation Maricopa95_96
            Clock: Start=1995-12-21; End=1996-05-18
            Summary
            Weather: FileName=met/MARA1992-1993.met
            SoilArbitrator
            MicroClimate: a_interception=0; b_interception=1; c_interception=0; d_interception=0; SoilHeatFluxFraction=0.4; MinimumHeightDiffForNewLayer=0; NightInterceptionFraction=0.5; ReferenceHeight=2
            Zone Field: Area=1; Slope=0; AspectAngle=0; Altitude=50
              Operations
              Soil AZMC920001: same as Validation.NorthAmerica.Arizona.MaricopaFACE92_93.Maricopa92_93.Field.AZMC920001
              SurfaceOrganicMatter: InitialResidueName=wheat_stubble; InitialResidueType=wheat; InitialResidueMass=0; InitialStandingFraction=0; InitialCPR=0; InitialCNR=60
              Irrigation
              Fertiliser
              Plant Wheat
              Report HarvestReport
              Manager Sow
                SowDate = 21-Dec
                CultivarName = Yecora
                SowingDepth = 50
                RowSpacing = 250
                Population = 186
                EmergDate = 1-Jan
                script: same as in Validation.NorthAmerica.Arizona.MaricopaFACE92_93.Maricopa92_93.Field.Sow
              Manager Harvest: same as Validation.NorthAmerica.Arizona.MaricopaFACE92_93.Maricopa92_93.Field.Harvest
              Manager ForceCropFits: same as Validation.NorthAmerica.Arizona.MaricopaFACE93_94.Maricopa93_94.Field.ForceCropFits
              Report DailyReport
              SetModelParamsBySimulation SetPhenologyParams: SetEventName=[Plant].Sowing; ParameterFile=inputs/MaricopaParameterOverWrites.csv
              Report NDVIDailyReport
              Report ExtraReport: EventNames=[Clock].DoReport
                VariableNames:
                  [Clock].Today
                  [Fertiliser].NitrogenApplied
                  [Irrigation].IrrigationApplied
                  [Weather].CO2
              Spectral: DrySoilNDVI=0.18; WetSoilNDVI=0.2; GreenCropNDVI=0.95; DeadCropNDVI=0.1
            Manager LocationInfo: same as Validation.Turkey.Konya09.Konya09.LocationInfo
        Experiment MaricopaFACE96_97
          Factors
            Factor Treatment
              CompositeFactor 913_CO2_370_Nit_Low
                Specifications:
                  [Weather].FileName = %root%\Tests\Validation\Wheat\met\MARB1996-1997.met
                  [Operations]
                  [Water].Depth=0-50,50-150,150-300,300-500,500-600,600-700,700-900,900-1100,1100-1200,1200-1300,1300-1500,1500-1700,1700-1900,1900-2100
                  [Water].InitialValues = 0.267, 0.267, 0.267, 0.279, 0.273, 0.267, 0.188, 0.176, 0.185, 0.195, 0.197, 0.18, 0.175, 0.183
                  [NO3].InitialValues = 4.68, 4.68, 0.69, 0.68, 0.47, 0.35, 0.22, 0.27, 0.32, 0.32, 0.32, 0.32, 0.32, 0.32
                  [NH4].InitialValues = 0.2, 0.2, 0.14, 0.15, 0.11, 0.07, 0.04, 0.03, 0.03, 0.03, 0.03, 0.03, 0.03, 0.03
                Operations
                  1996-12-21  [SurfaceOrganicMatter].Add(mass:4300, N:43, P:0, type:Wheat, name:Wheat)
                  1996-12-21  [SurfaceOrganicMatter].Incorporate(fraction: 1, depth: 100)
                  1996-12-20  [ISoilWater].Reset()
                  1996-12-20  [Soil].Nutrient.Reset()
                  1996-12-28  [Irrigation].Apply(amount:30, depth:0)
                  1997-01-30  [Irrigation].Apply(amount:25, depth:230)
                  1997-02-19  [Irrigation].Apply(amount:40, depth:230)
                  1997-03-05  [Irrigation].Apply(amount:35, depth:230)
                  1997-03-13  [Irrigation].Apply(amount:40, depth:230)
                  1997-03-18  [Irrigation].Apply(amount:30, depth:230)
                  1997-03-27  [Irrigation].Apply(amount:66, depth:230)
                  1997-04-02  [Irrigation].Apply(amount:42, depth:230)
                  1997-04-07  [Irrigation].Apply(amount:22, depth:230)
                  1997-04-12  [Irrigation].Apply(amount:43, depth:230)
                  1997-04-17  [Irrigation].Apply(amount:38, depth:230)
                  1997-04-22  [Irrigation].Apply(amount:44, depth:230)
                  1997-04-29  [Irrigation].Apply(amount:60, depth:230)
                  1997-05-03  [Irrigation].Apply(amount:30, depth:230)
                  1997-05-09  [Irrigation].Apply(amount:3, depth:230)
                  1996-12-28  [Fertiliser].Apply(amount: 4.87, type: "NO3N", depth: 20)
                  1997-01-30  [Fertiliser].Apply(amount: 5, type: "NO3N", depth: 20)
                  1997-01-30  [Fertiliser].Apply(amount: 2.4, type: "NO3N", depth: 20)
                  1997-02-19  [Fertiliser].Apply(amount: 0.42, type: "NO3N", depth: 20)
                  1997-03-05  [Fertiliser].Apply(amount: 5, type: "NO3N", depth: 20)
                  1997-03-05  [Fertiliser].Apply(amount: 1.56, type: "NO3N", depth: 20)
                  1997-03-13  [Fertiliser].Apply(amount: 2.11, type: "NO3N", depth: 20)
                  1997-03-18  [Fertiliser].Apply(amount: 0.26, type: "NO3N", depth: 20)
                  1997-03-27  [Fertiliser].Apply(amount: 5, type: "NO3N", depth: 20)
                  1997-03-27  [Fertiliser].Apply(amount: 2.36, type: "NO3N", depth: 20)
                  1997-04-02  [Fertiliser].Apply(amount: 3.03, type: "NO3N", depth: 20)
                  1997-04-07  [Fertiliser].Apply(amount: 1.59, type: "NO3N", depth: 20)
                  1997-04-12  [Fertiliser].Apply(amount: 3.1, type: "NO3N", depth: 20)
                  1997-04-17  [Fertiliser].Apply(amount: 5.9, type: "NO3N", depth: 20)
                  1997-04-22  [Fertiliser].Apply(amount: 3.06, type: "NO3N", depth: 20)
                  1997-04-29  [Fertiliser].Apply(amount: 4.59, type: "NO3N", depth: 20)
                  1997-05-03  [Fertiliser].Apply(amount: 2.1, type: "NO3N", depth: 20)
                  1997-05-09  [Fertiliser].Apply(amount: 0.22, type: "NO3N", depth: 20)
              CompositeFactor 914_CO2_370_Nit_High
                Specifications:
                  [Weather].FileName = %root%\Tests\Validation\Wheat\met\MARB1996-1997.met
                  [Operations]
                  [Water].Depth=0-50,50-150,150-300,300-500,500-600,600-700,700-900,900-1100,1100-1200,1200-1300,1300-1500,1500-1700,1700-1900,1900-2100
                  [Water].InitialValues = 0.266, 0.266, 0.266, 0.28, 0.264, 0.247, 0.209, 0.194, 0.193, 0.192, 0.19, 0.19, 0.173, 0.178
                  [NO3].InitialValues = 5.81, 5.81, 1.36, 1.05, 0.42, 0.39, 0.37, 0.41, 0.46, 0.46, 0.46, 0.46, 0.46, 0.46
                  [NH4].InitialValues = 0.19, 0.19, 0.21, 0.17, 0.11, 0.09, 0.07, 0.07, 0.07, 0.07, 0.07, 0.07, 0.07, 0.07
                Operations
                  1996-12-21  [SurfaceOrganicMatter].Add(mass:4300, N:43, P:0, type:Wheat, name:Wheat)
                  1996-12-21  [SurfaceOrganicMatter].Incorporate(fraction: 1, depth: 100)
                  1996-12-20  [ISoilWater].Reset()
                  1996-12-20  [Soil].Nutrient.Reset()
                  1996-12-28  [Irrigation].Apply(amount:30, depth:0)
                  1997-01-30  [Irrigation].Apply(amount:25, depth:230)
                  1997-02-19  [Irrigation].Apply(amount:40, depth:230)
                  1997-03-05  [Irrigation].Apply(amount:35, depth:230)
                  1997-03-13  [Irrigation].Apply(amount:40, depth:230)
                  1997-03-18  [Irrigation].Apply(amount:30, depth:230)
                  1997-03-27  [Irrigation].Apply(amount:66, depth:230)
                  1997-04-02  [Irrigation].Apply(amount:42, depth:230)
                  1997-04-07  [Irrigation].Apply(amount:22, depth:230)
                  1997-04-12  [Irrigation].Apply(amount:43, depth:230)
                  1997-04-17  [Irrigation].Apply(amount:38, depth:230)
                  1997-04-22  [Irrigation].Apply(amount:44, depth:230)
                  1997-04-29  [Irrigation].Apply(amount:60, depth:230)
                  1997-05-03  [Irrigation].Apply(amount:68, depth:230)
                  1997-05-08  [Irrigation].Apply(amount:35, depth:230)
                  1997-05-09  [Irrigation].Apply(amount:3, depth:230)
                  1996-12-28  [Fertiliser].Apply(amount: 4.87, type: "NO3N", depth: 20)
                  1997-01-30  [Fertiliser].Apply(amount: 50, type: "NO3N", depth: 20)
                  1997-01-30  [Fertiliser].Apply(amount: 2.4, type: "NO3N", depth: 20)
                  1997-02-19  [Fertiliser].Apply(amount: 0.42, type: "NO3N", depth: 20)
                  1997-03-05  [Fertiliser].Apply(amount: 125, type: "NO3N", depth: 20)
                  1997-03-05  [Fertiliser].Apply(amount: 1.56, type: "NO3N", depth: 20)
                  1997-03-13  [Fertiliser].Apply(amount: 2.11, type: "NO3N", depth: 20)
                  1997-03-18  [Fertiliser].Apply(amount: 0.26, type: "NO3N", depth: 20)
                  1997-03-27  [Fertiliser].Apply(amount: 125, type: "NO3N", depth: 20)
                  1997-04-02  [Fertiliser].Apply(amount: 3.03, type: "NO3N", depth: 20)
                  1997-04-07  [Fertiliser].Apply(amount: 1.59, type: "NO3N", depth: 20)
                  1997-04-12  [Fertiliser].Apply(amount: 3.1, type: "NO3N", depth: 20)
                  1997-04-17  [Fertiliser].Apply(amount: 5.9, type: "NO3N", depth: 20)
                  1997-04-22  [Fertiliser].Apply(amount: 50, type: "NO3N", depth: 20)
                  1997-04-22  [Fertiliser].Apply(amount: 3.06, type: "NO3N", depth: 20)
                  1997-04-29  [Fertiliser].Apply(amount: 4.59, type: "NO3N", depth: 20)
                  1997-05-03  [Fertiliser].Apply(amount: 4.75, type: "NO3N", depth: 20)
                  1997-05-08  [Fertiliser].Apply(amount: 2.93, type: "NO3N", depth: 20)
                  1997-05-09  [Fertiliser].Apply(amount: 0.22, type: "NO3N", depth: 20)
              CompositeFactor 915_CO2_550_Nit_Low
                Specifications:
                  [Weather].FileName = %root%\Tests\Validation\Wheat\met\MARC1996-1997.met
                  [Operations]
                  [Water].Depth=0-50,50-150,150-300,300-500,500-600,600-700,700-900,900-1100,1100-1200,1200-1300,1300-1500,1500-1700,1700-1900,1900-2100
                  [Water].InitialValues = 0.268, 0.268, 0.268, 0.279, 0.269, 0.259, 0.212, 0.162, 0.156, 0.15, 0.145, 0.144, 0.159, 0.169
                  [NO3].InitialValues = 5.22, 5.22, 0.84, 0.96, 0.43, 0.34, 0.25, 0.26, 0.27, 0.27, 0.27, 0.27, 0.27, 0.27
                  [NH4].InitialValues = 0.29, 0.29, 0.16, 0.17, 0.15, 0.09, 0.04, 0.02, 0.01, 0.01, 0.01, 0.01, 0.01, 0.01
                Operations: same as Validation.NorthAmerica.Arizona.MaricopaFACE96_97.Factors.Treatment.913_CO2_370_Nit_Low.Operations
              CompositeFactor 916_CO2_550_Nit_High
                Specifications:
                  [Weather].FileName = %root%\Tests\Validation\Wheat\met\MARC1996-1997.met
                  [Operations]
                  [Water].Depth=0-50,50-150,150-300,300-500,500-600,600-700,700-900,900-1100,1100-1200,1200-1300,1300-1500,1500-1700,1700-1900,1900-2100
                  [Water].InitialValues = 0.273, 0.273, 0.273, 0.276, 0.261, 0.246, 0.209, 0.193, 0.181, 0.17, 0.17, 0.186, 0.171, 0.18
                  [NO3].InitialValues = 4.2, 4.2, 1.05, 2.03, 0.7, 0.66, 0.62, 0.53, 0.44, 0.44, 0.44, 0.44, 0.44, 0.44
                  [NH4].InitialValues = 0.18, 0.18, 0.18, 0.18, 0.11, 0.1, 0.08, 0.1, 0.12, 0.12, 0.12, 0.12, 0.12, 0.12
                Operations
                  1996-12-21  [SurfaceOrganicMatter].Add(mass:4300, N:43, P:0, type:Wheat, name:Wheat)
                  1996-12-21  [SurfaceOrganicMatter].Incorporate(fraction: 1, depth: 100)
                  1996-12-20  [ISoilWater].Reset()
                  1996-12-20  [Soil].Nutrient.Reset()
                  1996-12-28  [Irrigation].Apply(amount:30, depth:0)
                  1997-01-30  [Irrigation].Apply(amount:25, depth:230)
                  1997-02-19  [Irrigation].Apply(amount:40, depth:230)
                  1997-03-05  [Irrigation].Apply(amount:35, depth:230)
                  1997-03-13  [Irrigation].Apply(amount:40, depth:230)
                  1997-03-18  [Irrigation].Apply(amount:30, depth:230)
                  1997-03-27  [Irrigation].Apply(amount:66, depth:230)
                  1997-04-02  [Irrigation].Apply(amount:42, depth:230)
                  1997-04-07  [Irrigation].Apply(amount:22, depth:230)
                  1997-04-12  [Irrigation].Apply(amount:43, depth:230)
                  1997-04-17  [Irrigation].Apply(amount:38, depth:230)
                  1997-04-22  [Irrigation].Apply(amount:44, depth:230)
                  1997-04-29  [Irrigation].Apply(amount:60, depth:230)
                  1997-05-03  [Irrigation].Apply(amount:68, depth:230)
                  1997-05-08  [Irrigation].Apply(amount:35, depth:230)
                  1997-05-09  [Irrigation].Apply(amount:3, depth:230)
                  1996-12-28  [Fertiliser].Apply(amount: 4.87, type: "NO3N", depth: 20)
                  1997-01-30  [Fertiliser].Apply(amount: 50, type: "NO3N", depth: 20)
                  1997-01-30  [Fertiliser].Apply(amount: 2.4, type: "NO3N", depth: 20)
                  1997-02-19  [Fertiliser].Apply(amount: 0.42, type: "NO3N", depth: 20)
                  1997-03-05  [Fertiliser].Apply(amount: 125, type: "NO3N", depth: 20)
                  1997-03-05  [Fertiliser].Apply(amount: 1.56, type: "NO3N", depth: 20)
                  1997-03-13  [Fertiliser].Apply(amount: 2.11, type: "NO3N", depth: 20)
                  1997-03-18  [Fertiliser].Apply(amount: 0.26, type: "NO3N", depth: 20)
                  1997-03-27  [Fertiliser].Apply(amount: 125, type: "NO3N", depth: 20)
                  1997-03-27  [Fertiliser].Apply(amount: 2.36, type: "NO3N", depth: 20)
                  1997-04-02  [Fertiliser].Apply(amount: 3.03, type: "NO3N", depth: 20)
                  1997-04-07  [Fertiliser].Apply(amount: 1.59, type: "NO3N", depth: 20)
                  1997-04-12  [Fertiliser].Apply(amount: 3.1, type: "NO3N", depth: 20)
                  1997-04-17  [Fertiliser].Apply(amount: 5.9, type: "NO3N", depth: 20)
                  1997-04-22  [Fertiliser].Apply(amount: 50, type: "NO3N", depth: 20)
                  1997-04-22  [Fertiliser].Apply(amount: 3.06, type: "NO3N", depth: 20)
                  1997-04-29  [Fertiliser].Apply(amount: 4.59, type: "NO3N", depth: 20)
                  1997-05-03  [Fertiliser].Apply(amount: 4.75, type: "NO3N", depth: 20)
                  1997-05-08  [Fertiliser].Apply(amount: 2.93, type: "NO3N", depth: 20)
                  1997-05-09  [Fertiliser].Apply(amount: 0.22, type: "NO3N", depth: 20)
          Simulation Maricopa96_97
            Clock: Start=1996-12-28; End=1997-05-31
            Summary
            Weather: FileName=met/MARA1992-1993.met
            SoilArbitrator
            MicroClimate: a_interception=0; b_interception=1; c_interception=0; d_interception=0; SoilHeatFluxFraction=0.4; MinimumHeightDiffForNewLayer=0; NightInterceptionFraction=0.5; ReferenceHeight=2
            Zone Field: Area=1; Slope=0; AspectAngle=0; Altitude=50
              Operations
              Soil AZMC920001: Site=Maricopa; Region=Maricopa; State=Arizona; Country=USA; ApsoilNumber=AZMC920001; Latitude=0; Longitude=0
                SoilType=fine-loamy, mixed (calcareous), hyperthermic Typic Torrifluvents
                Physical: same as Validation.NorthAmerica.Arizona.MaricopaFACE92_93.Maricopa92_93.Field.AZMC920001.Physical
                Swim3: same as Validation.NorthAmerica.Arizona.MaricopaFACE92_93.Maricopa92_93.Field.AZMC920001.Swim3
                Solute NO3: same as Validation.NorthAmerica.Arizona.MaricopaFACE92_93.Maricopa92_93.Field.AZMC920001.NO3
                Solute NH4: same as Validation.NorthAmerica.Arizona.MaricopaFACE92_93.Maricopa92_93.Field.AZMC920001.NH4
                Solute Urea: same as Validation.NorthAmerica.Arizona.MaricopaFACE92_93.Maricopa92_93.Field.AZMC920001.Urea
                Water: FilledFromTop=false
                  Thickness=[50, 100, 150, 200, 100, 100, 200, 200, 100, 100, 200, 200, 200, 200]
                  InitialValues=[0.36, 0.36, 0.36, 0.3, 0.27, 0.27, 0.22, 0.2, 0.2, 0.2, 0.2, 0.2, 0.2, 0.2]
                Organic: FOMCNRatio=20; CarbonUnits=Total
                  Thickness  Carbon  SoilCNRatio  FBiom  FInert  FOM
                  50         0.41    10           0.2    0.25    924
                  100        0.35    10           0.16   0.3     765
                  150        0.27    10           0.03   0.3     590
                  200        0.24    10           0.02   0.5     537
                  100        0.16    10           0.01   0.95    405
                  100        0.16    10           0.01   0.95    405
                  200        0.3     10           0.01   0.95    310
                  200        0.1     10           0.01   1       270
                  100        0.1     10           0.01   1       270
                  100        0.1     10           0.01   1       270
                  200        0       10           0.01   1       0
                  200        0       10           0.01   1       0
                  200        0       10           0.01   1       0
                  200        0       10           0.01   1       0
                Chemical: same as Validation.NorthAmerica.Arizona.MaricopaFACE92_93.Maricopa92_93.Field.AZMC920001.Chemical
                Nutrient
                OutputLayers ObservedLayers: Thickness=[300, 200, 200, 200, 200, 200, 200, 200, 200, 200]
                LayerStructure: Thickness=[5, 50, 50, 50, 50, 50, 50, 50, 50, 50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]
                SoilTemperature Temperature: InteractionsPerDay=8
              SurfaceOrganicMatter: InitialResidueName=wheat_stubble; InitialResidueType=wheat; InitialStandingFraction=0; InitialCPR=0; InitialCNR=20
              Irrigation
              Fertiliser
              Plant Wheat
              Manager Sow
                SowDate = 28-Dec
                CultivarName = Yecora
                SowingDepth = 50
                RowSpacing = 250
                Population = 194
                EmergDate = 3-Jan
                script: same as in Validation.NorthAmerica.Arizona.MaricopaFACE92_93.Maricopa92_93.Field.Sow
              Report HarvestReport
              Manager Harvest: same as Validation.NorthAmerica.Arizona.MaricopaFACE92_93.Maricopa92_93.Field.Harvest
              Manager ForceCropFits: same as Validation.NorthAmerica.Arizona.MaricopaFACE93_94.Maricopa93_94.Field.ForceCropFits
              Report DailyReport
              SetModelParamsBySimulation SetPhenologyParams: SetEventName=[Plant].Sowing; ParameterFile=inputs/MaricopaParameterOverWrites.csv
              Report NDVIDailyReport
              Report ExtraReport: EventNames=[Clock].DoReport
                VariableNames:
                  [Clock].Today
                  [Fertiliser].NitrogenApplied
                  [Irrigation].IrrigationApplied
                  [Weather].CO2
                  [ISoilWater].LeachNO3
                  [ObservedLayers].NO3
                  sum([Nutrient].N2Oatm)
                  sum([Nutrient].MineralisedN)
                  [Wheat].Root.Depth
                  sum([Nutrient].Microbial.N)
              Spectral: DrySoilNDVI=0.18; WetSoilNDVI=0.2; GreenCropNDVI=0.95; DeadCropNDVI=0.1
            Manager LocationInfo: same as Validation.Turkey.Konya09.Konya09.LocationInfo
    Folder China
      Folder ChinaFlux
        Simulation Yucheng02
          Clock: Start=2002-10-01; End=2003-06-15
          Summary summaryfile
          Weather: FileName=met/Yucheng.met
          SoilArbitrator Soil Arbitrator
          Zone Field: Area=1; Slope=0; AspectAngle=0; Altitude=50
            Irrigation
            Fertiliser
            Operations CropManagement
              2002-10-15  [Wheat].Sow(population:100, cultivar:"Keyu13", depth:30, rowSpacing:250);
              2002-10-15  [Fertiliser].Apply(amount: 182.5, type: "NO3N");
            SurfaceOrganicMatter: InitialResidueName=wheat_stubble; InitialResidueType=wheat; InitialResidueMass=2000; InitialStandingFraction=0; InitialCPR=0; InitialCNR=100
            Plant Wheat
            MicroClimate: a_interception=0; b_interception=0; c_interception=0; d_interception=0; SoilHeatFluxFraction=0.4; MinimumHeightDiffForNewLayer=0; NightInterceptionFraction=0.5; ReferenceHeight=2
            Soil: SoilType=APS26Soil; LocalName=APS26Site; Site=APS26Site; NearestTown=Unknown; Region=Lawes; NaturalVegetation=Unknown; Latitude=0; Longitude=0
              Physical
                Thickness  BD    AirDry  LL15  DUL   SAT
                100        1.37  0.04    0.06  0.28  0.4
                100        1.5   0.04    0.08  0.32  0.4
                100        1.46  0.06    0.1   0.32  0.448
                100        1.42  0.06    0.15  0.3   0.45
                100        1.42  0.06    0.2   0.3   0.45
                100        1.41  0.06    0.25  0.32  0.46
                100        1.4   0.06    0.28  0.35  0.45
                100        1.41  0.1     0.28  0.35  0.45
                100        1.4   0.1     0.3   0.37  0.45
                100        1.46  0.1     0.28  0.41  0.449
                100        1.4   0.1     0.26  0.41  0.47
                100        1.49  0.1     0.32  0.4   0.43
                100        1.5   0.1     0.35  0.4   0.43
                100        1.46  0.1     0.37  0.4   0.44
                100        1.45  0.1     0.37  0.4   0.45
                SoilCrop WheatSoil
                  LL=[0.06, 0.08, 0.1, 0.15, 0.2, 0.25, 0.28, 0.28, 0.3, 0.28, 0.26, 0.32, 0.35, 0.37, 0.37]
                  KL=[0.06, 0.06, 0.06, 0.06, 0.06, 0.06, 0.06, 0.06, 0.06, 0.06, 0.06, 0.06, 0.06, 0.06, 0.06]
                  XF=[1, 1, 1, 1, 1, 0.8, 0.6, 0.4, 0.4, 0.4, 0.4, 0.4, 0.4, 0.4, 0.4]
              WaterBalance SoilWater: SummerDate=1-Nov; SummerU=4; SummerCona=2; WinterDate=1-Apr; WinterU=1; WinterCona=1; DiffusConst=40; DiffusSlope=16; Salb=0.13; CN2Bare=72; CNRed=20; CNCov=0.8; DischargeWidth=0; CatchmentArea=0; PSIDul=-100
                Thickness  SWCON  KLAT
                150        0.4    0
                150        0.4    0
                150        0.4    0
                150        0.4    0
                300        0.4    0
                300        0.4    0
                300        0.4    0
                300        0.4    0
                300        0.4    0
                300        0.4    0
              Organic: FOMCNRatio=40; CarbonUnits=Total
                Thickness  Carbon  SoilCNRatio  FBiom  FInert  FOM
                100        0.83    14.5         0.04   0.36    381.534
                100        0.35    14.5         0.03   0.35    312.374
                100        0.33    14.5         0.03   0.45    255.75
                100        0.22    14.5         0.02   0.45    209.39
                100        0.22    14.5         0.02   0.59    171.434
                100        0.22    14.5         0.02   0.6     140.358
                100        0.19    14.5         0.02   0.84    114.916
                100        0.17    14.5         0.02   0.8     94.0851
                100        0.15    14.5         0.01   0.8     77.0304
                100        0.12    14.5         0.01   0.99    63.0671
                100        0.11    14.5         0.01   0.99    51.635
                100        0.1     14.5         0.01   0.99    42.2752
                100        0.1     14.5         0.01   0.99    34.612
                100        0.1     14.5         0.01   0.99    28.3379
                100        0.1     14.5         0.01   0.99    23.2011
              Chemical: same as Validation.Europe.Belgium.Lonzee04.Field.Soil.Chemical
              Water: FilledFromTop=false
                Thickness=[100, 100, 100, 100, 100, 100, 100, 100, 100, 100, 100, 100, 100, 100, 100]
                InitialValues=[0.27, 0.28, 0.23, 0.24, 0.26, 0.3, 0.3, 0.32, 0.35, 0.32, 0.32, 0.37, 0.39, 0.39, 0.39]
              Nutrient
              Solute NO3: InitialValues=[10, 15, 10, 8, 5, 2, 1, 1, 1, 1, 1, 1, 1, 1, 0]; InitialValuesUnits=ppm; WaterTableConcentration=0; D0=0; DepthConstant=0; MaxDepthSoluteAccessible=0; RunoffEffectivenessAtMovingSolute=0; MaxEffectiveRunoff=0
                Thickness=[100, 100, 100, 100, 100, 100, 100, 100, 100, 100, 100, 100, 100, 100, 100]
              Solute NH4: same as Validation.Europe.Belgium.Lonzee04.Field.Soil.NH4
              Solute Urea: same as Validation.Europe.Belgium.Lonzee04.Field.Soil.Urea
              SoilTemperature Temperature: InteractionsPerDay=8
            Report DailyReport
            Report HarvestReport
            Manager Harvesting
          Manager LocationInfo: same as Validation.Turkey.Konya09.Konya09.LocationInfo
        Simulation Yucheng03
          Clock: Start=2003-10-20; End=2004-06-15
          Summary summaryfile
          Weather: FileName=met/Yucheng.met
          SoilArbitrator Soil Arbitrator
          Zone Field: Area=1; Slope=0; AspectAngle=0; Altitude=50
            Irrigation
            Fertiliser
            Operations CropManagement
              2003-10-23  [Wheat].Sow(population:100, cultivar:"Keyu13", depth:30, rowSpacing:250);
              2003-10-23  [Fertiliser].Apply(amount: 215.3, type: "NO3N");
            SurfaceOrganicMatter: InitialResidueName=wheat_stubble; InitialResidueType=wheat; InitialResidueMass=2000; InitialStandingFraction=0; InitialCPR=0; InitialCNR=100
            Plant Wheat
            MicroClimate: a_interception=0; b_interception=0; c_interception=0; d_interception=0; SoilHeatFluxFraction=0.4; MinimumHeightDiffForNewLayer=0; NightInterceptionFraction=0.5; ReferenceHeight=2
            Soil: SoilType=APS26Soil; LocalName=APS26Site; Site=APS26Site; NearestTown=Unknown; Region=Lawes; NaturalVegetation=Unknown; Latitude=0; Longitude=0
              Physical: same as Validation.China.ChinaFlux.Yucheng02.Field.Soil.Physical
              WaterBalance SoilWater: same as Validation.China.ChinaFlux.Yucheng02.Field.Soil.SoilWater
              Organic: same as Validation.China.ChinaFlux.Yucheng02.Field.Soil.Organic
              Chemical: same as Validation.Europe.Belgium.Lonzee04.Field.Soil.Chemical
              Water: FilledFromTop=false
                Thickness=[100, 100, 100, 100, 100, 100, 100, 100, 100, 100, 100, 100, 100, 100, 100]
                InitialValues=[0.2, 0.28, 0.3, 0.3, 0.31, 0.33, 0.35, 0.37, 0.4, 0.42, 0.42, 0.42, 0.41, 0.41, 0.41]
              Nutrient
              Solute NO3: same as Validation.China.ChinaFlux.Yucheng02.Field.Soil.NO3
              Solute NH4: same as Validation.Europe.Belgium.Lonzee04.Field.Soil.NH4
              Solute Urea: same as Validation.Europe.Belgium.Lonzee04.Field.Soil.Urea
              SoilTemperature Temperature: InteractionsPerDay=8
            Report DailyReport
            Report HarvestReport
            Manager Harvesting
          Manager LocationInfo: same as Validation.Turkey.Konya09.Konya09.LocationInfo
        Simulation Yucheng04
          Clock: Start=2004-10-13; End=2005-07-15
          Summary summaryfile
          Weather: FileName=met/Yucheng.met
          SoilArbitrator Soil Arbitrator
          Zone Field: Area=1; Slope=0; AspectAngle=0; Altitude=50
            Irrigation
            Fertiliser
            Operations CropManagement
              2004-10-14  [Wheat].Sow(population:100, cultivar:"Keyu13", depth:30, rowSpacing:250);
              2004-10-14  [Fertiliser].Apply(amount: 195.5, type: "NO3N");
            SurfaceOrganicMatter: InitialResidueName=wheat_stubble; InitialResidueType=wheat; InitialResidueMass=2000; InitialStandingFraction=0; InitialCPR=0; InitialCNR=100
            Plant Wheat
            MicroClimate: a_interception=0; b_interception=0; c_interception=0; d_interception=0; SoilHeatFluxFraction=0.4; MinimumHeightDiffForNewLayer=0; NightInterceptionFraction=0.5; ReferenceHeight=2
            Soil: SoilType=APS26Soil; LocalName=APS26Site; Site=APS26Site; NearestTown=Unknown; Region=Lawes; NaturalVegetation=Unknown; Latitude=0; Longitude=0
              Physical: same as Validation.China.ChinaFlux.Yucheng02.Field.Soil.Physical
              WaterBalance SoilWater: same as Validation.China.ChinaFlux.Yucheng02.Field.Soil.SoilWater
              Organic: same as Validation.China.ChinaFlux.Yucheng02.Field.Soil.Organic
              Chemical: same as Validation.Europe.Belgium.Lonzee04.Field.Soil.Chemical
              Water: FilledFromTop=false
                Thickness=[100, 100, 100, 100, 100, 100, 100, 100, 100, 100, 100, 100, 100, 100, 100]
                InitialValues=[0.17, 0.26, 0.27, 0.27, 0.28, 0.31, 0.34, 0.35, 0.37, 0.4, 0.4, 0.39, 0.39, 0.39, 0.39]
              Nutrient
              Solute NO3: same as Validation.China.ChinaFlux.Yucheng02.Field.Soil.NO3
              Solute NH4: same as Validation.Europe.Belgium.Lonzee04.Field.Soil.NH4
              Solute Urea: same as Validation.Europe.Belgium.Lonzee04.Field.Soil.Urea
              SoilTemperature Temperature: InteractionsPerDay=8
            Report DailyReport
            Report HarvestReport
            Manager Harvesting
          Manager LocationInfo: same as Validation.Turkey.Konya09.Konya09.LocationInfo
    Folder Iran
      Simulation Gorgan05
        Clock: Start=2005-12-16; End=2006-06-15
        Summary summaryfile
        Weather: FileName=met/Gorgan.met
        SoilArbitrator Soil Arbitrator
        Zone Field: Area=1; Slope=0; AspectAngle=0; Altitude=50
          Irrigation
          Fertiliser
          Operations CropManagement
            2005-12-16  [Wheat].Sow(population:100, cultivar:"Gorgan", depth:30, rowSpacing:250);
            2005-12-16  [Fertiliser].Apply(amount: 200, type: "NO3N");
          SurfaceOrganicMatter: InitialResidueName=wheat_stubble; InitialResidueType=wheat; InitialResidueMass=2000; InitialStandingFraction=0; InitialCPR=0; InitialCNR=100
          Plant Wheat
          MicroClimate: a_interception=0; b_interception=0; c_interception=0; d_interception=0; SoilHeatFluxFraction=0.4; MinimumHeightDiffForNewLayer=0; NightInterceptionFraction=0.5; ReferenceHeight=2
          Soil: SoilType=APS26Soil; LocalName=APS26Site; Site=APS26Site; NearestTown=Unknown; Region=Lawes; NaturalVegetation=Unknown; Latitude=0; Longitude=0
            Physical: same as Validation.China.ChinaFlux.Yucheng02.Field.Soil.Physical
            WaterBalance SoilWater: same as Validation.Europe.Belgium.Lonzee04.Field.Soil.SoilWater
            Organic: same as Validation.China.ChinaFlux.Yucheng02.Field.Soil.Organic
            Chemical: same as Validation.Europe.Belgium.Lonzee04.Field.Soil.Chemical
            Water: FilledFromTop=false
              Thickness=[100, 100, 100, 100, 100, 100, 100, 100, 100, 100, 100, 100, 100, 100, 100]
              InitialValues=[0.27, 0.28, 0.23, 0.24, 0.26, 0.3, 0.3, 0.32, 0.35, 0.32, 0.32, 0.37, 0.39, 0.39, 0.39]
            Nutrient
            Solute NO3: same as Validation.China.ChinaFlux.Yucheng02.Field.Soil.NO3
            Solute NH4: same as Validation.Europe.Belgium.Lonzee04.Field.Soil.NH4
            Solute Urea: same as Validation.Europe.Belgium.Lonzee04.Field.Soil.Urea
            SoilTemperature Temperature: InteractionsPerDay=8
          Report DailyReport
          Report HarvestReport
          Manager Harvesting
        Manager LocationInfo: same as Validation.Turkey.Konya09.Konya09.LocationInfo
    Folder Africa
      Memo
        This trial was run in the Jamma district of the Amhara region of the Ethiopia country of the Africa contenentand is described in full by [#Getu_AfricaWheat_2012].  'HAR 1685' Wheat was sown in 20 cm row spacing.  Different N fertiliser treatments were applied:

        1. 0NUSG  = 0kg N/ha
        2. 23NUSG = 23 kg N/ha as Urea Super Granules (a slow release urea product)
        3. 46NUSG = 46 kg N/ha as Urea Super Granules
        4. 69NUSG = 69  kg N/ha as Urea Super Granules
        5. 46NUC = 46 kg N/ha as Uncoated Urea
      Experiment Jamma
        Memo
          ;From

          Soil Characterization and Evaluation of Slow Release Urea Fertilizer Rates on Yield Traits and Grain Yields of Wheat and Teff on Vertisols of Jamma District of South Wollo Zone, Amhara Region b0

          By

          Abebe Getu (BSc), Hawassa University, Ethiopia
        Factors
          Factor NRate: Specification=[NRate]
            Operations 0NUSG
              2011-08-01  [Fertiliser].Apply(0, "UreaN", 10);
              2011-09-01  [Fertiliser].Apply(0, "UreaN", 10);
            Operations 23NUSG
              2011-08-01  [Fertiliser].Apply(11.5, "UreaN", 10);
              2011-09-01  [Fertiliser].Apply(11.5, "UreaN", 10);
            Operations 46NUSG
              2011-08-01  [Fertiliser].Apply(23, "UreaN", 10);
              2011-09-01  [Fertiliser].Apply(23, "UreaN", 10);
            Operations 69NUSG
              2011-08-01  [Fertiliser].Apply(34.5, "UreaN", 10);
              2011-09-01  [Fertiliser].Apply(34.5, "UreaN", 10);
            Operations 46NUC: same as Validation.Africa.Jamma.Factors.NRate.46NUSG
        Simulation Jamma
          Weather: FileName=met/Jamma.met
          Clock: Start=2011-07-25; End=2011-12-15
          Summary summaryfile
          SoilArbitrator Soil Arbitrator
          Zone Field: Area=1; Slope=0; AspectAngle=0; Altitude=50
            MicroClimate: a_interception=0; b_interception=1; c_interception=0; d_interception=0; SoilHeatFluxFraction=0.4; MinimumHeightDiffForNewLayer=0; NightInterceptionFraction=0.5; ReferenceHeight=2
            Irrigation
            Fertiliser
            SurfaceOrganicMatter: InitialResidueName=maize; InitialResidueType=maize; InitialResidueMass=500; InitialStandingFraction=0; InitialCPR=0; InitialCNR=65
            Operations Sowing
              2011-07-25  [Wheat].Sow(population:23, cultivar:"HAR1685", depth:50, rowSpacing:250);
            Operations NRate
              1985-11-08  [Fertiliser].Apply(50, "NH4NO3N", 10);
              1985-11-29  [Fertiliser].Apply(30, "NH4NO3N", 10);
            Soil: Latitude=0; Longitude=0
              Physical
                Thickness  BD    AirDry  LL15  DUL   SAT
                150        1.03  0.1     0.35  0.55  0.6
                150        1.03  0.1     0.35  0.55  0.6
                300        1.03  0.26    0.35  0.55  0.6
                300        1.03  0.32    0.35  0.55  0.6
                300        1.03  0.32    0.35  0.55  0.6
                300        1.03  0.32    0.35  0.55  0.6
                SoilCrop WheatSoil: LL=[0.35, 0.35, 0.35, 0.4, 0.45, 0.5]; KL=[0.04, 0.03, 0.03, 0.02, 0.02, 0.02]; XF=[1, 1, 1, 1, 1, 1]
              WaterBalance SoilWater: SummerDate=1-Nov; SummerU=5; SummerCona=5; WinterDate=1-Apr; WinterU=5; WinterCona=5; DiffusConst=40; DiffusSlope=16; Salb=0.13; CN2Bare=78; CNRed=20; CNCov=0.8; PSIDul=-100; Thickness=[100, 100, 100, 200, 200, 200, 200, 200, 200]; SWCON=[0.5, 0.5, 0.5, 0.5, 0.5, 0.5, 0.5, 0.5, 0.5]
              Organic: FOMCNRatio=40; CarbonUnits=Total
                Thickness  Carbon  SoilCNRatio  FBiom  FInert  FOM
                300        1.54    14           0.02   0.54    327.386
                600        0.98    14           0.01   0.84    98.6069
                400        0.84    14           0.01   0.99    44.3069
                200        0.42    14           0.01   0.99    29.6998
              Chemical: Thickness=[150, 150, 300, 900]; PH=[6.7, 6.7, 6.7, 6.7]; PHUnits=Water
              Water: Thickness=[150, 150, 300, 300, 600]; InitialValues=[0.55, 0.55, 0.35, 0.35, 0.35]; FilledFromTop=false
              Nutrient
              Solute NO3: Thickness=[150, 150, 300, 900]; InitialValues=[20, 10, 5, 0.5]; InitialValuesUnits=ppm; WaterTableConcentration=0; D0=0; DepthConstant=0; MaxDepthSoluteAccessible=0; RunoffEffectivenessAtMovingSolute=0; MaxEffectiveRunoff=0
              Solute NH4: Thickness=[150, 150, 300, 900]; InitialValues=[0.6, 0.1, 0.1, 0.1]; InitialValuesUnits=ppm; WaterTableConcentration=0; D0=0; DepthConstant=0; MaxDepthSoluteAccessible=0; RunoffEffectivenessAtMovingSolute=0; MaxEffectiveRunoff=0
              Solute Urea: Thickness=[150, 150, 300, 900]; InitialValues=[0, 0, 0, 0]; InitialValuesUnits=kg/ha; WaterTableConcentration=0; D0=0; DepthConstant=0; MaxDepthSoluteAccessible=0; RunoffEffectivenessAtMovingSolute=0; MaxEffectiveRunoff=0
              SoilTemperature Temperature: InteractionsPerDay=8
            Plant Wheat
            Report DailyReport
            Report HarvestReport
            Manager Harvesting
          Manager LocationInfo: same as Validation.Turkey.Konya09.Konya09.LocationInfo
  Folder Replacements
    Report HarvestReport: EventNames=[Wheat].Harvesting
      VariableNames:
        [Clock].Today
        [Clock].StartDate
        [Wheat].SowingDate
        [Wheat].SowingData.Cultivar
        [Wheat].SowingData.Population
        [Wheat].SowingDate.DayOfYear
        [Wheat].SowingData.RowSpacing
        [IWeather].Latitude
        [IWeather].Longitude
        [IWeather].FileName
        [LocationInfo].Script.Country
        [LocationInfo].Script.State
        [LocationInfo].Script.Region
        [Wheat].AboveGround.N
        [Wheat].AboveGround.NConc
        [Wheat].AboveGround.Wt
        [Wheat].Ear.N
        [Wheat].Ear.NConc
        [Wheat].Ear.Wt
        [Wheat].Grain.N
        [Wheat].Grain.NConc
        [Wheat].Grain.Number
        [Wheat].Grain.Protein
        [Wheat].Grain.Size
        [Wheat].Grain.Wt
        [Wheat].Leaf.N
        [Wheat].Leaf.StemPopulation
        [Wheat].Leaf.Wt
        [Wheat].Phenology.CAMP.TSHS
        [Wheat].Phenology.CAMP.VSHS
        [Wheat].Phenology.CurrentStageName
        [Wheat].Phenology.EmergenceDAS
        [Wheat].Phenology.FinalLeafNumber
        [Wheat].Phenology.FlagLeafDAS
        [Wheat].Phenology.FloweringDAS
        [Wheat].Phenology.HeadingDAS
        [Wheat].Phenology.MaturityDAS
        [Wheat].Phenology.TerminalSpikeletDAS
        [Wheat].Spike.HeadNumber
        [Wheat].Spike.N
        [Wheat].Spike.Wt
        [Wheat].Stem.N
        [Wheat].Stem.NConc
        [Wheat].Stem.Wt
    Report DailyReport: EventNames=[Clock].DoReport
      VariableNames:
        [Clock].Today
        [IWeather].MinT
        [IWeather].MaxT
        [IWeather].Radn
        [Wheat].Phenology.AccumulatedTT
        [Wheat].Phenology.CurrentStageName
        [Wheat].Phenology.CurrentPhaseName
        [Wheat].Phenology.PTQ
        [Wheat].Phenology.Stage
        [Wheat].DaysAfterSowing
        [Wheat].SowingData.Cultivar
        [Wheat].AboveGround.N
        [Wheat].AboveGround.NConc
        [Wheat].AboveGround.Wt
        [Wheat].Ear.N
        [Wheat].Ear.NConc
        [Wheat].Ear.Wt
        [Wheat].Ear.WtProportion
        [Wheat].Grain.N
        [Wheat].Grain.NConc
        [Wheat].Grain.Wt
        [Wheat].Leaf.CoverGreen
        [Wheat].Leaf.CoverTotal
        [Wheat].Leaf.Dead.N
        [Wheat].Leaf.Dead.NConc
        [Wheat].Leaf.Dead.Wt
        [Wheat].Leaf.DeadWtProportion
        [Wheat].Leaf.Fn
        [Wheat].Leaf.Fw
        [Wheat].Leaf.Height
        [Wheat].Leaf.LAI
        [Wheat].Leaf.Live.N
        [Wheat].Leaf.Live.NConc
        [Wheat].Leaf.Live.StorageWt
        [Wheat].Leaf.Live.StorageN
        [Wheat].Leaf.Live.StructuralN
        [Wheat].Leaf.Live.MetabolicN
        [Wheat].Leaf.Live.Wt
        [Wheat].Leaf.LiveWtProportion
        [Wheat].Leaf.Photosynthesis
        [Wheat].Leaf.N
        //[Wheat].Leaf.Canopy.TotalSpecificArea
        [Wheat].Leaf.SpecificAreaCanopy
        [Wheat].Leaf.StemNumberPerPlant
        [Wheat].Leaf.StemPopulation
        [Wheat].Leaf.Wt
        [Wheat].Phenology.CurrentStageName
        [Wheat].Phenology.HaunStage
        [Wheat].Phenology.Zadok.Stage
        [Wheat].Root.Wt
        [Wheat].Spike.N
        [Wheat].Spike.NConc
        [Wheat].Spike.Live.StorageWt
        [Wheat].Spike.Wt
        [Wheat].Stem.N
        [Wheat].Stem.NConc
        [Wheat].Stem.Live.StorageWt
        [Wheat].Stem.Wt
        [Wheat].Stem.Live.StorageWt
        [Wheat].Stem.Live.StructuralWt
        [Wheat].Stem.DMDemand.Storage
        [Wheat].Stem.DMDemand.Structural
        [Wheat].Stem.DMDemand.Total
        [Wheat].Stem.WtProportion
        ([Wheat].Leaf.Transpiration + [ISoilWater].Es + [MicroClimate].PrecipitationInterception)
        sum([Soil].NO3.kgha)
        sum([Soil].Water.MM)
        [Soil].Water.Volumetric
    Report MaxLeafSizeReport: EventNames=[OutputMaxLeafSize].Script.ReportLeafSize
      VariableNames:
        [OutputMaxLeafSize].Script.LeafSize
        [OutputMaxLeafSize].Script.LeafPosition
        [OutputMaxLeafSize].Script.MaxLeafSize
    Manager Harvesting
```csharp
using APSIM.Core;
using Models.Soils.Nutrients;
using System;
using Models.Core;
using System.Collections.Generic;
using System.Text;
using Models.Soils;
using Models.PMF;
using Models;
using System.Xml.Serialization;
using APSIM.Shared.Utilities;
using Models.PMF.Phen;

namespace Models
{
    [Serializable] 
    public class Script : Model, IStructureDependency
    {
        [Link] private Plant Wheat;
        [Link] private Simulation sim;
        [Link] private Clock clock;
        [Link(Type = LinkType.Path, Path = "[Wheat].Phenology")]
        private Phenology phenology;
        public IStructure Structure { private get; set; }


        

        [EventSubscribe("DoManagement")]
        private void OnDoManagement(object sender, EventArgs e)
        {
            if (phenology.CurrentPhase.Name == "GrainRipening")
            {
                Wheat.Harvest();
                Wheat.EndCrop();
                Structure.Set("Clock.EndDate", clock.Today, relativeTo: sim);  
            }
        }

        [EventSubscribe("EndOfDay")]
        private void OnEndOfDay(object sender, EventArgs e)
        {
            if ((clock.Today.Equals(clock.EndDate))&&(Wheat.IsAlive))
            {
                Wheat.Harvest();
                Wheat.EndCrop();
                Structure.Set("Clock.EndDate", clock.Today, relativeTo: sim);  
            }
        }

    }
}
```
    Report NDVIDailyReport: EventNames=[Clock].DoReport
      VariableNames:
        [Simulation].Name
        [Clock].Today
        [Spectral].NDVI
        [Wheat].SowingData.Cultivar
    Manager OutputMaxLeafSize
```csharp
using APSIM.Core;
using Models.Core.Run;
using Newtonsoft.Json;
using APSIM.Shared.Utilities;
using Models.Soils.Arbitrator;
using Models.PMF.Organs;
using Models.PMF;
using Models.Interfaces;
using Models.Core;
using System.Xml.Serialization;
using System.Collections.Generic;
using System;
using Models.PMF.Struct;
using Models.Soils;

namespace Models
{
    [Serializable] 
    public class Script : Model, IStructureDependency
    {
        public  event EventHandler ReportLeafSize;
        [Link] private Zone zone;
        [Link] private Clock clock;
        public IStructure Structure { private get; set; }
        
        [JsonIgnore] public int NextLeafPosition { get; set; }
        [JsonIgnore] public int LeafPosition { get; set; }
        [JsonIgnore] public double MaxLeafSize { get; set; }
        [JsonIgnore] public double LeafSize { get; set; }
        [JsonIgnore] public int daysForLeaf { get; set; }
        [JsonIgnore] public double sumLeafSize { get; set; }

        [EventSubscribe("[Wheat].Sowing")]
        private void OnSow(object sender, EventArgs e)
        {
            LeafPosition = 0;
            NextLeafPosition = 0;
            daysForLeaf = 0;
            sumLeafSize = 0;
        }
        
        [EventSubscribe("DoReportCalculations")]
        private void DoReportCalculations(object sender, EventArgs e)
        {
            double haunStage = (double)Structure.Get("Wheat.Phenology.HaunStage.Value()", relativeTo: zone);
            double maxLeafSize = (double)Structure.Get("Wheat.Leaf.MaximumSize.Value()", relativeTo: zone);
            double leafSizeToday = (double)Structure.Get("Wheat.Leaf.Size.Value()", relativeTo: zone);
            
            daysForLeaf += 1;
            sumLeafSize += leafSizeToday;
            
            if (haunStage > NextLeafPosition) 
            {
                LeafPosition = (int)haunStage;
                NextLeafPosition = LeafPosition+1;
                MaxLeafSize = maxLeafSize;
                LeafSize = sumLeafSize/daysForLeaf;
                if (ReportLeafSize != null)
                    ReportLeafSize.Invoke(this, new EventArgs());
                daysForLeaf = 0;
                sumLeafSize = 0;
            }
        }
    }
}
```
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