Simulations: Area=0
  DataStore
    Input
      FileNames=[C:\Users\hol353\ApsimX\Tests\Wheat\APS6Timeseries.txt, C:\Users\hol353\ApsimX\Tests\Wheat\APS14TimeSeries.txt, C:\Users\hol353\ApsimX\Tests\Wheat\APS26TimeSeries.txt]
    PredictedObserved: PredictedTableName=Report; ObservedTableName=Input; FieldNameUsedForMatch=Wheat.Zadok.Stage
  Experiment APS26
    Factors
      Factor NRate: Paths=[ApplyFertiliser].Script.Amount
        FactorValue 0
        FactorValue 40
        FactorValue 80
        FactorValue 160
      Factor Water: Paths=[IrrigationSchedule]
        FactorValue Wet
          Operations IrrigationSchedule
            1995-05-31  Irrigation.Apply(amount:31);
            1995-06-01  Irrigation.Apply(amount:13);
            1995-06-02  Irrigation.Apply(amount:26);
            1995-06-05  Irrigation.Apply(amount:26);
            1995-06-06  Irrigation.Apply(amount:26);
            1995-06-07  Irrigation.Apply(amount:26);
            1995-06-08  Irrigation.Apply(amount:26);
            1995-06-15  Wheat.Sow(population:120, cultivar:"GattonHartog", depth:40, rowSpacing:250);
            1995-07-05  Irrigation.Apply(amount:26);
            1995-07-21  Irrigation.Apply(amount:14);
            1995-08-01  Irrigation.Apply(amount:28);
            1995-08-11  Irrigation.Apply(amount:30);
            1995-08-25  Irrigation.Apply(amount:15);
            1995-08-31  Irrigation.Apply(amount:14);
            1995-09-04  Irrigation.Apply(amount:15);
            1995-09-15  Irrigation.Apply(amount:25);
            1995-09-22  Irrigation.Apply(amount:20);
            1995-10-02  Irrigation.Apply(amount:11);
        FactorValue Dry
          Operations IrrigationSchedule
            1995-06-15  Wheat.Sow(population:120, cultivar:"GattonHartog", depth:40, rowSpacing:250);
    Simulation APS26NRate160WaterWet: Area=0
      Clock: StartDate=1995-06-13; EndDate=1995-10-31
      Summary summaryfile
      WeatherFile met: FileName=APS26.met; MaxT=0; MinT=0; Rain=0; Radn=0; vp=0; CO2=350
      Zone paddock: Area=1
        Report: AutoCreateCSV=false
          Variables:
            [Clock].Today
            [Wheat].Zadok.Stage
            [Wheat].Phenology.CurrentStageName
            [Wheat].AboveGround.Wt
            [Wheat].AboveGround.N
            [Wheat].Grain.Yield
            [Wheat].Grain.Protein
            [Wheat].Grain.Size
            [Wheat].Grain.GrainNo
            [Wheat].Grain.Wt
            [Wheat].Grain.N
            [Wheat].Leaf.LAI
            [Wheat].Leaf.Live.Wt
            [Wheat].Leaf.Live.N
            [Wheat].Head.Wt
            [Wheat].Head.N
            [Wheat].Stem.Live.Wt
            [Wheat].Stem.Live.N
            [Wheat].Root.RootDepth
            [Wheat].EP
            [Wheat].SWStress.Photo
            [Wheat].SWStress.Expansion
            [Wheat].NStress.Photo
            [Wheat].NStress.Expansion
            [Wheat].Total.Wt
          Events:
            [Clock].EndOfDay
        Irrigation
        Fertiliser
          Definitions:
            Name   FractionNO3  FractionNH4  FractionUrea
            UreaN  0            0            1
            NO3N   1            0            0
        Manager ApplyFertiliser
          FertDayOfYear = 186
          Amount = 160
```csharp
using System;
using Models.Core;
using Models.PMF;
namespace Models
{
	[Serializable]
	public class Script : Model
	{
		[Link] Clock Clock;
		[Link] Fertiliser Fertiliser;
		[Link] Summary Summary;
		
		[Description("Day of year fertiliser is to be applied")]
		public int FertDayOfYear { get; set;}

		[Description("Amount of fertiliser to be applied")]
		public double Amount { get; set;}

		[EventSubscribe("StartOfDay")]
		private void OnStartOfDay(object sender, EventArgs e)
		{
			if (Clock.Today.DayOfYear == FertDayOfYear)
			{
				Fertiliser.Apply(Amount: Amount, Type: Fertiliser.Types.NO3N);
			}
		
		}
		
	}
}
```
        Soil APS26Field: SoilType=APS26Soil; LocalName=APS26Site; Site=APS26Site; NearestTown=Unknown; Region=Lawes; NaturalVegetation=Unknown; Latitude=0; Longitude=0
          Water
            Thickness  BD    AirDry  LL15  DUL   SAT
            150        1.38  0.1     0.2   0.38  0.44
            150        1.38  0.1     0.2   0.38  0.44
            150        1.38  0.1     0.2   0.38  0.44
            150        1.38  0.1     0.2   0.38  0.44
            300        1.46  0.1     0.21  0.38  0.43
            300        1.51  0.1     0.19  0.4   0.42
            300        1.49  0.1     0.14  0.38  0.43
            300        1.47  0.1     0.14  0.38  0.43
            SoilCrop Wheat: LL=[0.2, 0.2, 0.2, 0.2, 0.21, 0.19, 0.14, 0.14]; KL=[0.06, 0.06, 0.06, 0.06, 0.06, 0.06, 0.06, 0.06]; XF=[1, 1, 1, 1, 1, 1, 1, 1]
          SoilWater: min_crit_temp=5; max_crit_temp=35; max_albedo=0.23; A_to_evap_fact=0.44; canopy_eos_coef=1.7; sw_top_crit=0.9; sumes1_max=100; sumes2_max=25; solute_flow_eff=[1]; solute_flux_eff=[1]; gravity_gradient=2E-05; specific_bd=2.65; hydrol_effective_depth=450; immobile_solutes=[nh4]; canopy_fact=[1, 1, 0, 0]; canopy_fact_height=[0, 600, 1800, 30000]; canopy_fact_default=0.5; act_evap_method=ritchie; irrigation_will_runoff=false; irrigation_layer=1; SummerCona=3.5; SummerU=6; SummerDate=1-Nov; WinterCona=3.5; WinterU=6; WinterDate=1-Apr; DiffusConst=88; DiffusSlope=35.4; Salb=0.13; slope=0; discharge_width=0; catchment_area=0; max_pond=0; CN2Bare=60; CNRed=20; CNCov=0.8
            mobile_solutes  Thickness  SWCON  KLAT
            no3             150        0.3    0
            urea            150        0.3    0
            cl              150        0.3    0
            br              150        0.3    0
            org_n           300        0.3    0
            org_c_pool1     300        0.3    0
            org_c_pool2     300        0.3    0
            org_c_pool3     300        0.3    0
          SoilNitrogen: fom_type=[default, manure, mucuna, lablab, shemp, stable]; fract_carb=[0.2, 0.3, 0.54, 0.57, 0.45, 0]; fract_cell=[0.7, 0.3, 0.37, 0.37, 0.47, 0.1]; fract_lign=[0.1, 0.4, 0.09, 0.06, 0.08, 0.9]
          SoilOrganicMatter: RootCN=40; RootWt=500; SoilCN=14.5; EnrACoeff=1; EnrBCoeff=1; OCUnits=Total
            Thickness  OC    FBiom  FInert
            150        2.2   0.03   0.4
            150        1.6   0.02   0.6
            150        1.35  0.01   0.7
            150        0.95  0.01   0.5
            300        1     0.01   0.9
            300        0.8   0.01   0.9
            300        0.45  0.01   0.9
            300        0.45  0.01   0.9
          Analysis: Thickness=[150, 150, 150, 150, 300, 300, 300, 300]; PH=[7.5, 8, 8, 8, 8, 8, 8, 8]; PHUnits=Water; BoronUnits=HotWater
          Sample Initial Water: Thickness=[150, 150, 150, 150, 300, 300, 300, 300]; SW=[0.31, 0.36, 0.37, 0.37, 0.35, 0.34, 0.34, 0.28]; NO3Units=ppm; NH4Units=ppm; SWUnits=Volumetric; OCUnits=Total; PHUnits=Water
          Sample Initial Nitrogen: NO3Units=ppm; NH4Units=ppm; SWUnits=Volumetric; OCUnits=Total; PHUnits=Water
            Thickness  NO3  NH4
            150        1.5  1.3
            150        1.8  1
            150        1.5  1
            150        1.5  0.8
            300        0.4  0.8
            300        0.2  0.5
            300        0.4  0.5
            300        0.3  0.5
        SurfaceOrganicMatter: crit_residue_wt=2000; opt_temp=20; cum_eos_max=20; cnrf_coeff=0.277; cnrf_optcn=25; c_fract=0.4; leach_rain_tot=25; min_rain_to_leach=10; crit_min_surfom_orgC=0.004; default_cpr=0; default_standing_fraction=0; standing_extinct_coeff=0.5; fractionFaecesAdded=0.5; PoolName=wheat_stubble; type=Wheat; mass=0; standing_fraction=0.0; cpr=0; cnr=80
          ResidueTypes:
            Name         fom_type       fraction_C  po4ppm  nh4ppm  no3ppm  specific_area  cf_contrib  pot_decomp_rate  fr_c             fr_n             fr_p
            ResidueType  wheat          0.4         0       0       0       0.0005         1           0.1              [0.2, 0.7, 0.1]  [0.2, 0.7, 0.1]  [0.2, 0.7, 0.1]
            ResidueType  lucerne        0.4         0       0       0       0.0002         1           0.1              [0.2, 0.7, 0.1]  [0.2, 0.7, 0.1]  [0.2, 0.7, 0.1]
            ResidueType  barley         0.4         0       0       0       0.0005         1           0.1              [0.2, 0.7, 0.1]  [0.2, 0.7, 0.1]  [0.2, 0.7, 0.1]
            ResidueType  tithonia       0.4         0       0       0       0.0005         1           0.1              [0.2, 0.7, 0.1]  [0.2, 0.7, 0.1]  [0.2, 0.7, 0.1]
            ResidueType  bambatsi       0.4         0       0       0       0.0005         1           0.1              [0.2, 0.7, 0.1]  [0.2, 0.7, 0.1]  [0.2, 0.7, 0.1]
            ResidueType  barley         0.4         0       0       0       0.0005         1           0.1              [0.2, 0.7, 0.1]  [0.2, 0.7, 0.1]  [0.2, 0.7, 0.1]
            ResidueType  broccoli       0.4         0       0       0       0.0004         1           0.1              [0.2, 0.7, 0.1]  [0.2, 0.7, 0.1]  [0.2, 0.7, 0.1]
            ResidueType  butterflypea   0.4         0       0       0       0.0004         1           0.1              [0.2, 0.7, 0.1]  [0.2, 0.7, 0.1]  [0.2, 0.7, 0.1]
            ResidueType  camaldulensis  0.4         0       0       0       0.0002         1           0.1              [0.2, 0.7, 0.1]  [0.2, 0.7, 0.1]  [0.2, 0.7, 0.1]
            ResidueType  canola         0.4         0       0       0       0.0002         1           0.1              [0.2, 0.7, 0.1]  [0.2, 0.7, 0.1]  [0.2, 0.7, 0.1]
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        Plant15 Wheat: AutoHarvest=false; CropType=Wheat; EOCropFactor=1.5; NSupplyPreference=active; DoRetranslocationBeforeNDemand=false
          Population1 Population: Density=120; LeafNumberCritical=10; TTEmergenceLimit=300; DaysToGerminationLimit=40; SWStressPhenoLimit=25; SWStressPhotoLimit=99; SWStressPhotoRate=0
            PhaseBasedSwitch CropFailureStressPeriod: Start=Emergence; End=Flowering
            SoilTemperatureWeightedFunction DeathHighTemperatureDuringEmergence
              XYPairs: X=[55, 60]; Y=[0, 1]
          Phenology
            GerminatingPhase SowingToGermination: Start=Sowing; End=Germination
            EmergingPhase15 GerminationToEmergence: Start=Germination; End=Emergence; ShootLag=40; ShootRate=1.5
              LinearInterpolationFunction ThermalTime: XProperty=[VernalisationCW].CrownTemperature
                XYPairs: X=[0, 26, 34]; Y=[0, 26, 0]
            GenericPhase EmergenceToEndOfJuvenile: Start=Emergence; End=EndOfJuvenile
              Constant Target: Value=1
              LinearInterpolationFunction ThermalTime: XProperty=[VernalisationCW].CrownTemperature
                XYPairs: X=[0, 26, 34]; Y=[0, 26, 0]
              MultiplyFunction Stress
                MinimumFunction
                  VariableReference: VariableName=[VernalisationCW].VernEff
                  VariableReference Variable1: VariableName=[VernalisationCW].PhotopEff
                MinimumFunction Stresses
                  VariableReference Variable2: VariableName=[SWStress].Pheno
                  VariableReference Variable3: VariableName=[NStress].Pheno
                  VariableReference Variable4: VariableName=[PStress].Pheno
            GenericPhase EndOfJuvenileToFloralInitiation: Start=EndOfJuvenile; End=FloralInitiation
              Constant Target: Value=400
              LinearInterpolationFunction ThermalTime: XProperty=[VernalisationCW].CrownTemperature
                XYPairs: X=[0, 26, 34]; Y=[0, 26, 0]
              MultiplyFunction Stress: same as APS26.APS26NRate160WaterWet.paddock.Wheat.Phenology.EmergenceToEndOfJuvenile.Stress
            GenericPhase FloralInitiationToFlowering: Start=FloralInitiation; End=Flowering
              Constant Target: Value=555
              LinearInterpolationFunction ThermalTime: XProperty=[VernalisationCW].CrownTemperature
                XYPairs: X=[0, 26, 34]; Y=[0, 26, 0]
              MultiplyFunction Stress: same as APS26.APS26NRate160WaterWet.paddock.Wheat.Phenology.EmergenceToEndOfJuvenile.Stress
            GenericPhase FloweringToStartGrainFill: Start=Flowering; End=StartGrainFill
              Constant Target: Value=120
              LinearInterpolationFunction ThermalTime: XProperty=[VernalisationCW].CrownTemperature
                XYPairs: X=[0, 26, 34]; Y=[0, 26, 0]
            GenericPhase StartGrainFillToEndGrainFill: Start=StartGrainFill; End=EndGrainFill
              Constant Target: Value=545
              LinearInterpolationFunction ThermalTime: XProperty=[VernalisationCW].CrownTemperature
                XYPairs: X=[0, 26, 34]; Y=[0, 26, 0]
            GenericPhase EndGrainFillToMaturity: Start=EndGrainFill; End=Maturity
              Constant Target: Value=35
              LinearInterpolationFunction ThermalTime: XProperty=[VernalisationCW].CrownTemperature
                XYPairs: X=[0, 26, 34]; Y=[0, 26, 0]
            GenericPhase MaturityToHarvestRipe: Start=Maturity; End=HarvestRipe
              Constant Target: Value=1
              LinearInterpolationFunction ThermalTime: XProperty=[VernalisationCW].CrownTemperature
                XYPairs: X=[0, 26, 34]; Y=[0, 26, 0]
            GenericPhase ReadyForHarvesting: Start=HarvestRipe; End=EndCrop
              Constant Target: Value=1000
              LinearInterpolationFunction ThermalTime: XProperty=[VernalisationCW].CrownTemperature
                XYPairs: X=[0, 26, 34]; Y=[0, 26, 0]
            GenericPhase EndCrop: Start=EndCrop; End=Unused
              Constant Target: Value=1000
              LinearInterpolationFunction ThermalTime: XProperty=[VernalisationCW].CrownTemperature
                XYPairs: X=[0, 26, 34]; Y=[0, 26, 0]
            VernalisationCW Vernalisation: VernSens=2.5; PhotopSens=3.5; StartStageForEffects=Germination; EndStageForEffects=FloralInitiation; StartStageForCumulativeVD=Germination; EndStageForCumulativeVD=FloralInitiation
              AirTemperatureFunction VDModel
                XYPairs: X=[0, 2, 8, 15]; Y=[0, 1, 0.5, 0]
              PhotoperiodFunction Photoperiod: Twilight=-6
            LinearInterpolationFunction RewindDueToBiomassRemoved: XProperty=[Phenology].FractionBiomassRemoved
              XYPairs: X=[0, 0.1, 0.4, 0.5, 1]; Y=[0, 0.08, 0.4, 0.5, 1]
            PhaseBasedSwitch AboveGroundPeriod: Start=Emergence; End=EndCrop
          Root1 Root: NConcentrationCritical=0.02; NConcentrationMinimum=0.01; NConcentrationMaximum=0.02; InitialRootDepth=100; DieBackFraction=0; ll=[0.2, 0.2, 0.2, 0.2, 0.21, 0.19, 0.14, 0.14]; kl=[0.06, 0.06, 0.06, 0.06, 0.06, 0.06, 0.06, 0.06]; xf=[1, 1, 1, 1, 1, 1, 1, 1]; ModifyKL=false; ClA=4; ClB=-0.005; ESPA=10; ESPB=-0.15; ECA=3; ECB=-1.3; NDeficitUptakeFraction=0.0001; NSenescenceConcentration=0.005; NSupplyPreference=active; SenescenceDetachmentFraction=1; InitialWt=0.01; InitialNConcentration=0.02; SpecificRootLength=105000
            Biomass Live
            Biomass Dead
            LinearInterpolationFunction RootAdvanceFactorTemp: XProperty=[Environment].MeanT
              XYPairs: X=[0, 25, 35]; Y=[0, 1, 0]
            LinearInterpolationFunction RootAdvanceFactorWaterStress: XProperty=[SWStress].Photo
              XYPairs: X=[0, 1]; Y=[1, 1]
            LinearInterpolationFunction SWFactorRootDepth: XProperty=[Root1].FASW
              XYPairs: X=[0, 0.25]; Y=[0, 1]
            LinearInterpolationFunction SWFactorRootLength: XProperty=[Root1].FASWLayered
              XYPairs: X=[0, 0.25]; Y=[0, 1]
            StageBasedInterpolation RootDepthRate: Codes=[0, 5, 30, 30, 30, 30, 0, 0, 0, 0, 0]; Proportional=false
              Stages=[Sowing, Germination, Emergence, EndOfJuvenile, FloralInitiation, Flowering, StartGrainFill, EndGrainFill, Maturity, HarvestRipe, EndCrop]
            LinearInterpolationFunction RelativeRootRate: XProperty=[Root1].RootLengthDensity
              XYPairs: X=[0, 0.0001, 0.0003]; Y=[0.02, 0.1, 1]
            NUptake3 NUptakeFunction: kno3=0.02; knh4=0; no3ppm_min=0; nh4ppm_min=0; total_n_uptake_max=0.6
              PhaseBasedSwitch NStressPeriod: Start=EndOfJuvenile(0.3); End=EndCrop
            Constant GrowthStructuralFractionStage: Value=1
            LinearInterpolationFunction DMSenescenceFraction: XProperty=[Leaf1].FractionCanopySenescing
              XYPairs: X=[0, 1]; Y=[0.005, 0.005]
            Live
            Dead
          GenericArbitratorXY Arbitrator1: DMSupply=0; PartitionOrgans=[Root, Pod, Grain, Leaf, Stem]; PartitionRules=[magic, demand, demand, frac, remainder]
            LinearInterpolationFunction FracDMRemainingInLeaf: XProperty=[Phenology].Stage
              XYPairs: X=[1, 2, 3, 4, 4.9, 5, 5.4, 6, 6.9, 7, 8, 9, 10, 11]; Y=[0, 0, 0.6, 0.6, 0.6, 0.42, 0, 0, 0, 0, 0, 0, 0, 0]
            LinearInterpolationFunction RatioRootShoot: XProperty=[Phenology].Stage
              XYPairs: X=[1, 2, 3, 4, 4.9, 5, 5.4, 6, 6.9, 7, 8, 9, 10, 11]; Y=[0, 0, 1, 1, 0.3, 0.3, 0.3, 0.08, 0.01, 0, 0, 0, 0, 0]
          Leaf1 Leaf: dlt_dm_pot_rue=0; dlt_n_senesced_retrans=5.86292e-07; dlt_n_senesced_trans=0; dlt_height=0; dlt_width=0; width=0; NodeNumberCorrection=2; SLAMin=18000; FractionLeafSenescenceRate=0.035; NodeSenescenceRate=60; NFactLeafSenescenceRate=0; MinTPLA=5; NDeficitUptakeFraction=0.0001; InitialWt=0.003; InitialNConcentration=0.063; InitialTPLA=200; InitialLeafNumber=2; LAISenLight=7; SenLightSlope=0.002; SenRateWater=0.1; NSenescenceConcentration=0.005; SenescenceDetachmentFraction=0
            Biomass Live
            Biomass Dead
            RUEModel1 Photosynthesis
              StageBasedInterpolation RUE: Codes=[0, 0, 1.24, 1.24, 1.24, 1.24, 1.24, 1.24, 0, 0, 0]; Proportional=false
                Stages=[Sowing, Germination, Emergence, EndOfJuvenile, FloralInitiation, Flowering, StartGrainFill, EndGrainFill, Maturity, HarvestRipe, EndCrop]
              RUECO2Function RUEModifier: PhotosyntheticPathway=C3
            StageBasedInterpolation TE: Proportional=false
              Stages=[Sowing, Germination, Emergence, EndOfJuvenile, FloralInitiation, Flowering, StartGrainFill, EndGrainFill, Maturity, HarvestRipe, EndCrop]
              Codes=[0, 0, 0.006, 0.006, 0.006, 0.006, 0.006, 0.006, 0.0025, 0, 0]
            LinearInterpolationFunction TEModifier: XProperty=[WeatherFile].CO2
              XYPairs: X=[350, 700, 1000]; Y=[1, 1.37, 1.69]
            LinearInterpolationFunction NConcCriticalModifier: XProperty=[WeatherFile].CO2
              XYPairs: X=[350, 700, 1000]; Y=[1, 0.93, 0.9]
            PhaseBasedSwitch NodeFormationPeriod: Start=Emergence; End=HarvestRipe
            LinearInterpolationFunction NodeAppearanceRate: XProperty=[Leaf1].NodeNo
              XYPairs: X=[0, 20]; Y=[95, 95]
            LinearInterpolationFunction LeavesPerNode: XProperty=[Leaf1].NodeNo
              XYPairs: X=[0, 2.5, 6]; Y=[1, 1, 6]
            LinearInterpolationFunction LeafSize: XProperty=[Leaf1].NodeNumberNow
              XYPairs: X=[1, 5, 8, 10]; Y=[1400, 3700, 4800, 5600]
            Constant GrowthStructuralFractionStage: Value=1
            LinearInterpolationFunction SLAMax: XProperty=[Leaf1].LAI
              XYPairs: X=[0, 5]; Y=[27000, 22000]
            LinearInterpolationFunction LeafNumberFraction: XProperty=[Leaf1].LAIRatio
              XYPairs: X=[0, 0.1, 0.8, 1]; Y=[0, 1, 1, 1]
            PhaseBasedSwitch LeafSenescencePeriod: Start=EndOfJuvenile(0.4); End=EndCrop
            LinearInterpolationFunction LeafSenescenceFrost: XProperty=[WeatherFile].MinT
              XYPairs: X=[-15, -5]; Y=[0, 0]
            LinearInterpolationFunction DMSenescenceFraction: XProperty=[Leaf1].FractionCanopySenescing
              XYPairs: X=[0, 1]; Y=[0, 1]
            LinearInterpolationFunction ExtinctionCoefficient: XProperty=[PlantSpatial1].RowSpacing
              XYPairs: X=[200, 350, 1000]; Y=[0.5, 0.5, 0.5]
            LinearInterpolationFunction ExtinctionCoefficientDead: XProperty=[PlantSpatial1].RowSpacing
              XYPairs: X=[200, 350, 1000]; Y=[0.3, 0.3, 0.3]
            StageBasedInterpolation NConcentrationMinimum: Codes=[0.025, 0.025, 0.021, 0.01, 0.005, 0.0025]; Proportional=true
              Stages=[Emergence, EndOfJuvenile, FloralInitiation, Flowering, EndGrainFill, HarvestRipe]
            StageBasedInterpolation NConcentrationMaximum: Codes=[0.07, 0.07, 0.05, 0.02, 0.01, 0.005]; Proportional=true
              Stages=[Emergence, EndOfJuvenile, FloralInitiation, Flowering, EndGrainFill, HarvestRipe]
            StageBasedInterpolation NConcentrationCritical: Codes=[0.063, 0.063, 0.042, 0.015, 0.008, 0.0035]; Proportional=true
              Stages=[Emergence, EndOfJuvenile, FloralInitiation, Flowering, EndGrainFill, HarvestRipe]
            Live
            Dead
          Stem1 Stem: dlt_n_senesced_retrans=4.34468e-05; dlt_n_senesced_trans=0; dlt_height=0; dlt_width=0; NDeficitUptakeFraction=0.0001; NSenescenceConcentration=0.0025; SenescenceDetachmentFraction=0; InitialWt=0.0016; InitialNConcentration=0.05
            Biomass Live
            Biomass Dead
            LinearInterpolationFunction RetainFraction: XProperty=[Stem1].FractionHeightRemoved
              XYPairs: X=[0, 0.1, 1]; Y=[0, 0.2, 1]
            LinearInterpolationFunction HeightFunction: XProperty=[Stem1].GreenWtPerPlant
              XYPairs: X=[0, 6]; Y=[0, 1500]
            LinearInterpolationFunction GrowthStructuralFractionStage: XProperty=[Phenology].Stage
              XYPairs: X=[7, 7.01]; Y=[0.65, 0]
            LinearInterpolationFunction DMSenescenceFraction: XProperty=[Leaf1].FractionCanopySenescing
              XYPairs: X=[0, 1]; Y=[0, 0]
            StageBasedInterpolation NConcentrationMinimum: Codes=[0.025, 0.025, 0.004, 0.003, 0.003, 0.0025]; Proportional=true
              Stages=[Emergence, EndOfJuvenile, FloralInitiation, Flowering, EndGrainFill, HarvestRipe]
            StageBasedInterpolation NConcentrationMaximum: Codes=[0.07, 0.07, 0.04, 0.015, 0.015, 0.015]; Proportional=true
              Stages=[Emergence, EndOfJuvenile, FloralInitiation, Flowering, EndGrainFill, HarvestRipe]
            StageBasedInterpolation NConcentrationCritical: Codes=[0.05, 0.05, 0.02, 0.01, 0.005, 0.0035]; Proportional=true
              Stages=[Emergence, EndOfJuvenile, FloralInitiation, Flowering, EndGrainFill, HarvestRipe]
            Live
            Dead
          Pod: InitialWt=0; InitialNConcentration=0.063; NDeficitUptakeFraction=0.0001; NSenescenceConcentration=0.007; SenescenceDetachmentFraction=0
            Biomass Live
            Biomass Dead
            RUECO2Function Fco2: PhotosyntheticPathway=C3
            StageBasedInterpolation TE: Proportional=false
              Stages=[Sowing, Germination, Emergence, EndOfJuvenile, FloralInitiation, Flowering, StartGrainFill, EndGrainFill, Maturity, HarvestRipe, EndCrop]
              Codes=[0, 0, 0.006, 0.006, 0.006, 0.006, 0.006, 0.006, 0.0025, 0, 0]
            LinearInterpolationFunction FractionGrainInPod: XProperty=[Phenology].Stage
              XYPairs: X=[1, 2, 3, 4, 4.9, 5, 5.4, 6, 6.9, 7, 8, 9, 10, 11]; Y=[0, 0, 0, 0, 0, 0, 0.33, 0.33, 0.33, 0, 0, 0, 0, 0]
            Constant GrowthStructuralFractionStage: Value=1
            LinearInterpolationFunction DMSenescenceFraction: XProperty=[Leaf1].FractionCanopySenescing
              XYPairs: X=[0, 1]; Y=[0, 0]
            StageBasedInterpolation NConcentrationMinimum: Codes=[0.025, 0.025, 0.004, 0.003, 0.003, 0.0025]; Proportional=true
              Stages=[Emergence, EndOfJuvenile, FloralInitiation, Flowering, EndGrainFill, HarvestRipe]
            StageBasedInterpolation NConcentrationMaximum: Codes=[0.07, 0.07, 0.04, 0.015, 0.015, 0.015]; Proportional=true
              Stages=[Emergence, EndOfJuvenile, FloralInitiation, Flowering, EndGrainFill, HarvestRipe]
            StageBasedInterpolation NConcentrationCritical: Codes=[0.05, 0.05, 0.02, 0.01, 0.005, 0.0035]; Proportional=true
              Stages=[Emergence, EndOfJuvenile, FloralInitiation, Flowering, EndGrainFill, HarvestRipe]
            Live
            Dead
          Grain: GrainsPerGramStem=25; PotentialGrainFillingRate=0.002; PotentialGrainGrowthRate=0.001; MinimumGrainNFillingRate=1.5E-05; GrainMaxDailyNConc=0.03; PotentialGrainNFillingRate=5.5E-05; MaxGrainSize=0.041; NSenescenceConcentration=0.014; WaterContentFraction=0.125
            zero: dlt_dm_pot_rue, dlt_n_senesced_retrans, dlt_n_senesced_trans, dlt_height, dlt_width, InitialWt, InitialNConcentration, CriticalGrainFillingRate, SenescenceDetachmentFraction
            Biomass Live
            Biomass Dead
            PhaseBasedSwitch GrainGrowthPeriod: Start=Flowering; End=EndGrainFill
            PhaseBasedSwitch ReproductivePeriod: Start=Flowering; End=EndGrainFill
            LinearInterpolationFunction RelativeGrainFill: XProperty=[Environment].MeanT
              XYPairs: X=[0, 26, 35]; Y=[0, 1, 1]
            LinearInterpolationFunction RelativeGrainNFill: XProperty=[Environment].MeanT
              XYPairs: X=[0, 25]; Y=[0, 1]
            Constant GrowthStructuralFractionStage: Value=1
            LinearInterpolationFunction DMSenescenceFraction: XProperty=[Leaf1].FractionCanopySenescing
              XYPairs: X=[0, 1]; Y=[0, 0]
            StageBasedInterpolation NConcentrationMinimum: Codes=[0, 0, 0, 0, 0.014, 0.014]; Proportional=true
              Stages=[Emergence, EndOfJuvenile, FloralInitiation, Flowering, EndGrainFill, HarvestRipe]
            StageBasedInterpolation NConcentrationMaximum: Codes=[0, 0, 0, 0, 0.03, 0.03]; Proportional=true
              Stages=[Emergence, EndOfJuvenile, FloralInitiation, Flowering, EndGrainFill, HarvestRipe]
            StageBasedInterpolation NConcentrationCritical: Codes=[0, 0, 0, 0, 0.03, 0.03]; Proportional=true
              Stages=[Emergence, EndOfJuvenile, FloralInitiation, Flowering, EndGrainFill, HarvestRipe]
            Live
            Dead
          NStress: N_fact_photo=1.5; N_fact_pheno=100; N_fact_expansion=1; N_fact_grain=1.5
          SWStress
            LinearInterpolationFunction ExpansionFactor: XProperty=[Plant15].SWSupplyDemandRatio
              XYPairs: X=[0.1, 1.1]; Y=[0, 1]
            LinearInterpolationFunction PhenoFactor: XProperty=[Root1].SWAvailRatio
              XYPairs: X=[0, 0.16]; Y=[1, 1]
            LinearInterpolationFunction FixationFactor: XProperty=[Root1].SWAvailRatio
              XYPairs: X=[0, 0.5, 0.95, 1]; Y=[1, 1, 1, 1]
            LinearInterpolationFunction OxygenDeficitPhotoFactor: XProperty=[Root1].WetRootFraction
              XYPairs: X=[0, 0.8, 1]; Y=[1, 1, 1]
            LinearInterpolationFunction PhenoFlowerFactor: XProperty=[Root1].SWAvailRatio
              XYPairs: X=[0.2, 0.5, 1]; Y=[1, 1, 1]
            LinearInterpolationFunction PhenoGrainFillingFactor: XProperty=[Root1].SWAvailRatio
              XYPairs: X=[0.2, 0.5, 1]; Y=[1, 1, 1]
          LinearInterpolationFunction TempStress: XProperty=[Environment].MeanT
            XYPairs: X=[0, 10, 25, 35]; Y=[0, 1, 1, 0]
          RadiationPartitioning: FractIncidentRadn=1; RadiationPartitioningOrder=[Pod, Grain, Leaf]
          StageBasedInterpolation NFixRate: Codes=[0, 0, 0, 0, 0, 0, 0, 0, 0, 0, 0]; Proportional=false
            Stages=[Sowing, Germination, Emergence, EndOfJuvenile, FloralInitiation, Flowering, StartGrainFill, EndGrainFill, Maturity, HarvestRipe, EndCrop]
          CompositeBiomass AboveGroundLive: Propertys=[[Leaf1].Live, [Stem1].Live, [Pod].Live, [Grain].Live]
          CompositeBiomass AboveGroundDead: Propertys=[[Leaf1].Dead, [Stem1].Dead, [Pod].Dead, [Grain].Dead]
          CompositeBiomass BelowGroundLive: Propertys=[[Root1].Live]
          CompositeBiomass BelowGroundDead: Propertys=[[Root1].Dead]
          CompositeBiomass TotalLive
            Propertys=[[Leaf1].Live, [Stem1].Live, [Pod].Live, [Grain].Live, [Root1].Live]
          CompositeBiomass TotalDead
            Propertys=[[Leaf1].Dead, [Stem1].Dead, [Pod].Dead, [Grain].Dead, [Root1].Dead]
          CompositeBiomass AboveGround: Propertys=[[AboveGroundLive], [AboveGroundDead]]
          CompositeBiomass BelowGround: Propertys=[[Root1].Live, [Root1].Dead]
          CompositeBiomass Total
            Propertys=[[AboveGroundLive], [AboveGroundDead], [BelowGroundLive], [BelowGroundDead]]
          CompositeBiomass Head: Propertys=[[Pod].Live, [Grain].Live, [Pod].Dead, [Grain].Dead]
          StageBasedInterpolation StageCode: Codes=[1, 2, 3, 4, 5, 6, 7, 8, 9, 10, 11]; Proportional=false
            Stages=[Sowing, Germination, Emergence, EndOfJuvenile, FloralInitiation, Flowering, StartGrainFill, EndGrainFill, Maturity, HarvestRipe, EndCrop]
          PlantSpatial1
          Environment: CO2=350
          PStress
          Zadok
        Operations IrrigationSchedule: same as APS26.Factors.Water.Wet.IrrigationSchedule
        MicroClimate: air_pressure=1010; soil_emissivity=0.96; sun_angle=15; soil_heat_flux_fraction=0.4; night_interception_fraction=0.5; windspeed_default=3; refheight=2; albedo=0.15; emissivity=0.96; gsmax=0.01; r50=200; a_interception=0; b_interception=1; c_interception=0; d_interception=0; soil_albedo=0.3
          ComponentData Wheat: Type=Wheat; Albedo=0.26; Emissivity=0.96; Gsmax=0.011; R50=200
        PredictedObserved: FileName=APS26TimeSeries.txt; FieldNameUsedForMatch=Wheat.Zadok.Stage
  Experiment APS6
    Factors
      Factor NRate: Paths=[ApplyFertiliser].Script.Amount
        FactorValue 0
        FactorValue 40
        FactorValue 80
        FactorValue 120
        FactorValue 160
        FactorValue 360
    Simulation APS6NRate0: Area=0
      Clock: StartDate=1992-06-14; EndDate=1992-11-17
      Summary summaryfile
      WeatherFile met: FileName=APS6.met; MaxT=0; MinT=0; Rain=0; Radn=0; vp=0; CO2=350
      Zone paddock: Area=1
        Report: same as APS26.APS26NRate160WaterWet.paddock.Report
        Irrigation
        Fertiliser
          Definitions:
            Name   FractionNO3  FractionNH4  FractionUrea
            UreaN  0            0            1
            NO3N   1            0            0
        Soil APS6Field: SoilType=APS6Soil; LocalName=APS6Site; Site=APS6Site; NearestTown=Unknown; Region=Lawes; NaturalVegetation=Unknown; Latitude=0; Longitude=0
          Water
            Thickness  BD    AirDry  LL15  DUL   SAT
            150        1.38  0.1     0.2   0.38  0.43
            150        1.34  0.1     0.2   0.38  0.43
            300        1.35  0.1     0.22  0.4   0.43
            300        1.5   0.1     0.18  0.4   0.43
            300        1.49  0.1     0.14  0.39  0.42
            300        1.46  0.1     0.2   0.38  0.4
            300        1.46  0.1     0.2   0.38  0.4
            SoilCrop Wheat: LL=[0.2, 0.2, 0.22, 0.18, 0.14, 0.25, 0.28]; KL=[0.06, 0.06, 0.06, 0.06, 0.06, 0.06, 0.06]; XF=[1, 1, 1, 1, 1, 1, 1]
          SoilWater: min_crit_temp=5; max_crit_temp=35; max_albedo=0.23; A_to_evap_fact=0.44; canopy_eos_coef=1.7; sw_top_crit=0.9; sumes1_max=100; sumes2_max=25; solute_flow_eff=[1]; solute_flux_eff=[1]; gravity_gradient=2E-05; specific_bd=2.65; hydrol_effective_depth=450; immobile_solutes=[nh4]; canopy_fact=[1, 1, 0, 0]; canopy_fact_height=[0, 600, 1800, 30000]; canopy_fact_default=0.5; act_evap_method=ritchie; irrigation_will_runoff=false; irrigation_layer=1; SummerCona=3.5; SummerU=6; SummerDate=1-Nov; WinterCona=3.5; WinterU=6; WinterDate=1-Apr; DiffusConst=88; DiffusSlope=35.4; Salb=0.13; slope=0; discharge_width=0; catchment_area=0; max_pond=0; CN2Bare=60; CNRed=20; CNCov=0.8
            Thickness  SWCON  KLAT
            150        0.3    0
            150        0.3    0
            300        0.3    0
            300        0.3    0
            300        0.3    0
            300        0.3    0
            300        0.3    0
            mobile_solutes=[no3, urea, cl, br, org_n, org_c_pool1, org_c_pool2, org_c_pool3]
          SoilNitrogen: fom_type=[default, manure, mucuna, lablab, shemp, stable]; fract_carb=[0.2, 0.3, 0.54, 0.57, 0.45, 0]; fract_cell=[0.7, 0.3, 0.37, 0.37, 0.47, 0.1]; fract_lign=[0.1, 0.4, 0.09, 0.06, 0.08, 0.9]
          SoilOrganicMatter: RootCN=0; RootWt=0; SoilCN=0; EnrACoeff=0; EnrBCoeff=0; OCUnits=Total
            Thickness  OC    FBiom  FInert
            150        2.2   0.03   0.45
            150        1.6   0.02   0.6
            300        1.15  0.01   0.78
            300        1     0.01   0.9
            300        0.8   0.01   0.99
            300        0.45  0.01   0.99
            300        0.45  0.01   0.99
          Analysis: Thickness=[150, 150, 300, 300, 300, 300, 300]; PH=[7.5, 8, 8, 8, 8, 8, 8]; PHUnits=Water; BoronUnits=HotWater
          Sample Initial Water: Thickness=[150, 150, 300, 300, 300, 300, 300]; SW=[0.326, 0.326, 0.346, 0.333, 0.315, 0.326, 0.326]; NO3Units=ppm; NH4Units=ppm; SWUnits=Volumetric; OCUnits=Total; PHUnits=Water
          Sample Initial Nitrogen: NO3Units=ppm; NH4Units=ppm; SWUnits=Volumetric; OCUnits=Total; PHUnits=Water
            Thickness  NO3   NH4
            150        1.3   1.3
            150        0.6   1
            300        0.25  1
            300        0.2   0.8
            300        0.1   0.8
            300        0.1   0.5
            300        0.1   0.5
        SurfaceOrganicMatter: crit_residue_wt=2000; opt_temp=20; cum_eos_max=20; cnrf_coeff=0.277; cnrf_optcn=25; c_fract=0.4; leach_rain_tot=25; min_rain_to_leach=10; crit_min_surfom_orgC=0.004; default_cpr=0; default_standing_fraction=0; standing_extinct_coeff=0.5; fractionFaecesAdded=0.5; PoolName=wheat_stubble; type=wheat; mass=500; standing_fraction=0.0; cnr=100
          ResidueTypes:
            Name         fom_type       fraction_C  po4ppm  nh4ppm  no3ppm  specific_area  cf_contrib  pot_decomp_rate  fr_c             fr_n             fr_p
            ResidueType  wheat          0.4         0       0       0       0.0005         1           0.1              [0.2, 0.7, 0.1]  [0.2, 0.7, 0.1]  [0.2, 0.7, 0.1]
            ResidueType  lucerne        0.4         0       0       0       0.0002         1           0.1              [0.2, 0.7, 0.1]  [0.2, 0.7, 0.1]  [0.2, 0.7, 0.1]
            ResidueType  barley         0.4         0       0       0       0.0005         1           0.1              [0.2, 0.7, 0.1]  [0.2, 0.7, 0.1]  [0.2, 0.7, 0.1]
            ResidueType  tithonia       0.4         0       0       0       0.0005         1           0.1              [0.2, 0.7, 0.1]  [0.2, 0.7, 0.1]  [0.2, 0.7, 0.1]
            ResidueType  bambatsi       0.4         0       0       0       0.0005         1           0.1              [0.2, 0.7, 0.1]  [0.2, 0.7, 0.1]  [0.2, 0.7, 0.1]
            ResidueType  barley         0.4         0       0       0       0.0005         1           0.1              [0.2, 0.7, 0.1]  [0.2, 0.7, 0.1]  [0.2, 0.7, 0.1]
            ResidueType  broccoli       0.4         0       0       0       0.0004         1           0.1              [0.2, 0.7, 0.1]  [0.2, 0.7, 0.1]  [0.2, 0.7, 0.1]
            ResidueType  butterflypea   0.4         0       0       0       0.0004         1           0.1              [0.2, 0.7, 0.1]  [0.2, 0.7, 0.1]  [0.2, 0.7, 0.1]
            ResidueType  camaldulensis  0.4         0       0       0       0.0002         1           0.1              [0.2, 0.7, 0.1]  [0.2, 0.7, 0.1]  [0.2, 0.7, 0.1]
            ResidueType  canola         0.4         0       0       0       0.0002         1           0.1              [0.2, 0.7, 0.1]  [0.2, 0.7, 0.1]  [0.2, 0.7, 0.1]
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        Plant15 Wheat: AutoHarvest=false; CropType=Wheat; EOCropFactor=1.5; NSupplyPreference=active; DoRetranslocationBeforeNDemand=false
          Population1 Population: Density=121.61; LeafNumberCritical=10; TTEmergenceLimit=300; DaysToGerminationLimit=40; SWStressPhenoLimit=25; SWStressPhotoLimit=99; SWStressPhotoRate=0
            PhaseBasedSwitch CropFailureStressPeriod: Start=Emergence; End=Flowering
            SoilTemperatureWeightedFunction DeathHighTemperatureDuringEmergence
              XYPairs: X=[55, 60]; Y=[0, 1]
          Phenology: same as APS26.APS26NRate160WaterWet.paddock.Wheat.Phenology
          Root1 Root: NConcentrationCritical=0.02; NConcentrationMinimum=0.01; NConcentrationMaximum=0.02; InitialRootDepth=100; DieBackFraction=0; ll=[0.2, 0.2, 0.22, 0.18, 0.14, 0.25, 0.28]; kl=[0.06, 0.06, 0.06, 0.06, 0.06, 0.06, 0.06]; xf=[1, 1, 1, 1, 1, 1, 1]; ModifyKL=false; ClA=4; ClB=-0.005; ESPA=10; ESPB=-0.15; ECA=3; ECB=-1.3; NDeficitUptakeFraction=0.0001; NSenescenceConcentration=0.005; NSupplyPreference=active; SenescenceDetachmentFraction=1; InitialWt=0.01; InitialNConcentration=0.02; SpecificRootLength=105000
            Biomass Live
            Biomass Dead
            LinearInterpolationFunction RootAdvanceFactorTemp: XProperty=[Environment].MeanT
              XYPairs: X=[0, 25, 35]; Y=[0, 1, 0]
            LinearInterpolationFunction RootAdvanceFactorWaterStress: XProperty=[SWStress].Photo
              XYPairs: X=[0, 1]; Y=[1, 1]
            LinearInterpolationFunction SWFactorRootDepth: XProperty=[Root1].FASW
              XYPairs: X=[0, 0.25]; Y=[0, 1]
            LinearInterpolationFunction SWFactorRootLength: XProperty=[Root1].FASWLayered
              XYPairs: X=[0, 0.25]; Y=[0, 1]
            StageBasedInterpolation RootDepthRate: Codes=[0, 5, 30, 30, 30, 30, 0, 0, 0, 0, 0]; Proportional=false
              Stages=[Sowing, Germination, Emergence, EndOfJuvenile, FloralInitiation, Flowering, StartGrainFill, EndGrainFill, Maturity, HarvestRipe, EndCrop]
            LinearInterpolationFunction RelativeRootRate: XProperty=[Root1].RootLengthDensity
              XYPairs: X=[0, 0.0001, 0.0003]; Y=[0.02, 0.1, 1]
            NUptake3 NUptakeFunction: kno3=0.02; knh4=0; no3ppm_min=0; nh4ppm_min=0; total_n_uptake_max=0.6
              PhaseBasedSwitch NStressPeriod: Start=EndOfJuvenile(0.3); End=EndCrop
            Constant GrowthStructuralFractionStage: Value=1
            LinearInterpolationFunction DMSenescenceFraction: XProperty=[Leaf1].FractionCanopySenescing
              XYPairs: X=[0, 1]; Y=[0.005, 0.005]
            Live
            Dead
          GenericArbitratorXY Arbitrator1: same as APS26.APS26NRate160WaterWet.paddock.Wheat.Arbitrator1
          Leaf1 Leaf: dlt_dm_pot_rue=0; dlt_n_senesced_retrans=3.92391e-08; dlt_n_senesced_trans=0; dlt_height=0; dlt_width=0; width=0; NodeNumberCorrection=2; SLAMin=18000; FractionLeafSenescenceRate=0.035; NodeSenescenceRate=60; NFactLeafSenescenceRate=0; MinTPLA=5; NDeficitUptakeFraction=0.0001; InitialWt=0.003; InitialNConcentration=0.063; InitialTPLA=200; InitialLeafNumber=2; LAISenLight=7; SenLightSlope=0.002; SenRateWater=0.1; NSenescenceConcentration=0.005; SenescenceDetachmentFraction=0
            Biomass Live
            Biomass Dead
            RUEModel1 Photosynthesis: same as APS26.APS26NRate160WaterWet.paddock.Wheat.Leaf.Photosynthesis
            StageBasedInterpolation TE: Proportional=false
              Stages=[Sowing, Germination, Emergence, EndOfJuvenile, FloralInitiation, Flowering, StartGrainFill, EndGrainFill, Maturity, HarvestRipe, EndCrop]
              Codes=[0, 0, 0.006, 0.006, 0.006, 0.006, 0.006, 0.006, 0.0025, 0, 0]
            LinearInterpolationFunction TEModifier: XProperty=[WeatherFile].CO2
              XYPairs: X=[350, 700, 1000]; Y=[1, 1.37, 1.69]
            LinearInterpolationFunction NConcCriticalModifier: XProperty=[WeatherFile].CO2
              XYPairs: X=[350, 700, 1000]; Y=[1, 0.93, 0.9]
            PhaseBasedSwitch NodeFormationPeriod: Start=Emergence; End=HarvestRipe
            LinearInterpolationFunction NodeAppearanceRate: XProperty=[Leaf1].NodeNo
              XYPairs: X=[0, 20]; Y=[95, 95]
            LinearInterpolationFunction LeavesPerNode: XProperty=[Leaf1].NodeNo
              XYPairs: X=[0, 2.5, 6]; Y=[1, 1, 6]
            LinearInterpolationFunction LeafSize: XProperty=[Leaf1].NodeNumberNow
              XYPairs: X=[1, 5, 8, 10]; Y=[1400, 3700, 4800, 5600]
            Constant GrowthStructuralFractionStage: Value=1
            LinearInterpolationFunction SLAMax: XProperty=[Leaf1].LAI
              XYPairs: X=[0, 5]; Y=[27000, 22000]
            LinearInterpolationFunction LeafNumberFraction: XProperty=[Leaf1].LAIRatio
              XYPairs: X=[0, 0.1, 0.8, 1]; Y=[0, 1, 1, 1]
            PhaseBasedSwitch LeafSenescencePeriod: Start=EndOfJuvenile(0.4); End=EndCrop
            LinearInterpolationFunction LeafSenescenceFrost: XProperty=[WeatherFile].MinT
              XYPairs: X=[-15, -5]; Y=[0, 0]
            LinearInterpolationFunction DMSenescenceFraction: XProperty=[Leaf1].FractionCanopySenescing
              XYPairs: X=[0, 1]; Y=[0, 1]
            LinearInterpolationFunction ExtinctionCoefficient: XProperty=[PlantSpatial1].RowSpacing
              XYPairs: X=[200, 350, 1000]; Y=[0.5, 0.5, 0.5]
            LinearInterpolationFunction ExtinctionCoefficientDead: XProperty=[PlantSpatial1].RowSpacing
              XYPairs: X=[200, 350, 1000]; Y=[0.3, 0.3, 0.3]
            StageBasedInterpolation NConcentrationMinimum: Codes=[0.025, 0.025, 0.021, 0.01, 0.005, 0.0025]; Proportional=true
              Stages=[Emergence, EndOfJuvenile, FloralInitiation, Flowering, EndGrainFill, HarvestRipe]
            StageBasedInterpolation NConcentrationMaximum: Codes=[0.07, 0.07, 0.05, 0.02, 0.01, 0.005]; Proportional=true
              Stages=[Emergence, EndOfJuvenile, FloralInitiation, Flowering, EndGrainFill, HarvestRipe]
            StageBasedInterpolation NConcentrationCritical: Codes=[0.063, 0.063, 0.042, 0.015, 0.008, 0.0035]; Proportional=true
              Stages=[Emergence, EndOfJuvenile, FloralInitiation, Flowering, EndGrainFill, HarvestRipe]
            Live
            Dead
          Stem1 Stem: dlt_n_senesced_retrans=3.14083e-06; dlt_n_senesced_trans=0; dlt_height=0; dlt_width=0; NDeficitUptakeFraction=0.0001; NSenescenceConcentration=0.0025; SenescenceDetachmentFraction=0; InitialWt=0.0016; InitialNConcentration=0.05
            Biomass Live
            Biomass Dead
            LinearInterpolationFunction RetainFraction: XProperty=[Stem1].FractionHeightRemoved
              XYPairs: X=[0, 0.1, 1]; Y=[0, 0.2, 1]
            LinearInterpolationFunction HeightFunction: XProperty=[Stem1].GreenWtPerPlant
              XYPairs: X=[0, 6]; Y=[0, 1500]
            LinearInterpolationFunction GrowthStructuralFractionStage: XProperty=[Phenology].Stage
              XYPairs: X=[7, 7.01]; Y=[0.65, 0]
            LinearInterpolationFunction DMSenescenceFraction: XProperty=[Leaf1].FractionCanopySenescing
              XYPairs: X=[0, 1]; Y=[0, 0]
            StageBasedInterpolation NConcentrationMinimum: Codes=[0.025, 0.025, 0.004, 0.003, 0.003, 0.0025]; Proportional=true
              Stages=[Emergence, EndOfJuvenile, FloralInitiation, Flowering, EndGrainFill, HarvestRipe]
            StageBasedInterpolation NConcentrationMaximum: Codes=[0.07, 0.07, 0.04, 0.015, 0.015, 0.015]; Proportional=true
              Stages=[Emergence, EndOfJuvenile, FloralInitiation, Flowering, EndGrainFill, HarvestRipe]
            StageBasedInterpolation NConcentrationCritical: Codes=[0.05, 0.05, 0.02, 0.01, 0.005, 0.0035]; Proportional=true
              Stages=[Emergence, EndOfJuvenile, FloralInitiation, Flowering, EndGrainFill, HarvestRipe]
            Live
            Dead
          Pod: same as APS26.APS26NRate160WaterWet.paddock.Wheat.Pod
          Grain: same as APS26.APS26NRate160WaterWet.paddock.Wheat.Grain
          NStress: N_fact_photo=1.5; N_fact_pheno=100; N_fact_expansion=1; N_fact_grain=1.5
          SWStress: same as APS26.APS26NRate160WaterWet.paddock.Wheat.SWStress
          LinearInterpolationFunction TempStress: XProperty=[Environment].MeanT
            XYPairs: X=[0, 10, 25, 35]; Y=[0, 1, 1, 0]
          RadiationPartitioning: FractIncidentRadn=1; RadiationPartitioningOrder=[Pod, Grain, Leaf]
          StageBasedInterpolation NFixRate: Codes=[0, 0, 0, 0, 0, 0, 0, 0, 0, 0, 0]; Proportional=false
            Stages=[Sowing, Germination, Emergence, EndOfJuvenile, FloralInitiation, Flowering, StartGrainFill, EndGrainFill, Maturity, HarvestRipe, EndCrop]
          CompositeBiomass AboveGroundLive: Propertys=[[Leaf1].Live, [Stem1].Live, [Pod].Live, [Grain].Live]
          CompositeBiomass AboveGroundDead: Propertys=[[Leaf1].Dead, [Stem1].Dead, [Pod].Dead, [Grain].Dead]
          CompositeBiomass BelowGroundLive: Propertys=[[Root1].Live]
          CompositeBiomass BelowGroundDead: Propertys=[[Root1].Dead]
          CompositeBiomass TotalLive
            Propertys=[[Leaf1].Live, [Stem1].Live, [Pod].Live, [Grain].Live, [Root1].Live]
          CompositeBiomass TotalDead
            Propertys=[[Leaf1].Dead, [Stem1].Dead, [Pod].Dead, [Grain].Dead, [Root1].Dead]
          CompositeBiomass AboveGround: Propertys=[[AboveGroundLive], [AboveGroundDead]]
          CompositeBiomass BelowGround: Propertys=[[Root1].Live, [Root1].Dead]
          CompositeBiomass Total
            Propertys=[[AboveGroundLive], [AboveGroundDead], [BelowGroundLive], [BelowGroundDead]]
          CompositeBiomass Head: Propertys=[[Pod].Live, [Grain].Live, [Pod].Dead, [Grain].Dead]
          StageBasedInterpolation StageCode: Codes=[1, 2, 3, 4, 5, 6, 7, 8, 9, 10, 11]; Proportional=false
            Stages=[Sowing, Germination, Emergence, EndOfJuvenile, FloralInitiation, Flowering, StartGrainFill, EndGrainFill, Maturity, HarvestRipe, EndCrop]
          PlantSpatial1
          Environment: CO2=350
          PStress
          Zadok
        Manager ApplyFertiliser
          FertDayOfYear = 167
          Amount = 0
          script: same as in APS26.APS26NRate160WaterWet.paddock.ApplyFertiliser
        Operations IrrigationSchedule
          1992-06-17  Wheat.Sow(population:121.61, cultivar:"GattonHartog", depth:30, rowSpacing:250);
          1992-06-24  Irrigation.Apply(amount:10);
          1992-06-26  Irrigation.Apply(amount:10);
          1992-07-28  Irrigation.Apply(amount:30);
          1992-08-05  Irrigation.Apply(amount:30);
          1992-08-19  Irrigation.Apply(amount:40);
          1992-08-26  Irrigation.Apply(amount:40);
          1992-09-09  Irrigation.Apply(amount:40);
          1992-09-21  Irrigation.Apply(amount:40);
          1992-10-01  Irrigation.Apply(amount:50);
          1992-10-07  Irrigation.Apply(amount:20);
          1992-10-08  Irrigation.Apply(amount:20);
          1992-10-09  Irrigation.Apply(amount:20);
          1992-10-13  Irrigation.Apply(amount:20);
        MicroClimate: same as APS26.APS26NRate160WaterWet.paddock.MicroClimate
        PredictedObserved: FileName=APS26TimeSeries.txt; FieldNameUsedForMatch=Wheat.Zadok.Stage
  Experiment APS14
    Factors
      Factor Stubble: Paths=[OMSchedule]
        FactorValue Bare
          Operations Bare
            1993-06-03  SurfaceOrganicMatter.Incorporate(fraction: 1.0, depth:100);
        FactorValue Lucerne
          Operations Lucerne
            1993-06-03  SurfaceOrganicMatter.Add(type: "lucerne", mass: 3560, N: 108.8);
            1993-06-03  SurfaceOrganicMatter.Incorporate(fraction: 1.0, depth:100);
        FactorValue Straw
          Operations Straw
            1993-06-03  SurfaceOrganicMatter.Add(type: "barley", mass: 3580, N: 28.8);
            1993-06-03  SurfaceOrganicMatter.Incorporate(fraction: 1.0, depth:100);
      Factor NRate: Paths=[FertiliserSchedule]
        FactorValue 000
          Operations 0
            1993-06-18  Fertiliser.Apply(Amount: 0, Type: Fertiliser.Types.NO3N);
        FactorValue 040
          Operations 40
            1993-06-18  Fertiliser.Apply(Amount: 40, Type: Fertiliser.Types.NO3N);
        FactorValue 080
          Operations 80
            1993-06-18  Fertiliser.Apply(Amount: 80, Type: Fertiliser.Types.NO3N);
        FactorValue 200
          Operations 200
            1993-06-18  Fertiliser.Apply(Amount: 120, Type: Fertiliser.Types.NO3N);
            1993-08-18  Fertiliser.Apply(Amount: 80, Type: Fertiliser.Types.NO3N);
    Simulation APS14StubbleBareNRate0: Area=0
      Clock: StartDate=1993-06-02; EndDate=1993-11-26
      Summary summaryfile
      WeatherFile met: FileName=APS14.met; MaxT=0; MinT=0; Rain=0; Radn=0; vp=0; CO2=350
      Zone paddock: Area=1
        Report: AutoCreateCSV=true
          Variables:
            [Clock].Today
            [Wheat].Zadok.Stage
            [Wheat].Phenology.CurrentStageName
            [Wheat].AboveGround.Wt
            [Wheat].AboveGround.N
            [Wheat].Grain.Yield
            [Wheat].Grain.Protein
            [Wheat].Grain.Size
            [Wheat].Grain.GrainNo
            [Wheat].Grain.Wt
            [Wheat].Grain.N
            [Wheat].Leaf.LAI
            [Wheat].Leaf.Live.Wt
            [Wheat].Leaf.Live.N
            [Wheat].Head.Wt
            [Wheat].Head.N
            [Wheat].Stem.Live.Wt
            [Wheat].Stem.Live.N
            [Wheat].Root.RootDepth
            [Wheat].EP
            [Wheat].SWStress.Photo
            [Wheat].SWStress.Expansion
            [Wheat].NStress.Photo
            [Wheat].NStress.Expansion
            [Wheat].Total.Wt
            [ExtraVariables].Script.MineralN
            [ExtraVariables].Script.TotalNO3
            [ExtraVariables].Script.TotalNH4
          Events:
            [Clock].EndOfDay
        Irrigation
        Fertiliser
          Definitions:
            Name   FractionNO3  FractionNH4  FractionUrea
            UreaN  0            0            1
            NO3N   1            0            0
        Soil APS14Field: SoilType=Clay Loam; LocalName=Gatton; Site=Gatton; NearestTown=Gatton; Region=Lockyer Valley; State=Qld; Country=Australia; NaturalVegetation=Unknown; Latitude=0; Longitude=0
          Water
            Thickness  BD    AirDry  LL15  DUL   SAT
            150        1.38  0.1     0.2   0.38  0.43
            150        1.34  0.2     0.2   0.38  0.43
            150        1.31  0.24    0.24  0.4   0.45
            150        1.4   0.19    0.19  0.41  0.45
            300        1.5   0.18    0.18  0.4   0.43
            300        1.49  0.14    0.14  0.39  0.43
            300        1.46  0.2     0.2   0.38  0.4
            300        1.46  0.2     0.2   0.38  0.4
            SoilCrop Wheat: LL=[0.2, 0.2, 0.24, 0.19, 0.18, 0.14, 0.25, 0.28]; KL=[0.06, 0.06, 0.06, 0.05, 0.04, 0.03, 0.02, 0.02]; XF=[1, 1, 1, 1, 1, 1, 1, 1]
          SoilWater: min_crit_temp=5; max_crit_temp=35; max_albedo=0.23; A_to_evap_fact=0.44; canopy_eos_coef=1.7; sw_top_crit=0.9; sumes1_max=100; sumes2_max=25; solute_flow_eff=[1]; solute_flux_eff=[1]; gravity_gradient=2E-05; specific_bd=2.65; hydrol_effective_depth=450; immobile_solutes=[nh4]; canopy_fact=[1, 1, 0, 0]; canopy_fact_height=[0, 600, 1800, 30000]; canopy_fact_default=0.5; act_evap_method=ritchie; irrigation_will_runoff=false; irrigation_layer=0; SummerCona=3.5; SummerU=6; SummerDate=1-Nov; WinterCona=3.5; WinterU=6; WinterDate=1-Apr; DiffusConst=40; DiffusSlope=16; Salb=0.13; slope=0; discharge_width=0; catchment_area=0; max_pond=0; CN2Bare=60; CNRed=20; CNCov=0.8
            mobile_solutes  Thickness  SWCON  KLAT
            no3             150        0.3    0
            urea            150        0.3    0
            cl              150        0.3    0
            br              150        0.3    0
            org_n           300        0.3    0
            org_c_pool1     300        0.3    0
            org_c_pool2     300        0.3    0
            org_c_pool3     300        0.3    0
          SoilNitrogen: fom_type=[default, manure, mucuna, lablab, shemp, stable]; fract_carb=[0.2, 0.3, 0.54, 0.57, 0.45, 0]; fract_cell=[0.7, 0.3, 0.37, 0.37, 0.47, 0.1]; fract_lign=[0.1, 0.4, 0.09, 0.06, 0.08, 0.9]
          SoilOrganicMatter: RootCN=40; RootWt=1500; SoilCN=14.5; EnrACoeff=0; EnrBCoeff=0; OCUnits=Total
            Thickness  OC    FBiom  FInert
            150        2.2   0.02   0.4
            150        1.6   0.02   0.6
            150        1.35  0.01   0.7
            150        0.95  0.01   0.8
            300        1     0.01   0.9
            300        0.8   0.01   0.9
            300        0.45  0.01   0.9
            300        0.45  0.01   0.9
          Analysis: Thickness=[150, 150, 150, 150, 300, 300, 300, 300]; PH=[7.5, 8, 8, 8, 8, 8, 8, 8]; PHUnits=Water; BoronUnits=HotWater
          Sample Initial Water: Thickness=[150, 150, 150, 150, 300, 300, 300, 300]; SW=[0.336, 0.336, 0.302, 0.302, 0.319, 0.345, 0.294, 0.264]; NO3Units=ppm; NH4Units=ppm; SWUnits=Volumetric; OCUnits=Total; PHUnits=Water
          Sample Initial Nitrogen: NO3Units=ppm; NH4Units=ppm; SWUnits=Volumetric; OCUnits=Total; PHUnits=Water
            Thickness  NO3  NH4
            150        2    0.3
            150        0.5  0.3
            150        0.2  0.2
            150        0.2  0.1
            300        0.2  0.1
            300        0.2  0.1
            300        0.2  0.1
            300        0.2  0.1
        SurfaceOrganicMatter: crit_residue_wt=2000; opt_temp=20; cum_eos_max=20; cnrf_coeff=0.277; cnrf_optcn=25; c_fract=0.4; leach_rain_tot=25; min_rain_to_leach=10; crit_min_surfom_orgC=0.004; default_cpr=0; default_standing_fraction=0; standing_extinct_coeff=0.5; fractionFaecesAdded=0.5; PoolName=wheat_stubble; type=Wheat; mass=[500, 0]; standing_fraction=[0.0, 0.0]; cpr=[0, 0]; cnr=[120, 80]
          ResidueTypes:
            Name         fom_type       fraction_C  po4ppm  nh4ppm  no3ppm  specific_area  cf_contrib  pot_decomp_rate  fr_c             fr_n             fr_p
            ResidueType  wheat          0.4         0       0       0       0.0005         1           0.1              [0.2, 0.7, 0.1]  [0.2, 0.7, 0.1]  [0.2, 0.7, 0.1]
            ResidueType  lucerne        0.4         0       0       0       0.0002         1           0.1              [0.2, 0.7, 0.1]  [0.2, 0.7, 0.1]  [0.2, 0.7, 0.1]
            ResidueType  barley         0.4         0       0       0       0.0005         1           0.1              [0.2, 0.7, 0.1]  [0.2, 0.7, 0.1]  [0.2, 0.7, 0.1]
            ResidueType  tithonia       0.4         0       0       0       0.0005         1           0.1              [0.2, 0.7, 0.1]  [0.2, 0.7, 0.1]  [0.2, 0.7, 0.1]
            ResidueType  bambatsi       0.4         0       0       0       0.0005         1           0.1              [0.2, 0.7, 0.1]  [0.2, 0.7, 0.1]  [0.2, 0.7, 0.1]
            ResidueType  barley         0.4         0       0       0       0.0005         1           0.1              [0.2, 0.7, 0.1]  [0.2, 0.7, 0.1]  [0.2, 0.7, 0.1]
            ResidueType  broccoli       0.4         0       0       0       0.0004         1           0.1              [0.2, 0.7, 0.1]  [0.2, 0.7, 0.1]  [0.2, 0.7, 0.1]
            ResidueType  butterflypea   0.4         0       0       0       0.0004         1           0.1              [0.2, 0.7, 0.1]  [0.2, 0.7, 0.1]  [0.2, 0.7, 0.1]
            ResidueType  camaldulensis  0.4         0       0       0       0.0002         1           0.1              [0.2, 0.7, 0.1]  [0.2, 0.7, 0.1]  [0.2, 0.7, 0.1]
            ResidueType  canola         0.4         0       0       0       0.0002         1           0.1              [0.2, 0.7, 0.1]  [0.2, 0.7, 0.1]  [0.2, 0.7, 0.1]
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        Plant15 Wheat: same as APS26.APS26NRate160WaterWet.paddock.Wheat
        Operations IrrigationSchedule
          1993-06-04  Irrigation.Apply(amount:14);
          1993-06-18  Irrigation.Apply(amount:26);
          1993-06-23  Irrigation.Apply(amount:13);
          1993-07-09  Irrigation.Apply(amount:25);
          1993-07-22  Irrigation.Apply(amount:20);
          1993-08-06  Irrigation.Apply(amount:31);
          1993-08-18  Irrigation.Apply(amount:36);
          1993-08-27  Irrigation.Apply(amount:38);
          1993-09-06  Irrigation.Apply(amount:33);
          1993-09-24  Irrigation.Apply(amount:35);
          1993-10-01  Irrigation.Apply(amount:36);
        MicroClimate: same as APS26.APS26NRate160WaterWet.paddock.MicroClimate
        Operations FertiliserSchedule
          1993-06-18  Fertiliser.Apply(Amount: 0, Type: Fertiliser.Types.NO3N);
        Operations OMSchedule
          1993-06-03  SurfaceOrganicMatter.Add(type: "wheat", mass: 0, N: 0);
          1993-06-03  SurfaceOrganicMatter.Incorporate(fraction: 1.0, depth:100);
        Operations SowingSchedule
          1993-06-29  Wheat.Sow(population:114, cultivar:"GattonHartog", depth:30, rowSpacing:250);
        PredictedObserved: FileName=APS14TimeSeries.txt; FieldNameUsedForMatch=Wheat.Zadok.Stage
        Manager ExtraVariables
```csharp
        using System;
        using Models.Core;
		using System.Collections.Generic;
        using System.Text;
        using Models.PMF.OldPlant;
        using Models.PMF;
        using Models.Soils;
        using Models;
        using System.Xml.Serialization;
        namespace Models
        {
[Serializable] 
public class Script : Model
{      
[Link] Clock Clock;
[Link] Soils.SoilNitrogen SoilN;
[Link] Soils.SoilWater SoilWat;
[Link] Models.SurfaceOM.SurfaceOrganicMatter SOM;
[Link] Plant15 Plant;          
[Link] WeatherFile Met;   
[Link] Fertiliser Fert;
[Link] Irrigation Irrig;  
               
[XmlIgnore] public bool InitialDay { get; set; }

[XmlIgnore] public double AccumPlantN { get; set; }
[XmlIgnore] public double AccumMineralisation { get; set; }
[XmlIgnore] public double AccumDenit { get; set; }
[XmlIgnore] public double AccumFert { get; set; }
[XmlIgnore] public double AccumLeach { get; set; }
[XmlIgnore] public double AccumDetach { get; set; }
[XmlIgnore] public double DeltaSoilOMN { get; set; }
[XmlIgnore] public double DeltaSurfaceOMN { get; set; }
[XmlIgnore] public double DeltaSoilMineralN { get; set; }
[XmlIgnore] public double SoilNitrogenContent { get; set; }

[XmlIgnore] public double AccumEO { get; set; }
[XmlIgnore] public double AccumEP { get; set; }
[XmlIgnore] public double AccumES { get; set; }
[XmlIgnore] public double AccumDrainage { get; set; }
[XmlIgnore] public double AccumRunoff { get; set; }
[XmlIgnore] public double AccumOutflowLat { get; set; }
[XmlIgnore] public double AccumIrrigation { get; set; }
[XmlIgnore] public double AccumRainfall { get; set; }
[XmlIgnore] public double SoilWaterDeficit { get; set; }

[XmlIgnore] public double AccumTtemerg { get; set; }

[XmlIgnore] public double  InitialSoilOMN { get; set; }
[XmlIgnore] public double  InitialSurfaceOMN { get; set; }
[XmlIgnore] public double  InitialMineralN { get; set; }

[XmlIgnore] public double SWC { get; set; }
[XmlIgnore] public double DUL { get; set; }
[XmlIgnore] public double OutFlowLat { get; set; }
[XmlIgnore] public double MineralN {get; set;}
[XmlIgnore] public double TotalNO3 {get; set;}
[XmlIgnore] public double TotalNH4 {get; set;}

[EventSubscribe("Initialised")]
private void OnInitialised(object sender, EventArgs e)
{
InitialDay = true;
AccumPlantN = 0;
AccumMineralisation = 0;
AccumDenit = 0;
AccumFert = 0;
AccumLeach = 0;
AccumDetach = 0;
DeltaSoilOMN = 0;
DeltaSurfaceOMN = 0;
DeltaSoilMineralN = 0;
SoilNitrogenContent = 0;

AccumEO = 0;
AccumEP = 0;
AccumES = 0;
AccumDrainage = 0;
AccumRunoff = 0;
AccumOutflowLat = 0;
AccumIrrigation = 0;
AccumRainfall = 0;
SoilWaterDeficit = 0;

AccumTtemerg = 0;

SWC = 0;
DUL = 0;
}	   

[EventSubscribe("EndOfDay")]
private void OnEndOfDay(object sender, EventArgs e)
{
	int layers = SoilWat.dlayer.Length;
    if (InitialDay)
	{
      InitialSurfaceOMN = SOM.surfaceom_n;
      for (int layer = 0; layer < layers; layer++)
      { 
      InitialSoilOMN += (SoilN.biom_n[layer] + SoilN.fom_n[layer] + SoilN.hum_n[layer]);
      InitialMineralN += (SoilN.no3[layer] + SoilN.nh4[layer] + SoilN.urea[layer]);
      }
      InitialDay = false;
    }

//!!!!!! Nitrogen balance components !!!!!!
//!!!!!!^^^^^^^^^^^^^^^^^^^^^^^^^^^^^!!!!!!
//AccumPlantN -= (double)this.Get("[Plant].Root.NUptake");
AccumFert += Fert.NitrogenApplied;
DeltaSurfaceOMN = SOM.surfaceom_n - InitialSurfaceOMN;
AccumDetach = 0; //plant2 doesn't detach yet
MineralN = 0;
TotalNO3 = 0;
TotalNH4 = 0;
double OrganicN = 0;
//AccumLeach = AccumLeach - SoilN.leach_urea - SoilN.leach_no3 - SoilN.leach_nh4; //Fails
   for (int layer = 0; layer < layers; layer++)
    { 
    AccumMineralisation += (SoilN.dlt_n_min[layer] + SoilN.dlt_n_min_res[layer]);
    AccumDenit -= Utility.Math.Sum(SoilN.dnit);
    OrganicN += (SoilN.biom_n[layer] + SoilN.fom_n[layer] + SoilN.hum_n[layer]);
    MineralN += (SoilN.no3[layer] + SoilN.nh4[layer] + SoilN.urea[layer]);
    TotalNO3 += SoilN.no3[layer];
    TotalNH4 += SoilN.nh4[layer];
    }
DeltaSoilOMN = OrganicN - InitialSoilOMN;
DeltaSoilMineralN = MineralN - InitialMineralN;
SoilNitrogenContent = MineralN;
//!!!!!! Water balance components !!!!!!
//!!!!!!^^^^^^^^^^^^^^^^^^^^^^^^^^!!!!!!
AccumEO -= SoilWat.eo;
//AccumEP -= (double)this.Get("[Plant].Leaf.Transpiration");
AccumES -= SoilWat.es; 
AccumDrainage -= SoilWat.drain; 
AccumRunoff -= SoilWat.runoff; 
AccumIrrigation += Irrig.IrrigationApplied; 
AccumRainfall += Met.Rain;
SWC = 0;
DUL = 0;
double OutFlowLat = 0;
   for (int layer = 0; layer < layers; layer++)
   {
     SWC += SoilWat.sw_dep[layer];
     DUL += SoilWat.dul_dep[layer];
     OutFlowLat = SoilWat.outflow_lat[layer];
   }
AccumOutflowLat -= OutFlowLat;
SoilWaterDeficit =  (SWC - DUL);
}

[EventSubscribe("StartOfDay")]
private void OnStartOfDay(object sender, EventArgs e)
{
//!!!!!! Thermal time calculation !!!!!!
//!!!!!! ^^^^^^^^^^^^^^^^^^^^^^^^ !!!!!!

}
}
}
```
  Experiment Mer86
    Factors
      Factor NitrogenApplication: Paths=[FertiliserOperations]
        FactorValue 15
          Operations FertiliserOperations
            1986-06-14  Fertiliser.Apply(Amount: 15, Type: Fertiliser.Types.NO3N, Depth: 50);
        FactorValue 60
          Operations FertiliserOperations
            1986-05-29  Fertiliser.Apply(Amount: 60, Type: Fertiliser.Types.NO3N, Depth: 50);
      Factor IrrigationApplication: Paths=[IrrigationOperations]
        FactorValue Dry
          Operations IrrigationOperations
            1986-09-03  irrigation.Apply (amount:0);
            1986-09-05  irrigation.Apply (amount:0);
            1986-09-10  irrigation.Apply (amount:0);
            1986-09-11  irrigation.Apply (amount:0);
            1986-09-14  irrigation.Apply (amount:0);
            1986-09-16  irrigation.Apply (amount:0);
            1986-09-18  irrigation.Apply (amount:0);
            1986-09-21  irrigation.Apply (amount:0);
            1986-09-23  irrigation.Apply (amount:0);
            1986-09-24  irrigation.Apply (amount:0);
            1986-09-30  irrigation.Apply (amount:0);
            1986-10-02  irrigation.Apply (amount:0);
            1986-10-04  irrigation.Apply (amount:0);
            1986-10-10  irrigation.Apply (amount:0);
            1986-10-12  irrigation.Apply (amount:0);
            1986-10-14  irrigation.Apply (amount:0);
            1986-10-16  irrigation.Apply (amount:0);
            1986-10-18  irrigation.Apply (amount:0);
            1986-10-20  irrigation.Apply (amount:0);
            1986-10-22  irrigation.Apply (amount:0);
            1986-10-25  irrigation.Apply (amount:0);
            1986-10-26  irrigation.Apply (amount:0);
            1986-10-28  irrigation.Apply (amount:0);
            1986-10-30  irrigation.Apply (amount:0);
            1986-11-01  irrigation.Apply (amount:0);
            1986-11-03  irrigation.Apply (amount:0);
            1986-11-05  irrigation.Apply (amount:0);
            1986-11-07  irrigation.Apply (amount:0);
        FactorValue Wet
          Operations IrrigationOperations
            1986-09-03  irrigation.Apply (amount:10);
            1986-09-05  irrigation.Apply (amount:20);
            1986-09-10  irrigation.Apply (amount:20);
            1986-09-11  irrigation.Apply (amount:10);
            1986-09-14  irrigation.Apply (amount:10);
            1986-09-16  irrigation.Apply (amount:10);
            1986-09-18  irrigation.Apply (amount:10);
            1986-09-21  irrigation.Apply (amount:10);
            1986-09-23  irrigation.Apply (amount:10);
            1986-09-24  irrigation.Apply (amount:20);
            1986-09-30  irrigation.Apply (amount:30);
            1986-10-02  irrigation.Apply (amount:20);
            1986-10-04  irrigation.Apply (amount:20);
            1986-10-10  irrigation.Apply (amount:20);
            1986-10-12  irrigation.Apply (amount:20);
            1986-10-14  irrigation.Apply (amount:20);
            1986-10-16  irrigation.Apply (amount:20);
            1986-10-18  irrigation.Apply (amount:20);
            1986-10-20  irrigation.Apply (amount:20);
            1986-10-22  irrigation.Apply (amount:20);
            1986-10-25  irrigation.Apply (amount:20);
            1986-10-26  irrigation.Apply (amount:20);
            1986-10-28  irrigation.Apply (amount:20);
            1986-10-30  irrigation.Apply (amount:20);
            1986-11-01  irrigation.Apply (amount:20);
            1986-11-03  irrigation.Apply (amount:20);
            1986-11-05  irrigation.Apply (amount:20);
            1986-11-07  irrigation.Apply (amount:20);
    Simulation Base: Area=0
      Clock: StartDate=1986-05-01; EndDate=1986-11-30
      Summary summaryfile
      WeatherFile met: FileName=MER-86.met; MaxT=0; MinT=0; Rain=0; Radn=0; vp=0; CO2=350
      Zone paddock: Area=1
        Report: Events=[Clock].EndOfDay; AutoCreateCSV=false
          Variables:
            [Clock].Today
            [Wheat].Zadok.Stage
            [Wheat].Phenology.CurrentStageName
            [Wheat].AboveGround.Wt
            [Wheat].AboveGround.N
            [Wheat].Grain.Yield
            [Wheat].Grain.Protein
            [Wheat].Grain.Size
            [Wheat].Grain.GrainNo
            [Wheat].Grain.Wt
            [Wheat].Grain.N
            [Wheat].Leaf.LAI
            [Wheat].Leaf.Live.Wt
            [Wheat].Leaf.Live.N
            [Wheat].Head.Wt
            [Wheat].Head.N
            [Wheat].Stem.Live.Wt
            [Wheat].Stem.Live.N
            [Wheat].Root.RootDepth
            [Wheat].EP
            [Wheat].SWStress.Photo
            [Wheat].SWStress.Expansion
            [Wheat].NStress.Photo
            [Wheat].NStress.Expansion
            [Wheat].Total.Wt
        Soil MER-86Field: SoilType=sand; LocalName=Merredin; Site=Merredin; NearestTown=Unknown; Region=WA; NaturalVegetation=Unknown; Latitude=0; Longitude=0
          Water
            Thickness  BD    AirDry  LL15  DUL   SAT
            100        1.7   0.03    0.03  0.16  0.26
            100        1.75  0.03    0.03  0.21  0.26
            100        1.8   0.03    0.03  0.22  0.25
            100        1.85  0.04    0.05  0.23  0.24
            100        1.85  0.04    0.1   0.22  0.23
            100        1.85  0.04    0.12  0.22  0.22
            100        1.85  0.04    0.17  0.22  0.22
            200        1.85  0.04    0.17  0.22  0.23
            200        1.85  0.04    0.17  0.22  0.23
            200        1.85  0.04    0.17  0.22  0.23
            SoilCrop Wheat
              LL=[0.03, 0.03, 0.03, 0.05, 0.1, 0.12, 0.17, 0.17, 0.17, 0.17]
              KL=[0.06, 0.06, 0.06, 0.06, 0.06, 0.06, 0.06, 0.06, 0.06, 0.06]
              XF=[0.2, 0.6, 0.6, 0.6, 0.6, 0.6, 0.6, 0.6, 0.6, 0.6]
          SoilWater: min_crit_temp=5; max_crit_temp=35; max_albedo=0.23; A_to_evap_fact=0.44; canopy_eos_coef=1.7; sw_top_crit=0.9; sumes1_max=100; sumes2_max=25; solute_flow_eff=[1]; solute_flux_eff=[1]; gravity_gradient=2E-05; specific_bd=2.65; hydrol_effective_depth=450; immobile_solutes=[nh4]; canopy_fact=[1, 1, 0, 0]; canopy_fact_height=[0, 600, 1800, 30000]; canopy_fact_default=0.5; act_evap_method=ritchie; irrigation_will_runoff=false; irrigation_layer=1; SummerCona=2; SummerU=6; SummerDate=1-Nov; WinterCona=2; WinterU=6; WinterDate=1-Apr; DiffusConst=88; DiffusSlope=35; Salb=0.13; slope=0; discharge_width=0; catchment_area=0; max_pond=0; CN2Bare=60; CNRed=20; CNCov=0.8
            Thickness  SWCON  KLAT
            100        1      0
            100        1      0
            100        1      0
            100        1      0
            100        0.3    0
            100        1      0
            100        1      0
            200        1      0
            200        1      0
            200        1      0
            mobile_solutes=[no3, urea, cl, br, org_n, org_c_pool1, org_c_pool2, org_c_pool3]
          SoilNitrogen: fom_type=[default, manure, mucuna, lablab, shemp, stable]; fract_carb=[0.2, 0.3, 0.54, 0.57, 0.45, 0]; fract_cell=[0.7, 0.3, 0.37, 0.37, 0.47, 0.1]; fract_lign=[0.1, 0.4, 0.09, 0.06, 0.08, 0.9]
          SoilOrganicMatter: RootCN=40; RootWt=1000; SoilCN=13; EnrACoeff=1; EnrBCoeff=1; OCUnits=Total
            Thickness  OC    FBiom  FInert
            100        0.5   0.04   0.1
            100        0.1   0.03   0.1
            100        0.1   0.02   0.2
            100        0.05  0.01   0.8
            100        0.05  0.01   0.9
            100        0.05  0.01   0.9
            100        0.05  0.01   0.9
            200        0.05  0.01   0.9
            200        0.05  0.01   0.9
            200        0.05  0.01   0.9
          Analysis: Thickness=[100, 100, 100, 100, 100, 100, 100, 200, 200, 200]; PH=[4.7, 4.7, 4.7, 6, 6, 6, 6, 6, 6, 6]; PHUnits=Water; BoronUnits=HotWater
          Sample Initial Water: Thickness=[100, 100, 100, 100, 100, 100, 100, 200, 200, 200]; SW=[0.03, 0.03, 0.07, 0.1, 0.22, 0.22, 0.22, 0.22, 0.21, 0.19]; NO3Units=ppm; NH4Units=ppm; SWUnits=Volumetric; OCUnits=Total; PHUnits=Water
          Sample Initial Nitrogen: NO3Units=ppm; NH4Units=ppm; SWUnits=Volumetric; OCUnits=Total; PHUnits=Water
            Thickness  NO3  NH4
            100        10   5
            100        5    3
            100        0.3  1
            100        0    0
            100        0    0
            100        0    0
            100        0    0
            200        0    0
            200        0    0
            200        0    0
        Irrigation
        SurfaceOrganicMatter: crit_residue_wt=2000; opt_temp=20; cum_eos_max=20; cnrf_coeff=0.277; cnrf_optcn=25; c_fract=0.4; leach_rain_tot=25; min_rain_to_leach=10; crit_min_surfom_orgC=0.004; default_cpr=0; default_standing_fraction=0; standing_extinct_coeff=0.5; fractionFaecesAdded=0.5; PoolName=wheat_stubble; type=wheat; mass=0; standing_fraction=0.0; cpr=0; cnr=80
          ResidueTypes:
            Name         fom_type       fraction_C  po4ppm  nh4ppm  no3ppm  specific_area  cf_contrib  pot_decomp_rate  fr_c             fr_n             fr_p
            ResidueType  wheat          0.4         0       0       0       0.0005         1           0.1              [0.2, 0.7, 0.1]  [0.2, 0.7, 0.1]  [0.2, 0.7, 0.1]
            ResidueType  lucerne        0.4         0       0       0       0.0002         1           0.1              [0.2, 0.7, 0.1]  [0.2, 0.7, 0.1]  [0.2, 0.7, 0.1]
            ResidueType  barley         0.4         0       0       0       0.0005         1           0.1              [0.2, 0.7, 0.1]  [0.2, 0.7, 0.1]  [0.2, 0.7, 0.1]
            ResidueType  tithonia       0.4         0       0       0       0.0005         1           0.1              [0.2, 0.7, 0.1]  [0.2, 0.7, 0.1]  [0.2, 0.7, 0.1]
            ResidueType  bambatsi       0.4         0       0       0       0.0005         1           0.1              [0.2, 0.7, 0.1]  [0.2, 0.7, 0.1]  [0.2, 0.7, 0.1]
            ResidueType  barley         0.4         0       0       0       0.0005         1           0.1              [0.2, 0.7, 0.1]  [0.2, 0.7, 0.1]  [0.2, 0.7, 0.1]
            ResidueType  broccoli       0.4         0       0       0       0.0004         1           0.1              [0.2, 0.7, 0.1]  [0.2, 0.7, 0.1]  [0.2, 0.7, 0.1]
            ResidueType  butterflypea   0.4         0       0       0       0.0004         1           0.1              [0.2, 0.7, 0.1]  [0.2, 0.7, 0.1]  [0.2, 0.7, 0.1]
            ResidueType  camaldulensis  0.4         0       0       0       0.0002         1           0.1              [0.2, 0.7, 0.1]  [0.2, 0.7, 0.1]  [0.2, 0.7, 0.1]
            ResidueType  canola         0.4         0       0       0       0.0002         1           0.1              [0.2, 0.7, 0.1]  [0.2, 0.7, 0.1]  [0.2, 0.7, 0.1]
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        Operations SowingOperations
          1986-05-29  Wheat.Sow(population:149, cultivar:"GattonHartog", depth:30, rowSpacing:250); // Gutha
        Plant15 Wheat: AutoHarvest=true; CropType=Wheat; EOCropFactor=1.5; NSupplyPreference=active; DoRetranslocationBeforeNDemand=false
          Population1 Population: Density=149; LeafNumberCritical=10; TTEmergenceLimit=300; DaysToGerminationLimit=40; SWStressPhenoLimit=25; SWStressPhotoLimit=99; SWStressPhotoRate=0
            PhaseBasedSwitch CropFailureStressPeriod: Start=Emergence; End=Flowering
            SoilTemperatureWeightedFunction DeathHighTemperatureDuringEmergence
              XYPairs: X=[55, 60]; Y=[0, 1]
          Phenology
            GerminatingPhase SowingToGermination: Start=Sowing; End=Germination
            EmergingPhase15 GerminationToEmergence: same as APS26.APS26NRate160WaterWet.paddock.Wheat.Phenology.GerminationToEmergence
            GenericPhase EmergenceToEndOfJuvenile: same as APS26.APS26NRate160WaterWet.paddock.Wheat.Phenology.EmergenceToEndOfJuvenile
            GenericPhase EndOfJuvenileToFloralInitiation: same as APS26.APS26NRate160WaterWet.paddock.Wheat.Phenology.EndOfJuvenileToFloralInitiation
            GenericPhase FloralInitiationToFlowering: same as APS26.APS26NRate160WaterWet.paddock.Wheat.Phenology.FloralInitiationToFlowering
            GenericPhase FloweringToStartGrainFill: same as APS26.APS26NRate160WaterWet.paddock.Wheat.Phenology.FloweringToStartGrainFill
            GenericPhase StartGrainFillToEndGrainFill: same as APS26.APS26NRate160WaterWet.paddock.Wheat.Phenology.StartGrainFillToEndGrainFill
            GenericPhase EndGrainFillToMaturity: same as APS26.APS26NRate160WaterWet.paddock.Wheat.Phenology.EndGrainFillToMaturity
            GenericPhase MaturityToHarvestRipe: same as APS26.APS26NRate160WaterWet.paddock.Wheat.Phenology.MaturityToHarvestRipe
            GenericPhase ReadyForHarvesting: same as APS26.APS26NRate160WaterWet.paddock.Wheat.Phenology.ReadyForHarvesting
            GenericPhase EndCrop: same as APS26.APS26NRate160WaterWet.paddock.Wheat.Phenology.EndCrop
            VernalisationCW Vernalisation: VernSens=1.5; PhotopSens=3; StartStageForEffects=Germination; EndStageForEffects=FloralInitiation; StartStageForCumulativeVD=Germination; EndStageForCumulativeVD=FloralInitiation
              AirTemperatureFunction VDModel
                XYPairs: X=[0, 2, 8, 15]; Y=[0, 1, 0.5, 0]
              PhotoperiodFunction Photoperiod: Twilight=-6
            LinearInterpolationFunction RewindDueToBiomassRemoved: XProperty=[Phenology].FractionBiomassRemoved
              XYPairs: X=[0, 0.1, 0.4, 0.5, 1]; Y=[0, 0.08, 0.4, 0.5, 1]
            PhaseBasedSwitch AboveGroundPeriod: Start=Emergence; End=EndCrop
          Root1 Root: NConcentrationCritical=0.02; NConcentrationMinimum=0.01; NConcentrationMaximum=0.02; InitialRootDepth=100; DieBackFraction=0; ll=[0.03, 0.03, 0.03, 0.05, 0.1, 0.12, 0.17, 0.17, 0.17, 0.17]; xf=[0.2, 0.6, 0.6, 0.6, 0.6, 0.6, 0.6, 0.6, 0.6, 0.6]; ModifyKL=false; ClA=4; ClB=-0.005; ESPA=10; ESPB=-0.15; ECA=3; ECB=-1.3; NDeficitUptakeFraction=0.0001; NSenescenceConcentration=0.005; NSupplyPreference=active; SenescenceDetachmentFraction=1; InitialWt=0.01; InitialNConcentration=0.02; SpecificRootLength=105000
            kl=[0.06, 0.06, 0.06, 0.06, 0.06, 0.06, 0.06, 0.06, 0.06, 0.06]
            Biomass Live
            Biomass Dead
            LinearInterpolationFunction RootAdvanceFactorTemp: XProperty=[Environment].MeanT
              XYPairs: X=[0, 25, 35]; Y=[0, 1, 0]
            LinearInterpolationFunction RootAdvanceFactorWaterStress: XProperty=[SWStress].Photo
              XYPairs: X=[0, 1]; Y=[1, 1]
            LinearInterpolationFunction SWFactorRootDepth: XProperty=[Root1].FASW
              XYPairs: X=[0, 0.25]; Y=[0, 1]
            LinearInterpolationFunction SWFactorRootLength: XProperty=[Root1].FASWLayered
              XYPairs: X=[0, 0.25]; Y=[0, 1]
            StageBasedInterpolation RootDepthRate: Codes=[0, 5, 30, 30, 30, 30, 0, 0, 0, 0, 0]; Proportional=true
              Stages=[Sowing, Germination, Emergence, EndOfJuvenile, FloralInitiation, Flowering, StartGrainFill, EndGrainFill, Maturity, HarvestRipe, EndCrop]
            LinearInterpolationFunction RelativeRootRate: XProperty=[Root1].RootLengthDensity
              XYPairs: X=[0, 0.0001, 0.0003]; Y=[0.02, 0.1, 1]
            NUptake3 NUptakeFunction: kno3=0.02; knh4=0; no3ppm_min=0; nh4ppm_min=0; total_n_uptake_max=0.6
              PhaseBasedSwitch NStressPeriod: Start=EndOfJuvenile(0.3); End=EndCrop
            Constant GrowthStructuralFractionStage: Value=1
            LinearInterpolationFunction DMSenescenceFraction: XProperty=[Leaf1].FractionCanopySenescing
              XYPairs: X=[0, 1]; Y=[0.005, 0.005]
            Live
            Dead
          GenericArbitratorXY Arbitrator1: same as APS26.APS26NRate160WaterWet.paddock.Wheat.Arbitrator1
          Leaf1 Leaf: dlt_dm_pot_rue=0; dlt_n_senesced_retrans=3.66766e-07; dlt_n_senesced_trans=0; dlt_height=0; dlt_width=0; width=0; NodeNumberCorrection=2; SLAMin=18000; FractionLeafSenescenceRate=0.035; NodeSenescenceRate=60; NFactLeafSenescenceRate=0; MinTPLA=5; NDeficitUptakeFraction=0.0001; InitialWt=0.003; InitialNConcentration=0.063; InitialTPLA=200; InitialLeafNumber=2; LAISenLight=7; SenLightSlope=0.002; SenRateWater=0.1; NSenescenceConcentration=0.005; SenescenceDetachmentFraction=0
            Biomass Live
            Biomass Dead
            RUEModel1 Photosynthesis
              StageBasedInterpolation RUE: Codes=[0, 0, 1.24, 1.24, 1.24, 1.24, 1.24, 1.24, 0, 0, 0]; Proportional=true
                Stages=[Sowing, Germination, Emergence, EndOfJuvenile, FloralInitiation, Flowering, StartGrainFill, EndGrainFill, Maturity, HarvestRipe, EndCrop]
              RUECO2Function RUEModifier: PhotosyntheticPathway=C3
            StageBasedInterpolation TE: Proportional=true
              Stages=[Sowing, Germination, Emergence, EndOfJuvenile, FloralInitiation, Flowering, StartGrainFill, EndGrainFill, Maturity, HarvestRipe, EndCrop]
              Codes=[0, 0, 0.006, 0.006, 0.006, 0.006, 0.006, 0.006, 0.0025, 0, 0]
            LinearInterpolationFunction TEModifier: XProperty=[WeatherFile].CO2
              XYPairs: X=[350, 700, 1000]; Y=[1, 1.37, 1.69]
            LinearInterpolationFunction NConcCriticalModifier: XProperty=[WeatherFile].CO2
              XYPairs: X=[350, 700, 1000]; Y=[1, 0.93, 0.9]
            PhaseBasedSwitch NodeFormationPeriod: Start=Emergence; End=HarvestRipe
            LinearInterpolationFunction NodeAppearanceRate: XProperty=[Leaf1].NodeNo
              XYPairs: X=[0, 20]; Y=[95, 95]
            LinearInterpolationFunction LeavesPerNode: XProperty=[Leaf1].NodeNo
              XYPairs: X=[0, 2.5, 6]; Y=[1, 1, 6]
            LinearInterpolationFunction LeafSize: XProperty=[Leaf1].NodeNumberNow
              XYPairs: X=[1, 5, 8, 10]; Y=[1400, 3700, 4800, 5600]
            Constant GrowthStructuralFractionStage: Value=1
            LinearInterpolationFunction SLAMax: XProperty=[Leaf1].LAI
              XYPairs: X=[0, 5]; Y=[27000, 22000]
            LinearInterpolationFunction LeafNumberFraction: XProperty=[Leaf1].LAIRatio
              XYPairs: X=[0, 0.1, 0.8, 1]; Y=[0, 1, 1, 1]
            PhaseBasedSwitch LeafSenescencePeriod: Start=EndOfJuvenile(0.4); End=EndCrop
            LinearInterpolationFunction LeafSenescenceFrost: XProperty=[WeatherFile].MinT
              XYPairs: X=[-15, -5]; Y=[0, 0]
            LinearInterpolationFunction DMSenescenceFraction: XProperty=[Leaf1].FractionCanopySenescing
              XYPairs: X=[0, 1]; Y=[0, 1]
            LinearInterpolationFunction ExtinctionCoefficient: XProperty=[PlantSpatial1].RowSpacing
              XYPairs: X=[200, 350, 1000]; Y=[0.5, 0.5, 0.5]
            LinearInterpolationFunction ExtinctionCoefficientDead: XProperty=[PlantSpatial1].RowSpacing
              XYPairs: X=[200, 350, 1000]; Y=[0.3, 0.3, 0.3]
            StageBasedInterpolation NConcentrationMinimum: Codes=[0.025, 0.025, 0.021, 0.01, 0.005, 0.0025]; Proportional=true
              Stages=[Emergence, EndOfJuvenile, FloralInitiation, Flowering, EndGrainFill, HarvestRipe]
            StageBasedInterpolation NConcentrationMaximum: Codes=[0.07, 0.07, 0.05, 0.02, 0.01, 0.005]; Proportional=true
              Stages=[Emergence, EndOfJuvenile, FloralInitiation, Flowering, EndGrainFill, HarvestRipe]
            StageBasedInterpolation NConcentrationCritical: Codes=[0.063, 0.063, 0.042, 0.015, 0.008, 0.0035]; Proportional=true
              Stages=[Emergence, EndOfJuvenile, FloralInitiation, Flowering, EndGrainFill, HarvestRipe]
            Live
            Dead
          Stem1 Stem: dlt_n_senesced_retrans=2.52787e-05; dlt_n_senesced_trans=0; dlt_height=0; dlt_width=0; NDeficitUptakeFraction=0.0001; NSenescenceConcentration=0.0025; SenescenceDetachmentFraction=0; InitialWt=0.0016; InitialNConcentration=0.05
            Biomass Live
            Biomass Dead
            LinearInterpolationFunction RetainFraction: XProperty=[Stem1].FractionHeightRemoved
              XYPairs: X=[0, 0.1, 1]; Y=[0, 0.2, 1]
            LinearInterpolationFunction HeightFunction: XProperty=[Stem1].GreenWtPerPlant
              XYPairs: X=[0, 6]; Y=[0, 1500]
            LinearInterpolationFunction GrowthStructuralFractionStage: XProperty=[Phenology].Stage
              XYPairs: X=[7, 7.01]; Y=[0.65, 0]
            LinearInterpolationFunction DMSenescenceFraction: XProperty=[Leaf1].FractionCanopySenescing
              XYPairs: X=[0, 1]; Y=[0, 0]
            StageBasedInterpolation NConcentrationMinimum: Codes=[0.025, 0.025, 0.004, 0.003, 0.003, 0.0025]; Proportional=true
              Stages=[Emergence, EndOfJuvenile, FloralInitiation, Flowering, EndGrainFill, HarvestRipe]
            StageBasedInterpolation NConcentrationMaximum: Codes=[0.07, 0.07, 0.04, 0.015, 0.015, 0.015]; Proportional=true
              Stages=[Emergence, EndOfJuvenile, FloralInitiation, Flowering, EndGrainFill, HarvestRipe]
            StageBasedInterpolation NConcentrationCritical: Codes=[0.05, 0.05, 0.02, 0.01, 0.005, 0.0035]; Proportional=true
              Stages=[Emergence, EndOfJuvenile, FloralInitiation, Flowering, EndGrainFill, HarvestRipe]
            Live
            Dead
          Pod: InitialWt=0; InitialNConcentration=0.063; NDeficitUptakeFraction=0.0001; NSenescenceConcentration=0.007; SenescenceDetachmentFraction=0
            Biomass Live
            Biomass Dead
            RUECO2Function Fco2: PhotosyntheticPathway=C3
            StageBasedInterpolation TE: Proportional=true
              Stages=[Sowing, Germination, Emergence, EndOfJuvenile, FloralInitiation, Flowering, StartGrainFill, EndGrainFill, Maturity, HarvestRipe, EndCrop]
              Codes=[0, 0, 0.006, 0.006, 0.006, 0.006, 0.006, 0.006, 0.0025, 0, 0]
            LinearInterpolationFunction FractionGrainInPod: XProperty=[Phenology].Stage
              XYPairs: X=[1, 2, 3, 4, 4.9, 5, 5.4, 6, 6.9, 7, 8, 9, 10, 11]; Y=[0, 0, 0, 0, 0, 0, 0.33, 0.33, 0.33, 0, 0, 0, 0, 0]
            Constant GrowthStructuralFractionStage: Value=1
            LinearInterpolationFunction DMSenescenceFraction: XProperty=[Leaf1].FractionCanopySenescing
              XYPairs: X=[0, 1]; Y=[0, 0]
            StageBasedInterpolation NConcentrationMinimum: Codes=[0.025, 0.025, 0.004, 0.003, 0.003, 0.0025]; Proportional=true
              Stages=[Emergence, EndOfJuvenile, FloralInitiation, Flowering, EndGrainFill, HarvestRipe]
            StageBasedInterpolation NConcentrationMaximum: Codes=[0.07, 0.07, 0.04, 0.015, 0.015, 0.015]; Proportional=true
              Stages=[Emergence, EndOfJuvenile, FloralInitiation, Flowering, EndGrainFill, HarvestRipe]
            StageBasedInterpolation NConcentrationCritical: Codes=[0.05, 0.05, 0.02, 0.01, 0.005, 0.0035]; Proportional=true
              Stages=[Emergence, EndOfJuvenile, FloralInitiation, Flowering, EndGrainFill, HarvestRipe]
            Live
            Dead
          Grain: same as APS26.APS26NRate160WaterWet.paddock.Wheat.Grain
          NStress: N_fact_photo=1.5; N_fact_pheno=100; N_fact_expansion=1; N_fact_grain=1.5
          SWStress: same as APS26.APS26NRate160WaterWet.paddock.Wheat.SWStress
          LinearInterpolationFunction TempStress: XProperty=[Environment].MeanT
            XYPairs: X=[0, 10, 25, 35]; Y=[0, 1, 1, 0]
          RadiationPartitioning: FractIncidentRadn=1; RadiationPartitioningOrder=[Pod, Grain, Leaf]
          StageBasedInterpolation NFixRate: Codes=[0, 0, 0, 0, 0, 0, 0, 0, 0, 0, 0]; Proportional=true
            Stages=[Sowing, Germination, Emergence, EndOfJuvenile, FloralInitiation, Flowering, StartGrainFill, EndGrainFill, Maturity, HarvestRipe, EndCrop]
          CompositeBiomass AboveGroundLive: Propertys=[[Leaf1].Live, [Stem1].Live, [Pod].Live, [Grain].Live]
          CompositeBiomass AboveGroundDead: Propertys=[[Leaf1].Dead, [Stem1].Dead, [Pod].Dead, [Grain].Dead]
          CompositeBiomass BelowGroundLive: Propertys=[[Root1].Live]
          CompositeBiomass BelowGroundDead: Propertys=[[Root1].Dead]
          CompositeBiomass TotalLive
            Propertys=[[Leaf1].Live, [Stem1].Live, [Pod].Live, [Grain].Live, [Root1].Live]
          CompositeBiomass TotalDead
            Propertys=[[Leaf1].Dead, [Stem1].Dead, [Pod].Dead, [Grain].Dead, [Root1].Dead]
          CompositeBiomass AboveGround: Propertys=[[AboveGroundLive], [AboveGroundDead]]
          CompositeBiomass BelowGround: Propertys=[[Root1].Live, [Root1].Dead]
          CompositeBiomass Total
            Propertys=[[AboveGroundLive], [AboveGroundDead], [BelowGroundLive], [BelowGroundDead]]
          CompositeBiomass Head: Propertys=[[Pod].Live, [Grain].Live, [Pod].Dead, [Grain].Dead]
          StageBasedInterpolation StageCode: Codes=[1, 2, 3, 4, 5, 6, 7, 8, 9, 10, 11]; Proportional=true
            Stages=[Sowing, Germination, Emergence, EndOfJuvenile, FloralInitiation, Flowering, StartGrainFill, EndGrainFill, Maturity, HarvestRipe, EndCrop]
          PlantSpatial1
          Environment: CO2=350
          PStress
          Zadok
        MicroClimate: same as APS26.APS26NRate160WaterWet.paddock.MicroClimate
        Fertiliser
          Definitions:
            Name   FractionNO3  FractionNH4  FractionUrea
            UreaN  0            0            1
            NO3N   1            0            0
        Operations FertiliserOperations
          1986-06-14  Fertiliser.Apply(Amount: 15, Type: Fertiliser.Types.NO3N, Depth: 50);
        Operations IrrigationOperations: same as Mer86.Factors.IrrigationApplication.Wet.IrrigationOperations
        MicroClimate: same as APS26.APS26NRate160WaterWet.paddock.MicroClimate
  Experiment Mer73
    Factors
      Factor NitrogenApplication: Paths=[FertiliserOperations]
        FactorValue 0
          Operations FertiliserOperations
            1986-06-14  Fertiliser.Apply(Amount: 0, Type: Fertiliser.Types.NO3N, Depth: 50);
        FactorValue 15
          Operations FertiliserOperations
            1973-06-21  Fertiliser.Apply(Amount: 15, Type: Fertiliser.Types.NO3N, Depth: 50);
      Factor IrrigationApplication: Paths=[IrrigationOperations]
        FactorValue Dry: same as Mer86.Factors.IrrigationApplication.Dry
        FactorValue 40
          Operations IrrigationOperations
            1973-09-21  irrigation.Apply (amount:40);
        FactorValue 150
          Operations IrrigationOperations
            1973-08-28  irrigation.Apply (amount:20);
            1973-09-21  irrigation.Apply (amount:30);
            1973-10-12  irrigation.Apply (amount:50);
            1973-10-28  irrigation.Apply (amount:50);
    Simulation Base: Area=0
      Clock: StartDate=1973-05-01; EndDate=1973-11-30
      Summary summaryfile
      WeatherFile met: FileName=MER-73.met; MaxT=0; MinT=0; Rain=0; Radn=0; vp=0; CO2=350
      Zone paddock: Area=1
        Report: same as Mer86.Base.paddock.Report
        Soil MER-73Field: SoilType=sand; LocalName=Merredin; Site=Merredin; NearestTown=Unknown; Region=WA; NaturalVegetation=Unknown; Latitude=0; Longitude=0
          Water
            Thickness  BD    AirDry  LL15  DUL   SAT
            100        1.7   0.03    0.03  0.15  0.28
            100        1.85  0.03    0.04  0.2   0.27
            100        1.75  0.03    0.04  0.2   0.27
            100        1.7   0.04    0.05  0.2   0.25
            100        1.7   0.04    0.05  0.21  0.25
            100        1.85  0.04    0.08  0.21  0.25
            100        1.95  0.04    0.11  0.21  0.25
            200        2     0.04    0.14  0.21  0.23
            200        2     0.04    0.16  0.23  0.23
            200        2     0.04    0.14  0.23  0.23
            SoilCrop Wheat
              LL=[0.03, 0.03, 0.03, 0.05, 0.1, 0.12, 0.17, 0.17, 0.17, 0.17]
              KL=[0.06, 0.06, 0.06, 0.06, 0.06, 0.06, 0.06, 0.06, 0.06, 0.06]
              XF=[0.2, 0.2, 0.4, 0.4, 0.4, 0.4, 0.4, 0.4, 0.2, 0]
          SoilWater: min_crit_temp=5; max_crit_temp=35; max_albedo=0.23; A_to_evap_fact=0.44; canopy_eos_coef=1.7; sw_top_crit=0.9; sumes1_max=100; sumes2_max=25; solute_flow_eff=[1]; solute_flux_eff=[1]; gravity_gradient=2E-05; specific_bd=2.65; hydrol_effective_depth=450; immobile_solutes=[nh4]; canopy_fact=[1, 1, 0, 0]; canopy_fact_height=[0, 600, 1800, 30000]; canopy_fact_default=0.5; act_evap_method=ritchie; irrigation_will_runoff=false; irrigation_layer=1; SummerCona=2; SummerU=6; SummerDate=1-Nov; WinterCona=2; WinterU=6; WinterDate=1-Apr; DiffusConst=88; DiffusSlope=35; Salb=0.13; slope=0; discharge_width=0; catchment_area=0; max_pond=0; CN2Bare=60; CNRed=20; CNCov=0.8
            Thickness  SWCON  KLAT
            100        1      0
            100        1      0
            100        1      0
            100        1      0
            100        0.1    0
            100        1      0
            100        1      0
            200        1      0
            200        1      0
            200        1      0
            mobile_solutes=[no3, urea, cl, br, org_n, org_c_pool1, org_c_pool2, org_c_pool3]
          SoilNitrogen: fom_type=[default, manure, mucuna, lablab, shemp, stable]; fract_carb=[0.2, 0.3, 0.54, 0.57, 0.45, 0]; fract_cell=[0.7, 0.3, 0.37, 0.37, 0.47, 0.1]; fract_lign=[0.1, 0.4, 0.09, 0.06, 0.08, 0.9]
          SoilOrganicMatter: RootCN=20; RootWt=1500; SoilCN=13; EnrACoeff=1; EnrBCoeff=1; OCUnits=Total
            Thickness  OC    FBiom  FInert
            100        0.5   0.04   0.1
            100        0.1   0.03   0.1
            100        0.1   0.02   0.2
            100        0.05  0.01   0.8
            100        0.05  0.01   0.9
            100        0.05  0.01   0.9
            100        0.05  0.01   0.9
            200        0.05  0.01   0.9
            200        0.05  0.01   0.9
            200        0.05  0.01   0.9
          Analysis: Thickness=[100, 100, 100, 100, 100, 100, 100, 200, 200, 200]; PH=[4.7, 4.7, 4.7, 6, 6, 6, 6, 6, 6, 6]; PHUnits=Water; BoronUnits=HotWater
          Sample Initial Water: Thickness=[100, 100, 100, 100, 100, 100, 100, 200, 200, 200]; SW=[0.03, 0.03, 0.07, 0.1, 0.22, 0.22, 0.22, 0.22, 0.21, 0.19]; NO3Units=ppm; NH4Units=ppm; SWUnits=Volumetric; OCUnits=Total; PHUnits=Water
          Sample Initial Nitrogen: NO3Units=ppm; NH4Units=ppm; SWUnits=Volumetric; OCUnits=Total; PHUnits=Water
            Thickness  NO3  NH4
            100        2    1
            100        1    0
            100        0    0
            100        0    0
            100        0    0
            100        0    0
            100        0    0
            200        0    0
            200        0    0
            200        0    0
        Irrigation
        SurfaceOrganicMatter: crit_residue_wt=2000; opt_temp=20; cum_eos_max=20; cnrf_coeff=0.277; cnrf_optcn=25; c_fract=0.4; leach_rain_tot=25; min_rain_to_leach=10; crit_min_surfom_orgC=0.004; default_cpr=0; default_standing_fraction=0; standing_extinct_coeff=0.5; fractionFaecesAdded=0.5; PoolName=wheat_stubble; type=wheat; mass=0; standing_fraction=0.0; cpr=0; cnr=80
          ResidueTypes:
            Name         fom_type       fraction_C  po4ppm  nh4ppm  no3ppm  specific_area  cf_contrib  pot_decomp_rate  fr_c             fr_n             fr_p
            ResidueType  wheat          0.4         0       0       0       0.0005         1           0.1              [0.2, 0.7, 0.1]  [0.2, 0.7, 0.1]  [0.2, 0.7, 0.1]
            ResidueType  lucerne        0.4         0       0       0       0.0002         1           0.1              [0.2, 0.7, 0.1]  [0.2, 0.7, 0.1]  [0.2, 0.7, 0.1]
            ResidueType  barley         0.4         0       0       0       0.0005         1           0.1              [0.2, 0.7, 0.1]  [0.2, 0.7, 0.1]  [0.2, 0.7, 0.1]
            ResidueType  tithonia       0.4         0       0       0       0.0005         1           0.1              [0.2, 0.7, 0.1]  [0.2, 0.7, 0.1]  [0.2, 0.7, 0.1]
            ResidueType  bambatsi       0.4         0       0       0       0.0005         1           0.1              [0.2, 0.7, 0.1]  [0.2, 0.7, 0.1]  [0.2, 0.7, 0.1]
            ResidueType  barley         0.4         0       0       0       0.0005         1           0.1              [0.2, 0.7, 0.1]  [0.2, 0.7, 0.1]  [0.2, 0.7, 0.1]
            ResidueType  broccoli       0.4         0       0       0       0.0004         1           0.1              [0.2, 0.7, 0.1]  [0.2, 0.7, 0.1]  [0.2, 0.7, 0.1]
            ResidueType  butterflypea   0.4         0       0       0       0.0004         1           0.1              [0.2, 0.7, 0.1]  [0.2, 0.7, 0.1]  [0.2, 0.7, 0.1]
            ResidueType  camaldulensis  0.4         0       0       0       0.0002         1           0.1              [0.2, 0.7, 0.1]  [0.2, 0.7, 0.1]  [0.2, 0.7, 0.1]
            ResidueType  canola         0.4         0       0       0       0.0002         1           0.1              [0.2, 0.7, 0.1]  [0.2, 0.7, 0.1]  [0.2, 0.7, 0.1]
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        Operations SowingOperations
          1986-05-29  Wheat.Sow(population:149, cultivar:"GattonHartog", depth:30, rowSpacing:250); // Gutha
        Plant15 Wheat: same as Mer86.Base.paddock.Wheat
        MicroClimate: same as APS26.APS26NRate160WaterWet.paddock.MicroClimate
        Fertiliser
          Definitions:
            Name   FractionNO3  FractionNH4  FractionUrea
            UreaN  0            0            1
            NO3N   1            0            0
        Operations FertiliserOperations
          1986-06-14  Fertiliser.Apply(Amount: 15, Type: Fertiliser.Types.NO3N, Depth: 50);
        Operations IrrigationOperations: same as Mer86.Factors.IrrigationApplication.Wet.IrrigationOperations
        Operations FertiliserSchedule
          1993-06-18  Fertiliser.Apply(Amount: 0, Type: Fertiliser.Types.NO3N);
        Operations OMSchedule
          1993-06-03  SurfaceOrganicMatter.Add(type: "wheat", mass: 0, N: 0);
          1993-06-03  SurfaceOrganicMatter.Incorporate(fraction: 1.0, depth:100);
        Operations SowingSchedule
          1993-06-29  Wheat.Sow(population:114, cultivar:"GattonHartog", depth:30, rowSpacing:250);
        Manager ExtraVariables
```csharp
        using System;
        using Models.Core;
		using System.Collections.Generic;
        using System.Text;
        using Models.PMF.OldPlant;
        using Models.PMF;
        using Models.Soils;
        using Models;
        using System.Xml.Serialization;
        namespace Models
        {
[Serializable] 
public class Script : Model
{      
[Link] Clock Clock;
[Link] Soils.Soil Soil;
[Link] Models.SurfaceOM.SurfaceOrganicMatter SOM;
[Link] Plant15 Plant;          
[Link] WeatherFile Met;   
[Link] Fertiliser Fert;
[Link] Irrigation Irrig;  
               
[XmlIgnore] public bool InitialDay { get; set; }

[XmlIgnore] public double AccumPlantN { get; set; }
[XmlIgnore] public double AccumMineralisation { get; set; }
[XmlIgnore] public double AccumDenit { get; set; }
[XmlIgnore] public double AccumFert { get; set; }
[XmlIgnore] public double AccumLeach { get; set; }
[XmlIgnore] public double AccumDetach { get; set; }
[XmlIgnore] public double DeltaSoilOMN { get; set; }
[XmlIgnore] public double DeltaSurfaceOMN { get; set; }
[XmlIgnore] public double DeltaSoilMineralN { get; set; }
[XmlIgnore] public double SoilNitrogenContent { get; set; }

[XmlIgnore] public double AccumEO { get; set; }
[XmlIgnore] public double AccumEP { get; set; }
[XmlIgnore] public double AccumES { get; set; }
[XmlIgnore] public double AccumDrainage { get; set; }
[XmlIgnore] public double AccumRunoff { get; set; }
[XmlIgnore] public double AccumOutflowLat { get; set; }
[XmlIgnore] public double AccumIrrigation { get; set; }
[XmlIgnore] public double AccumRainfall { get; set; }
[XmlIgnore] public double SoilWaterDeficit { get; set; }

[XmlIgnore] public double AccumTtemerg { get; set; }

[XmlIgnore] public double  InitialSoilOMN { get; set; }
[XmlIgnore] public double  InitialSurfaceOMN { get; set; }
[XmlIgnore] public double  InitialMineralN { get; set; }

[XmlIgnore] public double SWC { get; set; }
[XmlIgnore] public double DUL { get; set; }
[XmlIgnore] public double OutFlowLat { get; set; }
[XmlIgnore] public double MineralN {get; set;}
[XmlIgnore] public double TotalNO3 {get; set;}
[XmlIgnore] public double TotalNH4 {get; set;}

[EventSubscribe("Initialised")]
private void OnInitialised(object sender, EventArgs e)
{
InitialDay = true;
AccumPlantN = 0;
AccumMineralisation = 0;
AccumDenit = 0;
AccumFert = 0;
AccumLeach = 0;
AccumDetach = 0;
DeltaSoilOMN = 0;
DeltaSurfaceOMN = 0;
DeltaSoilMineralN = 0;
SoilNitrogenContent = 0;

AccumEO = 0;
AccumEP = 0;
AccumES = 0;
AccumDrainage = 0;
AccumRunoff = 0;
AccumOutflowLat = 0;
AccumIrrigation = 0;
AccumRainfall = 0;
SoilWaterDeficit = 0;

AccumTtemerg = 0;

SWC = 0;
DUL = 0;
}	   

[EventSubscribe("EndOfDay")]
private void OnEndOfDay(object sender, EventArgs e)
{
	int layers = Soil.SoilWater.dlayer.Length;
    if (InitialDay)
	{
      InitialSurfaceOMN = SOM.surfaceom_n;
      for (int layer = 0; layer < layers; layer++)
      { 
      InitialSoilOMN += (Soil.SoilNitrogen.biom_n[layer] + Soil.SoilNitrogen.fom_n[layer] + Soil.SoilNitrogen.hum_n[layer]);
      InitialMineralN += (Soil.SoilNitrogen.no3[layer] + Soil.SoilNitrogen.nh4[layer] + Soil.SoilNitrogen.urea[layer]);
      }
      InitialDay = false;
    }

//!!!!!! Nitrogen balance components !!!!!!
//!!!!!!^^^^^^^^^^^^^^^^^^^^^^^^^^^^^!!!!!!
//AccumPlantN -= (double)this.Get("[Plant].Root.NUptake");
AccumFert += Fert.NitrogenApplied;
DeltaSurfaceOMN = SOM.surfaceom_n - InitialSurfaceOMN;
AccumDetach = 0; //plant2 doesn't detach yet
MineralN = 0;
TotalNO3 = 0;
TotalNH4 = 0;
double OrganicN = 0;
//AccumLeach = AccumLeach - Soil.SoilNitrogen.leach_urea - Soil.SoilNitrogen.leach_no3 - Soil.SoilNitrogen.leach_nh4; //Fails
   for (int layer = 0; layer < layers; layer++)
    { 
    AccumMineralisation += (Soil.SoilNitrogen.dlt_n_min[layer] + Soil.SoilNitrogen.dlt_n_min_res[layer]);
    AccumDenit -= Utility.Math.Sum(Soil.SoilNitrogen.dnit);
    OrganicN += (Soil.SoilNitrogen.biom_n[layer] + Soil.SoilNitrogen.fom_n[layer] + Soil.SoilNitrogen.hum_n[layer]);
    MineralN += (Soil.SoilNitrogen.no3[layer] + Soil.SoilNitrogen.nh4[layer] + Soil.SoilNitrogen.urea[layer]);
    TotalNO3 += Soil.SoilNitrogen.no3[layer];
    TotalNH4 += Soil.SoilNitrogen.nh4[layer];
    }
DeltaSoilOMN = OrganicN - InitialSoilOMN;
DeltaSoilMineralN = MineralN - InitialMineralN;
SoilNitrogenContent = MineralN;
//!!!!!! Water balance components !!!!!!
//!!!!!!^^^^^^^^^^^^^^^^^^^^^^^^^^!!!!!!
AccumEO -= Soil.SoilWater.eo;
//AccumEP -= (double)this.Get("[Plant].Leaf.Transpiration");
AccumES -= Soil.SoilWater.es; 
AccumDrainage -= Soil.SoilWater.drain; 
AccumRunoff -= Soil.SoilWater.runoff; 
AccumIrrigation += Irrig.IrrigationApplied; 
AccumRainfall += Met.Rain;
SWC = 0;
DUL = 0;
double OutFlowLat = 0;
   for (int layer = 0; layer < layers; layer++)
   {
     SWC += Soil.SoilWater.sw_dep[layer];
     DUL += Soil.SoilWater.dul_dep[layer];
     OutFlowLat = Soil.SoilWater.outflow_lat[layer];
   }
AccumOutflowLat -= OutFlowLat;
SoilWaterDeficit =  (SWC - DUL);
}

[EventSubscribe("StartOfDay")]
private void OnStartOfDay(object sender, EventArgs e)
{
//!!!!!! Thermal time calculation !!!!!!
//!!!!!! ^^^^^^^^^^^^^^^^^^^^^^^^ !!!!!!

}
}
}
```
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