Simulations
  DataStore
  Experiment BTOS_2008GE3
    Factors
      Factor Cultivar: Specifications=[Operations]
        Operations hartog
          2008-06-03  [WheatPMFPrototype].Sow(cultivar:"hartog", population:120, depth:50, rowSpacing:250);
    Simulation: Area=0; Slope=0
      Weather
        FileName=%root%\Tests\WheatPMFPrototype\Mets\geraldton airport_btos.met
      Clock: StartDate=2008-05-24; EndDate=2009-06-03
      Summary
      Zone Field: Area=0; Slope=0
        Plant WheatPMFPrototype: CropType=Wheat
          Cultivar hartog: Alias=hartog
            Command:
              [Phenology].Vernalisation.VernSens = 0.9
              [Phenology].Vernalisation.PhotopSens = 0.9
              [Phenology].FloralInitiationFloweringPhase.Target = 630
          Phenology
            AirTemperatureFunction ThermalTime
              XYPairs: X=[0, 26, 34]; Y=[0, 26, 0]
            GerminatingPhase SowingGermination: Start=Sowing; End=Germination
            EmergingPhase GerminationEmergence: Start=Germination; End=Emergence; ShootLag=40; ShootRate=1.5
              VariableReference ThermalTime: VariableName=[Phenology].ThermalTime.Value
            GenericPhase EmergenceEndOfJuvenilePhasePhase: Start=Emergence; End=EndOfJuvenile
              Constant Target: Value=1
              VariableReference ThermalTime: VariableName=[Phenology].ThermalTime.Value
            GenericPhase EndOfJuvenileFloralInitiationPhase: Start=EndOfJuvenile; End=FloralInitiation
              MultiplyFunction ThermalTime
                VariableReference ThermalTime: VariableName=[Phenology].ThermalTime.Value
                VariableReference VernEff1: VariableName=[Phenology].Vernalisation.VernEff
                VariableReference PhotopEff: VariableName=[Phenology].Vernalisation.PhotopEff
              Constant Target: Value=400
            GenericPhase FloralInitiationFloweringPhase: Start=FloralInitiation; End=Flowering
              MultiplyFunction ThermalTime
                VariableReference ThermalTime: VariableName=[Phenology].ThermalTime.Value
                VariableReference PhotopEff: VariableName=[Phenology].Vernalisation.PhotopEff
              Constant Target: Value=630
            GenericPhase FloweringStartGrainFillPHase: Start=Flowering; End=StartGrainFill
              Constant Target: Value=120
              VariableReference ThermalTime: VariableName=[Phenology].ThermalTime.Value
            GenericPhase GrainFillingPhase: Start=StartGrainFill; End=EndGrainFill
              Constant Target: Value=545
              VariableReference ThermalTime: VariableName=[Phenology].ThermalTime.Value
            GenericPhase MaturityPhase: Start=EndGrainFill; End=Maturity
              Constant Target: Value=35
              VariableReference ThermalTime: VariableName=[Phenology].ThermalTime.Value
            GenericPhase HarvestRipePhase: Start=Maturity; End=HarvestRipe
              Constant Target: Value=1
              VariableReference ThermalTime: VariableName=[Phenology].ThermalTime.Value
            EndPhase ReadyForHarvesting: Start=HarvestRipe; End=Unused
              VariableReference ThermalTime: VariableName=[Phenology].ThermalTime.Value
            PhotoperiodFunction Photoperiod: Twilight=-6
            VernalisationCW Vernalisation: StartStageForEffects=Emergence; EndStageForEffects=Flowering; StartStageForCumulativeVD=Germination; EndStageForCumulativeVD=FloralInitiation; VernSens=0.8; PhotopSens=0.7
        Operations
          2008-06-03  [WheatPMFPrototype].Sow(cultivar:"hartog", population:120, depth:50, rowSpacing:250);
        Report: EventNames=[Clock].DoReport
          VariableNames:
            [Clock].Today
            [WheatPMFPrototype].Phenology.CurrentPhaseName
            [WheatPMFPrototype].Phenology.Stage
            [WheatPMFPrototype].Phenology.Vernalisation.PhotopEff
            [WheatPMFPrototype].Phenology.Vernalisation.VernEff
            [WheatPMFPrototype].Phenology.Vernalisation.VernSens
            [WheatPMFPrototype].Phenology.Vernalisation.PhotopSens
