Simulations: Area=0
  Simulation Test: Area=0
    WeatherFile: FileName=Goondiwindi.met
    Clock: StartDate=1940-01-01; EndDate=1989-12-31
    Summary
    Zone Field: Area=0
      Soil={Water={Name=Water, Thickness=[150, 150, 300, 300, 300, 300, 300, 300, 300, 300, 300], BD=[1.02, 1.03, 1.02, 1.02, 1.06, 1.11, 1.12, 1.15, 1.18, 1.2, 1.25], AirDry=[0.15, 0.26, 0.29, 0.29, 0.3, 0.31, 0.32, 0.33, 0.34, 0.35, 0.36], LL15=[0.29, 0.29, 0.29, 0.29, 0.3, 0.31, 0.32, 0.33, 0.34, 0.35, 0.36], DUL=[0.54, 0.53, 0.54, 0.54, 0.52, 0.5, 0.5, 0.48, 0.47, 0.46, 0.44], SAT=[0.59, 0.58, 0.59, 0.58, 0.57, 0.55, 0.55, 0.53, 0.52, 0.51, 0.49]}, SoilWater={Name=SoilWater, swcon=[0.3, 0.3, 0.3, 0.3, 0.3, 0.3, 0.3, 0.3, 0.3, 0.3, 0.3], mwcon=[1, 1, 1, 1, 1, 1, 1, 1, 1, 1, 1], ks=[0, 0, 0, 0, 0, 0, 0, 0, 0, 0, 0], bd=[1.02, 1.03, 1.02, 1.02, 1.06, 1.11, 1.12, 1.15, 1.18, 1.2, 1.25], klat=[0, 0, 0, 0, 0, 0, 0, 0, 0, 0, 0], dlayer=[150, 150, 300, 300, 300, 300, 300, 300, 300, 300, 300], sat=[0.59, 0.58, 0.59, 0.58, 0.57, 0.55, 0.55, 0.53, 0.52, 0.51, 0.49], dul=[0.54, 0.53, 0.54, 0.54, 0.52, 0.5, 0.5, 0.48, 0.47, 0.46, 0.44], ll15=[0.29, 0.29, 0.29, 0.29, 0.3, 0.31, 0.32, 0.33, 0.34, 0.35, 0.36], air_dry=[0.15, 0.26, 0.29, 0.29, 0.3, 0.31, 0.32, 0.33, 0.34, 0.35, 0.36]}, SoilOrganicMatter={Name=SoilOrganicMatter, RootCN=0, RootWt=0, SoilCN=0, EnrACoeff=0, EnrBCoeff=0, OCUnits=Total}, Analysis={Name=Analysis, PHUnits=Water, BoronUnits=HotWater}, InitialWater={Name=Initial water, FractionFull=1, PercentMethod=FilledFromTop}}
      Report: Events=Clock.EndOfDay
        Variables:
          Clock.Today
          WeatherFile.MaxT
          WeatherFile.MinT
          WeatherFile.Radn
          WeatherFile.Rain
  DataStore
  Tests
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