Simulations Standard toolbox: Area=0
  Tests:
    SimulationName  TableName  Type            ColumnNames  Parameters
    simulation      Report     EqualTo         column       value
    simulation      Report     LessThan        column       value
    simulation      Report     GreaterThan     column       value
    simulation      Report     AllPos          column       -
    simulation      Report     Between         column       value1,value2
    simulation      Report     Mean            column       5,value
    simulation      Report     Tolerance       column       1,5
    simulation      Report     CompareToInput  column       1,5
  Experiment={Simulation={Name=Base, Clock={Name=Clock, StartDate=1940-01-01, EndDate=1989-12-31}, Summary={Name=Summary}}}
  Folder Structural
  Folder Standard models: Area=0
    Weather: FileName=Goondiwindi.met
    Clock: StartDate=1940-01-01; EndDate=1989-12-31
    Summary
    Report: EventNames=[Clock].EndOfDay
      VariableNames:
        [Clock].Today
        [Weather].MaxT
        [Weather].MinT
        [Weather].Radn
        [Weather].Rain
    Fertiliser
      Definitions:
        Name     FractionNO3  FractionNH4  FractionUrea
        Urea     0            0            0.46
        DAP      0            0.18         0
        MAP      0            0.11         0
        UreaN    0            0            1
        NO3N     1            0            0
        NH4N     0            1            0
        NH4NO3N  0.5          0.5          0
        NH4SO4N  0            1            0
    Irrigation
    Operations
    Soil: SoilType=Black Vertosol; LocalName=Waco; Site=Jimbour; NearestTown=Jimbour, Q 4352; Region=South East Queensland; NaturalVegetation=Grassland, mainly Qld bluegrass; Latitude=0; Longitude=0
      Water
        Thickness  BD    AirDry  LL15  DUL   SAT
        150        1.02  0.15    0.29  0.54  0.59
        150        1.03  0.26    0.29  0.53  0.58
        300        1.02  0.29    0.29  0.54  0.59
        300        1.02  0.29    0.29  0.54  0.58
        300        1.06  0.3     0.3   0.52  0.57
        300        1.11  0.31    0.31  0.5   0.55
        300        1.12  0.32    0.32  0.5   0.55
        300        1.15  0.33    0.33  0.48  0.53
        300        1.18  0.34    0.34  0.47  0.52
        300        1.2   0.35    0.35  0.46  0.51
        300        1.25  0.36    0.36  0.44  0.49
        SoilCrop WheatSoil
          LL=[0.29, 0.29, 0.32, 0.38, 0.39, 0.39, 0.41, 0.48, 0.47, 0.46, 0.44]
          KL=[0.1, 0.1, 0.08, 0.06, 0.04, 0.02, 0.01, 0, 0, 0, 0]
          XF=[1, 1, 1, 1, 1, 1, 1, 0, 0, 0, 0]
        SoilCropOilPalm OilPalm: XF=[1, 1, 1, 1, 1, 1, 1, 1, 1, 0, 0, 0]
          KL=[0.06, 0.04, 0.03, 0.02, 0.02, 0.02, 0.01, 0.01, 0.01, 0, 0, 0]
      SoilWater: min_crit_temp=5; max_crit_temp=35; max_albedo=0.23; A_to_evap_fact=0.44; canopy_eos_coef=1.7; sw_top_crit=0.9; sumes1_max=100; sumes2_max=25; solute_flow_eff=[1]; solute_flux_eff=[1]; gravity_gradient=2E-05; specific_bd=2.65; hydrol_effective_depth=450; immobile_solutes=[NH4]; canopy_fact=[1, 1, 0, 0]; canopy_fact_height=[0, 600, 1800, 30000]; canopy_fact_default=0.5; act_evap_method=ritchie; irrigation_will_runoff=0; irrigation_layer=0; SummerCona=3.5; SummerU=6; SummerDate=1-Nov; WinterCona=3.5; WinterU=6; WinterDate=1-Apr; DiffusConst=40; DiffusSlope=16; Salb=0.13; max_pond=0; CN2Bare=73; CNRed=20; CNCov=0.8; Thickness=[150, 150, 300, 300, 300, 300, 300, 300, 300, 300, 300]; SWCON=[0.3, 0.3, 0.3, 0.3, 0.3, 0.3, 0.3, 0.3, 0.3, 0.3, 0.3]
        mobile_solutes=[NO3, urea, cl, br, org_n, org_c_pool1, org_c_pool2, org_c_pool3]
      SoilNitrogen
      SoilOrganicMatter: RootCN=40; RootWt=200; SoilCN=12.5; EnrACoeff=7.4; EnrBCoeff=0.2; OCUnits=Total
        Thickness  OC    FBiom  FInert
        150        1.04  0.025  0.4
        150        0.89  0.02   0.6
        300        0.89  0.015  0.8
        300        0.89  0.01   0.9
        300        0.77  0.01   0.95
        300        0.45  0.01   0.95
        300        0.27  0.01   0.95
        300        0.22  0.01   0.95
        300        0.16  0.01   0.95
        300        0.13  0.01   0.95
        300        0.12  0.01   0.95
      Analysis: PHUnits=Water; BoronUnits=HotWater
        Thickness  EC    PH
        150        0.2   8.4
        150        0.25  8.8
        300        0.31  9
        300        0.4   9.2
        300        0.59  9.2
        300        0.84  9.1
        300        0.93  9
        300        1.01  9
        300        1.06  8.9
        300        1.05  8.9
        300        1.01  8.9
      InitialWater Initial water: FractionFull=1; PercentMethod=FilledFromTop
      Sample: NO3Units=ppm; NH4Units=ppm; SWUnits=Volumetric; OCUnits=Total; PHUnits=Water
        Thickness  NO3    NH4
        150        6.503  0.599004
        150        2.101  0.100001
        300        2.101  0.100001
        300        1.701  0.100001
        300        1.701  0.100001
        300        1.701  0.100001
        300        1.701  0.100001
        300        1.701  0.100001
        300        1.701  0.100001
        300        1.701  0.100001
        300        1.701  0.100001
    SurfaceOrganicMatter: PoolName=wheat; type=wheat; mass=1000; standing_fraction=0; cnr=80
      ResidueTypes:
        {Name=wheat, fraction_C=0.08, po4ppm=10, nh4ppm=10, no3ppm=10, specific_area=0.0001, cf_contrib=1, pot_decomp_rate=0.1, fr_c=[0.3, 0.3, 0.4], fr_n=[0.3, 0.3, 0.4], fr_p=[0.3, 0.3, 0.4]}
    MicroClimate
  Folder Crops
    Plant Potato: CropType=Potato
      Cultivar JerseyBenny: Alias=JerseyBenny
        Command:
          [Structure].MainStemFinalNodeNumber.Value = 19
          [Structure].BranchingRate.Potential_Branching_Rate.XYPairs.X = 0,6,7,10,11
          [Structure].BranchingRate.Potential_Branching_Rate.XYPairs.Y = 0,0,0.5,0.5,0
          [Tuber].DMDemandFunction.OrganNumber.OrganNumberPerStem.Value = 3
          [Tuber].DryMatterContent.XYPairs.Y = 0.13,0.2
      Cultivar IlamHardy: Alias=IlamHardy
        Command:
          [Structure].MainStemFinalNodeNumber.Value = 26
          [Tuber].DryMatterContent.XYPairs.Y = 0.13,0.18
      Cultivar MarisPiper: Alias=[MarisPiper, -]
        Command:
          [Structure].MainStemFinalNodeNumber.Value = 50
          [Structure].BranchingRate.Potential_Branching_Rate.XYPairs.X = 0,7,8,9
          [Structure].BranchingRate.Potential_Branching_Rate.XYPairs.Y = 0,0,1,0
          [Stem].DMDemandFunction.InternodeWt.Value = 0.4
          [Leaf].LagDuration.XYPairs.X = 0,0.15,0.3,0.4,0.73,1.0
          [Leaf].LagDuration.XYPairs.Y = 0,500,500,500,500,20
          [Leaf].Photosynthesis.RUE.Value = 2
      Cultivar Horizon: Alias=Horizon
        Command:
          [Structure].MainStemFinalNodeNumber.Value = 28
          [Tuber].DryMatterContent.XYPairs.Y = 0.12,0.16
      Cultivar Karaka: Alias=Karaka
        Command:
          [Structure].MainStemFinalNodeNumber.Value = 29
          [Tuber].DryMatterContent.XYPairs.Y = 0.13,0.2
      Cultivar Nooksac: Alias=Nooksac
        Command:
          [Structure].MainStemFinalNodeNumber.Value = 36
          [Tuber].DryMatterContent.XYPairs.Y = 0.13,0.21
      Cultivar RedRascal: Alias=RedRascal
        Command:
          [Tuber].DryMatterContent.XYPairs.Y = 0.13,0.2
      Cultivar Rua: Alias=Rua
        Command:
          [Structure].MainStemFinalNodeNumber.Value = 29
          [Tuber].DryMatterContent.XYPairs.Y = 0.13,0.21
      Cultivar Nadine: Alias=Nadine
        Command:
          [Structure].MainStemFinalNodeNumber.Value = 29
          [Tuber].DryMatterContent.XYPairs.Y = 0.11,0.15
      Cultivar RussetBurbank: Alias=RussetBurbank
        Command:
          [Structure].MainStemFinalNodeNumber.Value = 46
      Cultivar Coliban: Alias=Coliban
        Command:
          [Tuber].DryMatterContent.XYPairs.Y = 0.10,0.19
      Cultivar Others: Alias=[Fianna, RussetRanger, Moonlight, Agria, Bondi, Crop39]
      Phenology
        AirTemperatureFunction ThermalTime
          XYPairs: X=[2, 20, 35]; Y=[0, 18, 0]
        GenericPhase Dormant: Start=Planting; End=Peeping
          AirTemperatureFunction ThermalTime
            XYPairs: X=[2, 20, 35]; Y=[0, 18, 0]
          Constant Target: Value=1
        EmergingPhase Sprouting: Start=Peeping; End=Emergence; ShootLag=72; ShootRate=1.35
          AirTemperatureFunction ThermalTime
            XYPairs: X=[2, 20, 35]; Y=[0, 18, 0]
        GenericPhase Vegetative: Start=Emergence; End=TuberInitiation
          AirTemperatureFunction ThermalTime
            XYPairs: X=[2, 20, 35]; Y=[0, 18, 0]
          Constant Target: Value=300
        LeafAppearancePhase EarlyTuber: Start=TuberInitiation; End=FinalLeaf
          AirTemperatureFunction ThermalTime
            XYPairs: X=[2, 20, 35]; Y=[0, 18, 0]
        LeafDeathPhase LateTuber: Start=FinalLeaf; End=FullSenescence
          AirTemperatureFunction ThermalTime
            XYPairs: X=[2, 20, 35]; Y=[0, 18, 0]
        GenericPhase Senesced: Start=FullSenescence; End=Maturity
          AirTemperatureFunction ThermalTime
            XYPairs: X=[2, 20, 35]; Y=[0, 18, 0]
          Constant Target: Value=200
        EndPhase Maturity: Start=Maturity; End=Unused
          AirTemperatureFunction ThermalTime
            XYPairs: X=[2, 20, 35]; Y=[0, 18, 0]
      OrganArbitrator Arbitrator: NArbitrationOption=PriorityThenRelativeAllocation; DMArbitrationOption=RelativeAllocation
      Structure: InitialiseStage=Emergence; PrimaryBudNo=2.2
        AirTemperatureFunction ThermalTime
          XYPairs: X=[2, 20, 35]; Y=[0, 18, 0]
        PhaseLookupValue MainStemPrimordiaInitiationRate: Start=Emergence; End=FinalLeaf
          DivideFunction NodeInitiationRateFunction
            VariableReference Phyllochron: VariableName=[Structure].MainStemNodeAppearanceRate.Phyllochron.Value
            Constant PrimordiaPerMainstemNode: Value=2
        PhaseLookupValue MainStemNodeAppearanceRate: Start=Emergence; End=FinalLeaf
          LinearInterpolationFunction Phyllochron: XProperty=[Structure].RelativeNodeApperance
            XYPairs: X=[0, 0.15, 0.74, 0.75]; Y=[5, 30, 30, 60]
        Constant MainStemFinalNodeNumber: Value=34
        LinearInterpolationFunction HeightModel: XProperty=[Stem].Live.Wt
          XYPairs: X=[0, 200, 1200, 4000]; Y=[20, 300, 700, 900]
        MultiplyFunction BranchingRate
          LinearInterpolationFunction Potential_Branching_Rate: XProperty=[Structure].MainStemNodeNo
            XYPairs: X=[0, 7, 8, 13, 14, 34]; Y=[0, 0, 0.5, 0.5, 0, 0]
          LinearInterpolationFunction: XProperty=[Leaf].CoverGreen
            XYPairs: X=[0, 0.4, 0.55, 0.8, 1]; Y=[1, 1, 0.45, 0, 0]
        Constant ShadeInducedBranchMortality: Value=0
        Constant DroughtInducedBranchMortality: Value=0
      Summariser
        CompositeBiomass AboveGround: Propertys=[[Leaf].Live, [Leaf].Dead, [Stem].Live, [Stem].Dead]
        CompositeBiomass BelowGround: Propertys=[[Root].Live, [Root].Dead, [Tuber].Live, [Tuber].Dead]
        CompositeBiomass Total
          Propertys=[[Leaf].Live, [Leaf].Dead, [Stem].Live, [Stem].Dead, [Root].Live, [Root].Dead, [Tuber].Live, [Tuber].Dead]
        CompositeBiomass TotalLive: Propertys=[[Leaf].Live, [Stem].Live, [Root].Live, [Tuber].Live]
        CompositeBiomass TotalDead: Propertys=[[Leaf].Dead, [Stem].Dead, [Root].Dead, [Tuber].Dead]
      GenericAboveGroundOrgan Tuber
        LinearInterpolationFunction NitrogenDemandSwitch: XProperty=[Leaf].LAI
          XYPairs: X=[0, 0.02, 0.0201, 10]; Y=[0, 0, 1, 1]
        Constant StructuralFraction: Value=1
        PotentialSizeDemandFunction DMDemandFunction: StartStageName=TuberInitiation; EndStageName=Maturity
          LinearInterpolationFunction PotentialGrowthIncrement: XProperty=[Phenology].Stage
            XYPairs: X=[4, 4.04, 4.32, 4.52, 4.95, 6.54]; Y=[0.017, 0.017, 0.06, 0.06, 0.018, 0]
          MultiplyFunction OrganNumber
            Constant OrganNumberPerStem: Value=5
            VariableReference: VariableName=[Structure].MainStemPopn
          AirTemperatureFunction ThermalTime
            XYPairs: X=[2, 20, 35]; Y=[0, 18, 0]
          AccumulateFunction AccumThermalTime: StartStageName=TuberInitiation; EndStageName=Maturity
            VariableReference: VariableName=[Structure].ThermalTime.Value
        LinearInterpolationFunction DryMatterContent: XProperty=[Phenology].Stage
          XYPairs: X=[4, 4.5]; Y=[0.13, 0.22]
        LinearInterpolationFunction MaximumNConc: XProperty=[Phenology].Stage
          XYPairs: X=[3, 4, 5, 6]; Y=[0.023, 0.023, 0.018, 0.015]
        LinearInterpolationFunction MinimumNConc: XProperty=[Phenology].Stage
          XYPairs: X=[4, 4.1, 7]; Y=[0.02, 0.006, 0.006]
        Biomass Live
        Biomass Dead
      Root: InitialDM=5; SpecificRootLength=40000; KNO3_yProperty=[0.02, 0.02]; KNO3_xRootLength=[0, 0.003]; KNH4_yProperty=[0.0, 0.0]; KNH4_xRootLength=[0, 0.003]
        CompositeBiomass Live: Propertys=[[Root].LayerLive]
        CompositeBiomass Dead: Propertys=[[Root].LayerDead]
        PhaseBasedSwitch NitrogenDemandSwitch: Start=Planting; End=FinalLeaf
        AirTemperatureFunction TemperatureEffect
          XYPairs: X=[0, 26, 35]; Y=[1, 1, 1]
        PhaseLookup RootFrontVelocity
          PhaseLookupValue: Start=Peeping; End=FinalLeaf
            Constant: Value=10
        PhaseLookup PartitionFraction
          PhaseLookupValue: Start=Emergence; End=TuberInitiation
            Constant: Value=0.3
          PhaseLookupValue: Start=TuberInitiation; End=FinalLeaf
            Constant: Value=0.05
          PhaseLookupValue: Start=FinalLeaf; End=FullSenescence
            Constant: Value=0
        Constant MaximumNConc: Value=0.01
        LinearInterpolationFunction MaxDailyNUptake: XProperty=[Root].Length
          XYPairs: X=[0, 0.02]; Y=[0, 6]
        Constant MinimumNConc: Value=0.01
        LinearInterpolationFunction KLModifier: XProperty=[Leaf].LAI
          XYPairs: X=[0, 3]; Y=[1, 1]
        LinearInterpolationFunction SenescenceRate: XProperty=[Leaf].FractionDied
          XYPairs: X=[0, 1]; Y=[0, 0.1]
      Leaf: CurrentExpandingLeaf=34; StartFractionExpanded=0.83819; FractionNextleafExpanded=0.926641; _ExpandedNodeNo=34.9266; MaxCover=1; KDead=0.03; GsMax=0.03; R50=200; Emissivity=0.96; Albido=0.26
        CompositeBiomass Live: Propertys=[[Leaf].CohortLive]
        CompositeBiomass Dead: Propertys=[[Leaf].CohortDead]
        LeafCohortParameters CohortParameters
          LinearInterpolationFunction MaxArea: XProperty=[Structure].RelativeNodeApperance
            XYPairs: X=[0, 0.15, 0.3, 0.44, 0.59, 0.73]; Y=[2000, 18000, 27000, 15000, 6000, 1500]
          LinearInterpolationFunction GrowthDuration: XProperty=[Structure].RelativeNodeApperance
            XYPairs: X=[0, 0.3, 0.4, 1]; Y=[200, 400, 400, 400]
          LinearInterpolationFunction LagDuration: XProperty=[Structure].RelativeNodeApperance
            XYPairs: X=[0, 0.15, 0.3, 0.4, 0.73, 1]; Y=[350, 350, 350, 350, 350, 20]
          LinearInterpolationFunction SenescenceDuration: XProperty=[Structure].RelativeNodeApperance
            XYPairs: X=[0, 0.15, 0.3, 0.4, 0.73, 1]; Y=[350, 350, 350, 350, 350, 100]
          Constant DetachmentLagDuration: Value=1000000
          Constant DetachmentDuration: Value=1000000
          LinearInterpolationFunction SpecificLeafAreaMax: XProperty=[Structure].RelativeNodeApperance
            XYPairs: X=[0, 1]; Y=[40000, 25000]
          Constant SpecificLeafAreaMin: Value=25000
          Constant StructuralFraction: Value=0.5
          Constant MaximumNConc: Value=0.07
          Constant MinimumNConc: Value=0.03
          Constant InitialNConc: Value=0
          Constant NReallocationFactor: Value=1
          Constant NRetranslocationFactor: Value=0.01
          LinearInterpolationFunction ExpansionStress: XProperty=[Potato].WaterSupplyDemandRatio
            XYPairs: X=[0.5, 1]; Y=[0, 1]
          Constant CriticalNConc: Value=0.05
          Constant DMRetranslocationFactor: Value=0.5
          LinearInterpolationFunction ShadeInducedSenescenceRate: XProperty=[Leaf].CohortCurrentRankCoverAbove
            XYPairs: X=[0, 0.5, 0.8, 1]; Y=[0, 0, 0, 0.03]
          Constant NonStructuralFraction: Value=0.2
        RUEModel Photosynthesis
          Constant RUE: Value=1.2
          RUECO2Function FCO2: PhotosyntheticPathway=C3
          LinearInterpolationFunction FN: XProperty=[Leaf].Fn
            XYPairs: X=[0, 1, 1.5]; Y=[1, 1, 1]
          WeightedTemperatureFunction FT: MaximumTemperatureWeighting=0.75
            XYPairs: X=[2, 12, 24, 34]; Y=[0, 1, 1, 0]
          LinearInterpolationFunction FW: XProperty=[Leaf].Fw
            XYPairs: X=[0, 0.4, 1.5]; Y=[0, 1, 1]
          LinearInterpolationFunction FVPD: XProperty=[Leaf].Photosynthesis.VPD
            XYPairs: X=[0, 10, 50]; Y=[1, 1, 1]
        AirTemperatureFunction ThermalTime
          XYPairs: X=[2, 20, 35]; Y=[0, 18, 0]
        MultiplyFunction ExtinctionCoeff
          Constant: Value=0.8
          LinearInterpolationFunction: XProperty=[Potato].WaterSupplyDemandRatio
            XYPairs: X=[0, 1]; Y=[0.5, 1]
        LinearInterpolationFunction FrostFraction: XProperty=[Weather].MinT
          XYPairs: X=[-1, 0]; Y=[0, 0]
        CompositeBiomass Total: Propertys=[[Leaf].Live, [Leaf].Dead]
        ArrayBiomass CohortArrayLive: Propertys=[[Leaf].Live]; ArraySize=[Leaf].MaxNodeNo
        ArrayBiomass CohortArrayDead: Propertys=[[Leaf].Dead]; ArraySize=[Leaf].MaxNodeNo
        LeafCohort InitialLeaf1: Rank=1; Area=900
        LeafCohort InitialLeaf2: Rank=2; Area=600
        LeafCohort InitialLeaf3: Rank=3; Area=300
      GenericAboveGroundOrgan Stem
        Constant NReallocationFactor: Value=0
        Constant NRetranslocationFactor: Value=0.05
        PhaseBasedSwitch NitrogenDemandSwitch: Start=Planting; End=FinalLeaf
        Constant DMRetranslocationFactor: Value=0
        Constant StructuralFraction: Value=1
        InternodeDemandFunction DMDemandFunction
          Constant InterNodeWt: Value=0.2
        LinearInterpolationFunction MaximumNConc: XProperty=[Phenology].Stage
          XYPairs: X=[3, 4, 5.3]; Y=[0.06, 0.05, 0.025]
        Constant MinimumNConc: Value=0.006
        Biomass Live
        Biomass Dead
    Plant15 Wheat: AutoHarvest=true; CropType=Wheat
    OilPalm
    Plant Potato: CropType=Potato
    Slurp: CropType=Slurp; localLAIGreen=5; localLAItot=5; localLightExtinction=0.6; localCanopyHeight=500; localCanopyDepth=500; localMaximumStomatalConductance=0.011; localFrgr=1; localDemandWater=10; localDemandNitrogen=5; localKNO3=0.1; localKNH4=0; localRootDepth=500; localSurfaceRootLengthDensity=0.05
    AgPasture: alt_N_uptake=no; SwardName=AgPasture; NumSpecies=1; WaterUptakeSource=calc; SpeciesName=[Ryegrass]; SpeciesNType=[grass]; SpeciesCType=[C3]; InitialDMShoot=[2000]; InitialDMRoot=[500]; MinimumGreenWt=[300]; InitialRootDepth=[750]; ExpoLinearDepthParam=0.1; ExpoLinearCurveParam=3
    Folder Wheat cultivars
      Folder Yield Prophet cultivars
        Cultivar Early
          Alias=[agtscythe, arrino, bonnie_rock, bowerbird, crusader, dart, drysdale, emurock, hunter, hybrid_mercury, hyperno, imposeclplus, kalka, kirchauff, kukri, livingston, mace, ouyen, perengori, ruby, tamaroi, wyalkatchem, young]
          Command:
            [Phenology].Vernalisation.VernSens = 2.3
            [Phenology].Vernalisation.PhotopSens = 3.2
        Cultivar EarlyMid
          Alias=[annuello, barunga, carnamah, catalina, clf_stiletto, cobra, corack, correll, diamondbird, estoc, frame, gladius, goroke, grenadeclplus, guardian, halbred, hartog, impala, justica, kord, merlin, mitre, pugsley, shield, spitfire, stiletto, sunguard, sunstate, ventura, yallaroi, yawa, yitpi]
          Command:
            [Phenology].Vernalisation.VernSens = 1.5
            [Phenology].Vernalisation.PhotopSens = 3.0
        Cultivar VeryEarly
          Alias=[h45, h46, saintly, silverstar, tamarinrock, waagan, westonia, wollaroi, zippy]
          Command:
            [Phenology].Vernalisation.VernSens = 1.5
            [Phenology].Vernalisation.PhotopSens = 1.5
        Cultivar Mid
          Alias=[arrivato, babbler, barham, baxter, buckley, camm, carinya, clf-jnz, derrimut, dollarbird, elmoreclplus, justicaclplus, saphire, wallup]
          Command:
            [Phenology].Vernalisation.VernSens = 1.5
            [Phenology].Vernalisation.PhotopSens = 3.5
        Cultivar MidPlus: Alias=[bellaroi, lang, caparoi, suntop]
          Command:
            [Phenology].Vernalisation.VernSens = 2.0
            [Phenology].Vernalisation.PhotopSens = 3.5
        Cultivar MidLate
          Alias=[braewood, calingiri, chara, endure, envoy, gauntlet, gazelle, giles, magenta, phantom, sentinel, sunlin, sunvale, wylie]
          Command:
            [Phenology].Vernalisation.VernSens = 2.8
            [Phenology].Vernalisation.PhotopSens = 3.0
        Cultivar Late: Alias=[beaufont, bolac, forrest, kelallac, preston, strzelecki]
          Command:
            [Phenology].Vernalisation.VernSens = 2.5
            [Phenology].Vernalisation.PhotopSens = 4.0
        Cultivar WinterWheat: Alias=[lorikeet, wylah, rosella, whistler, wedgetail]
          Command:
            [Phenology].Vernalisation.VernSens = 3.9
            [Phenology].Vernalisation.PhotopSens = 3.9
            [Phenology].FloralInitiationToFlowering.Target.Value = 380
        Cultivar Axe: Alias=axe
          Command:
            [Phenology].Vernalisation.VernSens = 2.0
            [Phenology].Vernalisation.PhotopSens = 3.0
        Cultivar Scout: Alias=[scout, l]
          Command:
            [Phenology].Vernalisation.VernSens = 1.8
            [Phenology].Vernalisation.PhotopSens = 3.5
            [Phenology].StartGrainFillToEndGrainFill.Target.Value = 550
        Cultivar Lincoln: Alias=lincoln
          Command:
            [Phenology].Vernalisation.VernSens = 1.8
            [Phenology].Vernalisation.PhotopSens = 3.5
        Cultivar GregoryLancer: Alias=[gregory, lancer]
          Command:
            [Phenology].Vernalisation.VernSens = 2.7
            [Phenology].Vernalisation.PhotopSens = 3.2
        Cultivar Eaglehawk: Alias=eaglehawk
          Command:
            [Phenology].Vernalisation.VernSens = 2.5
            [Phenology].Vernalisation.PhotopSens = 2.5
            [Phenology].EndOfJuvenileToFloralInitiation.Target.Value = 500
            [Phenology].FloralInitiationToFlowering.Target.Value = 655
            [Phenology].FloweringToStartGrainFill.Target.Value = 250
            [Phenology].StartGrainFillToEndGrainFill.Target.Value = 500
        Cultivar Marombi: Alias=[marombi, -]
          Command:
            [Phenology].Vernalisation.VernSens = 3.9
            [Phenology].Vernalisation.PhotopSens = 4.0
            [Phenology].FloralInitiationToFlowering.Target.Value = 455
    Folder OilPalm cultivars
      Cultivar Dami
        Command:
          [FrondMaxArea].XYPairs.X = 0,2,4.5,8.5,14
          [FrondMaxArea].XYPairs.Y = 0.1,1,7,12,14
      Cultivar SuperFamily
        Command:
          [FrondMaxArea].XYPairs.X = 0,2,4.5,8.5,14
          [FrondMaxArea].XYPairs.Y = 0.1,0.9,0.63,10.8,12.6
  Folder Data store and analysis models: TimeSeriesStats={TableName=PredictedObserved}
    Input
    Probability: Exceedence=true
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