Simulations Training
  Simulations Soils
    Soil Heavy Clay: ASCOrder=Vertosol; ASCSubOrder=Black; SoilType=Clay; Site=Kaimkillenbun; NearestTown=Kaimkillenbun, Q 4406; Region=Darling Downs and Granite Belt; State=Queensland; Country=Australia; NaturalVegetation=Open woodland with mountain coolibah; ApsoilNumber=11; Latitude=-27.066; Longitude=151.413; LocationAccuracy=+/- 20m; DataSource=CSIRO Sustainable Ecosystems, Toowoomba; Comments=oc and ph estimated
      Water
        Thickness  BD    AirDry  LL15  DUL   SAT
        150        1.01  0.11    0.22  0.54  0.59
        150        1.04  0.176   0.22  0.53  0.58
        300        1.07  0.28    0.28  0.52  0.57
        300        1.08  0.28    0.28  0.51  0.56
        300        1.15  0.28    0.28  0.49  0.54
        300        1.23  0.28    0.28  0.46  0.51
        300        1.26  0.28    0.28  0.44  0.49
        SoilCrop wheat: LL=[0.22, 0.22, 0.28, 0.28, 0.34, 0.37, 0.36]; KL=[0.06, 0.06, 0.06, 0.04, 0.04, 0.02, 0.02]; XF=[1, 1, 1, 1, 1, 1, 1]
        SoilCrop sorghum: LL=[0.22, 0.22, 0.31, 0.31, 0.36, 0.37, 0.36]; KL=[0.07, 0.07, 0.07, 0.05, 0.05, 0.04, 0.03]; XF=[1, 1, 1, 1, 1, 1, 1]
      SoilWater: residueinterception=0; SummerDate=1-Nov; SummerU=6; SummerCona=3.5; WinterDate=1-Apr; WinterU=4; WinterCona=2.5; DiffusConst=40; DiffusSlope=16; Salb=0.12; CN2Bare=73; CNRed=20; CNCov=0.8; max_pond=0; Thickness=[150, 150, 300, 300, 300, 300, 300]; SWCON=[0.3, 0.3, 0.3, 0.3, 0.3, 0.3, 0.3]; irrigation_will_runoff=false; irrigation_layer=1
      SoilNitrogen: fom_type=[default, manure, mucuna, lablab, shemp, stable]; fract_carb=[0.2, 0.3, 0.54, 0.57, 0.45, 0]; fract_cell=[0.7, 0.3, 0.37, 0.37, 0.47, 0.1]; fract_lign=[0.1, 0.4, 0.09, 0.06, 0.08, 0.9]; wfpsN2N2O_x=[22, 88]; wfpsN2N2O_y=[0.1, 1]
      SoilOrganicMatter: RootCN=40; RootWt=1000; SoilCN=12; EnrACoeff=7.4; EnrBCoeff=0.2; OCUnits=Total
        Thickness  OC        FBiom  FInert
        150        0.953846  0.04   0.4
        150        0.953846  0.02   0.6
        300        0.961538  0.02   0.8
        300        0.846154  0.02   1
        300        0.546154  0.01   1
        300        0.261538  0.01   1
        300        0.2       0.01   1
      Analysis: Thickness=[150, 150, 300, 300, 300, 300, 300]; PH=[8, 8, 8, 8, 8, 8, 8]; PHUnits=Water; BoronUnits=HotWater
      InitialWater: PercentMethod=FilledFromTop; FractionFull=0.1
      Sample InitialN: NO3Units=kgha; NH4Units=kgha; SWUnits=Volumetric; OCUnits=Total; PHUnits=Water
        Thickness  NO3  NH4
        1800       50   3
        999999     -    -
        999999     -    -
        999999     -    -
        999999     -    -
        999999     -    -
        999999     -    -
    Soil Sand: SoilType=Deep sandy duplex; Site=Cunderdin; NearestTown=Cunderdin; Region=Central Region_Avon; State=Western Australia; Country=Australia; ApsoilNumber=486; Latitude=-31.457; Longitude=117.244; LocationAccuracy=+/- 20m; DataSource=DAFWA_A. Stuart-Street _ NEAR project Yield Prophet
      Comments=YP11 - reticulite subsoil (coarse with sand seams)-estimated LL.  12/05/2010 Zvi Hochman modified values for kl(wheat), salb, DiffusConst, DiffusSlope, CN2Bare at request of DAFWA
      Water
        Thickness  BD    AirDry  LL15   DUL    SAT
        100        1.64  0.015   0.03   0.09   0.354
        200        1.78  0.035   0.041  0.1    0.305
        200        1.92  0.14    0.14   0.187  0.262
        300        1.84  0.14    0.14   0.197  0.29
        400        2     0.14    0.14   0.169  0.233
        100        1.95  0.14    0.14   0.196  0.251
        SoilCrop wheat: LL=[0.03, 0.041, 0.14, 0.14, 0.14, 0.142]; KL=[0.06, 0.06, 0.06, 0.04, 0.04, 0.02]; XF=[1, 1, 1, 1, 1, 1]
      SoilWater: residueinterception=0; SummerDate=1-Nov; SummerU=6; SummerCona=3.5; WinterDate=1-Apr; WinterU=2; WinterCona=2; DiffusConst=40; DiffusSlope=16; Salb=0.14; CN2Bare=60; CNRed=20; CNCov=0.8; max_pond=0; Thickness=[100, 200, 200, 300, 400, 100]; SWCON=[0.7, 0.7, 0.5, 0.5, 0.5, 0.5]; irrigation_will_runoff=false; irrigation_layer=1
      SoilNitrogen: fom_type=[default, manure, mucuna, lablab, shemp, stable]; fract_carb=[0.2, 0.3, 0.54, 0.57, 0.45, 0]; fract_cell=[0.7, 0.3, 0.37, 0.37, 0.47, 0.1]; fract_lign=[0.1, 0.4, 0.09, 0.06, 0.08, 0.9]; wfpsN2N2O_x=[22, 88]; wfpsN2N2O_y=[0.1, 1]
      SoilOrganicMatter: RootCN=40; RootWt=1000; SoilCN=12; EnrACoeff=7.4; EnrBCoeff=0.2; OCUnits=Total
        Thickness  OC      FBiom  FInert
        100        0.0593  0.035  0.4
        200        0.1731  0.02   0.5
        200        0.103   0.015  0.7
        300        0.0409  0.015  0.95
        400        0.0275  0.01   0.95
        100        0.0648  0.01   0.95
      Analysis: Thickness=[100, 200, 200, 300, 400, 100]; PH=[6.4, 5.8, 6, 6.2, 6.2, 5.9]; PHUnits=Water; BoronUnits=HotWater
      InitialWater: PercentMethod=FilledFromTop; FractionFull=0.1
      Sample InitialN: same as Soils.Heavy Clay.InitialN
  Simulations Soils1
    Simulations Soils1
    Simulations
      Simulation Clay Fallow: Area=0; Slope=0
        Clock: StartDate=1989-01-01; EndDate=1989-12-31
        Summary SummaryFile
        Weather: FileName=%root%\Examples\WeatherFiles\Dalby.met
        Zone Field: Area=1; Slope=0
          Report: EventNames=[Clock].EndOfDay
            VariableNames:
              [Clock].Today
              [Weather].Rain
              [Soil].SoilWater.ESW
              [Soil].SoilWater.Es
              [Soil].SoilWater.Runoff
              [Soil].SoilWater.Drainage
              sum([Soil].SoilNitrogen.NO3)
              sum([Soil].SoilNitrogen.dlt_n_min)
              [SurfaceOrganicMatter].surfaceom_wt_all
              [SurfaceOrganicMatter].surfaceom_cover
          SurfaceOrganicMatter: PoolName=wheat_stubble; type=wheat; mass=500; standing_fraction=0; cnr=100; CriticalResidueWeight=2000; OptimumDecompTemp=20; MaxCumulativeEOS=20; CNRatioDecompCoeff=0.277; CNRatioDecompThreshold=25; TotalLeachRain=25; MinRainToLeach=10; CriticalMinimumOrganicC=0.004; DefaultCPRatio=0; DefaultStandingFraction=0; StandingExtinctCoeff=0.5; FractionFaecesAdded=0.5
            Pools:
              {PoolName=wheat_stubble, ResidueType=wheat, Mass=500, CNRatio=100, StandingFraction=0}
            ResidueTypes: LoadFromResource=ResidueTypes
          MicroClimate: air_pressure=1010; soil_emissivity=0.96; sun_angle=15; soil_heat_flux_fraction=0.4; night_interception_fraction=0.5; windspeed_default=3; refheight=2; albedo=0.15; emissivity=0.96; gsmax=0.01; r50=200; a_interception=0; b_interception=1; c_interception=0; d_interception=0; soil_albedo=0.3
          Soil Heavy Clay: ASCOrder=Vertosol; ASCSubOrder=Black; SoilType=Clay; Site=Kaimkillenbun; NearestTown=Kaimkillenbun, Q 4406; Region=Darling Downs and Granite Belt; State=Queensland; Country=Australia; NaturalVegetation=Open woodland with mountain coolibah; ApsoilNumber=11; Latitude=-27.066; Longitude=151.413; LocationAccuracy=+/- 20m; DataSource=CSIRO Sustainable Ecosystems, Toowoomba; Comments=oc and ph estimated
            Water
              Thickness  BD    AirDry  LL15  DUL   SAT
              150        1.01  0.11    0.22  0.54  0.59
              150        1.04  0.176   0.22  0.53  0.58
              300        1.07  0.28    0.28  0.52  0.57
              300        1.08  0.28    0.28  0.51  0.56
              300        1.15  0.28    0.28  0.49  0.54
              300        1.23  0.28    0.28  0.46  0.51
              300        1.26  0.28    0.28  0.44  0.49
              SoilCrop Wheat: LL=[0.22, 0.22, 0.28, 0.28, 0.34, 0.37, 0.36]; KL=[0.06, 0.06, 0.06, 0.04, 0.04, 0.02, 0.02]; XF=[1, 1, 1, 1, 1, 1, 1]
              SoilCrop Barley: LL=[0.22, 0.22, 0.31, 0.31, 0.36, 0.37, 0.36]; KL=[0.07, 0.07, 0.07, 0.05, 0.05, 0.04, 0.03]; XF=[1, 1, 1, 1, 1, 1, 1]
            SoilWater: same as Soils.Heavy Clay.SoilWater
            SoilNitrogen: fom_type=[default, manure, mucuna, lablab, shemp, stable]; fract_carb=[0.2, 0.3, 0.54, 0.57, 0.45, 0]; fract_cell=[0.7, 0.3, 0.37, 0.37, 0.47, 0.1]; fract_lign=[0.1, 0.4, 0.09, 0.06, 0.08, 0.9]; wfpsN2N2O_x=[22, 88]; wfpsN2N2O_y=[0.1, 1]
            SoilOrganicMatter: same as Soils.Heavy Clay.SoilOrganicMatter
            Analysis: Thickness=[150, 150, 300, 300, 300, 300, 300]; PH=[8, 8, 8, 8, 8, 8, 8]; PHUnits=Water; BoronUnits=HotWater
            InitialWater: PercentMethod=FilledFromTop; FractionFull=0.1
            Sample InitialN: same as Soils.Heavy Clay.InitialN
      Simulation Sand Fallow: Area=0; Slope=0
        Clock: StartDate=1989-01-01; EndDate=1989-12-31
        Summary SummaryFile
        Weather: FileName=%root%\Examples\WeatherFiles\Dalby.met
        Zone Field: Area=1; Slope=0
          Report: EventNames=[Clock].EndOfDay
            VariableNames:
              [Clock].Today
              [Weather].Rain
              [Soil].SoilWater.ESW
              [Soil].SoilWater.Es
              [Soil].SoilWater.Runoff
              [Soil].SoilWater.Drainage
              sum([Soil].SoilNitrogen.NO3)
              sum([Soil].SoilNitrogen.dlt_n_min)
              [SurfaceOrganicMatter].surfaceom_wt_all
              [SurfaceOrganicMatter].surfaceom_cover
          SurfaceOrganicMatter: same as Soils1.Simulations.Clay Fallow.Field.SurfaceOrganicMatter
          MicroClimate: same as Soils1.Simulations.Clay Fallow.Field.MicroClimate
          Soil Sand: SoilType=Deep sandy duplex; Site=Cunderdin; NearestTown=Cunderdin; Region=Central Region_Avon; State=Western Australia; Country=Australia; ApsoilNumber=486; Latitude=-31.457; Longitude=117.244; LocationAccuracy=+/- 20m; DataSource=DAFWA_A. Stuart-Street _ NEAR project Yield Prophet
            Comments=YP11 - reticulite subsoil (coarse with sand seams)-estimated LL.  12/05/2010 Zvi Hochman modified values for kl(wheat), salb, DiffusConst, DiffusSlope, CN2Bare at request of DAFWA
            Water
              Thickness  BD    AirDry  LL15   DUL    SAT
              100        1.64  0.015   0.03   0.09   0.354
              200        1.78  0.035   0.041  0.1    0.305
              200        1.92  0.14    0.14   0.187  0.262
              300        1.84  0.14    0.14   0.197  0.29
              400        2     0.14    0.14   0.169  0.233
              100        1.95  0.14    0.14   0.196  0.251
              SoilCrop Wheat: LL=[0.03, 0.041, 0.14, 0.14, 0.14, 0.142]; KL=[0.06, 0.06, 0.06, 0.04, 0.04, 0.02]; XF=[1, 1, 1, 1, 1, 1]
            SoilWater: same as Soils.Sand.SoilWater
            SoilNitrogen: fom_type=[default, manure, mucuna, lablab, shemp, stable]; fract_carb=[0.2, 0.3, 0.54, 0.57, 0.45, 0]; fract_cell=[0.7, 0.3, 0.37, 0.37, 0.47, 0.1]; fract_lign=[0.1, 0.4, 0.09, 0.06, 0.08, 0.9]; wfpsN2N2O_x=[22, 88]; wfpsN2N2O_y=[0.1, 1]
            SoilOrganicMatter: same as Soils.Sand.SoilOrganicMatter
            Analysis: Thickness=[100, 200, 200, 300, 400, 100]; PH=[6.4, 5.8, 6, 6.2, 6.2, 5.9]; PHUnits=Water; BoronUnits=HotWater
            InitialWater: PercentMethod=FilledFromTop; FractionFull=0.1
            Sample InitialN: same as Soils.Heavy Clay.InitialN
      DataStore
  Simulations
    Simulation Clay Fallow: same as Soils1.Simulations.Clay Fallow
    DataStore
    Simulation Clay Residue: Area=0; Slope=0
      Clock: StartDate=1989-01-01; EndDate=1989-12-31
      Summary SummaryFile
      Weather: FileName=%root%\Examples\WeatherFiles\Dalby.met
      Zone Field: Area=1; Slope=0
        Report: EventNames=[Clock].EndOfDay
          VariableNames:
            [Clock].Today
            [Weather].Rain
            [Soil].SoilWater.ESW
            [Soil].SoilWater.Es
            [Soil].SoilWater.Runoff
            [Soil].SoilWater.Drainage
            sum([Soil].SoilNitrogen.NO3)
            sum([Soil].SoilNitrogen.dlt_n_min)
            [SurfaceOrganicMatter].surfaceom_wt_all
            [SurfaceOrganicMatter].surfaceom_cover
        SurfaceOrganicMatter: PoolName=wheat_stubble; type=wheat; mass=3000; standing_fraction=0; cnr=100; CriticalResidueWeight=2000; OptimumDecompTemp=20; MaxCumulativeEOS=20; CNRatioDecompCoeff=0.277; CNRatioDecompThreshold=25; TotalLeachRain=25; MinRainToLeach=10; CriticalMinimumOrganicC=0.004; DefaultCPRatio=0; DefaultStandingFraction=0; StandingExtinctCoeff=0.5; FractionFaecesAdded=0.5
          Pools:
            {PoolName=wheat_stubble, ResidueType=wheat, Mass=3000, CNRatio=100, StandingFraction=0}
          ResidueTypes: LoadFromResource=ResidueTypes
        MicroClimate: same as Soils1.Simulations.Clay Fallow.Field.MicroClimate
        Soil Heavy Clay: same as Soils1.Simulations.Clay Fallow.Field.Heavy Clay
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